# fuel cell production, solid oxide, 125kW electrical, future

Dataset: EcoSpold 2, unit process
Geography: RoW
Time period: 2000-01-01 to 2023-12-31
Technology level: current
Classification: EcoSpold01Categories: natural gas/cogeneration
Classification: ISIC rev.4 ecoinvent: 2790:Manufacture of other electrical equipment
Synonyms: Festoxid Brennstoffzelle; oxidkeramische Hochtemperaturbrennstoffzelle; solid oxide fuel cell; Festkeramik Brennstoffzelle
Tags: ConvertedDataset
Scenario: Business-as-Usual
System model: Allocation, cut-off by classification
Generated by: Alex Primas
Published in: Primas A. 2007
Database: ecoinvent
isCopyrightProtected: true
accessRestrictedTo: 1

## General comment
The module reflects a solid oxide fuel cell (SOFC) system with 125 kW electrical output. Inventory based on information from literature and one manufacturer. Life time operation of auxiliary systems is 80'000 h. Stack lifetime is 48'000 h.
[This dataset was already contained in the ecoinvent database version 2. It was not individually updated during the transfer to ecoinvent version 3. Life Cycle Impact Assessment results may still have changed, as they are affected by changes in the supply chain, i.e. in other datasets. This dataset was generated following the ecoinvent quality guidelines for version 2. It may have been subject to central changes described in the ecoinvent version 3 change report (http://www.ecoinvent.org/database/ecoinvent-version-3/reports-of-changes/), and the results of the central updates were reviewed extensively. The changes added e.g. consistent water flows and other information throughout the database. The documentation of this dataset can be found in the ecoinvent reports of version 2, which are still available via the ecoinvent website. The change report linked above covers all central changes that were made during the conversion process.]

## Included activities end
The module includes the most important materials used for production, the energy needed for production, planning and engineering. Also included is the transport of the raw materials, the engine delivery and the installation on site.

## Geography
Process applicable in central European conditions.

## Technology
Solid oxide fuel cell (SOFC) with unpressurised tubular stack design for central cogeneration use. Performance, stack lifetime and catalyst use according to expected future values for a serial product. Operation with connection to low pressure gas network. Electrical efficiency 47%, total efficiency 80%.

## Parameters
- fraction, process water, to air: 0.15 dimensionless; name fraction_PW_to_air; lognormal variance with pedigree 0.092025, pedigree (4,4,3,2,4)

## Reference product
- fuel cell, solid oxide, 125kW electrical, future: 1 unit; By-product classification allocatable product; CPC 46410: Primary cells and primary batteries; HS2017 8506: Cells and batteries; primary
  EcoSpold01Location=CH
  production volume 3.96633 unit
    This is a placeholder value that does not reflect real-world production volumes. This dataset does not currently require a real-world production volume to work in the database framework, and no actual data were collected yet. This has no negative effect on the results of the ecoinvent database.
  property price 54764.5 EUR2005
    Calculated based on inputs: The price of the product has been calculated as a sum of the values of the material and energy inputs for this product. This value is therefore a rough estimation. It may underestimate the real price since there are additional expenses when producing any product. These expences can include for example labour costs, treatment of waste materials and profit for the producer. Please consider carefully whether this level of data quality is acceptable for your application.
  properties: carbon allocation 0 kg, carbon content 0

## Inputs from technosphere
- aluminium oxide, non-metallurgical: 502.865, 85.1348 kg (2 suppliers, which the file names only by identifier); sum of these 588 kg; lognormal variance with pedigree 0.0726, pedigree (2,4,5,5,3)
  EcoSpold01Location=RER
  Data from 100kWel plant design adapted
  Uncertainty: data from 100kWel plant design adapted
  properties: dry mass 1 kg, wet mass 1 kg
- building, hall, steel construction: 0.56 m2; lognormal variance with pedigree 0.372, pedigree (4,4,5,5,1)
  EcoSpold01Location=CH
  Rough estimation based on company data
  Uncertainty: rough estimation based on company data
- building, multi-storey: 3.4 m3; lognormal variance with pedigree 0.372, pedigree (4,4,5,5,1)
  Rough estimation based on company data
  EcoSpold01Location=RER
  Uncertainty: rough estimation based on company data
- construction work, heat and power co-generation unit, 160kW electrical: 3.5 unit; lognormal variance with pedigree 0.3726, pedigree (2,4,5,5,3)
  EcoSpold01Location=RER
  Data from 160 kWel engine cogen plant adapted
  Uncertainty: data from 160 kWel engine cogen plant adapted
- electricity, low voltage: 45.5736, 2.03433, 31.9913, 664.02, 65.542, 0.408248, 150.493, 228.612, 11.3256 kWh (9 suppliers, which the file names only by identifier); sum of these 1200 kWh; lognormal variance with pedigree 0.064, pedigree (3,4,5,5,3)
  EcoSpold01Location=CH
  Estimation based on specific energy demand of engineering hours
  Uncertainty: estimation based on specific energy demand of engineering hours
- electricity, medium voltage: 168.719, 3365.56, 1130.82, 51.6675, 10.3412, 2.22048, 235.007, 347.546, 728.121 kWh (9 suppliers, which the file names only by identifier); sum of these 6040 kWh; lognormal variance with pedigree 0.0726, pedigree (2,4,5,5,3)
  Data from 100kWel plant design adapted
  EcoSpold01Location=UCTE
  Uncertainty: data from 100kWel plant design adapted
- fuel cell, stack solid oxide, 125kW electrical, future: 1 unit; lognormal variance with pedigree 0.37, pedigree (5,5,5,5,1)
  Material input
  EcoSpold01Location=CH
  Uncertainty: material input
- heat, central or small-scale, other than natural gas: 114.624, 8345.38 MJ (2 suppliers, which the file names only by identifier); sum of these 8460 MJ; lognormal variance with pedigree 0.064, pedigree (3,4,5,5,3)
  Estimation based on specific energy demand of engineering hours
  EcoSpold01Location=CH
  Uncertainty: estimation based on specific energy demand of engineering hours
  properties: heating value, net 1 MJ
- heat, district or industrial, natural gas: 688.319, 41887.5, 15469.2 MJ (3 suppliers, which the file names only by identifier); sum of these 58045 MJ; lognormal variance with pedigree 0.1246, pedigree (2,4,5,5,4)
  Approximation with company data of similar branch
  EcoSpold01Location=RER
  Uncertainty: approximation with company data of similar branch
  properties: heating value, net 1 MJ
- heating and sanitary equipment, heat and power co-generation unit, 160kW electrical: 0.75 unit; lognormal variance with pedigree 0.39, pedigree (4,4,5,5,3)
  EcoSpold01Location=RER
  Approximation based on similar process
  Uncertainty: approximation based on similar process
- inert waste, for final disposal: -617.4 kg; lognormal variance with pedigree 0.0346, pedigree (2,4,3,5,3)
  EcoSpold01Location=CH
  Approximation for disposal of ceramic parts
  Uncertainty: approximation for disposal of ceramic parts
  production volume
    Calculated from the production volume of fuel cell, solid oxide, 125kWe, future in proportion to the respective output amounts.
  properties: dry mass 0.995 kg, water content 0.00502513, wet mass 1 kg
- inverter, 2.5kW: 50 unit; lognormal variance with pedigree 0.442, pedigree (4,4,5,5,4)
  EcoSpold01Location=RER
  Data from 3kWel unit for use in photovoltaics
  Uncertainty: data from 3kWel unit for use in photovoltaics
- iron-nickel-chromium alloy: 250 kg; lognormal variance with pedigree 0.0726, pedigree (2,4,5,5,3)
  (same comment as for aluminium oxide, non-metallurgical)
  properties: dry mass 1 kg, wet mass 1 kg
- nickel, class 1: 25 kg; lognormal variance with pedigree 0.1246, pedigree (2,4,5,5,4)
  Data from 100kWel plant design adapted
  EcoSpold01Location=GLO
  Uncertainty: data from 100kWel plant design adapted
  properties: dry mass 1 kg, wet mass 1 kg
- reinforcing steel: 11750 kg; lognormal variance with pedigree 0.096, pedigree (4,5,5,5,3)
  EcoSpold01Location=RER
  Data for future 125kWel plant design, value uncertain
  Uncertainty: data for future 125kWel plant design, value uncertain
  properties: carbon content, fossil 0.004, dry mass 1 kg, wet mass 1 kg
- sheet rolling, chromium steel: 2050 kg; lognormal variance with pedigree 0.0546, pedigree (2,4,5,5,1)
  EcoSpold01Location=RER
  Based on material input
  Uncertainty: based on material input
- sheet rolling, steel: 11750 kg; lognormal variance with pedigree 0.0546, pedigree (2,4,5,5,1)
  Based on material input
  EcoSpold01Location=RER
  Uncertainty: based on material input
- steel, chromium steel 18/8, hot rolled: 1800 kg; lognormal variance with pedigree 0.096, pedigree (4,5,5,5,3)
  (same comment as for reinforcing steel)
  properties: carbon content, fossil 0.0008, dry mass 1 kg, wet mass 1 kg
  note on carbon content, fossil: Stainless steel model is the grade 304 steel (18/8 stainless, 18% chromium 8% nickel; max. 0.08% C)
- transport, passenger car: 3000 km; lognormal variance with pedigree 0.2, pedigree (4,4,5,5,3)
  Estimation
  EcoSpold01Location=CH
  Uncertainty: estimation
- wastewater, average: -15.708, -3.7561, -0.0559264 m3 (3 suppliers, which the file names only by identifier); sum of these -19.52 m3; lognormal variance with pedigree 0.102, pedigree (4,4,1,5,4)
  EcoSpold01Location=CH
  Approximation for waste water treatment
  Uncertainty: approximation for waste water treatment
  production volume
    (same comment as for inert waste, for final disposal)
  properties: carbon content, non-fossil 0.194039, dry mass 0.346837 kg, mass concentration, TOC 0.1091 kg/m3, mass concentration, calcium 0.039453 kg/m3, mass concentration, chlorine 0.030031 kg/m3, mass concentration, hydrogen 0.013365 kg/m3, mass concentration, nitrogen 0.031015 kg/m3, mass concentration, oxygen 0.069824 kg/m3, mass concentration, sodium 0.06456 kg/m3, mass concentration, sulfur 0.015602 kg/m3, water content 2882.2, wet mass 1000 kg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
  note on carbon content, non-fossil: 0.0673 kg TOC/m3 (Tab A.17, ecoinvent v2.2 report 13_I). TOC was considered as Total Carbon.
- zinc: 1.25 kg; lognormal variance with pedigree 0.1246, pedigree (2,4,5,5,4)
  (same comment as for aluminium oxide, non-metallurgical)
  properties: dry mass 1 kg, wet mass 1 kg

## Inputs from nature
- Occupation, industrial area [natural resource, land]: 101 m2*year; lognormal variance with pedigree 0.112, pedigree (4,4,5,5,1)
  Rough estimation based on company data
  Uncertainty: rough estimation based on company data
- Transformation, from unspecified [natural resource, land]: 2.02 m2; lognormal variance with pedigree 0.192, pedigree (4,4,5,5,1)
  Rough estimation based on company data
  Uncertainty: rough estimation based on company data
- Transformation, to industrial area [natural resource, land]: 2.02 m2; lognormal variance with pedigree 0.192, pedigree (4,4,5,5,1)
  Rough estimation based on company data
  Uncertainty: rough estimation based on company data
- Water, unspecified natural origin [natural resource, in water]: 19.52 m3; name water_UNO_input; lognormal variance with pedigree 0.1246, pedigree (2,4,5,5,4)
  Approximation with company data of similar branch
  Uncertainty: approximation with company data of similar branch

## Emissions to nature
- Water [air, unspecified]: 2.928 m3; name water_to_air_unspecified; lognormal variance with pedigree 0.0827, pedigree (2,2,5,5,1)
  Calculated value based on literature values and expert opinion. See comments in the parametres' comment field.
  property fraction, origin: fresh water 0; name fraction_origin_fresh_water
  property fraction, origin: salt water 0; name fraction_origin_salt_water
  property fraction, origin: unspecified 1; name fraction_origin_unspecified

## Sampling procedure
Literature data and manufacturer information

## Extrapolations
none This dataset has been copied from an original dataset covering the geography CH. The uncertainty has been adjusted accordingly.

## Review by Rolf Frischknecht 2007-08-13
passed
none
