# mercury production

Dataset: EcoSpold 2, unit process
Geography: GLO
Time period: 2000-01-01 to 2023-12-31
Technology level: current
Classification: ISIC rev.4 ecoinvent: 0729:Mining of other non-ferrous metal ores
Classification: EcoSpold01Categories: metals/extraction
Tags: ConvertedDataset
Scenario: Business-as-Usual
System model: Allocation, cut-off by classification
Generated by: Roland Hischier
Published in: Althaus H.-J. 2007
Database: ecoinvent
isCopyrightProtected: true
accessRestrictedTo: 1

## General comment
The functional unit represent 1 kg of liquid mercury. Large uncertainty of the process data due to weak data on the production process.
[This dataset was already contained in the ecoinvent database version 2. It was not individually updated during the transfer to ecoinvent version 3. Life Cycle Impact Assessment results may still have changed, as they are affected by changes in the supply chain, i.e. in other datasets. This dataset was generated following the ecoinvent quality guidelines for version 2. It may have been subject to central changes described in the ecoinvent version 3 change report (http://www.ecoinvent.org/database/ecoinvent-version-3/reports-of-changes/), and the results of the central updates were reviewed extensively. The changes added e.g. consistent water flows and other information throughout the database. The documentation of this dataset can be found in the ecoinvent reports of version 2, which are still available via the ecoinvent website. The change report linked above covers all central changes that were made during the conversion process.]

## Included activities start
The activity starts with the occupation and transformation of forest to mineral extraction site.

## Included activities end
Raw materials, machineries and energy consumption for production, estimated emissions to air from production and infrastructure of the site (approximation). No water emissions.

## Geography
Data used has no specific geographical origin (stoechiometry). Average europenan processes for raw materials, transport requirements and electricity mix used.

## Technology
Data approximated with data from lime mining, crushing and milling plus estimation of the additional furnace operation step, based on information in literature and own assumptions.

## Time period
date of published literature

## Parameters
- fraction, cooling water, cooling pond system, to air: 0.032 dimensionless; name fraction_CW_CP_to_air; lognormal variance with pedigree 0.0413, pedigree (2,3,1,3,1)
  Calculated based on literature value (Scown, C.D., 2011, Water Footprint of U.S. Transportation Fuels and supplying information of the article) (Vionnet, S., Quantis Water Database - Technical Report, 2012).
- fraction, cooling water, once-through system, to air: 0.004 dimensionless; name fraction_CW_OT_to_air; lognormal variance with pedigree 0.0413, pedigree (2,3,1,3,1)
  (same comment as for fraction, cooling water, cooling pond system, to air)
- fraction, cooling water, recirculating system, to air: 0.771 dimensionless; name fraction_CW_R_to_air; lognormal variance with pedigree 0.0413, pedigree (2,3,1,3,1)
  (same comment as for fraction, cooling water, cooling pond system, to air)
- fraction, cooling water, to air: 0.3875 dimensionless; name fraction_CW_to_air; = (0.5*fraction_CW_OT_to_air)+(0.5*fraction_CW_R_to_air); lognormal variance with pedigree 0.092025, pedigree (4,4,3,2,4)
  Calculated value based on literature value (see comments of the other parametres present in this dataset) and expert opinion. In the case when no industry/literature data are available about the type of cooling or directly fraction, cooling water, to air specific for the process a default assumption is applied. It is assumed that the once-through cooling system is used in 50% of all cases and recirculating system is used in another 50% of all cases.
- fraction, process water, to air: 0.15 dimensionless; name fraction_PW_to_air; lognormal variance with pedigree 0.092025, pedigree (4,4,3,2,4)
  Literature value. In case when no industry/process specific data are available, default evaporation fraction value is used. This value is 15% and is based on literature (Statistics Canada, 2007 & Shaffer, K.H., 2008, Consumptive water use in the Great Lakes Basin, USGS & Shiklomanov, 2003, World Water Resources at the Beginning of the 21st Century) and has been approved by an expert.

## Reference product
- mercury: 1 kg; By-product classification allocatable product; CPC 41601: Tungsten, molybdenum, tantalum, magnesium, cobalt, cadmium, titanium, zirconium, beryllium, gallium, hafnium, […]; HS2017 811292: Gallium, germanium, hafnium, indium, niobium (columbium), rhenium and vanadium; articles thereof, unwrought[...]; CAS 7439-97-6
  EcoSpold01Location=GLO
  production volume 725000 kg
    Calculated based on literature value. The global production of mercury in 2005 was 1.45E+06 kg (USGS, http://minerals.usgs.gov/minerals/pubs/commodity/mercury/mercumcs07.pdf, accessed 20130321). It is estimated, that 50% is produced by this technology.
  property price 12.5 EUR2005
    Temporary price data. Calculated as 90% of purchasers price based on: 2005 import and export prices (total trades (USD) divided by total weight (kg) in biggest economies of the world: EU27, USA, Brasil, China, India, Japan and Russia) from UN Commodity Trade Statistics Database (http://data.un.org/Explorer.aspxDatabase [Accessed 2011.06.20]). Commodity: Mercury
  properties: carbon allocation 0 kg, carbon content 0, carbon content, fossil 0, carbon content, non-fossil 0, dry mass 1 kg, water content 0, water in wet mass 0 kg, wet mass 1 kg

## Inputs from technosphere
- blasting: 8.97e-5 kg; lognormal variance with pedigree 0.0767, pedigree (4,3,5,3,3)
  Approximation with data from lime production
  EcoSpold01Location=RER
  Uncertainty: approximation with data from lime production
- conveyor belt: 3.22e-8 m; lognormal variance with pedigree 0.3667, pedigree (4,3,5,3,3)
  (same comment as for blasting)
- diesel, burned in building machine: 0.0209 MJ; lognormal variance with pedigree 0.0767, pedigree (4,3,5,3,3)
  Approximation with data from lime production
  EcoSpold01Location=GLO
  Uncertainty: approximation with data from lime production
  properties: heating value, net 1 MJ
- electricity, medium voltage: 0.0326 kWh; lognormal variance with pedigree 0.0767, pedigree (4,3,5,3,3)
  Approximation with data from lime production
  EcoSpold01Location=UCTE
  Uncertainty: approximation with data from lime production
- heat, central or small-scale, other than natural gas: 0.0043428 MJ; lognormal variance with pedigree 0.0767, pedigree (4,3,5,3,3)
  Approximation with data from lime production
  EcoSpold01Location=CH
  Uncertainty: approximation with data from lime production
  properties: heating value, net 1 MJ
- heat, district or industrial, other than natural gas: 124.09 MJ; lognormal variance with pedigree 0.086, pedigree (4,5,5,5,3)
  (same comment as for blasting)
  properties: heating value, net 1 MJ
- industrial machine, heavy, unspecified: 7.66974e-5, 0.000155303 kg (2 suppliers, which the file names only by identifier); sum of these 0.000232 kg; lognormal variance with pedigree 0.3667, pedigree (4,3,5,3,3)
  (same comment as for blasting)
- limestone quarry infrastructure: 6.09e-11 unit; lognormal variance with pedigree 0.3667, pedigree (4,3,5,3,3)
  EcoSpold01Location=CH
  Approximation with data from lime production
  Uncertainty: approximation with data from lime production
- packaging glass factory: 1.25e-10 unit; lognormal variance with pedigree 0.5861, pedigree (4,5,5,3,5)
  EcoSpold01Location=RER
  Estimation
  Uncertainty: estimation
- quicklime, milled, loose: 0.291563, 0.00243663 kg (2 suppliers, which the file names only by identifier); sum of these 0.294 kg; lognormal variance with pedigree 0.0767, pedigree (4,3,5,3,3)
  Estimation based on an assumed yield of 100% for furnace
  EcoSpold01Location=CH
  Uncertainty: estimation based on an assumed yield of 100% for furnace
  properties: dry mass 0.99 kg, water content 0.010101, wet mass 1 kg
- recultivation, limestone mine: 7.56e-6 m2; lognormal variance with pedigree 0.3667, pedigree (4,3,5,3,3)
  (same comment as for limestone quarry infrastructure)

## Inputs from nature
- Mercury [natural resource, in ground]: 1.29 kg; lognormal variance with pedigree 0.0767, pedigree (4,3,5,3,3)
  Based on assumed overall yield of 90%
  Uncertainty: based on assumed overall yield of 90%
- Occupation, mineral extraction site [natural resource, land]: 9.83e-5 m2*year; lognormal variance with pedigree 0.1267, pedigree (4,3,5,3,3)
  Approximation with data from lime production
  Uncertainty: approximation with data from lime production
- Transformation, from forest, unspecified [natural resource, land]: 7.56e-6 m2; lognormal variance with pedigree 0.2067, pedigree (4,3,5,3,3)
  (same comment as for Occupation, mineral extraction site)
- Transformation, to mineral extraction site [natural resource, land]: 7.56e-6 m2; lognormal variance with pedigree 0.2067, pedigree (4,3,5,3,3)
  (same comment as for Occupation, mineral extraction site)
- Water, cooling, unspecified natural origin [natural resource, in water]: 0.024 m3; name water_cooling_UNO_input; lognormal variance with pedigree 0.208, pedigree (5,5,5,1,4)
  Estimated with data from a large chem. plant
  Uncertainty: estimated with data from a large chem. plant
- Water, well, in ground [natural resource, in water]: 3.4e-5 m3; name water_well_in_ground_input; lognormal variance with pedigree 0.0767, pedigree (4,3,5,3,3)
  (same comment as for Occupation, mineral extraction site)

## Emissions to nature
- Mercury II [air, urban air close to ground]: 0.161 kg; lognormal variance with pedigree 0.736, pedigree (4,5,5,5,3)
  According to quantitative information in literature
  Uncertainty: according to quantitative information in literature
- Particulate Matter, < 2.5 um [air, urban air close to ground]: 1.03e-5 kg; lognormal variance with pedigree 0.3667, pedigree (4,3,5,3,3)
  (same comment as for Occupation, mineral extraction site)
- Particulate Matter, > 10 um [air, urban air close to ground]: 0.00014 kg; lognormal variance with pedigree 0.1267, pedigree (4,3,5,3,3)
  (same comment as for Occupation, mineral extraction site)
- Particulate Matter, > 2.5 um and < 10um [air, urban air close to ground]: 5.55e-5 kg; lognormal variance with pedigree 0.2067, pedigree (4,3,5,3,3)
  (same comment as for Occupation, mineral extraction site)
- Water [air, unspecified]: 0.0093051 m3; name water_to_air_unspecified; = (water_cooling_UNO_input*fraction_CW_to_air)+(water_well_in_ground_input*fraction_PW_to_air); lognormal variance with pedigree 0.0807, pedigree (2,2,5,1,1)
  Calculated value based on literature values and expert opinion. See comments in the parametres' comment field.
  property fraction, origin: fresh water 0.000548087; name fraction_origin_fresh_water
  property fraction, origin: salt water 0; name fraction_origin_salt_water
  property fraction, origin: unspecified 0.999452; name fraction_origin_unspecified
- Water [water, unspecified]: 0.0147289 m3; name water_to_water_unspecified; = water_cooling_UNO_input*(1-fraction_CW_to_air)+water_well_in_ground_input*(1-fraction_PW_to_air); lognormal variance with pedigree 0.0807, pedigree (2,2,5,1,1)
  (same comment as for Water)
  property carbon content, fossil 0; name C_content_fossil
  property carbon content, non-fossil 0; name C_content_non_fossil
  property dry mass 0 kg; name DM
  property fraction, origin: fresh water 0.00196213; name fraction_origin_fresh_water_Ww
  property fraction, origin: salt water 0; name fraction_origin_salt_water_Ww
  property fraction, origin: unspecified 0.998038; name fraction_origin_unspecified_Ww
  property water in wet mass 1000 kg; name WWM
  property wet mass 1000 kg; name WM

## Extrapolations
see technology

## Review by Heiko Kunst 2009-01-22
Passed.
