# calcium ammonium nitrate production

Dataset: EcoSpold 2, unit process
Geography: RNA
Time period: 2011-01-01 to 2023-12-31
Technology level: current
Classification: ISIC rev.4 ecoinvent: 2012:Manufacture of fertilizers and nitrogen compounds
Synonyms: CAN, Nitro-limestone, Nitrochalk
Scenario: Business-as-Usual
System model: Allocation, cut-off by classification
Generated by: Anna Kounina
Database: ecoinvent
isCopyrightProtected: true
accessRestrictedTo: 1

## General comment
This dataset represents the production of 1 kg of calcium ammonium nitrate (CAN) with 27% N, from liquid ammonia, nitric acid and dolomite. Calcium ammonium nitrate is a fertiliser with 26-27 % N content produced through the neutralisation of aqueous nitric acid by gaseous ammonia. This exothermic process generates an ammonium nitrate solution and steam. The ammonium nitrate is then mixed with a filler that contains dolomite to produce calcium ammonium nitrate. The final product is either prilled or granulated. The process steps are neutralisation, evaporation and solidification.
The main data sources for this dataset are Fertilizers Europe (2014, 2016). Additional data sources are listed as follows.
References:
Fertilizers Europe (2000): Best Available Techniques for Pollution Prevention and Control in the European Fertilizer Industry. Booklet No. 1 of 8: Production of Ammonia. Fertilizers Europe, Brussels.
Kongshaug G. (1998): Energy Consumption and Greenhouse Gas Emissions in Fertilizer Production. IFA 20th July 1998
Davies J., Haglund C. (1999): Life Cycle Inventory of Fertiliser Production. SIK-Report No 654 1999. Chalmers University of Technology, Sweden.
Fertilizers Europe (2014): Average Emissions Year 2011. Fertilizers Europe Environmental report (internal).
Fertilizers Europe (2016): Carbon Footprint Calculator for Fertilizer Production. Specification. Version 2.1
Fertilizers Europe (2016): Average Emissions Year 2014. Fertilizers Europe Environmental report (internal). Used for updated energy and GHG emission in Carbon Footprint Calculator
Althaus H.-J., Chudacoff M., Hischier R., Jungbluth N., Osses M. and Primas A. (2007) Life Cycle Inventories of Chemicals. ecoinvent report No. 8, v2.0. EMPA Dübendorf, Swiss Centre for Life Cycle Inventories, Dübendorf, CH.

## Included activities start
The activity includes all the raw and processed materials necessary to produce this product. Liquid ammonia, nitric acid, dolomite, heat (as natural gas) and electricity are included. Direct emissions include ammonia and particulate matter to air and nitrogen to water.

## Included activities end
The activity ends with the final product being ready for transportation at the production site.

## Geography
The dataset is representative of CAN production in North America, adapted from data collected in European fertiliser plants.

## Technology
This datasets corresponds to the technology used in North American fertiliser plants. The production of ammonium nitrate involves the combination of liquid ammonia with nitric acid, using heat and electricity.

## Time period
Primary data were collected on fertiliser production for the year 2011. These data were based on annual average data for the year 2011.

## Reference product
- calcium ammonium nitrate: 1 kg; name RP; By-product classification allocatable product; CPC 34614: Double salts and mixtures of calcium nitrate and ammonium nitrate; HS2017 310230: Fertilizers, mineral or chemical; nitrogenous, ammonium nitrate, whether or not in aqueous solution; CAS 15245-12-2
  production volume 3.72281e9 kg; name PVRP
    Kg/y, International Fertilizers Association (2014). The PV was scaled according to the nominal GDP in 2014 of the given region and the global nominal GDP in 2014 (retrieved from: https://unstats.un.org/unsd/snaama/Basic, accessed 20200512). The nominal GDP corresponds to GDP at current price-US Dollars (source: United Nations, http://data.un.org/Glossary.aspx?q=GDP+%28current+US%24%29, accessed 20200512).
  property calcium content 0.100139; name RP_Ca_content
    Caclcium content (on a dry matter basis) of calcium ammonium nitrate is calculated from the molecular formula of the substance Ca(NH4)3(NO3)5.
  property carbon content, fossil 0
    Carbon content, fossil is calculated based on the chemical formula of the substance.
  property hydrogen content 0.03022
    Hydrogen content (on a dry matter basis) of calcium ammonium nitrate is calculated from the molecular formula of the substance Ca(NH4)3(NO3)5.
  property oxygen content 0.599639
    Oxygen content (on a dry matter basis) of calcium ammonium nitrate is calculated from the molecular formula of the substance Ca(NH4)3(NO3)5.
  property price 0.366624 EUR2005
    Calculated based on inputs: The price of the product has been calculated as a sum of the values of the material and energy inputs for this product. This value is therefore a rough estimation. It may underestimate the real price since there are additional expenses when producing any product. These expences can include for example labour costs, treatment of waste materials and profit for the producer. Please consider carefully whether this level of data quality is acceptable for your application.
  properties: carbon allocation 0 kg, carbon content 0, carbon content, non-fossil 0, dry mass 1 kg, nitrogen content 0.27, water content 0, water in wet mass 0 kg, wet mass 1 kg

## Inputs from technosphere
- ammonia, anhydrous, liquid: 0.164 kg; lognormal variance with pedigree 0.0446, pedigree (3,4,5,1,1)
  Data from Fertilizer Europe (2014).
  properties: dry mass 1 kg, hydrogen content 0.177547, nitrogen content 0.822453, wet mass 1 kg
  note on hydrogen content: Hydrogen content (on a dry matter basis) of ammonia, anhydrous, liquid is calculated from the molecular formula of the substance (H3N).
  note on nitrogen content: Nitrogen content (on a dry matter basis) of ammonia, anhydrous, liquid is calculated from the molecular formula of the substance (H3N).
- chemical factory, organics: 4.077e-10 unit; lognormal variance with pedigree 0.344, pedigree (3,4,5,1,1)
  Estimation, based on various data sources (Althaus et al. 2007).
- dolomite: 0.229 kg; lognormal variance with pedigree 0.0446, pedigree (3,4,5,1,1)
  Data from Fertilizer Europe (2014).
  properties: carbon content, fossil 0.130267, dry mass 1 kg, heating value, net 3.95 MJ, magnesium content 0.131805, oxygen content 0.520586, wet mass 1 kg
  note on carbon content, fossil: Carbon content, fossil is calculated based on the chemical formula of the substance.
  note on magnesium content: Magnesium content (on a dry matter basis) of dolomite is calculated from the molecular formula of the substance (CaMgC2O6).
  note on oxygen content: Oxygen content (on a dry matter basis) of dolomite is calculated from the molecular formula of the substance (CaMgC2O6).
- electricity, low voltage: 0.0775 kWh; lognormal variance with pedigree 0.0446, pedigree (3,4,5,1,1)
  Data from Fertilizer Europe (2014).
- heat, central or small-scale, natural gas: 0.4 MJ; lognormal variance with pedigree 0.0446, pedigree (3,4,5,1,1)
  Data from Fertilizer Europe (2014).
  properties: heating value, net 1 MJ
- nitric acid, without water, in 50% solution state: 0.607 kg; lognormal variance with pedigree 0.0446, pedigree (3,4,5,1,1)
  Data from Fertilizer Europe (2014).
  properties: dry mass 1 kg, hydrogen content 0.0159952, nitrogen content 0.222283, oxygen content 0.761721, wet mass 1 kg
  note on hydrogen content: Hydrogen content (on a dry matter basis) of nitric acid, without water, in 50% solution state is calculated from the molecular formula of the substance (HNO3).
  note on nitrogen content: Nitrogen content (on a dry matter basis) of nitric acid, without water, in 50% solution state is calculated from the molecular formula of the substance (HNO3).
  note on oxygen content: Oxygen content (on a dry matter basis) of nitric acid, without water, in 50% solution state is calculated from the molecular formula of the substance (HNO3).
- steam, in chemical industry: 0.245455 kg; lognormal variance with pedigree 0.0446, pedigree (3,4,5,1,1)
  Calculation, based on Fertilizer Europe (2014).
  properties: dry mass 1 kg, wet mass 1 kg

## Emissions to nature
- Ammonia [air, urban air close to ground]: 9e-5 kg; lognormal variance with pedigree 0.084, pedigree (3,4,5,1,1)
  Data from Fertilizer Europe (2014).
- Particulate Matter, > 2.5 um and < 10um [air, urban air close to ground]: 0.00014 kg; lognormal variance with pedigree 0.164, pedigree (3,4,5,1,1)
  Data from Fertilizer Europe (2014).
- Water [air, unspecified]: 0.000203 m3; lognormal variance with pedigree 0.084, pedigree (3,4,5,1,1)
  Data from Fertilizer Europe (2014).
- Ammonium [water, surface water]: 0.00026001 kg; lognormal variance with pedigree 0.084, pedigree (3,4,5,1,1)
  Estimation, based on various data sources (Althaus et al. 2007).
- Nitrogen [water, surface water]: 5e-5 kg; lognormal variance with pedigree 0.084, pedigree (3,4,5,1,1)
  Data from Fertilizer Europe (2014).

## Extrapolations
The data were extrapolated from respective data for the geography of Europe, i.e. production of ammonia and nitric acid are adapted to reflect production in North America.
