# permanent magnet production, for electric motor

Dataset: EcoSpold 2, unit process
Geography: GLO
Time period: 1995-01-01 to 2023-12-31
Technology level: current
Classification: ISIC rev.4 ecoinvent: 2599:Manufacture of other fabricated metal products n.e.c.
Classification: EcoSpold01Categories: metals/extraction
Scenario: Business-as-Usual
System model: Allocation, cut-off by classification
Share of production covered: 98 %
Generated by: Andrea Del Duce
Published in: Classen M. 2009
Database: ecoinvent
isCopyrightProtected: true
accessRestrictedTo: 1

## General comment
[This dataset was already contained in the ecoinvent database version 2. It was not individually updated during the transfer to ecoinvent version 3. Life Cycle Impact Assessment results may still have changed, as they are affected by changes in the supply chain, i.e. in other datasets. This dataset was generated following the ecoinvent quality guidelines for version 2. It may have been subject to central changes described in the ecoinvent version 3 change report (http://www.ecoinvent.org/database/ecoinvent-version-3/reports-of-changes/), and the results of the central updates were reviewed extensively. The changes added e.g. consistent water flows and other information throughout the database. The documentation of this dataset can be found in the ecoinvent reports of version 2, which are still available via the ecoinvent website. The change report linked above covers all central changes that were made during the conversion process.]

## Included activities start
Includes liquid aluminium production (with its plant) used as proxy for the permanent magnets production and the materials used.

## Included activities end
It returns the produced magnets, the waste flows and emissions.

## Geography
Some Swiss datasets are used for European processes.

## Technology
Proxy for the production of a permanent magnet based on the alumium technology.

## Reference product
- permanent magnet, for electric motor: 1 kg; name RP_amount_1; By-product classification allocatable product; CPC 46131: Parts of electric motors, generators and the like; HS2017 850511: Magnets; permanent magnets and articles intended to become permanent magnets after magnetisation, of metal
  Neodymium Magnet, produced out of Neodymium, Iron and Boron Alloy.
  Nd2 Fe14 B1 alloy. Mix of about 72% (14mol) iron, 27% (2mol) Rare Earth and 1% (1mol) boron.
  production volume 18000 kg; name RP_PV_1
    Based on a rough estimate of a total production of about 9000 electric passenger cars.
  property price 9.49233 EUR2005
    Calculated based on inputs: The price of the product has been calculated as a sum of the values of the material and energy inputs for this product. This value is therefore a rough estimation. It may underestimate the real price since there are additional expenses when producing any product. These expences can include for example labour costs, treatment of waste materials and profit for the producer. Please consider carefully whether this level of data quality is acceptable for your application.
  properties: carbon allocation 0 kg, carbon content 0

## Inputs from technosphere
- aluminium electrolysis facility: 1.5385e-10 unit; lognormal variance with pedigree 0.5, pedigree (5,5,5,5,5)
  EcoSpold01Location=RER
  Original value taken from "aluminium production, primary, liquid". Uncertainty changed accordingly.
  Uncertainty: rough guess
- anode, for metal electrolysis: 0.44755 kg; lognormal variance with pedigree 0.21, pedigree (5,5,5,5,5)
  Original value taken from "aluminium production, primary, liquid". Uncertainty changed accordingly.
  EcoSpold01Location=RER
  properties: carbon content, fossil 0.865971, dry mass 1 kg, wet mass 1 kg
  note on carbon content, fossil: The main component of the anode is carbon, coming from bitumen and petroleum coke (ecoinvent v2.2 report 10). The C content in those components of the anode has been taken into account to calculate the anode final C content.
- boric oxide: 0.029 kg; source F. Habermacher 2010; lognormal variance with pedigree 0.1726, pedigree (3,5,5,5,5)
  Calculated. The amount corresponds to boron needed for the production of the magnet considering the composition mentioned in the reference product comment, of Neodymium, Iron and Boron Alloy.
  properties: dry mass 1 kg, wet mass 1 kg
- cathode, for aluminium electrolysis: 0.018082 kg; lognormal variance with pedigree 0.21, pedigree (5,5,5,5,5)
  EcoSpold01Location=RER
  Original value taken from "aluminium production, primary, liquid". Uncertainty changed accordingly.
  properties: carbon content, fossil 0.163928, dry mass 1 kg, wet mass 1 kg
  note on carbon content, fossil: The main components of the cathode are steel and carbon (from bitumen) (ecoinvent v2.2 report 10). Actual C content of the components of the cathode were taking into account to calculate the cathode final C content
- cryolite: 0.0015984 kg; lognormal variance with pedigree 0.21, pedigree (5,5,5,5,5)
  (same comment as for cathode, for aluminium electrolysis)
  properties: dry mass 1 kg, wet mass 1 kg
- electricity, medium voltage: 15.558 kWh; lognormal variance with pedigree 0.21, pedigree (5,5,5,5,5)
  Original value taken from "aluminium production, primary, liquid". Uncertainty changed accordingly.
- filter dust from Al electrolysis: -0.0019979, -9.61554e-8 kg (2 suppliers, which the file names only by identifier); sum of these -0.001998 kg; lognormal variance with pedigree 0.21, pedigree (5,5,5,5,5)
  Original value taken from "aluminium production, primary, liquid". Uncertainty changed accordingly.
  EcoSpold01Location=CH
  production volume; = RP_PV_1 * (BP_amount_1 / RP_amount_1)
    Calculated from production volume of reference product using the relative outputs.
  properties: carbon content, fossil 0.11586, dry mass 1 kg, wet mass 1 kg
- heat, district or industrial, natural gas: 0.084 MJ; lognormal variance with pedigree 0.21, pedigree (5,5,5,5,5)
  (same comment as for cathode, for aluminium electrolysis)
  properties: heating value, net 1 MJ
- heat, district or industrial, other than natural gas: 0.089 MJ; lognormal variance with pedigree 0.21, pedigree (5,5,5,5,5)
  (same comment as for filter dust from Al electrolysis)
  properties: heating value, net 1 MJ
- inert waste, for final disposal: -0.004995 kg; name BP_amount_2; lognormal variance with pedigree 0.21, pedigree (5,5,5,5,5)
  (same comment as for filter dust from Al electrolysis)
  production volume; = RP_PV_1 * (BP_amount_2 / RP_amount_1)
    Calculated from production volume of reference product using the relative outputs.
  properties: dry mass 0.995 kg, water content 0.00502513, wet mass 1 kg
- neodymium oxide: 0.3148 kg; = 0.0348+0.28; source F. Habermacher 2010; lognormal variance with pedigree 0.1726, pedigree (3,5,5,5,5)
  Calculated. The amount corresponds to neodymium needed (0.28 kg) and also the rest of the rare earth minerals (0.0348 kg) considering the composition mentioned in the reference product comment of Neodymium, Iron and Boron Alloy.
  property carbon content, fossil 0; name C_content_fossil
  property carbon content, non-fossil 0; name C_content_non_fossil
  property dry mass 1 kg; name DM
  property water content 0; name water_content
  property water in wet mass 0 kg; name WWM
  property wet mass 1 kg; name WM
- pig iron: 0.05809, 0.62717 kg (2 suppliers, which the file names only by identifier); sum of these 0.68526 kg; source F. Habermacher 2010; lognormal variance with pedigree 0.1726, pedigree (3,5,5,5,5)
  Calculated. The amount corresponds to the iron needed in the magnet considering the fact that pig iron has circa 95% purity of iron and also considering the composition mentioned in the reference product comment of Neodymium, Iron and Boron Alloy.
  properties: carbon content, fossil 0.045, dry mass 1 kg, wet mass 1 kg
- refractory spent pot liner from Al electrolysis: -0.000271126, -0.00138112, -2.00404e-5, -0.000225815 kg (4 suppliers, which the file names only by identifier); sum of these -0.0018981 kg; lognormal variance with pedigree 0.21, pedigree (5,5,5,5,5)
  (same comment as for filter dust from Al electrolysis)
  production volume; = RP_PV_1 * (BP_amount_3 / RP_amount_1)
    Calculated from production volume of reference product using the relative outputs.
  properties: dry mass 1 kg, wet mass 1 kg
- waste bitumen: -1.70593e-7, -2.29567e-6, -0.00119633 kg (3 suppliers, which the file names only by identifier); sum of these -0.0011988 kg; lognormal variance with pedigree 0.21, pedigree (5,5,5,5,5)
  (same comment as for filter dust from Al electrolysis)
  production volume; = RP_PV_1 * (BP_amount_4 / RP_amount_1)
    Calculated from production volume of reference product using the relative outputs.
  properties: carbon content, fossil 0.842657, dry mass 0.986 kg, heating value, net 40.2 MJ, water content 0.0141988, wet mass 1 kg
  note on heating value, net: Literature value, Source: IPCC 2006, 2006 IPCC Guidelines for National Greenhouse Gas Inventories, Prepared by the National Greenhouse Gas Inventories Programme, Eggleston H.S., Buendia L., Miwa K., Ngara T. and Tanabe K. (eds). Published: IGES, Japan

## Emissions to nature
- Benzo(a)pyrene [air, unspecified]: 1.2987e-6 kg; lognormal variance with pedigree 0.51, pedigree (5,5,5,5,5)
  (same comment as for electricity, medium voltage)
- Carbon dioxide, fossil [air, unspecified]: 1.4965 kg; lognormal variance with pedigree 0.21, pedigree (5,5,5,5,5)
  (same comment as for electricity, medium voltage)
- Carbon monoxide, fossil [air, unspecified]: 0.091708 kg; lognormal variance with pedigree 0.86, pedigree (5,5,5,5,5)
  (same comment as for electricity, medium voltage)
- Hexafluoroethane [air, unspecified]: 2.7972e-5 kg; lognormal variance with pedigree 0.25, pedigree (5,5,5,5,5)
  (same comment as for electricity, medium voltage)
- Hydrogen fluoride [air, unspecified]: 0.00053946 kg; lognormal variance with pedigree 0.25, pedigree (5,5,5,5,5)
  (same comment as for electricity, medium voltage)
- Nitrogen oxides [air, unspecified]: 6.3936e-5 kg; lognormal variance with pedigree 0.24, pedigree (5,5,5,5,5)
  (same comment as for electricity, medium voltage)
- PAH, polycyclic aromatic hydrocarbons [air, unspecified]: 4.5654e-5 kg; lognormal variance with pedigree 0.51, pedigree (5,5,5,5,5)
  (same comment as for electricity, medium voltage)
- Particulate Matter, < 2.5 um [air, unspecified]: 0.0026074 kg; lognormal variance with pedigree 0.51, pedigree (5,5,5,5,5)
  (same comment as for electricity, medium voltage)
- Particulate Matter, > 2.5 um and < 10um [air, unspecified]: 0.00060939 kg; lognormal variance with pedigree 0.33, pedigree (5,5,5,5,5)
  (same comment as for electricity, medium voltage)
- Sulfur dioxide [air, unspecified]: 0.0088312 kg; lognormal variance with pedigree 0.21, pedigree (5,5,5,5,5)
  (same comment as for electricity, medium voltage)
- Tetrafluoromethane [air, unspecified]: 0.00025175 kg; lognormal variance with pedigree 0.25, pedigree (5,5,5,5,5)
  (same comment as for electricity, medium voltage)

## Sampling procedure
Literature / Survey/Adaptation as proxy

## Extrapolations
The values for the Exchanges have been take from the dataset "aluminium production, primary, liquid" as a proxy for the production efforts of a permanent magnet. Input materials for the alumium have been removed. Uncertanties have been changed accordingly. Comments from "alumium production, primary, liquid" dataset: see Geography This dataset has been copied from an original dataset covering the geography RER. The uncertainty has been adjusted accordingly.
