# blast oxygen furnace converter production

Dataset: EcoSpold 2, unit process
Geography: RER
Time period: 2002-01-01 to 2023-12-31
Technology level: current
Classification: EcoSpold01Categories: metals/extraction
Classification: ISIC rev.4 ecoinvent: 2815:Manufacture of ovens, furnaces and furnace burners
Tags: ConvertedDataset
Scenario: Business-as-Usual
System model: Allocation, cut-off by classification
Generated by: Hans-Jörg Althaus
Published in: Classen M. 2009
Database: ecoinvent
isCopyrightProtected: true
accessRestrictedTo: 1

## General comment
Assumptions for medium sized plant. Output: 1'500'000 t/a, life time: 50 years. Site is shared with blast furnace.
[This dataset was already contained in the ecoinvent database version 2. It was not individually updated during the transfer to ecoinvent version 3. Life Cycle Impact Assessment results may still have changed, as they are affected by changes in the supply chain, i.e. in other datasets. This dataset was generated following the ecoinvent quality guidelines for version 2. It may have been subject to central changes described in the ecoinvent version 3 change report (http://www.ecoinvent.org/database/ecoinvent-version-3/reports-of-changes/), and the results of the central updates were reviewed extensively. The changes added e.g. consistent water flows and other information throughout the database. The documentation of this dataset can be found in the ecoinvent reports of version 2, which are still available via the ecoinvent website. The change report linked above covers all central changes that were made during the conversion process.]

## Included activities start
The activity starts from the transformation of unspecified land to industrial area.

## Included activities end
Infrastructure for input material unloading, for BOF and secondary metallurgical processes and casting and for administrative buildings.

## Geography
Some Swiss datasets are used for European processes.

## Technology
Assumed technology of medium sized plant.

## Reference product
- blast oxygen furnace converter: 1 unit; By-product classification allocatable product; CPC 43430: Parts for the goods of subclasses 43410 and 43420; parts of non-electric bakery ovens; HS2017 740400: Copper; waste and scrap
  production volume 1.69512 unit
    Unknown
    European amount of converter steel (IISI: Steel Statistical Yearbook 2007 ; http://www.worldsteel.org/pictures/programfiles/SSY2007.pdf) multiplied by 1.333E-11 kg furnace converter / kg steel
  property price 7.0315e7 EUR2005
    Calculated based on inputs: The price of the product has been calculated as a sum of the values of the material and energy inputs for this product. This value is therefore a rough estimation. It may underestimate the real price since there are additional expenses when producing any product. These expences can include for example labour costs, treatment of waste materials and profit for the producer. Please consider carefully whether this level of data quality is acceptable for your application.
  properties: carbon allocation 0 kg, carbon content 0

## Inputs from technosphere
All rows: lognormal variance with pedigree 0.8, pedigree (5,5,5,5,5)
- building, hall: 400000 m2
  Rough estimation
  Uncertainty: r
- building, multi-storey: 2000 m3
  Rough estimation
  Uncertainty: r
- concrete, normal strength: 6497.53, 3570.47 m3 (2 suppliers, which the file names only by identifier); sum of these 10068 m3
  Rough estimation
  Uncertainty: r
  properties: dry mass 2190 kg, water content 0.086758, wet mass 2380 kg
- industrial machine, heavy, unspecified: 2.215e7 kg
  Rough estimation
  Uncertainty: r
- refractory, basic, packed: 200000 kg
  Rough estimation
  Uncertainty: r
  properties: dry mass 1 kg, wet mass 1 kg
- waste brick: -26176, -173824 kg (2 suppliers, which the file names only by identifier); sum of these -200000 kg
  Rough estimation
  Uncertainty: r
  production volume
    Calculated from the production volume of blast oxygen furnace converter in proportion to the respective output amounts.
  properties: dry mass 1 kg, wet mass 1 kg
- waste concrete, not reinforced: -2.19178e7, -232235 kg (2 suppliers, which the file names only by identifier); sum of these -2.215e7 kg
  Rough estimation
  Uncertainty: r
  production volume
    (same comment as for waste brick)
  properties: dry mass 1 kg, wet mass 1 kg

## Inputs from nature
- Occupation, industrial area [natural resource, land]: 2.5e7 m2*year; lognormal variance with pedigree 0.8, pedigree (5,5,5,5,5)
  Rough estimation
  Uncertainty: r
- Transformation, from unspecified [natural resource, land]: 500000 m2; lognormal variance with pedigree 0.8, pedigree (5,5,5,5,5)
  Rough estimation
  Uncertainty: r
- Transformation, to industrial area [natural resource, land]: 500000 m2; lognormal variance with pedigree 0.8, pedigree (5,5,5,5,5)
  Rough estimation
  Uncertainty: r

## Sampling procedure
Internet search

## Extrapolations
see Geography

## Review by Roland Hischier 2007-08-13
passed
