# deep drawing, steel, 3500 kN press, single stroke

Dataset: EcoSpold 2, unit process
Geography: RoW
Time period: 2006-01-01 to 2023-12-31
Technology level: current
Classification: ISIC rev.4 ecoinvent: 2591:Forging, pressing, stamping and roll-forming of metal; powder metallurgy
Classification: EcoSpold01Categories: metals/chipless shaping
Tags: ConvertedDataset
Scenario: Business-as-Usual
System model: Allocation, cut-off by classification
Share of production covered: 0 %
Generated by: Roland Steiner
Published in: Steiner, R. 2007
Database: ecoinvent
isCopyrightProtected: true
accessRestrictedTo: 1

## General comment
The reference for deep drawing is 1 kg of metal formed by deep drawing. As there is a large variation from factory to factory with regard to the LCI, it is advised that in case this dataset becomes important in the results, it has to be investigated further if the rough estimations made are applicable or not.
[This dataset was already contained in the ecoinvent database version 2. It was not individually updated during the transfer to ecoinvent version 3. Life Cycle Impact Assessment results may still have changed, as they are affected by changes in the supply chain, i.e. in other datasets. This dataset was generated following the ecoinvent quality guidelines for version 2. It may have been subject to central changes described in the ecoinvent version 3 change report (http://www.ecoinvent.org/database/ecoinvent-version-3/reports-of-changes/), and the results of the central updates were reviewed extensively. The changes added e.g. consistent water flows and other information throughout the database. The documentation of this dataset can be found in the ecoinvent reports of version 2, which are still available via the ecoinvent website. The change report linked above covers all central changes that were made during the conversion process.]

## Included activities start
The activity starts with the workpiece entering the process. The material on which this activity is applied it is not included as input.

## Included activities end
This dataset encompasses the process of deep drawing a part; this is electricity, compressed air as well as factory infrastructure and operation. The machine infrastructure is also considered. Degreasing is not included and has to be added if necessary.

## Geography
Geographical coverage encompasses the industrialised countries.

## Technology
Average technology

## Reference product
- deep drawing, steel, 3500 kN press, single stroke: 1 kg; By-product classification allocatable product; CPC 89330: Metal forging, pressing, stamping, roll forming and powder metallurgy services
  EcoSpold01Location=RER
  production volume 2.67763 kg
    This is a placeholder value that does not reflect real-world production volumes. This dataset does not currently require a real-world production volume to work in the database framework, and no actual data were collected yet. This has no negative effect on the results of the ecoinvent database.
  property price 0.0548559 EUR2005
    Calculated based on inputs: The price of the product has been calculated as a sum of the values of the material and energy inputs for this product. This value is therefore a rough estimation. It may underestimate the real price since there are additional expenses when producing any product. These expences can include for example labour costs, treatment of waste materials and profit for the producer. Please consider carefully whether this level of data quality is acceptable for your application.
  properties: carbon allocation 0 kg, carbon content 0

## Inputs from technosphere
- compressed air, 700 kPa gauge: 0.00584 m3; lognormal variance with pedigree 0.074, pedigree (3,4,5,5,3)
  EcoSpold01Location=RER
  Estimated from literature
  Uncertainty: estimated from literature
- electricity, low voltage: 0.000164541, 0.00258751, 0.0537072, 0.00530116, 3.30198e-5, 0.0184906, 0.000916036 kWh (7 suppliers, which the file names only by identifier); sum of these 0.0812 kWh; lognormal variance with pedigree 0.074, pedigree (3,4,5,5,3)
  EcoSpold01Location=UCTE
  Estimated from literature
  Uncertainty: estimated from literature
- energy and auxilliary inputs, metal working factory: 1 kg; lognormal variance with pedigree 0.074, pedigree (3,4,5,5,3)
  Estimated from literature
  EcoSpold01Location=RER
  Uncertainty: estimated from literature
- metal working factory: 4.58e-10 unit; lognormal variance with pedigree 0.374, pedigree (3,4,5,5,3)
  Estimated from literature
  EcoSpold01Location=RER
  Uncertainty: estimated from literature
- metal working machine, unspecified: 7.79e-5 kg; lognormal variance with pedigree 0.374, pedigree (3,4,5,5,3)
  Estimated from literature
  EcoSpold01Location=RER
  Uncertainty: estimated from literature

## Extrapolations
none This dataset has been copied from an original dataset covering the geography RER. The uncertainty has been adjusted accordingly.

## Review by Sébastien Humbert 2007-09-05
passed
none
