# steel production, chromium steel 18/8, hot rolled

Dataset: EcoSpold 2, unit process
Geography: RoW
Time period: 2000-01-01 to 2023-12-31
Technology level: current
Classification: ISIC rev.4 ecoinvent: 2410:Manufacture of basic iron and steel
Classification: EcoSpold01Categories: metals/extraction
Synonyms: high alloyed steel; stainless steel
Tags: ConvertedDataset
Scenario: Business-as-Usual
System model: Allocation, cut-off by classification
Generated by: Hans-Jörg Althaus
Published in: Classen M. 2009
Database: ecoinvent
isCopyrightProtected: true
accessRestrictedTo: 1

## General comment
represents Average of World and European production mix. This is assumed to correspond to the consumption mix in Europe
[This dataset was already contained in the ecoinvent database version 2. It was not individually updated during the transfer to ecoinvent version 3. Life Cycle Impact Assessment results may still have changed, as they are affected by changes in the supply chain, i.e. in other datasets. This dataset was generated following the ecoinvent quality guidelines for version 2. It may have been subject to central changes described in the ecoinvent version 3 change report (http://www.ecoinvent.org/database/ecoinvent-version-3/reports-of-changes/), and the results of the central updates were reviewed extensively. The changes added e.g. consistent water flows and other information throughout the database. The documentation of this dataset can be found in the ecoinvent reports of version 2, which are still available via the ecoinvent website. The change report linked above covers all central changes that were made during the conversion process.]

## Included activities start
The activity starts with the reception of the semi finished product at the rolling facility.

## Included activities end
The activity ends with the rolled products. It includes a mix of differently produced steels and hot rolling shapes.

## Geography
Data relate to plants in the EU

## Technology
technology mix

## Reference product
- steel, chromium steel 18/8, hot rolled: 1 kg; By-product classification allocatable product; CPC 41122: Alloy steel in ingots or other primary forms and semi-finished products of alloy steel; HS2017 7218: Stainless steel in ingots or other primary forms; semi-finished products of stainless steel; CAS 12597-69-2
  EcoSpold01Location=RER
  production volume 2.27065e10 kg
    Due to lack of data on the amount of chromium steel that is hot rolled, it is assumed that half of he chromium "steel production, electric, chromium steel 18/8" is hot rolled.
  property carbon content, fossil 0.0008
    Stainless steel model is the grade 304 steel (18/8 stainless, 18% chromium 8% nickel; max. 0.08% C)
  property heating value, net 0 MJ
    Non combustible products are assumed to have an LHV equal to zero (0).
  properties: carbon allocation 0.0008 kg, carbon content 0.0008, carbon content, non-fossil 0, dry mass 1 kg, price 0.468 EUR2005, water content 0, water in wet mass 0 kg, wet mass 1 kg

## Inputs from technosphere
- hot rolling, steel: 1 kg; lognormal variance with pedigree 0.042, pedigree (1,1,5,5,1)
  relates directly to output
  EcoSpold01Location=RER
- steel, chromium steel 18/8: 1 kg; lognormal variance with pedigree 0.0432, pedigree (2,3,5,5,1)
  EcoSpold01Location=RER
  properties: carbon content, fossil 0.0008, dry mass 1 kg, wet mass 1 kg
  note on carbon content, fossil: Stainless steel model is the grade 304 steel (18/8 stainless, 18% chromium 8% nickel; max. 0.08% C)

## Sampling procedure
literature, statistics

## Extrapolations
This dataset has been copied from an original dataset covering the geography RER. The uncertainty has been adjusted accordingly.

## Review by Roland Hischier 2007-08-13
passed
