# strawberry production, open field, macro tunnel

Dataset: EcoSpold 2, unit process
Geography: RoW
Time period: 2006-01-01 to 2023-12-31
Technology level: current
Classification: ISIC rev.4 ecoinvent: 0125:Growing of other tree and bush fruits and nuts
Tags: WFLDB
Scenario: Business-as-Usual
System model: Allocation, cut-off by classification
Generated by: [System]
Database: ecoinvent
isCopyrightProtected: true
accessRestrictedTo: 1

## General comment
This dataset is a weighted average of the regional datasets, with weights based on production volume of the reference product. Detailed comments and sources about the exchanges can be found in the regional datasets.
The geographicalCorrelation score of every pedigree matrix of was changed to '5'.
Sum of regional production volumes: 1.584e+9 kg
US: PV = 1.310e+9 kg; weight = 0.8271
ES: PV = 2.739e+8 kg; weight = 0.1729
Yield of the global dataset = 54225.9097991 kg/ha, calculated as a weighted average of the regional yields.
The comments below were part of the US regional dataset.
This dataset represents the production of 1 kg of strawberry. The reference flow is the average national yield per ha and for the year 2010: yield (56.2 t/ha.y) obtained under irrigated conditions (total amount of water 9144 m3/ha.y). The data are representative for strawberry production in the United States (California) used for the export market. Mineral NPK fertiliser input is 197-117-140 kg/ha. No organic fertilisers are applied. Total active ingredients (a.i.) applied as various pesticides amount to 93.7 kg a.i./ha and 51.9 kg chloropicrin/ha.
The dataset was modelled within the project 'World Food LCA database (WFLDB)'. The aim of this project was to provide inventories of a broad variety of agricultural products and processes and to cover for each product at least 50% of the global export market. The export share of strawberries produced in the United States amounts to 17 % of the global export (tonnage exported in 2010). The production system regarded in this dataset aimed at representing strawberries produced in open fields in the United States for the export market.
PEF-Quality: data quality rating (DQR) = 2.0 (i.e. very good quality). This dataset refers to an average situation; for specific situations exchanges might differ substantially due to site specific parameters

## Included activities start
This activity starts with soil cultivation after the harvest of the previous crop.

## Included activities end
This activity ends with harvest and transport to the farm gate. Storage is not included.
The dataset includes all activities during a cycle, i.e. all machine operations, corresponding infrastructure, fuel use and sheds. Machine operations include: soil cultivation, fertilisation, pesticide application, harvesting, and on-farm transport. Further, direct field emissions and land use change are included. Irrigation is included. The inputs of seedlings, fertilisers and pesticides as well as packaging of fertilisers and pesticides are considered. Heavy metal uptake by the crop is considered.

## Reference product
- strawberry: 1 kg; By-product classification allocatable product; CPC 01354: Strawberries; HS2017 081010: Fruit, edible; strawberries, fresh
  production volume 2.78609e9 kg
    Source: FAOSTAT. Average, 2009-2012
  property price 1.81 EUR2005
    Calculated from the trade statistics for the year 2005 published by the UN (COMTRADE database, accessed 20151105) as an average of 5 biggest importers of strawberry in the world; FR, DE, CA, UK and USA. Comtrade cathegory: 81010: Strawberries, fresh.
  properties: carbon allocation 0.00466317 kg, carbon content 0.04617, carbon content, fossil 0, carbon content, non-fossil 0.04617, dry mass 0.101 kg, water content 8.90099, water in wet mass 0.899 kg, wet mass 1 kg

## Inputs from technosphere
- [thio]carbamate-compound: 1.37956e-6 kg; lognormal variance with pedigree 0.0158498, pedigree (2,2,4,5,1)
  Literature value or expert estimation (REWE 2009).
  properties: carbon content, fossil 0.626349, dry mass 1 kg, wet mass 1 kg
- acetamide-anillide-compound, unspecified: 5.49764e-6 kg; lognormal variance with pedigree 0.0158498, pedigree (2,2,4,5,1)
  Literature value or expert estimation (REWE 2009).
  properties: carbon content, fossil 0.659175, dry mass 1 kg, wet mass 1 kg
- ammonia, anhydrous, liquid: 6.01626e-5, 0.000116788, 0.00129452, 5.47201e-5, 1.22406e-5, 0.000449865, 3.86713e-5 kg (7 suppliers, which the file names only by identifier); sum of these 0.00202697 kg; lognormal variance with pedigree 0.126177, pedigree (2,1,4,5,1)
  Calculated based on literature values or expert estimation: The total amount of nutrient (REWE 2009) multiplied by the country-share of the fertiliser type (IFA 2014). See supporting documentation 'WFLDB-Documentation.pdf' chapter 'Fertiliser application' for L3 and L4 data (https://ecoquery.ecoinvent.org/File/Reports).
  Corresponds to 12.7 kg/ha
  properties: dry mass 1 kg, wet mass 1 kg
- ammonium nitrate: 0.000185151, 0.000628533 kg (2 suppliers, which the file names only by identifier); sum of these 0.000813684 kg; lognormal variance with pedigree 0.126177, pedigree (2,1,4,5,1)
  The exchange has been updated from 'ammonium nitrate, as N' into 'ammonium nitrate' and therefore its amount has been scaled (multiplied) from 0.0003 kg by 2.8573 kg of 'ammonium nitrate' per kg of 'ammonium nitrate, as N'. Original comment of the exchange is: Calculated based on literature values or expert estimation: The total amount of nutrient (REWE 2009) multiplied by the share of fertiliser type (REWE 2009). See supporting documentation 'WFLDB-Documentation.pdf' chapter 'Fertiliser application' for L3 and L4 data (https://ecoquery.ecoinvent.org/File/Reports).
  Corresponds to 51.8 kg/ha
  properties: dry mass 1 kg, wet mass 1 kg
- ammonium sulfate: 9.11414e-5 kg; lognormal variance with pedigree 0.126177, pedigree (2,1,4,5,1)
  Calculated based on literature values or expert estimation: The total amount of nutrient (REWE 2009) multiplied by the country-share of the fertiliser type (IFA 2014). See supporting documentation 'WFLDB-Documentation.pdf' chapter 'Fertiliser application' for L3 and L4 data (https://ecoquery.ecoinvent.org/File/Reports).
  Corresponds to 6.45 kg/ha
  properties: dry mass 1 kg, wet mass 1 kg
- boric acid, anhydrous, powder: 5.18878e-5 kg; lognormal variance with pedigree 0.0158498, pedigree (2,2,4,5,1)
  Literature value or expert estimation (REWE 2009).
  properties: dry mass 1 kg, wet mass 1 kg
- chloroform: 0.00205904 kg; lognormal variance with pedigree 0.0158498, pedigree (2,2,4,5,1)
  Literature value or expert estimation (REWE 2009). Proxy for chloropicrin
  properties: carbon content, fossil 0.101695, dry mass 1 kg, heating value, net 4.06 MJ, wet mass 1 kg
- diesel, burned in agricultural machinery: 0.519284 MJ; lognormal variance with pedigree 0.126177, pedigree (2,1,4,5,1)
  Literature value or expert estimation (REWE 2009). Includes all work processes. Corresponds to 57 kg/ha
- glyphosate: 9.451e-5 kg; lognormal variance with pedigree 0.0158498, pedigree (2,2,4,5,1)
  Literature value or expert estimation (REWE 2009).
  properties: carbon content, fossil 0.214286, dry mass 1 kg, wet mass 1 kg
- inorganic nitrogen fertiliser, as N: 3.65521e-8, 1.00382e-6, 6.71032e-7, 1.78396e-7, 8.5772e-6, 1.01746e-6, 6.63394e-7, 1.29296e-7, 1.09258e-5, 5.59193e-7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 kg (62 suppliers, which the file names only by identifier); sum of these 0.00102696 kg; lognormal variance with pedigree 0.126177, pedigree (2,1,4,5,1)
  Calculated based on literature values or expert estimation: The total amount of nutrient (REWE 2009) multiplied by the country-share of the fertiliser type (IFA 2014). See supporting documentation 'WFLDB-Documentation.pdf' chapter 'Fertiliser application' for L3 and L4 data (https://ecoquery.ecoinvent.org/File/Reports).
  properties: dry mass 1 kg, wet mass 1 kg
- inorganic phosphorus fertiliser, as P2O5: 6.97084e-7, 1.89333e-7, 5.15344e-7, 1.25724e-6, 1.56869e-5, 3.48194e-5, 4.78001e-6, 5.85053e-7, 7.28702e-6, 3.23646e-7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 kg (62 suppliers, which the file names only by identifier); sum of these 0.0020875 kg; lognormal variance with pedigree 0.126177, pedigree (2,1,4,5,1)
  Calculated based on literature values or expert estimation: The total amount of nutrient (REWE 2009) multiplied by the country-share of the fertiliser type (IFA 2014). See supporting documentation 'WFLDB-Documentation.pdf' chapter 'Fertiliser application' for L3 and L4 data (https://ecoquery.ecoinvent.org/File/Reports).
  Corresponds to 17.8 kg/ha
  properties: dry mass 1 kg, wet mass 1 kg
- inorganic potassium fertiliser, as K2O: 1.81115e-7, 9.57109e-7, 2.28234e-7, 6.92064e-7, 1.28842e-8, 1.03073e-7, 4.12293e-7, 6.07102e-6, 6.16967e-6, 2.00257e-6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 kg (62 suppliers, which the file names only by identifier); sum of these 0.000991125 kg; lognormal variance with pedigree 0.126177, pedigree (2,1,4,5,1)
  Calculated based on literature values or expert estimation: The total amount of nutrient (REWE 2009) multiplied by the country-share of the fertiliser type (IFA 2014). See supporting documentation 'WFLDB-Documentation.pdf' chapter 'Fertiliser application' for L3 and L4 data (https://ecoquery.ecoinvent.org/File/Reports).
  Corresponds to 131.0 kg/ha
  properties: dry mass 1 kg, wet mass 1 kg
- irrigation: 1.808e-5, 0.0423999, 0.00036157, 0.022064, 0.000278558, 0.000746868, 0.0795927, 0.000162944, 4.19069e-6, 0.00246819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 m3 (15 suppliers, which the file names only by identifier); sum of these 0.15389 m3; lognormal variance with pedigree 0.126177, pedigree (2,1,4,5,1)
  Literature value: Total amount of water used for irrigation (REWE 2009) See supporting documentation 'WFLDB-Documentation.pdf' chapter 'Water use for irrigation' (https://ecoquery.ecoinvent.org/File/Reports).
  properties: dry mass 0.11 kg, water content 9089.91, wet mass 1000 kg
- packaging film, low density polyethylene: 0.00116999 kg
  Literature value or expert estimation (REWE 2009). Plastic film as soil cover (PE film) 10'500 m2/ha, 6g/m2. Lifespan: 1 year
  properties: carbon content, fossil 0.857143, dry mass 1 kg, heating value, net 42.47 MJ, wet mass 1 kg
- packaging, for fertilisers: 0.0175478 kg; lognormal variance with pedigree 0.0592, pedigree (4,3,4,5,4)
  Total amount of active substance/s of fertilisers needed for the production of 'strawberry' is calculated to be circa 8.77E-03 kg. Fertiliser/s used in this dataset is/are: 'ammonia, liquid', 'ammonium nitrate, as N', 'ammonium sulfate, as N', 'nitrogen fertiliser, as N', 'phosphate fertiliser, as P2O5', 'phosphate rock, as P2O5, beneficiated, dry', 'phosphate rock, as P2O5, beneficiated, wet', 'potassium chloride, as K2O', 'potassium fertiliser, as K2O', 'potassium sulfate, as K2O', 'urea, as N'. The total amount of active substance/s is doubled in order to account for the packaging of the dilluted product of fertiliser/s that is/are applied. Therefore, 1.75E-02 kg of packaging for fertilisers is justified with this exchange.
  properties: carbon content, fossil 0.825301, dry mass 1 kg, heating value, net 25.01 MJ, price 0.0642 EUR2005, wet mass 1 kg
  note on carbon content, fossil: Considering a chemical formula (C2H4)n for polyethylene, carbon content-fossil is calculated to be 0.856286 kg of Carbon per kg of dry mass.
- packaging, for pesticides: 0.00442596 kg; lognormal variance with pedigree 0.0592, pedigree (4,3,4,5,4)
  Total amount of active substance/s of pesticides needed for the production of strawberry is calculated to be circa 2.21E-03 kg. Pesticide/s used in this dataset is/are: '[thio]carbamate-compound', 'acetamide-anillide-compound, unspecified', 'boric acid, anhydrous, powder', 'glyphosate', 'pyrethroid-compound', 'trichloromethane'. The total amount of active substance/s is doubled in order to account for the packaging of the dilluted product of pesticide/s that is/are applied. Therefore, 4.43E-03 kg of packaging for pesticides is justified with this exchange.
  properties: carbon content, fossil 0.85714, dry mass 1 kg, heating value, net 25.97 MJ, price 0.0642 EUR2005, wet mass 1 kg
- phosphate rock, beneficiated: 6.98383e-7, 5.26056e-5 kg (2 suppliers, which the file names only by identifier); sum of these 5.3304e-5 kg; lognormal variance with pedigree 0.126177, pedigree (2,1,4,5,1)
  Calculated based on literature values or expert estimation: The total amount of nutrient (REWE 2009) multiplied by the country-share of the fertiliser type (IFA 2014). See supporting documentation 'WFLDB-Documentation.pdf' chapter 'Fertiliser application' for L3 and L4 data (https://ecoquery.ecoinvent.org/File/Reports).
  Corresponds to 2.25 kg/ha
  properties: dry mass 1 kg, wet mass 1 kg
- plastic tunnel: 0.185713 m2; lognormal variance with pedigree 0.126177, pedigree (2,1,4,5,1)
  Calculated value: 1 ha divided by the yield in kg/ha. Note: plastic tunnel dataset stands for 1 m2 used over 1 year
- potassium chloride: 0.00274423 kg; lognormal variance with pedigree 0.126177, pedigree (2,1,4,5,1)
  The exchange has been updated from 'potassium chloride, as K2O' into 'potassium chloride' and therefore its amount has been scaled (multiplied) from 0.0017 kg by 1.5829 kg of 'potassium chloride' per kg of 'potassium chloride, as K2O'. Original comment of the exchange is: Calculated based on literature values or expert estimation: The total amount of nutrient (REWE 2009) multiplied by the country-share of the fertiliser type (IFA 2014). See supporting documentation 'WFLDB-Documentation.pdf' chapter 'Fertiliser application' for L3 and L4 data (https://ecoquery.ecoinvent.org/File/Reports).
  Corresponds to 58.1 kg/ha
  properties: dry mass 1 kg, wet mass 1 kg
- potassium sulfate: 0.000207417 kg; lognormal variance with pedigree 0.126177, pedigree (2,1,4,5,1)
  The exchange has been updated from 'potassium sulfate, as K2O' into 'potassium sulfate' and therefore its amount has been scaled (multiplied) from 0.0001 kg by 1.85 kg of 'potassium sulfate' per kg of 'potassium sulfate, as K2O'. Original comment of the exchange is: Calculated based on literature values or expert estimation: The total amount of nutrient (REWE 2009) multiplied by the country-share of the fertiliser type (IFA 2014). See supporting documentation 'WFLDB-Documentation.pdf' chapter 'Fertiliser application' for L3 and L4 data (https://ecoquery.ecoinvent.org/File/Reports).
  Corresponds to 11.1 kg/ha
  properties: dry mass 1 kg, wet mass 1 kg
- pyrethroid-compound: 6.62496e-7 kg
  Literature value or expert estimation (REWE 2009).
  properties: carbon content, fossil 0.623, dry mass 1 kg, wet mass 1 kg
- strawberry seedling, for planting: 1.10132 unit; lognormal variance with pedigree 0.126177, pedigree (2,1,4,5,1)
  Literature value or expert estimation (REWE 2009).
  properties: carbon content, non-fossil 0.439481, dry mass 0.578035 kg, water content 0.73, wet mass 1 kg
  note on carbon content, non-fossil: calculation: C-content of components according to ecoinvent report No. 15a. Source of composition: https://ndb.nal.usda.gov/ndb/search/. Unspecific seedling used as proxy.
- urea: 0.00046644, 0.000398306 kg (2 suppliers, which the file names only by identifier); sum of these 0.000864746 kg; lognormal variance with pedigree 0.126177, pedigree (2,1,4,5,1)
  The exchange has been updated from 'urea, as N' into 'urea' and therefore its amount has been scaled (multiplied) from 0.0004 kg by 2.1438 kg of 'urea' per kg of 'urea, as N'. Original comment of the exchange is: Calculated based on literature values or expert estimation: The total amount of nutrient (REWE 2009) multiplied by the country-share of the fertiliser type (IFA 2014). See supporting documentation 'WFLDB-Documentation.pdf' chapter 'Fertiliser application' for L3 and L4 data (https://ecoquery.ecoinvent.org/File/Reports).
  Corresponds to 17.9 kg/ha
  properties: carbon content, fossil 0.2, dry mass 1 kg, wet mass 1 kg
- waste polyethylene: -6.31056e-9, -1.73363e-8, -3.50523e-8, -2.29598e-9, -2.37085e-9, -8.93697e-8, -1.75536e-8, -1.06672e-8, -3.69129e-8, -1.80585e-7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 kg (42 suppliers, which the file names only by identifier); sum of these -0.000553431 kg
  Mulch film send to treatment. Based on Soessel et al. (2012), 53% of the plastic is landfilled.
  production volume
    Calculated from reference product production volume, reference product amount and byproduct amount.
  properties: carbon content, fossil 0.825301, dry mass 0.996 kg, heating value, net 42.47 MJ, water content 0.00401606, wet mass 1 kg
  note on heating value, net: Value taken from the general comment of the treatment dataset.

## Inputs from nature
- Carbon dioxide, in air [natural resource, in air]: 0.18287 kg; lognormal variance with pedigree 0.0158498, pedigree (2,2,4,5,1)
  CO2 uptake by biomass
- Energy, gross calorific value, in biomass [natural resource, biotic]: 1.9373 MJ; lognormal variance with pedigree 0.0158498, pedigree (2,2,4,5,1)
- Occupation, annual crop [natural resource, land]: 0.186214 m2*year
  Related to the duration from harvest date of previous crop to harvest date of main crop.
- Transformation, from arable land, unspecified use [natural resource, land]: 0.185713 m2
  Land transformation: 1 ha divided by yield
- Transformation, to arable land, unspecified use [natural resource, land]: 0.185713 m2
  Land transformation: 1 ha divided by yield

## Emissions to nature
- Ammonia [air, non-urban air or from high stacks]: 0.000257013 kg; lognormal variance with pedigree 0.0467216, pedigree (2,2,4,5,1)
  Calculated value - EMEP/EEA (2013). See 'WFLDB-Guidelines.pdf', available at https://ecoquery.ecoinvent.org/File/Reports.
- Carbon dioxide, fossil [air, non-urban air or from high stacks]: 0.00094992 kg; lognormal variance with pedigree 0.0158498, pedigree (2,2,4,5,1)
  Calculated value - CO2 emissions from urea and lime. See 'WFLDB-Guidelines.pdf', available at https://ecoquery.ecoinvent.org/File/Reports.
- Carbon dioxide, from soil or biomass stock [air, non-urban air or from high stacks]: 0.00331391 kg; normal variance with pedigree 0.5, pedigree (3,3,5,5,2)
  Global average LUC emissions according 2nd edition of the Quantis-modified tool developed by Blonk Consultants 'WFLDB-adapted-Blonk 2014 direct-land-use-change-assessment-tool_2015-05-18a.xlsx', tab. 'Country & land use unknown'. The emission are based on the relative change in production areas in all countries for a given crop. The weighted average is used which takes into acount relative difference in crop expansion into primary forest, secondary forest, grassland, perennial and annual land.
  Uncertainty: Uncertainty estimated based on IPCC guidlines 2006.
- Dinitrogen monoxide [air, non-urban air or from high stacks]: 7.42623e-5 kg; lognormal variance with pedigree 0.126664, pedigree (2,2,4,5,1)
  Calculated value - IPCC (2006). See 'WFLDB-Guidelines.pdf', available at https://ecoquery.ecoinvent.org/File/Reports.
- Nitrogen oxides [air, non-urban air or from high stacks]: 0.000137033 kg; lognormal variance with pedigree 0.126664, pedigree (2,2,4,5,1)
  Calculated value - EEA/EMEP (2013). See 'WFLDB-Guidelines.pdf', available at https://ecoquery.ecoinvent.org/File/Reports.
- Water [air, non-urban air or from high stacks]: 0.0366006 m3; lognormal variance with pedigree 0.126177, pedigree (2,1,4,5,1)
  Calculated value - Emission calculated from water balance. See 'WFLDB-Guidelines.pdf', available at https://ecoquery.ecoinvent.org/File/Reports.
- Acrinathrin [soil, agricultural]: 1.95223e-7 kg
  Calculated value - 100% emission in soil. See 'WFLDB-Guidelines.pdf', available at https://ecoquery.ecoinvent.org/File/Reports.
- Boron [soil, agricultural]: 9.31023e-6 kg
  Direct emi); Calculated value - s from Boric Acid. 100% emitted to soilBoric acid: H3BO3 - Molar mass= 3*1+3*16+11= 62g/molBore: Molar mass = 11g/mol. See 'WFLDB-Guidelines.pdf', available at https://ecoquery.ecoinvent.org/File/Reports.
- Boscalid [soil, agricultural]: 5.55994e-6 kg; lognormal variance with pedigree 0.0467216, pedigree (2,2,4,5,1)
  (same comment as for Acrinathrin)
- Cadmium II [soil, agricultural]: 1.16067e-7 kg
  Comment on mathematicalRelation:
  1.27968888889e-07 from Calculated value - Freiermuth (2006). See 'WFLDB-Guidelines.pdf', available at https://ecoquery.ecoinvent.org/File/Reports.
  -1.06617e-08 from Crop, default, heavy metals uptake model
  Heavy metal uptake can be excluded by setting the parameter heavyMetalUptakeSwitch to zero.
- Chloropicrin [soil, agricultural]: 0.00208237 kg
  Direct emi); Calculated value - s from chloropicrin. 100% emitted to soil. See 'WFLDB-Guidelines.pdf', available at https://ecoquery.ecoinvent.org/File/Reports.
- Chromium III [soil, agricultural]: 1.03678e-6 kg
  Comment on mathematicalRelation:
  1.27724444444e-06 from Calculated value - Freiermuth (2006). See 'WFLDB-Guidelines.pdf', available at https://ecoquery.ecoinvent.org/File/Reports.
  -5.7225e-08 from Crop, default, heavy metals uptake model
  Heavy metal uptake can be excluded by setting the parameter heavyMetalUptakeSwitch to zero.
- Copper ion [soil, agricultural]: -6.59573e-7 kg
  Comment on mathematicalRelation:
  -1.48884444444e-07 from Calculated value - Freiermuth (2006). See 'WFLDB-Guidelines.pdf', available at https://ecoquery.ecoinvent.org/File/Reports.
  -6.958245e-07 from Crop, default, heavy metals uptake model
  Heavy metal uptake can be excluded by setting the parameter heavyMetalUptakeSwitch to zero.
- Glyphosate [soil, agricultural]: 9.55809e-5 kg; lognormal variance with pedigree 0.0467216, pedigree (2,2,4,5,1)
  (same comment as for Acrinathrin)
- Kresoxim-methyl [soil, agricultural]: 1.04119e-6 kg; lognormal variance with pedigree 0.0467216, pedigree (2,2,4,5,1)
  (same comment as for Acrinathrin)
- Lambda-cyhalothrin [soil, agricultural]: 4.74781e-7 kg
  (same comment as for Acrinathrin)
- Lead II [soil, agricultural]: 4.66322e-8 kg
  Comment on mathematicalRelation:
  1.11791111111e-07 from Calculated value - Freiermuth (2006). See 'WFLDB-Guidelines.pdf', available at https://ecoquery.ecoinvent.org/File/Reports.
  -5.678085e-08 from Crop, default, heavy metals uptake model
  Heavy metal uptake can be excluded by setting the parameter heavyMetalUptakeSwitch to zero.
- Mercury II [soil, agricultural]: -2.11181e-9 kg
  Comment on mathematicalRelation:
  1.98148888889e-09 from Calculated value - Freiermuth (2006). See 'WFLDB-Guidelines.pdf', available at https://ecoquery.ecoinvent.org/File/Reports.
  -4.25838e-09 from Crop, default, heavy metals uptake model
  Heavy metal uptake can be excluded by setting the parameter heavyMetalUptakeSwitch to zero.
- Nickel II [soil, agricultural]: 4.65959e-8 kg
  Comment on mathematicalRelation:
  9.10133333333e-08 from Calculated value - Freiermuth (2006). See 'WFLDB-Guidelines.pdf', available at https://ecoquery.ecoinvent.org/File/Reports.
  -1.09683e-07 from Crop, default, heavy metals uptake model
  Heavy metal uptake can be excluded by setting the parameter heavyMetalUptakeSwitch to zero.
- Pyraclostrobin [soil, agricultural]: 1.39519e-6 kg; lognormal variance with pedigree 0.0467216, pedigree (2,2,4,5,1)
  (same comment as for Acrinathrin)
- Spinosad [soil, agricultural]: 1.49931e-6 kg
  (same comment as for Acrinathrin)
- Zinc II [soil, agricultural]: -1.61219e-6 kg
  Comment on mathematicalRelation:
  1.68422222222e-06 from Calculated value - Freiermuth (2006). See 'WFLDB-Guidelines.pdf', available at https://ecoquery.ecoinvent.org/File/Reports.
  Heavy metal uptake can be excluded by setting the parameter heavyMetalUptakeSwitch to zero.
- Cadmium II [water, ground-]: 8.4596e-10 kg; lognormal variance with pedigree 0.358938, pedigree (2,2,4,5,1)
  Calculated value - Freiermuth (2006). See 'WFLDB-Guidelines.pdf', available at https://ecoquery.ecoinvent.org/File/Reports.
- Cadmium II [water, surface water]: 2.29916e-9 kg; lognormal variance with pedigree 0.358938, pedigree (2,2,4,5,1)
  (same comment as for Cadmium II)
- Chromium III [water, ground-]: 3.79541e-7 kg; lognormal variance with pedigree 0.358938, pedigree (2,2,4,5,1)
  (same comment as for Cadmium II)
- Chromium III [water, surface water]: 2.14321e-7 kg; lognormal variance with pedigree 0.358938, pedigree (2,2,4,5,1)
  (same comment as for Cadmium II)
- Copper ion [water, ground-]: 6.00668e-8 kg; lognormal variance with pedigree 0.358938, pedigree (2,2,4,5,1)
  (same comment as for Cadmium II)
- Copper ion [water, surface water]: 2.89497e-7 kg; lognormal variance with pedigree 0.358938, pedigree (2,2,4,5,1)
  (same comment as for Cadmium II)
- Lead II [water, ground-]: 3.77083e-9 kg; lognormal variance with pedigree 0.358938, pedigree (2,2,4,5,1)
  (same comment as for Cadmium II)
- Lead II [water, surface water]: 7.00584e-8 kg; lognormal variance with pedigree 0.358938, pedigree (2,2,4,5,1)
  (same comment as for Cadmium II)
- Mercury II [water, ground-]: 1.7881e-11 kg; lognormal variance with pedigree 0.358938, pedigree (2,2,4,5,1)
  (same comment as for Cadmium II)
- Mercury II [water, surface water]: 4.67849e-10 kg; lognormal variance with pedigree 0.358938, pedigree (2,2,4,5,1)
  (same comment as for Cadmium II)
- Nickel II [water, surface water]: 1.5384e-7 kg; lognormal variance with pedigree 0.358938, pedigree (2,2,4,5,1)
  (same comment as for Cadmium II)
- Nitrate [water, ground-]: 0.00427396 kg; lognormal variance with pedigree 0.177866, pedigree (2,2,4,5,1)
- Phosphate [water, ground-]: 3.99468e-6 kg; lognormal variance with pedigree 0.177866, pedigree (2,2,4,5,1)
  Calculated value - Prasuhn (2006). See 'WFLDB-Guidelines.pdf', available at https://ecoquery.ecoinvent.org/File/Reports.
- Phosphate [water, surface water]: 1.28151e-5 kg; lognormal variance with pedigree 0.177866, pedigree (2,2,4,5,1)
  (same comment as for Phosphate)
- Phosphorus [water, surface water]: 5.6625e-6 kg; lognormal variance with pedigree 0.177866, pedigree (2,2,4,5,1)
  Calculated value - Prasuhn (2006) and SQCB-Erosion. See 'WFLDB-Guidelines.pdf', available at https://ecoquery.ecoinvent.org/File/Reports.
- Water [water, ground-]: 0.00170607 m3; lognormal variance with pedigree 0.126177, pedigree (2,1,4,5,1)
  (same comment as for Water)
- Water [water, surface water]: 0.00682417 m3; lognormal variance with pedigree 0.126177, pedigree (2,1,4,5,1)
  (same comment as for Water)
- Zinc II [water, ground-]: 3.64867e-7 kg; lognormal variance with pedigree 0.358938, pedigree (2,2,4,5,1)
  (same comment as for Cadmium II)
- Zinc II [water, surface water]: 3.42133e-7 kg; lognormal variance with pedigree 0.358938, pedigree (2,2,4,5,1)
  (same comment as for Cadmium II)

## Sampling procedure
WFLDB Methodological Guidelines for the Life Cycle Inventory of Agricultural Products in the latest version, available at: https://ecoquery.ecoinvent.org/File/Reports. Data sources: Data were categorised from level 0 (L0) to level (L4) as follows: L0 = estimate, proxy; L1 = statistical data (e.g. FAOSTAT); L2 = L1 adapted to crop and country; L3 = literature data or L1 resp. L2 data approved by experts; medium detailing (i.e. kg of total N-fertiliser); L4 = L3 data of high detailing (i.e. portion N-fertiliser types).In this dataset data were obtained for yield: L3; Fertilisers: L4; Pesticides: L1; Machinery: L0; Irrigation: L2. For information regarding the calculation of individual exchanges see supporting documentation WFLDB-Documentation.pdf

## Extrapolations
The amount of the exchanges are weighted average of regional datasets.

## Review by Assumpció ANTON 2016-05-30
Be aware that the use of statistics in input calculations could provide some specific inputs not common for specific crops, this should be corrected if better information is available and better reflexed in DQR . Currently, I would dissent for some of good marks provided, being a revision of criteria applied advisable.
Pesticides will need to be amended periodically checking for update of pesticides' ban.
