# battery production, Li-ion, LFP, rechargeable, prismatic

Dataset: EcoSpold 2, unit process
Geography: RoW
Time period: 2018-12-31 to 2025-12-31
Technology level: current
Classification: ISIC rev.4 ecoinvent: 2720:Manufacture of batteries and accumulators
Synonyms: Li-ion; lithium iron phosphate battery; lithium iron phosphate Li-ion battery
Scenario: Business-as-Usual
System model: Allocation, cut-off by classification
Generated by: Eleonora Crenna
Published in: Dai, Q. 2018
Database: ecoinvent
isCopyrightProtected: true
accessRestrictedTo: 1

## General comment
This dataset represents the production of 1 kg of Li-ion battery pack used e.g. for mechanical drive of an electric vehicle. The inventory is modelled according to the publication of Dai et al. (2017, 2018), in which a battery pack of 203 kg, with gross pack energy of 23.5 kWh made of 137 3.6 V- 46Ah prismatic cells is presented. Cells are made of lithium iron phosphate (LFP) cathode and a graphite-based anode, liquid electrolyte and a porous plastic separator. Infrastructure is included as well in this dataset as "electronic component factory".
Reference:
Dai, Q., Dunn, J., Kelly, J. C., & Elgowainy, A. (2017). Update of Life Cycle Analysis of Lithium-Ion Batteries in the GREET Model. 2017. Argonne National Laboratory.
Dai, Q., Kelly, J. C., Dunn, J., & Benavides, P. (2018). Update of Bill-of-Materials and Cathode Materials Production for Lithium-Ion Batteries in the GREET Model. 2018. Argonne National Laboratory.

## Included activities start
The activity starts with the battery cells, module packaging and the materials for additional components (esternal case, tabs, etc.) entering the factory gate.

## Included activities end
The activity ends with the production of Li-ion battery pack.

## Geography
This dataset is extrapolated from CN production to global.

## Technology
The battery pack is made of cells connected together and packed into modules, which are further connected and inserted into the metallic case of the battery pack. The cells in the battery pack of this dataset specifically have LFP cathode and graphite-based anode. Additional components include tabs, cable and electronic components for the connection of battery modules and their management, and a cooling system for safety reason.

## Time period
The time period is from 2018 (year of the publication) and 2025 (assuming that this producing technology is still viable in the near future)

## Reference product
- battery, Li-ion, LFP, rechargeable, prismatic: 1 kg; By-product classification allocatable product; CPC 46410: Primary cells and primary batteries; HS2017 850650: Cells and batteries; primary, lithium
  production volume 6.42039e7 kg; = 619948187 *0.15
    The PV is expressed in kg. According to UN Comtrade (https://comtrade.un.org/data/, HS code: 850760) 619948187 kg Li-ion batteries were exported globally in 2019. Approximately 15% are LFP (Benchmark Mineral Intelligence, 2019. The Current Position of Li-ion Raw Material Supply and the Role of Recycling).
  property price 10.7554 EUR2005
    Converted to EUR2005. Approximate average from multiple vendors.
  properties: carbon allocation 0.0196051 kg, carbon content 0.0196051, carbon content, fossil 0.0195776, carbon content, non-fossil 2.74973e-5, dry mass 1 kg, water content 0, water in wet mass 0 kg, wet mass 1 kg

## Inputs from technosphere
- aluminium, wrought alloy: 0.13653 kg; name Al_input; source Dai, Q. 2019; lognormal variance with pedigree 0.0041, pedigree (2,4,2,3,2)
  Literature. Aluminium used to produce the metalic component of the battery jacket (99.11%) and the battery heating plate (0.89%)
  properties: dry mass 1 kg, wet mass 1 kg
- battery cell, Li-ion, LFP: 0.72698 kg; source Dai, Q. 2018; lognormal variance with pedigree 0.0041, pedigree (2,4,2,3,2)
  Literature.
  properties: dry mass 1 kg, wet mass 1 kg
- battery management system, for Li-ion battery: 0.0201 kg; source Dai, Q. 2019; lognormal variance with pedigree 0.0041, pedigree (2,4,2,3,2)
  Literature.
  properties: carbon content, fossil 0.257652, carbon content, non-fossil 0.000574587, copper content 0.081, dry mass 1 kg, wet mass 1 kg
- battery module packaging, Li-ion: 0.0558 kg; source Dai, Q. 2019; lognormal variance with pedigree 0.0041, pedigree (2,4,2,3,2)
  Literature.
  properties: dry mass 1 kg, wet mass 1 kg
- copper, anode: 0.00054 kg; name Cu_input; source Dai, Q. 2019; lognormal variance with pedigree 0.0041, pedigree (2,4,2,3,2)
  Literature. Material for the negative terminals
  properties: copper content 0.997, dry mass 1 kg, wet mass 1 kg
- electricity, medium voltage: 3.6442e-7, 3.24121e-8, 2.82599e-6, 3.70318e-6, 3.92168e-6, 1.99751e-6, 2.75887e-7, 1.74616e-6, 7.37098e-8, 1.18013e-5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 kWh (47 suppliers, which the file names only by identifier); sum of these 0.00028 kWh; source Dai, Q. 2018; lognormal variance with pedigree 0.0041, pedigree (2,4,2,3,2)
  Literature. Conversion factor: 1 MJ = 0.277778 kwh
- electronic component, passive, unspecified: 0.0035 kg; source Dai, Q. 2019; lognormal variance with pedigree 0.0041, pedigree (2,4,2,3,2)
  Literature. Representative for module interconnections
  properties: carbon content, fossil 0.317311, carbon content, non-fossil 0.0045566, dry mass 1 kg, wet mass 1 kg
- ethylene glycol: 0.00145403, 0.024046 kg (2 suppliers, which the file names only by identifier); sum of these 0.0255 kg; source Dai, Q. 2019; lognormal variance with pedigree 0.0041, pedigree (2,4,2,3,2)
  Literature. The coolant system is made of ethylene glycol and water in ratio 50:50
  properties: carbon content, fossil 0.387097, dry mass 1 kg, heating value, net 23.44 MJ, wet mass 1 kg
- glass fibre reinforced plastic, polyamide, injection moulded: 0.00018 kg; source Dai, Q. 2019; lognormal variance with pedigree 0.0041, pedigree (2,4,2,3,2)
  Literature. Plastic insulation layer of the battery pack terminals
  properties: carbon content, fossil 0.446018, dry mass 1 kg, wet mass 1 kg
- impact extrusion of aluminium, 1 stroke: 0.135492 kg; = 0.9924* Al_input; lognormal variance with pedigree 0.0041, pedigree (2,4,2,3,2)
  Proxy for the production of the battery jacket, which represents 99.25% of the input aluminium material.
- injection moulding: 0.00386 kg; = Pe_input; lognormal variance with pedigree 0.0041, pedigree (2,4,2,3,2)
  Proxy for the production of the plastic component of the battery jacket
- metal working factory: 1.14943e-9 unit; = 1/(40000*300/140*203*50); lognormal variance with pedigree 0.3581, pedigree (4,4,5,3,3)
  Calculated value, based on 40000 cells average annual production; 300 operationg days per year; 137 cells per pack; 203 kg pack (Dai et al. 2017); assumption of 50 years lifetime factory
- polyethylene, high density, granulate: 0.00386 kg; name PE_input; source Dai, Q. 2019; lognormal variance with pedigree 0.0041, pedigree (2,4,2,3,2)
  Literature. Plastic component of the battery jacket
  properties: carbon content, fossil 0.857143, dry mass 1 kg, heating value, net 42.47 MJ, wet mass 1 kg
  note on carbon content, fossil: Polyethylene is formed out of a huge amount of ethylene monomers (C2H4) (ecoinvent v2.2 report 11_II). MW=28 g/mol
- reinforcing steel: 0.0071 kg; name Steel_input; source Dai, Q. 2019; lognormal variance with pedigree 0.0041, pedigree (2,4,2,3,2)
  Literature. Module compression plates and straps
  properties: carbon content, fossil 0.004, dry mass 1 kg, wet mass 1 kg
- sheet rolling, aluminium: 0.00102398 kg; = 0.0075*Al_input; lognormal variance with pedigree 0.0041, pedigree (2,4,2,3,2)
  Proxy for the production of the battery heating plate which represents 0.75% of the input aluminium material.
- sheet rolling, copper: 0.00054 kg; = Cu_input; lognormal variance with pedigree 0.0041, pedigree (2,4,2,3,2)
  Proxy for the production of the negative terminals
- sheet rolling, steel: 0.0071 kg; = Steel_input; lognormal variance with pedigree 0.0041, pedigree (2,4,2,3,2)
  Proxy for the production of module compression plates and straps
- tap water: 0.0255 kg; source Dai, Q. 2019; lognormal variance with pedigree 0.0041, pedigree (2,4,2,3,2)
  Literature. The coolant system is made of ethylene glycol and water in ratio 50:50
  properties: carbon content, fossil 0.00178991, dry mass 0.000337476 kg, water content 2962.17, wet mass 1 kg
  note on carbon content, fossil: Bicarbonate content is 2.93 mol/m3. CO2 content is 0.1 mol/m3 (ecoinvent v2.2 report 8, Tab 93.1).

## Sampling procedure
Data on battery materials have been entirely retrieved from Dai et al. (2018). The bill of materials has been modelled following the battery scheme presented in Dai et al. (2019). The information on the energy consumption for battery assembly come from Siret et al. (2018),

Reference:
Dai, Q., Kelly, J. C., Dunn, J., & Benavides, P. (2018). Update of Bill-of-Materials and Cathode Materials Production for Lithium-Ion Batteries in the GREET Model. 2018. Argonne National Laboratory.
Dai et al. (2019). Life cycle analysis of lithium-ion batteries for automotive applications. Batteries, 5(2), 48.
Siret et al. (2018). PEFCR- Product Environmental Footprint Category Rules for High Specific Energy Rechargeable Batteries for Mobile Applications. Report. Available at: https://ec.europa.eu/environment/eussd/smgp/pdf/PEFCR_Batteries.pdf

## Extrapolations
This dataset was extrapolated from national producers to global.
