# calcined clay production

Dataset: EcoSpold 2, unit process
Geography: BR
Time period: 2015-01-01 to 2023-12-31
Technology level: current
Classification: ISIC rev.4 ecoinvent: 2399:Manufacture of other non-metallic mineral products n.e.c.
Scenario: Business-as-Usual
System model: Allocation, cut-off by classification
Share of production covered: 10 %
Generated by: Fernanda Belizario Silva
Published in: Vieira, Silvia Regina Soares S 2015
Database: ecoinvent
isCopyrightProtected: true
accessRestrictedTo: 1

## General comment
This dataset represents the production of calcined clay, a pozzolanic material used in cement production.
Calcined clay is produced by grinding and heating of natural clay between 500°C and 900°C. This thermal treatment (activation) converts crystalline clay materials to amorphous alumino silicates (Barger et al., 2001). When added to cement, amorphous silica reacts with calcium hydroxide formed during calcium silicate hydration from cement, forming C-S-H (hydrated calcium silicate). Secondary reactions may occur due to the reactive alumina content of calcined clay, forming also C-A-H (hydrated calcium aluminate) (Silva, 2007).
The addition of calcined clay to cement result in higher sulphate-resistance of the hydrated paste and in low permeability of the cementitious matrix, thus increasing the durability of cementitious products (Barger et al., 2001). In Brazil, calcined clay to be used in cement is standardized by ABNT NBR 12653.
This dataset is based on key process parameters informed by one cement manufacturer in Brazil, namely electricity consumption and fuel consumption (petroleum coke) for grinding and calcination operations. Air emissions are modelled based on emission factors from IPCC. Although simplified and with an unknown representativeness, this dataset illustrates the production process of calcined clay in Brazil. It is considered that calcined clay is produced in cement plants.
Barger, G. S. et al. Production and use of calcined natural pozzolans in concrete. Cement, concrete and aggregates, v. 23, n. 2, 2001, pp. 73-80
Silva, M. G. Cimentos Portland com adições minerais (Portland cement with mineral additions). In. Materiais de Construção Civil e Princípios de Ciência e Engenharia dos Materiais, ed. Isaia, G. C. São Paulo: IBRACON, 2007. pp. 761-794.

## Included activities start
From reception of fuels and clay from the clay pit - quarying operations not included.

## Included activities end
The activity included the grinding and calcination of clay and ends with the calcined clay ready to use. Particulate emission is not considered due to lack of data. Infrastructure and administration not included due to lack of data.

## Geography
This dataset represents production of calcined clay as a raw material for pozzolan-blended cement in Brazil.

## Technology
Current technology for calcined clay production in Brazil.

## Time period
Time period starts in 2015 as data refer to this year.

## Parameters
- energy heat: 2.05153 MJ; name energy; = UnitConversion(490, 'kilocalorie ISO IT', 'MJ')
  Thermal energy consumption for calcination (490 kcal/kg of calcined clay).

## Reference product
- calcined clay: 1 kg; By-product classification allocatable product; CPC 15200: Gypsum; anhydrite; limestone flux; limestone and other calcareous stone, of a kind used for the manufacture of[…]; HS2017 250700: Kaolin and other kaolinic clays; whether or not calcined
  Calcined clay for use as supplementary cementitious material (SCM).
  production volume 2.23126e8 kg; = 1239591*10^3*0.18
    The production volume of clay (kaolin) in Brazil in 2020 was 1'239'591 metric ton. Approximately 18% of the kaolin produced in the United States in 2020 was calcined (metakaolin). This share was used to calculate the brazilian production volume of calcined clay.
    Source: USGS (2020). U. S. Geological Survey - Clay and shale annual tables 2020. Available at: https://www.usgs.gov/centers/national-minerals-information-center/clays-statistics-and-information
  property price 0.075 EUR2005
    Calculated value based on data from United Nations Commodity Trade Statistics Database (comtrade.un.org). UN comtrade category: 250810 Bentonite. Year 2005. Using exchange rate of 1EURO = 1.209 USD. Average of price of import into 5 main markets (EU, US, JP, IN and CN).
  properties: carbon allocation 0 kg, carbon content 0, carbon content, fossil 0, carbon content, non-fossil 0, dry mass 1 kg, water content 0, water in wet mass 0 kg, wet mass 1 kg

## Inputs from technosphere
- clay: 1.3 kg; lognormal variance with pedigree 0.002, pedigree (2,3,2,1,1)
  Measured value. Clay humidity informed by manufacturer. No losses considered.
  Uncertainty: D
  property water in wet mass 0.3 kg; name water_clay
  properties: dry mass 1 kg, water content 0.3, wet mass 1.3 kg
- electricity, medium voltage: 0.025 kWh; = 25/1000; lognormal variance with pedigree 0.002, pedigree (2,3,2,1,1)
  Measured value. Electricity consumption informed by manufacturer.
  Uncertainty: D
- petroleum coke: 0.0631241 kg; = energy/ LHV_petcoke; lognormal variance with pedigree 0.002, pedigree (2,3,2,1,1)
  Calculated value, based on thermal energy consumption and fuel type informed by manufacturer. Net heating value taken from IPCC.
  Uncertainty: D
  property carbon dioxide factor 97.5 kg/GJ; name CO2_petcoke
  property dinitrogen monoxide factor 0.0006 kg/GJ; name N2O_petcoke
  property heating value, net 32.5 MJ; name LHV_petcoke
  property methane factor 0.003 kg/GJ; name CH4_petcoke
  properties: carbon content, fossil 0.885, dry mass 1 kg, wet mass 1 kg
  note on carbon dioxide factor: Literature value (Table 2.3 - 2006 IPCC Guidelines for National Greenhouse Gas Inventories - Chapter 2).
  note on heating value, net: Literature value (Table 1.2 - 2006 IPCC Guidelines for National Greenhouse Gas Inventories - Chapter 1)

## Emissions to nature
- Carbon dioxide, fossil [air, unspecified]: 0.200024 kg; = (energy/1000)* CO2_petcoke; lognormal variance with pedigree 0.002, pedigree (2,3,2,1,1)
  Calculated value, based on thermal energy consumption and fuel type informed by manufacturer. Emission factor taken from IPCC.
  Uncertainty: D
- Dinitrogen monoxide [air, unspecified]: 1.23092e-6 kg; = (energy/1000)* N2O_petcoke; lognormal variance with pedigree 0.0414, pedigree (2,3,2,1,1)
  (same comment as for Carbon dioxide, fossil)
- Methane, fossil [air, unspecified]: 6.1546e-6 kg; = (energy/1000)* CH4_petcoke; lognormal variance with pedigree 0.0414, pedigree (2,3,2,1,1)
  (same comment as for Carbon dioxide, fossil)
- Water [air, unspecified]: 0.0003 m3; = water_clay/1000; lognormal variance with pedigree 0.0414, pedigree (2,3,2,1,1)
  Estimated. Evaporation of water contained in clay.
  Uncertainty: D

## Sampling procedure
Data were provided by one Brazilian cement manufacturer who also produces calcined clay for its own consumption.
Clay humidity, thermal energy consumption and electrity consumption were informed per tons of calcined clay produced.
IPCC net heating value and greenhouse gases emission for petroleum coke were used to calculate fuel consumption in terms of mass and corresponding air emissions from combustion. Water emissions to air were estimated based on clay humidity informed by the manufacturer.
Air emissions other than greenhouse gases, including particulates, were not estimated due to lack of data. For the same reason, administration and infrastructure are not included.
Uncertainty was estimated using default basic uncertainty values and Pedigree scores.
The amounts of the exchanges were calculated as described. No conversion to the geometric mean of the lognormal distribution was done, for consistency reasons with other ecoinvent datasets.

## Extrapolations
Data from one manufacturer, with unknown representativeness (arbitrarily set to 10%), are used to represent the production of calcined clay for Brazil.
