# lightweight concrete block production, expanded clay

Dataset: EcoSpold 2, unit process
Geography: RoW
Time period: 1995-01-01 to 2023-12-31
Technology level: current
Classification: EcoSpold01Categories: construction materials/concrete
Classification: ISIC rev.4 ecoinvent: 2399:Manufacture of other non-metallic mineral products n.e.c.
Tags: ConvertedDataset
Scenario: Business-as-Usual
System model: Allocation, cut-off by classification
Generated by: Daniel Kellenberger (obsolete)
Published in: Kellenberger D. 2004
Database: ecoinvent
isCopyrightProtected: true
accessRestrictedTo: 1

## General comment
Hardening is assumed to be by air-drying. It is assumed that there is wastewater and solid waste, but as no exact description on the composition of the wastewater and solid waste is available a proxy for each ("treatment, concrete production effluent, to wastewater treatment, class 3" and "disposal, municipal solid waste, 22.9% water, to municipal incineration") is used. The lifespan of the plant is assumed to be 50 years.
Lightweight concrete block. Image source: http://keramzit.by/data/pictures/poduct/block1.png

## Included activities end
includes the raw materials, their transport to the finishing plant, the air-drying, the packing, the infrastructure and the disposal of wastewater and some solid household (e.g. packing material) waste

## Geography
For some exchanges CH, RER and GLO modules have been used as proxy.

## Technology
The raw material mixture (aggregates, cement and water) of lightweight concrete blocks are poured into a mould then squeezed and finaly hardened by air (assumption for this study)

## Parameters
- fraction, process water, to air: 0.15 dimensionless; name fraction_PW_to_air; lognormal variance with pedigree 0.092025, pedigree (4,4,3,2,4)
- fraction, tap water, to air: 0.15 dimensionless; name fraction_TW_to_air; lognormal variance with pedigree 0.092025, pedigree (4,4,3,2,4)

## Reference product
- lightweight concrete block, expanded clay: 1 kg; name RP_amount_1; By-product classification allocatable product; CPC 37540: Tiles, flagstones, bricks and similar articles, of cement, concrete or artificial stone; HS2017 681011: Cement, concrete or artificial stone; building blocks or bricks, whether or not reinforced
  EcoSpold01Location=CH
  production volume 1.35364e10 kg; name RP_PV_1; = (32000000*1000*0.09/(0.9/1.1))/0.26
    Estimated value. According to Elzea Kogel, J, Trivedi, N.C., Barker, J.M. & Krukowski, S. T. (editors) (2006) Industrial Minerals and Rocks: Commodities, Markets and Uses, 7th edition, estimating World clay production is complex because of the exclusion of China and India in the majority of statistical references and the inclusion of different types of clays in different categories depending on the reporting geography. Kogel et al. estimated for 2002, World production of common clay to be hundreds of Mt, for refractory more than 20Mt , Kaolin 43 Mt mined and 26 Mt sold, Bentonite 10.3 Mt, Fuller’s earth an uncertain value of 10Mt, ball clay 15.5 Mt and Hormites 2.1 Mt. As no precise estimate was found the World production volume for clay and kaolin production are calculated from the European production volumes. For Bentonite and Kaolin World values are available from the European mineral statistics 2009-2013 (http://www.bgs.ac.uk/mineralsuk/statistics/europeanStatistics.html, accessed 08.02.2016) for which EU production for Kaolin is 34.5% of World’s production and for Bentonite is the 16.4%. The remaining World values are scaled assuming that EU represents the 26% of World’s production, based on the average between Kaolin and Bentonite (34.5% and 16.4%).
    Following the explanation and source for the European production volumes: Commodities are listed with their Prodcom codes, Prodcom name and production volume for EU 28 in tons: 08122210 “Bentonite” 2216788 tons, 08122230 “Fireclay” 2542435 tons, 08122250 “Common clays and shales for construction use (excluding bentonite, fireclay, expanded clays, kaolin and kaolinic clays); andalusite, kyanite and sillimanite; mullite; chamotte or dinas earths” 32000000 tons, and 08122160 “Kaolinitic clays (ball and plastic clays)” 2997294 tons. According to the European mineral statistics 2009-2013 (http://www.bgs.ac.uk/mineralsuk/statistics/europeanStatistics.html, accessed 08.02.2016), Europe (EU36) produces 9.1Mt of Kaolin, which is 34.5% of World production, of which 47.8% (16% of all World production) comes from Germany. The largest producer in 2013 was US with 23%, China represented the 12%, Brazil 8%, and Iran 6%. The European mineral statistics values are used for both Europe and the World estimates. The same source reports for EU36 Bentonite production of 2.73 Mt for 2013, which represents the 16.4% of World production. The values for Europe matches the values indicated from Eurostat. Germany produces 13.1% of Europe’s bentonite 358844 tons. The volume of produced clay is assigned to the different activities based on USGS (2015) estimates of uses in the USA (http://minerals.usgs.gov/minerals/pubs/commodity/clays/mcs-2015-clays.pdf, accessed 08.02.2016) and according to input of clay per reference product. Of common clay, 39% is used for brick (for which 50% is assumed to be used for clay bricks and 50% light clay bricks), 23% lightweight aggregate, 31% cement, and 7% other uses (USGS specifies that 9% of common clay is used for lightweight concrete block production in the 2013 Minerals yearbook http://minerals.usgs.gov/minerals/pubs/commodity/clays/myb1-2013-clays.pdf, accessed 08.02.2016). Of ball clay, 39% is used for floor and wall tiles, 17% sanitary ware, and 44% other uses. Of bentonite 26% absorbents, 24% drilling mud, 15% foundry sand bond (assumed to represent plaster clay), 11% iron ore pelletising, and 24% other uses. Of fire clay, 34% for heavy clay products, and 66% for refractory and other products. Of fuller’s earth, 70% absorbents, and 30% for other uses. The US produce 15 to 25 % of refined clays (without common clay and shale). Comparing the estimated global values with the data for USGS (2015) for the production in USA, the US is responsible for 20% of Kaolin products, 34% of Bentonite and more than 10% of common clays. USGS (2015) reports USA to “probably” represent 15% to 25% of World production of refined clays excluding common clays.
  property price 0.422602 EUR2005
    Calculated based on inputs: The price of the product has been calculated as a sum of the values of the material and energy inputs for this product. This value is therefore a rough estimation. It may underestimate the real price since there are additional expenses when producing any product. These expences can include for example labour costs, treatment of waste materials and profit for the producer. Please consider carefully whether this level of data quality is acceptable for your application.
  properties: carbon allocation 0 kg, carbon content 0, carbon content, fossil 0, carbon content, non-fossil 0, dry mass 1 kg, water content 0, water in wet mass 0 kg, wet mass 1 kg

## Inputs from technosphere
- cement, Portland: 0.086636, 0.00328305, 0.00437999, 0.0048016, 0.000198805, 0.000181255, 0.000176657, 0.00022532, 0.0001173 kg (9 suppliers, which the file names only by identifier); sum of these 0.1 kg; lognormal variance with pedigree 0.102, pedigree (3,5,5,5,1)
  EcoSpold01Location=CH
  properties: dry mass 1 kg, wet mass 1 kg
- clay pit infrastructure: 1.67e-10 unit; lognormal variance with pedigree 0.692, pedigree (1,1,5,5,1)
  EcoSpold01Location=CH
  estimated
- diesel, burned in building machine: 0.0158 MJ; lognormal variance with pedigree 0.102, pedigree (3,5,5,5,1)
  EcoSpold01Location=GLO
  properties: heating value, net 1 MJ
- electricity, medium voltage: 0.000181568, 0.00362188, 0.00121694, 5.56024e-5, 1.11288e-5, 2.38959e-6, 0.000252905, 0.000374015, 0.000783574 kWh (9 suppliers, which the file names only by identifier); sum of these 0.0065 kWh; lognormal variance with pedigree 0.102, pedigree (3,5,5,5,1)
  EcoSpold01Location=UCTE
- expanded clay: 0.9 kg; lognormal variance with pedigree 0.102, pedigree (3,5,5,5,1)
  EcoSpold01Location=DE
  properties: dry mass 0.965 kg, water content 0.0362694, wet mass 1 kg
- municipal solid waste: -2.12405e-7, -2.52222e-8, -1.60255e-7, -1.56977e-7, -0.000119839, -4.03709e-6, -1.76495e-8, -5.66517e-9, -1.28048e-8, -5.3307e-7 kg (10 suppliers, which the file names only by identifier); sum of these -0.000125 kg; lognormal variance with pedigree 0.652, pedigree (1,1,1,5,1)
  EcoSpold01Location=CH
  estimated
  production volume; = BP_amount_2* RP_PV_1/ RP_amount_1
    Calculated from the production volume of lightweight concrete block, expanded clay in proportion to the respective output amounts.
  properties: carbon content, fossil 0.171549, carbon content, non-fossil 0.261655, dry mass 0.771 kg, heating value, net 11.74 MJ, water content 0.297017, wet mass 1 kg
  note on carbon content, fossil: MSW composition in tab 4.1, ecoinvent v2.2 report 13_I. C content referred to 1 kg DM
  note on heating value, net: Value taken from the general comment of the treatment dataset.
- packing, clay product: 1 kg; lognormal variance with pedigree 0.692, pedigree (1,1,5,5,1)
  estimated
  EcoSpold01Location=CH
- tap water: 0.00135843, 0.00207081, 0.00386402, 0.0104094, 0.00125301, 0.0522175, 0.597552, 0.445275 kg (8 suppliers, which the file names only by identifier); sum of these 1.114 kg; source Dansk Teknologisk Institut 1995; lognormal variance with pedigree 0.0546, pedigree (3,3,5,5,1)
  Calculated based on literature, (Vionnet, S., Quantis Water Database - Technical Report, 2012).
  EcoSpold01Location=RER
  properties: carbon content, fossil 0.00178991, dry mass 0.000337476 kg, water content 2962.17, wet mass 1 kg
  note on carbon content, fossil: Bicarbonate content is 2.93 mol/m3. CO2 content is 0.1 mol/m3 (ecoinvent v2.2 report 8, Tab 93.1).
- wastewater from concrete production: -8.33e-5 m3; name BP_amount_1; lognormal variance with pedigree 0.652, pedigree (1,1,1,5,1)
  estimated
  EcoSpold01Location=CH
  production volume; = BP_amount_1* RP_PV_1/ RP_amount_1
    (same comment as for municipal solid waste)
  properties: carbon content, fossil 0.027074, dry mass 0.449139 kg, water content 2225.48, wet mass 1000 kg
  note on carbon content, fossil: TOC =0.01216 kg/m3 (Tab A.20, ecoinvent v2.2 report 13_I). TOC was considered as Total Carbon.

## Emissions to nature
- Water [air, unspecified]: 0.0001671 m3; name water_to_air_unspecified; lognormal variance with pedigree 0.0827, pedigree (2,2,5,5,1)
  Calculated value based on literature values and expert opinion. See comments in the parametres' comment field.
  property fraction, origin: fresh water 1; name fraction_origin_fresh_water
  property fraction, origin: salt water 0; name fraction_origin_salt_water
  property fraction, origin: unspecified 0; name fraction_origin_unspecified
- Water [water, unspecified]: 0.0008636 m3; name water_to_water_unspecified; lognormal variance with pedigree 0.0827, pedigree (2,2,5,5,1)
  (same comment as for Water)
  property carbon content, fossil 0; name C_content_fossil
  property carbon content, non-fossil 0; name C_content_non_fossil
  property dry mass 0 kg; name DM
  property fraction, origin: fresh water 1; name fraction_origin_fresh_water_Ww
  property fraction, origin: salt water 0; name fraction_origin_salt_water_Ww
  property fraction, origin: unspecified 0; name fraction_origin_unspecified_Ww
  property water in wet mass 1000 kg; name WWM
  property wet mass 1000 kg; name WM

## Sampling procedure
Literature

## Extrapolations
See geography This dataset has been copied from an original dataset covering the geography CH. The uncertainty has been adjusted accordingly.

## Review by Roberto Dones 2004-04-05
passed
