# containerboard production, fluting medium, semichemical, 40% recycled content

Dataset: EcoSpold 2, unit process
Geography: CA-QC
Time period: 2009-01-01 to 2023-12-31
Technology level: current
Classification: EcoSpold01Categories: paper & cardboard/cardboard & corrugated board
Classification: ISIC rev.4 ecoinvent: 1702:Manufacture of corrugated paper and paperboard and of containers of paper a
Tags: single enterprise data
Scenario: Business-as-Usual
System model: Allocation, cut-off by classification
Share of production covered: 58 %
Generated by: Hugues Imbeault-Tétreault
Database: ecoinvent
isCopyrightProtected: true
accessRestrictedTo: 1

## General comment
This dataset represents the production of semichemical fluting with a 40% recycled content intended for the production of corrugated board base paper in Québec, Canada. The mill which provided data manufactures only fluting medium, but multiple grammages. The production data represent the average of produced grammages, assuming a homogeneous production.

## Included activities start
From the reception of pulpwood, wood chips, recovered paper, fossil fuels, consumables and chemicals at the mill gate, and water input from river.

## Included activities end
This activity ends with the loading on lorries of the fluting medium intended for the production of corrugated board. The dataset includes waste paper and wood handling, semi-chemical and recycled pulp manufacturing, paper manufacturing and on-site effluent treatment, biomass combustion ash and emissions to air, effluent emissions to water, sludge and municipal waste. Fossil fuel combustion emissions to air are not directly included in this dataset but are taken into account by the heat input.
NOTE: Energy from combusted fossil fuels is included in this datasets with heat inputs. Those heat inputs include material and infrastrcuture inputs and waste treatments. Therefore, a small double counting occurs, as infrastructure and electricity are already included in the dataset.
Exclusions: fossil carbon dioxide emissions from make-up sodium carbonate, confidential effluent water emissions (acetaldehyde, aluminium, benzene, chromium, hexavalent chromium compound, copper, cyanides, dichloromethane, lead, mercury, methyl ethyl ketone, nickel, toluene, trichloroethylene, zinc) and carbon dioxide emissions from wastewater treatment ponds. The excluded effluent water emissions do not constitute major impact contributors to any damage category (0.6% and 0.03% for Human Health and Ecosystems respectively) using the ReCiPe Hierarchist v1.07 LCIA method.

## Geography
Data from a mill located in the province of Québec, Canada.

## Parameters
- recycled content: 0.4 dimensionless; name recycledContent; lognormal variance with pedigree 0.0006, pedigree (1,1,1,1,1)

## Reference product
- containerboard, fluting medium: 1 kg; name flutingMediumAmount; By-product classification allocatable product; CPC 32151: Corrugated paper and paperboard; HS2017 480810: Paper and paperboard; corrugated, whether or not perforated, in rolls or sheets, other than paper of headin[...]
  Net saleable product
  production volume 4.14e8 kg; name flutingMediumProdVol
    Québec production capacity of fluting medium in 2009.
  property price 0.598 EUR2005
    Export prices for the World+ according to: http://faostat.fao.org/site/626/DesktopDefault.aspx?PageID=626#ancor downloaded 28 April 2009; calculated as export value divided by export volume.
  properties: carbon allocation 0.425923 kg, carbon content 0.46, carbon content, non-fossil 0.46, dry mass 0.92592 kg, heating value, net 15.92 MJ, water content 0.08, water in wet mass 0.074074 kg, wet mass 1 kg

## Inputs from technosphere
- ash from paper production sludge: -0.0366802 kg; name ashAmount; lognormal variance with pedigree 0.0026, pedigree (1,4,1,1,1)
  production volume; name ashVolProd; = ashAmount * flutingMediumProdVol / flutingMediumAmount
    Calculated from production volume of fluting medium.
  property carbon content, non-fossil 0.0092; name ashDispAmoun_C_content_non_fossil_0
  property dry mass 0.65 kg; name ashDispAmount_DM
  property water content 0.538462; name ashDispAmount_water_content; = ashDispAmount_WWM / ashDispAmount_DM
  property water in wet mass 0.35 kg; name ashDispAmount_WWM
  property wet mass 1 kg; name ashDispAmount_WM
  note on carbon content, non-fossil: Biogenic carbon content on a dry matter basis. Value from global semichemical fluting production (no recycled content) dataset.
- chemical, organic: 0.000335193 kg; name chemicalOrganic; = chemicalOrganic_amount1 * chemicalOrganic_concentration1 + chemicalOrganic_amount2 * chemicalOrganic_concentration2 + chemicalOrganic_amount3 * chemicalOrganic_concentration3 + chemicalOrganic_amount4 * chemicalOrganic_concentration4 + chemicalOrganic_amount5 * chemicalOrganic_concentration5; lognormal variance with pedigree 0.04, pedigree (1,1,5,1,1)
  34%, 70%, 60%, 10% and 25% solution.
  property amount of exchange 1 0.0108564 kg; name chemicalOrganic_amount1
  property amount of exchange 2 0.46054 kg; name chemicalOrganic_amount2
  property amount of exchange 3 0.00884867 kg; name chemicalOrganic_amount3
  property amount of exchange 4 0.011347 kg; name chemicalOrganic_amount4
  property amount of exchange 5 0.0107202 kg; name chemicalOrganic_amount5
  property concentration of amount 1 0.34; name chemicalOrganic_concentration1
  property concentration of amount 2 0.7; name chemicalOrganic_concentration2
  property concentration of amount 3 0.6; name chemicalOrganic_concentration3
  property concentration of amount 4 0.1; name chemicalOrganic_concentration4
  property concentration of amount 5 0.25; name chemicalOrganic_concentration5
  properties: carbon content, fossil 0.628, dry mass 1 kg, heating value, net 19.03 MJ, wet mass 1 kg
  note on carbon content, fossil: This dataset is an unweighted average of 20 organic substances (listed in Tab 88.1, ecoinvent v2.2 report 8, part II), being part of the top100 chemicals included in this database. The C-content has also been calculated as an unweighted average of the C content of the substances composing this dataset.
- core board: 3.28228e-5 kg; lognormal variance with pedigree 0.0426, pedigree (1,4,5,1,1)
  Cores and other cardboard for packaging.
  properties: carbon content, non-fossil 0.430314, dry mass 0.945 kg, heating value, net 12.19 MJ, water content 0.0582011, wet mass 1 kg
- diesel, burned in building machine: 0.0368935 MJ; name dieselBuildMachine; = dieselBuildMachine_fuel_input_in_liter * dieselBuildMachine_density * dieselBuildMachine_Net_Heat_Value*42.8; lognormal variance with pedigree 0.04, pedigree (1,1,5,1,1)
  Reported as fuel input in litres. A lower heating value of 42.8 MJ/l and a density of 0.84 kg/l were used.
  property density 0.84 kg/l; name dieselBuildMachine_density
  property heating value, net 1 MJ; name dieselBuildMachine_Net_Heat_Value
  property literFuel_Input 1.02619 l; name dieselBuildMachine_fuel_input_in_liter
- dipropylene glycol monomethyl ether: 8.82051e-6 kg; name dipropyleneglycol; = dipropyleneglycol_amount_1 * dipropyleneglycol_concentration; lognormal variance with pedigree 0.04, pedigree (1,1,5,1,1)
  5% aqueous solution.
  Uncertainty: Calculated variable. Uncertainty will be determined from propagation of uncertainty factors of underlying variables. Uncertainty of actual relation between variables not accounted at this time, although this could be included in a future update.
  property amount of flow 1 in kg 0.17641 kg; name dipropyleneglycol_amount_1
  property concentration of solution 0.05; name dipropyleneglycol_concentration
  properties: carbon content, fossil 0.567568, dry mass 1 kg, heating value, net 30.27 MJ, wet mass 1 kg
- dithiocarbamate-compound: 7.34407e-5 kg; name biocide; = biocide_amount1 * biocide_concentration1 + biocide_amount2 * biocide_concentration2; lognormal variance with pedigree 0.04, pedigree (1,1,5,1,1)
  30.3% and 50% acqueous solutions. Proxy for biocides (50% dithiocarbamate compounds and 50% glutaraldehyde).
  property amount of exchange 1 0.0761222 kg; name biocide_amount1
  property amount of exchange 2 0.100751 kg; name biocide_amount2
  property concentration of amount 1 0.303; name biocide_concentration1
  property concentration of amount 2 0.5; name biocide_concentration2
  properties: carbon content, fossil 0.179339, dry mass 1 kg, wet mass 1 kg
- electricity, high voltage: 0.755294 kWh; lognormal variance with pedigree 0.0426, pedigree (1,4,5,1,1)
- fatty alcohol: 4.97152e-5 kg; name fatty_alcohol; = fatty_alcohol_amount_1 * fatty_alcohol_concentration; lognormal variance with pedigree 0.04, pedigree (1,1,5,1,1)
  29% aqueous solution.
  Uncertainty: Calculated variable. Uncertainty will be determined from propagation of uncertainty factors of underlying variables. Uncertainty of actual relation between variables not accounted at this time, although this could be included in a future update.
  property amount of flow 1 in kg 0.171432 kg; name fatty_alcohol_amount_1
  property concentration of solution 0.29; name fatty_alcohol_concentration
  properties: carbon content, fossil 0.0408973, carbon content, non-fossil 0.743434, dry mass 1 kg, heating value, net 41.01 MJ, wet mass 1 kg
- green liquor dregs: -0.002462 kg; name dregsAmount; lognormal variance with pedigree 0.0026, pedigree (1,4,1,1,1)
  Reported as sludge from sodium carbonate regeneration.
  production volume; name dregsProdVol; = dregsAmount * flutingMediumProdVol / flutingMediumAmount
    Calculated from production volume of fluting medium.
  properties: carbon content, non-fossil 0.390667, dry mass 0.5 kg, water content 1, wet mass 1 kg
- heat, district or industrial, other than natural gas: 0.00113423 MJ; name heatHardCoal; = heatHardCoal_fuel_input_in_kg * heatHardCoal_Net_Heat_Value*28.9 / heatHardCoal_fuel_use; lognormal variance with pedigree 0.04, pedigree (1,1,5,1,1)
  Reported as fuel input in kg. A lower heating value of 28.9 MJ/kg and a fuel use of 1.25 from underlying ecoinvent process were used.
  property Corresponding fuel use 1.25 MJ; name heatHardCoal_fuel_use; = 1/0.8
  property heating value, net 1 MJ; name heatHardCoal_Net_Heat_Value
  property kgFuel_Input 0.0490584 kg; name heatHardCoal_fuel_input_in_kg
  note on Corresponding fuel use: Lower heating value of the fuel input related to the heat/electricity output.
- heat, district or industrial, other than natural gas: 0.0180206 MJ; name heatPropane; = heatPropane_fuel_input_in_liter * propaneBuildMachine_density * propaneBuildMachine_Net_Heat_Value*46.46 / heatPropane_fuel_use; lognormal variance with pedigree 0.04, pedigree (1,1,5,1,1)
  Propane burned in boilers. Reported as fuel input in litres. A lower heating value of 46.46 MJ/l and a fuel use of 1.0526 from underlying ecoinvent process were used.
  property Corresponding fuel use 1.05263 MJ; name heatPropane_fuel_use; = 1/0.95
  property literFuel_Input 0.792792 l; name heatPropane_fuel_input_in_liter
  properties: heating value, net 1 MJ
  note on literFuel_Input: As auxiliary fuel for black liquor boiler and for building heating.
- heat, district or industrial, other than natural gas: 1.23486 MJ; name heatHFO; = heatHFO_fuel_input_in_liter * heatHFO_density * heatHFO_Net_Heat_Value*40.6 / heatHFO_fuel_use; lognormal variance with pedigree 0.04, pedigree (1,1,5,1,1)
  Reported as fuel input in litres. A lower heating value of 42.5 MJ/l and a fuel use of 1.133 from underlying ecoinvent process were used.
  property Corresponding fuel use 1.05263 MJ; name heatHFO_fuel_use; = 1/0.95
  property density 1 kg/l; name heatHFO_density
  property heating value, net 1 MJ; name heatHFO_Net_Heat_Value
  property literFuel_Input 32.0162 l; name heatHFO_fuel_input_in_liter
  note on heating value, net: net (lower) heating (calorific) value from downstream process
- iron sulfate: 0.000214148 kg; name FeSO2; = FeSO2_amount_1 * FeSO2_concentration; lognormal variance with pedigree 0.04, pedigree (1,1,5,1,1)
  66% aqueous solution.
  property amount of flow 1 in kg 0.324466 kg; name FeSO2_amount_1
  property concentration of solution 0.66; name FeSO2_concentration
  properties: dry mass 1 kg, wet mass 1 kg
- lubricating oil: 0.000176 kg; name lubOil; = ( lubOil_semichemKg * (1 - recycledContent) + lubOil_wellenstoffKg * recycledContent ) * flutingMediumAmount / 1000; lognormal variance with pedigree 0.04, pedigree (1,1,5,1,1)
  Amount estimated with emissions from the datasets "fluting medium production, semichemical, GLO 2008" and "treatment of recovered paper to fluting medium, wellenstoff, GLO 2008". The amount from these datasets were weighted according to the virgin and recycled fibre content (60% and 40% respectively).
  property amount from semichemical fluting production in kg 0.14 kg; name lubOil_semichemKg
  property amount from wellenstoff production in kg 0.23 kg; name lubOil_wellenstoffKg
  properties: carbon content, fossil 0.75, dry mass 1 kg, heating value, net 40.2 MJ, wet mass 1 kg
  note on amount from semichemical fluting production in kg: Amount from the dataset "fluting medium production, semichemical, RER 2008" per kg of fluting.
  note on amount from wellenstoff production in kg: Amount from the dataset "treatment of recovered paper to fluting medium, wellenstoff, RER 2008" per kg of fluting.
  note on carbon content, fossil: Lubricating oil is produced from diesel. C-content/dry mass of fats and oils considered 75%, from: ecoinvent v2.2 report, n 15a, pg 40
  note on heating value, net: Literature value, Source: IPCC 2006, 2006 IPCC Guidelines for National Greenhouse Gas Inventories, Prepared by the National Greenhouse Gas Inventories Programme, Eggleston H.S., Buendia L., Miwa K., Ngara T. and Tanabe K. (eds). Published: IGES, Japan
- magnesium oxide: 2.56739e-5 kg; lognormal variance with pedigree 0.0426, pedigree (1,4,5,1,1)
  properties: dry mass 1 kg, wet mass 1 kg
- maize starch: 0.00094813 kg; lognormal variance with pedigree 0.0426, pedigree (1,4,5,1,1)
  properties: carbon content, non-fossil 0.46, dry mass 0.86 kg, heating value, net 11.64 MJ, water content 0.16279, wet mass 1 kg
- monoethanolamine: 3.53947e-6 kg; = monoethanolamine_amount_1 * monoethanolamine_concentration; lognormal variance with pedigree 0.04, pedigree (1,1,5,1,1)
  40% aqueous solution.
  Uncertainty: Calculated variable. Uncertainty will be determined from propagation of uncertainty factors of underlying variables. Uncertainty of actual relation between variables not accounted at this time, although this could be included in a future update.
  property amount of flow 1 in kg 0.00884867 kg; name monoethanolamine_amount_1
  property concentration of solution 0.4; name monoethanolamine_concentration
  properties: carbon content, fossil 0.393443, dry mass 1 kg, heating value, net 25.8 MJ, wet mass 1 kg
- municipal solid waste: -0.0197096 kg; name rejectsAmount; lognormal variance with pedigree 0.0026, pedigree (1,4,1,1,1)
  Paper-related rejects. The average dry mass of the rejects is about 30%.
  production volume; name rejectsProdVol; = rejectsAmount * flutingMediumProdVol / flutingMediumAmount
    Calculated from production volume of fluting medium.
  property dry mass 0.3 kg; name MSW_DM
  property water content 2.33333; name MSW_water_content; = 0.7 / 0.3
  properties: carbon content, fossil 0.171549, carbon content, non-fossil 0.261655, heating value, net 11.74 MJ, wet mass 1 kg
  note on carbon content, fossil: MSW composition in tab 4.1, ecoinvent v2.2 report 13_I. C content referred to 1 kg DM
  note on heating value, net: Value taken from the general comment of the treatment dataset.
- nylon 6: 7.48594e-6 kg; name cloth; = cloth_amount1 * clothNylon_concentration1 + cloth_amount2 * clothNylon_concentration2; lognormal variance with pedigree 0.04, pedigree (1,1,5,1,1)
  Felt and cloth component.
  property amount of exchange 1 0.00843077 kg; name cloth_amount1
  property amount of exchange 2 0.00654111 kg; name cloth_amount2
  property concentration of amount 1 0.5; name clothNylon_concentration1
  property concentration of amount 2 0.5; name clothNylon_concentration2
  properties: carbon content, fossil 0.637168, dry mass 1 kg, heating value, net 30.9 MJ, wet mass 1 kg
  note on carbon content, fossil: It is a chain of caprolactam molecules, originating from aminocarboxylic acids - here caproic acid or caprolactam. The structure of nylon 6 is -(NH-(CH2)5-CO)n-, C6H11NO (ecoinvent v2.2 report 11_II). MW=113 g/mol
  note on heating value, net: Assumed equal to Nylon-66. Reference: Walters, R. N., Hackett, S. M. and Lyon, R. E. (2000) ‘Heats of combustion of high temperature polymers’, Fire and Materials, 24(5), pp. 245–252. doi: 10.1002/1099-1018(200009/10)24:5<245::AID-FAM744>3.0.CO;2-7.
- paper mill, integrated: 5.43478e-11 unit; name mill; = 1 / 50 / 368000; lognormal variance with pedigree 0.04, pedigree (1,1,5,1,1)
  Estimated value with lifetime (50 years) and yearly production (368 kt) of underlying ecoinvent process (integrated paper mill).
- potassium hydroxide: 6.13229e-6 kg; name KOH; = KOH_amount_1 * KOH_concentration; lognormal variance with pedigree 0.04, pedigree (1,1,5,1,1)
  45% aqueous solution.
  Uncertainty: Calculated variable. Uncertainty will be determined from propagation of uncertainty factors of underlying variables. Uncertainty of actual relation between variables not accounted at this time, although this could be included in a future update.
  property amount of flow 1 in kg 0.0136273 kg; name KOH_amount_1
  property concentration of solution 0.45; name KOH_concentration
  properties: dry mass 0.856 kg, water content 0.168224, wet mass 1 kg
- potassium nitrate: 5.67351e-7 kg; name KNO3; = KNO3_amount_1 * KNO3_concentration; lognormal variance with pedigree 0.04, pedigree (1,1,5,1,1)
  5% aqueous solution. Proxy for sodium nitrite.
  Uncertainty: Calculated variable. Uncertainty will be determined from propagation of uncertainty factors of underlying variables. Uncertainty of actual relation between variables not accounted at this time, although this could be included in a future update.
  property amount of flow 1 in kg 0.011347 kg; name KNO3_amount_1
  property concentration of solution 0.05; name KNO3_concentration
  properties: dry mass 1 kg, wet mass 1 kg
- propane, burned in building machine: 0.00279759 MJ; name propaneBuildMachine; = propaneBuildMachine_fuel_input_in_liter * propaneBuildMachine_density * propaneBuildMachine_Net_Heat_Value*46.46; lognormal variance with pedigree 0.04, pedigree (1,1,5,1,1)
  Propane burned in lift trucks. Reported as fuel input in litres. A lower heating value of 46.46 MJ/l and a density of 0.502 kg/l was used.
  property density 0.515 kg/l; name propaneBuildMachine_density
  property heating value, net 1 MJ; name propaneBuildMachine_Net_Heat_Value
  property literFuel_Input 0.116922 l; name propaneBuildMachine_fuel_input_in_liter
  note on density: http://www.cfbp.fr/proprietes-des-gpl/caracteristiques-generales-et-physico-chimiques-n305
  note on heating value, net: net (lower) heating (calorific) value (MJ/kg) Source : Table B.1 in Felder, R. M., Rousseau, R. W. (1986) Elementary Principles of Chemical Processes, 2nd ed.,Wiley
- propylene glycol, liquid: 0.000138162 kg; name propylene_glycol; = propylene_glycol_amount_1 * propylene_glycol_concentration; lognormal variance with pedigree 0.04, pedigree (1,1,5,1,1)
  30% solution.
  Uncertainty: Calculated variable. Uncertainty will be determined from propagation of uncertainty factors of underlying variables. Uncertainty of actual relation between variables not accounted at this time, although this could be included in a future update.
  property amount of flow 1 in kg 0.46054 kg; name propylene_glycol_amount_1
  property concentration of solution 0.3; name propylene_glycol_concentration
  properties: carbon content, fossil 0.473684, dry mass 1 kg, heating value, net 27.09 MJ, wet mass 1 kg
- pulpwood, hardwood, measured as solid wood under bark: 0.000614293 m3; name pulpwoodHard; = pulpwoodHard_amount1 / pulpwoodHard_DM; lognormal variance with pedigree 0.04, pedigree (1,1,5,1,1)
  Purchased wood for pulping, including bark. Reported in mass. Converted in volume with a density of 623.64 kg / m3 (0% water). This wood supply was composed of aspen, birch and hardwood. Includes bark.
  property amount of exchange 1 383.1 kg; name pulpwoodHard_amount1
  property dry mass 623.644 kg; name pulpwoodHard_DM
  properties: carbon content, non-fossil 0.494, heating value, net 6071.3 MJ, water content 0.8, wet mass 1122.56 kg
  note on heating value, net: Value based on "hardwood forestry, mixed species, sustainable forest management"The property is based on a value of 11.58MJ/kg
- pulpwood, softwood, measured as solid wood under bark: 3.70415e-5 m3; name pulpwoodSoft; = pulpwoodSoft_amount1 / pulpwoodSoft_DM; lognormal variance with pedigree 0.04, pedigree (1,1,5,1,1)
  Purchased wood for pulping, including bark. Proxy for low density hardwood (poplar). Reported in mass. Converted in volume with a density of 440 kg / m3 (0% water).
  property amount of exchange 1 16.2983 kg; name pulpwoodSoft_amount1
  property dry mass 440 kg; name pulpwoodSoft_DM
  properties: carbon content, non-fossil 0.494, heating value, net 4483.78 MJ, water content 0.8, wet mass 792 kg
  note on heating value, net: Value based on "softwood forestry, mixed species, sustainable forest management"The property is based on a value of 11.58MJ/kg
- retention aid, for paper production: 0.000274497 kg; name retentionAid; = retentionAid_amount1 * retentionAid_concentration + retentionAid_amount2 + retentionAid_amount3 * retentionAid_concentration; lognormal variance with pedigree 0.04, pedigree (1,1,5,1,1)
  50% acqueous solution and pure substance.
  property amount of exchange 1 0.31525 kg; name retentionAid_amount1
  property amount of exchange 2 0.111199 kg; name retentionAid_amount2
  property amount of exchange 3 0.011347 kg; name retentionAid_amount3
  property concentration 0.5; name retentionAid_concentration
  properties: carbon content, fossil 0.5, dry mass 1 kg, heating value, net 15.15 MJ, wet mass 1 kg
- sludge from pulp and paper production: -0.0170024 kg; name sludgeAmount; lognormal variance with pedigree 0.0026, pedigree (1,4,1,1,1)
  Primary, secondary and mixed sludges.
  production volume; name sludgeVolProd; = sludgeAmount * flutingMediumProdVol / flutingMediumAmount
    Calculated from production volume of fluting medium.
  property carbon content, non-fossil 0.21; name sludgeTotalAmount_C_content_non_fossil
  property dry mass 0.2 kg; name sludgeTotalAmount_DM
  property water content 4; name sludgeTotalAmount_water_content; = sludgeTotalAmount_WWM / sludgeTotalAmount_DM
  property water in wet mass 0.8 kg; name sludgeTotalAmount_WWM
  property wet mass 1 kg; name sludgeTotalAmount_WM
  properties: heating value, net 2.65 MJ
- soda ash, dense: 0.00908488 kg; lognormal variance with pedigree 0.0426, pedigree (1,4,5,1,1)
  Reported as "Soda ash (Na2CO3)".
  properties: carbon content, fossil 0.113208, dry mass 1 kg, heating value, net 3.43 MJ, wet mass 1 kg
- sodium hydroxide, without water, in 50% solution state: 5.22823e-5 kg; name NaOH; = NaOH_amount1 * NaOH_concentration1 + NaOH_amount2 * NaOH_concentration2 + NaOH_amount3 * NaOH_concentration3 + NaOH_amount4 * NaOH_concentration4 + NaOH_amount5 * NaOH_concentration5 + NaOH_amount6 * NaOH_concentration6; lognormal variance with pedigree 0.04, pedigree (1,1,5,1,1)
  13%, 40%, 33%, 10% and 1.5% acqueous solutions.
  property amount of exchange 1 0.18624 kg; name NaOH_amount1
  property amount of exchange 2 0.00386107 kg; name NaOH_amount2
  property amount of exchange 3 0.00413362 kg; name NaOH_amount3
  property amount of exchange 4 0.0494535 kg; name NaOH_amount4
  property amount of exchange 5 0.0694993 kg; name NaOH_amount5
  property amount of exchange 6 0.17641 kg; name NaOH_amount6
  property concentration of amount 1 0.13; name NaOH_concentration1
  property concentration of amount 2 0.13; name NaOH_concentration2
  property concentration of amount 3 0.4; name NaOH_concentration3
  property concentration of amount 4 0.33; name NaOH_concentration4
  property concentration of amount 5 0.1; name NaOH_concentration5
  property concentration of amount 6 0.015; name NaOH_concentration6
  properties: dry mass 1 kg, heating value, net 3.03 MJ, wet mass 1 kg
- sodium metasilicate pentahydrate, 58% active substance, powder: 1.298e-5 kg; name sodiummetasilicate; = sodiummetasilicate_amount_1 * sodiummetasilicate_concentration; lognormal variance with pedigree 0.04, pedigree (1,1,5,1,1)
  5% aqueous solution. Reported as sodium metasilicate.
  property amount of flow 1 in kg 0.2596 kg; name sodiummetasilicate_amount_1
  property concentration of solution 0.05; name sodiummetasilicate_concentration
  properties: dry mass 1 kg, heating value, net 5.71 MJ, wet mass 1 kg
- steel, low-alloyed: 0.000148878 kg; name chainAmount; = wasteChainAmount; lognormal variance with pedigree 0.04, pedigree (1,1,5,1,1)
  Proxy for debarking chains.
  properties: carbon content, fossil 0.005, dry mass 1 kg, wet mass 1 kg
- textile, woven cotton: 7.48594e-6 kg; name cotton; = cloth_amount1 * (1 - clothNylon_concentration1) + cloth_amount2 * (1 - clothNylon_concentration2); lognormal variance with pedigree 0.04, pedigree (1,1,5,1,1)
  Felt and cloth component.
  properties: carbon content, non-fossil 0.46, dry mass 1 kg, heating value, net 13.94 MJ, wet mass 1 kg
  note on carbon content, non-fossil: Cotton fibers are considered to have a 46% C-content in dry mass ("Evolutionary and Biochemical Aspects", A.D. Kay and T. Vrede (in Global Ecology, 2010, Elsevier B.V., S.E. Jørgensen Ed.)
- triethanolamine: 1.97814e-6 kg; = triethanolamine_amount_1 * triethanolamine_concentration; lognormal variance with pedigree 0.04, pedigree (1,1,5,1,1)
  4% aqueous solution.
  Uncertainty: Calculated variable. Uncertainty will be determined from propagation of uncertainty factors of underlying variables. Uncertainty of actual relation between variables not accounted at this time, although this could be included in a future update.
  property amount of flow 1 in kg 0.0494535 kg; name triethanolamine_amount_1
  property concentration of solution 0.04; name triethanolamine_concentration
  properties: carbon content, fossil 0.483221, dry mass 1 kg, heating value, net 26.82 MJ, wet mass 1 kg
- urea: 7.03655e-5 kg; = (urea_amount_1 * urea_concentration * 28 / 62)*2.14379903903132; lognormal variance with pedigree 0.04, pedigree (1,1,5,1,1)
  The exchange has been updated from 'urea, as N' into 'urea' and therefore its amount has been scaled (multiplied) from 0.0328 kg by 2.1438 kg of 'urea' per kg of 'urea, as N'. Original comment of the exchange is: 80% aqueous solution, CO(NH2)2. For wastewater treatment.
  Uncertainty: Calculated variable. Uncertainty will be determined from propagation of uncertainty factors of underlying variables. Uncertainty of actual relation between variables not accounted at this time, although this could be included in a future update.
  property amount of flow 1 in kg 0.0908488 kg; name urea_amount_1
  property concentration of solution 0.8; name urea_concentration
  properties: carbon content, fossil 0.2, dry mass 1 kg, wet mass 1 kg
  note on concentration of solution: Weighted average of three different concentrations used in different stages of the process
- waste mineral oil: -9e-5 kg; name wasteMineralOilAmount; = (( wasteMineralOilAmount_semichemKg * (1 - recycledContent) + wasteMineralOilAmount_wellenstoffKg * recycledContent) * flutingMediumAmount / 1000)
  Amount estimated with emissions from the datasets "fluting medium production, semichemical, GLO 2008" and "treatment of recovered paper to fluting medium, wellenstoff, GLO 2008". The amount from those datasets were weighted according to the virgin and recycled fibre content (60% and 40% respectively).
  production volume; = wasteMineralOilAmount * flutingMediumProdVol / flutingMediumAmount
    Calculated from production volume of fluting medium.
  property amount from semichemical fluting production in kg 0.07 kg; name wasteMineralOilAmount_semichemKg
  property amount from wellenstoff production in kg 0.12 kg; name wasteMineralOilAmount_wellenstoffKg
  properties: carbon content, fossil 0.864444, dry mass 0.9 kg, heating value, net 34.7 MJ, water content 0.111111, wet mass 1 kg
  note on carbon content, fossil: Tab A.6, ecoinvent v2.2 report 13_I. C content has been calculated after data in the tables, and then referred to 1 kg DM
- waste paperboard, sorted: 0.417428 kg; name recoveredPaperAmount_1; lognormal variance with pedigree 0.0426, pedigree (1,4,5,1,1)
  Multiple waste paperboard sources. Amounts reported as 5% water on a wet mass basis.
  properties: carbon content, non-fossil 0.483259, dry mass 0.804 kg, heating value, net 15.92 MJ, water content 0.243781, wet mass 1 kg
- waste reinforcement steel: -0.000148878 kg; name wasteChainAmount; lognormal variance with pedigree 0.0026, pedigree (1,4,1,1,1)
  Proxy for debarking chains end of life.
  production volume; name wasteChainProdVol; = wasteChainAmount * flutingMediumProdVol / flutingMediumAmount
    Calculated from production volume of fluting medium.
  properties: carbon content, non-fossil 0.005, dry mass 1 kg, wet mass 1 kg
- wood chips, wet, measured as dry mass: 0.825911 kg; name woodChipsWet; = woodChipsDry_amount1 + woodChipsDry_amount2 + woodChipsWet_amountKg3; lognormal variance with pedigree 0.0426, pedigree (1,4,5,1,1)
  Purchased wood from sawmills (mostly) and forests for pulping and energy production. This wood supply was composed of aspen, birch, hardwood and softwood (energy production only).
  property amount of exchange in kg 1 435.611 kg; name woodChipsDry_amount1
  property amount of exchange in kg 2 334.246 kg; name woodChipsDry_amount2
  property amount of exchange in kg 3 56.0537 kg; name woodChipsWet_amountKg3
  properties: carbon content, non-fossil 0.494, dry mass 1 kg, heating value, net 10.84 MJ, water content 1.1, wet mass 2.1 kg
  note on heating value, net: Value based on the dataset 'softwood forestry, mixed species, sustainable forest management'

## Inputs from nature
- Water, river [natural resource, in water]: 0.013836 m3; lognormal variance with pedigree 0.0418, pedigree (2,3,5,1,1)
  Calculated value considering:
  - moisture in material inputs
  - moisture in material outputs
  - moisture in waste outputs
  - sheet drying evaporation
  - black liquor combustion
  - wood residue combustion

## Emissions to nature
- Acetaldehyde [air, unspecified]: 4.48625e-7 kg; lognormal variance with pedigree 0.092, pedigree (3,4,5,1,3)
  Estimation based on dry biomass (0% water) input data and emission factors from the ecoinvent 2.2 dataset "Wood chips, from industry, mixed, burned in furnace 300kW/CH U". In this case, biomass included purchased wood chips for steam production, black liquor (proxy) and wood process residues (proxy). The corresponding emissions from wood chips and residues were calculated using a bulk density of 189 kg/m3, assuming a constant lower heating value. A lower heating value of 11.2 MJ/kg on a dry mass basis was used to estimate emissions from black liquor (Source: Sixta, H. (2006). Handbook of Pulp. Weinheim: Wiley-VCH. Table 9.2.).
- Ammonia [air, unspecified]: 1.27234e-5 kg; lognormal variance with pedigree 0.092, pedigree (3,4,5,1,3)
  (same comment as for Acetaldehyde)
- Arsenic ion [air, unspecified]: 7.35466e-9 kg; lognormal variance with pedigree 0.092, pedigree (3,4,5,1,3)
  (same comment as for Acetaldehyde)
- Benzene [air, unspecified]: 6.69238e-6 kg; lognormal variance with pedigree 0.092, pedigree (3,4,5,1,3)
  (same comment as for Acetaldehyde)
- Benzo(a)pyrene [air, unspecified]: 3.67724e-9 kg; lognormal variance with pedigree 0.092, pedigree (3,4,5,1,3)
  (same comment as for Acetaldehyde)
- Bromine [air, unspecified]: 4.41271e-7 kg; lognormal variance with pedigree 0.092, pedigree (3,4,5,1,3)
  (same comment as for Acetaldehyde)
- Cadmium II [air, unspecified]: 5.14795e-9 kg; lognormal variance with pedigree 0.702, pedigree (3,4,5,1,3)
  (same comment as for Acetaldehyde)
- Calcium II [air, unspecified]: 4.30237e-5 kg; lognormal variance with pedigree 0.092, pedigree (3,4,5,1,3)
  (same comment as for Acetaldehyde)
- Carbon dioxide, non-fossil [air, unspecified]: 0.722929 kg; lognormal variance with pedigree 0.0526, pedigree (3,4,5,1,3)
  Estimation based on dry biomass (0% water) input data and emission factors from the ecoinvent 2.2 dataset "Wood chips, from industry, mixed, burned in furnace 300kW/CH U". In this case, biomass included purchased wood chips for steam production, black liquor (proxy) and wood process residues (proxy). The corresponding emissions from wood chips and residues were calculated using a bulk density of 189 kg/m3, assuming a constant lower heating value. A lower heating value of 11.2 MJ/kg on a dry mass basis was used to estimate emissions from black liquor (Source: Sixta, H. (2006). Handbook of Pulp. Weinheim: Wiley-VCH. Table 9.2.). A comparison with confidential CO2, CH4 and N2O emission factors for black liquor led to a 7% difference of CO2eq for the sum of those three greenhouse gases.
- Carbon monoxide, non-fossil [air, unspecified]: 0.000353016 kg; lognormal variance with pedigree 0.702, pedigree (3,4,5,1,3)
  (same comment as for Acetaldehyde)
- Chlorine [air, unspecified]: 1.3238e-6 kg; lognormal variance with pedigree 0.092, pedigree (3,4,5,1,3)
  (same comment as for Acetaldehyde)
- Chromium III [air, unspecified]: 2.91239e-8 kg; lognormal variance with pedigree 0.702, pedigree (3,4,5,1,3)
  (same comment as for Acetaldehyde)
- Chromium VI [air, unspecified]: 2.94178e-10 kg; lognormal variance with pedigree 0.702, pedigree (3,4,5,1,3)
  (same comment as for Acetaldehyde)
- Copper ion [air, unspecified]: 1.61797e-7 kg; lognormal variance with pedigree 0.702, pedigree (3,4,5,1,3)
  (same comment as for Acetaldehyde)
- Dinitrogen monoxide [air, unspecified]: 1.8386e-5 kg; lognormal variance with pedigree 0.092, pedigree (3,4,5,1,3)
  (same comment as for Carbon dioxide, non-fossil)
- Dioxins, measured as 2,3,7,8-tetrachlorodibenzo-p-dioxin [air, unspecified]: 2.2799e-13 kg; lognormal variance with pedigree 0.092, pedigree (3,4,5,1,3)
  (same comment as for Acetaldehyde)
- Ethyl benzene [air, unspecified]: 2.20635e-7 kg; lognormal variance with pedigree 0.092, pedigree (3,4,5,1,3)
  (same comment as for Acetaldehyde)
- Fluorine [air, unspecified]: 3.67724e-7 kg; lognormal variance with pedigree 0.092, pedigree (3,4,5,1,3)
  (same comment as for Acetaldehyde)
- Formaldehyde [air, unspecified]: 9.56093e-7 kg; lognormal variance with pedigree 0.092, pedigree (3,4,5,1,3)
  (same comment as for Acetaldehyde)
- Hexachlorobenzene [air, unspecified]: 5.29512e-14 kg; lognormal variance with pedigree 0.092, pedigree (3,4,5,1,3)
  (same comment as for Acetaldehyde)
- Hydrocarbons, aliphatic, alkanes, unspecified [air, unspecified]: 6.69238e-6 kg; lognormal variance with pedigree 0.092, pedigree (3,4,5,1,3)
  (same comment as for Acetaldehyde)
- Hydrocarbons, aliphatic, unsaturated [air, unspecified]: 2.2799e-5 kg; lognormal variance with pedigree 0.092, pedigree (3,4,5,1,3)
  (same comment as for Acetaldehyde)
- Lead II [air, unspecified]: 1.8386e-7 kg; lognormal variance with pedigree 0.702, pedigree (3,4,5,1,3)
  (same comment as for Acetaldehyde)
- Magnesium [air, unspecified]: 2.64761e-6 kg; lognormal variance with pedigree 0.092, pedigree (3,4,5,1,3)
  (same comment as for Acetaldehyde)
- Manganese II [air, unspecified]: 1.25026e-6 kg; lognormal variance with pedigree 0.702, pedigree (3,4,5,1,3)
  (same comment as for Acetaldehyde)
- Mercury II [air, unspecified]: 2.20635e-9 kg; lognormal variance with pedigree 0.702, pedigree (3,4,5,1,3)
  (same comment as for Acetaldehyde)
- Methane, non-fossil [air, unspecified]: 2.94178e-6 kg; lognormal variance with pedigree 0.092, pedigree (3,4,5,1,3)
  (same comment as for Carbon dioxide, non-fossil)
- NMVOC, non-methane volatile organic compounds [air, unspecified]: 4.41271e-6 kg; lognormal variance with pedigree 0.092, pedigree (3,4,5,1,3)
  (same comment as for Acetaldehyde)
- Nickel II [air, unspecified]: 4.41271e-8 kg; lognormal variance with pedigree 0.702, pedigree (3,4,5,1,3)
  (same comment as for Acetaldehyde)
- Nitrogen oxides [air, unspecified]: 0.000786932 kg; lognormal variance with pedigree 0.092, pedigree (3,4,5,1,3)
  (same comment as for Acetaldehyde)
- PAH, polycyclic aromatic hydrocarbons [air, unspecified]: 8.16367e-8 kg; lognormal variance with pedigree 0.352, pedigree (3,4,5,1,3)
  (same comment as for Acetaldehyde)
- Particulate Matter, < 2.5 um [air, unspecified]: 0.000338307 kg; lognormal variance with pedigree 0.352, pedigree (3,4,5,1,3)
  (same comment as for Acetaldehyde)
- Pentachlorophenol [air, unspecified]: 5.95696e-11 kg; lognormal variance with pedigree 0.092, pedigree (3,4,5,1,3)
  (same comment as for Acetaldehyde)
- Phosphorus [air, unspecified]: 2.20635e-6 kg; lognormal variance with pedigree 0.092, pedigree (3,4,5,1,3)
  (same comment as for Acetaldehyde)
- Potassium I [air, unspecified]: 0.000172095 kg; lognormal variance with pedigree 0.702, pedigree (3,4,5,1,3)
  (same comment as for Acetaldehyde)
- Sodium I [air, unspecified]: 9.56093e-6 kg; lognormal variance with pedigree 0.092, pedigree (3,4,5,1,3)
  (same comment as for Acetaldehyde)
- Sulfur oxides [air, unspecified]: 1.8386e-5 kg; lognormal variance with pedigree 0.0526, pedigree (3,4,5,1,3)
  (same comment as for Acetaldehyde)
- Toluene [air, unspecified]: 2.20635e-6 kg; lognormal variance with pedigree 0.092, pedigree (3,4,5,1,3)
  (same comment as for Acetaldehyde)
- Water [air, unspecified]: 0.00153362 m3; name waterAir; lognormal variance with pedigree 0.0426, pedigree (1,4,5,1,1)
  Calculated value considering:
  - sheet drying evaporation
  - black liquor combustion
  - wood residue combustion (bark, sludge)
- Zinc II [air, unspecified]: 2.20635e-6 kg; lognormal variance with pedigree 0.702, pedigree (3,4,5,1,3)
  (same comment as for Acetaldehyde)
- m-Xylene [air, unspecified]: 8.82551e-7 kg; lognormal variance with pedigree 0.092, pedigree (3,4,5,1,3)
  (same comment as for Acetaldehyde)
- AOX, Adsorbable Organic Halides [water, unspecified]: 2.48e-7 kg; name AOXWater; = (AOXWater_wellenstoffKg * recycledContent) * flutingMediumAmount; lognormal variance with pedigree 0.04, pedigree (1,1,5,1,1)
  (same comment as for lubricating oil)
  property amount from wellenstoff production in kg 6.2e-7 kg; name AOXWater_wellenstoffKg; = 0.00062 / 1000
- Ammonium [water, unspecified]: 6.4e-6 kg; name NH4Water; = (NH4Water_wellenstoffKg * recycledContent) * flutingMediumAmount; lognormal variance with pedigree 0.04, pedigree (1,1,5,1,1)
  (same comment as for lubricating oil)
  property amount from wellenstoff production in kg 1.6e-5 kg; name NH4Water_wellenstoffKg; = 0.016 / 1000
- BOD5, Biological Oxygen Demand [water, surface water]: 3.52766e-5 kg; lognormal variance with pedigree 0.082, pedigree (1,4,5,1,1)
  Effluent characterization measured at the factory.
- COD, Chemical Oxygen Demand [water, surface water]: 0.00014752 kg; name COD; lognormal variance with pedigree 0.082, pedigree (1,4,5,1,1)
  Effluent characterization measured at the factory.
- Chlorides, unspecified [water, unspecified]: 0.000304 kg; name ChlorideWater; = (ChlorideWater_wellenstoffKg * recycledContent) * flutingMediumAmount; lognormal variance with pedigree 0.04, pedigree (1,1,5,1,1)
  (same comment as for lubricating oil)
  property amount from wellenstoff production in kg 0.00076 kg; name ChlorideWater_wellenstoffKg; = 0.76 / 1000
- Copper ion [water, unspecified]: 1.08e-8 kg; name CuWater; = (CuWater_wellenstoffKg * recycledContent) * flutingMediumAmount; lognormal variance with pedigree 0.04, pedigree (1,1,5,1,1)
  (same comment as for lubricating oil)
  property amount from wellenstoff production in kg 2.7e-8 kg; name CuWater_wellenstoffKg; = 2.7E-05 / 1000
- DOC, Dissolved Organic Carbon [water, surface water]: 5.46371e-5 kg; = TOC; lognormal variance with pedigree 0.04, pedigree (1,1,5,1,1)
  No data available for DOC. DOC=TOC as proposed by ecoinvent Data Quality Guidelines.
- Nitrogen [water, unspecified]: 0.0003164 kg; name NWater; = (NWater_semichemKg * (1 - recycledContent) + NWater_wellenstoffKg * recycledContent) * flutingMediumAmount; lognormal variance with pedigree 0.04, pedigree (1,1,5,1,1)
  (same comment as for lubricating oil)
  property amount from semichemical fluting production in kg 0.0005 kg; name NWater_semichemKg; = 0.5 / 1000
  property amount from wellenstoff production in kg 4.1e-5 kg; name NWater_wellenstoffKg; = 0.041 / 1000
- Phosphorus [water, unspecified]: 1.524e-5 kg; name PWater; = ( PWater_semichemKg * (1 - recycledContent) + PWater_wellenstoffKg * recycledContent) * flutingMediumAmount; lognormal variance with pedigree 0.04, pedigree (1,1,5,1,1)
  (same comment as for lubricating oil)
  property amount from semichemical fluting production in kg 2.2e-5 kg; name PWater_semichemKg; = 0.022 / 1000
  property amount from wellenstoff production in kg 5.1e-6 kg; name PWater_wellenstoffKg; = 0.0051 / 1000
- Suspended solids, unspecified [water, surface water]: 4.97079e-5 kg; lognormal variance with pedigree 0.082, pedigree (1,4,5,1,1)
  Effluent characterization measured at the factory.
- TOC, Total Organic Carbon [water, surface water]: 5.46371e-5 kg; name TOC; = COD / 2.7; lognormal variance with pedigree 0.04, pedigree (1,1,5,1,1)
  No data available for TOC. TOC=COD/2.7 as proposed by ecoinvent Data Quality Guidelines.
- Water [water, surface water]: 0.0129609 m3; lognormal variance with pedigree 0.0426, pedigree (1,4,5,1,1)
  To river.
- Zinc II [water, unspecified]: 4.8e-8 kg; name ZnWater; = (ZnWater_wellenstoffKg * recycledContent ) * flutingMediumAmount; lognormal variance with pedigree 0.04, pedigree (1,1,5,1,1)
  (same comment as for lubricating oil)
  property amount from wellenstoff production in kg 1.2e-7 kg; name ZnWater_wellenstoffKg; = 0.00012 / 1000

## Sampling procedure
Most data are primary data from a mill located in the province of Québec. Note on representativeness percent, value based on Québec production capacity.

## Review by Emilia Moreno Ruiz 2015-09-28
activity links added

## Review by Emilia Moreno Ruiz 2015-10-16
broken formula fix
