# lithium hexafluorophosphate production

Dataset: EcoSpold 2, unit process
Geography: RoW
Time period: 2009-01-01 to 2023-12-31
Technology level: current
Classification: EcoSpold01Categories: chemicals/inorganics
Classification: ISIC rev.4 ecoinvent: 2011:Manufacture of basic chemicals
Tags: ConvertedDataset
Scenario: Business-as-Usual
System model: Allocation, cut-off by classification
Generated by: Dominic Notter
Published in: Hischier, R. 2009
Database: ecoinvent
isCopyrightProtected: true
accessRestrictedTo: 1

## General comment
The dataset can be used as conductive salt for a lithium-ion battery. Data are based on patents. For infrastructure, the ecoinvent dataset "chemical plant, organics" is accounted. Transportation efforts are based on ecoinvent standard estimates.
[This dataset was already contained in the ecoinvent database version 2. It was not individually updated during the transfer to ecoinvent version 3. Life Cycle Impact Assessment results may still have changed, as they are affected by changes in the supply chain, i.e. in other datasets. This dataset was generated following the ecoinvent quality guidelines for version 2. It may have been subject to central changes described in the ecoinvent version 3 change report (http://www.ecoinvent.org/database/ecoinvent-version-3/reports-of-changes/), and the results of the central updates were reviewed extensively. The changes added e.g. consistent water flows and other information throughout the database. The documentation of this dataset can be found in the ecoinvent reports of version 2, which are still available via the ecoinvent website. The change report linked above covers all central changes that were made during the conversion process.]

## Included activities end
This dataset includes the reaction of lithium fluoride, phosphorous pentachloride and hydrogen fluoride in an autoclave to lithium hexafluorophosphate and hydrogen chloride. Conversion factor for lithium is 86.7%. The reaction temperatur is -78°C. Assumption: Cooling happens with a heat pump (coefficient of performance = 1.5). Neutralisation of hydrogen flouride and hydrogen chloride with potassium hydroxide. Phosphorous trifluoride is proxy for phosphorous pentafluoride for emission to air. Transports according to ecoinvent standards.For infrastructure, the ecoinvent dataset "chemical plant, organics" is accounted.

## Geography
Some Swiss or European datasets are used for global processes.

## Parameters
- fraction, process water, to air: 0.15 dimensionless; name fraction_PW_to_air; lognormal variance with pedigree 0.092025, pedigree (4,4,3,2,4)
  Literature value. In case when no industry/process specific data are available, default evaporation fraction value is used. This value is 15% and is based on literature (Statistics Canada, 2007 & Shaffer, K.H., 2008, Consumptive water use in the Great Lakes Basin, USGS & Shiklomanov, 2003, World Water Resources at the Beginning of the 21st Century) and has been approved by an expert.
- fraction, tap water, to air: 0.15 dimensionless; name fraction_TW_to_air; = fraction_PW_to_air; lognormal variance with pedigree 0.092025, pedigree (4,4,3,2,4)
  Calculated value. See comment in the other parametres present in this dataset. Tap water is considered to be always used as process water, thus process water fractions to air are applied to all tap water input flows to calculate the amount of water consumed in the processes.

## Reference product
- lithium hexafluorophosphate: 1 kg; By-product classification allocatable product; CPC 34231: Chemical elements n.e.c.; inorganic acids except phosphoric, nitric and sulphonitric; inorganic oxygen compoun[…]; HS2017 282510: Hydrazine and hydroxylamine and their inorganic salts; CAS 21324-40-3
  EcoSpold01Location=CN
  production volume 3.80251 kg
    This is a placeholder value that does not reflect real-world production volumes. This dataset does not currently require a real-world production volume to work in the database framework, and no actual data were collected yet. This has no negative effect on the results of the ecoinvent database.
  property price 12.2902 EUR2005
    Calculated based on inputs: The price of the product has been calculated as a sum of the values of the material and energy inputs for this product. This value is therefore a rough estimation. It may underestimate the real price since there are additional expenses when producing any product. These expences can include for example labour costs, treatment of waste materials and profit for the producer. Please consider carefully whether this level of data quality is acceptable for your application.
  properties: carbon allocation 0 kg, carbon content 0, carbon content, fossil 0, carbon content, non-fossil 0, dry mass 1 kg, water content 0, water in wet mass 0 kg, wet mass 1 kg

## Inputs from technosphere
- chemical factory, organics: 4e-10 unit; lognormal variance with pedigree 0.448, pedigree (5,5,5,5,3)
  EcoSpold01Location=RER
- electricity, medium voltage: 0.000703773, 6.25948e-5, 0.00545758, 0.00715163, 0.00757361, 0.00385762, 0.000532796, 0.00337221, 0.000142349, 0.0227908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 kWh (47 suppliers, which the file names only by identifier); sum of these 0.54074 kWh; lognormal variance with pedigree 0.052, pedigree (1,1,5,5,1)
  composite
  EcoSpold01Location=CN
- hydrogen fluoride: 1.02711, 3.01329 kg (2 suppliers, which the file names only by identifier); sum of these 4.0404 kg; lognormal variance with pedigree 0.0546, pedigree (2,4,5,5,1)
  EcoSpold01Location=GLO
  properties: dry mass 1 kg, heating value, net 6.06 MJ, wet mass 1 kg
- lime, hydrated, packed: 0.0625989, 7.3747 kg (2 suppliers, which the file names only by identifier); sum of these 7.4373 kg; lognormal variance with pedigree 0.318, pedigree (4,5,5,5,5)
  EcoSpold01Location=CH
  properties: dry mass 0.997 kg, water content 0.00300903, wet mass 1 kg
- limestone residue: -6.19087e-11, -8.607 kg (2 suppliers, which the file names only by identifier); sum of these -8.607 kg; lognormal variance with pedigree 0.244, pedigree (4,4,3,5,5)
  EcoSpold01Location=CH
  production volume
    Calculated from the production volume of lithium hexafluorophosphate in proportion to the respective output amounts.
  properties: carbon content, fossil 0.120005, dry mass 0.995 kg, water content 0.00502513, wet mass 1 kg
  note on carbon content, fossil: The waste is characterised as 'calcium carbonate waste' (CaCO3)
- lithium fluoride: 0.19697 kg; lognormal variance with pedigree 0.0546, pedigree (2,4,5,5,1)
  EcoSpold01Location=CN
  properties: dry mass 1 kg, wet mass 1 kg
- nitrogen, liquid: 0.000981253, 0.000269347 kg (2 suppliers, which the file names only by identifier); sum of these 0.0012506 kg; lognormal variance with pedigree 0.072, pedigree (4,4,5,5,1)
  EcoSpold01Location=RER
  properties: dry mass 1 kg, wet mass 1 kg
- phosphorus pentachloride: 1.9765 kg; lognormal variance with pedigree 0.0546, pedigree (2,4,5,5,1)
  EcoSpold01Location=CN
  properties: dry mass 1 kg, wet mass 1 kg
- tap water: 4.25094 kg; name tap_water_input; lognormal variance with pedigree 0.090625, pedigree (4,4,5,2,4)
  Estimated. The amount of added tap water is equal to the amount of wastewater and losses (water to air).
  properties: carbon content, fossil 0.00178991, dry mass 0.000337476 kg, water content 2962.17, wet mass 1 kg
  note on carbon content, fossil: Bicarbonate content is 2.93 mol/m3. CO2 content is 0.1 mol/m3 (ecoinvent v2.2 report 8, Tab 93.1).
- wastewater, average: -1.73894e-5, -0.00289367, -0.000691936, -1.03026e-5 m3 (4 suppliers, which the file names only by identifier); sum of these -0.0036133 m3; lognormal variance with pedigree 0.244, pedigree (4,4,3,5,5)
  EcoSpold01Location=CH
  production volume
    (same comment as for limestone residue)
  properties: carbon content, non-fossil 0.194039, dry mass 0.346837 kg, water content 2882.2, wet mass 1000 kg
  note on carbon content, non-fossil: 0.0673 kg TOC/m3 (Tab A.17, ecoinvent v2.2 report 13_I). TOC was considered as Total Carbon.

## Emissions to nature
- Phosphorus trichloride [air, urban air close to ground]: 0.26288 kg; lognormal variance with pedigree 0.0946, pedigree (2,4,5,5,1)
- Water [air, unspecified]: 0.000637641 m3; name water_to_air_unspecified; = (tap_water_input/1000)*fraction_TW_to_air; lognormal variance with pedigree 0.130025, pedigree (4,4,5,2,4)
  Calculated value based on literature values and expert opinion. See comments in the parametres' comment field.
  property fraction, origin: fresh water 1; name fraction_origin_fresh_water
  property fraction, origin: salt water 0; name fraction_origin_salt_water
  property fraction, origin: unspecified 0; name fraction_origin_unspecified

## Sampling procedure
patent, website, ecoinvent

## Extrapolations
see Geography This dataset has been copied from an original dataset covering the geography CN. The uncertainty has been adjusted accordingly.

## Review by Christian Bauer 2010-02-08
passed
