# electricity production, photovoltaic, 3kWp facade installation, multi-Si, laminated, integrated

Dataset: EcoSpold 2, unit process
Geography: RoW
Time period: 2008-01-01 to 2023-12-31
Technology level: current
Classification: ISIC rev.4 ecoinvent: 3510:Electric power generation, transmission and distribution
Classification: EcoSpold01Categories: photovoltaic/power plants
Synonyms: multi-crystalline; PV-module; Solar module; polycrystalline; silicon
Tags: photovoltaic power
Scenario: Business-as-Usual
System model: Allocation, cut-off by classification
Generated by: Karin Treyer
Published in: Jungbluth N. 2012
Database: ecoinvent
isCopyrightProtected: true
accessRestrictedTo: 1

## General comment
This dataset represents the production of grid-connected low voltage electricity with a 3 kWp building integrated photovoltaic (PV) module worldwide in 2011 as an extrapolation from Switzerland.. The 3 kWp module has been chosen as basic module for building integrated PV electricity production. Larger modules can easily be built with these 3 kWp modules without producing a significant error in environmental impact calculations. The module is a multi-Si laminate installed at a façade.
An inverter is used to convert the low voltage DC power into AC power.
An average yield of 1099 kWh/kWp was assumed for the calculations including a façade factor.

## Included activities start
From the PV module installed and ready to be used.

## Included activities end
This activity ends with low voltage electricity produced with the 3 kWp module, assuming an average yield.

This dataset includes tap water use for cleaning the module and it’s treatment.

## Technology
Electricity production with a grid-connected 3 kWp multi-Si photovoltaic laminate mounted on a building façade. See field "extrapolation" for comment on the output voltage.

## Parameters
- Facade factor: 0.667 dimensionless; name facade; lognormal variance with pedigree 0.212, pedigree (5,5,5,5,5)
  Ratio between the annual solar yield at façade and the annual solar yield at roof-top.
- Panel area for one 3 kWp unit, mc-Si: 22.1 m2/unit; name panel_area_mcSi; lognormal variance with pedigree 0.0199, pedigree (4,3,2,3,3)
  Literature value. Jungbluth N., Stucki M., Flury K., Frischknecht R. and Buesser S. (2012) Life Cycle Inventories of Photovoltaic Power Production. ESU-services Ltd., Uster, CH, retrieved from: www.esu-services.ch/data/public-lci-reports/
  Tab. 12.3, p.127
- Share 3kWp facade installation, multi-Si, laminated, integrated, at building: 0.0077 dimensionless; name pv_3fi_mSi_lib; lognormal variance with pedigree 0.1782, pedigree (4,5,2,5,5)
  Literature values, calculated value.
  Calculated from the shares of different types of cells in 2008 (European Photovoltaic Technology Platform 2012) and the shares of different types of mounting systems (Jungbluth et al. 2012). The latter shares are valid for Europe (RER) and do not take into account open ground PV plants. Due to lack of data for other regions or even countries on the world, the shares have been taken as calculation basis for all PV datasets. Uncertainty has been adjusted accordingly. The shares are taken to calculate all combinations of cell and mounting systems types at buildings. The final calculation then took into account the share of open ground plants, representing 35.2% of grid-connected installed capacity on the world (2008) (IEA-PVPS 2009).
  Data:
  Shares of different types of cells:
  - multi-Si: 47.7%
  - single-Si: 38.3%
  - CdTe: 6.4%
  - a-Si: 5.1%
  - ribbon-Si: 1.5%
  - CIS: 1.0%
  Shares of different types of mounting systems:
  - slanted-roof installation, panel, mounted, on roof: 65%
  - flat roof installation, on roof: 20%
  - facade installation, panel, mounted, at building: 10%
  - facade installation, laminated, integrated, at building: 2.5%
  - slanted-roof installation, laminated, integrated, on roof: 2.5%
  Sources:
  - European Photovoltaic Technology Platform. 2012. Photovoltaic Fact Sheets. The status of the PV industry (2008). LB-32-10-251-EN-D. retrieved from <http://www.eupvplatform.org/publications/misperceptions-fact-sheets.html#c2242> (accessed 31.01.2012)
  - Jungbluth N., Stucki M., Flury K., Frischknecht R. and Buesser S. (2012) Life Cycle Inventories of Photovoltaic Power Production. ESU-services Ltd., Uster, CH, retrieved from: www.esu-services.ch/data/public-lci-reports
  - IEA - PVPS 2009. Trends in photovoltaic applications. Survey report of selected IEA countries between 1992 and 2008. International Energy Agency (IEA) and Photovoltaic Power Systems Programme (PVPS). Report IEA-PVPS T1-18:2009
  Uncertainty: Basic data for the calculations are valid for Europe. Please see the general parameter comment for further discussion.
- Yield (Output), photovoltaics: 1099 kWh/kWp; name yield; lognormal variance with pedigree 0.010725, pedigree (4,2,1,2,2)
  Literature value / calculated value. Annual output (yield), roof-top [kWh* kWp-1*y-1]
  Weighted average (installed capacity kWp) of 30 countries based on six sources:
  AU, AT, BE, CA, CH, CZ, DE, DK, ES, FI, FR, GB, GR, HU, IN, IT, JP, KR, LU, MX, MY, NL, PT, SE, SI, TH, TW, ZA.
  Yield sources:
  1 - IEA. 2008: Analysis of PV system´s values beyond energy. International Energy Agency (IEA), Paris Cedex (FR)
  2 - IEA. 2006 Compared assessment of selected environmental indicators of PV electricity in OECD cities. International Energy Agency (IEA), Paris Cedex (FR)
  3 - JRC. 2011. Photovoltaic Geographical Information System - Interactive Maps.European Commission - Joint Research Centre (JRC) - European Solar Test Installation. http://re.jrc.ec.europa.eu/pvgis/apps4/pvest.php
  4 - McKinsey. 2008. The economics of solar power. TheMcKinsey Quarterly, Energy, Resources, Materials. June 2008.
  5 - Sopian, K., Haris, A.H., Rouss, D., Yusof, M.A. 2005. Building Integrated Photovoltaic (BIPV) in Malaysia - Potential, Current Status Strategies For Long Term Cost Reduction. ISESCO Science and Technology Vision. Volume 1 - May 2005 (40-44)
  6 - CONUEE. 2009. Market Niches for Grid-connected Photovoltaic Systems in Mexico. Comisión Nacional para el Uso Eficiente de la Energía (Conuee)
  Installed capacity sources:
  7 - IEA. 2010. Trends in Photovoltaic Applications:Survey report of selected IEA countries between1992 and 2009. International Energy Agency (IEA), Report IEA-PVPS T1-19:2010, Paris Cedex (FR)
  8 - Eurobserver, 2010. Photovoltaic barometer. Systèmes Solaires - le journal du photovoltaïque; Baromètre Photovoltaïque - Eurobserver Nr.3, avril 2010.
  9 - Eurobserver, 2011. Photovoltaic barometer. Systèmes Solaires - le journal du photovoltaïque; Baromètre Photovoltaïque - Eurobserver Nr.5, avril 2011.
  10 - EPIA.Global Market Outlook for Photovoltaics until 2015. European Photovoltaic Industry Association.
  Uncertainty: Use of different sources.
- Yield (Output), photovoltaics, corrected: 1011.08 kWh/kWp; name yield_corr; = yield*corr
  Estimated value. The annual yield is corrected with a correction factor of 0.92 according to Jungbluth et al. 2012.
  Annual output (yield), roof-top [kWh* kWp-1*y-1]
- capacity: 0.003 MW; lognormal variance with pedigree 0.001925, pedigree (2,2,1,2,2)
  Capacity of the photovoltaic cell in MWp per installation unit [MWp/unit]
- correction factor: 0.92 dimensionless; name corr; lognormal variance with pedigree 0.0175, pedigree (4,3,2,3,3)
  Estimation. Literature data on the yield for optimum installation and not real performance in the country have been corrected with a factor of 92% according to experiences in Switzerland for average production. This is based on the ratio of actual yield and published IEA data (820/892 = 0.92 - see Jungbluth et al. 2012 for detailed discussion)
- fraction, process water, to air: 0.15 dimensionless; name fraction_PW_to_air; lognormal variance with pedigree 0.092025, pedigree (4,4,3,2,4)
  Literature value. In case when no industry/process specific data are available, default evaporation fraction value is used. This value is 15% and is based on literature (Statistics Canada, 2007 & Shaffer, K.H., 2008, Consumptive water use in the Great Lakes Basin, USGS & Shiklomanov, 2003, World Water Resources at the Beginning of the 21st Century) and has been approved by an expert.
- fraction, tap water, to air: 0.15 dimensionless; name fraction_TW_to_air; = fraction_PW_to_air; lognormal variance with pedigree 0.092025, pedigree (4,4,3,2,4)
  Calculated value. See comment in the other parametres present in this dataset. Tap water is considered to be always used as process water, thus process water fractions to air are applied to all tap water input flows to calculate the amount of water consumed in the processes.
- lifetime: 30 year; lognormal variance with pedigree 0.026625, pedigree (4,3,3,2,3)
  Oral communication. Gnos, S. 2002. Personal Communication, 10.2002. NET AG, Switzerland
- losses from gross electricity production: 0.05 dimensionless; name gross_net_electricity; lognormal variance with pedigree 0.0167, pedigree (3,3,1,3,3)
  Estimation. The factor for the loss of electricity from gross to net electricity production is an assumption based on experiences and expertise (5% losses for photovoltaics).
- water use for cleaning photovoltaic panels: 20 l/m2; name water_pv_panels_cleaning; lognormal variance with pedigree 0.1227, pedigree (5,4,5,3,4)
  Estimation

## Reference product
- electricity, low voltage: 1 kWh; By-product classification allocatable product; CPC 17100: Electrical energy; HS2017 271600: Electrical energy
  EcoSpold01Location=CH
  production volume 2.82321e7 kWh; name apv
    Assumption. Value as the only local dataset (Switzerland) multiplied with a factor 10.
  property price 0.107 EUR2005
    Temporary price data. Calculated as 90% of purchasers price based on: IEA Key world energy statistics 2004 (www.iea.org/textbase/nppdf/free/2004/keyworld2004.pdf)
  properties: carbon allocation 0 kg, carbon content 0

## Inputs from technosphere
- photovoltaic facade installation, 3kWp, multi-Si, laminated, integrated, at building: 1.64758e-5 unit; name installation; = 1/(lifetime*(capacity*1000)*yield_corr*facade); lognormal variance with pedigree 0.0221, pedigree (3,2,4,5,1)
  EcoSpold01Location=CH
  Calculated value. Lifetime*capacity*annual yield = y * kWp/unit * kWh/(kWp*y) = kWh/unit and then the reciproke.
  Uncertainty: yield at good installation, average is lower while optimum would be higher, basic uncertainty = 1.2
- tap water: 8.88013e-6, 1.3537e-5, 2.52594e-5, 6.80469e-5, 8.19102e-6, 0.00034135, 0.00390624, 0.0029108 kg (8 suppliers, which the file names only by identifier); sum of these 0.0072823 kg; = installation*panel_area_mcSi*water_pv_panels_cleaning; lognormal variance with pedigree 0.0107, pedigree (2,2,4,5,1)
  Calculated value. Amount of installation needed to produce 1 kWh * panel area per installation * water need to clean 1 m2 of panel. [unit/kWh * m2/unit * l/m2 = l/kWh]. A density of 1 kg/dm3 is assumed.
  EcoSpold01Location=CH
  Uncertainty: Estimation 20l/m2 panel
  properties: carbon content, fossil 0.00178991, dry mass 0.000337476 kg, water content 2962.17, wet mass 1 kg
  note on carbon content, fossil: Bicarbonate content is 2.93 mol/m3. CO2 content is 0.1 mol/m3 (ecoinvent v2.2 report 8, Tab 93.1).
- wastewater, average: -5.86015e-6, -1.40128e-6, -2.08644e-8 m3 (3 suppliers, which the file names only by identifier); sum of these -7.2823e-6 m3; = tapwater/1000; lognormal variance with pedigree 0.0027, pedigree (2,2,1,5,1)
  Calculated value.
  EcoSpold01Location=CH
  Uncertainty: Estimation 20l/m2 panel
  production volume; = apv*sewage
    Calculated value
  properties: carbon content, non-fossil 0.194039, dry mass 0.346837 kg, mass concentration, TOC 0.1091 kg/m3, mass concentration, calcium 0.039453 kg/m3, mass concentration, chlorine 0.030031 kg/m3, mass concentration, hydrogen 0.013365 kg/m3, mass concentration, nitrogen 0.031015 kg/m3, mass concentration, oxygen 0.069824 kg/m3, mass concentration, sodium 0.06456 kg/m3, mass concentration, sulfur 0.015602 kg/m3, water content 2882.2, wet mass 1000 kg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
  note on carbon content, non-fossil: 0.0673 kg TOC/m3 (Tab A.17, ecoinvent v2.2 report 13_I). TOC was considered as Total Carbon.

## Inputs from nature
- Energy, solar, converted [natural resource, in air]: 3.8503 MJ; lognormal variance with pedigree 0.00988441, pedigree (2,2,4,1,1)
  Energy loss in the system is included.

## Emissions to nature
- Water [air, unspecified]: 1.09234e-6 m3; name water_to_air_unspecified; = (tapwater/1000)*fraction_TW_to_air; lognormal variance with pedigree 0.130025, pedigree (4,4,5,2,4)
  Calculated value based on literature values and expert opinion. See comments in the parametres' comment field.
  property fraction, origin: fresh water 1; name fraction_origin_fresh_water
  property fraction, origin: salt water 0; name fraction_origin_salt_water
  property fraction, origin: unspecified 0; name fraction_origin_unspecified

## Sampling procedure
Literature, statistics

## Extrapolations
The simplifying assumption was made that all electricity is directly provided as low voltage electricity, so that no transformation has to take place. Even in countries with high shares of open ground installations (where medium or high voltage electricity might arrive at the busbar), the mistake due to this assumption is not significant, as transformation processes do only have a low influence on environmental impacts.

## Review by Carl Vadenbo 2015-07-23
The update of the whole electricity sector for the ecoinvent v3.2 database consist of hundreds of datasets. All these datasets have passed through a streamlined review processes where the underlying modelling of production volumes, technology shares and efficiencies was reviewed in detail prior to the datasets being submitted to the database.
