# alkyd resin production, long oil, product in 70% white spirit solution state

Dataset: EcoSpold 2, unit process
Geography: RoW
Time period: 1995-01-01 to 2023-12-31
Technology level: current
Classification: ISIC rev.4 ecoinvent: 2022:Manufacture of paints, varnishes and similar coatings, printing ink and mas
Classification: EcoSpold01Categories: paintings/production
Tags: ConvertedDataset
Scenario: Business-as-Usual
System model: Allocation, cut-off by classification
Generated by: Hans-Jörg Althaus
Published in: Althaus H.-J. 2007
Database: ecoinvent
isCopyrightProtected: true
accessRestrictedTo: 1

## General comment
Alkyds are a large and diverse family of polyesters. Long oil alkyds are often used in architectural paints. This dataset stands for one specific long oil alkyd and should not be used for other alkyds if its contribution to the overall result is im-portant. The data quality is not sufficient to allow for e.g. a comparative assess-ment of different binders of paints.
[This dataset was already contained in the ecoinvent database version 2. It was not individually updated during the transfer to ecoinvent version 3. Life Cycle Impact Assessment results may still have changed, as they are affected by changes in the supply chain, i.e. in other datasets. This dataset was generated following the ecoinvent quality guidelines for version 2. It may have been subject to central changes described in the ecoinvent version 3 change report (http://www.ecoinvent.org/database/ecoinvent-version-3/reports-of-changes/), and the results of the central updates were reviewed extensively. The changes added e.g. consistent water flows and other information throughout the database. The documentation of this dataset can be found in the ecoinvent reports of version 2, which are still available via the ecoinvent website. The change report linked above covers all central changes that were made during the conversion process.]
[NEW TEXT for v3] The dataset represents solution. The solvent is NOT part of the dataset ... but needs to be added in order to have a full balance.

## Included activities end
Transport of raw materials and production of resin. Packaging is neglected.

## Technology
The dataset models the commonly used solvent process. It assumes the use of soybean oil as fatty acid, phthalic anhydride as polybasic acid and Pentaeritol as polyol.

## Reference product
- alkyd resin, long oil, without solvent, in 70% white spirit solution state: 1 kg; By-product classification allocatable product; CPC 35110: Paints and varnishes and related products; HS2017 320890: Paints and varnishes; based on polymers n.e.c. in heading no. 3208, dispersed or dissolved in a non-aqueous[...]
  EcoSpold01Location=RER
  production volume 2.67763 kg
    This is a placeholder value that does not reflect real-world production volumes. This dataset does not currently require a real-world production volume to work in the database framework, and no actual data were collected yet. This has no negative effect on the results of the ecoinvent database.
  property carbon content, fossil 0.268755
    C content was calculated as an addition of C content in the raw materials.
  property carbon content, non-fossil 0.412906
    C content was calculated as an addition of C content in the raw materials.
  property heating value, net 20.65 MJ
    LHV is calculated based on the Carbon content of the product. More details can be found on the respective documentation.
  property price 3.37 EUR2005
    From UN trade database. http://data.un.org/ Import data from the largest economies of the world are used (Brazil, India, USA, China, Japan and EU-27). Commodities: 'Acrylic or vinyl polymer paint or varnish, non-aqueou', 'Polyester based paints, varnishes, non-aqueous medium' and 'Polymer based paint, varnish in non-aqueous medium ne'.
  properties: carbon allocation 0.681662 kg, carbon content 0.681662, dry mass 1 kg, water content 0, water in wet mass 0 kg, wet mass 1 kg

## Inputs from technosphere
- chemical factory, organics: 4e-10 unit; lognormal variance with pedigree 0.69, pedigree (5,5,5,5,5)
  EcoSpold01Location=RER
- electricity, medium voltage: 0.00190341, 0.0379687, 0.0127574, 0.000582889, 0.000116665, 2.50505e-5, 0.00392086 kWh (7 suppliers, which the file names only by identifier); sum of these 0.057275 kWh; lognormal variance with pedigree 0.064, pedigree (3,4,5,5,3)
  EcoSpold01Location=UCTE
- heat, district or industrial, natural gas: 0.0545536, 3.31985 MJ (2 suppliers, which the file names only by identifier); sum of these 3.3744 MJ; lognormal variance with pedigree 0.064, pedigree (3,4,5,5,3)
  properties: heating value, net 1 MJ
- heat, district or industrial, other than natural gas: 1.88258, 0.000872163 MJ (2 suppliers, which the file names only by identifier); sum of these 1.88345 MJ; lognormal variance with pedigree 0.064, pedigree (3,4,5,5,3)
  properties: heating value, net 1 MJ
- pentaerythritol: 0.227 kg; lognormal variance with pedigree 0.116, pedigree (4,5,5,5,3)
  EcoSpold01Location=RER
  properties: carbon content, fossil 0.441176, dry mass 1 kg, heating value, net 24.05 MJ, wet mass 1 kg
- phthalic anhydride: 0.268 kg; lognormal variance with pedigree 0.116, pedigree (4,5,5,5,3)
  EcoSpold01Location=RER
  properties: carbon content, fossil 0.648649, dry mass 1 kg, heating value, net 22.93 MJ, wet mass 1 kg
- soybean oil, crude: 0.631 kg; lognormal variance with pedigree 0.116, pedigree (4,5,5,5,3)
  EcoSpold01Location=RER
  properties: carbon content, non-fossil 0.768, dry mass 1 kg, heating value, net 38.4 MJ, wet mass 1 kg
  note on heating value, net: Values is approximated from HHV from "vegetable oil, crude". Source: Radovanovic,M.; Zivanovic,T.; Stojiljkovic,D.; Jovanovic,V.; Jerinic,N.; Knezevic,S. et.al. Utilization of sunflower husk as a fuel for industrial boilers - 20 years experience. Proc. 5th Eur. Conf. on Industrial Furnaces&Boilers 2000,vol.2,p.221-233. Available at: https://phyllis.nl/Biomass/View/2152
- xylene, mixed: 0.045 kg; lognormal variance with pedigree 0.116, pedigree (4,5,5,5,3)
  EcoSpold01Location=RER
  properties: carbon content, fossil 0.905061, dry mass 1 kg, heating value, net 38.84 MJ, wet mass 1 kg

## Sampling procedure
A "typical" alkyd is chosen and its raw material consumption is calculated. Energy data are taken from the one source that is known.

## Extrapolations
none This dataset has been copied from an original dataset covering the geography RER. The uncertainty has been adjusted accordingly.

## Review by Heiko Kunst 2003-06-27
Passed.
