# intral production

Dataset: EcoSpold 2, unit process
Geography: RER
Time period: 2000-01-01 to 2023-12-31
Technology level: current
Classification: EcoSpold01Categories: chemicals/inorganics
Classification: ISIC rev.4 ecoinvent: 0891:Mining of chemical and fertilizer minerals
Tags: ConvertedDataset
Scenario: Business-as-Usual
System model: Allocation, cut-off by classification
Generated by: Roland Hischier
Published in: Hischier R. 2007
Database: ecoinvent
isCopyrightProtected: true
accessRestrictedTo: 1

## General comment
This dataset represents the production of 1 kg of intral (pyrite) from pyrite in the gorund.
Land-use is an approximation based on iron ore extraction. Material and energy inputs, industrial machine, and particulate emissions are an approximation based on iron mining and limestone crushing and milling.
[This dataset was already contained in the ecoinvent database version 2. It was not individually updated during the transfer to ecoinvent version 3. Life Cycle Impact Assessment results may still have changed, as they are affected by changes in the supply chain, i.e. in other datasets. This dataset was generated following the ecoinvent quality guidelines for version 2. It may have been subject to central changes described in the ecoinvent version 3 change report (http://www.ecoinvent.org/database/ecoinvent-version-3/reports-of-changes/), and the results of the central updates were reviewed extensively. The changes added e.g. consistent water flows and other information throughout the database. The documentation of this dataset can be found in the ecoinvent reports of version 2, which are still available via the ecoinvent website. The change report linked above covers all central changes that were made during the conversion process.]

## Included activities start
From pyrite in ground.

## Included activities end
This activity ends with the production of 1 kg of intral (pyrite). The dataset includes raw materials, machineries and energy consumption for production, emissions to air from production and infrastructure of the site. The dataset doesn't include water emissions, overburden and tailing material from process, and losses of product.

## Geography
Data are used here as European average.

## Technology
As a first approximation, the technology is based on iron mining, limestone crushing and limestone milling technologies. The overall yield is assumed to be 90%.

## Parameters
- fraction, process water, to air: 0.205 dimensionless; name fraction_PW_to_air; lognormal variance with pedigree 0.092025, pedigree (4,4,3,2,4)
  Literature value (Statistics Canada, 2007 & Shaffer, K.H., 2008, Consumptive water use in the Great Lakes Basin, USGS) (Vionnet, S., Quantis Water Database - Technical Report, 2012).

## Reference product
- intral: 1 kg; By-product classification allocatable product; CPC 16120: Unroasted iron pyrites; HS2017 250200: Iron pyrites; unroasted; CAS 1309-36-0
  Intral is a brand name for mono-crystalline pyrite and is used for producing amber glass. Pyrite belongs to the mineral class of sulfides, contains quite a high percentage of iron but along the iron mining history was never a source for the iron production. It has been always mined for its sulphur content.
  EcoSpold01Location=RER
  production volume 1.32237 kg
    This is a placeholder value that does not reflect real-world production volumes. This dataset does not currently require a real-world production volume to work in the database framework, and no actual data were collected yet. This has no negative effect on the results of the ecoinvent database. The placeholder value of this activity was scaled according to the nominal GDP of 2005 (source: United Nations, http://data.un.org/Glossary.aspx?q=GDP+%28current+US%24%29, accessed 20130726) to reflect an appropriate share of the global production volume, which is also a placeholder value.
  property price 0.00549081 EUR2005
    Calculated based on inputs: The price of the product has been calculated as a sum of the values of the material and energy inputs for this product. This value is therefore a rough estimation. It may underestimate the real price since there are additional expenses when producing any product. These expences can include for example labour costs, treatment of waste materials and profit for the producer. Please consider carefully whether this level of data quality is acceptable for your application.
  properties: carbon allocation 0 kg, carbon content 0, carbon content, fossil 0, carbon content, non-fossil 0, dry mass 1 kg, water content 0, water in wet mass 0 kg, wet mass 1 kg

## Inputs from technosphere
- blasting: 0.000271 kg; lognormal variance with pedigree 0.2687, pedigree (4,3,5,3,5)
  Proxy: approximation with data from iron mining.
  EcoSpold01Location=RER
  Uncertainty: approximation with data from iron mining & lime treatment
- conveyor belt: 2.78e-8 m; lognormal variance with pedigree 0.5787, pedigree (4,3,5,3,5)
  EcoSpold01Location=RER
  Proxy: approximation with data from limestone treatment
  Uncertainty: approximation with data from iron mining & lime treatment
- diesel, burned in building machine: 0.0255 MJ; lognormal variance with pedigree 0.2687, pedigree (4,3,5,3,5)
  Proxy: approximation with data from iron mining.
  EcoSpold01Location=GLO
  Uncertainty: approximation with data from iron mining & lime treatment
  properties: heating value, net 1 MJ
- electricity, medium voltage: 0.0339 kWh; lognormal variance with pedigree 0.2687, pedigree (4,3,5,3,5)
  EcoSpold01Location=UCTE
  Proxy: approximation with data from iron mining & lime treatment
  Uncertainty: approximation with data from iron mining & lime treatment
- heat, central or small-scale, other than natural gas: 0.00282 MJ
  Proxy: approximation with data from limestone treatment
  EcoSpold01Location=CH
  properties: heating value, net 1 MJ
- heat, district or industrial, other than natural gas: 0.0898 MJ; lognormal variance with pedigree 0.2687, pedigree (4,3,5,3,5)
  Proxy: approximation with data from limestone treatment
  EcoSpold01Location=RER
  Uncertainty: approximation with data from iron mining & lime treatment
  properties: heating value, net 1 MJ
- industrial machine, heavy, unspecified: 0.000231 kg; lognormal variance with pedigree 0.5787, pedigree (4,3,5,3,5)
  Proxy: approximation with data from limestone treatment.
  EcoSpold01Location=RER
  Uncertainty: approximation with data from iron mining & lime treatment
- mine infrastructure, iron: 8.33e-13 unit; lognormal variance with pedigree 0.5787, pedigree (4,3,5,3,5)
  (same comment as for diesel, burned in building machine)
- recultivation, iron mine: 2.13e-6 m2; lognormal variance with pedigree 0.3987, pedigree (4,3,5,3,5)
  EcoSpold01Location=GLO
  Proxy: approximation with data from iron mining.
  Uncertainty: approximation with data from iron mining & lime treatment

## Inputs from nature
- Occupation, mineral extraction site [natural resource, land]: 0.00012 m2*year; lognormal variance with pedigree 0.3087, pedigree (4,3,5,3,5)
  Proxy: approximation with data from iron mining
  Uncertainty: approximation with data from iron mining & lime treatment
- Pyrite [natural resource, in ground]: 1.11 kg; lognormal variance with pedigree 0.2687, pedigree (4,3,5,3,5)
  Proxy: approximation with data from iron mining. Overall yield of 90% is assumed.
  Uncertainty: approximation with data from iron mining & lime treatment
- Transformation, from forest, unspecified [natural resource, land]: 2.13e-6 m2; lognormal variance with pedigree 0.3987, pedigree (4,3,5,3,5)
  Proxy: approximation with data from iron mining.
  Uncertainty: approximation with data from iron mining & lime treatment
- Transformation, to mineral extraction site [natural resource, land]: 2.13e-6 m2; lognormal variance with pedigree 0.3987, pedigree (4,3,5,3,5)
  (same comment as for Transformation, from forest, unspecified)
- Water, well, in ground [natural resource, in water]: 2.93e-5 m3; name water_well_in_ground_input; lognormal variance with pedigree 0.0767, pedigree (4,3,5,3,3)
  Proxy: approximation with data from lime treatment
  Uncertainty: approximation with data from lime production

## Emissions to nature
- Particulate Matter, < 2.5 um [air, non-urban air or from high stacks]: 0.000145 kg; lognormal variance with pedigree 0.5787, pedigree (4,3,5,3,5)
  Proxy: approximation with data from iron mining & lime treatment
  Uncertainty: approximation with data from iron mining & lime treatment
- Particulate Matter, > 10 um [air, non-urban air or from high stacks]: 0.00145 kg; lognormal variance with pedigree 0.3087, pedigree (4,3,5,3,5)
  (same comment as for Particulate Matter, < 2.5 um)
- Particulate Matter, > 2.5 um and < 10um [air, non-urban air or from high stacks]: 0.00131 kg; lognormal variance with pedigree 0.3987, pedigree (4,3,5,3,5)
  (same comment as for Particulate Matter, < 2.5 um)
- Water [air, unspecified]: 6.0065e-6 m3; name water_to_air_unspecified; = (water_well_in_ground_input*fraction_PW_to_air); lognormal variance with pedigree 0.0807, pedigree (2,2,5,1,1)
  Calculated value based on literature values and expert opinion. See comments in the parametres' comment field.
  property fraction, origin: fresh water 1; name fraction_origin_fresh_water
  property fraction, origin: salt water 0; name fraction_origin_salt_water
  property fraction, origin: unspecified 0; name fraction_origin_unspecified
- Water [water, unspecified]: 2.32935e-5 m3; name water_to_water_unspecified; = water_well_in_ground_input*(1-fraction_PW_to_air); lognormal variance with pedigree 0.0807, pedigree (2,2,5,1,1)
  (same comment as for Water)
  property carbon content, fossil 0; name C_content_fossil
  property carbon content, non-fossil 0; name C_content_non_fossil
  property dry mass 0 kg; name DM
  property fraction, origin: fresh water 1; name fraction_origin_fresh_water_Ww
  property fraction, origin: salt water 0; name fraction_origin_salt_water_Ww
  property fraction, origin: unspecified 0; name fraction_origin_unspecified_Ww
  property water in wet mass 1000 kg; name WWM
  property wet mass 1000 kg; name WM

## Sampling procedure
approximation with data from literature

## Extrapolations
see technology

## Review by Daniel Kellenberger (obsolete) 2007-11-09
passed

## Review by Roland Hischier 2011-12-09
Transfer of documentation done.
