# power saw production, without catalytic converter

Dataset: EcoSpold 2, unit process
Geography: GLO
Time period: 2011-01-01 to 2023-12-31
Technology level: current
Classification: ISIC rev.4 ecoinvent: 2818:Manufacture of power-driven hand tools
Synonyms: chainsaw
Tags: Swiss Brushup completed
Scenario: Business-as-Usual
System model: Allocation, cut-off by classification
Generated by: Frank Werner
Published in: Kellenberger D. 2007
Database: ecoinvent
isCopyrightProtected: true
accessRestrictedTo: 1

## General comment
This dataset represents the production of a power saw without catalytic converter.

## Included activities start
The activity starts with the semi-finished products and raw materials at the factory gate.

## Included activities end
The inventory accounts for the input and disposal of all materials, their (pre-) processing and the energy required for the production and maintenance of the power saw represented by this dataset.
The dataset does not contain fuel consumption or related emissions. These issues are inventoried in the respective dataset on the operation of the machinery. The dataset does also not contain an estimate of the infrastructure required to produce the power saw.

## Geography
Values approximated from European producer

## Parameters
- lifetime of machine, productive machine hours: 2500 hour; name total_PMH
- maintenance factor: 0.3 dimensionless; name maintenance_factor
- weight of the vehicle: 5.5 kg/unit; name vehicle_weight

## Reference product
- power saw, without catalytic converter: 1 unit; By-product classification allocatable product; CPC 88768: Power-driven hand tool manufacturing services; HS2017 846781: Tools; for working in the hand, chain saws with self-contained non-electric motor
  production volume 6e6 unit; name p_power_saw; = 3*2500000*0.8
    Based on information from ecoinvent centre, referring to information from Stihl on global annual production, production share and an assumed share of deviced other than power saws without catalytic converter
  property lifetime 1.42045 year; name lifetime; = total_PMH/8/220
    total productive machine hours divided by 8 hour/day divided by 220 working days/yera
  property lifetime capacity [h] 2500 hour; = total_PMH
    Total of operation hours expected; in case of forest machinery: total of productive machine hours.
  property price 22.2869 EUR2005
    Calculated based on inputs: The price of the product has been calculated as a sum of the values of the material and energy inputs for this product. This value is therefore a rough estimation. It may underestimate the real price since there are additional expenses when producing any product. These expences can include for example labour costs, treatment of waste materials and profit for the producer. Please consider carefully whether this level of data quality is acceptable for your application.
  properties: carbon allocation 0 kg, carbon content 0

## Inputs from technosphere
- aluminium, cast alloy: 2.5025 kg; name m_Al; = 1.375*(1+maintenance_factor)+0.55*(1+maintenance_factor); source Kellenberger D. 2007; lognormal variance with pedigree 0.235, pedigree (5,5,5,5,5)
  Interpolated from ecoinvent 2.2 dataset for a power saw of 5.5 kg, (according to producer information) excluding chain and blade; source: Kellenberger, D., H.-J. Althaus, T. Künniger, M. Lehmann, N. Jungbluth and P. Thalmann (2007): Life cycle inventories of building products. Final report ecoinvent 2000 No. 7, EMPA Duebendorf, Swiss Centre for Life Cycle Inventories, Duebendorf, CH.
  property dry mass 1 kg; name m_Al_DM
  property wet mass 1 kg; name m_Al_WM
  properties: UVEK_link_1 162, UVEK_relative_amount_1 1
  note on UVEK_link_1: to be used only in special submissions in coordination with ecoinvent and the Swiss FOEN.
- electricity, medium voltage: 0.0195 kWh; = 0.015*(1+maintenance_factor); source Kellenberger D. 2007; lognormal variance with pedigree 0.235, pedigree (5,5,5,5,5)
  (same comment as for aluminium, cast alloy)
  properties: UVEK_link_1 1779, UVEK_relative_amount_1 1
- heat, district or industrial, natural gas: 0.208 MJ; = 0.16*(1+maintenance_factor); source Kellenberger D. 2007; lognormal variance with pedigree 0.235, pedigree (5,5,5,5,5)
  (same comment as for aluminium, cast alloy)
  properties: UVEK_link_1 2580, UVEK_relative_amount_1 1, heating value, net 1 MJ
- injection moulding: 2.5025 kg; = m_PE; source Kellenberger D. 2007; lognormal variance with pedigree 0.23, pedigree (5,5,5,5,5)
  calculated from PE input
  properties: UVEK_link_1 2701, UVEK_relative_amount_1 1
- polyethylene, high density, granulate: 2.5025 kg; name m_PE; = 1.925*(1+maintenance_factor); source Kellenberger D. 2007; lognormal variance with pedigree 0.235, pedigree (5,5,5,5,5)
  (same comment as for aluminium, cast alloy)
  property carbon content, fossil 0.857143; name C_content_fossil_polyethylene
  property dry mass 1 kg; name m_PE_DM
  property wet mass 1 kg; name m_PE_WM
  properties: UVEK_link_1 3540, UVEK_link_8 4417, UVEK_link_9 4433, UVEK_relative_amount_1 1, UVEK_relative_amount_8 0.703297, UVEK_relative_amount_9 0.0428571, heating value, net 42.47 MJ
  note on UVEK_relative_amount_8: scaling factor = amount of transport in corresponding KBOB dataset/amount of this input from technosphere. To be used only in special submissions in coordination with ecoinvent and the Swiss FOEN.
- scrap steel: -22.8682, -10.9296, -0.0138475 kg (3 suppliers, which the file names only by identifier); sum of these -33.8117 kg; = m_steel_low_alloyed+m_chromium_steel; lognormal variance with pedigree 0.203, pedigree (4,5,5,5,5)
  sum of all steel outputs
  production volume; = p_power_saw *w_scrap_steel
    Calculated from production volume of reference product using the relative outputs.
  properties: dry mass 1 kg, wet mass 1 kg
- section bar rolling, steel: 2.145 kg; = m_steel_low_alloyed; source Kellenberger D. 2007; lognormal variance with pedigree 0.23, pedigree (5,5,5,5,5)
  calculated from steel input
  properties: UVEK_link_1 3987, UVEK_relative_amount_1 1
- steel, chromium steel 18/8: 31.6667 kg; name m_chromium_steel; = (0.4/60+1.2/200)*total_PMH
  0.4 kg of chain replaced every 60 productive maschine working hours plus 1.2 kg of running rail (blade) replaced very 200 hours
  properties: carbon content, fossil 0.0008, dry mass 1 kg, wet mass 1 kg
  note on carbon content, fossil: Stainless steel model is the grade 304 steel (18/8 stainless, 18% chromium 8% nickel; max. 0.08% C)
- steel, low-alloyed, hot rolled: 2.145 kg; name m_steel_low_alloyed; = 1.65*(1+maintenance_factor); source Kellenberger D. 2007; lognormal variance with pedigree 0.235, pedigree (5,5,5,5,5)
  (same comment as for aluminium, cast alloy)
  property dry mass 1 kg; name m_steel_low_alloyed_DM
  property wet mass 1 kg; name m_steel_low_alloyed_WM
  properties: UVEK_link_1 4222, UVEK_link_2 2662, UVEK_relative_amount_1 1, UVEK_relative_amount_2 1, carbon content, fossil 0.005
- waste aluminium: -0.0928718, -2.40963 kg (2 suppliers, which the file names only by identifier); sum of these -2.5025 kg; = m_Al; source Kellenberger D. 2007; lognormal variance with pedigree 0.203, pedigree (4,5,5,5,5)
  production volume; = p_power_saw*w_Al
    Calculated from production volume of reference product using the relative outputs.
  properties: dry mass 1 kg, wet mass 1 kg
- waste polyethylene: -0.000159092, -0.00729531, -0.000405622, -0.000167537, -3.06766e-5, -2.49835, -6.76829e-5, -0.00607073 kg (8 suppliers, which the file names only by identifier); sum of these -2.51255 kg; = m_PE/DM_PE; source Kellenberger D. 2007; lognormal variance with pedigree 0.203, pedigree (4,5,5,5,5)
  waste polyethylene, corrected for the water content in waste
  production volume; = p_power_saw*w_PE
    Calculated from production volume of reference product using the relative outputs.
  properties: carbon content, fossil 0.825301, dry mass 0.996 kg, heating value, net 42.47 MJ, water content 0.00401606, wet mass 1 kg
  note on heating value, net: Value taken from the general comment of the treatment dataset.

## Sampling procedure
Original data obtained mainly by personal communication with manufacturer of power saws; data converted from ecoinvent 2.2 and adapted for ecoinvent v.3

## Extrapolations
See geography
