# electricity production, nuclear, pressure water reactor, heavy water moderated

Dataset: EcoSpold 2, unit process
Geography: RU
Time period: 2010-01-01 to 2023-12-31
Technology level: modern
Classification: ISIC rev.4 ecoinvent: 3510:Electric power generation, transmission and distribution
Classification: EcoSpold01Categories: nuclear power/power plants
Synonyms: PWR
Scenario: Business-as-Usual
System model: Allocation, cut-off by classification
Generated by: Christian Bauer
Database: ecoinvent
isCopyrightProtected: true
accessRestrictedTo: 1

## General comment
This dataset represents the global production of 1kWh of electricity in a pressurized heavy water reactor nuclear plant. This dataset represents the CANDU technology (see nuclear plant construction for details) and has an installed power of 650MW (the average installed power for this technology). It is characterised by the use of heavy water (deuterium oxide) as moderator and coolant and the use of natural uranium (not enriched) as fuel. This dataset is extrapolated from the Quebec dataset, which is based on study on the production, transport and distribution of electricity in Quebec. It represents the production of Gentilly-2, the only nuclear plant in Quebec. Lifetime is estimated to 30 years for the plant based on Quebec data. Only main consumed products, wastes and emissions are included. Operation data were collected for the 2008-2013 period.
Some emission data were extrapolated from other nuclear technology (PWR).
Baumann J. (1949) Kraftwerk Rupperswil-Auenstein. Verlag Kraftwerk
Rupperswil-Auenstein AG, Rupperswil.
Nordostschweizerische Kraftwerke AG (NOK) (1956) Das Kraftwerk
Wildegg-Brugg. In: Schweizerische Bauzeitung, 74 (4), 47-52; 74 (5), 63-67; 74
(6), 83-88; 74 (7), 93-99; 74 (8), 111-116; 74 (10), 145-147; 74 (12), 167-172.
Aegerter A., Dr. Bosshardt O. (1954) Das Kraftwerk Birsfelden. In: Wasser- und
Energiewirtschaft, 46 (5-7), 165-176.
Brux G. (1983) Das Donaukraftwerk Greifenstein. In: Wasser, Energie, Luft, 75
(1-2), 11-13.
Radag A. (1979) 50 Jahre Rheinkraftwerk Albbruck-Dogern Aktiengesellschaft.
Waldshut/Rhein, 1929-1979.
Bundesamt für Energiewirtschaft (2001) Elektrizitätsstatistik 2000. Bern,
Schweiz.

## Included activities start
From the constructed power plant ready to produce electricity and from the fuel ready in the power plant.

## Included activities end
This activity ends with 1kWh of high voltage electricity produced at the power plant and arrived at the busbar.

The module includes: fuel elements, chemicals, and diesel requirements as well as the relevant transport requirements. Water use for cooling is included, but no cooling tower infrastructure. Considered radioactive waste streams are: spent fuel to conditioning (no reprocessing); operational low active waste for conditioning in the intermediate repository; and, contaminated waste from dismantling. Non-radioactive wastes are accounted for.

## Geography
Data extrapolated from Quebec dataset and a different GLO technology. Uncertainty has been adjusted accordingly.

## Technology
CANDU 6 technology is used in this plant. It is characterized by the use of heavy water as moderator and non-refined uranium as fuel. Some emission data were extrapolated from other nuclear technology. Uncertainty has been adjusted accordingly.

## Time period
Operation data were collected for the 2008-2013 period, but it is assumed valid for all the operation lifetime

## Reference product
- electricity, high voltage: 1 kWh; name amount_RP; By-product classification allocatable product; CPC 17100: Electrical energy; HS2017 271600: Electrical energy
  production volume 3.953e9 kWh; name apv_electricity
    Literature value/statistics. For both OECD and non-OECD countries, gross electricity production 2012 with nuclear plants was taken from the IEA electricity information 2014, table 1.2. For a split of this total value into electricity production in different types of nuclear plants (boiling water reactor, pressure water reactor and pressurised heavy water reactor), data from IEAE 2014 (PRIS database) were exploited. An own electricity use of 6% (losses between gross and net electricity production) has been applied to the gross data based on IEA 2014.
    IEA. 2014. Electricity Information 2014. ISBN 978-92-64-21692-1. International Energy Agency (IEA), Paris Cedex (FR).
    IAEA. 2014. PRIS (Power Reactor Information System) - The database on nuclear power reactors. Country statistics. Online database. International Atomic Energy Agency.
  property price 0.0977 EUR2005
    Temporary price data. Calculated as 90% of purchasers price based on: 94% of the average price (to account for a 6% loss in transformation and transmission) for electricity for industrial consumersin 2005 (excluded taxes). From IEA.
  properties: carbon allocation 0 kg, carbon content 0

## Inputs from technosphere
- aluminium sulfate, powder: 1.74677e-6, 8.29216e-6 kg (2 suppliers, which the file names only by identifier); sum of these 1.00389e-5 kg; lognormal variance with pedigree 0.0119, pedigree (2,4,4,3,2)
  Estimated value. Measured/calculated value for Quebec is extrapolated for GLO.
  properties: dry mass 1 kg, wet mass 1 kg
- anionic resin: 1.00222e-9, 1.01235e-11 kg (2 suppliers, which the file names only by identifier); sum of these 1.01235e-9 kg; lognormal variance with pedigree 0.0119, pedigree (2,4,4,3,2)
  Estimated value. Measured/calculated value for Quebec is extrapolated for GLO.
  properties: carbon content, fossil 0.680721, density 0.76 kg/l, dry mass 0.5 kg, heating value, net 9.09 MJ, water content 1, wet mass 1 kg
  note on carbon content, fossil: Cross-linked polystyrene beads are treated with chloromethyl methyl ether under anhydrous conditions, with either aluminum chloride or tin(IV) chloride as catalyst. Chloromethylated polystyrene is obtained. In a second stage, the chlorine in the chloromethylated group can be replaced by an amine (Anion exchange resins, in Ullmann). In this case, Trimethylamine, C3H9N, is used (ecoinvent v2.2 report 8-part 93). That is, the resine can be formulated as C12H18NCl (after Ullmann, Anion exchange resins). The resine is hydrated (ecoinvent v2.2 report 8, part II, Tab 93.7)
  note on density: Literature value. Bulk density between 560 and 960. Source: DOWEX. Fundamentals of Ion Exchange http://msdssearch.dow.com/PublishedLiteratureDOWCOM/dh_0032/0901b803800326ca.pdf?filepath=liquidseps/pdfs/noreg/177-01837.pdf&fromPage=GetDoc
- carbon dioxide, liquid: 7.88243e-8, 3.74457e-7 kg (2 suppliers, which the file names only by identifier); sum of these 4.53281e-7 kg; lognormal variance with pedigree 0.0113, pedigree (2,4,4,3,1)
  Estimated value. Measured/calculated value for Quebec is extrapolated for GLO.
  properties: carbon content, fossil 0.272727, dry mass 1 kg, heating value, net 8.27 MJ, wet mass 1 kg
- cast iron: 6.95217e-7 kg; name iron; lognormal variance with pedigree 0.0119, pedigree (2,4,4,3,2)
  Estimated value. Measured/calculated value for Quebec is extrapolated for GLO.
  properties: carbon content, fossil 0.04, dry mass 1 kg, wet mass 1 kg
  note on carbon content, fossil: Cast iron is made by remelting pig iron in small furnaces (e.g. cupola furnaces or electric arc furnaces) and poured into moulds to make castings. It usually contains 2% to 6% carbon (ecoinvent v2.2 report 10_partII). An average content of 4% was considered
- cationic resin: 3.99634e-10, 4.03671e-12 kg (2 suppliers, which the file names only by identifier); sum of these 4.03671e-10 kg; lognormal variance with pedigree 0.0119, pedigree (2,4,4,3,2)
  Estimated value. Measured/calculated value for Quebec is extrapolated for GLO.
  properties: carbon content, fossil 0.521606, density 0.76 kg/l, dry mass 0.5 kg, heating value, net 6.68 MJ, water content 1, wet mass 1 kg
  note on carbon content, fossil: Chemically inert polystyrene beads are treated with concentrated sulfuric or chlorosulfonic acid to give cross-linked polystyrene 3-sulfonic acid (Cation exchange resins, Ullmann). The resine was approximated as C8H8O3S (from Ullmann, Cation exchange resins). The resine is hydrated (ecoinvent v2.2 report 8, part II, Tab 93.5)
- chemical, organic: 1.19855e-6 kg; lognormal variance with pedigree 0.0119, pedigree (2,4,4,3,2)
  Estimated value. Measured/calculated value for Quebec is extrapolated for GLO.
  properties: carbon content, fossil 0.628, dry mass 1 kg, heating value, net 19.03 MJ, wet mass 1 kg
  note on carbon content, fossil: This dataset is an unweighted average of 20 organic substances (listed in Tab 88.1, ecoinvent v2.2 report 8, part II), being part of the top100 chemicals included in this database. The C-content has also been calculated as an unweighted average of the C content of the substances composing this dataset.
- chlorine, liquid: 4.20904e-7, 2.10412e-6 kg (2 suppliers, which the file names only by identifier); sum of these 2.52503e-6 kg; lognormal variance with pedigree 0.0119, pedigree (2,4,4,3,2)
  Estimated value. Measured/calculated value for Quebec is extrapolated for GLO.
  properties: dry mass 1 kg, wet mass 1 kg
- chlorodifluoromethane: 3.61513e-9, 2.53059e-8 kg (2 suppliers, which the file names only by identifier); sum of these 2.8921e-8 kg; lognormal variance with pedigree 0.0119, pedigree (2,4,4,3,2)
  Estimated value. Measured/calculated value for Quebec is extrapolated for GLO.
  properties: carbon content, fossil 0.139535, dry mass 1 kg, heating value, net 5.61 MJ, wet mass 1 kg
- concrete, normal strength: 6.48869e-6 m3; name concrete; lognormal variance with pedigree 0.0119, pedigree (2,4,4,3,2)
  Estimated value. Measured/calculated value for Quebec is extrapolated for GLO.
  property dry mass 2190 kg; name DM_concrete
  properties: water content 0.086758, wet mass 2380 kg
- diesel, burned in diesel-electric generating set, 10MW: 7.19027e-5 MJ; lognormal variance with pedigree 0.0119, pedigree (2,4,4,3,2)
  Estimated value. Measured/calculated value for Quebec is extrapolated for GLO.
  property density 0.84 kg/l; name densityDiesel
  property heating value, gross 45.4 MJ; name GHVDiesel
  property kgFuel_Input 5695.2 kg; name inputDiesel; = 6.78E+03*densityDiesel
  properties: heating value, net 1 MJ
  note on heating value, gross: Literature value. gross (upper) heating (calorific) value. Ecoinvent
- fly ash and scrubber sludge: -6.84374e-6, -1.73498e-5 kg (2 suppliers, which the file names only by identifier); sum of these -2.41935e-5 kg; lognormal variance with pedigree 0.0039, pedigree (2,4,1,3,2)
  Estimated value. Measured/calculated value for Quebec is extrapolated for GLO.
  production volume; = fly_ash* apv_electricity/amount_RP
    Calculated from production volume of reference product using the relative outputs.
  properties: carbon content, fossil 0.167, dry mass 0.1 kg, water content 9, wet mass 1 kg
  note on carbon content, fossil: Tab A.6, ecoinvent v2.2 report 13_I. C content has been calculated after data in the tables, and then referred to 1 kg DM
- hazardous waste, for incineration: -1.59615e-6, -7.67584e-7 kg (2 suppliers, which the file names only by identifier); sum of these -2.36374e-6 kg; lognormal variance with pedigree 0.0039, pedigree (2,4,1,3,2)
  Estimated value. Measured/calculated value for Quebec is extrapolated for GLO.
  production volume; = haz_waste* apv_electricity/amount_RP
    Calculated from production volume of reference product using the relative outputs.
  properties: carbon content, fossil 0.554667, dry mass 0.75 kg, heating value, net 17 MJ, water content 0.333333, wet mass 1 kg
  note on heating value, net: Value taken from the general comment of the treatment dataset.
- heavy water: 5.56174e-7 kg; lognormal variance with pedigree 0.0119, pedigree (2,4,4,3,2)
  Estimated value. Measured/calculated value for Quebec is extrapolated for GLO.
  properties: wet mass 1 kg
- helium: 4.89433e-7 kg; lognormal variance with pedigree 0.0119, pedigree (2,4,4,3,2)
  Estimated value. Measured/calculated value for Quebec is extrapolated for GLO.
  properties: dry mass 1 kg, wet mass 1 kg
- hydrazine: 2.28031e-7, 1.14016e-7 kg (2 suppliers, which the file names only by identifier); sum of these 3.42047e-7 kg; lognormal variance with pedigree 0.0119, pedigree (2,4,4,3,2)
  Estimated value. Measured/calculated value for Quebec is extrapolated for GLO.
  properties: dry mass 1 kg, heating value, net 15.13 MJ, wet mass 1 kg
- hydrogen, gaseous, medium pressure, merchant: 3.21885e-7, 9.65656e-7 kg (2 suppliers, which the file names only by identifier); sum of these 1.28754e-6 kg; lognormal variance with pedigree 0.0119, pedigree (2,4,4,3,2)
  Estimated value. Measured/calculated value for Quebec is extrapolated for GLO.
  properties: dry mass 1 kg, heating value, net 120.21 MJ, wet mass 1 kg
- iron scrap, unsorted: -6.95217e-7 kg; name BP_amount_2; = iron; lognormal variance with pedigree 0.21, pedigree (5,5,5,5,5)
  Estimated value. Same amount entering the dataset is estimated as by-product
  production volume; = apv_electricity * (BP_amount_2 / amount_RP)
    Calculated from production volume of reference product using the relative outputs.
  properties: dry mass 1 kg, price 0.149 EUR2005, wet mass 1 kg
- low level radioactive waste: -1.91046e-9 m3; name low_level_waste; lognormal variance with pedigree 0.0039, pedigree (2,4,1,3,2)
  Estimated value. Measured/calculated value for Quebec is extrapolated for GLO.
  production volume; = low_level_waste* apv_electricity/amount_RP
    Calculated from production volume of reference product using the relative outputs.
  properties: dry mass 2500 kg, wet mass 2500 kg
- low level radioactive waste for final repository: -8.95439e-9 m3; name low_level_waste_final; lognormal variance with pedigree 0.0039, pedigree (2,4,1,3,2)
  Estimated value. Measured/calculated value for Quebec is extrapolated for GLO.
  production volume; = low_level_waste_final * apv_electricity/amount_RP
    Calculated from production volume of reference product using the relative outputs.
  properties: dry mass 2500 kg, wet mass 2500 kg
- lubricating oil: 8.51613e-8, 4.04271e-7 kg (2 suppliers, which the file names only by identifier); sum of these 4.89433e-7 kg; lognormal variance with pedigree 0.0119, pedigree (2,4,4,3,2)
  Estimated value. Measured/calculated value for Quebec is extrapolated for GLO.
  properties: carbon content, fossil 0.75, dry mass 1 kg, heating value, net 40.2 MJ, wet mass 1 kg
  note on carbon content, fossil: Lubricating oil is produced from diesel. C-content/dry mass of fats and oils considered 75%, from: ecoinvent v2.2 report, n 15a, pg 40
  note on heating value, net: Literature value, Source: IPCC 2006, 2006 IPCC Guidelines for National Greenhouse Gas Inventories, Prepared by the National Greenhouse Gas Inventories Programme, Eggleston H.S., Buendia L., Miwa K., Ngara T. and Tanabe K. (eds). Published: IGES, Japan
- municipal solid waste: -1.87987e-5 kg; name municipal_solid_waste; lognormal variance with pedigree 0.0039, pedigree (2,4,1,3,2)
  Estimated value. Measured/calculated value for Quebec is extrapolated for GLO.
  production volume; = municipal_solid_waste* apv_electricity/amount_RP
    Calculated from production volume of reference product using the relative outputs.
  properties: carbon content, fossil 0.171549, carbon content, non-fossil 0.261655, dry mass 0.771 kg, heating value, net 11.74 MJ, water content 0.297017, wet mass 1 kg
  note on carbon content, fossil: MSW composition in tab 4.1, ecoinvent v2.2 report 13_I. C content referred to 1 kg DM
- nitrogen, liquid: 4.42934e-7, 1.21582e-7 kg (2 suppliers, which the file names only by identifier); sum of these 5.64516e-7 kg; lognormal variance with pedigree 0.0119, pedigree (2,4,4,3,2)
  Estimated value. Measured/calculated value for Quebec is extrapolated for GLO.
  properties: dry mass 1 kg, wet mass 1 kg
- nuclear power plant, pressure water reactor, 650MW: 8.01934e-12 unit; = 1/(lifetime*650000*8760*0.73); lognormal variance with pedigree 0.0119, pedigree (2,4,4,3,2)
  Calculated generic value, not country specific.The amount of infrastructure input is calculated based on the assumption of an average lifetime of 30 years for this type of power plant. An average load factor for nuclear power plants of 73% was applied (PRIS database, 2018).
  Reference(s): International Atomic Energy Agency. 2018. Power Reactor Information System (PRIS), World Statistics, Load Factor, accessible online athttps://pris.iaea.org/PRIS/WorldStatistics/WorldTrendinAverageLoadFactor.aspx, last accessed February 2018
  property lifetime 30 year; name lifetime
- paper, woodfree, coated: 2.98607e-6, 8.69358e-6 kg (2 suppliers, which the file names only by identifier); sum of these 1.16796e-5 kg; = waste_paper; lognormal variance with pedigree 0.008, pedigree (1,1,4,1,1)
  Estimated value. Measured/calculated value for Quebec is extrapolated for GLO.
  Uncertainty: C
  properties: carbon content, fossil 0.0590617, carbon content, non-fossil 0.22775, dry mass 0.945 kg, heating value, net 14.11 MJ, water content 0.0582011, wet mass 1 kg
  note on carbon content, fossil: Fossil C content was calculated after fossil C contents of chemicals used in the production of the paper (in Tab 8.72 & 8.73 ecoinvent v2.2 report 11_III, part 8).
  note on carbon content, non-fossil: Biogenic C content was calculated after biogenic C contents of chemicals used in the production of the paper (in Tab 8.72 & 8.73 ecoinvent v2.2 report 11_III, part 8). The cellulose content in 1 kg of paper (on a wet mas basis) was estimated as (1-chemical content), C content of cellulose was considered 0.44 kgC/kg dry mass (ecoinvent v2.2 report, n 15a, pg 40)
- reinforcing steel: 6.95217e-7 kg; name reinforcing_steel; lognormal variance with pedigree 0.0119, pedigree (2,4,4,3,2)
  Estimated value. Measured/calculated value for Quebec is extrapolated for GLO.
  properties: carbon content, fossil 0.004, dry mass 1 kg, wet mass 1 kg
- scrap steel: -1.55298e-6, -7.42233e-7 kg (2 suppliers, which the file names only by identifier); sum of these -2.29522e-6 kg; = reinforcing_steel+ steel; lognormal variance with pedigree 0.21, pedigree (5,5,5,5,5)
  Estimated value. Same amount entering the dataset is estimated as by-product
  production volume; = apv_electricity * (BP_amount_1 / amount_RP)
    Calculated from production volume of reference product using the relative outputs.
  properties: dry mass 1 kg, wet mass 1 kg
- sodium hydroxide, without water, in 50% solution state: 2.09045e-6, 2.14079e-5 kg (2 suppliers, which the file names only by identifier); sum of these 2.34983e-5 kg; lognormal variance with pedigree 0.0119, pedigree (2,4,4,3,2)
  Estimated value. Measured/calculated value for Quebec is extrapolated for GLO.
  properties: dry mass 1 kg, heating value, net 3.03 MJ, wet mass 1 kg
- sodium hypochlorite, without water, in 15% solution state: 6.47154e-9, 4.91458e-8 kg (2 suppliers, which the file names only by identifier); sum of these 5.56174e-8 kg; lognormal variance with pedigree 0.0119, pedigree (2,4,4,3,2)
  Estimated value. Measured/calculated value for Quebec is extrapolated for GLO.
  properties: dry mass 1 kg, wet mass 1 kg
- sodium percarbonate, powder: 5.33213e-7, 1.07969e-6 kg (2 suppliers, which the file names only by identifier); sum of these 1.6129e-6 kg; lognormal variance with pedigree 0.0119, pedigree (2,4,4,3,2)
  Estimated value. Measured/calculated value for Quebec is extrapolated for GLO.
  properties: carbon content, fossil 0.0902256, dry mass 1 kg, heating value, net 4.63 MJ, wet mass 1 kg
- spent nuclear fuel: -2.25899e-5 kg; name spent_nuclear_fuel; lognormal variance with pedigree 0.0039, pedigree (2,4,1,3,2)
  Estimated value. Measured/calculated value for Quebec is extrapolated for GLO.Amount of spent fuel produced per year plus concrete of storage modules
  production volume; = spent_nuclear_fuel * apv_electricity/amount_RP
    Calculated from production volume of reference product using the relative outputs.
  properties: dry mass 1 kg, wet mass 1 kg
- steel, low-alloyed, hot rolled: 1.6e-6 kg; name steel; lognormal variance with pedigree 0.0119, pedigree (2,4,4,3,2)
  Estimated value. Measured/calculated value for Quebec is extrapolated for GLO.
  properties: carbon content, fossil 0.005, dry mass 1 kg, wet mass 1 kg
  note on carbon content, fossil: Low alloyed steel composition given in Tab. 3.2 ecoinvent v2.2 report 10_partII. Steel assumed to have a C content of 0.5%
- sulfuric acid: 6.46773e-5, 8.45956e-6 kg (2 suppliers, which the file names only by identifier); sum of these 7.31368e-5 kg; lognormal variance with pedigree 0.0119, pedigree (2,4,4,3,2)
  Estimated value. Measured/calculated value for Quebec is extrapolated for GLO.
  properties: dry mass 1 kg, wet mass 1 kg
- tap water: 0.0104372, 0.00777746 kg (2 suppliers, which the file names only by identifier); sum of these 0.0182147 kg; lognormal variance with pedigree 0.0119, pedigree (2,4,4,3,2)
  Estimated value. Measured/calculated value for Quebec is extrapolated for GLO.
  properties: carbon content, fossil 0.00178991, dry mass 0.000337476 kg, water content 2962.17, wet mass 1 kg
  note on carbon content, fossil: Bicarbonate content is 2.93 mol/m3. CO2 content is 0.1 mol/m3 (ecoinvent v2.2 report 8, Tab 93.1).
- transport, freight, light commercial vehicle: 5.45355e-6, 4.52327e-5 metric ton*km (2 suppliers, which the file names only by identifier); sum of these 5.06863e-5 metric ton*km; lognormal variance with pedigree 0.0119, pedigree (2,4,4,3,2)
  Estimated value. Measured/calculated value for Quebec is extrapolated for GLO. This vehicle use corresponds to maintenance and operation services related to the operation of the whole company. Transports have been distributed among different activities (electricity production, transport and distribution) according to their respective use of these transports and, when the exact distribution was not available, according to the relative expenses of each activity.
- transport, freight, lorry, unspecified: 8.57005e-5, 9.88774e-6 metric ton*km (2 suppliers, which the file names only by identifier); sum of these 9.55882e-5 metric ton*km; lognormal variance with pedigree 0.1313, pedigree (2,4,4,3,2)
  (same comment as for transport, freight, light commercial vehicle)
- transport, helicopter: 2.51634e-7 hour; lognormal variance with pedigree 0.1313, pedigree (2,4,4,3,2)
  (same comment as for transport, freight, light commercial vehicle)
- transport, passenger car: 7.87576e-6, 3.48693e-5 km (2 suppliers, which the file names only by identifier); sum of these 4.27451e-5 km; lognormal variance with pedigree 0.0119, pedigree (2,4,4,3,2)
  (same comment as for transport, freight, light commercial vehicle)
- uranium hexafluoride: 2.36374e-5 kg; lognormal variance with pedigree 0.0119, pedigree (2,4,4,3,2)
  Estimated value. Measured/calculated value for Quebec is extrapolated for GLO.
  As CANDU reactors use natural uranium (unenriched UO2) but no data were collected for UO2 production (impurities removal from yellowcake, refining to UO3 and conversion to UO2) uranium hexafluoride is used as proxy (UO3 is used to produce both UO2 and UF6).
  properties: dry mass 1 kg, wet mass 1 kg
- waste mineral oil: -1.91171e-6, -7.30119e-7 kg (2 suppliers, which the file names only by identifier); sum of these -2.64182e-6 kg; lognormal variance with pedigree 0.0039, pedigree (2,4,1,3,2)
  Estimated value. Measured/calculated value for Quebec is extrapolated for GLO.
  production volume; = waste_oil* apv_electricity/amount_RP
    Calculated from production volume of reference product using the relative outputs.
  properties: carbon content, fossil 0.864444, dry mass 0.9 kg, heating value, net 34.7 MJ, water content 0.111111, wet mass 1 kg
- waste paper, unsorted: -1.16796e-5 kg; name waste_paper; lognormal variance with pedigree 0.0039, pedigree (2,4,1,3,2)
  Estimated value. Measured/calculated value for Quebec is extrapolated for GLO.
  production volume; = waste_paper* apv_electricity/amount_RP
    Calculated from production volume of reference product using the relative outputs.
  properties: heating value, net 14.11 MJ, price 0.093 EUR2005
- waste reinforced concrete: -0.000930492, -0.0132797 kg (2 suppliers, which the file names only by identifier); sum of these -0.0142102 kg; = concrete*DM_concrete; lognormal variance with pedigree 0.21, pedigree (5,5,5,5,5)
  Estimated value. Same amount entering the dataset is estimated as by-product
  production volume; = apv_electricity * (BP_amount_3 / amount_RP)
    Calculated from production volume of reference product using the relative outputs.
  properties: dry mass 0.99418 kg, water content 0.00585407, wet mass 1 kg

## Inputs from nature
- Water, cooling, unspecified natural origin [natural resource, in water]: 0.165934 m3; name cooling_water; lognormal variance with pedigree 0.0444, pedigree (2,4,5,4,2)
  Estimated value. Measured/calculated value for Quebec is extrapolated for GLO.
- Water, river [natural resource, in water]: 0.0184372 m3; name process_water; lognormal variance with pedigree 0.0119, pedigree (2,4,4,3,2)
  Estimated value. Measured/calculated value for Quebec is extrapolated for GLO.

## Emissions to nature
- Aerosols, radioactive, unspecified [air, non-urban air or from high stacks]: 1.3376e-6 kBq; lognormal variance with pedigree 0.0119, pedigree (2,4,4,3,2)
  Estimated value. Measured/calculated value for Quebec is extrapolated for GLO.
- Antimony-124 [air, non-urban air or from high stacks]: 4.75e-10 kBq; lognormal variance with pedigree 0.4706, pedigree (2,5,5,5,5)
  Estimated value. Value extrapolated from a different PWR technology.
- Antimony-125 [air, non-urban air or from high stacks]: 2.34e-8 kBq; lognormal variance with pedigree 0.4706, pedigree (2,5,5,5,5)
  Estimated value. Value extrapolated from a different PWR technology.
- Barium-140 [air, non-urban air or from high stacks]: 3.17e-10 kBq; lognormal variance with pedigree 0.4706, pedigree (2,5,5,5,5)
  Estimated value. Value extrapolated from a different PWR technology.
- Caesium-137 [air, non-urban air or from high stacks]: 7.28e-9 kBq; lognormal variance with pedigree 0.4706, pedigree (2,5,5,5,5)
  Estimated value. Value extrapolated from a different PWR technology.
- Carbon-14 [air, non-urban air or from high stacks]: 2.45829e-5 kBq; lognormal variance with pedigree 0.3113, pedigree (2,4,4,3,2)
  Estimated value. Measured/calculated value for Quebec is extrapolated for GLO.
- Cobalt-58 [air, non-urban air or from high stacks]: 1.64e-8 kBq; lognormal variance with pedigree 0.4706, pedigree (2,5,5,5,5)
  Estimated value. Value extrapolated from a different PWR technology.
- Cobalt-60 [air, non-urban air or from high stacks]: 7.57e-8 kBq; lognormal variance with pedigree 0.4706, pedigree (2,5,5,5,5)
  Estimated value. Value extrapolated from a different PWR technology.
- Iodine-131 [air, non-urban air or from high stacks]: 3.61513e-7 kBq; lognormal variance with pedigree 0.0119, pedigree (2,4,4,3,2)
  Estimated value. Measured/calculated value for Quebec is extrapolated for GLO.
- Iodine-133 [air, non-urban air or from high stacks]: 1.82e-6 kBq; lognormal variance with pedigree 0.4706, pedigree (2,5,5,5,5)
  Estimated value. Value extrapolated from a different PWR technology.
- Krypton-85m [air, non-urban air or from high stacks]: 0.00987 kBq; lognormal variance with pedigree 0.4706, pedigree (2,5,5,5,5)
  Estimated value. Value extrapolated from a different PWR technology.
- Niobium-95 [air, non-urban air or from high stacks]: 0.0286429 kBq; lognormal variance with pedigree 0.0119, pedigree (2,4,4,3,2)
  Estimated value. Measured/calculated value for Quebec is extrapolated for GLO.
- Noble gases, radioactive, unspecified [air, non-urban air or from high stacks]: 0.259 kBq; lognormal variance with pedigree 0.4706, pedigree (2,5,5,5,5)
  Estimated value. Value extrapolated from a different PWR technology.
- Radioactive species, other beta emitters [air, non-urban air or from high stacks]: 8.67e-8 kBq; lognormal variance with pedigree 0.4706, pedigree (2,5,5,5,5)
  Estimated value. Value extrapolated from a different PWR technology.
- Silver-110 [air, non-urban air or from high stacks]: 3.13e-9 kBq; lognormal variance with pedigree 0.4706, pedigree (2,5,5,5,5)
  Estimated value. Value extrapolated from a different PWR technology.
- Water [air, non-urban air or from high stacks]: 0.0368743 m3; = 0.2*(cooling_water+process_water); lognormal variance with pedigree 0.0133, pedigree (3,4,4,3,2)
  Estimated value. Estimation based on input of water. It is assumed that 20% of cooling water is evaporated and 80% is rejected to the river
- Xenon-133 [air, non-urban air or from high stacks]: 0.604 kBq; lognormal variance with pedigree 0.4706, pedigree (2,5,5,5,5)
  Estimated value. Value extrapolated from a different PWR technology.
- Xenon-135 [air, non-urban air or from high stacks]: 0.166 kBq; lognormal variance with pedigree 0.4706, pedigree (2,5,5,5,5)
  Estimated value. Value extrapolated from a different PWR technology.
- Zirconium-95 [air, non-urban air or from high stacks]: 5.78e-8 kBq; lognormal variance with pedigree 0.4706, pedigree (2,5,5,5,5)
  Estimated value. Value extrapolated from a different PWR technology.
- Antimony-122 [water, surface water]: 9.04e-7 kBq; lognormal variance with pedigree 0.4706, pedigree (2,5,5,5,5)
  Estimated value. Value extrapolated from a different PWR technology.
- Antimony-124 [water, surface water]: 0.0256952 kBq; lognormal variance with pedigree 0.3113, pedigree (2,4,4,3,2)
  Estimated value. Measured/calculated value for Quebec is extrapolated for GLO.
- Antimony-125 [water, surface water]: 4.17e-5 kBq; lognormal variance with pedigree 0.4706, pedigree (2,5,5,5,5)
  Estimated value. Value extrapolated from a different PWR technology.
- Caesium-134 [water, surface water]: 0.00014683 kBq; lognormal variance with pedigree 0.0119, pedigree (2,4,4,3,2)
  Estimated value. Measured/calculated value for Quebec is extrapolated for GLO.
- Caesium-136 [water, surface water]: 2.81e-7 kBq; lognormal variance with pedigree 0.4706, pedigree (2,5,5,5,5)
  Estimated value. Value extrapolated from a different PWR technology.
- Caesium-137 [water, surface water]: 0.000206897 kBq; lognormal variance with pedigree 0.0119, pedigree (2,4,4,3,2)
  Estimated value. Measured/calculated value for Quebec is extrapolated for GLO.
- Carbon-14 [water, surface water]: 0.00286429 kBq; lognormal variance with pedigree 0.0119, pedigree (2,4,4,3,2)
  Estimated value. Measured/calculated value for Quebec is extrapolated for GLO.
- Cerium-141 [water, surface water]: 1.76e-7 kBq; lognormal variance with pedigree 0.4706, pedigree (2,5,5,5,5)
  Estimated value. Value extrapolated from a different PWR technology.
- Cerium-144 [water, surface water]: 4.82e-7 kBq; lognormal variance with pedigree 0.4706, pedigree (2,5,5,5,5)
  Estimated value. Value extrapolated from a different PWR technology.
- Chromium-51 [water, surface water]: 7.56e-6 kBq; lognormal variance with pedigree 0.4706, pedigree (2,5,5,5,5)
  Estimated value. Value extrapolated from a different PWR technology.
- Cobalt-57 [water, surface water]: 8.92e-6 kBq; lognormal variance with pedigree 0.4706, pedigree (2,5,5,5,5)
  Estimated value. Value extrapolated from a different PWR technology.
- Cobalt-58 [water, surface water]: 0.00114 kBq; lognormal variance with pedigree 0.4706, pedigree (2,5,5,5,5)
  Estimated value. Value extrapolated from a different PWR technology.
- Cobalt-60 [water, surface water]: 0.000700779 kBq; lognormal variance with pedigree 0.0119, pedigree (2,4,4,3,2)
  Estimated value. Measured/calculated value for Quebec is extrapolated for GLO.
- Hydrocarbons, unspecified [water, surface water]: 1.23471e-6 kg; lognormal variance with pedigree 0.0119, pedigree (2,4,4,3,2)
  Estimated value. Measured/calculated value for Quebec is extrapolated for GLO.
- Iodine-131 [water, surface water]: 0.00500556 kBq; lognormal variance with pedigree 0.0119, pedigree (2,4,4,3,2)
  Estimated value. Measured/calculated value for Quebec is extrapolated for GLO.
- Iodine-133 [water, surface water]: 4.16e-7 kBq; lognormal variance with pedigree 0.4706, pedigree (2,5,5,5,5)
  Estimated value. Value extrapolated from a different PWR technology.
- Iron-59 [water, surface water]: 0.0233593 kBq; lognormal variance with pedigree 0.0119, pedigree (2,4,4,3,2)
  Estimated value. Measured/calculated value for Quebec is extrapolated for GLO.
- Lanthanum-140 [water, surface water]: 4.95e-7 kBq; lognormal variance with pedigree 0.4706, pedigree (2,5,5,5,5)
  Estimated value. Value extrapolated from a different PWR technology.
- Manganese-54 [water, surface water]: 1.31e-5 kBq; lognormal variance with pedigree 0.4706, pedigree (2,5,5,5,5)
  Estimated value. Value extrapolated from a different PWR technology.
- Molybdenum-99 [water, surface water]: 6e-9 kBq; lognormal variance with pedigree 0.3433, pedigree (2,2,5,5,2)
  Estimated value. Value extrapolated from a different PWR technology.
- Niobium-95 [water, surface water]: 3.07e-6 kBq; lognormal variance with pedigree 0.4706, pedigree (2,5,5,5,5)
  Estimated value. Value extrapolated from a different PWR technology.
- Radioactive species, alpha emitters [water, surface water]: 3.02e-8 kBq; lognormal variance with pedigree 0.4706, pedigree (2,5,5,5,5)
  Estimated value. Value extrapolated from a different PWR technology.
- Ruthenium-103 [water, surface water]: 2.85e-7 kBq; lognormal variance with pedigree 0.4706, pedigree (2,5,5,5,5)
  Estimated value. Value extrapolated from a different PWR technology.
- Silver-110 [water, surface water]: 4.43e-6 kBq; lognormal variance with pedigree 0.4706, pedigree (2,5,5,5,5)
  Estimated value. Value extrapolated from a different PWR technology.
- Sodium-24 [water, surface water]: 9.98e-6 kBq; lognormal variance with pedigree 0.4706, pedigree (2,5,5,5,5)
  Estimated value. Value extrapolated from a different PWR technology.
- Strontium-89 [water, surface water]: 3.65e-6 kBq; lognormal variance with pedigree 0.4706, pedigree (2,5,5,5,5)
  Estimated value. Value extrapolated from a different PWR technology.
- Strontium-90 [water, surface water]: 1.3e-6 kBq; lognormal variance with pedigree 0.4706, pedigree (2,5,5,5,5)
  Estimated value. Value extrapolated from a different PWR technology.
- Suspended solids, unspecified [water, surface water]: 1.76585e-5 kg; lognormal variance with pedigree 0.0119, pedigree (2,4,4,3,2)
  Estimated value. Measured/calculated value for Quebec is extrapolated for GLO.
- Technetium-99m [water, surface water]: 2.81e-6 kBq; lognormal variance with pedigree 0.4706, pedigree (2,5,5,5,5)
  Estimated value. Value extrapolated from a different PWR technology.
- Tellurium-123m [water, surface water]: 1.57e-6 kBq; lognormal variance with pedigree 0.4706, pedigree (2,5,5,5,5)
  Estimated value. Value extrapolated from a different PWR technology.
- Tellurium-132 [water, surface water]: 8.42e-8 kBq; lognormal variance with pedigree 0.4706, pedigree (2,5,5,5,5)
  Estimated value. Value extrapolated from a different PWR technology.
- Tritium [water, surface water]: 133.482 kBq; lognormal variance with pedigree 0.0119, pedigree (2,4,4,3,2)
  Estimated value. Measured/calculated value for Quebec is extrapolated for GLO.
- Water [water, surface water]: 0.147515 m3; = 0.8*(cooling_water+process_water)+(drinking_water/1000); lognormal variance with pedigree 0.0193, pedigree (4,4,4,3,2)
  (same comment as for Water)
- Zinc-65 [water, surface water]: 0.00183537 kBq; lognormal variance with pedigree 0.0119, pedigree (2,4,4,3,2)
  Estimated value. Measured/calculated value for Quebec is extrapolated for GLO.
- Zirconium-95 [water, surface water]: 0.0116796 kBq; lognormal variance with pedigree 0.3113, pedigree (2,4,4,3,2)
  Estimated value. Measured/calculated value for Quebec is extrapolated for GLO.

## Sampling procedure
Extrapolation from regional dataset

## Extrapolations
Extrapolation from regional dataset. Uncertainty has been adjusted accordingly.

## Review by Carl Vadenbo 2015-05-28
The update of the whole electricity sector for the ecoinvent v3.2 database consist of hundreds of datasets. All these datasets have passed through a streamlined review processes where the underlying modelling of production volumes, technology shares and efficiencies was reviewed in detail prior to the datasets being submitted to the database.
