# iron-nickel-chromium alloy production

Dataset: EcoSpold 2, unit process
Geography: RER
Time period: 2000-01-01 to 2023-12-31
Technology level: current
Classification: EcoSpold01Categories: metals/extraction
Classification: ISIC rev.4 ecoinvent: 2410:Manufacture of basic iron and steel
Synonyms: 1.4876; Incoloy 800
Tags: ConvertedDataset
Scenario: Business-as-Usual
System model: Allocation, cut-off by classification
Generated by: Alex Primas
Published in: Althaus H.-J. 2004
Database: ecoinvent
isCopyrightProtected: true
accessRestrictedTo: 1

## General comment
This data represents the production of 1 kg of iron-nickel-chromium alloy via the electric-arc furnace method to produce 18/8 chromium steel. Raw materials, auxilliaries, energy consumption and emissions are modelled with literature values.
[This dataset was already contained in the ecoinvent database version 2. It was not individually updated during the transfer to ecoinvent version 3. Life Cycle Impact Assessment results may still have changed, as they are affected by changes in the supply chain, i.e. in other datasets. This dataset was generated following the ecoinvent quality guidelines for version 2. It may have been subject to central changes described in the ecoinvent version 3 change report (http://www.ecoinvent.org/database/ecoinvent-version-3/reports-of-changes/), and the results of the central updates were reviewed extensively. The changes added e.g. consistent water flows and other information throughout the database. The documentation of this dataset can be found in the ecoinvent reports of version 2, which are still available via the ecoinvent website. The change report linked above covers all central changes that were made during the conversion process.]

## Included activities start
From the reception of scrap iron at the factory gate.

## Included activities end
This activity ends with 1 kg of iron-nickel-chromium alloy at the factory gate. The dataset includes the input materials, energy uses and emissions.

## Geography
Data relate to EAF plants in the EU

## Technology
It is common practice for special alloys to be recycled from identical scrap wherever possible. In practice, it is often not possible to segregate products and scrap into specific alloys. Alloys and products get mixed. Apart from the possibility of re-melting scrap mixtures in order to produce ingots of known composition, it is feasible to adjust the composition of the scrap by adding controlled amounts of primary metals in order to produce ingots of the required specification. For the process modelled here, it is assumed that primary metals (nickel, chromium) are added to the scrap.
The production of iron-nickel-chromium alloy is modelled with the process of electric-arc furnace production to produce 18/8 chromium steel. This process uses secondary steel. The scrap is used only as iron-bearing input. The chromium input is also modelled as ferrochromium input (high-carbon ferrochromium with 68% Cr and 4-10% C). Ferronickel (25% Ni) cannot be used for this alloy because of its high nickel content. The nickel input is modelled with class I nickel (99.5% Ni). Iron scrap is used as main iron input. A surplus of 10.5% metal input is used in analogy to the stainless steel process.
Table below shows the principal composition of various iron-nickel-chromium alloys similar to the one modelled in this inventory.
Reference:
Classen M., Althaus H.-J., Blaser S. and Jungbluth N. (2007) Life Cycle Invento-ries of Metals. Final report ecoinvent Data v2.0 No. 10, Empa, Swiss Centre for Life Cycle Inventories, Dübendorf CH. Retrieved from: www.ecoinvent.ch.

## Reference product
- iron-nickel-chromium alloy: 1 kg; source Special Metals Corporation 2001; By-product classification allocatable product; CPC 41115: Other ferro-alloys; HS2017 7202: Ferro-alloys
  Many applications in the chemical and petrochemical industry as well as power plants and gas-turbine components need alloys with high corrosion resistance, high-temperature and oxidation resistance. In such applications, iron-nickel-chromium alloys can lead to better performance or longer service life and are therefore used despite their high cost.
  Thousands of different alloys contain nickel or chrome, each of them developed to offer a particular combination of technical properties (corrosion resistance, mechanical properties and service life) relevant to specific conditions of use. Stainless steel commonly has a nickel content of 8-14 percent, rising to 15-40 percent in special engineering alloys and 40-90 percent in special alloys for the aerospace and electronic industries.
  Nickel-iron-chromium alloys such as Incoloy 800 H and Incoloy 803 have high strength and excellent resistance to oxidation and carburisation in high-temperature atmospheres. They are used in chemical and petrochemical processing plants, in super-heaters for power plants and industrial furnaces. Other alloys (such as Incoloy 825 or Alloy 020) are particularly resistant to sulphuric and phosphoric acids. Such alloys are used in acid production and pickling equipment, pollution-control equipment as well as in nuclear fuel reprocessing.
  EcoSpold01Location=RER
  production volume 1.32237 kg
    This is a placeholder value that does not reflect real-world production volumes. This dataset does not currently require a real-world production volume to work in the database framework, and no actual data were collected yet. This has no negative effect on the results of the ecoinvent database. The placeholder value of this activity was scaled according to the nominal GDP of 2005 (source: United Nations, http://data.un.org/Glossary.aspx?q=GDP+%28current+US%24%29, accessed 20130726) to reflect an appropriate share of the global production volume, which is also a placeholder value.
  property price 12.82 EUR2005
    Calculated after Alibaba. Source: http://www.alibaba.com/product-detail/nickel-iron-chromium-alloy-800_60268184954.html?spm=a2700.7724857.29.348.C0emWl
  properties: carbon allocation 0 kg, carbon content 0, carbon content, fossil 0, carbon content, non-fossil 0, dry mass 1 kg, water content 0, water in wet mass 0 kg, wet mass 1 kg

## Inputs from technosphere
- anode, for metal electrolysis: 0.003 kg; source Classen M. 2008; lognormal variance with pedigree 0.1113, pedigree (2,3,5,3,4)
  Literature value. Based on data from steel production using the electric arc furnace process.
  EcoSpold01Location=RER
  Uncertainty: based on data from steel production with EAF
  properties: carbon content, fossil 0.865971, dry mass 1 kg, wet mass 1 kg
  note on carbon content, fossil: The main component of the anode is carbon, coming from bitumen and petroleum coke (ecoinvent v2.2 report 10). The C content in those components of the anode has been taken into account to calculate the anode final C content.
- electric arc furnace converter: 4e-11 unit; source Classen M. 2008; lognormal variance with pedigree 0.48, pedigree (5,5,5,5,4)
  EcoSpold01Location=RER
  Literature value. Based on data from steel production using the electric arc furnace process.
  Uncertainty: based on data from steel production with EAF
- electric arc furnace dust: -0.00509924, -7.64113e-7 kg (2 suppliers, which the file names only by identifier); sum of these -0.0051 kg; source Classen M. 2008; lognormal variance with pedigree 0.0715, pedigree (2,3,2,3,4)
  Literature value. Based on data from steel production using the electric arc furnace process.
  production volume
    Calculated from production volume of reference product using the relative outputs.
  properties: calcium content 0.0523414, carbon content, fossil 0.0155074, chlorine content 0.010876, dry mass 0.999 kg, iron content 0.259301, magnesium content 0.013047, manganese content 0.019242, oxygen content 0.0832861, silicon content 0.0212644, tungsten content 0.00866892, wet mass 1 kg, zinc content 0.0646678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
  note on calcium content: The value of 'calcium content' is documented in Turner & Symeonidis, 2020. Reference: Turner David & Symeonidis Avraam, 2020, Life cycle inventories of the treatment of iron and steelmaking by-products, ecoinvent association, Zürich, Switzerland
  note on carbon content, fossil: The value of 'carbon content, fossil' is documented in Turner & Symeonidis, 2020. Reference: Turner David & Symeonidis Avraam, 2020, Life cycle inventories of the treatment of iron and steelmaking by-products, ecoinvent association, Zürich, Switzerland
  note on chlorine content: The value of 'chlorine content' is documented in Turner & Symeonidis, 2020. Reference: Turner David & Symeonidis Avraam, 2020, Life cycle inventories of the treatment of iron and steelmaking by-products, ecoinvent association, Zürich, Switzerland
  note on iron content: The value of 'iron content' is documented in Turner & Symeonidis, 2020. Reference: Turner David & Symeonidis Avraam, 2020, Life cycle inventories of the treatment of iron and steelmaking by-products, ecoinvent association, Zürich, Switzerland
  note on magnesium content: The value of 'magnesium content' is documented in Turner & Symeonidis, 2020. Reference: Turner David & Symeonidis Avraam, 2020, Life cycle inventories of the treatment of iron and steelmaking by-products, ecoinvent association, Zürich, Switzerland
  note on manganese content: The value of 'manganese content' is documented in Turner & Symeonidis, 2020. Reference: Turner David & Symeonidis Avraam, 2020, Life cycle inventories of the treatment of iron and steelmaking by-products, ecoinvent association, Zürich, Switzerland
  note on oxygen content: The value of 'oxygen content' is documented in Turner & Symeonidis, 2020. Reference: Turner David & Symeonidis Avraam, 2020, Life cycle inventories of the treatment of iron and steelmaking by-products, ecoinvent association, Zürich, Switzerland
  note on silicon content: The value of 'silicon content' is documented in Turner & Symeonidis, 2020. Reference: Turner David & Symeonidis Avraam, 2020, Life cycle inventories of the treatment of iron and steelmaking by-products, ecoinvent association, Zürich, Switzerland
  note on tungsten content: The value of 'tungsten content' is documented in Turner & Symeonidis, 2020. Reference: Turner David & Symeonidis Avraam, 2020, Life cycle inventories of the treatment of iron and steelmaking by-products, ecoinvent association, Zürich, Switzerland
  note on zinc content: The value of 'zinc content' is documented in Turner & Symeonidis, 2020. Reference: Turner David & Symeonidis Avraam, 2020, Life cycle inventories of the treatment of iron and steelmaking by-products, ecoinvent association, Zürich, Switzerland
- electric arc furnace slag: -0.0583886, -0.0184114 kg (2 suppliers, which the file names only by identifier); sum of these -0.0768 kg; source Classen M. 2008; lognormal variance with pedigree 0.0715, pedigree (2,3,2,3,4)
  EcoSpold01Location=CH
  Literature value. Based on data from steel production using the electric arc furnace process.
  Uncertainty: based on data from steel production with EAF
  production volume
    Calculated from the production volume of iron-nickel-chromium alloy in proportion to the respective output amounts.
  properties: carbon content, fossil 0.00338635, dry mass 1 kg, wet mass 1 kg
- electricity, medium voltage: 0.425 kWh; source Classen M. 2008; lognormal variance with pedigree 0.1113, pedigree (2,3,5,3,4)
  EcoSpold01Location=UCTE
  Literature value. Based on data from steel production using the electric arc furnace process.
  Uncertainty: based on data from steel production with EAF
- ferrochromium, high-carbon, 68% Cr: 0.309 kg; lognormal variance with pedigree 0.118, pedigree (4,5,5,5,4)
  EcoSpold01Location=GLO
  Estimation. Share of Cr in scrap input not known.
  Uncertainty: share of Cr in scrap input not known
  properties: carbon content, fossil 0.07, dry mass 1 kg, heating value, net 2.12 MJ, wet mass 1 kg
  note on carbon content, fossil: Ferrochromium is a master alloy of iron and chromium, containing 45 – 95 % Cr and various amounts of iron, carbon, and other elements. High-carbon ferrochromium (HC ferrochromium) contains 4 – 10 % C (ecoinvent v2.2 report 20_part VI). An average content of 7% C was considered
- hard coal: 0.014 kg; source Classen M. 2008; lognormal variance with pedigree 0.1113, pedigree (2,3,5,3,4)
  (same comment as for electricity, medium voltage)
  properties: carbon content, fossil 0.845, dry mass 0.94 kg, heating value, net 27.91 MJ, water content 0.0638298, wet mass 1 kg
  note on carbon content, fossil: C content 75-94% (specified in Tab 1.1, report 6, part VI). A mean content of 0.845 kg C/ kg dry hard coal was considered
  note on heating value, net: Based on the Characterization factor of Hard coal in the CED method
- inert waste, for final disposal: -0.005 kg; source Classen M. 2008; lognormal variance with pedigree 0.0715, pedigree (2,3,2,3,4)
  (same comment as for electric arc furnace slag)
  production volume
    (same comment as for electric arc furnace slag)
  properties: dry mass 0.995 kg, water content 0.00502513, wet mass 1 kg
- iron scrap, sorted, pressed: 0.474 kg; lognormal variance with pedigree 0.118, pedigree (4,5,5,5,4)
  Estimation.
  EcoSpold01Location=RER
  Uncertainty: iron input from scrap, balance to 110.5% of output
  properties: dry mass 1 kg, wet mass 1 kg
- natural gas, high pressure: 0.000173105, 0.0248269 m3 (2 suppliers, which the file names only by identifier); sum of these 0.025 m3; source Classen M. 2008; lognormal variance with pedigree 0.1113, pedigree (2,3,5,3,4)
  (same comment as for anode, for metal electrolysis)
  properties: carbon content, fossil 0.602381, dry mass 0.84 kg, heating value, gross 40 MJ, heating value, net 36 MJ, wet mass 0.84 kg
  note on carbon content, fossil: An average C content of 0.506 kg C/ m3 has been assumed (this average has been calculated using data in Tab 3.5, ecoinvent v2.2 report 6_V
  note on heating value, net: Literature value, Source: Christoph Meili;Niels Jungbluth;Maresa Bussa (2021) Life cycle inventories of crude oil and natural gas extraction. ESU-services Ltd. commissioned by BAFU & VSG, Schaffhausen, Switzerland, http://esu-services.ch/data/public-lci-reports/
- nickel, class 1: 0.322 kg; lognormal variance with pedigree 0.118, pedigree (4,5,5,5,4)
  EcoSpold01Location=GLO
  Estimation. Share of Ni in scrap input not known.
  Uncertainty: share of Ni in scrap input not known
  properties: dry mass 1 kg, wet mass 1 kg
- oxygen, liquid: 0.0507 kg; source Classen M. 2008; lognormal variance with pedigree 0.1113, pedigree (2,3,5,3,4)
  (same comment as for anode, for metal electrolysis)
  properties: dry mass 1 kg, wet mass 1 kg
- quicklime, in pieces, loose: 0.055 kg; source Classen M. 2008; lognormal variance with pedigree 0.1113, pedigree (2,3,5,3,4)
  (same comment as for electric arc furnace slag)
  properties: dry mass 0.99 kg, water content 0.010101, wet mass 1 kg
- refractory, basic, packed: 0.0135 kg; source Classen M. 2008; lognormal variance with pedigree 0.1113, pedigree (2,3,5,3,4)
  Literature value. Based on data from steel production using the electric arc furnace process.
  EcoSpold01Location=DE
  Uncertainty: based on data from steel production with EAF
  properties: dry mass 1 kg, wet mass 1 kg

## Emissions to nature
All rows: source Classen M. 2008
- Benzene [air, unspecified]: 2.28e-6 kg; lognormal variance with pedigree 0.1513, pedigree (2,3,5,3,4)
  Literature value. Based on data from steel production using the electric arc furnace process.
  Uncertainty: based on data from steel production with EAF
- Cadmium II [air, unspecified]: 3.65e-8 kg; lognormal variance with pedigree 0.7613, pedigree (2,3,5,3,4)
  (same comment as for Benzene)
- Carbon monoxide, fossil [air, unspecified]: 0.00232 kg; lognormal variance with pedigree 0.7613, pedigree (2,3,5,3,4)
  (same comment as for Benzene)
- Chromium III [air, unspecified]: 1.25e-6 kg; lognormal variance with pedigree 0.7613, pedigree (2,3,5,3,4)
  (same comment as for Benzene)
- Copper ion [air, unspecified]: 2.3e-7 kg; lognormal variance with pedigree 0.7613, pedigree (2,3,5,3,4)
  (same comment as for Benzene)
- Dioxins, measured as 2,3,7,8-tetrachlorodibenzo-p-dioxin [air, unspecified]: 4.54e-12 kg; lognormal variance with pedigree 0.4113, pedigree (2,3,5,3,4)
  (same comment as for Benzene)
- Hexachlorobenzene [air, unspecified]: 2e-8 kg; lognormal variance with pedigree 0.4113, pedigree (2,3,5,3,4)
  (same comment as for Benzene)
- Hydrocarbons, aromatic [air, unspecified]: 7.7e-5 kg; lognormal variance with pedigree 0.1513, pedigree (2,3,5,3,4)
  (same comment as for Benzene)
- Hydrochloric acid [air, unspecified]: 5.2e-6 kg; lognormal variance with pedigree 0.1513, pedigree (2,3,5,3,4)
  (same comment as for Benzene)
- Hydrogen fluoride [air, unspecified]: 2.35e-6 kg; lognormal variance with pedigree 0.1513, pedigree (2,3,5,3,4)
  (same comment as for Benzene)
- Lead II [air, unspecified]: 1.81e-6 kg; lognormal variance with pedigree 0.7613, pedigree (2,3,5,3,4)
  (same comment as for Benzene)
- Mercury II [air, unspecified]: 2.24e-6 kg; lognormal variance with pedigree 0.7613, pedigree (2,3,5,3,4)
  (same comment as for Benzene)
- Nickel II [air, unspecified]: 7e-7 kg; lognormal variance with pedigree 0.7613, pedigree (2,3,5,3,4)
  (same comment as for Benzene)
- Nitrogen oxides [air, unspecified]: 0.00018 kg; lognormal variance with pedigree 0.1513, pedigree (2,3,5,3,4)
  (same comment as for Benzene)
- PAH, polycyclic aromatic hydrocarbons [air, unspecified]: 3.72e-8 kg; lognormal variance with pedigree 0.4113, pedigree (2,3,5,3,4)
  (same comment as for Benzene)
- Particulate Matter, < 2.5 um [air, unspecified]: 0.000166 kg; lognormal variance with pedigree 0.4113, pedigree (2,3,5,3,4)
  (same comment as for Benzene)
- Particulate Matter, > 10 um [air, unspecified]: 5.86e-5 kg; lognormal variance with pedigree 0.1513, pedigree (2,3,5,3,4)
  (same comment as for Benzene)
- Particulate Matter, > 2.5 um and < 10um [air, unspecified]: 0.000166 kg; lognormal variance with pedigree 0.2313, pedigree (2,3,5,3,4)
  (same comment as for Benzene)
- Polychlorinated biphenyls [air, unspecified]: 2.32e-8 kg; lognormal variance with pedigree 0.4113, pedigree (2,3,5,3,4)
  (same comment as for Benzene)
- Sulfur dioxide [air, unspecified]: 7.7e-5 kg; lognormal variance with pedigree 0.1113, pedigree (2,3,5,3,4)
  (same comment as for Benzene)
- Zinc II [air, unspecified]: 2.29e-5 kg; lognormal variance with pedigree 0.7613, pedigree (2,3,5,3,4)
  (same comment as for Benzene)

## Sampling procedure
based on literature

## Review by Rolf Frischknecht 2007-08-13
passed
none

## Review by Emilia Moreno Ruiz 2012-05-24
dataset documented by trainee Helen Hamilton
