# treatment of electric arc furnace slag, residual material landfill

Dataset: EcoSpold 2, unit process
Geography: RoW
Time period: 2010-01-01 to 2023-12-31
Technology level: current
Classification: ISIC rev.4 ecoinvent: 3822:Treatment and disposal of hazardous waste
Scenario: Business-as-Usual
System model: Allocation, cut-off by classification
Generated by: Nikolia Stoikou
Database: ecoinvent
isCopyrightProtected: true
accessRestrictedTo: 1

## General comment
This dataset represents the activity of waste disposal of 'electric arc furnace slag' in a residual material landfill (RMLF). Recommended use of this dataset: for wastes-residues that are low in organic carbon (< 5 w-%) and are not biologically or chemically reactive in water. Waste composition (wet, in ppmw): H2O 5005; O 318130; H na; C 2672.7; S 1551.5; N na; P 861.86; B na; Cl na; Br na; F 20020; I na; Ag 8.4084; As 0.85185; Ba 417.42; Cd 7.6076; Co 4.8048; Cr 28228; Cu 637.64; Hg 0.04004; Mn 35135; Mo 180.18; Ni 192.19; Pb 243.24; Sb 4.004; Se 18.018; Sn 10.01; V 890.89; Zn 444.44; Be 1.1011; Sc na; Sr na; Ti 3123.1; Tl 11.011; W na; Si 83683; Fe 159160; Ca 251250; Al 37137; K 110.11; Mg 50250; Na 614.61. Share of carbon in initial waste input that is biogenic 0%. Additional solidification of residues with 0.4 kg of cement.

## Included activities start
The activity starts with the waste being available at the gate of the treatment facility. Collection and transportation of the waste to the treatment plant is not included.

## Included activities end
The activity ends with the waste being treated and waste-specific emissions from the landfill are released to water (short-term emissions to water from leachate and long-term emissions to ground water). Expenditures for solidificalion with cement are also included.

## Geography
This dataset represents a landfill site with mean annual temperature (MAT) of 16.743579766537 degC, mean annual precipitation (MAP) of 1250.84108527132 mm/year, mean annual actual evaporation (EAT) of 460.58904958214 mm/year, and net infiltration of 790.3 mm/year. The leachate percolating through the residual material landfill has an average residence time of 4.43 years.
Reference for climatic parameters:
UN data, 2020. Precipitation, Environment Statistics Database, United Nations Statistics Division Available at: http://data.un.org/Data.aspx?q=precipitation&d=ENV&f=variableID%3a6;
World Bank, 2022. Surface area (sq.km), World Bank Group Available at: https://data.worldbank.org/indicator/AG.SRF.TOTL.K2;

## Technology
Residual material landfill for polluted, inorganic waste (VVEA Type C). With base seal and leachate collection system. Ultimate average landfill height is 10 meters. Operation phase duration is 30 years. Recultivation after closure. Additional solidification with cement requested. Based on average waste composition and climate data the end of carbonate phase in the residual material landfill is estimated to be reached after 60 000 years.

## Reference product
- electric arc furnace slag: -1 kg; By-product classification Waste; CPC 39310: Slag, dross, scalings and other waste from the manufacture of iron or steel; HS2017 261900: Slag, dross; (other than granulated slag), scalings and other waste from the manufacture of iron or steel
  main reference product of this activity
  production volume 7.13797e10 kg
    Assuming that 96.1% of electric arc furnace slag is sent for disposal in landfill (worldsteel, 2010). References: Worldsteel (2010). Steel industry by-products. World Steel Association: Brussels, Belgium.
  property price 0 EUR2005
    Waste products are assigned a price of zero as they are assumed to require further treatment.
  properties: aluminium content 0.0373238, antimony content 4.02413e-6, arsenic content 8.56134e-7, barium content 0.000419516, beryllium content 1.10664e-6, cadmium content 7.64585e-6, calcium content 0.252514, carbon allocation 0.00267267 kg, carbon content 0.00268611, carbon content, fossil 0.00268611, carbon content, non-fossil 0, chromium content 0.0283701, cobalt content 4.82896e-6, copper content 0.000640843, dry mass 0.994995 kg, fluorine content 0.0201206, heating value, gross 0 MJ, heating value, net 0 MJ, iron content 0.159959, lead content 0.000244466, magnesium content 0.0505028, manganese content 0.0353117, mercury content 4.02413e-8, molybdenum content 0.000181086, nickel content 0.000193158, oxygen content 0.319727, phosphorus content 0.000866194, potassium content 0.000110664, selenium content 1.81086e-5, silicon content 0.0841043, silver content 8.45067e-6, sodium content 0.000617704, sulfur content 0.00155935, thallium content 1.10664e-5, tin content 1.00603e-5, titanium content 0.00313882, vanadium content 0.000895369, water content 0.00503016, water in wet mass 0.00500499 kg, wet mass 1 kg, zinc content 0.000446678

## Inputs from technosphere
- cast iron: 5.0555e-6 kg; lognormal variance with pedigree 0.31529, pedigree (1,1,2,1,1)
  for residual material landfill infrastructure
  properties: carbon content, fossil 0.04, dry mass 1 kg, wet mass 1 kg
- cement, unspecified: 0.019856, 0.00862982, 0.000222976, 0.00525903, 0.0327739, 0.00102874, 0.000751958, 0.000407541, 0.000809987, 0.00123833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 kg (11 suppliers, which the file names only by identifier); sum of these 0.4 kg; lognormal variance with pedigree 0.009284, pedigree (1,1,2,1,1)
  cement required for solidification of landfilled residual material
  properties: dry mass 1 kg, wet mass 1 kg
- concrete, 25MPa: 5.25256e-10, 1.12472e-9, 1.77831e-8, 1.74996e-8, 4.32437e-7 m3 (5 suppliers, which the file names only by identifier); sum of these 4.6937e-7 m3; lognormal variance with pedigree 0.31529, pedigree (1,1,2,1,1)
  for residual material landfill infrastructure
  properties: cement content 206 kg, dry mass 2285 kg, fly ash content 69 kg, gravel content 1100 kg, sand content 910 kg, water content 0.0538293, wet mass 2408 kg
- diesel, burned in building machine: 0.028614 MJ; lognormal variance with pedigree 0.012675, pedigree (1,1,2,1,1)
  for residual material landfill infrastructure and operation
  properties: heating value, net 1 MJ
- electricity, low voltage: 3.25524e-7, 1.45309e-8, 2.28508e-7, 4.74298e-6, 4.68156e-7, 2.91605e-9, 1.07495e-6, 1.63294e-6, 8.08969e-8 kWh (9 suppliers, which the file names only by identifier); sum of these 8.5714e-6 kWh; lognormal variance with pedigree 0.012648, pedigree (1,1,2,1,1)
  for residual material landfill operation
- excavation, hydraulic digger: 0.00030086 m3; lognormal variance with pedigree 0.31529, pedigree (1,1,2,1,1)
  for residual material landfill infrastructure
- excavation, skid-steer loader: 0.00030086 m3; lognormal variance with pedigree 0.31529, pedigree (1,1,2,1,1)
  for residual material landfill infrastructure
- extrusion, plastic pipes: 8.1818e-5 kg; lognormal variance with pedigree 0.31529, pedigree (1,1,2,1,1)
  for residual material landfill infrastructure
- gravel, round: 0.1367 kg; lognormal variance with pedigree 0.31529, pedigree (1,1,2,1,1)
  for residual material landfill infrastructure
  properties: dry mass 1 kg, wet mass 1 kg
- heat, district or industrial, other than natural gas: 0.000896921, 4.15527e-7, 2.28239e-5 MJ (3 suppliers, which the file names only by identifier); sum of these 0.00092016 MJ; lognormal variance with pedigree 0.012648, pedigree (1,1,2,1,1)
  for residual material landfill operation
  properties: heating value, net 1 MJ
- pitch: 0.000152039, 6.81502e-6, 3.35925e-6, 5.89428e-5, 9.72908e-6, 0.000859492, 0.000195322 kg (7 suppliers, which the file names only by identifier); sum of these 0.0012857 kg; lognormal variance with pedigree 0.31529, pedigree (1,1,2,1,1)
  for residual material landfill infrastructure
  properties: carbon content, fossil 0.83, dry mass 1 kg, heating value, net 28 MJ, wet mass 1 kg
- polyethylene, high density, granulate: 0.00024899 kg; lognormal variance with pedigree 0.31529, pedigree (1,1,2,1,1)
  for residual material landfill infrastructure
  properties: carbon content, fossil 0.857143, dry mass 1 kg, heating value, net 42.47 MJ, wet mass 1 kg
- polypropylene, granulate: 8.1981e-7 kg; lognormal variance with pedigree 0.31529, pedigree (1,1,2,1,1)
  for residual material landfill infrastructure
  properties: carbon content, fossil 0.857143, dry mass 1 kg, heating value, net 32.78 MJ, wet mass 1 kg
  note on heating value, net: Value extracted from "treatment of waste polypropylene, open burning"
- polyvinylchloride, bulk polymerised: 8.1981e-7 kg; lognormal variance with pedigree 0.31529, pedigree (1,1,2,1,1)
  for residual material landfill infrastructure
  properties: carbon content, fossil 0.387097, dry mass 1 kg, heating value, net 21.5 MJ, wet mass 1 kg
- reinforcing steel: 2.9923e-5 kg; lognormal variance with pedigree 0.31529, pedigree (1,1,2,1,1)
  for residual material landfill infrastructure
  properties: carbon content, fossil 0.004, dry mass 1 kg, wet mass 1 kg
- sand: 3.47377e-6, 0.000226058, 1.80342e-8 kg (3 suppliers, which the file names only by identifier); sum of these 0.00022955 kg; lognormal variance with pedigree 0.31529, pedigree (1,1,2,1,1)
  for residual material landfill infrastructure
  properties: dry mass 1 kg, wet mass 1 kg
- steel, chromium steel 18/8, hot rolled: 1.0384e-5 kg; lognormal variance with pedigree 0.31529, pedigree (1,1,2,1,1)
  for residual material landfill infrastructure
  properties: carbon content, fossil 0.0008, dry mass 1 kg, wet mass 1 kg
- synthetic rubber: 2.7327e-7 kg; lognormal variance with pedigree 0.31529, pedigree (1,1,2,1,1)
  for residual material landfill infrastructure
  properties: carbon content, fossil 0.871949, dry mass 1 kg, heating value, net 26.42 MJ, wet mass 1 kg
- tap water: 7.77534e-6, 1.18529e-5, 2.21168e-5, 5.95811e-5, 7.17197e-6, 0.000298882, 0.00342026, 0.00254866 kg (8 suppliers, which the file names only by identifier); sum of these 0.0063763 kg; lognormal variance with pedigree 0.31529, pedigree (1,1,2,1,1)
  for residual material landfill infrastructure
  properties: carbon content, fossil 0.00178991, dry mass 0.000337476 kg, water content 2962.17, wet mass 1 kg
- waste cement, hydrated: -0.998085, -0.00191503 kg (2 suppliers, which the file names only by identifier); sum of these -1 kg; lognormal variance with pedigree 0.004734, pedigree (1,1,1,1,1)
  hydrated cement output for solidification of landfilled residual material
  production volume
    calculated in proportion to reference product waste input to incinerator
  properties: dry mass 1 kg, wet mass 1 kg

## Inputs from nature
- Organic carbon, placed in landfill [inventory indicator, waste]: 0.0026727 kg; lognormal variance with pedigree 0.53101, pedigree (1,1,2,1,1)
  organic carbon placed in residual material landfill (for ecoscarcity LCIA only)
- Waste mass, total, placed in landfill [inventory indicator, waste]: 1 kg; lognormal variance with pedigree 0.0002, pedigree (1,1,2,1,1)
  waste mass placed in residual material landfill (for ecoscarcity LCIA only)
- Occupation, construction site [natural resource, land]: 0.00028571 m2*year; lognormal variance with pedigree 0.21182, pedigree (1,1,2,1,1)
  for residual material landfill construction
- Occupation, dump site [natural resource, land]: 0.0017143 m2*year; lognormal variance with pedigree 0.21182, pedigree (1,1,2,1,1)
  for residual material landfill area during operation
- Occupation, shrub land, sclerophyllous [natural resource, land]: 0.00028571 m2*year; lognormal variance with pedigree 0.21182, pedigree (1,1,2,1,1)
  for residual material landfill area initial aftercare recultivation
- Occupation, traffic area, road network [natural resource, land]: 0.0025714 m2*year; lognormal variance with pedigree 0.21182, pedigree (1,1,2,1,1)
  for access road of residual material landfill during construction, operation, and aftercare
- Transformation, from dump site [natural resource, land]: 5.7143e-5 m2; lognormal variance with pedigree 0.53191, pedigree (1,1,2,1,1)
  for residual material landfill area initial aftercare recultivation
- Transformation, from pasture, man made [natural resource, land]: 9.1429e-5 m2; lognormal variance with pedigree 0.53191, pedigree (1,1,2,1,1)
  for residual material landfill and access road
- Transformation, from shrub land, sclerophyllous [natural resource, land]: 5.7143e-5 m2; lognormal variance with pedigree 0.53191, pedigree (1,1,2,1,1)
  for residual material landfill area initial aftercare recultivation
- Transformation, from traffic area, road network [natural resource, land]: 3.4286e-5 m2; lognormal variance with pedigree 0.53191, pedigree (1,1,2,1,1)
  for recultivation of access road of residual material landfill after aftercare period
- Transformation, to dump site [natural resource, land]: 5.7143e-5 m2; lognormal variance with pedigree 0.53191, pedigree (1,1,2,1,1)
  for residual material landfill area
- Transformation, to forest, unspecified [natural resource, land]: 5.7143e-5 m2; lognormal variance with pedigree 0.53191, pedigree (1,1,2,1,1)
  for residual material landfill area aftercare recultivation
- Transformation, to pasture, man made [natural resource, land]: 3.4286e-5 m2; lognormal variance with pedigree 0.53191, pedigree (1,1,2,1,1)
  for recultivation of landfill and access road of residual material landfill after aftercare period
- Transformation, to shrub land, sclerophyllous [natural resource, land]: 5.7143e-5 m2; lognormal variance with pedigree 0.53191, pedigree (1,1,2,1,1)
  for residual material landfill area initial aftercare recultivation
- Transformation, to traffic area, road network [natural resource, land]: 3.4286e-5 m2; lognormal variance with pedigree 0.53191, pedigree (1,1,2,1,1)
  for access road of residual material landfill

## Emissions to nature
- Heat, waste [air, urban air close to ground]: 3.0857e-5 MJ; lognormal variance with pedigree 0.012648, pedigree (1,1,2,1,1)
  from electricity consumption in residual material landfill operation
- Hazardous waste disposed [inventory indicator, waste]: 1 kg; lognormal variance with pedigree 0.0002, pedigree (1,1,2,1,1)
  EN15804 waste mass in residual material landfill
- Aluminium III [water, ground-, long-term]: 0.02051 kg; lognormal variance with pedigree 0.30677, pedigree (1,1,2,1,1)
  emissions to groundwater in residual material landfill
- Aluminium III [water, surface water]: 3.424e-5 kg; lognormal variance with pedigree 0.88209, pedigree (1,1,2,1,1)
  emissions to surface water in residual material landfill
- Antimony ion [water, ground-, long-term]: 3.6644e-6 kg; lognormal variance with pedigree 1.3892, pedigree (1,1,2,1,1)
  emissions to groundwater in residual material landfill
- Antimony ion [water, surface water]: 3.3961e-7 kg; lognormal variance with pedigree 1.5237, pedigree (1,1,2,1,1)
  emissions to surface water in residual material landfill
- Arsenic ion [water, ground-, long-term]: 8.4116e-7 kg; lognormal variance with pedigree 1.5904, pedigree (1,1,2,1,1)
  emissions to groundwater in residual material landfill
- Arsenic ion [water, surface water]: 8.3034e-9 kg; lognormal variance with pedigree 1.922, pedigree (1,1,2,1,1)
  emissions to surface water in residual material landfill
- BOD5, Biological Oxygen Demand [water, ground-, long-term]: 0.0013391 kg; lognormal variance with pedigree 0.53102, pedigree (1,1,2,1,1)
  emissions to groundwater in residual material landfill
- BOD5, Biological Oxygen Demand [water, surface water]: 1.0407e-5 kg; lognormal variance with pedigree 0.92663, pedigree (1,1,2,1,1)
  emissions to surface water in residual material landfill
- Barium II [water, ground-, long-term]: 5.6023e-5 kg; lognormal variance with pedigree 1.7809, pedigree (1,1,2,1,1)
  emissions to groundwater in residual material landfill
- Barium II [water, surface water]: 9.3527e-8 kg; lognormal variance with pedigree 1.6214, pedigree (1,1,2,1,1)
  emissions to surface water in residual material landfill
- Beryllium II [water, ground-, long-term]: 1.4778e-7 kg; lognormal variance with pedigree 1.922, pedigree (1,1,2,1,1)
  emissions to groundwater in residual material landfill
- Beryllium II [water, surface water]: 2.4672e-10 kg; lognormal variance with pedigree 1.922, pedigree (1,1,2,1,1)
  emissions to surface water in residual material landfill
- COD, Chemical Oxygen Demand [water, ground-, long-term]: 0.013633 kg; lognormal variance with pedigree 0.53102, pedigree (1,1,2,1,1)
  emissions to groundwater in residual material landfill
- COD, Chemical Oxygen Demand [water, surface water]: 0.00010595 kg; lognormal variance with pedigree 0.92663, pedigree (1,1,2,1,1)
  emissions to surface water in residual material landfill
- Cadmium II [water, ground-, long-term]: 1.8818e-7 kg; lognormal variance with pedigree 1.922, pedigree (1,1,2,1,1)
  emissions to groundwater in residual material landfill
- Cadmium II [water, surface water]: 3.1416e-10 kg; lognormal variance with pedigree 1.922, pedigree (1,1,2,1,1)
  emissions to surface water in residual material landfill
- Calcium II [water, ground-, long-term]: 0.066604 kg; lognormal variance with pedigree 0.49061, pedigree (1,1,2,1,1)
  emissions to groundwater in residual material landfill
- Calcium II [water, surface water]: 0.00011119 kg; lognormal variance with pedigree 0.80922, pedigree (1,1,2,1,1)
  emissions to surface water in residual material landfill
- Chromium VI [water, ground-, long-term]: 0.026914 kg; lognormal variance with pedigree 0.24881, pedigree (1,1,2,1,1)
  emissions to groundwater in residual material landfill
- Chromium VI [water, surface water]: 0.00014961 kg; lognormal variance with pedigree 0.68963, pedigree (1,1,2,1,1)
  emissions to surface water in residual material landfill
- Cobalt II [water, ground-, long-term]: 1.8001e-6 kg; lognormal variance with pedigree 1.6056, pedigree (1,1,2,1,1)
  emissions to groundwater in residual material landfill
- Cobalt II [water, surface water]: 3.0053e-9 kg; lognormal variance with pedigree 1.922, pedigree (1,1,2,1,1)
  emissions to surface water in residual material landfill
- Copper ion [water, ground-, long-term]: 5.19e-5 kg; lognormal variance with pedigree 1.922, pedigree (1,1,2,1,1)
  emissions to groundwater in residual material landfill
- Copper ion [water, surface water]: 8.6644e-8 kg; lognormal variance with pedigree 1.6317, pedigree (1,1,2,1,1)
  emissions to surface water in residual material landfill
- DOC, Dissolved Organic Carbon [water, ground-, long-term]: 0.0026521 kg; lognormal variance with pedigree 0.53102, pedigree (1,1,2,1,1)
  emissions to groundwater in residual material landfill
- DOC, Dissolved Organic Carbon [water, surface water]: 2.0611e-5 kg; lognormal variance with pedigree 0.92663, pedigree (1,1,2,1,1)
  emissions to surface water in residual material landfill
- Fluoride [water, ground-, long-term]: 0.012272 kg; lognormal variance with pedigree 0.3464, pedigree (1,1,2,1,1)
  emissions to groundwater in residual material landfill
- Fluoride [water, surface water]: 3.1785e-5 kg; lognormal variance with pedigree 0.8798, pedigree (1,1,2,1,1)
  emissions to surface water in residual material landfill
- Iron ion [water, ground-, long-term]: 0.0016858 kg; lognormal variance with pedigree 1.922, pedigree (1,1,2,1,1)
  emissions to groundwater in residual material landfill
- Iron ion [water, surface water]: 2.8143e-6 kg; lognormal variance with pedigree 1.2674, pedigree (1,1,2,1,1)
  emissions to surface water in residual material landfill
- Lead II [water, ground-, long-term]: 1.8255e-6 kg; lognormal variance with pedigree 1.922, pedigree (1,1,2,1,1)
  emissions to groundwater in residual material landfill
- Lead II [water, surface water]: 3.0476e-9 kg; lognormal variance with pedigree 1.922, pedigree (1,1,2,1,1)
  emissions to surface water in residual material landfill
- Magnesium [water, ground-, long-term]: 0.012369 kg; lognormal variance with pedigree 0.6785, pedigree (1,1,2,1,1)
  emissions to groundwater in residual material landfill
- Magnesium [water, surface water]: 2.065e-5 kg; lognormal variance with pedigree 0.95628, pedigree (1,1,2,1,1)
  emissions to surface water in residual material landfill
- Manganese II [water, ground-, long-term]: 0.0011238 kg; lognormal variance with pedigree 1.922, pedigree (1,1,2,1,1)
  emissions to groundwater in residual material landfill
- Manganese II [water, surface water]: 1.8762e-6 kg; lognormal variance with pedigree 1.2632, pedigree (1,1,2,1,1)
  emissions to surface water in residual material landfill
- Mercury II [water, ground-, long-term]: 5.4148e-9 kg; lognormal variance with pedigree 1.922, pedigree (1,1,2,1,1)
  emissions to groundwater in residual material landfill
- Mercury II [water, surface water]: 9.0396e-12 kg; lognormal variance with pedigree 1.922, pedigree (1,1,2,1,1)
  emissions to surface water in residual material landfill
- Molybdenum VI [water, ground-, long-term]: 0.00012931 kg; lognormal variance with pedigree 0.88777, pedigree (1,1,2,1,1)
  emissions to groundwater in residual material landfill
- Molybdenum VI [water, surface water]: 5.0873e-5 kg; lognormal variance with pedigree 0.92596, pedigree (1,1,2,1,1)
  emissions to surface water in residual material landfill
- Nickel II [water, ground-, long-term]: 8.6967e-5 kg; lognormal variance with pedigree 1.0325, pedigree (1,1,2,1,1)
  emissions to groundwater in residual material landfill
- Nickel II [water, surface water]: 1.4519e-7 kg; lognormal variance with pedigree 1.5646, pedigree (1,1,2,1,1)
  emissions to surface water in residual material landfill
- Phosphate [water, ground-, long-term]: 0.00050578 kg; lognormal variance with pedigree 1.3602, pedigree (1,1,2,1,1)
  emissions to groundwater in residual material landfill
- Phosphate [water, surface water]: 8.4438e-7 kg; lognormal variance with pedigree 1.4792, pedigree (1,1,2,1,1)
  emissions to surface water in residual material landfill
- Potassium I [water, ground-, long-term]: 8.3598e-5 kg; lognormal variance with pedigree 0.95243, pedigree (1,1,2,1,1)
  emissions to groundwater in residual material landfill
- Potassium I [water, surface water]: 2.6512e-5 kg; lognormal variance with pedigree 1.0015, pedigree (1,1,2,1,1)
  emissions to surface water in residual material landfill
- Selenium IV [water, ground-, long-term]: 1.649e-5 kg; lognormal variance with pedigree 1.1907, pedigree (1,1,2,1,1)
  emissions to groundwater in residual material landfill
- Selenium IV [water, surface water]: 1.5282e-6 kg; lognormal variance with pedigree 1.3252, pedigree (1,1,2,1,1)
  emissions to surface water in residual material landfill
- Silicon [water, ground-, long-term]: 0.083303 kg; lognormal variance with pedigree 0.1377, pedigree (1,1,2,1,1)
  emissions to groundwater in residual material landfill
- Silicon [water, surface water]: 0.0003808 kg; lognormal variance with pedigree 0.59788, pedigree (1,1,2,1,1)
  emissions to surface water in residual material landfill
- Silver I [water, ground-, long-term]: 6.8439e-7 kg; lognormal variance with pedigree 1.922, pedigree (1,1,2,1,1)
  emissions to groundwater in residual material landfill
- Silver I [water, surface water]: 1.1426e-9 kg; lognormal variance with pedigree 1.922, pedigree (1,1,2,1,1)
  emissions to surface water in residual material landfill
- Sodium I [water, ground-, long-term]: 0.00040447 kg; lognormal variance with pedigree 0.72673, pedigree (1,1,2,1,1)
  emissions to groundwater in residual material landfill
- Sodium I [water, surface water]: 0.00021014 kg; lognormal variance with pedigree 0.75276, pedigree (1,1,2,1,1)
  emissions to surface water in residual material landfill
- Sulfate [water, ground-, long-term]: 0.0042921 kg; lognormal variance with pedigree 0.60125, pedigree (1,1,2,1,1)
  emissions to groundwater in residual material landfill
- Sulfate [water, surface water]: 0.00036258 kg; lognormal variance with pedigree 0.74369, pedigree (1,1,2,1,1)
  emissions to surface water in residual material landfill
- TOC, Total Organic Carbon [water, ground-, long-term]: 0.0026521 kg; lognormal variance with pedigree 0.53102, pedigree (1,1,2,1,1)
  emissions to groundwater in residual material landfill
- TOC, Total Organic Carbon [water, surface water]: 2.0611e-5 kg; lognormal variance with pedigree 0.92663, pedigree (1,1,2,1,1)
  emissions to surface water in residual material landfill
- Thallium I [water, ground-, long-term]: 1.4778e-6 kg; lognormal variance with pedigree 1.922, pedigree (1,1,2,1,1)
  emissions to groundwater in residual material landfill
- Thallium I [water, surface water]: 2.4672e-9 kg; lognormal variance with pedigree 1.922, pedigree (1,1,2,1,1)
  emissions to surface water in residual material landfill
- Tin ion [water, ground-, long-term]: 1.7645e-7 kg; lognormal variance with pedigree 1.922, pedigree (1,1,2,1,1)
  emissions to groundwater in residual material landfill
- Tin ion [water, surface water]: 2.9458e-10 kg; lognormal variance with pedigree 1.922, pedigree (1,1,2,1,1)
  emissions to surface water in residual material landfill
- Titanium ion [water, ground-, long-term]: 0.00041916 kg; lognormal variance with pedigree 1.5195, pedigree (1,1,2,1,1)
  emissions to groundwater in residual material landfill
- Titanium ion [water, surface water]: 6.9977e-7 kg; lognormal variance with pedigree 1.3601, pedigree (1,1,2,1,1)
  emissions to surface water in residual material landfill
- Vanadium V [water, ground-, long-term]: 0.00087506 kg; lognormal variance with pedigree 0.67296, pedigree (1,1,2,1,1)
  emissions to groundwater in residual material landfill
- Vanadium V [water, surface water]: 6.791e-6 kg; lognormal variance with pedigree 1.0699, pedigree (1,1,2,1,1)
  emissions to surface water in residual material landfill
- Zinc II [water, ground-, long-term]: 7.0682e-6 kg; lognormal variance with pedigree 1.922, pedigree (1,1,2,1,1)
  emissions to groundwater in residual material landfill
- Zinc II [water, surface water]: 1.18e-8 kg; lognormal variance with pedigree 1.8954, pedigree (1,1,2,1,1)
  emissions to surface water in residual material landfill
