# bronze production

Dataset: EcoSpold 2, unit process
Geography: RoW
Time period: 2000-01-01 to 2023-12-31
Technology level: current
Classification: ISIC rev.4 ecoinvent: 2420:Manufacture of basic precious and other non-ferrous metals
Classification: EcoSpold01Categories: metals/extraction
Tags: ConvertedDataset
Scenario: Business-as-Usual
System model: Allocation, cut-off by classification
Generated by: Hans-Jörg Althaus
Published in: Althaus H.-J. 2000
Database: ecoinvent
isCopyrightProtected: true
accessRestrictedTo: 1

## General comment
Stands for bronze with 95% Cu and 5% Sn. All data are calculated based on assumptions and theoretical models. Their overall quality is poor.
[This dataset was already contained in the ecoinvent database version 2. It was not individually updated during the transfer to ecoinvent version 3. Life Cycle Impact Assessment results may still have changed, as they are affected by changes in the supply chain, i.e. in other datasets. This dataset was generated following the ecoinvent quality guidelines for version 2. It may have been subject to central changes described in the ecoinvent version 3 change report (http://www.ecoinvent.org/database/ecoinvent-version-3/reports-of-changes/), and the results of the central updates were reviewed extensively. The changes added e.g. consistent water flows and other information throughout the database. The documentation of this dataset can be found in the ecoinvent reports of version 2, which are still available via the ecoinvent website. The change report linked above covers all central changes that were made during the conversion process.]

## Included activities start
The activity starts with the reception of copper at the factory gate.

## Included activities end
copper and tin including their melting and casting of bronze ingots.

## Geography
Production data relate to the European average. Transports of inputs relate to the consumption in Switzerland

## Technology
Assumed energy mix for melting. Abatement of air emissions assumed

## Reference product
- bronze: 1 kg; By-product classification allocatable product; CPC 41413: Refined copper and copper alloys, unwrought; master alloys of copper; HS2017 7403: Copper; refined and copper alloys, unwrought; CAS 158113-12-3
  EcoSpold01Location=CH
  production volume 2.63937e8 kg
    Volume of brass estimated to 1.2% of global Cu consumption, based on global shares reported in Joseph G (1999) Copper: its trade, manufacture, use, and environmental status. Materials Park: ASM International. 95% Cu content in bronze.
  property carbon content, fossil 0
    Bronze is a metal alloy consisting primarily of copper, usually with tin as the main additive, but sometimes with other elements such as phosphorus, manganese, aluminum, or silicon
  property carbon content, non-fossil 0
    (same comment as for bronze)
  property price 3.94628 EUR2005
    Calculated based on inputs: The price of the product has been calculated as a sum of the values of the material and energy inputs for this product. This value is therefore a rough estimation. It may underestimate the real price since there are additional expenses when producing any product. These expences can include for example labour costs, treatment of waste materials and profit for the producer. Please consider carefully whether this level of data quality is acceptable for your application. Cross-referenced; Calculated value based on data from United Nations Commodity Trade Statistics Database (comtrade.un.org) is 2.6 Euro/kg. UN comtrade category: 740322 Copper-tin base alloys, unwrought. Year 2005. Using exchange rate of 1EURO = 1.209 USD. Average of price of import into 5 main markets (EU, US, JP, IN and CN).
  properties: carbon allocation 0 kg, carbon content 0, dry mass 1 kg, water content 0, water in wet mass 0 kg, wet mass 1 kg

## Inputs from technosphere
- aluminium casting facility: 4.9e-11 unit; lognormal variance with pedigree 0.458, pedigree (4,5,5,5,4)
  EcoSpold01Location=RER
- copper, cathode: 0.959 kg; lognormal variance with pedigree 0.148, pedigree (4,5,5,5,4)
  EcoSpold01Location=RER
  properties: dry mass 1 kg, wet mass 1 kg
- electricity, medium voltage: 0.000558671, 0.0111442, 0.00374443, 0.000171084, 3.42423e-5, 7.3526e-6, 0.000778168, 0.00115082, 0.002411 kWh (9 suppliers, which the file names only by identifier); sum of these 0.02 kWh; lognormal variance with pedigree 0.148, pedigree (4,5,5,5,4)
  EcoSpold01Location=UCTE
- heat, district or industrial, natural gas: 0.00426901, 0.25979, 0.0959413 MJ (3 suppliers, which the file names only by identifier); sum of these 0.36 MJ; lognormal variance with pedigree 0.148, pedigree (4,5,5,5,4)
  EcoSpold01Location=RER
  properties: heating value, net 1 MJ
- heat, district or industrial, other than natural gas: 0.280726, 0.000130055, 0.00714362 MJ (3 suppliers, which the file names only by identifier); sum of these 0.288 MJ; lognormal variance with pedigree 0.148, pedigree (4,5,5,5,4)
  EcoSpold01Location=RER
  properties: heating value, net 1 MJ
- tin: 0.0505 kg; lognormal variance with pedigree 0.148, pedigree (4,5,5,5,4)
  EcoSpold01Location=RER
  properties: dry mass 1 kg, wet mass 1 kg

## Emissions to nature
- Tin ion [air, unspecified]: 5.05e-5 kg; lognormal variance with pedigree 0.198, pedigree (4,5,5,5,4)

## Sampling procedure
based on literature and internet

## Extrapolations
none This dataset has been copied from an original dataset covering the geography CH. The uncertainty has been adjusted accordingly.

## Review by Roland Hischier 2003-06-12
Passed.
