# polyurethane adhesive production

Dataset: EcoSpold 2, unit process
Geography: GLO
Time period: 2015-01-01 to 2023-12-31
Technology level: current
Classification: ISIC rev.4 ecoinvent: 2029:Manufacture of other chemical products n.e.c.
Scenario: Business-as-Usual
System model: Allocation, cut-off by classification
Generated by: Florentine Brunner
Database: ecoinvent
isCopyrightProtected: true
accessRestrictedTo: 1

## General comment
This dataset represents the production of polyurethan adhesive (PUR adhesive, PUR glue). A standard yield of 0.98 is assumed for this process.
Polyurethane adhesive (PUR adhesive or PUR glue) is a formaldehyde-free adhesive which is used in engineered wood products such as crosslaminated
Timber (CLT). Formaldehydes in indoor applications are often associated with concerns of their emissions to ambient air and effects on human health. In PUR adhesive isocyanate is used instead of formaldehyde. The hardening of PUR is induced by the moisture in the wood.
The hardened glue is resistant to moisture and hydrolysis.
Reference(s):
Messmer, Annika & Chaudhary, Abhishek. (2015). Life cycle assessment of adhesives used in wood constructions. Masterthesis, ETH Zürich.

## Included activities start
Activity starts with the reception of the inputs at the chemical factory.

## Included activities end
Activity ends with the product at the chemical factory gate, ready to be sold on the market.

## Geography
Data based on a site in Switzerland.

## Technology
Average technology.

## Time period
Data collected in the year 2015.

## Reference product
- polyurethane adhesive: 1 kg; By-product classification allocatable product; CPC 35499: Other chemical products n.e.c.; HS2017 350699: Glues and other adhesives; prepared, n.e.c. in heading no. 3506, not exceeding a net weight of 1kg
  Standard yield of 0.98 is assumed.
  production volume 2.5e8 kg
    Global market size of wood adhesives is roughly 3.71billion USD in 2015 (adhesivemag.com). At an approximate average price of 3.25USD/kg (Messmer & Chaudhary, 2015) adhesive this results in an annual production volume of roughly 1.15E+09 kg. Assuming a market share of PUR adhesive between 20% and 25%, leads to an approximate production volume of 2.5E+8 kg.
  property price 1.57287 EUR2005
    Calculated based on inputs: The price of the product has been calculated as a sum of the values of the material and energy inputs for this product. This value is therefore a rough estimation. It may underestimate the real price since there are additional expenses when producing any product. These expences can include for example labour costs, treatment of waste materials and profit for the producer. Please consider carefully whether this level of data quality is acceptable for your application.
  properties: carbon allocation 0.68 kg, carbon content 0.68, carbon content, fossil 0.68, carbon content, non-fossil 0, dry mass 1 kg, heating value, net 30.67 MJ, water content 0, water in wet mass 0 kg, wet mass 1 kg

## Inputs from technosphere
- chemical factory, organics: 4e-10 unit; lognormal variance with pedigree 0.3846, pedigree (3,4,5,4,4)
  Calculated based on literature data published by the industry. For this activity, no information was readily available concerning infrastructure and land-use. Therefore, the infrastructure is estimated based on data from two chemical factories, the BASF site of Ludwigshafen and the chemical factory in Gendorf (which are both located in Germany), which produce a wide range of chemical substances. Based on this data, the following assumptions are made: the built area amounts to about 4.2 ha, the plant has an average output of 50'000 t/a and a lifespan of fifty years. The estimated infrastructure amount is therefore 4.00 E-10 units per kg of produced chemical.
  References:
  Althaus H.-J., Chudacoff M., Hischier R., Jungbluth N., Osses M. and Primas A. (2007) Life Cycle Inventories of Chemicals. ecoinvent report No. 8, v2.0. EMPA Dübendorf, Swiss Centre for Life Cycle Inventories, Dübendorf, CH.
  Gendorf (2000) Umwelterklärung 2000, Werk Gendorf. Werk Gendorf, Burgkirchen.
- chemical, organic: 0.0360875 kg; lognormal variance with pedigree 0.0493, pedigree (1,5,5,3,2)
  Proxy for unspecified addititives. Based on data for PUR adhesive production from a producer in Switzerland in 2015, presented in Table 29: "PUR, process modeled in SimaPro” by Messmer, Annika & Chaudhary, Abhishek. (2015). Life cycle assessment of adhesives used in wood constructions. Masterthesis, ETH Zürich. Reported amount scaled to satisfy the production of 1kg of output considering a standard assumption for yield of 0.98.
  properties: carbon content, fossil 0.628, dry mass 1 kg, heating value, net 19.03 MJ, wet mass 1 kg
  note on carbon content, fossil: This dataset is an unweighted average of 20 organic substances (listed in Tab 88.1, ecoinvent v2.2 report 8, part II), being part of the top100 chemicals included in this database. The C-content has also been calculated as an unweighted average of the C content of the substances composing this dataset.
- electricity, medium voltage: 0.021 kWh; lognormal variance with pedigree 0.0493, pedigree (1,5,5,3,2)
  Based on data for PUR adhesive production from a producer in Switzerland in 2015, presented in Table 29: "PUR, process modeled in SimaPro” by Messmer, Annika & Chaudhary, Abhishek. (2015). Life cycle assessment of adhesives used in wood constructions. Masterthesis, ETH Zürich.
  The ecoinvent default model for chemical production suggests an input of electric energy of 0.416 kWh/kg of chemical product (1.5 MJ/kg) (5-year average (2011 - 2015, weighted by production volume) published by the Gendorf factory (Gendorf, 2016, Umwelterklärung, www.gendorf.de). Considering that the PUR adhesive production does not require energy intensive processes at high temperature or pressure, it appears justified tha the energy inputs to this process are considerably lower than the average amounts suggested in the default model.
- methylene diphenyl diisocyanate: 0.423334, 0.103201 kg (2 suppliers, which the file names only by identifier); sum of these 0.526534 kg; lognormal variance with pedigree 0.0493, pedigree (1,5,5,3,2)
  Based on data for PUR adhesive production from a producer in Switzerland in 2015, presented in Table 29: "PUR, process modeled in SimaPro” by Messmer, Annika & Chaudhary, Abhishek. (2015). Life cycle assessment of adhesives used in wood constructions. Masterthesis, ETH Zürich. Reported amount scaled to satisfy the production of 1kg of output considering a standard assumption for yield of 0.98.
  properties: carbon content, fossil 0.72, dry mass 1 kg, heating value, net 26.66 MJ, wet mass 1 kg
- polyether polyols, long chain: 0.36806, 0.0897261 kg (2 suppliers, which the file names only by identifier); sum of these 0.457786 kg; lognormal variance with pedigree 0.0512, pedigree (3,4,5,4,2)
  Reported as polypropylene glycol in the original data source. Since polypropylne glycol was not available in the ecoinvent database at the point of dataset creation, polyols were evaluated reasonably proxy (expert consultation, personal communication). Based on data for PUR adhesive production from a producer in Switzerland in 2015, presented in Table 29: "PUR, process modeled in SimaPro” by Messmer, Annika & Chaudhary, Abhishek. (2015). Life cycle assessment of adhesives used in wood constructions. Masterthesis, ETH Zürich. Reported amount scaled to satisfy the production of 1kg of output considering a standard assumption for yield of 0.98.
  properties: carbon content, fossil 0.640856, dry mass 1 kg, heating value, gross 35 MJ, heating value, net 31.53 MJ, wet mass 1 kg

## Sampling procedure
Literature data

## Extrapolations
GLO dataset based on Swiss data sample.

Standard yield of 0.98 is assumed. Input amounts reported in source scaled to add to 1kg of reference product plus losses.
