# aluminium production, primary, ingot

Dataset: EcoSpold 2, unit process
Geography: CN
Time period: 2015-01-01 to 2023-12-31
Technology level: current
Classification: ISIC rev.4 ecoinvent: 2420:Manufacture of basic precious and other non-ferrous metals
Classification: EcoSpold01Categories: metals/extraction
Scenario: Business-as-Usual
System model: Allocation, cut-off by classification
Generated by: Linlin Wu
Published in: International Aluminium Insitute 2015
Database: ecoinvent
isCopyrightProtected: false
accessRestrictedTo: 1

## General comment
The dataset represents the production of 1kg of primary aluminium ingot. Molten aluminium produced from the electrolytic process is tapped from reduction cells, weighed, sampled and analysed before it is poured into a holding furnace and heated to approximately 750°C using natural gas as a fuel. Alloying elements, such as magnesium, silicon and manganese, for additional strength, corrosion resistance and other properties, are added to the aluminium. It is typically at this point in the process that clean, sorted scrap can also be added but for the purposes of this dataset, scrap remelting is excluded. During furnace charging and preparation, aluminium dross (a thick liquid or solid phase) forms at the surface of molten aluminium. This mixture of aluminium oxides is remelted to recover the aluminium that would otherwise be lost. Metallurgical analysis verifies that the metal meets customer specifications before the molten, alloyed (or pure, unalloyed) aluminium is cast into products of specific dimensions, before being weighed, bundled and strapped ready for transport. Original dataset included some alloying elements. These were replaced by liquid aluminium to generate a theoretical 100% aluminium ingot.
For more information on the process, please go to
http://primary.world-aluminium.org/index.php?id=285
[This dataset is meant to replace the following datasets:]

## Included activities start
The unit process begins with the unloading of process material to their storage areas on site. The operations covered by this dataset include:
* pre-treatment of hot metal
* recovery and handling of internal process scrap
* batching, metal treatment and casting operations
* homogenizing, sawing and packaging activities
* maintenance and repair of plant and equipment
* treatment of process air, liquids and solids.
* production of infrastructure (through rough estimate) was also added.

## Included activities end
The output of this unit process is packaged aluminium ingots, wrought alloy.

## Reference product
- aluminium, primary, ingot: 1 kg; name ingotAmount; source International Aluminium Insitute 2015; By-product classification allocatable product; CPC 41431: Unwrought aluminium; HS2017 7601: Aluminium; unwrought; CAS 7429-90-5
  Annual production
  production volume 3.1518e10 kg; name ingotProductionVolume
    annual production
  property price 3.67 EUR2005
    Estimated to be the same as in case of aluminium, primary, liquid.
  properties: carbon allocation 0 kg, carbon content 0, carbon content, fossil 0, carbon content, non-fossil 0, dry mass 1 kg, water content 0, water in wet mass 0 kg, wet mass 1 kg

## Inputs from technosphere
- aluminium casting facility: 1.54e-10 unit; source Classen M. 2009; lognormal variance with pedigree 0.5, pedigree (5,5,5,5,5)
  Rough estimate
  EcoSpold01Location=RER
  Uncertainty: rough guess
- aluminium, primary, liquid: 1 kg; source International Aluminium Insitute 2015; lognormal variance with pedigree 0.0092, pedigree (1,3,4,1,1)
  reported as "Electrolysis metal"
  properties: dry mass 1 kg, wet mass 1 kg
- argon, liquid: 0.0015 kg; source Classen M. 2009; lognormal variance with pedigree 0.0432, pedigree (1,3,5,5,1)
  EcoSpold01Location=RER
  properties: dry mass 1 kg, wet mass 1 kg
- chlorine, liquid: 9.9e-6 kg; source International Aluminium Insitute 2015; lognormal variance with pedigree 0.0092, pedigree (1,3,4,1,1)
- corrugated board box: 0.0018 kg; source Classen M. 2009; lognormal variance with pedigree 0.0426, pedigree (1,1,5,5,1)
  EcoSpold01Location=RER
  properties: carbon content, fossil 0.000656085, carbon content, non-fossil 0.432275, dry mass 0.945 kg, heating value, net 12.86 MJ, water content 0.0582011, wet mass 1 kg
  note on carbon content, fossil: Fossil C content was calculated after fossil C contents of chemicals used in the production of board (Tab 10-15 & 10.16 ecoinvent v2.2 report 11_III, part 10)
  note on carbon content, non-fossil: Biogenic C content was calculated after biogenic C contents of chemicals used in the production of board (Tab 10.15 & 10.16, ecoinvent v2.2 report 11_III, part 10).
- cryolite: 0.0004 kg; source Classen M. 2009; lognormal variance with pedigree 0.0426, pedigree (1,1,5,5,1)
  EcoSpold01Location=RER
  properties: dry mass 1 kg, wet mass 1 kg
- dross from Al electrolysis: -0.014036 kg; name drossAmount; = drossAmount_drossRecycling +drossAmount_drossLandfill; source International Aluminium Insitute 2015; lognormal variance with pedigree 0.0012, pedigree (1,3,1,1,1)
  Amount includes both dross sent to landfill and sent to recycling. Currently, no dross recycling process exists in ecoinvent, and hence these are modelled as sent to landfill.
  EcoSpold01Location=CH
  production volume; = ingotProductionVolume*drossAmount/ingotAmount
    Calculated from production volume of reference product using the relative outputs.
  property dross sent to landfill 0.000746 kg; name drossAmount_drossLandfill
  property dross sent to recycling 0.01329 kg; name drossAmount_drossRecycling
  properties: carbon content, fossil 0.0075, dry mass 1 kg, wet mass 1 kg
- electricity, medium voltage, aluminium industry: 0.0529 kWh; source International Aluminium Insitute 2015; lognormal variance with pedigree 0.0092, pedigree (1,3,4,1,1)
  EcoSpold01Location=GLO
- filter dust from Al electrolysis: -0.000562 kg; name filterDustAmount; = filterDustAmount_filterDustRecycling +filterDustAmount_filterDustLandfill; source International Aluminium Insitute 2015; lognormal variance with pedigree 0.0012, pedigree (1,3,1,1,1)
  Amount includes both filter dust sent to landfill and sent to recycling. Currently, no filter dust recycling process exists in ecoinvent database, and hence these are modelled as sent to landfill. so total is sent to landfill.
  production volume; = ingotProductionVolume*filterDustAmount/ingotAmount
    Calculated from production volume of reference product using the relative outputs.
  property filter dust to landfill 3.2e-5 kg; name filterDustAmount_filterDustLandfill
  property filter dust to recycling 0.00053 kg; name filterDustAmount_filterDustRecycling
  properties: carbon content, fossil 0.11586, dry mass 1 kg, wet mass 1 kg
- heat, district or industrial, natural gas: 0.827423 MJ; = Net_Heat_Value_ng*40.4 *m3fuel_use_ng /fuel_use_ng; source International Aluminium Insitute 2015; lognormal variance with pedigree 0.0086, pedigree (1,3,4,1,1)
  Natural gas combustion
  Uncertainty: No uncertainty added - uncertainty should be based on propagation of the uncertainty of the underlying parameters
  property Corresponding fuel use 1.04 MJ; name fuel_use_ng
  property fuel input in physical units, m3 0.0213 m3; name m3fuel_use_ng
  property heating value, net 1 MJ; name Net_Heat_Value_ng
  note on Corresponding fuel use: Lower heating value of the fuel input related to the heat/electricity output
- heat, district or industrial, other than natural gas: 0.0467236 MJ; = Net_Heat_Value_HFO*40.0 *kgFuel_Input_HFO /fuel_use_HFO; source International Aluminium Insitute 2015; lognormal variance with pedigree 0.0086, pedigree (1,3,4,1,1)
  Heavy fuel oil combustion
  Uncertainty: No uncertainty added - uncertainty should be based on propagation of the uncertainty of the underlying parameters
  property Corresponding fuel use 1.053 MJ; name fuel_use_HFO
  property fuel input in physical units, kg 0.00123 kg; name kgFuel_Input_HFO
  property heating value, net 1 MJ; name Net_Heat_Value_HFO
- heat, district or industrial, other than natural gas: 0.0180451 MJ; = Net_Heat_Value_LFO*42.7 *kgFuel_Input_LFO /fuel_use_LFO; source International Aluminium Insitute 2015; lognormal variance with pedigree 0.0086, pedigree (1,3,4,1,1)
  Light fuel oil combustion
  Uncertainty: No uncertainty added - uncertainty should be based on propagation of the uncertainty of the underlying parameters
  property Corresponding fuel use 1.053 MJ; name fuel_use_LFO
  property fuel input in physical units, kg 0.000445 kg; name kgFuel_Input_LFO
  property heating value, net 1 MJ; name Net_Heat_Value_LFO
- inert waste, for final disposal: -0.00184 kg; name inertWasteAmount; = inertW_nonspecifiedWasteToLandfillAmou_0 +inertW_refractoryWasteToLandfillAmount_0+ inertW_refractoryWasteToRecyclingAmoun_0; source International Aluminium Insitute 2015; lognormal variance with pedigree 0.0018, pedigree (2,3,1,1,1)
  EcoSpold01Location=CH
  Amount includes "unspecified scrap sent to recycling", "refractory material sent to recycling", "refractory sent to landfill" and "other landfill waste". If it becomes possible to specify scrap, then these should be broken out of this total. Currently, no recycling process exists in ecoinvent for refractory material, and hence these are modelled as sent to landfill.
  production volume; = ingotProductionVolume*inertWasteAmount/ingotAmount
    Calculated from production volume of reference product using the relative outputs.
  property amount of non-specified waste to landfill 0.00105 kg; name inertW_nonspecifiedWasteToLandfillAmou_0
  property amount of refractory material sent to landfill 0.00047 kg; name inertW_refractoryWasteToLandfillAmount_0
  property amount of refractory material sent to recycling 0.00032 kg; name inertW_refractoryWasteToRecyclingAmoun_0
  properties: dry mass 0.995 kg, water content 0.00502513, wet mass 1 kg
- nitrogen, liquid: 0.0006 kg; source Classen M. 2009; lognormal variance with pedigree 0.0426, pedigree (1,1,5,5,1)
  EcoSpold01Location=RER
  properties: dry mass 1 kg, wet mass 1 kg
- palm oil, crude: 8e-5 kg; source Classen M. 2009; lognormal variance with pedigree 0.0426, pedigree (1,1,5,5,1)
  EcoSpold01Location=MY
  properties: carbon content, non-fossil 0.752881, dry mass 1 kg, heating value, net 37 MJ, wet mass 1 kg
  note on carbon content, non-fossil: C49H97O6. Palm oil (tab 17.4, ecoinvent v2.2 report 17-part 17)
  note on heating value, net: Literature value, Source: Biograce, Condensed list of standard values, version 2 - Public. Available at: https://biograce.net/app/webroot/files/file/BioGrace_condensed_list_of_standard_values_-_version_2_-_Public.doc
- refractory, fireclay, packed: 0.0007 kg; source Classen M. 2009; lognormal variance with pedigree 0.042, pedigree (1,1,5,5,1)
  EcoSpold01Location=DE
  properties: dry mass 1 kg, wet mass 1 kg
- silicon, metallurgical grade: 0.0108 kg; source Classen M. 2009; lognormal variance with pedigree 0.0426, pedigree (1,1,5,5,1)
  EcoSpold01Location=NO
  properties: dry mass 1 kg, wet mass 1 kg
- stone wool: 0.00011 kg; source Classen M. 2009; lognormal variance with pedigree 0.0426, pedigree (1,1,5,5,1)
  EcoSpold01Location=CH
  properties: carbon content, fossil 0.015401, dry mass 1 kg, wet mass 1 kg
  note on carbon content, fossil: The chemical composition of the glass fibres used in the rock wool production is similar to the composition of naturally cooled volcano basalt and has a composition listed in Tab. 3.1 and 3.2 in ecoinvent v2.2 report 16, part XIV. Rock wool contains: a minimum of 96% mineral fibres,between 0.5 and 3.0 weight percent of phenolic resin depending on the specific product characteristics, and about 0.2 percent mineral oil (ecoinvent v2.2 report 16, part XIV). An average composition of 1.8% phenolic resin, 0.2% mineral oil, and 98% mineral fibres has been assumed and used to calculate C content of the rock wool

## Inputs from nature
- Water, unspecified natural origin [natural resource, in water]: 0.0022 m3; source International Aluminium Insitute 2015; lognormal variance with pedigree 0.0092, pedigree (1,3,4,1,1)
  Reported as "Fresh water".

## Emissions to nature
- Dioxins, measured as 2,3,7,8-tetrachlorodibenzo-p-dioxin [air, unspecified]: 7e-13 kg; source International Aluminium Insitute 2015; lognormal variance with pedigree 0.0486, pedigree (1,3,4,1,1)
- Hydrochloric acid [air, unspecified]: 2.04e-5 kg; source International Aluminium Insitute 2015; lognormal variance with pedigree 0.0486, pedigree (1,3,4,1,1)
- Nitrogen oxides [air, unspecified]: 7.54e-5 kg; source International Aluminium Insitute 2015; lognormal variance with pedigree 0.0486, pedigree (1,3,4,1,1)
- Particulate Matter, < 2.5 um [air, unspecified]: 1.404e-5 kg; = PM_total_1* PM2_5; source International Aluminium Insitute 2015; lognormal variance with pedigree 0.0092, pedigree (2,3,4,1,1)
  Total amount from IAI survey, distributed among three class sizes using CEPMEIP database emission factors for Production of primary aluminium. Abatement level: medium.
  Uncertainty: Uncertainty calculated from underlying parameters.
  property ratio of total particulates less than 2.5 microns 0.36; name PM2_5; = 1.44/4
  property total particulates 3.9e-5 kg; name PM_total_1
- Particulate Matter, > 10 um [air, unspecified]: 7.8e-6 kg; = PM_total_2 *PM_greater_10um; source International Aluminium Insitute 2015; lognormal variance with pedigree 0.0092, pedigree (2,3,4,1,1)
  (same comment as for Particulate Matter, < 2.5 um)
  property ratio pf particulates greater than 10 microns 0.2; name PM_greater_10um; = (4-3.2)/4
  property total particulates 3.9e-5 kg; name PM_total_2
- Particulate Matter, > 2.5 um and < 10um [air, unspecified]: 1.716e-5 kg; = PM_total_3 * PM_btw_2_5_and_10um; source International Aluminium Insitute 2015; lognormal variance with pedigree 0.0092, pedigree (2,3,4,1,1)
  (same comment as for Particulate Matter, < 2.5 um)
  property ratio of particulates between 2.5 and 10 microns 0.44; name PM_btw_2_5_and_10um; = (3.2-1.44)/4
  property total particulates 3.9e-5 kg; name PM_total_3
- Sulfur dioxide [air, unspecified]: 3.34e-5 kg; source International Aluminium Insitute 2015; lognormal variance with pedigree 0.0092, pedigree (1,3,4,1,1)
  property carbon content, fossil 0; name C_content_fossil
  property carbon content, non-fossil 0; name C_content_non_fossil
  property dry mass 1 kg; name DM
  property water content 0; name water_content
  property water in wet mass 0 kg; name WWM
  property wet mass 1 kg; name WM
- Water [air, unspecified]: 0.00012 m3
  IAI data reported as "Fresh Water Consumption" plus "Sea Water Consumption".
- Oils, unspecified [water, unspecified]: 3.4e-5 kg; source International Aluminium Insitute 2015; lognormal variance with pedigree 0.3086, pedigree (1,3,4,1,1)
  Reported as "Oil/Grease - HC total".
- Suspended solids, unspecified [water, unspecified]: 0.000266 kg; source International Aluminium Insitute 2015; lognormal variance with pedigree 0.0486, pedigree (1,3,4,1,1)
- Water [water, unspecified]: 0.001887 m3; source International Aluminium Insitute 2015; lognormal variance with pedigree 0.0092, pedigree (1,3,4,1,1)
  Reported as "Fresh water".

## Sampling procedure
Data is from IAI surveys. which are carried out by IAI for its member and non-member companies. The surveys were conducted in 2016 for 2015 data. A number of flows not covered by the survey were inherited from the ecoinvent 2.2 dataset.
No data is reported from China for 2015, therefore, weighted averages from global reported facilities are adopted.

## Extrapolations
The survey was global in reach. Dataset based on primary aluminium producers is assumed to be valid for ingot casting with global average scrap content.

## Review by Louis Brimacombe 2018-06-07
Comments as per emails with Tereza concerning carbon balance and alloy additions.
