# alpha-naphthol production

Dataset: EcoSpold 2, unit process
Geography: RoW
Time period: 2010-01-01 to 2023-12-31
Technology level: current
Classification: ISIC rev.4 ecoinvent: 2011:Manufacture of basic chemicals
Synonyms: C10H8O
Scenario: Business-as-Usual
System model: Allocation, cut-off by classification
Share of production covered: 100 %
Generated by: Jürgen Sutter
Database: ecoinvent
isCopyrightProtected: true
accessRestrictedTo: 1

## General comment
The process "alpha-naphtol, at plant, GLO" is modelled for the production of alpha-naphtol from naphtalene sulfonic acid. Raw materials are modelled with a stoechiometric calculation. Emissions are estimated. Energy consumptions, infrastructure and transports are calculated with standard values.
α-Naphthol (C10H8O; CAS 90-15-3, 1-naphthol, 1-naphthalenol, 1-hydroxynaphthalene) forms colourless prisms (from toluene) which darken on exposure to air or light. The compound is steam volatile and sublimable. α-Naphthol can be produced via caustic fusion of naphthalene-1-sulfonic acid, by hydrolysis of 1-naphthylamine with aqueous 22 % sulfuric acid at 200 °C under pressure in a lead-lined autoclave, or by catalytic oxidation of tetralin to 1-tetralol and 1-tetralone followed by dehydrogenation.
In this study caustic fusion of naphthalene sulfonic acid is considered:
C10H8O3S + 2 NaOH → C10H8O + Na2SO4 + H2O
Several important agrochemicals are derived from α-naphthol.
1-Naphthoxyacetic acid is prepared by aqueous alkylation with chloroacetic acid. Devrinol, Stauffer's 2-(1-naphthoxy)-N,N-diethylpropionamide herbicide, is obtained by the reaction of 1-naphthol and N,N-diethyl-α-bromopropionamide in MeOH – NaOMe at reflux. Sevin is Union Carbide's insecticide based on 1-naphthyl methylcarbamate, carbaryl, which is produced from 1-naphthyl chloroformate and methylamine or by reaction of 1-naphthol with methyl isocyanate. Its main use lies in the control of earthworms and certain caterpillars.
Important drugs are also derived from α-naphthol. The ester 1-naphthyl salicylate, Alphol, has been used as an antiseptic and antirheumatic, and ICI's 1-isopropylamino-3-(1-naphthoxy)-2-propanol, Inderal, is an important member of a new class of adrenergic β-blockers for the treatment of heart disease. Production of 21 involves reaction of 15 with epichlorohydrin followed by isopropylamine.
Related products used as β-blockers or antiarrhythmics include nadoxolol and nadolol. Many analogues and alternative syntheses of this type of compound have been patented.
Condensation of 1-naphthol with aniline at 180 °C gives N-phenyl-1-naphthylamine which is used as a rubber antioxidant.
α-Naphthol is much less important than 2-naphthol as a dye intermediate. Apart from the historical interest in simple azo derivatives such as Orange I, the equilibrium with the keto form is an example of the prevalence of keto forms in many azo naphthol derivatives.
Certain diazo components, for example, 1-amino-2-hydroxynaphthalene - 4 - sulfonic acid, under strongly alkaline conditions, couple with 1-naphthol in the 2-position rather than the conventional 4-position. This leads to compounds such as C.I. Mordant Black 3 which form stable chromium complexes. Excess diazo compound can lead to disazo acid dyes such as C.I. Acid Brown 43.
Nitroso compounds can condense with α-naphthol for example, N,N-dimethyl-4-nitrosoaniline reacts to give indophenol.
Halogenated derivatives of α-naphthol have minor uses as shown by the reaction of 4-chloro-1-naphthol and 4-bromo-1-naphthol with substituted isatin-α-chlorides to form blue indigoid vat dyes.
Several important agrochemicals are derived from α-naphthol.
1-Naphthoxyacetic acid is prepared by aqueous alkylation with chloroacetic acid. Devrinol, Stauffer's 2-(1-naphthoxy)-N,N-diethylpropionamide herbicide, is obtained by the reaction of 1-naphthol and N,N-diethyl-α-bromopropionamide in MeOH – NaOMe at reflux. Sevin is Union Carbide's insecticide based on 1-naphthyl methylcarbamate, carbaryl, which is produced from 1-naphthyl chloroformate and methylamine or by reaction of 1-naphthol with methyl isocyanate. Its main use lies in the control of earthworms and certain caterpillars.
Important drugs are also derived from α-naphthol. The ester 1-naphthyl salicylate, Alphol, has been used as an antiseptic and antirheumatic, and ICI's 1-isopropylamino-3-(1-naphthoxy)-2-propanol, Inderal, is an important member of a new class of adrenergic β-blockers for the treatment of heart disease. Production of 21 involves reaction of 15 with epichlorohydrin followed by isopropylamine.
Related products used as β-blockers or antiarrhythmics include nadoxolol and nadolol. Many analogues and alternative syntheses of this type of compound have been patented.
Condensation of 1-naphthol with aniline at 180 °C gives N-phenyl-1-naphthylamine which is used as a rubber antioxidant.
α-Naphthol is much less important than 2-naphthol as a dye intermediate. Apart from the historical interest in simple azo derivatives such as Orange I, the equilibrium with the keto form is an example of the prevalence of keto forms in many azo naphthol derivatives.
Certain diazo components, for example, 1-amino-2-hydroxynaphthalene - 4 - sulfonic acid, under strongly alkaline conditions, couple with 1-naphthol in the 2-position rather than the conventional 4-position. This leads to compounds such as C.I. Mordant Black 3 which form stable chromium complexes. Excess diazo compound can lead to disazo acid dyes such as C.I. Acid Brown 43.
Nitroso compounds can condense with α-naphthol for example, N,N-dimethyl-4-nitrosoaniline reacts to give indophenol.
Halogenated derivatives of α-naphthol have minor uses as shown by the reaction of 4-chloro-1-naphthol and 4-bromo-1-naphthol with substituted isatin-α-chlorides to form blue indigoid vat dyes.
Frischknecht R., Jungbluth N., Althaus H.-J., Doka G., Dones R., Heck T., Hellweg S., Hischier R., Nemecek T., Rebitzer G. and Spielmann M. (2007) Overview and Methodology. Final report ecoinvent v2.0 No. 1. Swiss Centre for Life Cycle Inventories, Dübendorf, CH, retrieved from: www.ecoinvent.org.
Gendorf (2000) Umwelterklärung 2000, Werk Gendorf. Werk Gendorf, Burgkirchen as pdf-File under: http://www.gendorf.de/pdf/umwelterklaerung2000.pdf
Gerald Booth: Naphthalene Derivatives. Published online: 2000. In: Ullmann's Encyclopedia of Industrial Che-mistry, Seventh Edition, 2004 Electronic Release (ed. Fiedler E., Grossmann G., Kersebohm D., Weiss G. and Witte C.). 7 th Electronic Release Edition. Wiley InterScience, New York, DOI: 10.1002/14356007.a17_009

## Included activities start
The activity starts when the raw materials enter the process.

## Included activities end
Production of alpha-naphtol including materials, energy uses, infrastructure and emissions.

## Geography
The inventory is modelled for the world.

## Technology
Caustiv fucsion of naphthalene sulfonic acid

## Time period
Time of publications

## Parameters
- fraction, cooling water, cooling pond system, to air: 0.032 dimensionless; name fraction_CW_CP_to_air; lognormal variance with pedigree 0.0413, pedigree (2,3,1,3,1)
  Calculated based on literature value (Scown, C.D., 2011, Water Footprint of U.S. Transportation Fuels and supplying information of the article) (Vionnet, S., Quantis Water Database - Technical Report, 2012).
- fraction, cooling water, once-through system, to air: 0.004 dimensionless; name fraction_CW_OT_to_air; lognormal variance with pedigree 0.0413, pedigree (2,3,1,3,1)
  (same comment as for fraction, cooling water, cooling pond system, to air)
- fraction, cooling water, recirculating system, to air: 0.771 dimensionless; name fraction_CW_R_to_air; lognormal variance with pedigree 0.0413, pedigree (2,3,1,3,1)
  (same comment as for fraction, cooling water, cooling pond system, to air)
- fraction, cooling water, to air: 0.3875 dimensionless; name fraction_CW_to_air; = (0.5*fraction_CW_OT_to_air)+(0.5*fraction_CW_R_to_air); lognormal variance with pedigree 0.092025, pedigree (4,4,3,2,4)
  Calculated value based on literature value (see comments of the other parametres present in this dataset) and expert opinion. In the case when no industry/literature data are available about the type of cooling or directly fraction, cooling water, to air specific for the process a default assumption is applied. It is assumed that the once-through cooling system is used in 50% of all cases and recirculating system is used in another 50% of all cases.

## Reference product
- sodium hydrogen sulfite: 1 kg; name BP; By-product classification allocatable product; CPC 34240: Phosphates of triammonium; salts and peroxysalts of inorganic acids and metals n.e.c.; HS2017 283210: Sulphites; of sodium; CAS 7631-90-5
  As there was no data available for the production of alpha-naphthol, the values for the production of by-products are calculated with an assumed yield of 95 % (Frischknecht et al. 2007).
  production volume 7.21767e6 kg; = PV_RP*BP/RP
    Calculated from production volume of reference product using the relative outputs.
  property carbon content, fossil 0
    Calculated based on molecular structure. See tab "chemicals".
  property price 0.444169 EUR2005
    Calculated based on inputs: The price of the product has been calculated as a sum of the values of the material and energy inputs for this product. This value is therefore a rough estimation. It may underestimate the real price since there are additional expenses when producing any product. These expences can include for example labour costs, treatment of waste materials and profit for the producer. Please consider carefully whether this level of data quality is acceptable for your application.
  properties: allocation factor 0.166057, carbon allocation 0 kg, carbon content 0, carbon content, non-fossil 0, dry mass 1 kg, true value 0.320587, water content 0, water in wet mass 0 kg, wet mass 1 kg

## Inputs from technosphere
- chemical factory, organics: 9.20278e-11 unit; lognormal variance with pedigree 0.3846, pedigree (2,4,5,5,4)
  EcoSpold01Location=RER
  Calculated based on literature data published by the industry. For this activity, no information was readily available concerning infrastructure and land-use. Therefore, the infrastructure is estimated based on data from two chemical factories, the BASF site of Ludwigshafen and the chemical factory in Gendorf (which are both located in Germany), which produce a wide range of chemical substances. Based on this data, the following assumptions are made: the built area amounts to about 4.2 ha, the plant has an average output of 50'000 t/a and a lifespan of fifty years. The estimated infrastructure amount is therefore 4.00 E-10 units per kg of produced chemical.
  References:
  Althaus H.-J., Chudacoff M., Hischier R., Jungbluth N., Osses M. and Primas A. (2007) Life Cycle Inventories of Chemicals. ecoinvent report No. 8, v2.0. EMPA Dübendorf, Swiss Centre for Life Cycle Inventories, Dübendorf, CH.
  Gendorf (2000) Umwelterklärung 2000, Werk Gendorf. Werk Gendorf, Burgkirchen.
  Uncertainty: Estimation
- electricity, medium voltage: 0.00305118, 0.0608642, 0.0204502, 0.000934376, 0.000187014, 4.01562e-5, 0.00628517 kWh (7 suppliers, which the file names only by identifier); sum of these 0.0918123 kWh; lognormal variance with pedigree 0.0852, pedigree (2,4,5,5,4)
  Calculated based on literature data published by the GENDORF Chemical Park. The factory produced an average of 2462760 tonnes of chemical substances (including intermediates) per year in the years 2015-2019. The average consumption of electricity in the years 2015-2019 was 982796751 kWh per year. This equals 0.39906 kWh/kg chemical produced.
  References:
  Chemiepark GENDORF, Umwelterklärung 2016, https://www.gendorf.de/Nachbarn/Umweltschutz/Industrie%20und%20Nachhaltigkeit
  Chemiepark GENDORF, Umwelterklärung 2017, https://www.gendorf.de/Nachbarn/Umweltschutz/Industrie%20und%20Nachhaltigkeit
  Chemiepark GENDORF, Umwelterklärung 2020, https://www.gendorf.de/Nachbarn/Umweltschutz/Industrie%20und%20Nachhaltigkeit
  EcoSpold01Location=UCTE
  Uncertainty: Estimation
- heat, district or industrial, natural gas: 0.00701674, 0.427002 MJ (2 suppliers, which the file names only by identifier); sum of these 0.434019 MJ; lognormal variance with pedigree 0.0852, pedigree (2,4,5,5,4)
  Calculated based on literature data published by the GENDORF Chemical Park. The factory produced an average of 2462760 tonnes of chemical substances (including intermediates) per year in the years 2015-2019. The average consumption of natural gas in the years 2015-2019 was 4645920000 MJ per year. This equals 1.8865 MJ/kg chemical produced.
  References:
  Chemiepark GENDORF, Umwelterklärung 2016, https://www.gendorf.de/Nachbarn/Umweltschutz/Industrie%20und%20Nachhaltigkeit
  Chemiepark GENDORF, Umwelterklärung 2017, https://www.gendorf.de/Nachbarn/Umweltschutz/Industrie%20und%20Nachhaltigkeit
  Chemiepark GENDORF, Umwelterklärung 2020, https://www.gendorf.de/Nachbarn/Umweltschutz/Industrie%20und%20Nachhaltigkeit
  properties: heating value, net 1 MJ
- heat, from steam, in chemical industry: 0.0478107 MJ; lognormal variance with pedigree 0.0852, pedigree (2,4,5,5,4)
  EcoSpold01Location=RER
  Calculated based on literature data published by the GENDORF Chemical Park. The factory produced an average of 2462760 tonnes of chemical substances (including intermediates) per year in the years 2015-2019. The average consumption of steam (internal and external sources) in the years 2015-2019 was 511785800 MJ per year. This equals 0.2078 MJ/kg chemical produced.
  References:
  Chemiepark GENDORF, Umwelterklärung 2016, https://www.gendorf.de/Nachbarn/Umweltschutz/Industrie%20und%20Nachhaltigkeit
  Chemiepark GENDORF, Umwelterklärung 2017, https://www.gendorf.de/Nachbarn/Umweltschutz/Industrie%20und%20Nachhaltigkeit
  Chemiepark GENDORF, Umwelterklärung 2020, https://www.gendorf.de/Nachbarn/Umweltschutz/Industrie%20und%20Nachhaltigkeit
  Uncertainty: Estimation
  properties: heating value, net 1 MJ
- hydrochloric acid, without water, in 30% solution state: 0.00605451 kg; lognormal variance with pedigree 0.0655, pedigree (4,5,5,1,1)
  The remaining sodium hydroxide is considered to be neutralized with hydrogen chloride.
  EcoSpold01Location=RER
  Uncertainty: Stoechiometric calculation
  properties: dry mass 1 kg, heating value, net 3.32 MJ, wet mass 1 kg
- naphthalene sulfonic acid: 0.351542 kg; lognormal variance with pedigree 0.0504, pedigree (2,3,5,4,3)
  As there was no data available for the production of alpha-naphthol, the values for the consumption of the raw materials are calculated with an assumed yield of 95 % (Frischknecht et al. 2007).
  properties: carbon content, fossil 0.576793, dry mass 1 kg, heating value, net 22.13 MJ, wet mass 1 kg
  note on carbon content, fossil: Calculated based on molecular structure. See tab "chemicals".
- sodium hydroxide, without water, in 50% solution state: 0.0675222 kg; lognormal variance with pedigree 0.0655, pedigree (4,5,5,1,1)
  As there was no data available for the production of alpha-naphthol, the values for the consumption of the raw materials are calculated with an assumed yield of 95 % (Frischknecht et al. 2007).
  EcoSpold01Location=RER
  Uncertainty: Stoechiometric calculation
  properties: dry mass 1 kg, heating value, net 3.03 MJ, wet mass 1 kg
- wastewater, average: -5.22037e-7, -1.85865e-9 m3 (2 suppliers, which the file names only by identifier); sum of these -5.23896e-7 m3; lognormal variance with pedigree 0.0452, pedigree (2,4,1,5,4)
  Calculated based on literature data published by the GENDORF Chemical Park. The factory produced an average of 2462760 tonnes of chemical substances (including intermediates) per year in the years 2015-2019. The average ouput of wastewater going to an external wastewater treatment plant in the years 2015-2019 was 5608 m3 per year. This equals 0.000002277 m3/kg chemical produced.
  References:
  Chemiepark GENDORF, Umwelterklärung 2016, https://www.gendorf.de/Nachbarn/Umweltschutz/Industrie%20und%20Nachhaltigkeit
  Chemiepark GENDORF, Umwelterklärung 2017, https://www.gendorf.de/Nachbarn/Umweltschutz/Industrie%20und%20Nachhaltigkeit
  Chemiepark GENDORF, Umwelterklärung 2020, https://www.gendorf.de/Nachbarn/Umweltschutz/Industrie%20und%20Nachhaltigkeit
  properties: carbon content, non-fossil 0.194039, dry mass 0.346837 kg, mass concentration, TOC 0.1091 kg/m3, mass concentration, calcium 0.039453 kg/m3, mass concentration, chlorine 0.030031 kg/m3, mass concentration, hydrogen 0.013365 kg/m3, mass concentration, nitrogen 0.031015 kg/m3, mass concentration, oxygen 0.069824 kg/m3, mass concentration, sodium 0.06456 kg/m3, mass concentration, sulfur 0.015602 kg/m3, water content 2882.2, wet mass 1000 kg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
  note on carbon content, non-fossil: 0.0673 kg TOC/m3 (Tab A.17, ecoinvent v2.2 report 13_I). TOC was considered as Total Carbon.

## Inputs from nature
- Oxygen [natural resource, in air]: 0.0280849 kg; = CO2/44.01*31.999; lognormal variance with pedigree 0.0666, pedigree (4,5,5,5,3)
  The input of oxygen needed for combustion was calculated stoichiometrically from the output of CO2. 44.01 g/mol is the molecular weight of CO2, 31.999 g/mol the molecular weight of O2.
- Water, cooling, unspecified natural origin [natural resource, in water]: 0.00338363 m3; lognormal variance with pedigree 0.0852, pedigree (2,4,5,5,4)
  Calculated based on literature data published by the GENDORF Chemical Park. The factory produced an average of 2462760 tonnes of chemical substances (including intermediates) per year in the years 2015-2019. The average amount of cooling water released in the years 2015-2019 was 34408800 t per year. It was assumed that 5% of the cooling water was emitted to air during its use, therefore, to calculate the input of cooling water, the output value reported by GENDORF was scaled up by the factor 1/0.95. This equals 0.014707 m3/kg chemical produced.
  References:
  Chemiepark GENDORF, Umwelterklärung 2016, https://www.gendorf.de/Nachbarn/Umweltschutz/Industrie%20und%20Nachhaltigkeit
  Chemiepark GENDORF, Umwelterklärung 2017, https://www.gendorf.de/Nachbarn/Umweltschutz/Industrie%20und%20Nachhaltigkeit
  Chemiepark GENDORF, Umwelterklärung 2020, https://www.gendorf.de/Nachbarn/Umweltschutz/Industrie%20und%20Nachhaltigkeit
  Uncertainty: Estimation
- Water, river [natural resource, in water]: 0.000222115 m3; lognormal variance with pedigree 0.0852, pedigree (2,4,5,5,4)
  Calculated based on literature data published by the GENDORF Chemical Park. The factory produced an average of 2462760 tonnes of chemical substances (including intermediates) per year in the years 2015-2019. The average consumption of river water in the years 2015-2019 was 22000820 t per year. However, since the cooling water is modelled as an input, the amount of river water was adjusted to avoid double counting. 55% of the input amount of cooling water was deducted from the amount of river water, as that is the share of river water versus well water. This equals 0.00096543 m3/kg chemical produced.
  References:
  Chemiepark GENDORF, Umwelterklärung 2016, https://www.gendorf.de/Nachbarn/Umweltschutz/Industrie%20und%20Nachhaltigkeit
  Chemiepark GENDORF, Umwelterklärung 2017, https://www.gendorf.de/Nachbarn/Umweltschutz/Industrie%20und%20Nachhaltigkeit
  Chemiepark GENDORF, Umwelterklärung 2020, https://www.gendorf.de/Nachbarn/Umweltschutz/Industrie%20und%20Nachhaltigkeit
- Water, well, in ground [natural resource, in water]: 0.000187857 m3; lognormal variance with pedigree 0.0852, pedigree (2,4,5,5,4)
  Calculated based on literature data published by the GENDORF Chemical Park. The factory produced an average of 2462760 tonnes of chemical substances (including intermediates) per year in the years 2015-2019. The average consumption of well water in the years 2015-2019 was 18607480 t per year. However, since the cooling water is modelled as an input, the amount of well water was adjusted to avoid double counting. 45% of the input amount of cooling water was deducted from the amount of well water, as that is the share of well water versus river water. This equals 0.00081652 m3/kg chemical produced.
  References:
  Chemiepark GENDORF, Umwelterklärung 2016, https://www.gendorf.de/Nachbarn/Umweltschutz/Industrie%20und%20Nachhaltigkeit
  Chemiepark GENDORF, Umwelterklärung 2017, https://www.gendorf.de/Nachbarn/Umweltschutz/Industrie%20und%20Nachhaltigkeit
  Chemiepark GENDORF, Umwelterklärung 2020, https://www.gendorf.de/Nachbarn/Umweltschutz/Industrie%20und%20Nachhaltigkeit

## Emissions to nature
- Carbon dioxide, fossil [air, urban air close to ground]: 0.0386267 kg; name CO2; lognormal variance with pedigree 0.1786, pedigree (4,5,5,5,5)
  The carbon contained in the removed carbon disulfide was accounted as CO2 emissions to air.
  Uncertainty: Estimation
- Sulfur dioxide [air, urban air close to ground]: 0.0002266 kg; lognormal variance with pedigree 0.1786, pedigree (4,5,5,5,5)
  Estimation
  Uncertainty: Estimation
- Water [air, unspecified]: 0.00033822 m3; lognormal variance with pedigree 0.1246, pedigree (2,4,5,5,4)
  Calculated based on literature data published by the GENDORF Chemical Park. The factory produced an average of 2462760 tonnes of chemical substances (including intermediates) per year in the years 2015-2019. To determine the emissions of water to air, the difference of all water inputs (from river, well, tap water and cooling) and outputs (wastewater, emissions to water) was calculated. The average ouput of water to air in the years 2015-2019 was 3620444 m3 per year. This equals 0.00147 m3/kg chemical produced. For more information on the other water exchanges please consult the respective exchange comment.
  References:
  Chemiepark GENDORF, Umwelterklärung 2016, https://www.gendorf.de/Nachbarn/Umweltschutz/Industrie%20und%20Nachhaltigkeit
  Chemiepark GENDORF, Umwelterklärung 2017, https://www.gendorf.de/Nachbarn/Umweltschutz/Industrie%20und%20Nachhaltigkeit
  Chemiepark GENDORF, Umwelterklärung 2020, https://www.gendorf.de/Nachbarn/Umweltschutz/Industrie%20und%20Nachhaltigkeit
  property fraction, origin: fresh water 0; name fraction_origin_fresh_water
  property fraction, origin: salt water 0; name fraction_origin_salt_water
  property fraction, origin: unspecified 1; name fraction_origin_unspecified
- Chloride [water, surface water]: 0.00588633 kg; lognormal variance with pedigree 0.3184, pedigree (4,5,5,5,5)
  The remaining sodium hydroxide is considered to be neutralized with hydrogen chloride.
  Uncertainty: Estimation
- Sodium I [water, surface water]: 0.00335938 kg; lognormal variance with pedigree 0.6642, pedigree (4,5,5,5,5)
  (same comment as for Chloride)
- Sulfate [water, surface water]: 0.00690673 kg; lognormal variance with pedigree 0.1786, pedigree (4,5,5,5,5)
  The remaining amount of unreacted naphthalene sulfonic acid (5 % of the input) was assumed to leave the production process with the waste water. Further it was assumed that this wastewater is treated in a internal wastewater plant. The sulphur content is calculated as sulphate emissions to water.
  Uncertainty: Estimation
- Water [water, unspecified]: 0.00346003 m3; lognormal variance with pedigree 0.1246, pedigree (2,4,5,5,4)
  Calculated based on literature data published by the GENDORF Chemical Park. The factory produced an average of 2462760 tonnes of chemical substances (including intermediates) per year in the years 2015-2019. The amount of water released back to the environment consists of the sum of the amount of process water treated in the internal WWTP that is then released back to the environment and the amount of cooling water released back to the environment. The average ouput of the internal WWTP in the years 2015-2019 was 2628800 m3 and that of cooling water released back to the environment was 34408800 m3. This gives a yearly average of 37037600 m3 emissions of water to water. This equals 0.01504 m3/kg chemical produced.
  References:
  Chemiepark GENDORF, Umwelterklärung 2016, https://www.gendorf.de/Nachbarn/Umweltschutz/Industrie%20und%20Nachhaltigkeit
  Chemiepark GENDORF, Umwelterklärung 2017, https://www.gendorf.de/Nachbarn/Umweltschutz/Industrie%20und%20Nachhaltigkeit
  Chemiepark GENDORF, Umwelterklärung 2020, https://www.gendorf.de/Nachbarn/Umweltschutz/Industrie%20und%20Nachhaltigkeit
  property fraction, origin: fresh water 0; name fraction_origin_fresh_water_Ww
  property fraction, origin: salt water 0; name fraction_origin_salt_water_Ww
  property fraction, origin: unspecified 1; name fraction_origin_unspecified_Ww

## Sampling procedure
Literature data

## Extrapolations
Emissions are modelled with standard methods.
