# bitumen seal production, V60

Dataset: EcoSpold 2, unit process
Geography: RoW
Time period: 1994-01-01 to 2023-12-31
Technology level: current
Classification: ISIC rev.4 ecoinvent: 2399:Manufacture of other non-metallic mineral products n.e.c.
Classification: EcoSpold01Categories: plastics/others
Tags: ConvertedDataset
Scenario: Business-as-Usual
System model: Allocation, cut-off by classification
Generated by: Martin Lehmann
Published in: Kellenberger D. 2007
Database: ecoinvent
isCopyrightProtected: true
accessRestrictedTo: 1

## General comment
The dataset is applicable in the construction building sector. Bitumen sealing is used to protect the construction against water intrusion.
[This dataset was already contained in the ecoinvent database version 2. It was not individually updated during the transfer to ecoinvent version 3. Life Cycle Impact Assessment results may still have changed, as they are affected by changes in the supply chain, i.e. in other datasets. This dataset was generated following the ecoinvent quality guidelines for version 2. It may have been subject to central changes described in the ecoinvent version 3 change report (http://www.ecoinvent.org/database/ecoinvent-version-3/reports-of-changes/), and the results of the central updates were reviewed extensively. The changes added e.g. consistent water flows and other information throughout the database. The documentation of this dataset can be found in the ecoinvent reports of version 2, which are still available via the ecoinvent website. The change report linked above covers all central changes that were made during the conversion process.]

## Included activities end
The dataset describes the production of bitumen sealing V60. Included processes are the extrusion of polypropylene foil, the fabrication of the sealing, the infrastructure, the transport by road and rail as well as the disposal of the bitumen cuttings in a municipal incineration. The production of bitumen sealing does not include any chemical processes.

## Geography
The data of this dataset is taken from literature studies and producer information.

## Technology
Simple processes involved, a carrier material is being soaked with bitumen. The bitumen coatings are then gritted with minerals (talcum, sand).

## Time period
The production of bitumen sealing has not changed very much over the years, as there are no chemical processes involved.

## Reference product
- bitumen seal, V60: 1 kg; By-product classification allocatable product; CPC 37940: Bituminous mixtures based on natural and artificial stone materials and bitumen, natural asphalt or related su[…]; HS2017 271500: Bituminous mixtures based on natural asphalt, on natural bitumen, on petroleum bitumen, on mineral tar or o[...]
  EcoSpold01Location=RER
  production volume 2.65986 kg
    This is a placeholder value that does not reflect real-world production volumes. This dataset does not currently require a real-world production volume to work in the database framework, and no actual data were collected yet. This has no negative effect on the results of the ecoinvent database.
  property carbon content, fossil 0.594316
    The production of bitumen sealing does not include any chemical processes (ecoinvent v2.2 report 7_part XXIII), C content was then calculated as a weighted average of C content of the different components
  property heating value, net 39.33 MJ
    Value taken from the general comment of the treatment dataset.
  property price 0.461515 EUR2005
    Calculated based on inputs: The price of the product has been calculated as a sum of the values of the material and energy inputs for this product. This value is therefore a rough estimation. It may underestimate the real price since there are additional expenses when producing any product. These expences can include for example labour costs, treatment of waste materials and profit for the producer. Please consider carefully whether this level of data quality is acceptable for your application.
  properties: carbon allocation 0.594316 kg, carbon content 0.594316, carbon content, non-fossil 0, dry mass 1 kg, water content 0, water in wet mass 0 kg, wet mass 1 kg

## Inputs from technosphere
- chemical factory, organics: 4e-10 unit; lognormal variance with pedigree 0.3546, pedigree (2,4,5,5,1)
  EcoSpold01Location=RER
- electricity, medium voltage: 0.0140901, 0.281065, 0.00703609, 0.00431486, 0.000863614, 0.000185437, 0.0290243, 0.0834207 kWh (8 suppliers, which the file names only by identifier); sum of these 0.42 kWh; lognormal variance with pedigree 0.0532, pedigree (2,3,5,5,1)
  EcoSpold01Location=UCTE
- extrusion, plastic film: 0.00101 kg; lognormal variance with pedigree 0.0546, pedigree (2,4,5,5,1)
  EcoSpold01Location=RER
- glass fibre: 0.0131 kg; lognormal variance with pedigree 0.0546, pedigree (2,4,5,5,1)
  EcoSpold01Location=RER
  properties: dry mass 1 kg, wet mass 1 kg
- lime: 0.258 kg; lognormal variance with pedigree 0.052, pedigree (1,1,5,5,1)
  composite
  EcoSpold01Location=CH
  properties: carbon content, fossil 0.120005, dry mass 1 kg, wet mass 1 kg
- pitch: 0.0996975, 0.00446885, 0.00220278, 0.0386509, 0.00637971, 0.5636 kg (6 suppliers, which the file names only by identifier); sum of these 0.715 kg; lognormal variance with pedigree 0.0546, pedigree (2,4,5,5,1)
  EcoSpold01Location=RER
  properties: carbon content, fossil 0.83, dry mass 1 kg, heating value, net 28 MJ, wet mass 1 kg
- polypropylene, granulate: 0.00101 kg; lognormal variance with pedigree 0.0546, pedigree (2,4,5,5,1)
  EcoSpold01Location=RER
  properties: carbon content, fossil 0.857143, dry mass 1 kg, heating value, net 32.78 MJ, wet mass 1 kg
  note on carbon content, fossil: Polypropylene is formed by the polymerisation of propylene, C3H6 (ecoinvent v2.2 report 11_II)
  note on heating value, net: Value extracted from "treatment of waste polypropylene, open burning"
- sand: 0.000328385, 0.0213699, 1.70482e-6 kg (3 suppliers, which the file names only by identifier); sum of these 0.0217 kg; lognormal variance with pedigree 0.0546, pedigree (2,4,5,5,1)
  EcoSpold01Location=CH
  properties: dry mass 1 kg, wet mass 1 kg
- waste bitumen sheet: -0.00716 kg; lognormal variance with pedigree 0.0346, pedigree (2,4,3,5,3)
  EcoSpold01Location=CH
  production volume
    Calculated from the production volume of bitumen seal, V60 in proportion to the respective output amounts.
  properties: carbon content, fossil 0.643207, dry mass 0.985 kg, heating value, net 40.2 MJ, water content 0.0152284, wet mass 1 kg
  note on carbon content, fossil: The bitumen sheet is made of 63% bitumen, 24% surface spread and filler (assumed to be pure SiO2), 6% carrier fleece (assumed to be PE) and 7% elastomer (assumed to be PS) (ecoinvent v2.2 report 13_I, pg 40). C content of bitumen, PE and PS from Tab A.6 and A.1 (ecoinvent v2.2 report 13_I, pg 40), respectively. C content of waste also given in the dataset
  note on heating value, net: Literature value, Source: IPCC 2006, 2006 IPCC Guidelines for National Greenhouse Gas Inventories, Prepared by the National Greenhouse Gas Inventories Programme, Eggleston H.S., Buendia L., Miwa K., Ngara T. and Tanabe K. (eds). Published: IGES, Japan
- waste glass: -9.67477e-7, -0.00292888, -8.31945e-9, -8.91702e-8, -3.72265e-8, -2.02297e-9, -1.26336e-8 kg (7 suppliers, which the file names only by identifier); sum of these -0.00293 kg; lognormal variance with pedigree 0.0346, pedigree (2,4,3,5,3)
  EcoSpold01Location=CH
  production volume
    (same comment as for waste bitumen sheet)
  properties: dry mass 1 kg, heating value, net 0.05 MJ, wet mass 1 kg
  note on heating value, net: Value extracted from "treatment of waste glass, open dump, very wet infiltration class (1000mm)"

## Emissions to nature
- Benzo(a)pyrene [air, unspecified]: 1.91e-9 kg; lognormal variance with pedigree 0.692, pedigree (1,1,5,5,1)
  estimation
- NMVOC, non-methane volatile organic compounds [air, unspecified]: 0.00107 kg; lognormal variance with pedigree 0.1746, pedigree (2,4,5,5,1)

## Sampling procedure
Literature, database

## Extrapolations
see Geography This dataset has been copied from an original dataset covering the geography RER. The uncertainty has been adjusted accordingly.

## Review by Rolf Frischknecht 2007-11-07
passed
