# softwood forestry, pine, sustainable forest management

Dataset: EcoSpold 2, unit process
Geography: DE
Time period: 2010-01-01 to 2023-12-31
Technology level: current
Classification: ISIC rev.4 ecoinvent: 0220:Logging
Tags: combined production,; combined production; Swiss brush-up completed
Scenario: Business-as-Usual
System model: Allocation, cut-off by classification
Generated by: Frank Werner
Database: ecoinvent
isCopyrightProtected: true
accessRestrictedTo: 1

## General comment
This dataset covers the production and harvesting of 1 m3 of stemwood, pine, solid, under bark, plus the relative share of enery wood from slash from sustainable forest management as the prevailing management practices in Germany.
For Germany forestry processes for the 4 main tree species are modelled:
• hardwood: beech
• hardwood: oak
• softwood: spruce
• softwood: pine
Table 1-1 lists the parameters of the inventoried tree species and their sources:

## Included activities start
The activity starts with site preparation assuming establishment of the forest via planting, including seedling production and covers all process related to forest management, including site preparation, planting, tending, young growth tending, clearing, thinnings and harvesting operations including the processing of wood fuel to chips, bundles and chopped wood (logs for energy) over one rotation period. It covers also the maintenance and construction of forest roads.

## Included activities end
This activity ends with the assortments at the forest road and includes eventual drying before transportation.

## Parameters
- Bark ratio: 0.12 dimensionless; name bark; lognormal variance with pedigree 0.025, pedigree (1,1,1,1,1)
  share of bark of total volume of trunk (solid wood + bark) for hardwood; U. Luginbühl, personal written communication, HIS
- area forest per m3 wood: 12.7396 m2/m3; name a_transformation_forest; = (10000-a_forest_road)/yield_wood_ub
  area of forest per ha divided by total harvest over one rotation period per hectare
- area forest road: 216 m2/ha; name a_forest_road; = 54*4; lognormal variance with pedigree 0.2506, pedigree (2,1,1,1,1)
  Schweinle, J. and C. Thoroe (2001): Vergleichende Ökobilanzierung der Rohholzproduktion in verschiedenen Forstbetrieben. Mitteilungen der Bundesforschungsanstalt für Forst- und Holzwirtschaft Nr. 204, Kommissionsverlag Max Wiedebusch, Hamburg.
- area forest road in gravel: 216 m2/ha; name a_forest_road_gravel; = a_forest_road; lognormal variance with pedigree 0.2506, pedigree (2,1,1,1,1)
  assumed
- area forest road per m3 wood: 0.28125 m2/m3; name a_transformation_road; = a_forest_road/yield_wood_ub
  area of forest road per ha divided by total harvest over one rotation period per hectare; Albrecht, S., S. Rüter, J. Welling, M. Knauf, U. Mantau, A. Braune, M. Baitz, H. Weimar, S. Sörgel, J. Kreissig, J. Deimling and S. Hellwig (2009): ÖkoPot - Ökologische Potenziale durch Holznutzung gezielt fördern. Abschlussbericht zum BMBF-Projekt FKZ 0330545. Universität Stuttgart, Universität Hamburg, Hamburg.
- bulk density gravel: 1600 kg/m3; name d_gravel; lognormal variance with pedigree 0.2506, pedigree (2,1,1,1,1)
  kg gravel / m3 bulked material
- diesel consumption per kg of gravel used for maintenance of forest roads: 0.043 MJ/kg; name diesel_per_gravel; lognormal variance with pedigree 0.2506, pedigree (2,1,1,1,1)
  diesel consumption of building machines used to maintaine road and distribute new layer of gravel
- forwarding with forwarder per m3: 0.026 PMH/m3; name forwarding_forwarder; lognormal variance with pedigree 0.2506, pedigree (2,1,1,1,1)
  referring to stemwood; IMPORTANT NOTE: When considering several harvesting systems, e.g. in datasets on national forestry, this parameter is NOT the inverse productivity of the harvesting system but the inverse productivity of the system weighted with the share of the amount harvested by the respective system. This has to be calculated outside EcoEditor. Own calculations based on Klvac, R. and A. Skoupy (2009): Characteristic fuel consumption and exhaust emissions in fully mechanized logging operations. Journal of Forest Research, 14(6): 328-334: referring to Freitas 2004; Skogforsk (2006): Fuel consumption in forestry continues to fall. Results from Skogforsk, Skogforsk, Uppsala; Berg, S. and T. Karjalainen (2003): Comparison of greenhouse gas emissions from forest operations in Finand and Sweden. Forestry, 76(3): 271-284.
- harvesting with forestry harvester: 0.0195 year; name harvesting; lognormal variance with pedigree 0.2506, pedigree (2,1,1,1,1)
  (same comment as for forwarding with forwarder per m3)
- moisture content cleft timber: 0.35 dimensionless; name moisture_cleft_timber; lognormal variance with pedigree 0.2506, pedigree (2,1,1,1,1)
  kg water/kg dry mass.
- moisture content pulpwood: 0.8 dimensionless; name moisture_pulpwood; lognormal variance with pedigree 0.2506, pedigree (2,1,1,1,1)
  kg water/kg dry mass. Schweinle, J. and C. Thoroe (2001): Vergleichende Ökobilanzierung der Rohholzproduktion in verschiedenen Forstbetrieben. Mitteilungen der Bundesforschungsanstalt für Forst- und Holzwirtschaft Nr. 204, Kommissionsverlag Max Wiedebusch, Hamburg.
- moisture content sawlogs and veneer logs: 0.7 dimensionless; name moisture_sawlogs; lognormal variance with pedigree 0.2506, pedigree (2,1,1,1,1)
  (same comment as for moisture content pulpwood)
- moisture content wood chips: 0.8 dimensionless; name moisture_wood_chips; lognormal variance with pedigree 0.2506, pedigree (2,1,1,1,1)
  kg water/kg dry mass. Based on Schweinle, J. and C. Thoroe (2001): Vergleichende Ökobilanzierung der Rohholzproduktion in verschiedenen Forstbetrieben. Mitteilungen der Bundesforschungsanstalt für Forst- und Holzwirtschaft Nr. 204, Kommissionsverlag Max Wiedebusch, Hamburg.
- periodicity of maintenance of forest roads: 10 year; name interval_road_maintenance; lognormal variance with pedigree 0.2506, pedigree (2,1,1,1,1)
  interval between two events of maintenance of forest roads
- planting density: 8000 unit; name planting_density; lognormal variance with pedigree 0.2506, pedigree (2,1,1,1,1)
  number of trees per hectare
- power sawing without catalytic converter per m3: 0.406 PMH/m3; name power_sawing; lognormal variance with pedigree 0.2506, pedigree (2,1,1,1,1)
  referring to stemwod; IMPORTANT NOTE: When considering several harvesting systems, e.g. in datasets on national forestry, this parameter is NOT the inverse productivity of the harvesting system but the inverse productivity of the system weighted with the share of the amount harvested by the respective system. This has to be calculated outside EcoEditor. Own calculations based on Klvac, R. and A. Skoupy (2009): Characteristic fuel consumption and exhaust emissions in fully mechanized logging operations. Journal of Forest Research, 14(6): 328-334: referring to Freitas 2004; Skogforsk (2006): Fuel consumption in forestry continues to fall. Results from Skogforsk, Skogforsk, Uppsala; Berg, S. and T. Karjalainen (2003): Comparison of greenhouse gas emissions from forest operations in Finand and Sweden. Forestry, 76(3): 271-284.
- productivity forwarding wood chips from terrain chipper: 70 m3/PMH; name productivity_forwarding_chips_in_stand; lognormal variance with pedigree 0.2506, pedigree (2,1,1,1,1)
  as m3 bulked/ productive machine hour
- productivity mobile chipper: 120 m3/PMH; name productivity_mobile_chipper; lognormal variance with pedigree 0.2506, pedigree (2,1,1,1,1)
  as m3 bulked/ productive machine hour
- productivity terrain chipper: 25 m3/PMH; name productivity_terrain_chipper; lognormal variance with pedigree 0.2506, pedigree (2,1,1,1,1)
  as m3 bulked/ productive machine hour; based on Cremer, T. and B. Velazques-Marti (2007): Evaluation of two harvesting systems for the supply of wood-chips in Norway spurce forest affected by bark beetle. Croation Journal of Forest Engineering, 28(2): 145-155; referring to Lechner et al 2007
- productivity, clefting device: 5.26 m3/PMH; name productivity_clefting_device; lognormal variance with pedigree 0.2506, pedigree (2,1,1,1,1)
  as m3 bulked/ productive machine hour
- ratio bulk density / solid density of chips: 2.8 dimensionless; name ratio_bulk_solid_chips; lognormal variance with pedigree 0.2506, pedigree (2,1,1,1,1)
  as m3 bulked / m3 solid
- ratio bulk density / solid density of cleft timber: 1.4 dimensionless; name ratio_bulk_solid_cleft_timber; lognormal variance with pedigree 0.2506, pedigree (2,1,1,1,1)
  as m3 bulked / m3 solid
- rotation period: 120 year; name rotation_period; lognormal variance with pedigree 0.2506, pedigree (2,1,1,1,1)
  number of years from planting to final harvest. Source: Albrecht et al. 2009.
- share of chips of total wood fuel: 0.23 dimensionless; name share_chips; lognormal variance with pedigree 0.2506, pedigree (2,1,1,1,1)
  Share of chips of total wood fuel harvested (referring consistently to volume under bark or volume over bark for all types of wood fuel)share_bundles + share_chopped_wood+share_chips = 100% wood fuel; calculated based onAnonymous (2010): Statistisches Jahrbuch über Ernährung, Landwirtschaft und Forsten der Bundesrepublick Deutschland. 54. Jahrgang, Wirtschaftsverlag NW GmbH, Bremerhaven.
  Anonymous (2013): 19 Land- und Forstwirtschaft. In: Statistisches Jahrbuch 2012, Statistisches Bundesamt, Berlin, 471-500.
- share of chips processed at forest road (from above-ground biomass): 0.98 dimensionless; name share_chips_at_forest_road; lognormal variance with pedigree 0.252, pedigree (3,1,1,1,1)
  Share of chips processed at forest road of total amount of chips processed in the forest; share_chips_at _forest_road+share_chips_in_stand = 100% chips from forestry; calculated based on Anonymous (2010): Statistisches Jahrbuch über Ernährung, Landwirtschaft und Forsten der Bundesrepublick Deutschland. 54. Jahrgang, Wirtschaftsverlag NW GmbH, Bremerhaven.
  Anonymous (2013): 19 Land- und Forstwirtschaft. In: Statistisches Jahrbuch 2012, Statistisches Bundesamt, Berlin, 471-500.
- share of chips processed in stand (from above-ground biomass): 0.02 dimensionless; name share_chips_in_stand; lognormal variance with pedigree 0.252, pedigree (3,1,1,1,1)
  Share of chips processed in the stand of total amount of chips processed in the fores; share_chips_at _forest_road+share_chips_in_stand = 100% chips from forestry;calculated based on Anonymous (2010): Statistisches Jahrbuch über Ernährung, Landwirtschaft und Forsten der Bundesrepublick Deutschland. 54. Jahrgang, Wirtschaftsverlag NW GmbH, Bremerhaven.
  Anonymous (2013): 19 Land- und Forstwirtschaft. In: Statistisches Jahrbuch 2012, Statistisches Bundesamt, Berlin, 471-500.
- share of cleft timber of total wood fuel: 0.77 dimensionless; name share_cleft_timber; lognormal variance with pedigree 0.2506, pedigree (2,1,1,1,1)
  Share of cleft timber as wood fuel of total wood fuel harvested (referring consistently to volume under bark or volume over bark for all types of wood fuel); share_bundles + share_cleft_timber+share_chips = 100% wood fuel; calculated based on Anonymous (2010): Statistisches Jahrbuch über Ernährung, Landwirtschaft und Forsten der Bundesrepublick Deutschland. 54. Jahrgang, Wirtschaftsverlag NW GmbH, Bremerhaven.
  Anonymous (2013): 19 Land- und Forstwirtschaft. In: Statistisches Jahrbuch 2012, Statistisches Bundesamt, Berlin, 471-500.
- share of planted area: 1 dimensionless; name share_area_planted; lognormal variance with pedigree 0.2506, pedigree (2,1,1,1,1)
  Share of forest area that is planted instead of being restocked by natural regeneration
- share of pulpwood of total wood harvest: 0.36 dimensionless; name share_pulpwood; lognormal variance with pedigree 0.2506, pedigree (2,1,1,1,1)
  Share of pulpwood of total wood harvest (referring to volume below bark); share_sawlogs + share_pulpwood + share_wood_fuel = 100%; calculated based on Anonymous (2010): Statistisches Jahrbuch über Ernährung, Landwirtschaft und Forsten der Bundesrepublick Deutschland. 54. Jahrgang, Wirtschaftsverlag NW GmbH, Bremerhaven.
  Anonymous (2013): 19 Land- und Forstwirtschaft. In: Statistisches Jahrbuch 2012, Statistisches Bundesamt, Berlin, 471-500.
- share of sawlogs and veneer logs of total wood harvest: 0.5 dimensionless; name share_sawlogs; lognormal variance with pedigree 0.2506, pedigree (2,1,1,1,1)
  Share of sawlogs and veneer logs of total wood harvest (referring to volume below bark); share_sawlogs + share_pulpwood + share_wood_fuel = 100%; calculated based on Anonymous (2010): Statistisches Jahrbuch über Ernährung, Landwirtschaft und Forsten der Bundesrepublick Deutschland. 54. Jahrgang, Wirtschaftsverlag NW GmbH, Bremerhaven.
  Anonymous (2013): 19 Land- und Forstwirtschaft. In: Statistisches Jahrbuch 2012, Statistisches Bundesamt, Berlin, 471-500.
- share of seedlings from heated greenhouses: 0 dimensionless; name seedlings_heated
  share of seedlings from heated greenhouses of total amount of seedlings used in replanting%; Albrecht, S., S. Rüter, J. Welling, M. Knauf, U. Mantau, A. Braune, M. Baitz, H. Weimar, S. Sörgel, J. Kreissig, J. Deimling and S. Hellwig (2009): ÖkoPot - Ökologische Potenziale durch Holznutzung gezielt fördern. Abschlussbericht zum BMBF-Projekt FKZ 0330545. Universität Stuttgart, Universität Hamburg, Hamburg.
- share of wood fuel of total wood harvest: 0.14 dimensionless; name share_wood_fuel; lognormal variance with pedigree 0.2506, pedigree (2,1,1,1,1)
  Share of wood fuel of total wood harvest (referring to volume below bark); share_sawlogs + share_pulpwood + share_wood_fuel = 100%; calculated based on Anonymous (2010): Statistisches Jahrbuch über Ernährung, Landwirtschaft und Forsten der Bundesrepublick Deutschland. 54. Jahrgang, Wirtschaftsverlag NW GmbH, Bremerhaven.
  Anonymous (2013): 19 Land- und Forstwirtschaft. In: Statistisches Jahrbuch 2012, Statistisches Bundesamt, Berlin, 471-500.
- share, revenues wood production: 1 dimensionless; name share_revenues_wood; lognormal variance with pedigree 0.252, pedigree (3,1,1,1,1)
  Used to determine the share of land used for the productive function of forestry covered in this dataset
- shrinkage ratio: 0.004 dimensionless; name shrinkage_ratio; lognormal variance with pedigree 0.25, pedigree (1,1,1,1,1)
  for wood: % of volume lost per % of humidity lowered; usually applicable for humidity u < 30%; as oak according to Kollmann 1982
- skidding with skidder per m3: 0.0677 PMH/m3; name skidding; lognormal variance with pedigree 0.2506, pedigree (2,1,1,1,1)
  referring to stemwood; IMPROTANT NOTE: When considering several harvesting systems, e.g. in datasets on national forestry, this parameter is NOT the productivity of the harvesting system but the productivity of the system weighted with the share of the amount harvested by the respective system. This has to be calculated outside EcoEditor. Own calculations based on Klvac & Skoupy 2009, Skogforsk 2006, Berg & Karjalainen 2003
- sum of reference products in volume: 1 m3; name sum_RP_m3; lognormal variance with pedigree 0.005, pedigree (1,1,1,1,1)
  as solid under bark; DO NOT CHANGE; dataset might calculate misleading results
- thickness of new gravel layer: 0.02 m; name thickness_new_gravel; lognormal variance with pedigree 0.252, pedigree (3,1,1,1,1)
  thickness of layer of gravel that is added during a maintenance operation of forest roads
- wood density, basic: 431.2 kg/m3; name basic_wood_d; = dry_wood_d*(1-30*shrinkage_ratio); lognormal variance with pedigree 0.2506, pedigree (2,1,1,1,1)
  kg oven-dry matter/wet volume
- wood density, dry: 490 kg/m3; name dry_wood_d; lognormal variance with pedigree 0.25, pedigree (1,1,1,1,1)
  kg oven-dry matter/dry volume; Oenorm B3012
- yield wood over rotation period: 768 m3; name yield_wood_ub; lognormal variance with pedigree 0.2506, pedigree (2,1,1,1,1)
  yield of wood under bark per ha over one rotation period

## Reference product
- cleft timber, measured as dry mass: 1 kg; name cleft_timber; = share_wood_fuel*basic_wood_d/(1-bark)*share_cleft_timber; By-product classification allocatable product; CPC 3110: Wood, sawn or chipped lengthwise, sliced or peeled, of a thickness exceeding 6 mm; railway or tramway sleepers […]; HS2017 4401: Fuel wood, in logs, billets, twigs, faggots or similar forms; wood in chip or particles; sawdust and wood was[...]
  Average composition of 1 m3 solid wood under bark, harvested in Germany; see general comment for details; calculated as the share of wood fuel from the total amount of wood harvested, of which a share is cleft timber, converted from wet volume to dry matter via basic wood density, including the percentage of bark (as share of wood fuel relates to 1 m3 under bark)
  production volume 6.8845e8 kg; = 1405000* basic_wood_d/(1-bark)
    see general comments field
  property apparent wood density 582.12 kg/m3; name cleft_timber_apparent_wood_d; = cleft_timber_basic_wood_d*(1+moisture_cleft_timber)
    wet mass/wet volume
  property basic wood density 431.2; name cleft_timber_basic_wood_d; = dry_wood_d*(1-30*shrinkage_ratio)
    dry mass/wet volume
  property carbon content, non-fossil 0.494; name cleft_timber_C_content_non_fossil
    biogene carbon content on a dry matter basis
  property dry mass 1 kg; name cleft_timber_DM
  property dry wood density 490 kg/m3; name cleft_timber_dry_wood_d; = dry_wood_d
    kg dry matter/ dry volume
  property heating value, gross 20.4 MJ; name cleft_timber_Gross_Heat_Value
    gross (upper) heating (calorific) value
  property heating value, net 13.8948 MJ; name cleft_timber_Net_Heat_Value; = cleft_timber_Gross_Heat_Value-1.32-(20*moisture_cleft_timber/(1+moisture_cleft_timber))
    net (lower) heating (calorific) value
  property price 0.073 EUR2005
    Calculated based on data from FAOSTAT (accessed 20140429). The price is calculated by using data on total world import quantity (m3) and import value (1000 USD), year 2005. 3411751 m3 of Wood Fuel Trd was imported in the world in 2005. The import value was 161229000 USD. The calculated price is thus (161229000/3411751=47.3*0.8=) 38.1 Euro/m3. The density of cleft timber, measured as dry mass is 541.2 kg/m3. The recalculated price is (1/541.2*38.1=) 0.07 Euro/kg. Using the same approach the calculated price for 2010 was 0.112 Euro/kg.
  property water content 0.35; name cleft_timber_water_content; = moisture_cleft_timber
  property water in wet mass 0.35 kg; name cleft_timber_WWM; = cleft_timber_WM-cleft_timber_DM
  property wet mass 1.35 kg; name cleft_timber_WM; = 1+moisture_cleft_timber
  properties: basic density 0 kg/m3, carbon allocation 0.494 kg, carbon content 0.494, carbon content, fossil 0

## Inputs from technosphere
- clefting of energy wood: 0.000617253 hour; name clefting; = cleft_timber/cleft_timber_basic_wood_d* ratio_bulk_solid_cleft_timber/productivity_clefting_device; lognormal variance with pedigree 0.0336, pedigree (2,1,4,1,1)
  no comment
- diesel, burned in building machine: 0.0286856 MJ; = saw_veneer_logs*(diesel_per_gravel*108)/sum_RP_m3+pulpwood*(diesel_per_gravel*108)/sum_RP_m3+wood_chips*(1-bark)/basic_wood_d*(diesel_per_gravel*108)/sum_RP_m3+cleft_timber*(1-bark)/cleft_timber_basic_wood_d*(diesel_per_gravel*108)/sum_RP_m3+saw_veneer_logs*planting_density/500*7*0.84*42.6/yield_wood_ub/sum_RP_m3+saw_veneer_logs*planting_density/500*7*0.84*42.6/yield_wood_ub/sum_RP_m3+pulpwood*planting_density/500*7*0.84*42.6/yield_wood_ub/sum_RP_m3+wood_chips*(1-bark)/basic_wood_d*planting_density/500*7*0.84*42.6/yield_wood_ub/sum_RP_m3+cleft_timber*(1-bark)/cleft_timber_basic_wood_d*planting_density/500*7*0.84*42.6/yield_wood_ub/sum_RP_m3+saw_veneer_logs*1*15*6*0.84*42.6/yield_wood_ub/sum_RP_m3+pulpwood*1*15*6*0.84*42.6/yield_wood_ub/sum_RP_m3+wood_chips*(1-bark)/basic_wood_d*1*15*6*0.84*42.6/yield_wood_ub/sum_RP_m3+cleft_timber*(1-bark)/ cleft_timber_basic_wood_d*1*15*6*0.84*42.6/yield_wood_ub/sum_RP_m3; lognormal variance with pedigree 0.0336, pedigree (2,1,4,1,1)
  for distribution of gravel for maintenance of forest road over rotation period PLUS diesel for planting activities, productivity 500 seedlings/PMH, diesel consumption 7l/PMH, converted to MJ PLUS the diesel consumption used in mechanical clearing (1 intervention, 15 PMH per ha, 6 l/PMH, converted to MJ)
  properties: UVEK_link_1 732, UVEK_relative_amount_1 1, heating value, net 1 MJ
  note on UVEK_link_1: to be used only in special submissions in coordination with ecoinvent and the Swiss FOEN
- forwarding, forwarder: 5.30612e-5 hour; = saw_veneer_logs*forwarding_forwarder/sum_RP_m3+pulpwood*forwarding_forwarder/sum_RP_m3+wood_chips*share_chips_at_forest_road*(1-bark)/basic_wood_d*forwarding_forwarder/sum_RP_m3+cleft_timber*(1-bark)/ cleft_timber_basic_wood_d*forwarding_forwarder/sum_RP_m3+wood_chips*share_chips_in_stand/basic_wood_d/(productivity_forwarding_chips_in_stand/ ratio_bulk_solid_chips)/11*9.5/sum_RP_m3; lognormal variance with pedigree 0.0336, pedigree (2,1,4,1,1)
  average input per m3; see general comment for details; covers the forwarding of stemwood PLUS the forwarding of chips chipped in the stand
- gravel, crushed: 0.220408 kg; = saw_veneer_logs*(thickness_new_gravel*a_forest_road_gravel*d_gravel*rotation_period/interval_road_maintenance/yield_wood_ub)/sum_RP_m3+pulpwood*(thickness_new_gravel*a_forest_road_gravel*d_gravel*rotation_period/interval_road_maintenance/yield_wood_ub)/sum_RP_m3+wood_chips*(1-bark)/basic_wood_d*(thickness_new_gravel*a_forest_road_gravel*d_gravel*rotation_period/interval_road_maintenance/yield_wood_ub)/sum_RP_m3+cleft_timber*(1-bark)/ cleft_timber_basic_wood_d*(thickness_new_gravel*a_forest_road_gravel*d_gravel*rotation_period/interval_road_maintenance/yield_wood_ub)/sum_RP_m3; lognormal variance with pedigree 0.0336, pedigree (2,1,4,1,1)
  gravel for maintenance of forest road over rotation period; amount of gravel, see value of respective exchange
  properties: UVEK_link_1 2312, UVEK_relative_amount_1 1, dry mass 1 kg, wet mass 1 kg
- harvesting, forestry harvester: 3.97959e-5 hour; = saw_veneer_logs*harvesting/sum_RP_m3+pulpwood*harvesting/sum_RP_m3+wood_chips*(1-bark)/basic_wood_d*harvesting/sum_RP_m3+cleft_timber*(1-bark)/ cleft_timber_basic_wood_d*harvesting/sum_RP_m3; lognormal variance with pedigree 0.0336, pedigree (2,1,4,1,1)
  average input per m3; see general comment for details
- power sawing, without catalytic converter: 0.000945493 hour; = saw_veneer_logs*power_sawing/sum_RP_m3+pulpwood*power_sawing/sum_RP_m3+wood_chips*(1-bark)/basic_wood_d*power_sawing/sum_RP_m3+ cleft_timber*(1-bark)/cleft_timber_basic_wood_d*power_sawing/sum_RP_m3+saw_veneer_logs*(1*14+1*15+1*15)/yield_wood_ub/sum_RP_m3+pulpwood*(1*14+1*15+1*15)/yield_wood_ub/sum_RP_m3+wood_chips*(1-bark)/basic_wood_d*(1*14+1*15+1*15)/yield_wood_ub/sum_RP_m3+ cleft_timber*(1-bark)/cleft_timber_basic_wood_d*(1*14+1*15+1*15)/yield_wood_ub/sum_RP_m3; lognormal variance with pedigree 0.0336, pedigree (2,1,4,1,1)
  average input per m3 covering hand-held gasoline-driven equipment used for site preparation, tending and pruning (attributing per ha values to total amount of wood harvested) as well as the amount of power sawing per harvested m3 of stemwood; see general comment for details
- skidding, skidder: 0.000138163 hour; = saw_veneer_logs*skidding/sum_RP_m3+pulpwood*skidding/sum_RP_m3+wood_chips*share_chips_at_forest_road*(1-bark)/basic_wood_d*skidding/sum_RP_m3+cleft_timber*(1-bark)/ cleft_timber_basic_wood_d*skidding/sum_RP_m3; lognormal variance with pedigree 0.0336, pedigree (2,1,4,1,1)
  average input per m3; see general comment for details
- tree seedling, for planting: 0.0212585 unit; = saw_veneer_logs*(share_area_planted*planting_density*(1-seedlings_heated)/yield_wood_ub)/sum_RP_m3+pulpwood*(share_area_planted*planting_density*(1-seedlings_heated)/yield_wood_ub)/sum_RP_m3+wood_chips*(1-bark)/basic_wood_d*(share_area_planted*planting_density*(1-seedlings_heated)/yield_wood_ub)/sum_RP_m3+cleft_timber*(1-bark)/ cleft_timber_basic_wood_d*(share_area_planted*planting_density*(1-seedlings_heated)/yield_wood_ub)/sum_RP_m3; lognormal variance with pedigree 0.035, pedigree (3,1,4,1,1)
  calculated as 100% of the seedlings coming from unheated greenhouses in Germany
  properties: carbon content, non-fossil 0.494, dry mass 0.2 kg, water content 0.5, wet mass 0.3 kg

## Inputs from nature
- Carbon dioxide, in air [natural resource, in air]: 1.81133 kg; = saw_veneer_logs/(1-bark)*basic_wood_d* saw_veneer_logs_C_content_non_fossil/12*44/sum_RP_m3+pulpwood/(1-bark)*basic_wood_d* pulpwood_C_content_non_fossil/12*44/sum_RP_m3+wood_chips* chips_C_content_non_fossil/12*44/sum_RP_m3+cleft_timber* cleft_timber_C_content_non_fossil/12*44/sum_RP_m3; lognormal variance with pedigree 0.033, pedigree (1,1,4,1,1)
  Resource input, referring to total biomass harvested, i.e. wood including bark
- Energy, gross calorific value, in biomass [natural resource, biotic]: 20.4 MJ; = saw_veneer_logs/(1-bark)*saw_veneer_logs_basic_wood_d*saw_veneer_logs_Gross_Heat_Value/sum_RP_m3+pulpwood/(1-bark)*pulpwood_basic_wood_d*pulpwood_Gross_Heat_Value/sum_RP_m3+wood_chips*wood_chips_Gross_Heat_Value/sum_RP_m3+cleft_timber*cleft_timber_Gross_Heat_Value/sum_RP_m3
  Energy content of wood
- Occupation, forest, intensive [natural resource, land]: 3.1199 m2*year; = saw_veneer_logs*(a_transformation_forest*rotation_period)/sum_RP_m3+pulpwood*(a_transformation_forest*rotation_period)/sum_RP_m3+wood_chips*(1-bark)/basic_wood_d*(a_transformation_forest*rotation_period)/sum_RP_m3+cleft_timber*(1-bark)/ cleft_timber_basic_wood_d*(a_transformation_forest*rotation_period)/sum_RP_m3; lognormal variance with pedigree 0.208, pedigree (1,1,4,1,1)
  Area occupied for the production of wood over one rotation period
- Occupation, traffic area, rail/road embankment [natural resource, land]: 0.0688776 m2*year; = saw_veneer_logs*a_transformation_road*rotation_period/sum_RP_m3+pulpwood*a_transformation_road*rotation_period/sum_RP_m3+wood_chips*(1-bark)/basic_wood_d*a_transformation_road*rotation_period/sum_RP_m3+cleft_timber*(1-bark)/ cleft_timber_basic_wood_d*a_transformation_road*rotation_period/sum_RP_m3; lognormal variance with pedigree 0.208, pedigree (1,1,4,1,1)
  Area occupied by forest roads over one roation period
- Transformation, from forest, intensive [natural resource, land]: 0.0259991 m2; = saw_veneer_logs*a_transformation_forest/sum_RP_m3+pulpwood*a_transformation_forest/sum_RP_m3+wood_chips*(1-bark)/basic_wood_d*a_transformation_forest/sum_RP_m3+cleft_timber*(1-bark)/ cleft_timber_basic_wood_d*a_transformation_forest/sum_RP_m3; lognormal variance with pedigree 0.358, pedigree (1,1,4,1,1)
  Area of forest, excluding forest roads per ha
- Transformation, from traffic area, rail/road embankment [natural resource, land]: 0.00057398 m2; = saw_veneer_logs*a_forest_road/yield_wood_ub/sum_RP_m3+pulpwood*a_forest_road/yield_wood_ub/sum_RP_m3+wood_chips*(1-bark)/basic_wood_d*a_forest_road/yield_wood_ub/sum_RP_m3+cleft_timber*(1-bark)/ cleft_timber_basic_wood_d*a_forest_road/yield_wood_ub/sum_RP_m3; lognormal variance with pedigree 0.358, pedigree (1,1,4,1,1)
  Area of forest roads per ha
- Transformation, to forest, intensive [natural resource, land]: 0.0259991 m2; = saw_veneer_logs*a_transformation_forest/sum_RP_m3+pulpwood*a_transformation_forest/sum_RP_m3+wood_chips*(1-bark)/basic_wood_d*a_transformation_forest/sum_RP_m3+cleft_timber*(1-bark)/ cleft_timber_basic_wood_d*a_transformation_forest/sum_RP_m3; lognormal variance with pedigree 0.358, pedigree (1,1,4,1,1)
  no comment
- Transformation, to traffic area, rail/road embankment [natural resource, land]: 0.00057398 m2; = saw_veneer_logs*a_forest_road/yield_wood_ub/sum_RP_m3+pulpwood*a_forest_road/yield_wood_ub/sum_RP_m3+wood_chips*(1-bark)/basic_wood_d*a_forest_road/yield_wood_ub/sum_RP_m3+cleft_timber*(1-bark)/ cleft_timber_basic_wood_d*a_forest_road/yield_wood_ub/sum_RP_m3; lognormal variance with pedigree 0.358, pedigree (1,1,4,1,1)
  no comment
- Wood, soft, standing [natural resource, biotic]: 0.00204082 m3; name v_wood_standing; = saw_veneer_logs/sum_RP_m3+pulpwood/sum_RP_m3+wood_chips*(1-bark)/basic_wood_d/sum_RP_m3+cleft_timber*(1-bark)/ cleft_timber_basic_wood_d/sum_RP_m3; lognormal variance with pedigree 0.033, pedigree (1,1,4,1,1)
  Resource input, referring to wood under bark

## Sampling procedure
Literature

## Extrapolations
see Geography and Technology
