# transport, freight train, electricity

Dataset: EcoSpold 2, unit process
Geography: CN
Time period: 1999-01-01 to 2023-12-31
Technology level: current
Classification: ISIC rev.4 ecoinvent: 4912:Freight rail transport
Scenario: Business-as-Usual
System model: Allocation, cut-off by classification
Generated by: Frédéric Gindroz
Published in: Spielmann M. 2007
Database: ecoinvent
isCopyrightProtected: true
accessRestrictedTo: 1

## General comment
The dataset represents the entire transport life cycle of an electric freight train in China. The data for the energy use and operation emissions are based on "transport, freight train, electricity" dataset for RER. Electricity use per tkm is from CN 2004 statistics (very low rate compared to European statistics), adjusted by a factor of two assuming that the original data are referring to gross tkm. Diesel use for shunting is directly from RER dataset for lack of information on CN. This dataset should not be used for comparisons of locomotive types nor of transport means across different countries but only when transport is not a major contributor to total environmental burdens of a process or product being analyzed.
[This dataset is meant to replace the following datasets:]

## Included activities start
The dataset starts with the production of a locomotive.

## Included activities end
The dataset ends with the service of transporting 1 ton over a distance of 1 km by an electric freight train. The dataset includes the production and the maintenance of the locomotive and the goods wagon, the construction of the railway track and the energy use and operation emissions of a freight train using electricity. The data for the energy use and operation emissions are based on "transport, freight train, electricity" dataset for RER but with specific Chinese electricity consumption.

## Geography
RER model and operation model with specific CN electricity intensity. The 2004 China official statistics on the number of locomotives in operation in all railway Companies (national and local) give the shares 69.7%, 28.7% and 1.5% for diesel, electricity and steam , respectively. The electric train operation is also based upon the corresponding RER dataset in. However, also in this case the Chinese official statistics give a much lower energy use that the European ones, 3.6 time lower electricity consumption per tkm. Again, the original value has been increased by a factor of 2.67 and the uncertainty factor has been increased compared to the corresponding item in (Spielmann et al. 2004). In this dataset, the diesel consumption for diesel locomotives used in shunting has accordingly been decreased from the European value.
References:
Spielmann M., Kägi T., Stadler P. and Tietje O. (2004) Life cycle inventoriesof transport services. Final report ecoinvent 2000 No. 14. UNS, ETH-Zurich,Swiss Centre for Life Cycle Inventories, Duebendorf, CH, retrieved from:www.ecoinvent.ch.

## Technology
The dataset transport of coal by train in China is based on “transport, freight train, electricity (RER)” but instead of “transport, freight train, electricity (RER)” the input is defined to reflect the use of electric locomotives in the coal industry and in China in general. Demand factors of various transport components (as described in the previous sections) required to fulfill the functional unit of one tkm fright transport are presented. In order to account for the fact that the same rail tracks are used for both passenger and goods transportation are applied allocation factors.

## Reference product
- transport, freight train: 1 metric ton*km; By-product classification allocatable product; CPC 6512: Railway transport services of freight
  production volume 6.42431e11 metric ton*km; = 2238435000000*0.287
    Literature data. Total production volume for the country is taken from 2019 Railway Statistics Synopsis (https://uic.org/IMG/pdf/uic-statistics-synopsis-2019.pdf). Share of fuel type from ecoinvent v2 report 14 citing official Chinese statistics for 2004.
  properties: carbon allocation 0 kg, carbon content 0, price 0.026 EUR2005

## Inputs from technosphere
- diesel: 0.000677 kg; lognormal variance with pedigree 0.16, pedigree (1,1,5,1,1)
  Estimated value. In this dataset, the diesel consumption for diesel locomotives used in shunting has accordingly been decreased from the European value.
  properties: carbon content, fossil 0.865, dry mass 1 kg, heating value, net 42.8 MJ, wet mass 1 kg
  note on carbon content, fossil: C-content of diesel is 86.5% (ecoinvent v2.2 report 6_IV, Tab 3.14)
- electricity, medium voltage: 0.0296 kWh; lognormal variance with pedigree 0.16, pedigree (1,1,5,1,1)
  Estimated value. The electric train operation is also based upon the corresponding RER dataset in. However, also in this case the Chinese official statistics give a much lower energy use that the European ones, 3.6 time lower electricity consumption per tkm. Again, the original value has been increased by a factor of 2.67 and the uncertainty factor has been increased compared to the corresponding item in (Spielmann et al. 2004). Further references: Spielmann M., Kägi T., Stadler P. and Tietje O. (2004) Life cycle inventoriesof transport services. Final report ecoinvent 2000 No. 14. UNS, ETH-Zurich,Swiss Centre for Life Cycle Inventories, Duebendorf, CH, retrieved from:www.ecoinvent.ch <http://www.ecoinvent.ch>.
- goods wagon: 4.59e-8 unit; lognormal variance with pedigree 0.11, pedigree (1,1,5,1,1)
  Calculated value, required to fulfill the functional unit of one tkm fright transport.
- locomotive: 7.11e-10 unit; lognormal variance with pedigree 0.11, pedigree (1,1,5,1,1)
  Calculated value, required to fulfill the functional unit of one tkm fright transport.
- maintenance, goods wagon: 4.59e-8 unit; lognormal variance with pedigree 0.11, pedigree (1,1,5,1,1)
  Calculated value, required to fulfill the functional unit of one tkm fright transport.
- maintenance, locomotive: 7.11e-10 unit; lognormal variance with pedigree 0.11, pedigree (1,1,5,1,1)
  Calculated value, required to fulfill the functional unit of one tkm fright transport.
- railway track: 9.3e-5 m*year; lognormal variance with pedigree 0.11, pedigree (1,1,5,1,1)
  Calculated value, required to fulfill the functional unit of one tkm fright transport.

## Emissions to nature
- Ammonia [air, unspecified]: 1.35e-8 kg; source INFRAS 1999; lognormal variance with pedigree 0.0993, pedigree (2,3,5,3,3)
  Literature value. Average emission factors for Swiss heavy good vehicles (HGV) for urban traffic conditions in 2000 derived from INFRAS (1999). Energy use and operation emissions
  Uncertainty: handbook emission factors for HGV
- Benzene [air, unspecified]: 6.77e-8 kg; source INFRAS 1999; lognormal variance with pedigree 0.1793, pedigree (2,3,5,3,3)
  (same comment as for Ammonia)
- Cadmium II [air, unspecified]: 6.77e-12 kg; source EEA 2000; lognormal variance with pedigree 0.716025, pedigree (4,5,5,2,1)
  Literature value provided by Expert Panel on Heavy Metals and POPs of the UNECE Task Force on Emission Inventories EEA (2000). However, these emission factors have to be considered as preliminary estimates only. More measurements are needed in order to confirm these values. Energy use and operation emissions
  Uncertainty: expert estimate quoted from literature
- Carbon dioxide, fossil [air, unspecified]: 0.00213 kg; lognormal variance with pedigree 0.0413, pedigree (2,3,5,3,1)
  Estimated value. In this project CO2 indice is estimated assuming that all carbon in the fuel is transformed completely into CO2. For CO2 is employed an emission index of 73.5 g/MJ or 3146 g/kg.Energy use and operation emissions
  Uncertainty: International Rail study
- Carbon monoxide, fossil [air, unspecified]: 1.07e-5 kg; source Knörr W. 2000; lognormal variance with pedigree 0.6913, pedigree (2,3,5,3,1)
  Literature value. Figures represent shunting specific emission indices from Knörr et al. (2000). Energy use and operation emissions
  Uncertainty: International Rail study
- Chromium III [air, unspecified]: 3.38e-11 kg; source EEA 2000; lognormal variance with pedigree 0.716025, pedigree (4,5,5,2,1)
  (same comment as for Cadmium II)
- Copper ion [air, unspecified]: 1.15e-9 kg; source EEA 2000; lognormal variance with pedigree 0.716025, pedigree (4,5,5,2,1)
  (same comment as for Cadmium II)
- Dinitrogen monoxide [air, unspecified]: 6.77e-8 kg; source INFRAS 1999; lognormal variance with pedigree 0.0993, pedigree (2,3,5,3,3)
  (same comment as for Ammonia)
- Lead II [air, unspecified]: 7.4e-14 kg; source Jungbluth N. 2003; lognormal variance with pedigree 0.716025, pedigree (4,5,5,2,1)
  Literature value from Jungbluth (2003). Energy use and operation emissions
  Uncertainty: expert estimate quoted from literature
- Mercury II [air, unspecified]: 1.35e-14 kg; source Jungbluth N. 2003; lognormal variance with pedigree 0.716025, pedigree (4,5,5,2,1)
  (same comment as for Lead II)
- Methane, fossil [air, unspecified]: 8.79e-8 kg; source INFRAS 1999; lognormal variance with pedigree 0.0993, pedigree (2,3,5,3,3)
  (same comment as for Ammonia)
- NMVOC, non-methane volatile organic compounds [air, unspecified]: 3.42e-6 kg; source INFRAS 1999; lognormal variance with pedigree 0.0993, pedigree (2,3,5,3,3)
  Literature value. Average emission factors for Swiss heavy good vehicles (HGV) for urban traffic conditions in 2000 derived from INFRAS (1999). the presented figures of NMVOC emissions still contain emissions of Benzene, Toulol and Xylol. Energy use and operation emissions
  Uncertainty: handbook emission factors for HGV
- Nickel II [air, unspecified]: 4.73e-11 kg; source EEA 2000; lognormal variance with pedigree 0.716025, pedigree (4,5,5,2,1)
  (same comment as for Cadmium II)
- Nitrogen oxides [air, unspecified]: 3.71e-5 kg; source Knörr W. 2000; lognormal variance with pedigree 0.0813, pedigree (2,3,5,3,1)
  Literature value. Figures represent shunting specific emission indices Knörr et al. (2000) and average emission indices for diesel traction J. Borken et al. (2003) Energy use and operation emissions Further references: Borken J., Patyk A. and Reinhardt G. A. (1999) Basisdaten für ökologische Bilanzierungen: Einsatz von Nutzfahrzeugen in Transport, Landwirtschaft und Bergbau. Vieweg, Braunschweig/Wiesbaden
  Uncertainty: International Rail study
- Particulate Matter, < 2.5 um [air, unspecified]: 8.67e-7 kg; lognormal variance with pedigree 0.3527, pedigree (3,3,5,3,1)
  Literature value. Particle size distributions of exhaust emissions and exhaust emission factors [g/kg] for diesel locomotives without particle filters from EU-Norm IIIa. Energy use and operation emissions
  Uncertainty: own calculation base on PM figures of int. Rail study
- Particulate Matter, > 10 um [air, unspecified]: 1.96e-6 kg; lognormal variance with pedigree 0.0827, pedigree (3,3,5,3,1)
  (same comment as for Particulate Matter, < 2.5 um)
- Particulate Matter, > 2.5 um and < 10um [air, unspecified]: 2.68e-6 kg; lognormal variance with pedigree 0.1627, pedigree (3,3,5,3,1)
  (same comment as for Particulate Matter, < 2.5 um)
- Selenium IV [air, unspecified]: 6.77e-12 kg; source EEA 2000; lognormal variance with pedigree 0.716025, pedigree (4,5,5,2,1)
  (same comment as for Cadmium II)
- Sulfur dioxide [air, unspecified]: 4.06e-7 kg; lognormal variance with pedigree 0.0413, pedigree (2,3,5,3,1)
  Estimated value.In this project SO2 indice is estimated assuming that all sulphur in the fuel is transformed completely into SO2. In line with assumptions made for road transport is assumed a sulphur content of 300 ppm resulting in a emission index of 0.6 g/kg. Energy use and operation emissions
  Uncertainty: International Rail study
- Sulfur hexafluoride [air, unspecified]: 2.1e-9 kg; source Frischknecht R. 2003; lognormal variance with pedigree 0.108025, pedigree (3,5,5,2,3)
  Literature value. Due to the fact that on the Swiss rail network only very few diesel locomotives are in operation emissions to air are limited to particulate emissions due to abrasion and emission of sulphur hexafluoride (SF6) occurring during conversion at traction substations. For sulphur hexafluoride (SF6) emitted during conversion at traction substations we assume an emission index of 4.4E-08 kg/kWh Frischknecht (2003) resulting in a specific emission of 3.79E-09 kg/tkm. Energy use and operation emissions
  Uncertainty: literature
- Toluene [air, unspecified]: 2.7e-8 kg; source INFRAS 1999; lognormal variance with pedigree 0.1807, pedigree (3,3,5,3,3)
  (same comment as for Ammonia)
- Xylenes, unspecified [air, unspecified]: 2.7e-8 kg; source INFRAS 1999; lognormal variance with pedigree 0.1807, pedigree (3,3,5,3,3)
  (same comment as for Ammonia)
- Zinc II [air, unspecified]: 6.77e-10 kg; source EEA 2000; lognormal variance with pedigree 0.716025, pedigree (4,5,5,2,1)
  (same comment as for Cadmium II)
- Iron ion [soil, unspecified]: 3.81e-6 kg; lognormal variance with pedigree 0.46, pedigree (5,5,5,5,5)
  Estimated value. Abrasion (from braking lining, rail and wheel) is predominately composed of iron and mineral components BUWAL (2002). In this study is assumed that all non-airborne emissions are emitted as iron to soil. In consequence, is assumed a yearly load of 191.8 t/a iron emitted to soil. Emission of lubricates due to traction are not accounted for, since measures are in operation to avoid such emissions. Energy use and operation emissions Further references: BUWAL (2002) PM10-Emissionen des Verkehrs. Statusbericht; Teil Schienenverkehr. 144. Bundesamt fuer Umwelt, Wald und Landschaft, Bern
  Uncertainty: own calculation based on literature

## Extrapolations
see Technology and Geography
