# nuclear power plant construction, boiling water reactor 1000MW

Dataset: EcoSpold 2, unit process
Geography: RoW
Time period: 1984-01-01 to 2023-12-31
Technology level: current
Classification: EcoSpold01Categories: nuclear power/power plants
Classification: ISIC rev.4 ecoinvent: 4220:Construction of utility projects
Tags: ConvertedDataset
Scenario: Business-as-Usual
System model: Allocation, cut-off by classification
Generated by: Roberto Dones
Published in: Dones, R. 2007
Database: ecoinvent
isCopyrightProtected: true
accessRestrictedTo: 1

## General comment
Estimation based on data of the power plant in Leibstadt with a net installed capacity of 1080 MW (year 1999). Before construction of the plant, the terrain had to be levelized, which required huge digging, a factor of ten compared to the average for a 1000 MW unit; this is not accounted here in order to have a generic module. Material and energy data for construction were available from the operators at the beginning of the 1990s. Waste material inventory data from decommissioning were extrapolated from the figures for the PWR in Gösgen, which are used for the module "nuclear power plant, pressure water reactor", CH.
[This dataset was already contained in the ecoinvent database version 2. It was not individually updated during the transfer to ecoinvent version 3. Life Cycle Impact Assessment results may still have changed, as they are affected by changes in the supply chain, i.e. in other datasets. This dataset was generated following the ecoinvent quality guidelines for version 2. It may have been subject to central changes described in the ecoinvent version 3 change report (http://www.ecoinvent.org/database/ecoinvent-version-3/reports-of-changes/), and the results of the central updates were reviewed extensively. The changes added e.g. consistent water flows and other information throughout the database. The documentation of this dataset can be found in the ecoinvent reports of version 2, which are still available via the ecoinvent website. The change report linked above covers all central changes that were made during the conversion process.]

## Included activities end
The module includes materials, energy and transport requirements used for construction of the plant. Land-use is included with the assumption of 40 years operation. Disposal of non-contaminated material from dismantling is also included, whereas contaminated materials are attributed to the operation.

## Geography
Swiss data of one specific plant.

## Technology
The described plant Leibstadt started commercial operation at the end of 1984. It belongs to the 1000 MW class (net installed capacity has been upgraded in steps from the original 990 MW to 1165 MW at the end of 1999). It has a GE designed primary circuit, a Mark III containment, and a cooling tower. This module can be assumed to be representative for other boiling water reactors of the same class in Western Europe.

## Reference product
- nuclear power plant, boiling water reactor 1000MW: 1 unit; By-product classification allocatable product; CPC 53262: Power plants; HS2017 840110: Nuclear reactors
  EcoSpold01Location=CH
  production volume 0.774523 unit
    Calculated from electricity demand, using the input/output relationships of the datasets
  property price 1.49852e8 EUR2005
    Calculated based on inputs: The price of the product has been calculated as a sum of the values of the material and energy inputs for this product. This value is therefore a rough estimation. It may underestimate the real price since there are additional expenses when producing any product. These expences can include for example labour costs, treatment of waste materials and profit for the producer. Please consider carefully whether this level of data quality is acceptable for your application.
  properties: carbon allocation 0 kg, carbon content 0

## Inputs from technosphere
- aluminium, cast alloy: 64000 kg; lognormal variance with pedigree 0.042, pedigree (1,1,5,5,1)
  own estimation on a specific study
  EcoSpold01Location=RER
  properties: dry mass 1 kg, wet mass 1 kg
- aluminium, wrought alloy: 136000 kg; lognormal variance with pedigree 0.042, pedigree (1,1,5,5,1)
  EcoSpold01Location=RER
  own estimation on a specific study
  properties: dry mass 1 kg, wet mass 1 kg
- concrete, normal strength: 2474.31, 543.348, 353.417, 471.926, 4398.78, 5214.54, 186544 m3 (7 suppliers, which the file names only by identifier); sum of these 200000 m3; lognormal variance with pedigree 0.042, pedigree (1,1,5,5,1)
  EcoSpold01Location=CH
  own estimation on a specific study
  properties: dry mass 2190 kg, water content 0.086758, wet mass 2380 kg
- copper, cathode: 1.47e6 kg; lognormal variance with pedigree 0.042, pedigree (1,1,5,5,1)
  EcoSpold01Location=RER
  own estimation on a specific study
  properties: dry mass 1 kg, wet mass 1 kg
- diesel, burned in building machine: 4.494e8 MJ; = 6*10^6*(1+0.75)*42.8; lognormal variance with pedigree 0.042, pedigree (1,1,5,5,1)
  Diesel used for construction and demolition. Around 6 million kg of diesel are used for construction of the plant. The energy demand for the demolition of a light-water nuclear power plant of the 1000 MW class is 75% of the amount of energy used for the construction of the NPP. Therefore, 6*10^6*(1 + 0.75) kg diesel. Source: ecoinvent v2 Report 6, part VII, p. 198).
  The LHV of diesel is 42.8 MJ/kg (ecoinvent MasterData, accessed on 20230728).
  <The construction diesel consumption was added in 20230728; before only the demolition part was taken into account>
  EcoSpold01Location=GLO
  properties: heating value, net 1 MJ
- electricity, medium voltage: 243863, 365038, 115319, 2.14653e6, 1.25985e6, 1.49368e6, 1.81431e7, 3.61915e8, 201686, 3.40886e6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 kWh (46 suppliers, which the file names only by identifier); sum of these 5.305e8 kWh; = 2.98*10^8+3.1*10^8*0.75; lognormal variance with pedigree 0.042, pedigree (1,1,5,5,1)
  Total electricity consumed during construction phase is 3.1E+08 kWh. From this, 2.98E+08 kWh is used for construction, and the rest is used for the test group run, which is considered in the input of light fuel oil (heat, district or industrial, other than natural gas). For the demolition, 75% of the total electricity consumed during construction is assumed. Therefore, electricity consumed is 2.98E+08 + 3.1E+08*75%. Source: v2 Report 6 part VII, p. 179 & 198).
  EcoSpold01Location=CH
- excavation, hydraulic digger: 126392 m3; lognormal variance with pedigree 0.042, pedigree (1,1,5,5,1)
  EcoSpold01Location=RER
  own estimation on a specific study
- fibre cement facing tile: 5.3e6 kg; lognormal variance with pedigree 0.042, pedigree (1,1,5,5,1)
  EcoSpold01Location=CH
  own estimation on a specific study
  properties: carbon content, fossil 0.0201818, carbon content, non-fossil 0.0115, dry mass 1 kg, wet mass 1 kg
  note on carbon content, fossil: Tab 5.1, ecoinvent v2.2 report 7, part IX. Fibres (pulp) 2.5%. Fibres (polyvinyl alcohol) 3.7%. C-content/dry mass of natural fibres was considered 46% (from "Evolutionary and Biochemical Aspects", A.D. Kay and T. Vrede (in Global Ecology, 2010, Elsevier B.V., S.E. Jørgensen Ed.)). C-content/dry mass of polyvinyl alcohol ((C2H4O)x) was considered =24/44.
- heat, district or industrial, other than natural gas: 1.4058e8 MJ; = 3300*10^3*42.6; lognormal variance with pedigree 0.042, pedigree (1,1,5,5,1)
  EcoSpold01Location=CH
  3'300 t light fuel oil used during the test runs of the turbo group (ecoinvent v2 Report 6 part VII, p. 179). The lower heating value of light fuel oil is 42.6 MJ/kg (ecoinvent MasterData, accessed 20230728).
  properties: heating value, net 1 MJ
- inert waste, for final disposal: -3.79e8 kg; lognormal variance with pedigree 0.012, pedigree (1,1,1,5,1)
  EcoSpold01Location=CH
  own estimation
  production volume
    Calculated from the production volume of nuclear power plant, boiling water reactor 1000MW in proportion to the respective output amounts.
  properties: dry mass 0.995 kg, water content 0.00502513, wet mass 1 kg
- lubricating oil: 200000 kg; lognormal variance with pedigree 0.042, pedigree (1,1,5,5,1)
  EcoSpold01Location=RER
  own estimation on a specific study
  properties: carbon content, fossil 0.75, dry mass 1 kg, heating value, net 40.2 MJ, wet mass 1 kg
  note on carbon content, fossil: Lubricating oil is produced from diesel. C-content/dry mass of fats and oils considered 75%, from: ecoinvent v2.2 report, n 15a, pg 40
  note on heating value, net: Literature value, Source: IPCC 2006, 2006 IPCC Guidelines for National Greenhouse Gas Inventories, Prepared by the National Greenhouse Gas Inventories Programme, Eggleston H.S., Buendia L., Miwa K., Ngara T. and Tanabe K. (eds). Published: IGES, Japan
- paper, woodfree, coated: 4.25e6 kg; lognormal variance with pedigree 0.042, pedigree (1,1,5,5,1)
  EcoSpold01Location=RER
  own estimation on a specific study
  properties: carbon content, fossil 0.0590617, carbon content, non-fossil 0.22775, dry mass 0.945 kg, heating value, net 14.11 MJ, water content 0.0582011, wet mass 1 kg
  note on carbon content, fossil: Fossil C content was calculated after fossil C contents of chemicals used in the production of the paper (in Tab 8.72 & 8.73 ecoinvent v2.2 report 11_III, part 8).
  note on carbon content, non-fossil: Biogenic C content was calculated after biogenic C contents of chemicals used in the production of the paper (in Tab 8.72 & 8.73 ecoinvent v2.2 report 11_III, part 8). The cellulose content in 1 kg of paper (on a wet mas basis) was estimated as (1-chemical content), C content of cellulose was considered 0.44 kgC/kg dry mass (ecoinvent v2.2 report, n 15a, pg 40)
- plywood: 8000 m3; lognormal variance with pedigree 0.042, pedigree (1,1,5,5,1)
  own estimation on a specific study
  EcoSpold01Location=RER
  properties: carbon content, fossil 0.09783, carbon content, non-fossil 0.409818, dry mass 768.6 kg, heating value, net 11688.9 MJ, price 400 EUR2005, water content 0.070778, wet mass 823 kg
- reinforcing steel: 4e7 kg; lognormal variance with pedigree 0.042, pedigree (1,1,5,5,1)
  EcoSpold01Location=RER
  own estimation on a specific study
  properties: carbon content, fossil 0.004, dry mass 1 kg, wet mass 1 kg
- steel, chromium steel 18/8, hot rolled: 2.06e7 kg; lognormal variance with pedigree 0.042, pedigree (1,1,5,5,1)
  EcoSpold01Location=RER
  own estimation on a specific study
  properties: carbon content, fossil 0.0008, dry mass 1 kg, wet mass 1 kg
  note on carbon content, fossil: Stainless steel model is the grade 304 steel (18/8 stainless, 18% chromium 8% nickel; max. 0.08% C)
- steel, low-alloyed, hot rolled: 5.57e6 kg; lognormal variance with pedigree 0.042, pedigree (1,1,5,5,1)
  own estimation on a specific study
  EcoSpold01Location=RER
  properties: carbon content, fossil 0.005, dry mass 1 kg, wet mass 1 kg
  note on carbon content, fossil: Low alloyed steel composition given in Tab. 3.2 ecoinvent v2.2 report 10_partII. Steel assumed to have a C content of 0.5%

## Inputs from nature
All rows: lognormal variance with pedigree 0.042, pedigree (1,1,5,5,1)
- Occupation, construction site [natural resource, land]: 3.61e6 m2*year
  own estimation on plan
- Occupation, industrial area [natural resource, land]: 7.6e6 m2*year
  own estimation on plan
- Transformation, from industrial area [natural resource, land]: 190000 m2
  own estimation on plan
- Transformation, from pasture, man made [natural resource, land]: 30419.2 m2
  own estimation on plan
- Transformation, from unspecified [natural resource, land]: 159581 m2
  assumption
- Transformation, to industrial area [natural resource, land]: 190000 m2
  own estimation on plan
- Transformation, to unspecified [natural resource, land]: 190000 m2
  own estimation on plan

## Sampling procedure
Literature

## Extrapolations
none This dataset has been copied from an original dataset covering the geography CH. The uncertainty has been adjusted accordingly.

## Review by Roberto Dones 2003-08-19
passed
for final calculation August 2003
