# cork slab production

Dataset: EcoSpold 2, unit process
Geography: RoW
Time period: 2001-01-01 to 2023-12-31
Technology level: current
Classification: EcoSpold01Categories: insulation materials/production
Classification: ISIC rev.4 ecoinvent: 0230:Gathering of non-wood forest products
Tags: ConvertedDataset
Scenario: Business-as-Usual
System model: Allocation, cut-off by classification
Generated by: Hans-Jörg Althaus
Published in: Kellenberger D. 2007
Database: ecoinvent
isCopyrightProtected: true
accessRestrictedTo: 1

## General comment
this cork product is used e.g. as underlay for floating floorings or as insulation material.
[This dataset was already contained in the ecoinvent database version 2. It was not individually updated during the transfer to ecoinvent version 3. Life Cycle Impact Assessment results may still have changed, as they are affected by changes in the supply chain, i.e. in other datasets. This dataset was generated following the ecoinvent quality guidelines for version 2. It may have been subject to central changes described in the ecoinvent version 3 change report (http://www.ecoinvent.org/database/ecoinvent-version-3/reports-of-changes/), and the results of the central updates were reviewed extensively. The changes added e.g. consistent water flows and other information throughout the database. The documentation of this dataset can be found in the ecoinvent reports of version 2, which are still available via the ecoinvent website. The change report linked above covers all central changes that were made during the conversion process.]

## Included activities end
Includes the material and energy inputs to the production processes, transports of the material inputs and the available process emissions.

## Geography
production data for one major producer in Portugal used for Europe

## Technology
mix of continuous fabrication and fabrication in moulds and splitting (batch process)

## Reference product
- cork slab: 1 kg; By-product classification allocatable product; CPC 31921: Natural cork, debacked or roughly squared, or in blocks, plates, sheets or strip; crushed, granulated or groun[…]; HS2017 450190: Cork; waste cork, crushed, granulated or ground cork
  EcoSpold01Location=RER
  production volume 2.67763 kg
    This is a placeholder value that does not reflect real-world production volumes. This dataset does not currently require a real-world production volume to work in the database framework, and no actual data were collected yet. This has no negative effect on the results of the ecoinvent database.
  property carbon content, non-fossil 0.54
    Average carbon contents of cork (54 %(w/w)). Calculated from average composition of cork and it's components (sources: www, Roempp, Uhlmann)
  property price 2.96 EUR2005
    Calculated value based on data from United Nations Commodity Trade Statistics Database (comtrade.un.org). UN comtrade category: 4504 Agglomerated cork and articles thereof. Year 2005. Using exchange rate of 1EURO = 1.209 USD. Average of price of import into 5 main markets (EU, US, JP, IN and CN).
  properties: carbon allocation 0.54 kg, carbon content 0.54, carbon content, fossil 0, dry mass 1 kg, water content 0, water in wet mass 0 kg, wet mass 1 kg

## Inputs from technosphere
- cork, raw: 1.06 kg; lognormal variance with pedigree 0.0426, pedigree (1,3,5,5,1)
  EcoSpold01Location=RER
  properties: carbon content, non-fossil 0.54, dry mass 1 kg, heating value, net 16.36 MJ, wet mass 1 kg
  note on carbon content, non-fossil: Average carbon contents of cork (54 %(w/w)). Calculated from average composition of cork and it's components (sources: www, Roempp, Uhlmann)
- electricity, medium voltage: 0.0332328, 0.66292, 0.222739, 0.010177, 0.00203692, 0.000437373, 0.0684568 kWh (7 suppliers, which the file names only by identifier); sum of these 1 kWh; lognormal variance with pedigree 0.0426, pedigree (1,3,5,5,1)
  EcoSpold01Location=UCTE
- heat, district or industrial, other than natural gas: 4.91772, 0.00227829 MJ (2 suppliers, which the file names only by identifier); sum of these 4.92 MJ; lognormal variance with pedigree 0.0426, pedigree (1,3,5,5,1)
  EcoSpold01Location=CH
  properties: heating value, net 1 MJ
- melamine formaldehyde resin: 0.056 kg; lognormal variance with pedigree 0.0426, pedigree (1,3,5,5,1)
  EcoSpold01Location=RER
  properties: carbon content, fossil 0.311708, dry mass 1 kg, heating value, net 9.44 MJ, wet mass 1 kg
  note on carbon content, fossil: Chemical formula of the melamine formaldehide monomer was assumed to be C4H6N6O
- phenolic resin: 0.028 kg; lognormal variance with pedigree 0.0426, pedigree (1,3,5,5,1)
  EcoSpold01Location=RER
  properties: carbon content, fossil 0.772277, dry mass 1 kg, heating value, net 33.57 MJ, wet mass 1 kg
  note on carbon content, fossil: (C6H5OH)-CH2-(C6H5OH) was considered to be the basic structure in phenolic resin (ecoinvent v2.2 report 8-part 61). C13H14O2, MW=202 g/mol
- urea formaldehyde resin: 0.056 kg; lognormal variance with pedigree 0.0426, pedigree (1,3,5,5,1)
  EcoSpold01Location=RER
  properties: carbon content, fossil 0.408958, dry mass 1 kg, heating value, net 12.39 MJ, wet mass 1 kg
  note on carbon content, fossil: Chemical formula of the urea formaldehide monomer was assumed to be C3H8N2O
- wooden board factory, organic bonded boards: 1e-10 unit; lognormal variance with pedigree 0.3426, pedigree (1,3,5,5,1)
  EcoSpold01Location=RER

## Emissions to nature
- Formaldehyde [air, unspecified]: 0.00014 kg; lognormal variance with pedigree 0.1806, pedigree (4,3,5,5,1)

## Sampling procedure
literature

## Extrapolations
see geography This dataset has been copied from an original dataset covering the geography RER. The uncertainty has been adjusted accordingly.

## Review by Roberto Dones 2003-07-04
Passed
