# acetic anhydride production, acetaldehyde oxidation

Dataset: EcoSpold 2, unit process
Geography: RoW
Time period: 1989-01-01 to 2023-12-31
Technology level: current
Classification: ISIC rev.4 ecoinvent: 2011:Manufacture of basic chemicals
Scenario: Business-as-Usual
System model: Allocation, cut-off by classification
Generated by: Iasonas Ioannou
Published in: Sutter, J. 2007
Database: ecoinvent
isCopyrightProtected: true
accessRestrictedTo: 1

## General comment
This dataset represents the production of 1 kg of acetic anhydride, with acetic acid as byproduct, through the oxidation of acetaldehyde.
Today, acetic anhydride is made mostly by either the ketene process or the oxidation of acetaldehyde (Sutter, 2007). Production by another process, the carbonylation of methyl acetate (Halcon process), was begun in 1983. In Western Europe, 77 % of acetic anhydride is made by the ketene process and 23 % by the oxidation of acetaldehyde. Since production by the Halcon process began at the Tennessee-Eastman plant, 25 % of acetic anhydride in the United States has been made by this process and 75 % by the ketene process.
Acetic anhydride is used chiefly as an acetylating and dehydrating agent; it is used on a large scale for the acetylation of cellulose (Sutter, 2007). Other areas of application for acetic anhydride are the production of poly(methylacrylimide) hard foam, acetylated plastic auxiliaries, explosives, particularly hexogen production, the production of certain types of brake fluids, the production of auxiliaries for drilling fluids, the detergent industry, for the production of cold – bleaching activators, the dyeing industry, in the preparation of organic intermediates, in the production of pharmaceuticals, in the food industry, flavors and fragrances, and herbicides such as metolachlor (Dual) and alachlor (Lasso).
In this dataset, the raw material inputs, and process-specific material exchanges, are modelled with a generic stoichiometry-based tool, using literature or estimated yields. The emissions are modelled with a default value, which is estimated based on losses, unreacted chemicals, among others. At the same time, the energy consumption is based on data from literature sources. Finally, the auxiliary (i.e., cooling water and infrastructure) exchanges are modelled with a default value based on industry data from literature sources. For more information on the calculations refer to the sampling procedure.
References:
Sutter, J. (2007) Life Cycle Inventories of Petrochemical Solvents. ecoinvent report No. 22. Swiss Centre for Life Cycle Inventories, Dübendorf, 2007.
Kirk, Raymond E., Donald F. Othmer, and Charles A. Mann. "Encyclopedia of Chemical Technology." 2004.
Held, H., Rengstl, A., Mayer, D.: Acetic anhydride and mixed fatty acid anhydrides. In: "Ullmann's Encyclopedia of Industrial." 2004

## Included activities start
The activity starts when the raw materials enter the process.

## Included activities end
The activity ends with acetic anhydride being ready for further transformation or transportation at the production site gate. Materials entering the process are included as well as energy uses, infrastructure and emissions.

## Geography
The inventory is modelled at the Global level. The main material inputs and outputs of this activity are generated with on a generic stoichiometry-based model, using literature or estimated yields. Furthermore, the source of information for the heat and electricity inputs is literature data for the specific technology. Finally, the main source of information for the values for water (process and cooling), nitrogen, chemical factory is industry data from the GENDORF Chemical Park, which is based in Germany and produced an average of 2462760 tonnes of chemical substances in the years 2015-2019. For more information on the calculations refer to the sampling procedure.
The dataset could also be considered as not geography-specific, and thus, valid for a broader geographical coverage.
References:
Hischier, R. (2005) Establishing Life Cycle Inventories of Chemicals Based on Differing Data Availability (9 pp). The International Journal of Life Cycle Assessment, Volume 10, Issue 1, pp 59-67. 10.1065/lca2004.10.181.7
Chemiepark GENDORF, Umwelterklärung 2016, https://www.gendorf.de/Nachbarn/Umweltschutz/Industrie%20und%20Nachhaltigkeit
Chemiepark GENDORF, Umwelterklärung 2017, https://www.gendorf.de/Nachbarn/Umweltschutz/Industrie%20und%20Nachhaltigkeit
Chemiepark GENDORF, Umwelterklärung 2020, https://www.gendorf.de/Nachbarn/Umweltschutz/Industrie%20und%20Nachhaltigkeit
Chauvel, Alain, Gilles Lefebvre, and L. Castex in "Petrochemical processes. Technical and economical characteristics Vol. 2." (1989)

## Technology
In this dataset acetic anhydride is obtained directly by liquid-phase oxidation of acetaldehyde. At first, peracetic acid is formed from oxygen and acetaldehyde. Subsequently, the peracetic acid reacts under suitable conditions with a second molecule of acetaldehyde to form acetic anhydride and water:
CH3CHO + O2 → CH3CO3H
CH3CHO + CH3CO3H → C4H6O3 + H2O
An additional reaction takes place, where the intermediate product (peracetic acid) decomposes by water to produce acetic acid and hydrogen peroxide, as follows:
CH3CO3H + H2O ⇌ H2O2 + CH3CO2H
Therefore, acetic acid is co-produced along with the acetic anhydride product.
The operating conditions of this production process are as follows: pressure at 2-3 bar and temperatures kept between 40-60°C. Besides, at higher temperatures acetic anhydride decomposes rapidly. The strong exothermicity of the reaction creates the need for efficient cooling. At the same time, ethyl acetate is used as diluent (regenerated and recycled), and is mixed with acetaldehyde in the ratio of 2:1. Several other diluents can be used, such as methylene chloride, diisopropyl ether, cyclohexane, alkyl benzoates, and alkyl phthalates. Notably, the catalytic system (which could be regenerated) along with the rapid removal of generated water is crucial in this process. Some suitable catalysts are the following (i) mixtures of manganese acetate and copper acetate, (ii) of cobalt acetate and nickel acetate, (iii) and of cobalt and copper salts of higher fatty acids. In general, the acetaldehyde and diluent mixture is introduced with the addition of 0.05 to 0.1 % cobalt acetate and copper acetate at 40 °C; the ratio of Co:Cu is 1:2.
The reactor outlet is fed into a water-cooled condenser, and subsequently, the dehydrated mixture is sent to a distillation collumn system where acetic anydrite is recovered and unreacted acetaldehyde is reclaimed and recycled to the reactor. Finally, the off-gases are flared.
In this dataset, a yield of 95% was assumed for the production of (i) the peracetic acid and (ii) the acetic anhydride. For the decomposition of the anhydride to acetic acid a yield of 100% was assumed.
References:
Held, H., Rengstl, A., Mayer, D.: Acetic anhydride and mixed fatty acid anhy-drides. In: Ullmann's Encyclopedia of Industrial
Sutter, J. (2007) Life Cycle Inventories of Petrochemical Solvents. ecoinvent report No. 22. Swiss Centre for Life Cycle Inventories, Dübendorf, 2007.
G. Margaret Wells, “Handbook of Petrochemicals and Processes”, 2nd edition, Ashgate, 1999

## Time period
The time period spans from the earliest year from which at least one of the input values was obtained until 2022, but overall form the most realistic picture of the production. Besides, the activity is partly generated, in terms of material inputs and outputs, based on a generic stoichiometry-based model, using literature or estimated yields, which does not expect to change over time.
The source of information for the heat and electricity inputs is literature data (from 1989) for the specific technology. Finally, the main source of information for the values for water (process and cooling), nitrogen, chemical factory is industry data from the GENDORF Chemical Park. The values are a 5-year average of data from 2015 to 2019 published by the GENDORF Chemical Park, which is based in Germany and produced an average of 2462760 tonnes of chemical substances in the years 2015-2019. The end time period is therefore set based on the years from Gendorf reference.
For more information on the calculations refer to the sampling procedure and in the comments of the exchanges.
References:
Hischier, R. (2005) Establishing Life Cycle Inventories of Chemicals Based on Differing Data Availability (9 pp). The International Journal of Life Cycle Assessment, Volume 10, Issue 1, pp 59-67. 10.1065/lca2004.10.181.7
Chemiepark GENDORF, Umwelterklärung 2016, https://www.gendorf.de/Nachbarn/Umweltschutz/Industrie%20und%20Nachhaltigkeit
Chemiepark GENDORF, Umwelterklärung 2017, https://www.gendorf.de/Nachbarn/Umweltschutz/Industrie%20und%20Nachhaltigkeit
Chemiepark GENDORF, Umwelterklärung 2020, https://www.gendorf.de/Nachbarn/Umweltschutz/Industrie%20und%20Nachhaltigkeit
Chauvel, Alain, Gilles Lefebvre, and L. Castex in "Petrochemical processes. Technical and economical characteristics Vol. 2." (1989)
G. Margaret Wells, “Handbook of Petrochemicals and Processes”, 2nd edition, Ashgate, 1999

## Reference product
- acetic acid, without water, in 98% solution state: 1 kg; name BP; By-product classification allocatable product; CPC 34120: Industrial monocarboxylic fatty acids; acid oils from refining; HS2017 382319: Industrial monocarboxylic fatty acids; acid oils from refining; (other than stearic acid, oleic acid or tal[...]; CAS 64-19-7
  Value reported by Chauvel, Alain, Gilles Lefebvre, and L. Castex in "Petrochemical processes. Technical and economical characteristics Vol. 2." (1989).
  According to Chauvel et al (1989), 1.1 kg of acetaldehyde is oxidized yielding 1 kg of acetic anhydrite and 0.2 kg of acetic acid.
  At the same time, this value is estimated, based on the input amount, the expected output, and the reaction scheme. Calculated value based on stoichiometric calculations and literature data. For more information on the calculations refer to the sampling procedure.
  production volume 9.01628e7 kg; = BP*RP_PV/ABS(RP)
    This corresponds to approx 2.2% of global production volume
  property heating value, net 14.6 MJ
    Based on literature, page 10, Althaus H.-J., Chudacoff M., Hischier R., Jungbluth N., Osses M. and Primas A. (2007) Life Cycle Inventories of Chemicals. Final report ecoinvent data v2.0 No. 8. EMPA, Swiss Centre for Life Cycle Inventories, Dübendorf, CH, Online-Version under: www.ecoinvent.org.
  property price 0.479 EUR2005
    Calculated value based on data from United Nations Commodity Trade Statistics Database (comtrade.un.org). UN comtrade category: 291521 Acetic aicid. Prices from the year 2005. Using exchange rate of 1EURO = 1.209 USD. Average of price of import into 5 main markets (EU, US, JP, IN and CN).
  properties: allocation factor 0.121757, carbon allocation 0.400016 kg, carbon content 0.400016, carbon content, fossil 0.400016, carbon content, non-fossil 0, dry mass 1 kg, true value 0.0957978, water content 0, water in wet mass 0 kg, wet mass 1 kg

## Inputs from technosphere
- acetaldehyde: 0.670231 kg; name AcetaldehydeIn; lognormal variance with pedigree 0.034, pedigree (2,3,2,5,2)
  Value reported by Chauvel, Alain, Gilles Lefebvre, and L. Castex in "Petrochemical processes. Technical and economical characteristics Vol. 2." (1989).
  According to Chauvel et al (1989), 1.1 kg of acetaldehyde is oxidized yielding 1 kg of acetic anhydrite and 0.2 kg of acetic acid.
  Uncertainty: Wells 1991
  properties: carbon content, fossil 0.545296, dry mass 1 kg, heating value, net 27.53 MJ, wet mass 1 kg
- chemical factory, organics: 2.92221e-10 unit; = (RP+ BP)*4e-10; lognormal variance with pedigree 0.3448, pedigree (2,4,2,5,4)
  Calculated based on literature data published by the industry. For this activity, no information was readily available concerning infrastructure and land-use. Therefore, the infrastructure is estimated based on data from two chemical factories, the BASF site of Ludwigshafen and the chemical factory in Gendorf (which are both located in Germany), which produce a wide range of chemical substances. Based on this data, the following assumptions are made: the built area amounts to about 4.2 ha, the plant has an average output of 50'000 t/a and a lifespan of fifty years. The estimated infrastructure amount is therefore 4.00 E-10 units per kg of produced chemical. References: Althaus H.-J., Chudacoff M., Hischier R., Jungbluth N., Osses M. and Primas A. (2007) Life Cycle Inventories of Chemicals. ecoinvent report No. 8, v2.0. EMPA Dübendorf, Swiss Centre for Life Cycle Inventories, Dübendorf, CH. Gendorf (2000) Umwelterklärung 2000, Werk Gendorf. Werk Gendorf, Burgkirchen.
  Uncertainty: Estimation
- cobalt acetate: 0.000335115 kg; name Co; = AcetaldehydeIn*( 1 + 2 ) * (0.05/100) / 3; lognormal variance with pedigree 0.0046, pedigree (2,3,2,5,2)
  As reported in the literature provide below, the acetaldehyde and diluent mixture (with a ratio of 1:2) is introduced in the reactor with the addition of 0.05 to 0.1 % cobalt acetate and copper acetate at 40 °C; the ratio of Co:Cu is 1:2. This, according to the input of acetaldehyde, leads to 0.00165 kg of catalyst input per kg of acetic anhydrite produced.
  In Wells (1999) a value of 0.001 kg of catalyst is reported per kg of acetic anhydride produced (for an input of 1.2 kg of acetaldehyde and 2.4 kg of diluent). At the same time, it is also stated that the latter amount can be lower if the catalyst is regenerated and the diluent recycled.
  We, here, use the most conservative value of 0.00165 kg of catalytic system, with a Co:Cu ratio of 1:2.
  References:
  G. Margaret Wells, “Handbook of Petrochemicals and Processes”, 2nd edition, Ashgate, 1999
  Held, H., Rengstl, A., Mayer, D.: Acetic anhydride and mixed fatty acid anhydrides. In: "Ullmann's Encyclopedia of Industrial." 2004
  properties: carbon content, fossil 0.271154, dry mass 1 kg, heating value, net 12.33 MJ, price 23.4 EUR2005, wet mass 1 kg
- copper, cathode: 0.000670231 kg; name Cu; = Co*2; lognormal variance with pedigree 0.044, pedigree (2,3,2,5,2)
  Proxy for copper acetate.
  As reported in the literature provide below, the acetaldehyde and diluent mixture (with a ratio of 1:2) is introduced in the reactor with the addition of 0.05 to 0.1 % cobalt acetate and copper acetate at 40 °C; the ratio of Co:Cu is 1:2. This, according to the input of acetaldehyde, leads to 0.00165 kg of catalyst input per kg of acetic anhydrite produced.
  In Wells (1999) a value of 0.001 kg of catalyst is reported per kg of acetic anhydride produced (for an input of 1.2 kg of acetaldehyde and 2.4 kg of diluent). At the same time, it is also stated that the latter amount can be lower if the catalyst is regenerated and the diluent recycled.
  We, here, use the most conservative value of 0.00165 kg of catalytic system, with a Co:Cu ratio of 1:2.
  References:
  G. Margaret Wells, “Handbook of Petrochemicals and Processes”, 2nd edition, Ashgate, 1999
  Held, H., Rengstl, A., Mayer, D.: Acetic anhydride and mixed fatty acid anhydrides. In: "Ullmann's Encyclopedia of Industrial." 2004
  Uncertainty: Wells 1991
  property copper content 1; name copper_content_cathode
  properties: dry mass 1 kg, wet mass 1 kg
- electricity, medium voltage: 0.020232, 0.403584, 0.135603, 0.00619574, 0.00124007, 0.000266271, 0.0416762 kWh (7 suppliers, which the file names only by identifier); sum of these 0.608797 kWh; lognormal variance with pedigree 0.0046, pedigree (2,3,2,5,2)
  Value reported by Chauvel, Alain, Gilles Lefebvre, and L. Castex in "Petrochemical processes. Technical and economical characteristics Vol. 2." (1989).
  Uncertainty: Chauvel 1989
- ethyl acetate: 0.0134046 kg; name Diluent; = AcetaldehydeIn * 2.0 *(1-0.99); lognormal variance with pedigree 0.0046, pedigree (2,3,2,5,2)
  As reported in the literature provide below, the diluent amount compared to acetaldehyde, when the mixture enters the reactor, has a ratio of 2:1. This exchange represents the make-up amount needed after recovering the diluent agen, assuming a recovery of 99%. For more information, see the mathematical relation.
  References:
  G. Margaret Wells, “Handbook of Petrochemicals and Processes”, 2nd edition, Ashgate, 1999
  Held, H., Rengstl, A., Mayer, D.: Acetic anhydride and mixed fatty acid anhydrides. In: "Ullmann's Encyclopedia of Industrial." 2004
  Uncertainty: Wells 1991
  properties: carbon content, fossil 0.545455, dry mass 1 kg, heating value, net 31.32 MJ, wet mass 1 kg
- heat, from steam, in chemical industry: 3.34838 MJ; lognormal variance with pedigree 0.0046, pedigree (2,3,2,5,2)
  Value reported by Chauvel, Alain, Gilles Lefebvre, and L. Castex in "Petrochemical processes. Technical and economical characteristics Vol. 2." (1989).
  properties: heating value, net 1 MJ
- oxygen, liquid: 0.283953 kg; lognormal variance with pedigree 0.0046, pedigree (2,3,2,5,2)
  Calculated value based on stoichiometric calculations and literature data. For more information on the calculations refer to the sampling procedure.
  properties: dry mass 1 kg, wet mass 1 kg
- wastewater, average: -0.000106499, -3.79176e-7 m3 (2 suppliers, which the file names only by identifier); sum of these -0.000106878 m3; lognormal variance with pedigree 0.0044, pedigree (2,3,1,5,2)
  (same comment as for oxygen, liquid)
  production volume; = BP_wastewater_average*RP_PV/ABS(RP)
    Calculated from production volume of reference product using the relative outputs.
  properties: carbon content, non-fossil 0.194039, dry mass 0.346837 kg, mass concentration, TOC 0.1091 kg/m3, mass concentration, calcium 0.039453 kg/m3, mass concentration, chlorine 0.030031 kg/m3, mass concentration, hydrogen 0.013365 kg/m3, mass concentration, nitrogen 0.031015 kg/m3, mass concentration, oxygen 0.069824 kg/m3, mass concentration, sodium 0.06456 kg/m3, mass concentration, sulfur 0.015602 kg/m3, water content 2882.2, wet mass 1000 kg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
  note on carbon content, non-fossil: 0.0673 kg TOC/m3 (Tab A.17, ecoinvent v2.2 report 13_I). TOC was considered as Total Carbon.

## Inputs from nature
- Water, cooling, unspecified natural origin [natural resource, in water]: 0.162901 m3; name CW_u; = 0.891930591 * ( 300 / 1000 ); lognormal variance with pedigree 0.0454, pedigree (2,4,2,5,4)
  This value is estimated based on the cooling requirements reported by Chauvel, Alain, Gilles Lefebvre, and L. Castex in "Petrochemical processes. Technical and economical characteristics Vol. 2." (1989). The value of cooling water input for the latter process is 0.3 m3 per kg.
  At the same time, the latter amount was split between the following sources (1) "Water, cooling, unspecified natural origin", (2) "Water, river", and (3) "Water, well. in ground"
  Uncertainty: Chauvel 1989
- Water, river [natural resource, in water]: 0.0106935 m3; name CW_r; = 0.058550155 * ( 300 / 1000 ); lognormal variance with pedigree 0.0454, pedigree (2,4,2,5,4)
  This value is estimated based on the cooling requirements reported by Chauvel, Alain, Gilles Lefebvre, and L. Castex in "Petrochemical processes. Technical and economical characteristics Vol. 2." (1989). The value of cooling water input for the latter process is 0.3 m3 per kg.
  At the same time, the latter amount was split between the following sources (1) "Water, cooling, unspecified natural origin", (2) "Water, river", and (3) "Water, well. in ground"
- Water, well, in ground [natural resource, in water]: 0.00904415 m3; name CW_g; = 0.049519254 * ( 300 / 1000 ); lognormal variance with pedigree 0.0454, pedigree (2,4,2,5,4)
  (same comment as for Water, river)

## Emissions to nature
- Acetaldehyde [air, urban air close to ground]: 0.00335115 kg; lognormal variance with pedigree 0.006, pedigree (3,3,2,5,2)
  Calculated losses, based on the boiling point of a chemical, to water or to air. In addition, unreacted chemicals are assumed to go to wastewater treatment, which has a conversion rate in biological treatment of 95% of carbon into carbon dioxide. The remaining 5% are released as emissions to water.
  Uncertainty: Estimation
- Carbon dioxide, fossil [air, unspecified]: 0.0989907 kg; lognormal variance with pedigree 0.006, pedigree (3,3,2,5,2)
  Calculated losses, based on the boiling point of a chemical, to water or to air. In addition, unreacted chemicals are assumed to go to wastewater treatment, which has a conversion rate in biological treatment of 95% of carbon into carbon dioxide. The remaining 5% are released as emissions to water.
- Hydrogen [air, unspecified]: 0.00204359 kg; lognormal variance with pedigree 0.006, pedigree (3,3,2,5,2)
  (same comment as for Carbon dioxide, fossil)
- Oxygen [air, unspecified]: 0.00212609 kg; lognormal variance with pedigree 0.006, pedigree (3,3,2,5,2)
  (same comment as for Carbon dioxide, fossil)
- Water [air, unspecified]: 0.0162616 m3; = 0.089036947 * (CW_u + CW_r + CW_g ); lognormal variance with pedigree 0.0848, pedigree (2,4,2,5,4)
  Calculated value. This output flow is estimated based on the inputs. For more details, see Mathematical Relation.
  property fraction, origin: fresh water 0.00351442; name fraction_origin_fresh_water
  property fraction, origin: salt water 0; name fraction_origin_salt_water
  property fraction, origin: unspecified 0.996486; name fraction_origin_unspecified
- Acetaldehyde [water, unspecified]: 0.0016672 kg; lognormal variance with pedigree 0.006, pedigree (3,3,2,5,2)
  (same comment as for Carbon dioxide, fossil)
- Acetic acid [water, unspecified]: 3.04398e-5 kg; lognormal variance with pedigree 0.006, pedigree (3,3,2,5,2)
  (same comment as for Carbon dioxide, fossil)
- Acetic anhydride [water, unspecified]: 0.000152199 kg; lognormal variance with pedigree 0.006, pedigree (3,3,2,5,2)
  (same comment as for Carbon dioxide, fossil)
- BOD5, Biological Oxygen Demand [water, unspecified]: 0.00339356 kg; lognormal variance with pedigree 0.218, pedigree (4,5,5,5,5)
  Calculated value. The BOD, COD, TOC and BOD5 are calculated based on the amount and type of emissions released to water in the same activity.
- COD, Chemical Oxygen Demand [water, unspecified]: 0.00339356 kg; lognormal variance with pedigree 0.218, pedigree (4,5,5,5,5)
  (same comment as for BOD5, Biological Oxygen Demand)
- Cobalt II [water, surface water]: 0.000335115 kg; = Co; lognormal variance with pedigree 0.218, pedigree (4,5,5,5,5)
  Flow that represents the traces from the catalytic system in the purge stream. Calculated based on the inputs.
  Uncertainty: Estimation
- Copper ion [water, surface water]: 0.000670231 kg; = Cu; lognormal variance with pedigree 0.218, pedigree (4,5,5,5,5)
  (same comment as for Cobalt II)
- DOC, Dissolved Organic Carbon [water, unspecified]: 0.0014206 kg; lognormal variance with pedigree 0.218, pedigree (4,5,5,5,5)
  (same comment as for BOD5, Biological Oxygen Demand)
- Ethyl acetate [water, surface water]: 0.0134046 kg; = Diluent; lognormal variance with pedigree 0.006, pedigree (3,3,2,5,2)
  Flow that represents the diluent purge stream. Calculated based on the inputs.
  Uncertainty: Estimation
- Hydrogen peroxide [water, unspecified]: 1.73278e-5 kg; lognormal variance with pedigree 0.006, pedigree (3,3,2,5,2)
  (same comment as for Carbon dioxide, fossil)
- Peracetic acid [water, unspecified]: 0.00135814 kg; lognormal variance with pedigree 0.006, pedigree (3,3,2,5,2)
  (same comment as for Carbon dioxide, fossil)
- TOC, Total Organic Carbon [water, unspecified]: 0.0014206 kg; lognormal variance with pedigree 0.218, pedigree (4,5,5,5,5)
  (same comment as for BOD5, Biological Oxygen Demand)
- Water [water, unspecified]: 0.166377 m3; = 0.910963053 * (CW_u + CW_r + CW_g ); lognormal variance with pedigree 0.0848, pedigree (2,4,2,5,4)
  (same comment as for Water)
  property carbon content, fossil 0; name C_content_fossil
  property carbon content, non-fossil 0; name C_content_non_fossil
  property dry mass 0 kg; name DM
  property fraction, origin: fresh water 0.00857867; name fraction_origin_fresh_water_Ww
  property fraction, origin: salt water 0; name fraction_origin_salt_water_Ww
  property fraction, origin: unspecified 0.991421; name fraction_origin_unspecified_Ww
  property water in wet mass 1000 kg; name WWM
  property wet mass 1000 kg; name WM

## Sampling procedure
Literature data and stoichiometric calculation. This inventory is partially based on a generic model of the production of chemicals. The data generated by this model have been improved with compound-specific data when available. The model of the production of chemicals is using specific industry or literature data wherever possible and more generic data on chemical production processes to fill compound-specific data gaps when necessary. The basic principles of the model have been published in literature (Hischier, 2005). The model has been updated and extended with newly available data from the chemical industry. In the model, unreacted fractions are treated in a waste treatment process, and emissions reported are after a waste treatment process that is included in the scope of this dataset. For volatile reactants, a small level of evaporation is assumed. Solvents and catalysts are mostly recycled in closed-loop systems within the scope of the dataset and reported flows are for losses from this system. The source of information for the heat and electricity inputs is literature data (from 1989) for the specific technology. Finally, the main source of information for the values for water (process and cooling), nitrogen, and chemical factory is industry data from the GENDORF Chemical Park. The values are a 5-year average of data from 2015 to 2019 published by the GENDORF Chemical Park, which is based in Germany and produced an average of 2462760 tonnes of chemical substances in the years 2015-2019. For more information refer to the comments of the exchanges. References: Hischier, R. (2005) Establishing Life Cycle Inventories of Chemicals Based on Differing Data Availability (9 pp). The International Journal of Life Cycle Assessment, Volume 10, Issue 1, pp 59-67. 10.1065/lca2004.10.181.7 Chemiepark GENDORF, Umwelterklärung 2016, https://www.gendorf.de/Nachbarn/Umweltschutz/Industrie%20und%20Nachhaltigkeit Chemiepark GENDORF, Umwelterklärung 2017, https://www.gendorf.de/Nachbarn/Umweltschutz/Industrie%20und%20Nachhaltigkeit Chemiepark GENDORF, Umwelterklärung 2020, https://www.gendorf.de/Nachbarn/Umweltschutz/Industrie%20und%20Nachhaltigkeit Chauvel, Alain, Gilles Lefebvre, and L. Castex in "Petrochemical processes. Technical and economical characteristics Vol. 2." (1989)

## Extrapolations
This dataset has been copied from an original dataset covering the geography RER. The uncertainty has been adjusted accordingly.
