# textile production, cotton, air jet loom weaving

Dataset: EcoSpold 2, unit process
Geography: IN
Time period: 2015-04-01 to 2023-03-31
Technology level: current
Classification: EcoSpold01Categories: textiles/processing
Classification: ISIC rev.4 ecoinvent: 1312:Weaving of textiles
Scenario: Business-as-Usual
System model: Allocation, cut-off by classification
Generated by: Avraam Symeonidis
Published in: Faist Emmenegger, M. 2018
Database: ecoinvent
isCopyrightProtected: true
accessRestrictedTo: 1

## General comment
Inventory refers to the weaving of 1 kg yarn (450 GSM) into textile, the production of the yarn itself is not included.
The dataset covers wrap beaming, sizing, knotting and drawing, weaving and inspection of woven textile. The energy use is in the lower range when compared to average data.
Weaving is a process of interlacement of two sets of threads, called "wrap" and "weft" yarns, to produce the fabric of desired quality. The process starts with warping, where yarns are laid on warp beam, in preparation of weaving. These yarns are sized with maize starch. Steam for starch preparation is supplied by combustion of rice husk. The weaving is done on Airjet looms. and electricity consumption of Air compressor and utilities has been included.
The main inputs for weaving process are cotton yarn, electricity, lubricating oil for machinery, water and sizing solution (maize starch, binder and softener). Diesel is also used for power backup on need basis. It is important to note here that the energy data is calculated based on available secondary data from literature for energy consumption of each machine.
[This dataset is meant to replace the following datasets:
- weaving, cotton, IN, 2015 - 2016]

## Included activities start
The activity starts with warping and sizing of cotton yarn.

## Included activities end
This process ends with conversion of cotton yarn at weaving plant to 1 kg of woven fabric.

## Geography
Average based on inputs from manufacturer in Haryana North India.

## Technology
The following processes are used to convert cotton yarn to woven fabric: Warping, sizing and weaving. The weaving is done on Airjet looms. Air compressor and utilities energy consumption has been included. The fabric is then sent for further processing such as bleaching, mercerising and dyeing etc.

## Reference product
- textile, woven cotton: 1 kg; name RP_amount_1; By-product classification allocatable product; CPC 26620: Woven fabrics of cotton, containing 85% or more by weight of cotton, weighing more than 200 g/m2; HS2017 5208: Woven fabrics of cotton, containing 85% or more by weight of cotton, weighing not more than 200 g/m2
  production volume 4.433e9 kg; name RP_PV_1; = 22165000000*0.2
    Value calculated using input from the Indian Ministry of textiles and assuming assuming a fabric weight of 200g/m2
    Reference: Indian Ministry of Textiles, accessed at: http://texmin.nic.in/sites/default/files/prod_variety_cloth.pdf on 4/4/2018.
  property carbon content, non-fossil 0.46
    Cotton fibers are considered to have a 46% C-content in dry mass ("Evolutionary and Biochemical Aspects", A.D. Kay and T. Vrede (in Global Ecology, 2010, Elsevier B.V., S.E. Jørgensen Ed.)
  property heating value, net 13.94 MJ
    LHV is calculated based on the Carbon content of the product. More details can be found on the respective documentation.
  properties: carbon allocation 0.46 kg, carbon content 0.46, carbon content, fossil 0, dry mass 1 kg, price 1.77 EUR2005, water content 0, water in wet mass 0 kg, wet mass 1 kg

## Inputs from technosphere
- building, hall: 0.000833333 m2; = 5000/(10000*12*50); lognormal variance with pedigree 0.3026, pedigree (2,1,3,1,1)
  square meters of building divided by production per year and life time of the plant
- electricity, low voltage: 2.0497 kWh; = 0.0045+0.0480+1.7472+0.25; lognormal variance with pedigree 0.0046, pedigree (1,4,3,1,1)
  sum of electricity used for warping, sizing, air compressor and utilities. This data is in the lower range of comparable data. The consumption is strongly impacted by yarn size and fabric structure.
- lubricating oil: 0.278 kg; lognormal variance with pedigree 0.0046, pedigree (1,4,3,1,1)
  This is sum of greese and greese oil for lubricating machines
  properties: carbon content, fossil 0.75, dry mass 1 kg, heating value, net 40.2 MJ, wet mass 1 kg
  note on carbon content, fossil: Lubricating oil is produced from diesel. C-content/dry mass of fats and oils considered 75%, from: ecoinvent v2.2 report, n 15a, pg 40
  note on heating value, net: Literature value, Source: IPCC 2006, 2006 IPCC Guidelines for National Greenhouse Gas Inventories, Prepared by the National Greenhouse Gas Inventories Programme, Eggleston H.S., Buendia L., Miwa K., Ngara T. and Tanabe K. (eds). Published: IGES, Japan
- maize starch: 0.017 kg
  Maize starch used as sizing agent; primary data
  properties: carbon content, non-fossil 0.46, dry mass 0.86 kg, heating value, net 11.64 MJ, water content 0.162791, wet mass 1 kg
  note on carbon content, non-fossil: C-content of starch is considered 46% on dry mass basis (from "Evolutionary and Biochemical Aspects", A.D. Kay and T. Vrede (in Global Ecology, 2010, Elsevier B.V., S.E. Jørgensen Ed.)).
- waste mineral oil: -0.278 kg; name BP_amount_1; lognormal variance with pedigree 0.0026, pedigree (1,4,1,1,1)
  This is produced due to the use of lubricating oil necessary for the operation of machinery.
  production volume; = RP_PV_1 * (BP_amount_1 / RP_amount_1)
    Calculated from production volume of reference product using the relative outputs.
  properties: carbon content, fossil 0.864444, dry mass 0.9 kg, heating value, net 34.7 MJ, water content 0.111111, wet mass 1 kg
  note on carbon content, fossil: Tab A.6, ecoinvent v2.2 report 13_I. C content has been calculated after data in the tables, and then referred to 1 kg DM
  note on heating value, net: Value taken from the general comment of the treatment dataset.
- waste paperboard: -0.02 kg; name BP_amount_2; lognormal variance with pedigree 0.0026, pedigree (1,4,1,1,1)
  waste cardboard cones are made of paper pulp and different types of fibres
  production volume; = RP_PV_1 * (BP_amount_2 / RP_amount_1)
    Calculated from production volume of reference product using the relative outputs.
  properties: carbon content, non-fossil 0.483259, dry mass 0.804 kg, heating value, net 15.92 MJ, water content 0.243781, wet mass 1 kg
  note on carbon content, non-fossil: C content was calculated for 1 kg DM, using data in Tab A.3, ecoinvent v2.2 report 13_I.
- waste yarn and waste textile: -0.02 kg; name BP_amount_4; lognormal variance with pedigree 0.0026, pedigree (1,4,1,1,1)
  Waste produced during the process.
  production volume; = RP_PV_1 * (BP_amount_4 / RP_amount_1)
    Calculated from production volume of reference product using the relative outputs.
  properties: carbon content, non-fossil 0.44455, dry mass 0.97917 kg, heating value, net 13.14 MJ, water content 0.0212731, wet mass 1 kg
- wastewater, average: -5e-5 m3; name BP_amount_3; = 0.05/1000; lognormal variance with pedigree 0.0026, pedigree (1,4,1,1,1)
  0.05 kgs converted to cubic meters
  production volume; = RP_PV_1 * (BP_amount_3 / RP_amount_1)
    Calculated from production volume of reference product using the relative outputs.
  properties: carbon content, non-fossil 0.194039, dry mass 0.346837 kg, water content 2882.2, wet mass 1000 kg
  note on carbon content, non-fossil: 0.0673 kg TOC/m3 (Tab A.17, ecoinvent v2.2 report 13_I). TOC was considered as Total Carbon.
- yarn, cotton: 1.02 kg; lognormal variance with pedigree 0.0046, pedigree (1,4,3,1,1)
  Input of raw material that is transformed into textile.
  properties: carbon content, non-fossil 0.46, dry mass 0.94 kg, heating value, net 12.95 MJ, water content 0.0638298, wet mass 1 kg

## Inputs from nature
- Water, well, in ground [natural resource, in water]: 0.0015 m3; = 1.5/1000; lognormal variance with pedigree 0.0046, pedigree (1,4,3,1,1)
  1.5 lit transformed in cubic meters

## Emissions to nature
- Water [air, unspecified]: 0.00145 m3; = 1.45/1000; lognormal variance with pedigree 0.0046, pedigree (1,4,3,1,1)
  1.45 kg transformed in cubic meters.

## Sampling procedure
Industry data. Representative mills in Haryana (North India) was chosen to provide data based on its technical representativeness of the current state of business and their willingness to participate.
