# casting, steel, lost-wax

Dataset: EcoSpold 2, unit process
Geography: RoW
Time period: 2012-01-01 to 2023-12-31
Technology level: current
Classification: ISIC rev.4 ecoinvent: 2431:Casting of iron and steel
Classification: EcoSpold01Categories: metals/processing
Synonyms: wax molding; Investment casting
Tags: single enterprise data
Scenario: Business-as-Usual
System model: Allocation, cut-off by classification
Generated by: Jean-Francois Menard
Database: ecoinvent
isCopyrightProtected: true
accessRestrictedTo: 1

## General comment
This dataset represents the service of casting of stainless steel parts using the lost-wax casting, or investment casting, method. This technics is mainly used for small parts and precision parts with an average mass of 61 kg and the biggest ones weighting 91 kg. Industry sectors relying the most on this process include medical, automotive, aerospace and nuclear energy sectors. This casting process is more expensive, complicated and intensive than sand casting or die casting, but it requires less machining and allow better surface finishing. Production of metal in final piece is excluded. Inputs and outputs of stainless steel associated with losses are included and are on average 189% of cast metal. There is very little internal recycling since most applications demand only virgin stainless steel alloys.

## Included activities start
Lost-wax casting starting from the reception of stainless steel and alloy inputs for casting process.

## Included activities end
This activity ends with the stainless steel cast. The dataset includes mold manufacturing, melting of stainless steel and alloy inputs, casting, thermal treatment, straightening, cutting, grinding and non-destructive testing (NDT). The dataset does not include the final product material and alloying additives. Metal losses are included as generic stainless steel input, but this service is suitable for all stainless steel alloying.

## Geography
Global dataset extrapolated from regional one

## Parameters
- alumina casting: 0.17 kg; name alum; lognormal variance with pedigree 0.0052, pedigree (2,4,1,5,1)
  Measured value. Reported as part of casting process, represents aluminium oxyde for grit blasting.
- alumina component in ceramic: 0.00344 kg; name alum_ceramic; lognormal variance with pedigree 0.0066, pedigree (3,4,1,5,1)
  Calculated value. Based on alumina content of different ceramic ingredients used to make ceramic mold.
- waste alcohol: 0.00391 kg; name waste_alcohol; lognormal variance with pedigree 0.0052, pedigree (2,4,1,5,1)
  Measured value. Unspecified alcohol part of waste. Contains unspecified parts of water, oil, metal, soda and aluminium oxyde.
- waste aluminium oxyde: 0.05931 kg; name waste_alu_oxyde; lognormal variance with pedigree 0.0052, pedigree (2,4,1,5,1)
  Measured value.
- waste caustic soda: 0.06936 kg; name waste_caustic_soda; lognormal variance with pedigree 0.0052, pedigree (2,4,1,5,1)
  Measured value. As reported by data provider.
- waste citric acid: 0.01696 kg; name waste_citric_acid; lognormal variance with pedigree 0.0052, pedigree (2,4,1,5,1)
  Measured value.
- waste dust collector: 0.0484 kg; name waste_dust_collector; lognormal variance with pedigree 0.0052, pedigree (2,4,1,5,1)
  Measured value. Collector Type : Wet Centrifugal Air Collector
- waste general: 1.82 kg; name waste_general; lognormal variance with pedigree 0.0052, pedigree (2,4,1,5,1)
  Measured value. Includes various casting factory non-hazardous waste: ceramics (1.39 kg/kg of casted stainless steel product), wood, broken barrels.
- waste molding wax: 0.03579 kg; name waste_wax; lognormal variance with pedigree 0.0052, pedigree (2,4,1,5,1)
  Measured value. Casting wax part of waste.
- waste oil: 0.0185 kg; name waste_oil; lognormal variance with pedigree 0.0052, pedigree (2,4,1,5,1)
  Measured value. Hydraulic oil. Contains unspecified parts of metal and dust.
- waste steel grit: 0.06785 kg; name waste_steel_grit; lognormal variance with pedigree 0.0052, pedigree (2,4,1,5,1)
  Measured value. Abrasive steel grit.

## Reference product
- casting, steel, lost-wax: 1 kg; name RefProd; By-product classification allocatable product; CPC 89310: Iron and steel casting services
  .
  production volume 4.76054e7 kg; name ProdVol; = 212448 * 7e13/3.11e11
    Rough approximation of the production volume based on an estimate of the Quebec production volume, scaled to GLO by the ratio of global and Quebec GDP for 2011 (7e13/3.11e11). It should be replaced as soon as better data is found.
  property price 5.84127 EUR2005
    Calculated based on inputs: The price of the product has been calculated as a sum of the values of the material and energy inputs for this product. This value is therefore a rough estimation. It may underestimate the real price since there are additional expenses when producing any product. These expences can include for example labour costs, treatment of waste materials and profit for the producer. Please consider carefully whether this level of data quality is acceptable for your application.
  properties: carbon allocation 0 kg, carbon content 0

## Inputs from technosphere
- 1-butanol: 0.0001944 kg; = butanol_density* butanol_In; lognormal variance with pedigree 0.008, pedigree (1,1,4,1,1)
  Calculated value.
  Uncertainty: C
  property butanol input, volume 0.00024 l; name butanol_In
  property density 0.81 kg/l; name butanol_density
  properties: carbon content, fossil 0.648649, dry mass 1 kg, heating value, net 35.99 MJ, wet mass 1 kg
  note on butanol input, volume: Measured value. Butanol consumption as reported by data provider.
- aluminium casting facility: 4.9e-11 unit; lognormal variance with pedigree 0.57, pedigree (5,5,5,5,5)
  Proxy. Taken directly from ecoivnent v3.0 dataset "casting, bronze, GLO 2003". Approximated value. The uncertainty was maximized accordingly.
- aluminium oxide, non-metallurgical: 0.148328, 0.0251119 kg (2 suppliers, which the file names only by identifier); sum of these 0.17344 kg; = alum+ alum_ceramic; lognormal variance with pedigree 0.0086, pedigree (1,1,4,1,1)
  Calculated value. Represents aluminium oxyde for grit blasting and alumina content of different ceramic ingredients used to make ceramic casting mold.
  Uncertainty: C
  properties: dry mass 1 kg, wet mass 1 kg
- ceramic tile: 0.00683 kg; lognormal variance with pedigree 0.0206, pedigree (4,4,4,5,1)
  Proxy. Used for "ceramic rod" as reported by data provider. Measured value.
  properties: dry mass 1 kg, wet mass 1 kg
- electricity, medium voltage: 0.639655, 12.7597, 0.319422, 0.195884, 2.76202, 0.039206, 0.00841842, 0.89097, 1.31764, 3.7871 kWh (10 suppliers, which the file names only by identifier); sum of these 22.72 kWh; lognormal variance with pedigree 0.0132, pedigree (2,4,4,5,1)
  Measured value. Include thermal treatment and straightening with hydraulic multi-presses of cast parts. Induction furnaces of small capacity and throughput are more energy intensive than large ones. Almost three times as much melted metal as in the final cast parts is needed for the casting process, the melting step represents around 60% of the total electricity used.
- hazardous waste, for underground deposit: -0.011969, -0.185818 kg (2 suppliers, which the file names only by identifier); sum of these -0.197787 kg; = waste_dust_collector + waste_citric_acid + (waste_alcohol-air_propanol) + waste_caustic_soda+ waste_alu_oxyde
  Calculated value. Represents many hazardous waste flows all send in technical landfill. See parameters for details on individual waste flows.
  production volume; = ProdVol * wasteHazard / RefProd
    Calculated from production volume of reference product using the relative outputs.
  properties: carbon content, fossil 0.554667, dry mass 1 kg, wet mass 1 kg
  note on carbon content, fossil: Tab A.6, ecoinvent v2.2 report 13_I, average hazardous waste composition was used, and referred to 0% water mass. No waste-specific emission are currently inventoried for underground deposits. Accordingly, no waste composition must be specified. For generic, average waste to underground deposit deposition in a 200 liter steel drum without cement solidification is assumed (ecoinvent v2.2 report 13_I).
- heat, district or industrial, natural gas: 27.7567, 75.0966 MJ (2 suppliers, which the file names only by identifier); sum of these 102.853 MJ; lognormal variance with pedigree 0.008, pedigree (1,1,4,1,1)
  Calculated value. The natural gas is used to heat the molds and 60% of the cast parts are heated before being straightened.
  Uncertainty: C
  properties: Corresponding fuel use 1.0417 MJ, fuel input in physical units, m3 2.72 m3, heating value, net 1 MJ
  note on Corresponding fuel use: Lower heating value of the fuel input related to the heat/electricity output. Assume a 96% energy efficiency based on Section 5.3.6 of report "Life cycle Inventories of Energy Systems, Results for Current Systems in Switzerland and other UCTE Countries" (ecoinvent report No. 5, 2007).
  note on fuel input in physical units, m3: Measured value. Fuel consumption, as reported by data provider per kg of produced steel cast.
  note on heating value, net: Net (lower) heating (calorific) value. Value Taken from Table 5.1 of report "Overview and methodology, Data quality guideline for the ecoinvent database version 3" (ecoinvent report No. 1 (v3), 2011).
- isopropanol: 9.657e-5, 0.00045843 kg (2 suppliers, which the file names only by identifier); sum of these 0.000555 kg; lognormal variance with pedigree 0.0132, pedigree (2,4,4,5,1)
  Measured value.
  properties: carbon content, fossil 0.6, dry mass 1 kg, heating value, net 34.3 MJ, wet mass 1 kg
- kaolin: 0.2938 kg; lognormal variance with pedigree 0.0146, pedigree (3,4,4,5,1)
  Proxy for Mullite (3Al2O32SiO2) (Kaolinite Al2Si2O5(OH)4). Calculated value. Based on Mullite content of different ceramic ingredients used to make ceramic casting mold, with a 1-to-1 kaolin/Mullite ratio.
  properties: dry mass 1 kg, wet mass 1 kg
- lubricating oil: 0.00174, 0.00826 kg (2 suppliers, which the file names only by identifier); sum of these 0.01 kg; lognormal variance with pedigree 0.0132, pedigree (2,4,4,5,1)
  Measured value. Sum of several types of hydraulic oil.
  properties: carbon content, fossil 0.75, dry mass 1 kg, heating value, net 40.2 MJ, wet mass 1 kg
  note on carbon content, fossil: Lubricating oil is produced from diesel. C-content/dry mass of fats and oils considered 75%, from: ecoinvent v2.2 report, n 15a, pg 40
  note on heating value, net: Literature value, Source: IPCC 2006, 2006 IPCC Guidelines for National Greenhouse Gas Inventories, Prepared by the National Greenhouse Gas Inventories Programme, Eggleston H.S., Buendia L., Miwa K., Ngara T. and Tanabe K. (eds). Published: IGES, Japan
- municipal solid waste: -0.0624987, -0.0032094, -0.000381102, -0.00242141, -1.81074, -0.00026668, -8.55995e-5, -0.000193478, -0.00805456 kg (9 suppliers, which the file names only by identifier); sum of these -1.88785 kg; = waste_steel_grit+waste_general
  Calculated value. Represents many non-hazardous waste flows which are treated via the same routes as municipal solid wastes. See parameters for details on individual waste flows.
  production volume; = ProdVol * wasteMunicipal / RefProd
    Calculated from production volume of reference product using the relative outputs.
  properties: carbon content, fossil 0.171549, carbon content, non-fossil 0.261655, dry mass 0.771 kg, heating value, net 11.74 MJ, water content 0.297017, wet mass 1 kg
  note on carbon content, fossil: MSW composition in tab 4.1, ecoinvent v2.2 report 13_I. C content referred to 1 kg DM
  note on heating value, net: Value taken from the general comment of the treatment dataset.
- potassium hydroxide: 0.00287 kg; lognormal variance with pedigree 0.0132, pedigree (2,4,4,5,1)
  Measured value.
  properties: dry mass 0.856 kg, water content 0.168224, wet mass 1 kg
- refractory, fireclay, packed: 0.1056 kg; lognormal variance with pedigree 0.0146, pedigree (3,4,4,5,1)
  Proxy. Calculated value. Based on fireclay content of different ceramic ingredients used to make ceramic casting mold, with a 1-to-1 ratio.
  properties: dry mass 1 kg, wet mass 1 kg
- scrap steel: -1.27828, -0.610942, -0.000774045 kg (3 suppliers, which the file names only by identifier); sum of these -1.89 kg; lognormal variance with pedigree 0.0052, pedigree (2,4,1,5,1)
  Calculated value. Based on ratio of mass of melted metal to mass of sold metal parts reported. Stainless steel scrap of various alloys, mainly generated by "unleafing" cast parts, sold to recyclers as reported by data provider.
  production volume; = ProdVol * scrapSteel / RefProd
    Calculated from production volume of reference product using the relative outputs.
  properties: dry mass 1 kg, wet mass 1 kg
- silica sand: 0.4911 kg; lognormal variance with pedigree 0.0146, pedigree (3,4,4,5,1)
  Proxy for SiO2. Calculated value. Based on SiO2 content of different ceramic ingredients used to make ceramic casting mold, with a 1-to-1 ratio.
  properties: dry mass 0.99 kg, water content 0.010101, wet mass 1 kg
- silicon carbide: 0.14 kg; lognormal variance with pedigree 0.0132, pedigree (2,4,4,5,1)
  Proxy. Used to represent abrasive materials. Calculated value.
  properties: carbon content, fossil 0.3, dry mass 1 kg, heating value, net 9.08 MJ, wet mass 1 kg
- sodium hydroxide, without water, in 50% solution state: 0.00685893, 0.0702411 kg (2 suppliers, which the file names only by identifier); sum of these 0.0771 kg; lognormal variance with pedigree 0.0132, pedigree (2,4,4,5,1)
  Measured value. Reported as caustic soda as reported by data provider, Assumed to be 100% sodium hydroxide.
  properties: dry mass 1 kg, heating value, net 3.03 MJ, wet mass 1 kg
- steel, chromium steel 18/8: 1.89 kg; = scrapSteel; lognormal variance with pedigree 0.008, pedigree (1,1,4,1,1)
  Proxy, different stainless steel alloys are used. Calculated value. Correspond to lost stainless steel through lost-wax casting process.
  Uncertainty: C
  properties: carbon content, fossil 0.0008, dry mass 1 kg, wet mass 1 kg
  note on carbon content, fossil: Stainless steel model is the grade 304 steel (18/8 stainless, 18% chromium 8% nickel; max. 0.08% C)
- steel, unalloyed: 0.08066 kg; lognormal variance with pedigree 0.0132, pedigree (2,4,4,5,1)
  Proxy. For shot/grit blasting. Measured value.
  properties: carbon content, fossil 0.0025, dry mass 1 kg, wet mass 1 kg
- tap water: 0.262067, 0.399498, 0.745444, 2.00817, 10.0738, 115.279, 86.0818 kg (7 suppliers, which the file names only by identifier); sum of these 214.85 kg; lognormal variance with pedigree 0.0132, pedigree (2,4,4,5,1)
  Measured value. Data represents water consumption measured during one month in 2013.
  properties: carbon content, fossil 0.00178991, dry mass 0.000337476 kg, water content 2962.17, wet mass 1 kg
  note on carbon content, fossil: Bicarbonate content is 2.93 mol/m3. CO2 content is 0.1 mol/m3 (ecoinvent v2.2 report 8, Tab 93.1).
- titanium dioxide: 0.000277267, 0.000138633 kg (2 suppliers, which the file names only by identifier); sum of these 0.0004159 kg; lognormal variance with pedigree 0.0146, pedigree (3,4,4,5,1)
  Calculated value. Based on TiO2 content of different ceramic ingredients used to make ceramic casting mold.
  properties: dry mass 1 kg, wet mass 1 kg
- waste mineral oil: -0.000368917, -0.039019, -0.0149021 kg (3 suppliers, which the file names only by identifier); sum of these -0.05429 kg; = waste_oil+waste_wax
  Calculated value. Represents the treatment of hydraulic oil and is also used as a proxy for the treatment of spent casting wax. The waste hydraulic oil contains unspecified parts of metal and dust.
  production volume; = ProdVol * (wasteoil/ RefProd)
    Calculated from production volume of reference product using the relative outputs.
  properties: carbon content, fossil 0.864444, dry mass 0.9 kg, heating value, net 34.7 MJ, water content 0.111111, wet mass 1 kg
  note on carbon content, fossil: Tab A.6, ecoinvent v2.2 report 13_I. C content has been calculated after data in the tables, and then referred to 1 kg DM
- waste x-ray film: -0.001139 kg; name wasteXray; lognormal variance with pedigree 0.0052, pedigree (2,4,1,5,1)
  Measured value. Waste X-ray film sold from silver recovery.
  production volume; = ProdVol * (wasteXray / RefProd)
    Calculated from production volume of reference product using the relative outputs.
- wastewater, average: -0.000488428, -0.0812767, -0.0194349 m3 (3 suppliers, which the file names only by identifier); sum of these -0.1012 m3; lognormal variance with pedigree 0.0126, pedigree (4,4,1,5,1)
  Extrapolated value. Assumed all water used that is not in the product, by-products and emitted to air as vapor is wastewater sent to sewer.
  production volume; = ProdVol *wasteWater/ RefProd
    Calculated from production volume of reference product using the relative outputs.
  properties: carbon content, non-fossil 0.194039, dry mass 0.346837 kg, water content 2882.2, wet mass 1000 kg
  note on carbon content, non-fossil: 0.0673 kg TOC/m3 (Tab A.17, ecoinvent v2.2 report 13_I). TOC was considered as Total Carbon.
- water, deionised: 0.0558835, 0.000201167, 0.181415 kg (3 suppliers, which the file names only by identifier); sum of these 0.2375 kg; lognormal variance with pedigree 0.0146, pedigree (3,4,4,5,1)
  Calculated value. Based on water content of different ceramic ingredients used to make ceramic casting mold.
  properties: wet mass 1 kg
- wax, lost-wax casting: 0.56 kg; lognormal variance with pedigree 0.0132, pedigree (2,4,4,5,1)
  Measured value. Wax for casting mold. Includes many different types of wax.
  properties: heating value, net 25.76 MJ
- welding, arc, steel: 0.00042 m; lognormal variance with pedigree 0.0206, pedigree (4,4,4,5,1)
  Estimated value. Based on reported use of welding rod and 2.4 kg of steel/m. Used for welding to repair defaults in cast.
- zircon: 0.378 kg; lognormal variance with pedigree 0.0146, pedigree (3,4,4,5,1)
  Proxy for ZrO2 (Zircon ZrSiO4). Calculated value. Based on Zr content of different ceramic ingredients used to make ceramic casting mold.
  properties: dry mass 1 kg, wet mass 1 kg

## Emissions to nature
- Isopropanol [air, unspecified]: 0.000152625 kg; name air_propanol; = isopropanol*isopropanol_emitted_fraction; lognormal variance with pedigree 0.008, pedigree (1,1,4,1,1)
  Calculated value.
  Uncertainty: C
  property emitted fraction 0.275; name isopropanol_emitted_fraction
- Water [water, unspecified]: 0.0221296 m3; = water_in*water_emitted_fraction/1000; lognormal variance with pedigree 0.008, pedigree (1,1,4,1,1)
  Calculated value.
  Uncertainty: C
  property emitted fraction 0.103; name water_emitted_fraction

## Sampling procedure
Measured and estimated values from one manufacturing company. In 2012, 86% of cast finish product was in stainless steel.

## Extrapolations
This dataset has been copied from an original dataset covering the geography Québec. The uncertainty has been adjusted accordingly.
