# lime production, hydrated, packed

Dataset: EcoSpold 2, unit process
Geography: RoW
Time period: 2000-01-01 to 2023-12-31
Technology level: current
Classification: EcoSpold01Categories: construction materials/binder
Classification: ISIC rev.4 ecoinvent: 2394:Manufacture of cement, lime and plaster
Synonyms: hydriert; slaked; hydrate
Tags: ConvertedDataset
Scenario: Business-as-Usual
System model: Allocation, cut-off by classification
Share of production covered: 50 %
Generated by: Daniel Kellenberger (obsolete)
Published in: Kellenberger D. 2007
Database: ecoinvent
isCopyrightProtected: true
accessRestrictedTo: 1

## General comment
Packed lime products do all use the module "packing, lime products"
[This dataset was already contained in the ecoinvent database version 2. It was not individually updated during the transfer to ecoinvent version 3. Life Cycle Impact Assessment results may still have changed, as they are affected by changes in the supply chain, i.e. in other datasets. This dataset was generated following the ecoinvent quality guidelines for version 2. It may have been subject to central changes described in the ecoinvent version 3 change report (http://www.ecoinvent.org/database/ecoinvent-version-3/reports-of-changes/), and the results of the central updates were reviewed extensively. The changes added e.g. consistent water flows and other information throughout the database. The documentation of this dataset can be found in the ecoinvent reports of version 2, which are still available via the ecoinvent website. The change report linked above covers all central changes that were made during the conversion process.]

## Included activities end
Includes the packing and one part of the total heating energy for "production" and "administration"

## Geography
data are from only one company in Switzerland (KFN)

## Technology
The company KFN works on a technically high level.

## Reference product
- lime, hydrated, packed: 1 kg; By-product classification allocatable product; CPC 37420: Quicklime, slaked lime and hydraulic lime; HS2017 252100: Limestone flux; limestone and other calcareous stone, of a kind used for the manufacture of lime or cement; CAS 1305-62-0
  EcoSpold01Location=CH
  production volume 3.96633 kg
    This is a placeholder value that does not reflect real-world production volumes. This dataset does not currently require a real-world production volume to work in the database framework, and no actual data were collected yet. This has no negative effect on the results of the ecoinvent database.
  property carbon content, fossil 0
    Mainly Ca(OH)2. Tab 3.4, ecoinvent v2.2 report 7, part VII, pg 7
  property carbon content, non-fossil 0
    Mainly Ca(OH)2. Tab 3.4, ecoinvent v2.2 report 7, part VII, pg 7
  property price 0.11 EUR2005
    Calculated value based on data from United Nations Commodity Trade Statistics Database (comtrade.un.org). UN comtrade category: 252220 Slaked lime. Using exchange rate of 1EURO = 1.209 USD. Average of price of import into 5 main markets (EU, US, JP, IN and CN).
  properties: carbon allocation 0 kg, carbon content 0, dry mass 0.997 kg, water content 0.00300903, water in wet mass 0.003 kg, wet mass 1 kg

## Inputs from technosphere
- heat, central or small-scale, other than natural gas: 1.91041e-5, 0.0013909 MJ (2 suppliers, which the file names only by identifier); sum of these 0.00141 MJ; lognormal variance with pedigree 0.0421, pedigree (1,2,5,5,1)
  EcoSpold01Location=CH
  properties: heating value, net 1 MJ
- lime, hydrated, loose weight: 1 kg; lognormal variance with pedigree 0.044, pedigree (1,4,5,5,1)
  EcoSpold01Location=CH
  properties: dry mass 0.997 kg, water content 0.00300903, wet mass 1 kg
- packing, lime product: 1 kg; lognormal variance with pedigree 0.434, pedigree (5,4,5,5,1)
  EcoSpold01Location=CH

## Sampling procedure
survey

## Extrapolations
This dataset has been copied from an original dataset covering the geography CH. The uncertainty has been adjusted accordingly.

## Review by Roberto Dones 2003-07-04
Passed
