# concrete slab production

Dataset: EcoSpold 2, unit process
Geography: RoW
Time period: 2014-04-01 to 2023-12-31
Technology level: current
Classification: ISIC rev.4 ecoinvent: 2395:Manufacture of articles of concrete, cement and plaster
Scenario: Business-as-Usual
System model: Allocation, cut-off by classification
Generated by: [System]
Database: ecoinvent
isCopyrightProtected: true
accessRestrictedTo: 1

## General comment
This dataset has been extrapolated from the corresponding IN dataset. A concrete slab is a common structural element of modern buildings. Horizontal slabs of steel reinforced concrete, typically between 4 and 20 inches (100 and 500 millimeters) thick, are most often used to construct floors and ceilings, while thinner slabs are also used for exterior paving.
In many domestic and industrial buildings a thick concrete slab, supported on foundations or directly on the subsoil, is used to construct the ground floor of a building. These can either be "ground-bearing" or "suspended" slabs. For Double-storey or Multi-storey buildings, the use of a few common types of concrete suspended slabs are used. In high rise buildings and skyscrapers, thinner, pre-cast concrete slabs are slung between the steel frames to form the floors and ceilings on each level. Cast in-Situ slabs which used in high rise buildings and huge shopping complexes as well as houses. These in-situ slabs are cast on site using shutters and reinforced steel.
On the technical drawings, reinforced concrete slabs are often abbreviated to "r.c.c.slab" or simply "r.c." Technical drawings are often created by structural Engineers who use software such as AutoCad or Revit structure

## Included activities start
Activity startes with reception of concrete of 25-30 MPa strength and reinforced steel at construction site.

## Included activities end
Activity ends with the reinforced concrete slab prepared, on site.

## Geography
Data represents for Indian geography.

## Technology
Two types of concrete used to cast slab: Ready mixed concrete and Hand/Machine mix concrete. Hand mix concrete are rearly used in slab casting.

## Time period
Data available for above period.

## Parameters
- fraction, process water, to air: 0.15 dimensionless; name fraction_PW_to_air; lognormal variance with pedigree 0.094, pedigree (4,4,3,5,4)
- fraction, tap water, to air: 0.15 dimensionless; name fraction_TW_to_air; lognormal variance with pedigree 0.094, pedigree (4,4,3,5,4)

## Reference product
- concrete slab: 1 m3; name RP; By-product classification allocatable product; CPC 3733: Refractory cements, mortars, concretes and similar compositions n.e.c.; HS2017 6810: Cement, concrete or artificial stone; whether or not reinforced, articles thereof
  production volume 2.3436e8 m3; name concreteslab_PV; = 1.764E+07/0.07
    Estimated value. The GLO productiome volume is scaled from the IN production volume 1.764E+07 (from dataset: "concrete slab IN 2017, accessed 20171108). The value is scaled based on IN consumption of global cement, 7% (Portland cement association 2013. World cement consumption, retrieved from:(http://www.betonabq.org/images/imguser/WorldReport_Aug_2013final__01__cement.pdf, accessed 20171108)
  property price 185 EUR2005
    Calculated value based on data from United Nations Commodity Trade Statistics Database (comtrade.un.org). UN comtrade category: 681019 Tiles & flagstones of cement, concrete, artificial ston. Year 2005. Using exchange rate of 1EURO = 1.209 USD. Average of price of import into 5 main markets (EU, US, JP, IN and CN).
  properties: carbon allocation 0 kg, carbon content 0, carbon content, fossil 0, carbon content, non-fossil 0, dry mass 2273 kg, water content 0.0725913, water in wet mass 165 kg, wet mass 2438 kg

## Inputs from technosphere
- concrete, 25MPa: 0.00110178, 0.00235922, 0.00544854, 0.037302, 0.0367071, 0.907081 m3 (6 suppliers, which the file names only by identifier); sum of these 0.99 m3; lognormal variance with pedigree 0.0452, pedigree (3,3,5,5,1)
  Data represents with reference to the consultation with manufacturer of concrete slab. The value calculated by considering the density of steel as 8050 kg/m3 and use of reinforced steel is in the range of 70 to 90 kg per cubic meter of concrete slab.
  properties: cement content 206 kg, dry mass 2285 kg, fly ash content 69 kg, gravel content 1100 kg, sand content 910 kg, water content 0.0538293, wet mass 2408 kg
- electricity, medium voltage: 0.592822, 0.0527266, 4.59719, 6.02417, 6.37963, 3.24947, 0.448801, 2.84057, 0.119908, 19.1978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 kWh (47 suppliers, which the file names only by identifier); sum of these 650.946 kWh; = 0.267*2438; lognormal variance with pedigree 0.0832, pedigree (2,1,5,5,4)
  India specific data not available due to sector in informal in nature. Data refered from Fibre cement corrugated slag production,GLO,1991-201 dataset
- heat, central or small-scale, other than natural gas: 30.9382 MJ; = 0.01269*2438; lognormal variance with pedigree 0.0832, pedigree (2,1,5,5,4)
  (same comment as for electricity, medium voltage)
  properties: heating value, net 1 MJ
- heat, district or industrial, other than natural gas: 574.393 MJ; = 0.2356*2438; lognormal variance with pedigree 0.0832, pedigree (2,1,5,5,4)
  (same comment as for electricity, medium voltage)
  properties: corresponding fuel use, propane, furnace >100kW 1.05263 MJ, heating value, net 1 MJ
  note on corresponding fuel use, propane, furnace >100kW: Lower heating value of the fuel input related to the heat/electricity output, taken directly from ecoinvent v3.0 dataset "heat production, natural gas, at industrial furnace >100kW, GLO 2000".
- lubricating oil: 0.330461, 1.56874 kg (2 suppliers, which the file names only by identifier); sum of these 1.8992 kg; = 0.000779*2438; lognormal variance with pedigree 0.0926, pedigree (2,1,5,5,4)
  (same comment as for electricity, medium voltage)
  properties: carbon content, fossil 0.75, dry mass 1 kg, heating value, net 40.2 MJ, wet mass 1 kg
  note on carbon content, fossil: Lubricating oil is produced from diesel. C-content/dry mass of fats and oils considered 75%, from: ecoinvent v2.2 report, n 15a, pg 40
  note on heating value, net: Literature value, Source: IPCC 2006, 2006 IPCC Guidelines for National Greenhouse Gas Inventories, Prepared by the National Greenhouse Gas Inventories Programme, Eggleston H.S., Buendia L., Miwa K., Ngara T. and Tanabe K. (eds). Published: IGES, Japan
- reinforcing steel: 80 kg; lognormal variance with pedigree 0.0452, pedigree (3,3,5,5,1)
  Data represents with reference to the consultation with manufacturer of concrete slab. The use of reinforced steel is in the range of 70 to 90 kg per cubic meter of concrete slab.
  properties: carbon content, fossil 0.004, dry mass 1 kg, wet mass 1 kg
- tap water: 7.51053, 11.4492, 21.3636, 57.5519, 6.9277, 3303.77, 2467.01 kg (7 suppliers, which the file names only by identifier); sum of these 5875.58 kg; = 2.41*2438; lognormal variance with pedigree 0.0832, pedigree (2,1,5,5,4)
  (same comment as for electricity, medium voltage)
  properties: carbon content, fossil 0.00178991, dry mass 0.000337476 kg, water content 2962.17, wet mass 1 kg
  note on carbon content, fossil: Bicarbonate content is 2.93 mol/m3. CO2 content is 0.1 mol/m3 (ecoinvent v2.2 report 8, Tab 93.1).
- wastewater from concrete production: -0.000129064, -0.0266889 m3 (2 suppliers, which the file names only by identifier); sum of these -0.026818 m3; = 1.1E-05*2438; lognormal variance with pedigree 0.0546, pedigree (2,1,3,5,4)
  (same comment as for electricity, medium voltage)
  production volume; = wastewater* concreteslab_PV /ABS( RP)
    Calculated from the relation with the reference product amount.
  properties: carbon content, fossil 0.027074, dry mass 0.449139 kg, water content 2225.48, wet mass 1000 kg
- wastewater, unpolluted: -0.0134931, -2.79021 m3 (2 suppliers, which the file names only by identifier); sum of these -2.8037 m3; = 0.00115*2438; lognormal variance with pedigree 0.0546, pedigree (2,1,3,5,4)
  (same comment as for electricity, medium voltage)
  production volume; = wastewaterunpolluted*concreteslab_PV /ABS( RP)
    Calculated from the relation with the reference product amount.
  properties: carbon content, fossil 0.00178991, carbon content, non-fossil 0.00178991, dry mass 0.337476 kg, water content 2962.17, wet mass 1000 kg
  note on carbon content, fossil: Assumed to be like in tap water. Bicarbonate content is 2.93 mol/m3. CO2 content is 0.1 mol/m3 (ecoinvent v2.2 report 8, Tab 93.1).

## Emissions to nature
- Water [air, unspecified]: 0.881337 m3; name water_to_air_unspecified; = 0.0003615*2438; lognormal variance with pedigree 0.0847, pedigree (2,2,3,5,4)
  (same comment as for electricity, medium voltage)
- Water [water, unspecified]: 2.16372 m3; name water_to_water_unspecified; = (tap_water_input/1000)*(1-fraction_TW_to_air)-wastewater-wastewaterunpolluted; lognormal variance with pedigree 0.0847, pedigree (2,2,3,5,4)
  (same comment as for electricity, medium voltage)

## Sampling procedure
Data collected by consulting with two concrete slab manufacturer and secondary research.

## Extrapolations
This dataset has been extrapolated from the corresponding IN dataset. The uncertainty has been adjusted accordingly. For data received from secondary research uncertainity adjusted accordingly.

## Review by Marion Sié 2017-11-09
Minor imbalances have been observed (between 3% and 1%).
