# treatment of sludge from FeCl3 production, underground deposit

Dataset: EcoSpold 2, unit process
Geography: RoW
Time period: 1993-01-01 to 2023-12-31
Technology level: current
Classification: EcoSpold01Categories: waste management/underground deposit
Classification: ISIC rev.4 ecoinvent: 3821:Treatment and disposal of non-hazardous waste
Synonyms: sludge from the production of iron chloride
Tags: Treatment; ConvertedDataset
Scenario: Business-as-Usual
System model: Allocation, cut-off by classification
Generated by: Gabor Doka (obsolete)
Published in: Doka G. 2007
Database: ecoinvent
isCopyrightProtected: true
accessRestrictedTo: 1

## General comment
No emissions from waste material are inventoried. Operators claim absolute long-term safety after closure. Non-zero risk of mine flooding remains.
[This dataset was already contained in the ecoinvent database version 2. It was not individually updated during the transfer to ecoinvent version 3. Life Cycle Impact Assessment results may still have changed, as they are affected by changes in the supply chain, i.e. in other datasets. This dataset was generated following the ecoinvent quality guidelines for version 2. It may have been subject to central changes described in the ecoinvent version 3 change report (http://www.ecoinvent.org/database/ecoinvent-version-3/reports-of-changes/), and the results of the central updates were reviewed extensively. The changes added e.g. consistent water flows and other information throughout the database. The documentation of this dataset can be found in the ecoinvent reports of version 2, which are still available via the ecoinvent website. The change report linked above covers all central changes that were made during the conversion process.]

## Included activities end
waste packaging, process material and energy demands for underground disposal in old salt mine (Herfa Neurode, Germany).

## Geography
Specific to the deposition technology in Herfa-Neurode, Germany, in 2000. Well applicable to modern deposition practices in Europe. Three other underground deposits in old salt mines exist in Germany (Heilbronn, Zielitz, and Borth) and one in France (Wittelsheim).

## Technology
Ordered, recorded and potentially retrievable deposition of various types of hazardous wastes (excluding radioactive, explosive, burnable, or infectious wastes)
Multi barrier concept with
1.) ordered stacks of lined steel drums, steel containers or big bags,
2.) compartment brick walls between dissimilar waste types,
3.) 6m brick wall/anhydrite dam per large deposit field with approx 3.1 Mio. tons of waste,
4.) 48m dam against conventional potash mine,
5.) gravel and clay filling of the 800m access shaft after closure.

## Reference product
- sludge from FeCl3 production: -1 kg; By-product classification Waste; CPC 39950: Wastes from chemical or allied industries; HS2017 382569: Residual products of the chemical or allied industries, not elsewhere specified or included; (other than se[...]
  EcoSpold01Location=DE
  production volume 3.75794 kg
    This is a placeholder value that does not reflect real-world production volumes. This dataset does not currently require a real-world production volume to work in the database framework, and no actual data were collected yet. This has no negative effect on the results of the ecoinvent database.
  property price 0 EUR2005
    Waste products are assigned a price of zero as they are assumed to require further treatment.
  properties: carbon allocation 0 kg, carbon content 0, carbon content, fossil 0, carbon content, non-fossil 0, dry mass 0.7 kg, water content 0.428571, water in wet mass 0.3 kg, wet mass 1 kg

## Inputs from technosphere
- alkyd paint, white, without solvent, in 60% solution state: 0.00149 kg; lognormal variance with pedigree 0.3432, pedigree (2,3,5,5,1)
  Raw data from 1 operator (Herfa-Neurode) and estimates
  EcoSpold01Location=RER
  Uncertainty: & basic uncertainty of 3; raw data from 1 operator (Herfa-Neurode) and estimates
  properties: carbon content, fossil 0.140367, carbon content, non-fossil 0.199629, dry mass 1 kg, heating value, net 10.3 MJ, wet mass 1 kg
  note on carbon content, fossil: C content was calculated as an addition of C content in the raw materials.
- anhydrite: 0.00143 kg; lognormal variance with pedigree 0.3432, pedigree (2,3,5,5,1)
  Raw data from 1 operator (Herfa-Neurode) and estimates
  EcoSpold01Location=CH
  Uncertainty: & basic uncertainty of 3; raw data from 1 operator (Herfa-Neurode) and estimates
  properties: dry mass 0.984 kg, water content 0.0162602, wet mass 1 kg
- cement mortar: 3.435e-6, 8.57167e-7, 0.000682708 kg (3 suppliers, which the file names only by identifier); sum of these 0.000687 kg; lognormal variance with pedigree 0.3432, pedigree (2,3,5,5,1)
  EcoSpold01Location=CH
  Raw data from 1 operator (Herfa-Neurode) and estimates
  Uncertainty: & basic uncertainty of 3; raw data from 1 operator (Herfa-Neurode) and estimates
  properties: dry mass 1 kg, wet mass 1 kg
- cement, unspecified: 0.000566496, 0.0103844, 0.00026831, 0.00632828, 0.0394374, 0.0012379, 0.000904843, 0.0004904, 0.00097467, 0.0014901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 kg (11 suppliers, which the file names only by identifier); sum of these 0.458 kg; lognormal variance with pedigree 0.3432, pedigree (2,3,5,5,1)
  (same comment as for anhydrite)
  properties: dry mass 1 kg, wet mass 1 kg
- clay: 0.000292955, 4.49677e-8 kg (2 suppliers, which the file names only by identifier); sum of these 0.000293 kg; lognormal variance with pedigree 0.3432, pedigree (2,3,5,5,1)
  (same comment as for cement mortar)
  properties: dry mass 0.965 kg, water content 0.0362694, wet mass 1 kg
- clay brick: 0.000155989, 0.00842401 kg (2 suppliers, which the file names only by identifier); sum of these 0.00858 kg; lognormal variance with pedigree 0.3432, pedigree (2,3,5,5,1)
  (same comment as for alkyd paint, white, without solvent, in 60% solution state)
  properties: dry mass 1 kg, wet mass 1 kg
- electricity, medium voltage: 2.25913e-7, 3.38167e-7, 1.0683e-7, 1.98852e-6, 1.16711e-6, 1.38373e-6, 1.68076e-5, 4.00863e-8, 0.000335274, 0.000112651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 kWh (47 suppliers, which the file names only by identifier); sum of these 0.000591 kWh; lognormal variance with pedigree 0.3432, pedigree (2,3,5,5,1)
  EcoSpold01Location=DE
  Raw data from 1 operator (Herfa-Neurode) and estimates
  Uncertainty: & basic uncertainty of 3; raw data from 1 operator (Herfa-Neurode) and estimates
- gravel, crushed: 0.000311431, 0.00547245, 1.8824e-6, 0.00142572, 2.85115e-5 kg (5 suppliers, which the file names only by identifier); sum of these 0.00724 kg; lognormal variance with pedigree 0.3432, pedigree (2,3,5,5,1)
  (same comment as for cement mortar)
  properties: dry mass 1 kg, wet mass 1 kg
- packaging film, low density polyethylene: 0.00569 kg; lognormal variance with pedigree 0.3432, pedigree (2,3,5,5,1)
  EcoSpold01Location=RER
  Raw data from 1 operator (Herfa-Neurode) and estimates
  Uncertainty: & basic uncertainty of 3; raw data from 1 operator (Herfa-Neurode) and estimates
  properties: carbon content, fossil 0.857143, dry mass 1 kg, heating value, net 42.47 MJ, wet mass 1 kg
  note on carbon content, fossil: Polyethylene is formed out of a huge amount of ethylene monomers (C2H4) (ecoinvent v2.2 report 11_II). MW=28 g/mol
- plaster mixing: 0.00211 kg; lognormal variance with pedigree 0.2132, pedigree (2,3,5,5,1)
  (same comment as for anhydrite)
- sawnwood, softwood, raw, dried (u=10%): 6.17e-5 m3; lognormal variance with pedigree 0.3432, pedigree (2,3,5,5,1)
  (same comment as for alkyd paint, white, without solvent, in 60% solution state)
  properties: carbon content, non-fossil 0.494, dry mass 450 kg, heating value, net 7227.56 MJ, water content 0.2, wet mass 540 kg
  note on carbon content, non-fossil: C content of dry mass is 0.494 kgC/kg dry wood (ecoinvent v2.2 report 9)
  note on heating value, net: Assumed equal to "sawnwood, softwood, dried (u=10%), planed".The property is based on a value of 13.38MJ/kg
- steel, unalloyed: 0.131 kg; lognormal variance with pedigree 0.3432, pedigree (2,3,5,5,1)
  (same comment as for packaging film, low density polyethylene)
  properties: carbon content, fossil 0.0025, dry mass 1 kg, wet mass 1 kg
  note on carbon content, fossil: Unalloyed steels or carbon steels are those in which the level of an individual element in no case reaches or exceeds the limiting concentration given in Tab. 3.1 ecoinvent v2.2 report 10_partII. Assumed to have a C content of 0.25%

## Inputs from nature
- Volume occupied, underground deposit [natural resource, in ground]: 0.000833 m3; lognormal variance with pedigree 0.072, pedigree (1,1,5,5,1)
  uncertainty from generic waste density to calculate waste volume

## Sampling procedure
Data taken from literature sources and estimates based on information & pictures from the Herfa operators.

## Extrapolations
Data taken for one German deposit (Herfa-Neurode) were the majority of deposited Swiss hazardous waste is processed. This dataset has been copied from an original dataset covering the geography DE. The uncertainty has been adjusted accordingly.

## Review by Niels Jungbluth 2003-06-19
Passed.
