# tap water production, conventional treatment

Dataset: EcoSpold 2, unit process
Geography: RoW
Time period: 2012-01-01 to 2023-12-31
Technology level: current
Classification: ISIC rev.4 ecoinvent: 3600:Water collection, treatment and supply
Classification: EcoSpold01Categories: water supply/production
Synonyms: potable water
Scenario: Business-as-Usual
System model: Allocation, cut-off by classification
Generated by: Marylène Dussault
Database: ecoinvent
isCopyrightProtected: true
accessRestrictedTo: 1

## General comment
This dataset represents production of 1 kg of tap water under pressure at facility gate, ready for distribution in network. It represents average operation of conventional treatment for production tap water. Conventional treatment includes coagulation and decantation, filtration and disinfection. Other treatment such as oxidation (ultraviolet radiation, ozone) and other adjustment (pH, alkalinity, etc.) can be present in some plant. Inventory was constructed from reported chemicals, energy inputs and wastes from 9 distinct conventional plants located in Québec.
[This dataset is meant to replace the following datasets:
- tap water production and supply, GLO, 2000 - 2000]

## Included activities start
From the intake pumping of raw surface water into the water treatment plant.

## Included activities end
This dataset ends with the production of tap water, at facility gate, under pressure. It includes energy for intake pumping, treatment system, lighting and heating of the building as well as the energy of the pump pressurizing water to the beginning of the network. It includes all chemicals and material added to the water during treatment and, when needed, ultraviolent lamps for replacement. It excludes energy for pumping stations and water losses within the network as they are included in the tap water market. Emissions to the environment occurring during the treatment and during the distribution were not considered as they are assumed negligible. Main substance in water that would be released in the environment are assumed to be considered in wastewater processes.

## Geography
Extrapolated from data from nine conventional treatment plants in Quebec (Canada). The uncertainty was adjusted accordingly.

## Time period
Time of publication.

## Parameters
- unit conversion, days in a year: 365.25 d/year; name days_per_year; lognormal variance with pedigree 0.0006, pedigree (1,1,1,1,1)
  Conversion factor.

## Reference product
- tap water: 1 kg; name tapwater; By-product classification allocatable product; CPC 18000: Natural water; CAS 7732-18-5
  production volume 2.65749e14 kg; name PV_tapwater; = ((4e15*0.3)-3.5E12)*0.4
    Calculated value based on literature data and expert judgement. The amount of freshwater which falls as rainwater is 110000km3/year. Out of that only 40000km3/year is converted into surface runoff (http://www.fao.org/nr/water/aquastat/water_use/index.stm, accessed 20140522). The total water withdrawal in the world is around 4000km3/year, i.e. 4E15kg (cross-referenced with 3 publications; Shiklomanov, 2003, UN - http://unesdoc.unesco.org/images/0022/002257/225741E.pdf and http://unesdoc.unesco.org/images/0018/001819/181993e.pdf, accessed 20140522). Out of that app. 70% goes for irrigation (http://www.fao.org/nr/water/aquastat/water_use/index.stm, accessed 20140522), thus 1.2E15kg is left for municipal and industrial use.
    The total tap water production technology shares in the world, present in the ecoinvent database are calculated to be as follows; tap water production, conventional treatment - 40%, tap water production, conventional with biological treatment - 11%, tap water production, direct filtration treatment - 18.5%, tap water production, microstainer treatment - 2.2%, tap water production, ultrafiltration treatment - 2.3%, tap water production, seawater reverse osmosis conventional pretreatment, enhance module, single - 0.5%, tap water production, seawater reverse osmosis, conventional pretreatment, enhance module, single stage - 0.1%, tap water production, seawater reverse osmosis, conventional pretreatment, enhance module, two stages - 0.066%, tap water production, seawater reverse osmosis, ultrafiltration pretreatment, baseline module, single stage - 0.049%, tap water production, seawater reverse osmosis, ultrafiltration pretreatment, enhance module, single stage - 0.01%, tap water production, seawater reverse osmosis, ultrafiltration pretreatment, enhance module, two stages - 0.007%, tap water production, underground water with chemical treatment - 10.7%, tap water production, underground water with disinfection - 2.7%, tap water production, underground water without chemical treatment - 11.4%, tap water production, artificial recharge wells - 0.8%.
  property price 0.000397 EUR2005
    Converted from EU price by using Purchasing Power Parities (0.8458 in 2003 and 0.8426 in 2004)
  properties: carbon allocation 6.08566e-7 kg, carbon content 0.0017899, carbon content, fossil 0.0017899, carbon content, non-fossil 0, dry mass 0.00034 kg, water content 2940.18, water in wet mass 0.99966 kg, wet mass 1 kg

## Inputs from technosphere
- activated carbon, granular: 6.61041e-7 kg; name GCA; lognormal variance with pedigree 0.0212, pedigree (2,3,4,5,1)
  Measured value. Replaces charcoal proxy. Average use of activated charcoal in surveyed conventional treatment plants. Note than only 3 of the 9 conventional plants reported using this input. Plants not reporting this consumable were attributed an input value of 0 during the calculation of the weighted average.
  Uncertainty: L
  property carbon content, fossil 0.81; name GAC_C_content_fossil
  property carbon content, non-fossil 0; name GAC_C_content_non_fossil
  property dry mass 0.97 kg; name GAC_DM
  property water content 0.030928; name GAC_water_content
  property water in wet mass 0.03 kg; name GAC_WWM
  property wet mass 1 kg; name GAC_WM
  properties: heating value, net 30.23 MJ
  note on carbon content, fossil: Literature value. From Biomass and Bioenergy: Processing and Properties (2014) edited by Khalid Rehman Hakeem, Mohammad Jawaid, Umer Rashid (p. 252). Carbon content is in the range of 72-90%, an average value of 81% is taken.
- aluminium sulfate, powder: 4.02e-5 kg; lognormal variance with pedigree 0.0212, pedigree (2,3,4,5,1)
  Measured value. Value reprensent average for use of pre-hydrolysed coagulant (PASS) and average for use au aluminium sulphate solution. Note that 4 of the 9 conventional plants reported using PASS and 8 of the 9 conventional plants reported using this aluminium sulphate solution. Plants not reporting this consumable were attributed an input value of 0 during the calculation of the weighted average.
  properties: dry mass 1 kg, wet mass 1 kg
- chlorine dioxide: 1.11e-7 kg; lognormal variance with pedigree 0.0118, pedigree (2,3,4,5,1)
  Measured value. Average use of chlorine dioxide for desinfection in surveyed conventional treatment plants. Note than only 1 of the 9 conventional plants reported using this substance. Plants not reporting this consumable were attributed an input value of 0 during the calculation of the weighted average. This avoided double counting functional equivalent chemical inputs (e.g. chlorine, sodium hypochlorite).
  properties: dry mass 1 kg, wet mass 1 kg
- chlorine, liquid: 2.00236e-6 kg; lognormal variance with pedigree 0.0112, pedigree (1,3,4,5,1)
  Measured value. Average use of liquid chlorine for disinfection in surveyed conventional treatment plants. Note than 8 of the 9 conventional plants reported using this substance. Plants not reporting this consumable were attributed an input value of 0 during the calculation of the weighted average. This avoided double counting functional equivalent chemical inputs (e.g. chlorine dioxide, sodium hypochlorite).
  properties: dry mass 1 kg, wet mass 1 kg
- diesel, burned in building machine: 1.5967e-5 MJ; = diesel_use*density_diesel*NHV*43.2; lognormal variance with pedigree 0.008, pedigree (1,1,4,1,1)
  Calculated value.
  Uncertainty: C
  property density 0.84 kg/l; name density_diesel
  property fuel input in physical units, L 4.40008e-7 l; name diesel_use
  property heating value, net 1 MJ; name NHV
  note on heating value, net: Literature. net (lower) heating (calorific) value for diesel in MJ/kg
- electricity, medium voltage: 3.44177e-8, 3.8995e-7, 3.92014e-6, 4.97254e-7, 1.73987e-8, 4.42266e-8, 4.05434e-7, 3.85608e-6, 1.71288e-8, 5.05302e-6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 kWh (93 suppliers, which the file names only by identifier); sum of these 0.000427 kWh; lognormal variance with pedigree 0.0118, pedigree (2,3,4,5,1)
  Measured value. Average electricity consumption for entire process including pumping for water intake and pumping for distribution at the plant gate. All 9 plant reported electricity use. Values reported varied from 7.32e-4 to 2.74e-4 kWh/kg.
- heat, district or industrial, natural gas: 0.000178498 MJ; = fuel_input*heating_value*36.3*fuel_use; lognormal variance with pedigree 0.008, pedigree (1,1,4,1,1)
  Calculated value.
  Uncertainty: C
  property Corresponding fuel use 1.11 MJ; name fuel_use
  property fuel input in physical units, m3 4.43e-6 m3; name fuel_input
  property heating value, net 1 MJ; name heating_value
  note on Corresponding fuel use: Lower heating value of the fuel input related to the heat/electricity output
  note on fuel input in physical units, m3: Measured value. Average natural gas consumption in surveyed conventional treatment plants. Note than only 4 of the 9 conventional plants reported using natural gas. Plants not reporting natural gas were attributed an input value of 0 during the calculation of the weighted average.
- iron(III) sulfate, without water, in 12.5% iron solution state: 7.39574e-6 kg; lognormal variance with pedigree 0.0118, pedigree (2,3,4,5,1)
  Measured value. Average use of iron sulfate solution (on dry basis) for coagulation in surveyed conventional treatment plants. Note than 2 of the 9 conventional plants reported using this substance. Plants not reporting this consumable were attributed an input value of 0 during the calculation of the weighted average.
- lime, hydrated, loose weight: 6.20422e-6 kg; lognormal variance with pedigree 0.0132, pedigree (2,4,4,5,1)
  Measured value. Average use of lime for pH adjustment in surveyed conventional treatment plants. Note than 5 of the 9 conventional plants reported using this substance. Plants not reporting this consumable were attributed an input value of 0 during the calculation of the weighted average.
  properties: dry mass 0.997 kg, water content 0.00300903, wet mass 1 kg
- oxygen, liquid: 4.13518e-5 kg; lognormal variance with pedigree 0.0118, pedigree (2,3,4,5,1)
  Measured value. Average use of liquid oxygen for onsite ozone production in surveyed conventional treatment plants. Note than only 2 plants over the 9 conventional plants reported using this substance. Plants not reporting this consumable were attributed an input value of 0 during the calculation of the weighted average.
  properties: dry mass 1 kg, wet mass 1 kg
- polyacrylamide: 1.58302e-7 kg; lognormal variance with pedigree 0.0118, pedigree (2,3,4,5,1)
  Measured value. Average use of polymer for floculation in surveyed conventional treatment plants. Polymers assumed to be 100% polyacrylamide. Note than 6 plants over the 9 conventional plants reported using this substance. Plants not reporting this consumable were attributed an input value of 0 during the calculation of the weighted average.
  properties: heating value, net 23.88 MJ
- silica sand: 1.49834e-6 kg; lognormal variance with pedigree 0.0132, pedigree (3,3,4,5,1)
  Calculated value. Amount of sand to compensate losses through sand filter washing. Extrapolated to all plant from one reported value. Also includes average use of micro-sand for adjustment for this technology. Note that only 1 of the 9 conventional plants reported using micro-sand. Plants not reporting this consumable were attributed an input value of 0 during the calculation of the weighted average.
  properties: dry mass 0.99 kg, water content 0.010101, wet mass 1 kg
- sodium hydroxide, without water, in 50% solution state: 7.86e-7 kg; lognormal variance with pedigree 0.0132, pedigree (2,4,4,5,1)
  Measured value. Average use of sodium hydroxide (dry basis) for adjustement in surveyed conventional treatment plants. Note than only 1 plants over the 9 conventional plants reported using this substance. Plants not reporting this consumable were attributed an input value of 0 during the calculation of the weighted average.
  properties: dry mass 1 kg, heating value, net 3.03 MJ, wet mass 1 kg
- sodium hypochlorite, without water, in 15% solution state: 4.21e-7 kg; lognormal variance with pedigree 0.0118, pedigree (2,3,4,5,1)
  Measured value. Average use of hypochlorite (dry basis) for disinfection in surveyed conventional treatment plants. Reported concentration of solution is 12% (w/w), input of exchange "water" was added accordingly. Note than only 2 of the 9 conventional plants reported using this substance. Plants not reporting this consumable were attributed an input value of 0 during the calculation of the weighted average.
  properties: dry mass 1 kg, wet mass 1 kg
- sodium silicate, solid: 1.4438e-6 kg; lognormal variance with pedigree 0.0118, pedigree (2,3,4,5,1)
  Measured value. Average use of sodium silicate (solid state) in surveyed conventional treatment plants. Preparation of solution is reported onsite and is used in treatment as corrosion inhibitor. Note than 6 of the 9 conventional plants reported using this substance. Plants not reporting this consumable were attributed an input value of 0 during the calculation of the weighted average.
  properties: dry mass 1 kg, wet mass 1 kg
- sodium tripolyphosphate: 1.111e-7 kg; lognormal variance with pedigree 0.0118, pedigree (2,3,4,5,1)
  Measured data. Extrapolated process, represents zinc polyphosphate. Value represents average use of substance in surveyed conventional treatment plants. Note than only 1 plants over the 9 conventional plants reported using substance. Plants not reporting this consumable were attributed an input value of 0 during the calculation of the weighted average.
  properties: dry mass 1 kg, wet mass 1 kg
- spent activated carbon, granular: -6.4121e-7 kg; name spent_carbon; = GCA*0.97; lognormal variance with pedigree 0.0006, pedigree (1,1,1,1,1)
  Calculated value, assuming the dry mass of "activated carbon, granular" (0.97) ends up as byproduct.
  Uncertainty: C
  production volume; = PV_tapwater * (spent_carbon / tapwater)
    Calculated from production volume of reference product using the relative outputs.
  properties: carbon content, fossil 0.81, dry mass 1 kg, heating value, net 5.65 MJ, price 0.846 EUR2005, water content 2.33333, wet mass 3.33333 kg
  note on carbon content, fossil: Literature value. From Biomass and Bioenergy: Processing and Properties (2014) edited by Khalid Rehman Hakeem, Mohammad Jawaid, Umer Rashid (pg. 252). Carbon content is in the range of 72-90%, an average value of 81% is taken.
- tap water: 2.1e-5 kg; lognormal variance with pedigree 0.0132, pedigree (3,3,4,5,1)
  Calculated value. Water content of hypochlorite solution, prehydrolysed coagulant and aluminium sulfate.
  properties: carbon content, fossil 0.00178991, dry mass 0.000337476 kg, water content 2962.17, wet mass 1 kg
  note on carbon content, fossil: Bicarbonate content is 2.93 mol/m3. CO2 content is 0.1 mol/m3 (ecoinvent v2.2 report 8, Tab 93.1).
- ultraviolet lamp: 1.75e-10 unit; lognormal variance with pedigree 0.0118, pedigree (2,3,4,5,1)
  Measured value. Average use and replacement rates of ultraviolet lamp for water disinfection. Note than only 1 of 9 conventional plants used ultraviolet disinfection in 2012. Plants not reporting this consumable were attributed an input value of 0 during the calculation of the weighted average.
- wastewater, unpolluted: -3.26e-5 m3; name ww; lognormal variance with pedigree 0.0038, pedigree (2,3,1,5,1)
  Measured value. Average amount of wastewater produced during treatment.
  production volume; = PV_tapwater*(ww/tapwater)
    Calculated from the production volume of tap water, at user in proportion to the respective output amounts.
  properties: carbon content, fossil 0.00178991, carbon content, non-fossil 0.00178991, dry mass 0.337476 kg, water content 2962.17, wet mass 1000 kg
  note on carbon content, fossil: Assumed to be like in tap water. Bicarbonate content is 2.93 mol/m3. CO2 content is 0.1 mol/m3 (ecoinvent v2.2 report 8, Tab 93.1).
- water works, capacity 1.1E10l/year: 1.52103e-12 unit; = 1/(Q_av* days_per_year*lifetime*UnitConversion(1, 'm3', 'l')); lognormal variance with pedigree 0.008, pedigree (1,1,4,1,1)
  Calculated value. Amount of water works construction attributed to the production of 1kg of tap water. Value is based on assumed lifetime production of water treatment plant and an assumed typical medium-sized plant of 30,000 m3/day.
  Uncertainty: C
  property lifetime 60 year; name lifetime
  property plant average daily flow rate 30000 m3/d; name Q_av
  note on lifetime: Estimated Value. Expected lifetime of water works as defined in the construction process.
  note on plant average daily flow rate: Fixed values, Flow rate of a conventional water purification plant for a medium-size facility as defined in the water works process.

## Inputs from nature
- Water, lake [natural resource, in water]: 8.83863e-5 m3; name waterIn_L; lognormal variance with pedigree 0.0106, pedigree (3,1,4,1,1)
  Calculated value. Surface water withdrawal represents average withdrawal from surveyed plants. Share of subcompartiment type (river, lake) is estimated based on share number of people in Quebec desserved by water source types.
- Water, river [natural resource, in water]: 0.000944239 m3; name waterIn_R; lognormal variance with pedigree 0.0106, pedigree (3,1,4,1,1)
  (same comment as for Water, lake)

## Sampling procedure
Based on data collected from nine conventional treatment plants in Quebec. See corresponding Quebec dataset for more information. Note that percent representativeness is not supplied because technology-specific global production volumes is too uncertain. Should this information become available, the representativeness can be calculated by dividing the sum of the water treated by the Quebec plants that served as a basis for the Global dataset (1.99E11 kg/a) by the technology-specific global production volume.

## Extrapolations
From nine conventional tap water production facilities in Québec to global average. The uncertainty has been changed accordingly.
