# foaming agent production

Dataset: EcoSpold 2, unit process
Geography: GLO
Time period: 2012-01-01 to 2023-12-31
Technology level: current
Classification: ISIC rev.4 ecoinvent: 2023:Manufacture of soap and detergents, cleaning and polishing preparations, pe
Classification: EcoSpold01Categories: washing agents/tensides
Scenario: Business-as-Usual
System model: Allocation, cut-off by classification
Share of production covered: 60 %
Generated by: Catherine Reid
Published in: Zah R. 2007
Database: ecoinvent
isCopyrightProtected: true
accessRestrictedTo: 1

## General comment
This dataset represents the production of foaming agent used in the production hydrometallurgical primary zinc. This dataset is a copy of the ecoinvent v3.01 dataset "soap production, GLO 1995" used as proxy. Uncertainties have been adjusted accordinly.
"data based on the ECOSOL study of the European surfactant industry. Allocations in multioutput processes were made, using the relative mass outputs of products." as cited in original dataset.

## Included activities end
"This module contains material and energy input, production of waste and emissions for the production of soap out of fatty acids from palm and coconut oil. Transports and infrastructure have been estimated. No water consumption included." as cited in original dataset.

## Geography
"Data based on the European fatty alcohol sulfonate production" as cited in original dataset.

## Technology
"Average technology for the production of soap out of a blend of fatty acids from palm and coconut oil, representing typical European production mix in the mid 90s. The ratio of short to long fatty acid chains is 20:80, the moisture 13%." as cited in original dataset.

## Time period
Arbitrary time period chosen for the proxy dataset.

## Reference product
- foaming agent: 1 kg; name RefProd; By-product classification allocatable product; CPC 35310: Organic surface active agents, except soap; HS2017 340219: Organic surface-active agents; whether or not put up for retail sale, n.e.c. in heading no. 3402
  production volume 4 kg; name VolProd
    This is a placeholder value that does not reflect real-world production volumes. This dataset does not currenlty require a real-world production volume to work in the database framework and no actual data were collected yet. This has no negative effect on the results of the ecoinvent database.
  property carbon content, fossil 0; name RefProd_C_content_fossil
  property carbon content, non-fossil 0.69224; name RefProd_C_content_non_fossil
    "Soap (CnH2n+1 COO Na) is produced by a combined saponification and neutralisation process performed on a blend of oleochemical feedstocks comprised of short chain (C12-14, derived from coconut or palm kernel oil) and long chain (C16-18, from tallow or palm oil) esters.The ratio of short to long fatty acid chains is 20:80 (ecoinvent v2.2 report 12). Short fatty acid has been estimated as C12.5H(2*12.5+1); MW R=176 g/mol. Long fatty acid has been estimated as C16H(2*16+1); MW R=225 g/mol. MW of COONa=67 g/mol." as cited for soap reference product in ecoinvent v3.01 dataset "soap production, GLO 1995".
  property dry mass 0.87 kg; name RefProd_DM; = RefProd_WM - RefProd_WWM
  property heating value, net 17.93 MJ
    LHV is calculated based on the Carbon content of the product. More details can be found on the respective documentation.
  property price 0.77 EUR2005
    Calculated value based on data from United Nations Commodity Trade Statistics Database (comtrade.un.org). UN comtrade category: 340120 Soaps nes. Year 2005. Using exchange rate of 1EURO = 1.209 USD. Average of price of import into 5 main markets (EU, US, JP, IN and CN).
  property water content 0.149425; name RefProd_water_content; = RefProd_WWM / RefProd_DM
  property water in wet mass 0.13 kg; name RefProd_WWM
  property wet mass 1 kg; name RefProd_WM
  properties: carbon allocation 0.602249 kg, carbon content 0.69224

## Inputs from technosphere
- chemical factory, organics: 4e-10 unit; lognormal variance with pedigree 0.53, pedigree (5,5,5,5,5)
  EcoSpold01Location=RER
  As cited in original dataset.
  Uncertainty: No data collected. The uncertainty has been maximized.
- coconut oil, crude: 0.139 kg; lognormal variance with pedigree 0.23, pedigree (5,5,5,5,5)
  EcoSpold01Location=PH
  As cited in original dataset.
  Uncertainty: No data collected. The uncertainty has been maximized.
  properties: carbon content, non-fossil 0.75, dry mass 1 kg, heating value, net 38.4 MJ, wet mass 1 kg
  note on carbon content, non-fossil: C-content/dry mass of fats and oils considered 75%, from: "Evolutionary and Biochemical Aspects", A.D. Kay and T. Vrede (in Global Ecology, 2010, Elsevier B.V., S.E. Jørgensen Ed.)
  note on heating value, net: Values is approximated from HHV from "vegetable oil, crude". Source: Radovanovic,M.; Zivanovic,T.; Stojiljkovic,D.; Jovanovic,V.; Jerinic,N.; Knezevic,S. et.al. Utilization of sunflower husk as a fuel for industrial boilers - 20 years experience. Proc. 5th Eur. Conf. on Industrial Furnaces&Boilers 2000,vol.2,p.221-233. Available at: https://phyllis.nl/Biomass/View/2152
- electricity, medium voltage: 0.0499736 kWh; lognormal variance with pedigree 0.23, pedigree (5,5,5,5,5)
  EcoSpold01Location=UCTE
  As cited in original dataset.
  Uncertainty: No data collected. The uncertainty has been maximized.
- fatty acid: 0.016 kg; lognormal variance with pedigree 0.23, pedigree (5,5,5,5,5)
  (same comment as for chemical factory, organics)
  properties: carbon content, non-fossil 0.75, dry mass 1 kg, heating value, net 22.73 MJ, wet mass 1 kg
  note on carbon content, non-fossil: C-content/dry mass of fats and oils considered 75%, from: ecoinvent v2.2 report, n 15a, pg 40
- heat, district or industrial, natural gas: 2.9792 MJ; lognormal variance with pedigree 0.23, pedigree (5,5,5,5,5)
  Uncertainty: No data collected. The uncertainty has been maximized.
  properties: heating value, net 1 MJ
- heat, district or industrial, other than natural gas: 1.66286 MJ; lognormal variance with pedigree 0.23, pedigree (5,5,5,5,5)
  Uncertainty: No data collected. The uncertainty has been maximized.
  properties: heating value, net 1 MJ
- inert waste, for final disposal: -0.00237454, -1.54589e-5 kg (2 suppliers, which the file names only by identifier); sum of these -0.00239 kg; lognormal variance with pedigree 0.23, pedigree (5,5,5,5,5)
  EcoSpold01Location=CH
  As cited in original dataset.
  Uncertainty: No data collected. The uncertainty has been maximized.
  production volume; = VolProd*inert/refProd
    Calculated from the production volume of foaming agent in proportion to the respective output amounts.
  properties: dry mass 0.995 kg, water content 0.00502513, wet mass 1 kg
- palm oil, crude: 0.614 kg; lognormal variance with pedigree 0.23, pedigree (5,5,5,5,5)
  EcoSpold01Location=MY
  As cited in original dataset.
  Uncertainty: No data collected. The uncertainty has been maximized.
  properties: carbon content, non-fossil 0.752881, dry mass 1 kg, heating value, net 37 MJ, wet mass 1 kg
  note on carbon content, non-fossil: C49H97O6. Palm oil (tab 17.4, ecoinvent v2.2 report 17-part 17)
  note on heating value, net: Literature value, Source: Biograce, Condensed list of standard values, version 2 - Public. Available at: https://biograce.net/app/webroot/files/file/BioGrace_condensed_list_of_standard_values_-_version_2_-_Public.doc
- sodium chloride, powder: 0.005 kg; lognormal variance with pedigree 0.23, pedigree (5,5,5,5,5)
  (same comment as for chemical factory, organics)
  properties: dry mass 1 kg, wet mass 1 kg
- sodium hydroxide, without water, in 50% solution state: 0.0105864, 0.108414 kg (2 suppliers, which the file names only by identifier); sum of these 0.119 kg; lognormal variance with pedigree 0.23, pedigree (5,5,5,5,5)
  (same comment as for chemical factory, organics)
  properties: dry mass 1 kg, heating value, net 3.03 MJ, wet mass 1 kg

## Emissions to nature
- Carbon dioxide, fossil [air, urban air close to ground]: 3.5e-5 kg; lognormal variance with pedigree 0.23, pedigree (5,5,5,5,5)
  As cited in original dataset.
  Uncertainty: No data collected. The uncertainty has been maximized.
- Carbon dioxide, non-fossil [air, urban air close to ground]: 0.00635 kg; lognormal variance with pedigree 0.23, pedigree (5,5,5,5,5)
  (same comment as for Carbon dioxide, fossil)
- Carbon monoxide, fossil [air, urban air close to ground]: 3.32e-6 kg; lognormal variance with pedigree 0.87, pedigree (5,5,5,5,5)
  (same comment as for Carbon dioxide, fossil)
- Chlorine [air, urban air close to ground]: 6.11e-8 kg; lognormal variance with pedigree 0.26, pedigree (5,5,5,5,5)
  (same comment as for Carbon dioxide, fossil)
- Mercury II [air, urban air close to ground]: 3.3e-7 kg; lognormal variance with pedigree 0.87, pedigree (5,5,5,5,5)
  (same comment as for Carbon dioxide, fossil)
- Methane, fossil [air, urban air close to ground]: 0.000178 kg; lognormal variance with pedigree 0.23, pedigree (5,5,5,5,5)
  (same comment as for Carbon dioxide, fossil)
- NMVOC, non-methane volatile organic compounds [air, urban air close to ground]: 4.5e-6 kg; lognormal variance with pedigree 0.26, pedigree (5,5,5,5,5)
  (same comment as for Carbon dioxide, fossil)
- Particulate Matter, > 10 um [air, urban air close to ground]: 0.000151 kg; lognormal variance with pedigree 0.26, pedigree (5,5,5,5,5)
  (same comment as for Carbon dioxide, fossil)
- Sulfur dioxide [air, urban air close to ground]: 1.11e-5 kg; lognormal variance with pedigree 0.23, pedigree (5,5,5,5,5)
  (same comment as for Carbon dioxide, fossil)
- Acidity, unspecified [water, surface water]: 4.19e-6 kg; lognormal variance with pedigree 0.26, pedigree (5,5,5,5,5)
  (same comment as for Carbon dioxide, fossil)
- BOD5, Biological Oxygen Demand [water, surface water]: 0.00134 kg; lognormal variance with pedigree 0.26, pedigree (5,5,5,5,5)
  (same comment as for Carbon dioxide, fossil)
- COD, Chemical Oxygen Demand [water, surface water]: 0.00638 kg; lognormal variance with pedigree 0.26, pedigree (5,5,5,5,5)
  (same comment as for Carbon dioxide, fossil)
- Chromium III [water, surface water]: 2.01e-7 kg; lognormal variance with pedigree 0.87, pedigree (5,5,5,5,5)
  (same comment as for Carbon dioxide, fossil)
- DOC, Dissolved Organic Carbon [water, surface water]: 0.00236296 kg; lognormal variance with pedigree 0.26, pedigree (5,5,5,5,5)
  Calculated as equal to TOC.
  Uncertainty: No data collected. The uncertainty has been maximized.
- Dissolved solids [water, surface water]: 0.00244 kg; lognormal variance with pedigree 0.26, pedigree (5,5,5,5,5)
  (same comment as for Carbon dioxide, fossil)
- Iron ion [water, surface water]: 0.00061 kg; lognormal variance with pedigree 0.87, pedigree (5,5,5,5,5)
  (same comment as for Carbon dioxide, fossil)
- Lead II [water, surface water]: 1.61e-8 kg; lognormal variance with pedigree 0.87, pedigree (5,5,5,5,5)
  (same comment as for Carbon dioxide, fossil)
- Mercury II [water, surface water]: 3.82e-8 kg; lognormal variance with pedigree 0.87, pedigree (5,5,5,5,5)
  (same comment as for Carbon dioxide, fossil)
- Nickel II [water, surface water]: 3.53e-8 kg; lognormal variance with pedigree 0.87, pedigree (5,5,5,5,5)
  (same comment as for Carbon dioxide, fossil)
- Nitrogen [water, surface water]: 6.06e-6 kg; lognormal variance with pedigree 0.87, pedigree (5,5,5,5,5)
  (same comment as for Carbon dioxide, fossil)
- Sulfide [water, surface water]: 2.7e-6 kg; lognormal variance with pedigree 0.26, pedigree (5,5,5,5,5)
  (same comment as for Carbon dioxide, fossil)
- Suspended solids, unspecified [water, surface water]: 0.00144 kg; lognormal variance with pedigree 0.26, pedigree (5,5,5,5,5)
  (same comment as for Carbon dioxide, fossil)
- TOC, Total Organic Carbon [water, surface water]: 0.00236296 kg; lognormal variance with pedigree 0.26, pedigree (5,5,5,5,5)
  Calculated by default as TOC (gC) = COD/2.7 (COD measured in g O2). Should more correctly be calculated from the carbon content of the specified emissions to water.
  Uncertainty: No data collected. The uncertainty has been maximized.
- Zinc II [water, surface water]: 1.77e-7 kg; lognormal variance with pedigree 0.87, pedigree (5,5,5,5,5)
  (same comment as for Carbon dioxide, fossil)

## Sampling procedure
"data out of ECOSOL study of European Surfactant Industry. Common translation rules used, reported in Chemical report (Althaus et al. 2003)." as cited in original dataset.

## Extrapolations
"unspecified metal emissions to water omitted. This dataset has been copied from an original dataset covering the geography RER. The uncertainty has been adjusted accordingly." as cited in original dataset.
