# bleaching and dyeing, yarn

Dataset: EcoSpold 2, unit process
Geography: RoW
Time period: 2017-01-01 to 2023-12-31
Technology level: current
Classification: ISIC rev.4 ecoinvent: 1313:Finishing of textiles
Scenario: Business-as-Usual
System model: Allocation, cut-off by classification
Generated by: [System]
Database: ecoinvent
isCopyrightProtected: true
accessRestrictedTo: 1

## General comment
This dataset covers all relevant input and output flows for bleaching and dyeing of 1 kg greige yarn as a service activity. The inventory is mainly based on industry data and is supplemented, where necessary, with secondary processing energy data from machinery manufacturers. The dataset is a weighted average of the respective datasets in India and Bangladesh.
Bleaching:
This activity bleaches greige yarn. Bleaching improves whiteness by removing natural coloration and remaining trace impurities from the cotton; the degree of bleaching necessary is determined
by the required whiteness and absorbency.
Dyeing:
This inventory is for dyeing 40/2 CW count greige yarn to the dye shade 18-309.
This activity is modeled as a service, so no input of yarn is considered.

## Included activities start
The bleaching activity starts with loading the greige yarn into the dyeing machine. However, this activity is modeled as a service, so no input of greige yarn is considered in the inputs from technosphere.

## Included activities end
This datasets ends with 1 kg of this service which has to be used with 1 kg of yarn. Drying is included.

## Technology
Mixture of autoclave and package dyeing.

## Reference product
- bleaching and dyeing, yarn: 1 kg; By-product classification allocatable product; CPC 9715: Dyeing and colouring services
  production volume 6.96628e10 kg; name PV_RP
    Based on the The Fiber Year report 2017 for the overall amount of fibre and assumptions on losses along the supply chain (about 15% average up to yarn preparation, calculation based on FAO World Apparel Fiber Consumption Survey 2013)
  property price 0.723913 EUR2005
    Calculated based on inputs: The price of the product has been calculated as a sum of the values of the material and energy inputs for this product. This value is therefore a rough estimation. It may underestimate the real price since there are additional expenses when producing any product. These expences can include for example labour costs, treatment of waste materials and profit for the producer. Please consider carefully whether this level of data quality is acceptable for your application.
  properties: carbon allocation 0 kg, carbon content 0

## Inputs from technosphere
- acetic acid, without water, in 98% solution state: 0.00771277 kg; lognormal variance with pedigree 0.022, pedigree (4,1,3,5,1)
  Industry data. This value is attributed only to the dyeing part of the process.
  properties: carbon content, fossil 0.400016, dry mass 1 kg, heating value, net 14.6 MJ, wet mass 1 kg
  note on heating value, net: Based on literature, page 10, Althaus H.-J., Chudacoff M., Hischier R., Jungbluth N., Osses M. and Primas A. (2007) Life Cycle Inventories of Chemicals. Final report ecoinvent data v2.0 No. 8. EMPA, Swiss Centre for Life Cycle Inventories, Dübendorf, CH, Online-Version under: www.ecoinvent.org.
- building, hall: 1.02333e-6 m2; lognormal variance with pedigree 0.3046, pedigree (2,1,3,5,1)
  total building area (square meters) divided by production per year and life time of the plant
- building, hall, steel construction: 1.53556e-5 m2; lognormal variance with pedigree 0.022, pedigree (4,1,3,5,1)
  Industry data. This value is attributed only to the dyeing part of the process.
- chemical, inorganic: 0.0849452 kg; lognormal variance with pedigree 0.0126, pedigree (4,1,3,5,1)
  Industry data. 0.09 kg of chemical, inorganic, refer only to the process of bleaching while the rest 0.081922 kg are attributed to the dyeing process.
  properties: carbon content, fossil 0.003, dry mass 1 kg, wet mass 1 kg
  note on carbon content, fossil: This dataset is an unweighted average of 20 inorganic substances (listed in Tab 88.1, ecoinvent v2.2 report 8, part II), being part of the top100 chemicals included in this database. The C-content has also been calculated as an unweighted average of the C content of the substances composing this dataset.
- chemical, organic: 0.00394436 kg; lognormal variance with pedigree 0.0126, pedigree (4,4,3,1,1)
  sum of unspecified chemicals used in dyeing process. These are dye chemicals, stablising agent (cantovel gel), wetting agent (soap), sequencing agent and levelling agent.
  properties: carbon content, fossil 0.628, dry mass 1 kg, heating value, net 19.03 MJ, wet mass 1 kg
  note on carbon content, fossil: This dataset is an unweighted average of 20 organic substances (listed in Tab 88.1, ecoinvent v2.2 report 8, part II), being part of the top100 chemicals included in this database. The C-content has also been calculated as an unweighted average of the C content of the substances composing this dataset.
- diesel, burned in diesel-electric generating set, 18.5kW: 0.305096 MJ
  Diesel used for power backup. Forumula includes diesel consumption in liters multiplied density of fule and its calorific value
- electricity, low voltage: 0.00120842, 0.00653868, 0.000254114, 9.88012e-5, 0.00689682, 0.00164388, 9.91391e-5, 0.000338811, 0.000135376, 0.0608712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 kWh (46 suppliers, which the file names only by identifier); sum of these 0.172369 kWh; lognormal variance with pedigree 0.0066, pedigree (1,4,3,5,1)
  sum of electricity used for:
  dyeing machine
  boiler
  hydro extractor
  dryer
  yarn conditioning
- electricity, medium voltage: 0.000667414, 5.93609e-5, 0.00517563, 0.00678216, 0.00718234, 0.00365833, 0.000505271, 0.00319799, 0.000134995, 0.0216134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 kWh (46 suppliers, which the file names only by identifier); sum of these 0.730658 kWh; lognormal variance with pedigree 0.0126, pedigree (4,1,3,5,1)
  Industry data. 0.325208333 kWh of electricity refer only to the process of bleaching while the rest 0.4568625 kWh are attributed to the dyeing process.
- heat, district or industrial, natural gas: 0.607269 MJ
  Industry data reported in 2030 Water Resources Group report - An analysis of Industrial water use in Bangladesh with a focus on the textile and leather industries.
  properties: heating value, net 1 MJ
- hydrogen peroxide, without water, in 50% solution state: 0.00255281, 0.0121185 kg (2 suppliers, which the file names only by identifier); sum of these 0.0146713 kg; lognormal variance with pedigree 0.0126, pedigree (4,1,3,5,1)
  Industry data. This value is attributed only to the bleaching part of the process.
  properties: dry mass 1 kg, heating value, net 7.13 MJ, wet mass 1 kg
- soda ash, light: 0.113643, 0.0254217 kg (2 suppliers, which the file names only by identifier); sum of these 0.139064 kg; lognormal variance with pedigree 0.022, pedigree (4,1,3,5,1)
  Industry data. This value is attributed only to the dyeing part of the process.
  properties: carbon content, fossil 0.0517241, dry mass 1 kg, heating value, net 3.43 MJ, wet mass 1 kg
- sodium chloride, powder: 0.0098609 kg; lognormal variance with pedigree 0.0146, pedigree (4,4,3,5,1)
  For preparing Ready For Dyeing (RFD) solution
  properties: dry mass 1 kg, wet mass 1 kg
- sodium hydroxide, without water, in 50% solution state: 0.00148063, 0.0151629 kg (2 suppliers, which the file names only by identifier); sum of these 0.0166435 kg; lognormal variance with pedigree 0.0126, pedigree (4,1,3,5,1)
  Industry data. This value is attributed only to the bleaching part of the process.
  properties: dry mass 1 kg, heating value, net 3.03 MJ, wet mass 1 kg
- sodium sulfate, anhydrite: 0.0209876, 0.128494 kg (2 suppliers, which the file names only by identifier); sum of these 0.149482 kg; lognormal variance with pedigree 0.022, pedigree (4,1,3,5,1)
  Industry data. This value is attributed only to the dyeing part of the process.
  properties: dry mass 1 kg, wet mass 1 kg
- steam, in chemical industry: 3.86789, 0.681958 kg (2 suppliers, which the file names only by identifier); sum of these 4.54985 kg
  (same comment as for heat, district or industrial, natural gas)
  properties: dry mass 1 kg, wet mass 1 kg
- tap water: 0.0021008, 0.00320249, 0.00597569, 0.0160981, 0.00193778, 0.924112, 0.690057 kg (7 suppliers, which the file names only by identifier); sum of these 1.64348 kg; lognormal variance with pedigree 0.0066, pedigree (1,4,3,5,1)
  For preparing Ready For Dyeing (RFD) solution
  properties: carbon content, fossil 0.00178991, dry mass 0.000337476 kg, water content 2962.17, wet mass 1 kg
  note on carbon content, fossil: Bicarbonate content is 2.93 mol/m3. CO2 content is 0.1 mol/m3 (ecoinvent v2.2 report 8, Tab 93.1).
- wastewater from textile production: -0.118714 m3; name WW
  Industry data. 0.00566 m3 refer only to the process of bleaching while the rest 0.12 m3 of wastewater are attributed to the dyeing process.
  production volume; = pv_rp*ww
    Calculated from production volume of reference product using the relative outputs.

## Inputs from nature
- Water, well, in ground [natural resource, in water]: 0.117399 m3
  Industry data. 0.00566 m3 refer only to the process of bleaching while the rest 0.12 m3 of water input are attributed to the dyeing process.

## Emissions to nature
- Water [air, urban air close to ground]: 0.000328697 m3; lognormal variance with pedigree 0.0146, pedigree (4,4,3,5,1)
  Considering 20% evaporation rate

## Sampling procedure
Industry data. Representative mills in Bangladesh. The mills were chosen to provide data based on their technical representation of the current state of business and their willingness to participate.
