# cement mortar production, hand-mixed, on-site

Dataset: EcoSpold 2, unit process
Geography: RoW
Time period: 2014-04-01 to 2023-12-31
Technology level: current
Classification: ISIC rev.4 ecoinvent: 2394:Manufacture of cement, lime and plaster
Scenario: Business-as-Usual
System model: Allocation, cut-off by classification
Generated by: [System]
Published in: Kiran Ananth P. V. 2017
Database: ecoinvent
isCopyrightProtected: true
accessRestrictedTo: 1

## General comment
Mortar is used to hold building materials such as brick or stone together. It is composed of a thick mixture of water, sand, and cement. The water is used to hydrate the cement and hold the mix together. The water to cement ratio is higher in mortar than in concrete in order to form its bonding element. When mixed, it is a much thicker substance than concrete, making it ideal as a glue for building materials like brick.
The differences between mortar and plaster lie in the capacity of plasters to take better finish, which depend to a very large extent on the type of sand used in the mix. For plasters we use finer sand. However in mortar we use coarse particles of sand.
Mix ratio is the volumetric mixing ratio of cement and aggregates. Mix Ratio varies from 1:3 to 1:6 depending upon the application area. The mix ratio accounted for is 1:3.
This dataset is fit with hand-mixed on site mortor production. Hand-mixed on site mortor used for larger area of application like big buildings.
This dataset is a copy of the corresponding regional dataset fro IN.

## Included activities start
Activities starts with reception of cement, aggregates and water at civil site.

## Included activities end
Activity ends with cement mortar, ready to be applied.The tap water consumption for cleaning the container and tools is excluded due to lack of data.

## Geography
The data is copied from the corresponding dataset for IN. It is considered to be representative for a GLO average of hand-mixed cement mortar.

## Technology
Mixing of cement, aggregates and water done by hand mixing.

## Time period
Data available for above period.

## Reference product
- cement mortar: 1 kg; By-product classification allocatable product; CPC 3733: Refractory cements, mortars, concretes and similar compositions n.e.c.; HS2017 252329: Cement; portland, other than white, whether or not artificially coloured
  production volume 1.6107e9 kg; = 59E+09*14%*0.2
    The production volume of pre-mixed dry mortars worldwide is estimated to be: "Total production of cement/gypsum/lime based dry mortars worldwide is 59,0 million tons, of which 57% is produced in Western Europe, 14% in Eastern Europe, 10% in Asia/Pacific, and about 6% each in North America, Latin America and Middle East/Africa."(Schinski, E., n.d. Dry mortars - Markets and Trends. Hercules GmbH, Aqualon Division, Düsseldorf, Germany. Retrieved from: http://www.apfac.pt/congresso2005/comunicacoes/Paper%2056.pdf, accessed 20171025). According to Schinski (n.d.), 35% of dry mix mortars are cement based renders, 32% are cement tiles, 17% are gypsum plasters and 14% are cement based mortars. The production volume is therefore calculated as 59 million tons *14%. 80% of cement mortar is assumed to be machine-mixed, the rest is assumed to be hand-mixed.
  property price 0.094 EUR2005
    Calculated value based on data from United Nations Commodity Trade Statistics Database (comtrade.un.org). UN comtrade category: 252321 Portland cement, white or white artificially coloured. Year 2005. Using exchange rate of 1EURO = 1.209 USD. Average of price of import into 5 main markets (EU, US, JP, IN and CN).
  properties: carbon allocation 0 kg, carbon content 0, carbon content, fossil 0, carbon content, non-fossil 0, dry mass 1 kg, water content 0, water in wet mass 0 kg, wet mass 1 kg

## Inputs from technosphere
- cement, unspecified: 0.000349791, 0.014753, 0.00641198, 0.000165672, 0.00390748, 0.000764355, 0.000558707, 0.000302804, 0.000601823, 0.000920084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 kg (11 suppliers, which the file names only by identifier); sum of these 0.2732 kg; lognormal variance with pedigree 0.0833, pedigree (5,2,5,5,2)
  Calculated value. For Cement mortar mix ratio assumed here is 1:3 (volume basis). Density of Cement 1440 kg/m3 and density of sand 1600 kg/m3 considered for calculation purpose.
  properties: dry mass 1 kg, wet mass 1 kg
- sand: 0.0111624, 0.00013365, 0.726404 kg (3 suppliers, which the file names only by identifier); sum of these 0.7377 kg; lognormal variance with pedigree 0.0833, pedigree (5,2,5,5,2)
  (same comment as for cement, unspecified)
  properties: dry mass 1 kg, wet mass 1 kg
- tap water: 2.14748e-7, 3.27365e-7, 6.10847e-7, 1.64558e-6, 1.98083e-7, 9.44645e-5, 7.05389e-5 kg (7 suppliers, which the file names only by identifier); sum of these 0.000168 kg; lognormal variance with pedigree 0.0833, pedigree (5,2,5,5,2)
  Calculated value. Usually around 20% of water by weight of the total dry material is mixed in the mixture to achieve the desire workability. For Cement mortar mix ratio assumed here is 1:3 (volume basis). Density of Cement 1440 kg/m3 and density of sand 1600 kg/m3 considered for calculation purpose.
  properties: carbon content, fossil 0.00178991, dry mass 0.000337476 kg, water content 2962.17, wet mass 1 kg
  note on carbon content, fossil: Bicarbonate content is 2.93 mol/m3. CO2 content is 0.1 mol/m3 (ecoinvent v2.2 report 8, Tab 93.1).

## Emissions to nature
- Water [air, unspecified]: 0.0001344 m3; = water_input*0.8; lognormal variance with pedigree 0.1232, pedigree (5,3,5,5,4)
  Assumed value. It was considered that 80% of water vanish in air and remaining 20% water stream.
- Water [water, unspecified]: 3.36e-5 m3; = water_input*0.2; lognormal variance with pedigree 0.1232, pedigree (5,3,5,5,4)
  (same comment as for Water)

## Sampling procedure
Data collected by consulting with 2 cement mortar manufacturer located in India and secondary research.

## Extrapolations
For data received from secondary research uncertainity adjusted accordingly.
