# corrugated board box production

Dataset: EcoSpold 2, unit process
Geography: CA-QC
Time period: 2008-01-01 to 2023-12-31
Technology level: current
Classification: ISIC rev.4 ecoinvent: 1702:Manufacture of corrugated paper and paperboard and of containers of paper a
Classification: EcoSpold01Categories: paper & cardboard/cardboard & corrugated board
Tags: single enterprise data
Scenario: Business-as-Usual
System model: Allocation, cut-off by classification
Share of production covered: 5 %
Generated by: Hugues Imbeault-Tétreault
Database: ecoinvent
isCopyrightProtected: true
accessRestrictedTo: 1

## General comment
This datsets represents the production of corrugated board boxes.
The factory where data were collected produces many types of boxes with different raw materials, sizes, printing processes, etc.
In 2008, double wall (one B flute and one C flute) boxes were 3% of the production and 97% of the production was single wall boxes, 50% B flute and 50% C flute with respective take-up factors (length of medium to liner) of 1.329 and 1.442.

## Included activities start
From reception of the linerboard, fluting medium, inks and glue, at the factory gate.
Linerboard inputs are reported as ''Linerboard, recycled brown'' (94%), ''Linerboard, full white (WK)'' (5%) and ''Linerboard, virgin white top (1%)''.

## Included activities end
This activity ends with the printing and cutting of cardboard sheets into unfolded boxes which are then ready for delivery.
The dataset includes corrugated board production, i.e. gluing of linerboard and fluting into cardboard, printing and cutting into unfolded boxes.
The machine on which containerboard components are combined into corrugated board is a “corrugator-combiner”, usually referred to simply as a “corrugator”. The process begins at the “single facer” where corrugating medium is conditioned before being passed through a set of corrugating rolls to form the flutes. Starch adhesive is applied to the flute tips on one side of the medium. This material is then brought into contact with the single-face liner and, under heat and pressure, the two components are combined as the single face web. This web is then carried on an overhead “bridge” to the “glue machine”, where adhesive is applied to the unfaced flute tips to affix the second flat facing, which joins the web as it passes into the “double-facer”. The moist adhesive dries in the heat of the double facer section and the combined board passes from there through the “slitter scorer” and “cut-off” from which it is delivered in sheet form to the “take-off”. Then, the corrugated board blanks from the staging lines are fed into the Flexo Folder-Gluer.The first stage of the box production is printing, which can include one or more printing stages. The printed board sheets then pass into the scoring and slotting section where vertical slots are applied, the glue lug is cut out and glue applied to it, and finally enters the folding rails.

## Technology
Average of present used technology

## Reference product
- corrugated board box: 1 kg; name corrugatedBoardBoxAmount; By-product classification allocatable product; CPC 32153: Cartons, boxes, cases, record sleeves and other packing containers (except bags) of paper, paperboard, cellulo[…]; HS2017 481910: Paper and paperboard; cartons, boxes and cases, of corrugated paper or paperboard
  EcoSpold01Location=RER
  production volume 9.9705e8 kg; name corrugatedBoardBoxProductionVolume
    Calculated from the annual production volume of corrugated board and the amount of corrugated board needed to produce one box (1,0491 ton of corrugated board/ton of boxes).
  property carbon content, fossil 0.00365437
    C content was calculated as an addition of C content in the raw materials.
  property carbon content, non-fossil 0.450248
    C content was calculated as an addition of C content in the raw materials.
  property heating value, net 12.86 MJ
    LHV is calculated based on the Carbon content of the product. More details can be found on the respective documentation.
  properties: carbon allocation 0.428937 kg, carbon content 0.453902, dry mass 0.945 kg, price 0.844 EUR2005, water content 0.0582011, water in wet mass 0.055 kg, wet mass 1 kg

## Inputs from technosphere
- borax, anhydrous, powder: 0.0003526 kg; lognormal variance with pedigree 0.0426, pedigree (1,4,5,1,1)
  Reported as ''borax (100% solids)''.
  properties: dry mass 1 kg, wet mass 1 kg
- butadiene: 4.588e-5 kg; lognormal variance with pedigree 0.0426, pedigree (1,4,5,1,1)
  Proxy. Reported as ''styrene (25%)-butadiène (25%) (50% solids)".
  properties: carbon content, fossil 0.857143, dry mass 1 kg, heating value, net 40.35 MJ, wet mass 1 kg
- carbon dioxide, liquid: 0.000207426 kg; lognormal variance with pedigree 0.0426, pedigree (1,4,5,1,1)
  Proxy. Reported as ''Dry ice''. (100% solid)
  properties: carbon content, fossil 0.272727, dry mass 1 kg, heating value, net 8.27 MJ, wet mass 1 kg
- containerboard, fluting medium: 0.3727 kg; lognormal variance with pedigree 0.0426, pedigree (1,4,5,1,1)
  Reported as ''corrugated board, recycled brown'' with a 40% recycled content.
  properties: carbon content, non-fossil 0.46, dry mass 0.92592 kg, heating value, net 15.92 MJ, water content 0.08, wet mass 1 kg
- containerboard, linerboard: 0.7434 kg; lognormal variance with pedigree 0.0426, pedigree (1,4,5,1,1)
  Reported as "linerboard, recycled brown" (94%), "linerboard, full white (WK)" (5%) and "linerboard, virgin white top" (1%).
  properties: carbon content, non-fossil 0.46, dry mass 0.925926 kg, heating value, net 15.92 MJ, water content 0.08, wet mass 1 kg
- electricity, medium voltage: 0.1012 kWh; lognormal variance with pedigree 0.0426, pedigree (1,4,5,1,1)
- ethylene vinyl acetate copolymer: 7.66905e-5 kg; name glue; = (glue_amount1 + glue_amount2)*1000; lognormal variance with pedigree 0.04, pedigree (1,1,5,1,1)
  Proxy for glue and hot melt.
  property amount of exchange 1 6.63192e-5 kg; name glue_amount1
  property amount of exchange 2 1.03713e-5 kg; name glue_amount2
  properties: carbon content, fossil 0.79734, dry mass 1 kg, heating value, net 35.99 MJ, wet mass 1 kg
- maize starch: 0.03191 kg; lognormal variance with pedigree 0.0426, pedigree (1,4,5,1,1)
  Reported as ''maize starch (powder, 100% solids)"
  properties: carbon content, non-fossil 0.46, dry mass 0.86 kg, heating value, net 11.64 MJ, water content 0.162791, wet mass 1 kg
  note on carbon content, non-fossil: C-content of starch is considered 46% on dry mass basis (from "Evolutionary and Biochemical Aspects", A.D. Kay and T. Vrede (in Global Ecology, 2010, Elsevier B.V., S.E. Jørgensen Ed.)).
- municipal solid waste: -0.003397 kg; name domesticwasteAmount; lognormal variance with pedigree 0.0026, pedigree (1,4,1,1,1)
  EcoSpold01Location=CH
  Proxy. Reported as '' domestic waste''. These wastes are send to a sanitary landfill.
  production volume; = corrugatedBoardBoxProductionVolume*domesticwasteAmount/corrugatedBoardBoxAmount
    Calculated from production volume of reference product using the relative outputs.
  properties: carbon content, fossil 0.171549, carbon content, non-fossil 0.261655, dry mass 0.771 kg, heating value, net 11.74 MJ, water content 0.297017, wet mass 1 kg
  note on carbon content, fossil: MSW composition in tab 4.1, ecoinvent v2.2 report 13_I. C content referred to 1 kg DM
  note on heating value, net: Value taken from the general comment of the treatment dataset.
- packaging box factory: 1.42857e-9 unit; lognormal variance with pedigree 0.51, pedigree (5,5,5,5,5)
  EcoSpold01Location=RER
  The amount is calculated based on the annual capacity of the factory (14kt paper) and the lifetime of 50 years. See ecoinvent datasets "packaging box factory construction, RER, 1993-2000".
  Uncertainty: No data collected, the uncertainty was then maximized.
- perlite: 0.00107019 kg; lognormal variance with pedigree 0.0426, pedigree (1,4,5,1,1)
  Proxy. Reported as "calcined diatoms soil (Harbolite) (100% solids)"
  properties: dry mass 1 kg, wet mass 1 kg
- phenolic resin: 0.00078587 kg; name resin; = (resin_amount1 + resin_amount2)*1000; lognormal variance with pedigree 0.04, pedigree (1,1,5,1,1)
  Proxy for resin.
  property amount of exchange 1 0.0007193 kg; name resin_amount1
  property amount of exchange 2 6.657e-5 kg; name resin_amount2
  properties: carbon content, fossil 0.772277, dry mass 1 kg, heating value, net 33.57 MJ, wet mass 1 kg
- printing ink, offset, without solvent, in 47.5% solution state: 0.002411 kg; lognormal variance with pedigree 0.0426, pedigree (1,4,5,1,1)
  EcoSpold01Location=RER
  Proxy. Reported as "flexo ink, water based".
  properties: carbon content, fossil 0.455266, carbon content, non-fossil 0.221773, dry mass 1 kg, heating value, net 20.51 MJ, wet mass 1 kg
  note on carbon content, fossil: C content was calculated as an addition of C content in the raw materials.
- propane, burned in building machine: 0.00219271 MJ; name propane; = (propane_fuel_input_in_liter * propane_Net_Heat_Value*23.93)*1000; lognormal variance with pedigree 0.04, pedigree (1,1,5,1,1)
  Consumption of propane in lift trucks reported as fuel input in litres. A lower heating value of 25.3 MJ/L is used for propane from underlying ecoinvent process is used.
  Uncertainty: No uncertainty added - uncertainty based on propagation of the uncertainty of the underlying parameters.
  property heating value, net 1 MJ; name propane_Net_Heat_Value
  property literFuel_Input 9.163e-5 l; name propane_fuel_input_in_liter
  note on heating value, net: net (lower) heating (calorific) value in MJ/l from underlying ecoinvent process
- sludge from pulp and paper production: -0.001928 kg; name organicSludgesAmount; lognormal variance with pedigree 0.0026, pedigree (1,4,1,1,1)
  Proxy. Reported as "sludge ink (60% dryness)" sent to a sanitary landfill.
  EcoSpold01Location=CH
  production volume; = corrugatedBoardBoxProductionVolume*organicSludgesAmount/corrugatedBoardBoxAmount
    Calculated from production volume of reference product using the relative outputs.
  properties: carbon content, non-fossil 0.21, dry mass 0.6 kg, heating value, net 2.65 MJ, water content 0.66667, wet mass 1 kg
  note on carbon content, non-fossil: Tab 6.21, ecoinvent v2.2 report 11_III & Tab A.9, ecoinvent v2.2 report 13_I. Sludge from pulp and paper contains 15.75% carbon
- sodium hydroxide, without water, in 50% solution state: 0.000599 kg; lognormal variance with pedigree 0.0426, pedigree (1,4,5,1,1)
  Reported as "sodium hydroxide (NaOH) (50% solid)".
  properties: dry mass 1 kg, heating value, net 3.03 MJ, wet mass 1 kg
- styrene: 4.588e-5 kg; lognormal variance with pedigree 0.0426, pedigree (1,4,5,1,1)
  Reported as "styrene (25%)-butadiène (25%) (50% solid)".
  properties: carbon content, fossil 0.923077, dry mass 1 kg, heating value, net 37.26 MJ, wet mass 1 kg
- tap water: 0.969 kg; lognormal variance with pedigree 0.0426, pedigree (1,4,5,1,1)
  properties: carbon content, fossil 0.00178991, dry mass 0.000337476 kg, water content 2962.17, wet mass 1 kg
  note on carbon content, fossil: Bicarbonate content is 2.93 mol/m3. CO2 content is 0.1 mol/m3 (ecoinvent v2.2 report 8, Tab 93.1).
- vinyl acetate: 0.0004389 kg; lognormal variance with pedigree 0.0426, pedigree (1,4,5,1,1)
  Proxy for glue. Reported as "glue PVA (acetate) (56% solids)". Received as a solution between 55 to 57% solids.
  properties: carbon content, fossil 0.55814, dry mass 1 kg, heating value, net 25.35 MJ, wet mass 1 kg
- waste mineral oil: -4.6e-5 kg; name wasteLubricantsAmount; lognormal variance with pedigree 0.2106, pedigree (5,5,5,5,5)
  Proxy. Taken directly from the ecoinvent v3.0 dataset "corrugated board box production, GLO 2008".
  EcoSpold01Location=CH
  Uncertainty: No data collected, the uncertainty was then maximized.
  production volume; = corrugatedBoardBoxProductionVolume*wasteLubricantsAmount/corrugatedBoardBoxAmount
    Calculated from production volume of reference product using the relative outputs.
  properties: carbon content, fossil 0.864444, dry mass 0.9 kg, heating value, net 34.7 MJ, water content 0.111111, wet mass 1 kg
  note on carbon content, fossil: Tab A.6, ecoinvent v2.2 report 13_I. C content has been calculated after data in the tables, and then referred to 1 kg DM
- waste paperboard, sorted: -0.1161 kg; name wastePaperBoardAmount; lognormal variance with pedigree 0.0032, pedigree (2,4,1,1,1)
  Proxy. Reported as ''waste cardboard''. Recycled and used as raw material in the production of linerboard.
  production volume; = corrugatedBoardBoxProductionVolume*wastePaperBoardAmount/corrugatedBoardBoxAmount
    Calculated from production volume of reference product using the relative outputs.
  properties: carbon content, non-fossil 0.483259, dry mass 0.804 kg, heating value, net 15.92 MJ, price 0.0436 EUR2005, water content 0.243781, wet mass 1 kg
  note on carbon content, non-fossil: C content was calculated for 1 kg DM, using data in Tab A.3, ecoinvent v2.2 report 13_I.
- waste plastic, mixture: -9.99688e-5 kg; name waterplasticAmount; lognormal variance with pedigree 0.0106, pedigree (4,4,1,1,1)
  Proxy. Reported as ''impression master'. Assumed 10 lb/master (very variable). These wastes are send to a sanitary landfill (850 units/year).
  production volume; = corrugatedBoardBoxProductionVolume*waterplasticAmount/corrugatedBoardBoxAmount
    Calculated from production volume of reference product using the relative outputs.
  properties: carbon content, fossil 0.747344, dry mass 0.847 kg, heating value, net 30.79 MJ, water content 0.180638, wet mass 1 kg
- wastewater from maize starch production: -1.45185e-6 m3; name starchResidueAmount; = (starchResidueAmount_amountM31 + starchResidueAmount_amountM32)*1000
  Proxy. Represents the disposal of scrap starch and drain cleaning.
  production volume; = corrugatedBoardBoxProductionVolume*starchResidueAmount/corrugatedBoardBoxAmount
    Calculated from production volume of reference product using the relative outputs.
  property amount of exchange in m³ 1 1.037e-6 m3; name starchResidueAmount_amountM31
  property amount of exchange in m³ 2 4.1485e-7 m3; name starchResidueAmount_amountM32; = 8.297E-07/2
  properties: carbon content, non-fossil 0.825003, dry mass 3.85149 kg, water content 258.64, wet mass 1000 kg
  note on amount of exchange in m³ 1: Proxy for the disposal of scrap starch. Reported as ''starch batch scrap''. Assumed 1 ton of starch solution = 1 m3.
  note on amount of exchange in m³ 2: Reported as ''Pumped drain cleaning and send to the municipal wastewater treatment''. Assumed that half of the amount is due to gluing with starch.
- wastewater, average: -0.000389715 m3; name wastewaterAmount; = (wastewaterAmount_amountM31 + wastewaterAmount_amountM32)*1000
  Proxy. Reported as ''plant treated water sent to municpal treatment plant'' and ''sanitary water sent to municipal treatment plant''.
  The municipal treatment plant as a 2.42E10 l/yr capacity and a aerated pond technology.
  The "plant treated water sent to municpal treatment plant'' has the follwing characteristics (in kg/m3): BOD5: 0.32933, Suspended solids: 0.12200.
  production volume; = corrugatedBoardBoxProductionVolume*wastewaterAmount/corrugatedBoardBoxAmount
    Calculated from production volume of reference product using the relative outputs.
  property amount of exchange in m³ 1 0.0003893 m3; name wastewaterAmount_amountM31
  property amount of exchange in m³ 2 4.1485e-7 m3; name wastewaterAmount_amountM32; = 8.297E-07/2
  properties: carbon content, non-fossil 0.194039, dry mass 0.346837 kg, water content 2882.2, wet mass 1000 kg
  note on amount of exchange in m³ 1: Reported as ''Plant treated water send to municpal treatment plant'' and ''Sanitary water send to municipal treatment plant''. The municipal treatment plant as a 2.42E10 l/yr capacity and a aerated pond technology. The ''Plant treated water send to municpal treatment plant'' has the follwing characteristics (in kg/m3): BOD5: 0.32933, Suspended solids: 0.12200.
  note on amount of exchange in m³ 2: Reported as ''Pumped drain cleaning and send to the municipal wastewater treatment''. Assumed that half of the amount is due to printing (ink).
  note on carbon content, non-fossil: 0.0673 kg TOC/m3 (Tab A.17, ecoinvent v2.2 report 13_I). TOC was considered as Total Carbon.

## Emissions to nature
- Water [air, non-urban air or from high stacks]: 0.0005796 m3; lognormal variance with pedigree 0.0432, pedigree (3,3,5,1,1)
  Evaporation of water from boiler, contained in ink and glue.

## Sampling procedure
Most data are primary data collected from a manufacturing plant located in the region of Québec, for the year 2008.

## Extrapolations
Data from one manufacturing plant extrapolated to the whole region of Québec.

## Review by Emilia Moreno Ruiz 2015-09-28
activity links added
