# polyvinylchloride production, suspension polymerisation

Dataset: EcoSpold 2, unit process
Geography: RoW
Time period: 2013-01-01 to 2023-12-31
Technology level: current
Classification: ISIC rev.4 ecoinvent: 2013:Manufacture of plastics and synthetic rubber in primary forms
Synonyms: S-PVC
Scenario: Business-as-Usual
System model: Allocation, cut-off by classification
Generated by: Thomas Fröhlich
Published in: PlasticsEurope 2016
Database: ecoinvent
isCopyrightProtected: true
accessRestrictedTo: 1

## General comment
The dataset represents the production mix of commercial S-PVC production technologies
Polyvinyl chloride (PVC) is manufactured by polymerisation of vinyl chloride monomer (VCM). Polymerisation of PVC is an exothermic reaction. The pressure in the reactor is usually in the range of 0.4 - 1.2 MPa and the reaction temperature is between 35 - 70°C. During the polymerisation reaction 85 - 97% of the VCM is converted into PVC. Residual VCM is removed by stripping the polymer suspension or latex. The unreacted monomer is recovered, liquefied, and returned to polymerisation
For the polymerisation process certain process chemicals are required. Surfactants, emulsifiers and protective colloids are used to prepare and stabilize the dispersion of monomer and PVC in process water (typically around 1 kg/t VCM in suspension and around 10-20 kg/t in emulsion). Organic peroxides or peresters are used as initiators (typically 1 kg/t VCM) for the production of suspension and microsuspension PVC, while e.g. hindered phenols are used to stop the reaction (typically < 1 kg/t VCM). For the production of emulsion PVC inorganic peroxides are common.
PVC resin resulting from the suspension process (S-PVC) has a mean particle size of 50 - 200 μm. The essential differences between S-PVC grades result from the average length of polymer chains and from the porosity of the particles. Suspension PVC is always produced batch wise in a stirred vessel. The monomer is dispersed in demineralised water by the combination of mechanical stirring and surfactants. The polymerisation takes place inside the VCM droplets under the influence of VCM soluble initiators such as peresters, percarbonates, or peroxides.

## Included activities start
Acitivity starts with monomers entering the polymerisation plant. Energy supply is included in terms of heat production inside the battery limits of the plant. Steam and electricity supply is outside the activity.

## Included activities end
Activity ends with polymer granulate leaving the factory.

## Allocation
The PVC production itself is regarded as a single-output process since only one polymer type is produced by one installation. All other products of this installation, e.g. monomers being recycled internally, or hydrocarbons being used thermally, are treated as internal flows replacing the respective input materials (i.e. monomers or energy carriers). Hence, no allocation is needed for the PVC production process.

## Geography
Extrapolated from dataset with data for EU27 including Norway and Switzerland. The production volume and uncertainty have been adjusted accordingly.

## Time period
Data was collected for the year 2013, processed in 2014 and published in 2015

## Reference product
- polyvinylchloride, suspension polymerised: 1 kg; By-product classification allocatable product; CPC 34730: Polymers of vinyl chloride or other halogenated olefins, in primary forms; HS2017 3920: Plastics; plates, sheets, film, foil and strip (not self-adhesive); non-cellular and not reinforced, laminate[...]; CAS 9002-86-2
  Reference Product
  production volume 1.44351e10 kg; name RP_PV
    According to Plastics Europe, Global production volume of plastics in 2013 was 299 Mt. It is assumed that the global production share (of the total plastic production) of polyvinylchloride through suspension polymerisation is equal to the respective European production share, which is 8 % of the total plastics production in Europe.
    Source: PlasticsEurope, 2013, Plastics - The Facts 2013, accessed online at: https://www.plasticseurope.org/en/resources/market-data on 11th of July 2018
  properties: carbon allocation 0.387097 kg, carbon content 0.387097, carbon content, fossil 0.387097, carbon content, non-fossil 0, dry mass 1 kg, heating value, net 21.5 MJ, price 1.29 EUR2005, water content 0, water in wet mass 0 kg, wet mass 1 kg

## Inputs from technosphere
- ammonia, anhydrous, liquid: 2.17782e-6, 4.22759e-6, 4.68601e-5, 1.98081e-6, 4.43097e-7, 1.62846e-5, 1.39986e-6, 4.31503e-6 kg (8 suppliers, which the file names only by identifier); sum of these 7.76889e-5 kg; lognormal variance with pedigree 0.0212, pedigree (3,3,4,5,3)
  Weighted average of reported input
  properties: dry mass 1 kg, wet mass 1 kg
- chemical factory, organics: 4e-10 unit; lognormal variance with pedigree 0.3118, pedigree (2,3,3,4,3)
  Calculated based on literature data published by the industry. For this activity, no information was readily available concerning infrastructure and land-use. Therefore, the infrastructure is estimated based on data from two chemical factories, the BASF site of Ludwigshafen and the chemical factory in Gendorf (which are both located in Germany), which produce a wide range of chemical substances. Based on this data, the following assumptions are made: the built area amounts to about 4.2 ha, the plant has an average output of 50"000 t/a and a lifespan of fifty years. The estimated infrastructure amount is therefore 4.00 E-10 units per kg of produced chemical.
  References:
  Althaus H.-J., Chudacoff M., Hischier R., Jungbluth N., Osses M. and Primas A. (2007) Life Cycle Inventories of Chemicals. ecoinvent report No. 8, v2.0. EMPA Dübendorf, Swiss Centre for Life Cycle Inventories, Dübendorf, CH.
  Gendorf (2000) Umwelterklärung 2000, Werk Gendorf. Werk Gendorf, Burgkirchen.
- chemical, inorganic: 0.000259734 kg; lognormal variance with pedigree 0.0212, pedigree (3,3,4,5,3)
  Sum input parameter covering partly confidential information on additives, solvents, catalysts. Weighted average of reported input materials.
  properties: carbon content, fossil 0.003, dry mass 1 kg, wet mass 1 kg
  note on carbon content, fossil: This dataset is an unweighted average of 20 inorganic substances (listed in Tab 88.1, ecoinvent v2.2 report 8, part II), being part of the top100 chemicals included in this database. The C-content has also been calculated as an unweighted average of the C content of the substances composing this dataset.
- chemical, organic: 0.00706751 kg; lognormal variance with pedigree 0.0212, pedigree (3,3,4,5,3)
  (same comment as for chemical, inorganic)
  properties: carbon content, fossil 0.628, dry mass 1 kg, heating value, net 19.03 MJ, wet mass 1 kg
  note on carbon content, fossil: This dataset is an unweighted average of 20 organic substances (listed in Tab 88.1, ecoinvent v2.2 report 8, part II), being part of the top100 chemicals included in this database. The C-content has also been calculated as an unweighted average of the C content of the substances composing this dataset.
- compressed air, 600 kPa gauge: 0.0975011 m3; lognormal variance with pedigree 0.0212, pedigree (3,3,4,5,3)
  Weighted average of reported input
- electricity, medium voltage: 0.00641984, 0.128061, 0.0430283, 0.00196598, 0.000393488, 8.44907e-5, 0.0132243 kWh (7 suppliers, which the file names only by identifier); sum of these 0.193178 kWh; lognormal variance with pedigree 0.0212, pedigree (3,3,4,5,3)
  Weighted average of reported input
- hazardous waste, for incineration: -0.000100625 kg; name BP_amount3; lognormal variance with pedigree 0.0134, pedigree (3,3,2,5,3)
  Weighted average of reported waste
  production volume; = BP_amount3*RP_PV
    calculated with production volume of reference product
  properties: carbon content, fossil 0.554667, dry mass 0.75 kg, heating value, net 17 MJ, water content 0.333333, wet mass 1 kg
  note on carbon content, fossil: Tab A.6, ecoinvent v2.2 report 13_I. C content has been calculated after data in the tables, and then referred to 1 kg DM
  note on heating value, net: Value taken from the general comment of the treatment dataset.
- heat, from steam, in chemical industry: 1.92696 MJ; lognormal variance with pedigree 0.0212, pedigree (3,3,4,5,3)
  Weighted average of reported input
  properties: heating value, net 1 MJ
- natural gas, high pressure: 8.76065e-5, 0.000147781, 0.000322356, 0.000107879, 2.52109e-5, 0.00015005, 0.000143985, 0.000378611, 0.000146169, 0.000226082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 m3 (37 suppliers, which the file names only by identifier); sum of these 0.0113457 m3; lognormal variance with pedigree 0.0212, pedigree (3,3,4,5,3)
  Weighted average of reported input
  properties: carbon content, fossil 0.695187, dry mass 1 kg, heating value, net 36 MJ, wet mass 1 kg
  note on heating value, net: Literature value, Source: Christoph Meili;Niels Jungbluth;Maresa Bussa (2021) Life cycle inventories of crude oil and natural gas extraction. ESU-services Ltd. commissioned by BAFU & VSG, Schaffhausen, Switzerland, http://esu-services.ch/data/public-lci-reports/
- nitrogen, liquid: 0.00233595 kg; lognormal variance with pedigree 0.0212, pedigree (3,3,4,5,3)
  Weighted average of reported input
  properties: dry mass 1 kg, wet mass 1 kg
- sewage sludge, dried: -0.00044818 kg; name BP_amount4; lognormal variance with pedigree 0.0134, pedigree (3,3,2,5,3)
  Weighted average of reported waste
  production volume; = BP_amount4*RP_PV
    calculated with production volume of reference product
  properties: carbon content, non-fossil 0.4096, dry mass 0.99 kg, heating value, net 11.6 MJ, water content 0.010101, wet mass 1 kg
- sodium hydroxide, without water, in 50% solution state: 0.000970815 kg; lognormal variance with pedigree 0.0212, pedigree (3,3,4,5,3)
  Weighted average of reported input
  properties: dry mass 1 kg, heating value, net 3.03 MJ, wet mass 1 kg
- spent solvent mixture: -1.09645e-5 kg; name BP_amount2; lognormal variance with pedigree 0.0134, pedigree (3,3,2,5,3)
  Weighted average of reported waste
  production volume; = BP_amount2*RP_PV
    calculated with production volume of reference product
  properties: carbon content, fossil 0.571257, dry mass 0.835 kg, heating value, net 21.7 MJ, water content 0.197605, wet mass 1 kg
  note on carbon content, fossil: Tab A.7, ecoinvent v2.2 report 13_I. C content has been calculated after data in the tables, and then referred to 1 kg DM
- vinyl chloride: 0.999161 kg; lognormal variance with pedigree 0.0212, pedigree (3,3,4,5,3)
  Weighted average of reported input
  properties: carbon content, fossil 0.387097, dry mass 1 kg, heating value, net 17.46 MJ, wet mass 1 kg
- waste paperboard: -4.42272e-7, -1.78211e-6, -3.29888e-6, -5.05796e-6, -0.000988645, -3.31225e-5, -1.82765e-5 kg (7 suppliers, which the file names only by identifier); sum of these -0.00105063 kg; lognormal variance with pedigree 0.0134, pedigree (3,3,2,5,3)
  Weighted average of reported waste
  production volume; = BP_amount5*RP_PV
    calculated with production volume of reference product
  properties: carbon content, non-fossil 0.483259, dry mass 0.804 kg, heating value, net 15.92 MJ, water content 0.243781, wet mass 1 kg
  note on carbon content, non-fossil: C content was calculated for 1 kg DM, using data in Tab A.3, ecoinvent v2.2 report 13_I.
- wastewater, average: -0.00529758, -1.88614e-5 m3 (2 suppliers, which the file names only by identifier); sum of these -0.00531645 m3; lognormal variance with pedigree 0.0134, pedigree (3,3,2,5,3)
  Weighted average of reported waste
  production volume; = BP_amount6*RP_PV
    calculated with production volume of reference product
  properties: carbon content, non-fossil 0.194039, dry mass 0.346837 kg, water content 2882.2, wet mass 1000 kg
  note on carbon content, non-fossil: 0.0673 kg TOC/m3 (Tab A.17, ecoinvent v2.2 report 13_I). TOC was considered as Total Carbon.
- wastewater, unpolluted: -0.0144095 m3; name BP_amount7; lognormal variance with pedigree 0.0134, pedigree (3,3,2,5,3)
  Weighted average of reported waste
  production volume; = BP_amount7*RP_PV
    calculated with production volume of reference product
  properties: carbon content, fossil 0.00178991, carbon content, non-fossil 0.00178991, dry mass 0.337476 kg, water content 2962.17, wet mass 1000 kg
  note on carbon content, fossil: Assumed to be like in tap water. Bicarbonate content is 2.93 mol/m3. CO2 content is 0.1 mol/m3 (ecoinvent v2.2 report 8, Tab 93.1).

## Inputs from nature
- Water, cooling, unspecified natural origin [natural resource, in water]: 0.015475 m3; lognormal variance with pedigree 0.0212, pedigree (3,3,4,5,3)
  Weighted average of reported input
- Water, lake [natural resource, in water]: 6.41276e-5 m3; lognormal variance with pedigree 0.0212, pedigree (3,3,4,5,3)
  Weighted average of reported input
- Water, river [natural resource, in water]: 0.000649827 m3; lognormal variance with pedigree 0.0212, pedigree (3,3,4,5,3)
  Weighted average of reported input
- Water, well, in ground [natural resource, in water]: 0.00177909 m3; lognormal variance with pedigree 0.0212, pedigree (3,3,4,5,3)
  Weighted average of reported input

## Emissions to nature
- Ammonia [air, unspecified]: 2.00077e-5 kg; lognormal variance with pedigree 0.0606, pedigree (3,3,4,5,3)
  Weighted average of reported emissions
- Carbon dioxide, fossil [air, unspecified]: 0.0108319 kg; lognormal variance with pedigree 0.0212, pedigree (3,3,4,5,3)
  Weighted average of reported emissions
- Carbon monoxide, fossil [air, unspecified]: 1.70981e-5 kg; lognormal variance with pedigree 0.6706, pedigree (3,3,4,5,3)
  Weighted average of reported emissions
- NMVOC, non-methane volatile organic compounds [air, unspecified]: 7.71409e-6 kg; lognormal variance with pedigree 0.0606, pedigree (3,3,4,5,3)
  Weighted average of reported emissions
- Nitrogen oxides [air, unspecified]: 5.30454e-6 kg; lognormal variance with pedigree 0.0606, pedigree (3,3,4,5,3)
  Weighted average of reported emissions
- Particulate Matter, < 2.5 um [air, unspecified]: 2.57528e-6 kg; lognormal variance with pedigree 0.3206, pedigree (3,3,4,5,3)
  Weighted average of reported emissions
- Particulate Matter, > 10 um [air, unspecified]: 2.21913e-5 kg; lognormal variance with pedigree 0.0606, pedigree (3,3,4,5,3)
  Weighted average of reported emissions
- Particulate Matter, > 2.5 um and < 10um [air, unspecified]: 6.41826e-6 kg; lognormal variance with pedigree 0.1406, pedigree (3,3,4,5,3)
  Weighted average of reported emissions
- Vinyl chloride [air, unspecified]: 2.35388e-5 kg; lognormal variance with pedigree 0.1406, pedigree (3,3,4,5,3)
  Weighted average of reported emissions
- AOX, Adsorbable Organic Halides [water, unspecified]: 1.43429e-6 kg; lognormal variance with pedigree 0.0606, pedigree (3,3,4,5,3)
  Weighted average of reported emissions
- Ammonium [water, unspecified]: 1.27497e-5 kg; lognormal variance with pedigree 0.0606, pedigree (3,3,4,5,3)
  Weighted average of reported emissions
- Chloride [water, unspecified]: 0.000273062 kg; lognormal variance with pedigree 0.0606, pedigree (3,3,4,5,3)
  Weighted average of reported emissions
- Ethylene dichloride [water, unspecified]: 4.38861e-10 kg; lognormal variance with pedigree 0.3206, pedigree (3,3,4,5,3)
  Weighted average of reported emissions
- Nitrogen, organic bound [water, unspecified]: 6.78994e-6 kg; lognormal variance with pedigree 0.0606, pedigree (3,3,4,5,3)
  Weighted average of reported emissions
- Phosphorus [water, unspecified]: 4.50763e-7 kg; lognormal variance with pedigree 0.0606, pedigree (3,3,4,5,3)
  Weighted average of reported emissions
- Sodium I [water, unspecified]: 0.000181709 kg; lognormal variance with pedigree 0.0606, pedigree (3,3,4,5,3)
  Weighted average of reported emissions
- Sulfate [water, unspecified]: 2.98314e-6 kg; lognormal variance with pedigree 0.0606, pedigree (3,3,4,5,3)
  Weighted average of reported emissions
- Suspended solids, unspecified [water, unspecified]: 2.0451e-5 kg; lognormal variance with pedigree 0.0507, pedigree (2,2,4,5,1)
  Weighted average of reported emissions
- Vinyl chloride [water, unspecified]: 3.25229e-7 kg; lognormal variance with pedigree 0.3206, pedigree (3,3,4,5,3)
  Weighted average of reported emissions
- Zinc II [water, unspecified]: 1.08588e-9 kg; lognormal variance with pedigree 0.6706, pedigree (3,3,4,5,3)
  Weighted average of reported emissions

## Sampling procedure
Extrapolated from European data. Questionnaires sent out to all production units in Europe operated by PlasticEurope/ECVM member companies.

## Extrapolations
This dataset has been created as a copy of the original dataset covering the geography RER, i.e., Europe. Annual production volume(s) and uncertainty have been adjusted accordingly. It is important to note that original RER dataset represents the average production mix, composed of several different processes/technologies, in Europe in the year of reference. It might not reflect the actual global production mix and should hence only be used as a proxy.
