# olive production

Dataset: EcoSpold 2, unit process
Geography: IT
Time period: 2001-01-01 to 2023-12-31
Technology level: current
Classification: ISIC rev.4 ecoinvent: 0126:Growing of oleaginous fruits
Tags: WFLDB
Scenario: Business-as-Usual
System model: Allocation, cut-off by classification
Generated by: Tuija Waldvogel
Published in: Nemecek T. 2015
Database: ecoinvent
isCopyrightProtected: true
accessRestrictedTo: 1

## General comment
This dataset represents the production of 1 kg of olives. The average yield from 2001-2008 is 4.3 t/ha. The data are representative for Olive production in Italy (Puglia region or Sicily) used for the export market. Mineral NPK fertiliser input is 75-25-30 kg/ha. Organic fertilisers applied amount to 2 m3/ha of liquid manure and 2 t/ha of solid manure. Total active ingredients (a.i.) applied as pesticides amount to 16.75 kg a.i./ha.
The dataset was modelled within the project 'World Food LCA database (WFLDB)'. The aim of this project was to provide inventories of a broad variety of agricultural products and processes and to cover for each product at least 50% of the global export market. The share of olives produced in Italy amounts to 16% of the global production (tonnage produced in 2010). The production system regarded in this dataset aimed at representing olives produced in Italy for the export market.
PEF-Quality: data quality rating (DQR) = 1.7 (i.e. very good quality). This dataset refers to an average situation; for specific situations exchanges might differ substantially due to site specific parameters

## Included activities start
This activity starts with the nursery producing fruit tree seedlings, i.e. grafted young trees to be planted.

## Included activities end
This activity ends with the waste treatment after the clearing of the orchard (rooting up the trees). The dataset includes all activities of a year in a year in the productive phase of the orchard including the establishment phase per year of lifetime (40 years, 250 trees/ha planted), the clearing of the orchard including waste treatment.
The establishment phase of the orchard includes tree nursery, soil cultivation, planting trees, sowing grass, and irrigation. Fertiliser and pesticide use in a year of the establishment phase is assumed to be half of the amount of a year in the productive phase.
The productive phase of the orchard includes machine operations, corresponding infrastructure, fuel use and sheds. Machine operations in the productive phase are: soil cultivation (mulching, mowing), fertiliser and pesticide application, harvesting and irrigation. Further, direct field emissions and land use change are included. At the end of the productive phase the orchard is cleared by rooting up the trees.
Heavy metal uptake by the crop is considered. The inputs of seedlings, fertilisers and pesticides as well as packaging of fertilisers and pesticides are considered. The dataset doesn't include emissions from manure storage because these are within the system boundary of animal production.

## Technology
Conventional production

## Time period
Time period referring to the data source: 2001-2008. Based on expert opinion data is considered to be valid at least up to 2012.

## Parameters
- LUC_crop_specific: 1 dimensionless
  This parameter allows to switch between a 'crop specific' and a 'country specific' approach when calculating the LUC of a crop. By default, the chosen approach is 'crop specific', so the value of the parameter is 1. If you want to apply a 'country specific' approach, turn the parameter to 0.
- heavyMetalUptakeSwitch: 1 dimensionless

## Reference product
- olive: 1 kg; By-product classification allocatable product; CPC 01450: Olives; HS2017 070992: Vegetables; olives, fresh or chilled
  Reference flow: Yield = 4300 kg/ha table fruit quality
  production volume 3.16426e9 kg
    Source: FAOSTAT. Average, 2009-2012
  property carbon content, non-fossil 0.599452
    calculation: C-content of components according to ecoinvent report No. 15a. Source of composition: Souci, S.W., Fachmann, W., Kraut, H. (Hg.: Bundesminsiterium fur Ernahrung, Landwirtschaft und Forsten, Bonn) 'Die Zusammensetzung der Lebensmittel - Nahrwerttabellen', medpharm Scientific Publishers Stuttgart, CRC Press; 2000.
  property price 0.63 EUR2005
    Calculated value based on data from United Nations Commodity Trade Statistics Database (comtrade.un.org). UN comtrade category: 70992 Edible vegetables and certain roots and tubers // Other vegetables, fresh or chilled. // - Other : // -- Olives. Year: 2014. Using exchange rate of 1EURO = 1.209 USD. Average of price of import into 5 main markets (EU, US, JP, IN and CN).
  properties: carbon allocation 0.342936 kg, carbon content 0.599452, carbon content, fossil 0, dry mass 0.572082 kg, water content 0.748, water in wet mass 0.427918 kg, wet mass 1 kg

## Inputs from technosphere
- ammonium nitrate: 0.0159478 kg; source Fiorenzo Pasquali  2015; lognormal variance with pedigree 0.124177, pedigree (2,1,4,1,1)
  The exchange has been updated from 'ammonium nitrate, as N' into 'ammonium nitrate' and therefore its amount has been scaled (multiplied) from 0.0056 kg by 2.8573 kg of 'ammonium nitrate' per kg of 'ammonium nitrate, as N'. Original comment of the exchange is: Calculated based on literature values or expert estimation: The total amount of nutrient (Pergola et al. 2013) multiplied by the share of fertiliser type (Expert estimation, 2015). See supporting documentation 'WFLDB-Documentation.pdf' chapter 'Fertiliser application' for L3 and L4 data (https://ecoquery.ecoinvent.org/File/Reports).
  Corresponds to 24.0 kg/ha
  properties: dry mass 1 kg, wet mass 1 kg
- ammonium sulfate: 0.00418605 kg; source Fiorenzo Pasquali 2015; lognormal variance with pedigree 0.124177, pedigree (2,1,4,1,1)
  3bCalculated based on literature values or expert estimation: The total amount of nutrient (Pergola et al. 2013) multiplied by the share of fertiliser type (Personal written communication, Fiorenzo Pasquali, Yara, 2015). See supporting documentation 'WFLDB-Documentation.pdf' chapter 'Fertiliser application' for L3 and L4 data (https://ecoquery.ecoinvent.org/File/Reports).
  Corresponds to 18.0 kg/ha
  properties: dry mass 1 kg, wet mass 1 kg
- application of plant protection product, by field sprayer: 0.00209302 ha; source Mohamad R.S. 2014; lognormal variance with pedigree 0.124664, pedigree (2,2,4,1,1)
  Literature value or expert estimation (Mohamad et al. 2014). Field sprayer used as a proxy for pesticide application in orchards. Corresponds to 9 applications per year.
- copper oxide: 9.73832e-7 kg; source Mohamad R.S. 2014; lognormal variance with pedigree 0.0138498, pedigree (2,2,4,1,1)
  Literature value or expert estimation (Mohamad et al. 2014).
  properties: dry mass 1 kg, wet mass 1 kg
- establishing orchard: 0.00145349 unit; lognormal variance with pedigree 0.124177, pedigree (2,1,4,1,1)
  Literature value or expert estimation (). This is the number of trees per ha divided by the lifetime years of the orchard.
- fertilising, by broadcaster: 0.000465116 ha; lognormal variance with pedigree 0.124177, pedigree (2,1,4,1,1)
  Estimation based on a modified MEXALCA-approach (Roches et al. 2010; Nemecek et al. 2012): See supporting documentation 'WFLDB-Documentation.pdf' chapter 'Machinery processes' for L2 data (https://ecoquery.ecoinvent.org/File/Reports). Corresponds to 2 applications per year.
- fruit tree seedling, for planting: 0.00145349 unit; lognormal variance with pedigree 0.124177, pedigree (2,1,4,1,1)
  (same comment as for establishing orchard)
  properties: carbon content, non-fossil 0.439481, dry mass 0.578035 kg, water content 0.73, wet mass 1 kg
  note on carbon content, non-fossil: calculation: C-content of components according to ecoinvent report No. 15a. Source of composition: https://ndb.nal.usda.gov/ndb/search/. Unspecific seedling used as proxy.
- glyphosate: 0.00333885 kg; source Mohamad R.S. 2014; lognormal variance with pedigree 0.0138498, pedigree (2,2,4,1,1)
  Literature value or expert estimation (Mohamad et al. 2014).
  properties: carbon content, fossil 0.214286, dry mass 1 kg, wet mass 1 kg
- inorganic nitrogen fertiliser, as N: 0.00453488 kg; source Fiorenzo Pasquali  2015; lognormal variance with pedigree 0.124177, pedigree (2,1,4,1,1)
  Calculated based on literature values or expert estimation: The total amount of nutrient (Pergola et al. 2013) multiplied by the share of fertiliser type (Expert estimation, 2015). See supporting documentation 'WFLDB-Documentation.pdf' chapter 'Fertiliser application' for L3 and L4 data (https://ecoquery.ecoinvent.org/File/Reports).
  Corresponds to 6.0 kg/ha
  properties: dry mass 1 kg, wet mass 1 kg
- inorganic phosphorus fertiliser, as P2O5: 0.00582616 kg; source Fiorenzo Pasquali 2015; lognormal variance with pedigree 0.124177, pedigree (2,1,4,1,1)
  3bCalculated based on literature values or expert estimation: The total amount of nutrient (Personal written communication, Fiorenzo Pasquali, Yara, 2015) multiplied by the share of fertiliser type (Personal written communication, Fiorenzo Pasquali, Yara, 2015). See supporting documentation 'WFLDB-Documentation.pdf' chapter 'Fertiliser application' for L3 and L4 data (https://ecoquery.ecoinvent.org/File/Reports).
  Corresponds to 14.7 kg/ha
  properties: dry mass 1 kg, wet mass 1 kg
- irrigation: 0.0697674 m3; source Metzidakis I. 2008; lognormal variance with pedigree 0.124177, pedigree (2,1,4,1,1)
  008f9e; Calculated value: The total amount of water used for irrigation (Metzidakis et al. 2008) multiplied by the country-share of irrigation technique (Mohamad et al. 2014). See supporting documentation 'WFLDB-Documentation.pdf' chapter 'Water use for irrigation' (https://ecoquery.ecoinvent.org/File/Reports).
  properties: dry mass 0.11 kg, water content 9089.91, wet mass 1000 kg
- land use change, perennial crop: 9.11628e-6 ha; = 9.11627906977e-06*LUC_crop_specific+0.0*(1-LUC_crop_specific); lognormal variance with pedigree 0.358238, pedigree (3,1,4,1,1)
  Calculated value. Land use change (LUC) combines land transformation areas calculated with the adapted 'Direct Land Use Change Assessment Tool' version 2014 developed by Blonk Consultants and the carbon losses from soil organic carbon (SOC) and vegetation (VEG) as calculated in ecoinvent v3. See 'WFLDB-Guidelines.pdf', available at https://ecoquery.ecoinvent.org/File/Reports.
- liquid manure spreading, by vacuum tanker: 0.000465116 m3; lognormal variance with pedigree 0.124177, pedigree (2,1,4,1,1)
  This amount corresponds to the input of liquid manure.
- manure, liquid, cattle: 0.349075 kg; source Fiorenzo Pasquali  2015; lognormal variance with pedigree 0.124177, pedigree (2,1,4,1,1)
  Calculated based on literature values: The total amount of manure (Expert estimation, 2015) multiplied by the country-share of manure per animal category (FAOSTAT 2015). See supporting documentation 'WFLDB-Documentation.pdf' chapter 'Fertiliser application' (https://ecoquery.ecoinvent.org/File/Reports).
  Corresponds to 1.5 m3/ha
  properties: carbon content, non-fossil 0.68, dry mass 0.075 kg, water content 12.333, wet mass 1 kg
- manure, liquid, swine: 0.0999742 kg; source Fiorenzo Pasquali  2015; lognormal variance with pedigree 0.124177, pedigree (2,1,4,1,1)
  Calculated based on literature values: The total amount of manure (Expert estimation, 2015) multiplied by the country-share of manure per animal category (FAOSTAT 2015). See supporting documentation 'WFLDB-Documentation.pdf' chapter 'Fertiliser application' (https://ecoquery.ecoinvent.org/File/Reports).
  Corresponds to 0.43 m3/ha
  properties: carbon content, non-fossil 0.64, dry mass 0.05 kg, water content 19, wet mass 1 kg
- manure, solid, cattle: 0.353347 kg; source Fiorenzo Pasquali  2015; lognormal variance with pedigree 0.124177, pedigree (2,1,4,1,1)
  Calculated based on literature values: The total amount of manure (Expert estimation, 2015) multiplied by the country-share of manure per animal category (FAOSTAT 2015). See supporting documentation 'WFLDB-Documentation.pdf' chapter 'Fertiliser application' (https://ecoquery.ecoinvent.org/File/Reports).
  Corresponds to 1520.0 kg/ha
  properties: carbon content, non-fossil 0.441, dry mass 0.22 kg, water content 3.5454, wet mass 1 kg
- mowing, by motor mower: 0.00106228 ha; lognormal variance with pedigree 0.124177, pedigree (2,1,4,1,1)
  Proxy: Similar crop and country used.
- mulching: 0.000327163 ha; lognormal variance with pedigree 0.124177, pedigree (2,1,4,1,1)
  Proxy: Similar crop and country used.
- organophosphorus-compound, unspecified: 0.000556475 kg; source Mohamad R.S. 2014; lognormal variance with pedigree 0.0138498, pedigree (2,2,4,1,1)
  Literature value or expert estimation (Mohamad et al. 2014).
  properties: carbon content, fossil 0.260898, dry mass 1 kg, wet mass 1 kg
- packaging, for fertilisers: 0.0604895 kg; lognormal variance with pedigree 0.0592, pedigree (4,3,4,5,4)
  Total amount of active substance/s of fertilisers needed for the production of 'olive' is calculated to be circa 3.02E-02 kg. Fertiliser/s used in this dataset is/are: 'ammonium nitrate, as N', 'ammonium sulfate, as N', 'nitrogen fertiliser, as N', 'phosphate fertiliser, as P2O5', 'potassium chloride, as K2O', 'potassium sulfate, as K2O', 'urea, as N'. The total amount of active substance/s is doubled in order to account for the packaging of the dilluted product of fertiliser/s that is/are applied. Therefore, 6.05E-02 kg of packaging for fertilisers is justified with this exchange.
  properties: carbon content, fossil 0.825301, dry mass 1 kg, heating value, net 25.01 MJ, price 0.0642 EUR2005, wet mass 1 kg
  note on carbon content, fossil: Considering a chemical formula (C2H4)n for polyethylene, carbon content-fossil is calculated to be 0.856286 kg of Carbon per kg of dry mass.
- packaging, for pesticides: 0.0077926 kg; lognormal variance with pedigree 0.0592, pedigree (4,3,4,5,4)
  Total amount of active substance/s of pesticides needed for the production of olive is calculated to be circa 3.90E-03 kg. Pesticide/s used in this dataset is/are: 'copper oxide', 'glyphosate', 'organophosphorus-compound, unspecified'. The total amount of active substance/s is doubled in order to account for the packaging of the dilluted product of pesticide/s that is/are applied. Therefore, 7.79E-03 kg of packaging for pesticides is justified with this exchange.
  properties: carbon content, fossil 0.85714, dry mass 1 kg, heating value, net 25.97 MJ, price 0.0642 EUR2005, wet mass 1 kg
- planting tree: 0.00145349 unit; lognormal variance with pedigree 0.124177, pedigree (2,1,4,1,1)
  (same comment as for establishing orchard)
- potassium chloride: 0.00298174 kg; source Fiorenzo Pasquali 2015; lognormal variance with pedigree 0.124177, pedigree (2,1,4,1,1)
  The exchange has been updated from 'potassium chloride, as K2O' into 'potassium chloride' and therefore its amount has been scaled (multiplied) from 0.0019 kg by 1.5829 kg of 'potassium chloride' per kg of 'potassium chloride, as K2O'. Original comment of the exchange is: 3bCalculated based on literature values or expert estimation: The total amount of nutrient (Personal written communication, Fiorenzo Pasquali, Yara, 2015) multiplied by the share of fertiliser type (Personal written communication, Fiorenzo Pasquali, Yara, 2015). See supporting documentation 'WFLDB-Documentation.pdf' chapter 'Fertiliser application' for L3 and L4 data (https://ecoquery.ecoinvent.org/File/Reports).
  Corresponds to 8.1 kg/ha
  properties: dry mass 1 kg, wet mass 1 kg
- potassium sulfate: 0.00942191 kg; source Fiorenzo Pasquali 2015; lognormal variance with pedigree 0.124177, pedigree (2,1,4,1,1)
  The exchange has been updated from 'potassium sulfate, as K2O' into 'potassium sulfate' and therefore its amount has been scaled (multiplied) from 0.0051 kg by 1.85 kg of 'potassium sulfate' per kg of 'potassium sulfate, as K2O'. Original comment of the exchange is: 3bCalculated based on literature values or expert estimation: The total amount of nutrient (Personal written communication, Fiorenzo Pasquali, Yara, 2015) multiplied by the share of fertiliser type (Personal written communication, Fiorenzo Pasquali, Yara, 2015). See supporting documentation 'WFLDB-Documentation.pdf' chapter 'Fertiliser application' for L3 and L4 data (https://ecoquery.ecoinvent.org/File/Reports).
  Corresponds to 21.9 kg/ha
  properties: dry mass 1 kg, wet mass 1 kg
- poultry manure, dried: 0.111769 kg; source Fiorenzo Pasquali  2015; lognormal variance with pedigree 0.124177, pedigree (2,1,4,1,1)
  Calculated based on literature values: The total amount of manure (Expert estimation, 2015) multiplied by the country-share of manure per animal category (FAOSTAT 2015). See supporting documentation 'WFLDB-Documentation.pdf' chapter 'Fertiliser application' (https://ecoquery.ecoinvent.org/File/Reports).
  Corresponds to 481.0 kg/ha
  properties: cadmium content 2.92e-7, carbon content, non-fossil 0.33389, copper content 4.38e-5, dry mass 0.865 kg, lead content 2.92e-6, mercury content 2e-7, nickel content 4e-5, nitrogen content 0.532, phosphorus content 0.0167, potassium content 0.024, water content 0.156069, wet mass 1 kg, zinc content 0.000349
- poultry manure, fresh: 0.00803337 kg; source Fiorenzo Pasquali  2015; lognormal variance with pedigree 0.124177, pedigree (2,1,4,1,1)
  Calculated based on literature values: The total amount of manure (Expert estimation, 2015) multiplied by the country-share of manure per animal category (FAOSTAT 2015). See supporting documentation 'WFLDB-Documentation.pdf' chapter 'Fertiliser application' (https://ecoquery.ecoinvent.org/File/Reports).
  Corresponds to 0.0691 m3/ha
  properties: carbon content, non-fossil 0.33389, dry mass 0.38 kg, water content 1.63158, wet mass 1 kg
- solid manure loading and spreading, by hydraulic loader and spreader: 0.465116 kg; lognormal variance with pedigree 0.124177, pedigree (2,1,4,1,1)
  This amount corresponds the input of solid manure.
- tillage, harrowing, by rotary harrow: 0.000465116 ha; source Mohamad R.S. 2014; lognormal variance with pedigree 0.124177, pedigree (2,1,4,1,1)
  Literature value or expert estimation (Mohamad et al. 2014).
- transport, tractor and trailer, agricultural: 0.002 metric ton*km; lognormal variance with pedigree 0.162439, pedigree (4,1,4,1,1)
  On-farm transport: Yield (in tonnes) multiplied by the average distance from field to farm. The distance was assumed to be 2 km (proxy).
- urea: 0.00673053 kg; source Fiorenzo Pasquali  2015; lognormal variance with pedigree 0.124177, pedigree (2,1,4,1,1)
  The exchange has been updated from 'urea, as N' into 'urea' and therefore its amount has been scaled (multiplied) from 0.0031 kg by 2.1438 kg of 'urea' per kg of 'urea, as N'. Original comment of the exchange is: Calculated based on literature values or expert estimation: The total amount of nutrient (Pergola et al. 2013) multiplied by the share of fertiliser type (Expert estimation, 2015). See supporting documentation 'WFLDB-Documentation.pdf' chapter 'Fertiliser application' for L3 and L4 data (https://ecoquery.ecoinvent.org/File/Reports).
  properties: carbon content, fossil 0.2, dry mass 1 kg, wet mass 1 kg
- waste wood, untreated: -0.31 kg; lognormal variance with pedigree 0.116177, pedigree (2,1,1,1,1)
  Wood from trees after 1-2 years of sorrage at the field (20% water) per lifetime year (20 years) of the orchard
  production volume
    Calculated from the reference product amount and production volume
  properties: carbon content, non-fossil 0.48632, dry mass 0.8 kg, heating value, net 13.99 MJ, water content 0.25, wet mass 1 kg
  note on heating value, net: Value taken from the general comment of the treatment dataset.

## Inputs from nature
- Carbon dioxide, in air [natural resource, in air]: 0.553488 kg; lognormal variance with pedigree 0.0138498, pedigree (2,2,4,1,1)
  CO2 uptake by biomass
- Energy, gross calorific value, in biomass [natural resource, biotic]: 7.16116 MJ; lognormal variance with pedigree 0.0138498, pedigree (2,2,4,1,1)
  Gross energy content is related to MJ/kg dry matter of product. Source: ecoinvent data
- Occupation, permanent crop, irrigated [natural resource, land]: 2.33186 m2*year; lognormal variance with pedigree 0.0200616, pedigree (2,1,4,1,1)
  Related to the duration from harvest date of previous crop to harvest date of main crop.
- Transformation, from permanent crop, irrigated [natural resource, land]: 0.116279 m2; lognormal variance with pedigree 0.0442144, pedigree (2,1,4,1,1)
  10000 m2 divided by the life time of the perennial crop (20 years).
- Transformation, to permanent crop, irrigated [natural resource, land]: 0.116279 m2; lognormal variance with pedigree 0.0442144, pedigree (2,1,4,1,1)
  10000 m2 divided by the life time of the perennial crop (20 years).

## Emissions to nature
- Ammonia [air, non-urban air or from high stacks]: 0.00325 kg; source EEA 2013; lognormal variance with pedigree 0.0447216, pedigree (2,2,4,1,1)
  Calculated value - EMEP/EEA (2013). See 'WFLDB-Guidelines.pdf', available at https://ecoquery.ecoinvent.org/File/Reports.
- Carbon dioxide, fossil [air, non-urban air or from high stacks]: 0.00492907 kg; lognormal variance with pedigree 0.0138498, pedigree (2,2,4,1,1)
  Calculated value - CO2 emissions from urea and lime. See 'WFLDB-Guidelines.pdf', available at https://ecoquery.ecoinvent.org/File/Reports.
- Dinitrogen monoxide [air, non-urban air or from high stacks]: 0.00045857 kg; source IPCC 2006; lognormal variance with pedigree 0.124664, pedigree (2,2,4,1,1)
  Calculated value - IPCC (2006). See 'WFLDB-Guidelines.pdf', available at https://ecoquery.ecoinvent.org/File/Reports.
- Nitrogen oxides [air, non-urban air or from high stacks]: 0.000759605 kg; source EEA 2013; lognormal variance with pedigree 0.124664, pedigree (2,2,4,1,1)
  Calculated value - EEA/EMEP (2013). See 'WFLDB-Guidelines.pdf', available at https://ecoquery.ecoinvent.org/File/Reports.
- Water [air, non-urban air or from high stacks]: 0.0457953 m3; lognormal variance with pedigree 0.124177, pedigree (2,1,4,1,1)
  Calculated value - Emission calculated from water balance. See 'WFLDB-Guidelines.pdf', available at https://ecoquery.ecoinvent.org/File/Reports.
- Cadmium II [soil, agricultural]: 5.63551e-7 kg; = 5.89139534884e-07 + ( - 2.558808e-08)*heavyMetalUptakeSwitch; source Freiermuth R.  2006; lognormal variance with pedigree 0.356838, pedigree (2,1,4,1,1)
  Comment on mathematicalRelation:
  5.89139534884e-07 from Calculated value - Freiermuth (2006). See 'WFLDB-Guidelines.pdf', available at https://ecoquery.ecoinvent.org/File/Reports.
  -2.558808e-08 from Crop, default, heavy metals uptake model
  Heavy metal uptake can be excluded by setting the parameter heavyMetalUptakeSwitch to zero.
- Chromium III [soil, agricultural]: 9.94637e-7 kg; = 1.13197674419e-06 + ( - 1.3734e-07)*heavyMetalUptakeSwitch; source Freiermuth R.  2006; lognormal variance with pedigree 0.356838, pedigree (2,1,4,1,1)
  Comment on mathematicalRelation:
  1.13197674419e-06 from Calculated value - Freiermuth (2006). See 'WFLDB-Guidelines.pdf', available at https://ecoquery.ecoinvent.org/File/Reports.
  -1.3734e-07 from Crop, default, heavy metals uptake model
  Heavy metal uptake can be excluded by setting the parameter heavyMetalUptakeSwitch to zero.
- Copper ion [soil, agricultural]: 3.60816e-6 kg; = 5.27813953488e-06 + ( - 1.6699788e-06)*heavyMetalUptakeSwitch; source Freiermuth R.  2006; lognormal variance with pedigree 0.356838, pedigree (2,1,4,1,1)
  Comment on mathematicalRelation:
  5.27813953488e-06 from Calculated value - Freiermuth (2006). See 'WFLDB-Guidelines.pdf', available at https://ecoquery.ecoinvent.org/File/Reports.
  -1.6699788e-06 from Crop, default, heavy metals uptake model
  Heavy metal uptake can be excluded by setting the parameter heavyMetalUptakeSwitch to zero.
- Dimethoate [soil, agricultural]: 0.000556475 kg; lognormal variance with pedigree 0.0447216, pedigree (2,2,4,1,1)
  Calculated value - 100% emission in soil. See 'WFLDB-Guidelines.pdf', available at https://ecoquery.ecoinvent.org/File/Reports.
- Glyphosate [soil, agricultural]: 0.00333885 kg; lognormal variance with pedigree 0.0447216, pedigree (2,2,4,1,1)
  (same comment as for Dimethoate)
- Lead II [soil, agricultural]: 6.46354e-7 kg; = 7.82627906977e-07 + ( - 1.3627404e-07)*heavyMetalUptakeSwitch; source Freiermuth R.  2006; lognormal variance with pedigree 0.356838, pedigree (2,1,4,1,1)
  Comment on mathematicalRelation:
  7.82627906977e-07 from Calculated value - Freiermuth (2006). See 'WFLDB-Guidelines.pdf', available at https://ecoquery.ecoinvent.org/File/Reports.
  -1.3627404e-07 from Crop, default, heavy metals uptake model
  Heavy metal uptake can be excluded by setting the parameter heavyMetalUptakeSwitch to zero.
- Mercury II [soil, agricultural]: 5.12334e-8 kg; = 6.14534883721e-08 + ( - 1.0220112e-08)*heavyMetalUptakeSwitch; source Freiermuth R.  2006; lognormal variance with pedigree 0.356838, pedigree (2,1,4,1,1)
  Comment on mathematicalRelation:
  6.14534883721e-08 from Calculated value - Freiermuth (2006). See 'WFLDB-Guidelines.pdf', available at https://ecoquery.ecoinvent.org/File/Reports.
  -1.0220112e-08 from Crop, default, heavy metals uptake model
  Heavy metal uptake can be excluded by setting the parameter heavyMetalUptakeSwitch to zero.
- Nickel II [soil, agricultural]: 1.24357e-6 kg; = 1.50681395349e-06 + ( - 2.632392e-07)*heavyMetalUptakeSwitch; source Freiermuth R.  2006; lognormal variance with pedigree 0.356838, pedigree (2,1,4,1,1)
  Comment on mathematicalRelation:
  1.50681395349e-06 from Calculated value - Freiermuth (2006). See 'WFLDB-Guidelines.pdf', available at https://ecoquery.ecoinvent.org/File/Reports.
  -2.632392e-07 from Crop, default, heavy metals uptake model
  Heavy metal uptake can be excluded by setting the parameter heavyMetalUptakeSwitch to zero.
- Zinc II [soil, agricultural]: 2.78511e-5 kg; = 3.59209302326e-05 + ( - 8.069796e-06)*heavyMetalUptakeSwitch; source Freiermuth R.  2006; lognormal variance with pedigree 0.356838, pedigree (2,1,4,1,1)
  Comment on mathematicalRelation:
  -8.069796e-06 from Crop, default, heavy metals uptake model
  Heavy metal uptake can be excluded by setting the parameter heavyMetalUptakeSwitch to zero.
- Cadmium II [water, ground-]: 9.20233e-9 kg; source Freiermuth R.  2006; lognormal variance with pedigree 0.356938, pedigree (2,2,4,1,1)
  Calculated value - Freiermuth (2006). See 'WFLDB-Guidelines.pdf', available at https://ecoquery.ecoinvent.org/File/Reports.
- Cadmium II [water, surface water]: 1.12574e-8 kg; source Freiermuth R.  2006; lognormal variance with pedigree 0.356938, pedigree (2,2,4,1,1)
  (same comment as for Cadmium II)
- Chromium III [water, ground-]: 4.38233e-6 kg; source Freiermuth R.  2006; lognormal variance with pedigree 0.356938, pedigree (2,2,4,1,1)
  (same comment as for Cadmium II)
- Chromium III [water, surface water]: 1.11212e-6 kg; source Freiermuth R.  2006; lognormal variance with pedigree 0.356938, pedigree (2,2,4,1,1)
  (same comment as for Cadmium II)
- Copper ion [water, ground-]: 7.79651e-7 kg; source Freiermuth R.  2006; lognormal variance with pedigree 0.356938, pedigree (2,2,4,1,1)
  (same comment as for Cadmium II)
- Copper ion [water, surface water]: 1.69065e-6 kg; source Freiermuth R.  2006; lognormal variance with pedigree 0.356938, pedigree (2,2,4,1,1)
  (same comment as for Cadmium II)
- Lead II [water, ground-]: 2.6814e-8 kg; source Freiermuth R.  2006; lognormal variance with pedigree 0.356938, pedigree (2,2,4,1,1)
  (same comment as for Cadmium II)
- Lead II [water, surface water]: 2.21707e-7 kg; source Freiermuth R.  2006; lognormal variance with pedigree 0.356938, pedigree (2,2,4,1,1)
  (same comment as for Cadmium II)
- Mercury II [water, ground-]: 3.66442e-10 kg; source Freiermuth R.  2006; lognormal variance with pedigree 0.356938, pedigree (2,2,4,1,1)
  (same comment as for Cadmium II)
- Mercury II [water, surface water]: 3.03233e-9 kg; source Freiermuth R.  2006; lognormal variance with pedigree 0.356938, pedigree (2,2,4,1,1)
  (same comment as for Cadmium II)
- Nickel II [water, ground-]: 3.71837e-11 kg; source Freiermuth R.  2006; lognormal variance with pedigree 0.356938, pedigree (2,2,4,1,1)
  (same comment as for Cadmium II)
- Nickel II [water, surface water]: 7.34767e-7 kg; source Freiermuth R.  2006; lognormal variance with pedigree 0.356938, pedigree (2,2,4,1,1)
  (same comment as for Cadmium II)
- Nitrate [water, ground-]: 0.0156316 kg; source Richner W. 2014; lognormal variance with pedigree 0.175866, pedigree (2,2,4,1,1)
- Phosphate [water, ground-]: 4.29814e-5 kg; source Prasuhn V.  2006; lognormal variance with pedigree 0.175866, pedigree (2,2,4,1,1)
  Calculated value - Prasuhn (2006). See 'WFLDB-Guidelines.pdf', available at https://ecoquery.ecoinvent.org/File/Reports.
- Phosphate [water, surface water]: 0.000193877 kg; source Prasuhn V.  2006; lognormal variance with pedigree 0.175866, pedigree (2,2,4,1,1)
  (same comment as for Phosphate)
- Phosphorus [water, surface water]: 3.10279e-5 kg; source Prasuhn V.  2006; lognormal variance with pedigree 0.175866, pedigree (2,2,4,1,1)
  Calculated value - Prasuhn (2006) and SQCB-Erosion. See 'WFLDB-Guidelines.pdf', available at https://ecoquery.ecoinvent.org/File/Reports.
- Water [water, ground-]: 0.00479442 m3; lognormal variance with pedigree 0.124177, pedigree (2,1,4,1,1)
  (same comment as for Water)
- Water [water, surface water]: 0.0191774 m3; lognormal variance with pedigree 0.124177, pedigree (2,1,4,1,1)
  (same comment as for Water)
- Zinc II [water, ground-]: 5.1793e-6 kg; source Freiermuth R.  2006; lognormal variance with pedigree 0.356938, pedigree (2,2,4,1,1)
  (same comment as for Cadmium II)
- Zinc II [water, surface water]: 2.19309e-6 kg; source Freiermuth R.  2006; lognormal variance with pedigree 0.356938, pedigree (2,2,4,1,1)
  (same comment as for Cadmium II)

## Sampling procedure
WFLDB Methodological Guidelines for the Life Cycle Inventory of Agricultural Products in the latest version, available at: (Report section: https://v30.ecoquery.ecoinvent.org/File/Reports). Data sources: Data were categorised from level 0 (L0) to level (L4) as follows: L0 = estimate, proxy; L1 = statistical data (e.g. FAOSTAT); L2 = L1 adapted to crop and country; L3 = literature data or L1 resp. L2 data approved by experts; medium detailing (i.e. kg of total N-fertiliser); L4 = L3 data of high detailing (i.e. portion N-fertiliser types).In this dataset data were obtained for yield: L3, fertilisers: L4, pesticides: L4, machinery and work processes: L0/L4, amount of irrigation: L3. For information regarding the calculation of individual exchanges see supporting documentation WFLDB-Documentation.pdf.

## Extrapolations
If used, extrapolations are documented on the flow level.

## Review by Assumpció ANTON 2016-05-30
Be aware that the use of statistics in input calculations could provide some specific inputs not common for specific crops, this should be corrected if better information is available and better reflexed in DQR . Currently, I would dissent for some of good marks provided, being a revision of criteria applied advisable.
Pesticides will need to be amended periodically checking for update of pesticides' ban.
