# treatment of waste paperboard, inert material landfill

Dataset: EcoSpold 2, unit process
Geography: RoW
Time period: 1995-01-01 to 2023-12-31
Technology level: current
Classification: EcoSpold01Categories: waste management/inert material landfill
Classification: ISIC rev.4 ecoinvent: 3821:Treatment and disposal of non-hazardous waste
Tags: ConvertedDataset; Treatment
Scenario: Business-as-Usual
System model: Allocation, cut-off by classification
Generated by: Gabor Doka (obsolete)
Published in: Doka G. 2007
Database: ecoinvent
isCopyrightProtected: true
accessRestrictedTo: 1

## General comment
[This dataset was already contained in the ecoinvent database version 2. It was not individually updated during the transfer to ecoinvent version 3. Life Cycle Impact Assessment results may still have changed, as they are affected by changes in the supply chain, i.e. in other datasets. This dataset was generated following the ecoinvent quality guidelines for version 2. It may have been subject to central changes described in the ecoinvent version 3 change report (http://www.ecoinvent.org/database/ecoinvent-version-3/reports-of-changes/), and the results of the central updates were reviewed extensively. The changes added e.g. consistent water flows and other information throughout the database. The documentation of this dataset can be found in the ecoinvent reports of version 2, which are still available via the ecoinvent website. The change report linked above covers all central changes that were made during the conversion process.]

## Included activities end
No direct emissions from inert material landfill (leachate) are inventoried as deemed negligible. Module contains only exchanges to process-specific burdens (energy, land use) and infrastructure.

## Geography
Specific to the technology encountered in Switzerland in 2000.

## Technology
landfill with renaturation after closure. 50% of the sites feature a base seal and leachate collection system.

## Reference product
- waste paperboard: -1 kg; By-product classification Waste; CPC 39240: Waste and scrap of paper or paperboard; HS2017 470790: Paper or paperboard; waste and scrap, of paper or paperboard n.e.c. in heading no. 4707 and of unsorted was[...]
  EcoSpold01Location=CH
  production volume 4.50138e10 kg
    Calculated. The values has been calculated form total production of paper and paperboard (link:http://www.erpa.info/images/Special_Recycling_2005_statistics.pdf, accessed 20150930), Paperboard is 51.8% of paper and paperboard global production (link: http://www.paperonweb.com/World.htm, accessed 20150930). The proportion of paperboard that goes to landfill is 29.41% (link: http://www.erpa.info/images/Special_Recycling_2005_statistics.pdf, accessed 20150930). Of the waste that goes to landfill 99.96%goes to sanitary landfill (calculated from share of sanitary and inert material landfills reported in Ecoinvent v2 "Life cycle inventories of waste treatment services. Part II landfills underground deposit landfarming")
  property carbon content, non-fossil 0.483259
    C content was calculated for 1 kg DM, using data in Tab A.3, ecoinvent v2.2 report 13_I.
  property heating value, net 15.92 MJ
    Value taken from the general comment of the treatment dataset.
  property price 0 EUR2005
    Waste products are assigned a price of zero as they are assumed to require further treatment.
  properties: carbon allocation 0.38854 kg, carbon content 0.483259, carbon content, fossil 0, dry mass 0.804 kg, water content 0.243781, water in wet mass 0.196 kg, wet mass 1 kg

## Inputs from technosphere
- inert material landfill: 1.48e-9 unit; lognormal variance with pedigree 0.042, pedigree (1,1,5,5,1)
  EcoSpold01Location=CH
  landfill infrastructure per kg waste, uncerteinty heeded in module.
- process-specific burdens, inert material landfill: 1 kg; lognormal variance with pedigree 0.042, pedigree (1,1,5,5,1)
  EcoSpold01Location=CH
  process-specific burdens per kg waste, uncerteinty heeded in module.

## Extrapolations
This dataset has been copied from an original dataset covering the geography CH. The uncertainty has been adjusted accordingly.

## Review by Niels Jungbluth 2003-05-28
Passed.
