# establishing orchard

Dataset: EcoSpold 2, unit process
Geography: RoW
Time period: 2011-01-01 to 2023-12-31
Technology level: current
Classification: ISIC rev.4 ecoinvent: 0161:Support activities for crop production
Tags: WFLDB
Scenario: Business-as-Usual
System model: Allocation, cut-off by classification
Generated by: [System]
Database: ecoinvent
isCopyrightProtected: true
accessRestrictedTo: 1

## General comment
This global dataset is a copy of the regional CH dataset, except for the following modifications.
The production volume represents the global annual production.
The geographicalCorrelation score of every pedigree matrix of was changed to '5'.
The comments below were part of the CH regional dataset.
This dataset represents the production of 1 tree cultivated after planting during 3 years of establishment phase. Not included are trellis systems of the orchard such as posts or wires to attach trees. The input are related to an orchard of 1 ha and 2000 trees.
This dataset refers to an average situation; for specific situations exchanges might differ substantially due to site specific parameters.

## Included activities start
This activity starts with tillage (plough), soil cultivation, grass sowing between tree rows, and fertiliser and pesticide application during the period of the first three years.

## Included activities end
This activity ends with an established orchard, three years after planting, that is at the beginning of the productive phase, i.e. the years in which the yield is of economic significance.

## Time period
Time period referring to the data source: 2011. Based on expert opinion data is considered to be valid at least up to 2015.

## Reference product
- establishing orchard: 1 unit; By-product classification allocatable product; CPC 86119: Other support services to crop production
  production volume 1.30484e10 unit
    Source: FAOSTAT. Average, 2009-2012. Calculation method: fruit tree area * planting density
  property price 0.209879 EUR2005
    Calculated based on inputs: The price of the product has been calculated as a sum of the values of the material and energy inputs for this product. This value is therefore a rough estimation. It may underestimate the real price since there are additional expenses when producing any product. These expences can include for example labour costs, treatment of waste materials and profit for the producer. Please consider carefully whether this level of data quality is acceptable for your application.
  properties: carbon allocation 0 kg, carbon content 0

## Inputs from technosphere
- [thio]carbamate-compound: 0.000124875 kg; lognormal variance with pedigree 0.126664, pedigree (2,2,4,5,1)
  Corresponds to 0.25 kg/ha in 3 years
  properties: carbon content, fossil 0.626349, dry mass 1 kg, wet mass 1 kg
- ammonium nitrate: 0.0104972, 0.0356349, 0.0136574 kg (3 suppliers, which the file names only by identifier); sum of these 0.0597894 kg; lognormal variance with pedigree 0.126177, pedigree (2,1,4,5,1)
  The exchange has been updated from 'ammonium nitrate, as N' into 'ammonium nitrate' and therefore its amount has been scaled (multiplied) from 0.0209 kg by 2.8573 kg of 'ammonium nitrate' per kg of 'ammonium nitrate, as N'. Original comment of the exchange is: Corresponds to 41.85 kg/ha in 3 years
  properties: dry mass 1 kg, wet mass 1 kg
- application of plant protection product, by field sprayer: 0.0102 ha; lognormal variance with pedigree 0.126664, pedigree (2,2,4,5,1)
  Corresponds to 20.4 applications in 3 years
- cyclic N-compound: 0.00130635 kg; lognormal variance with pedigree 0.126664, pedigree (2,2,4,5,1)
  Corresponds to 2.61 kg applied in 3 years (insecticide)
  properties: carbon content, fossil 0.641962, dry mass 1 kg, wet mass 1 kg
- fertilising, by broadcaster: 0.00144998 ha; lognormal variance with pedigree 0.126177, pedigree (2,1,4,5,1)
  Corresponds to 2.9 applications in 3 years
- glyphosate: 0.00048713 kg; lognormal variance with pedigree 0.126664, pedigree (2,2,4,5,1)
  Corresponds to 0.97 kg applied in 3 years (herbicide in tree rows)
  properties: carbon content, fossil 0.214286, dry mass 1 kg, wet mass 1 kg
- grass seed, Swiss integrated production, at farm: 0.02 kg; lognormal variance with pedigree 0.0512412, pedigree (1,1,4,5,3)
  after tillage 40 kg/ha seeds applied between tree rows
  properties: carbon content, non-fossil 0.464601, dry mass 0.9 kg, water content 0.111111, wet mass 1 kg
- inorganic phosphorus fertiliser, as P2O5: 5.58657e-6, 1.51735e-6, 4.13007e-6, 1.00758e-5, 0.000125718, 0.000279049, 3.83079e-5, 4.68873e-6, 5.83996e-5, 2.59376e-6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 kg (63 suppliers, which the file names only by identifier); sum of these 0.01782 kg; lognormal variance with pedigree 0.126177, pedigree (2,1,4,5,1)
  Corresponds to 35.64 kg/ha in 3 years
  properties: dry mass 1 kg, wet mass 1 kg
- inorganic potassium fertiliser, as K2O: 1.12717e-5, 5.95661e-5, 1.42042e-5, 4.30708e-5, 8.01851e-7, 6.41481e-6, 2.56592e-5, 0.000377832, 0.000383972, 0.000124631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 kg (63 suppliers, which the file names only by identifier); sum of these 0.06684 kg; lognormal variance with pedigree 0.126177, pedigree (2,1,4,5,1)
  properties: dry mass 1 kg, wet mass 1 kg
- lime: 0.04305 kg; lognormal variance with pedigree 0.126177, pedigree (2,1,4,5,1)
  Corresponds to 86.1 kg/ha in 3 years
  properties: carbon content, fossil 0.120005, dry mass 1 kg, wet mass 1 kg
- magnesium oxide: 0.0143497 kg; lognormal variance with pedigree 0.0153563, pedigree (2,1,4,5,1)
  Corresponds to 28.7 kg applied in 3 years
  properties: dry mass 1 kg, wet mass 1 kg
- organophosphorus-compound, unspecified: 3.405e-5 kg; lognormal variance with pedigree 0.126664, pedigree (2,2,4,5,1)
  Corresponds to 0.07 kg applied in 3 years (herbicide in tree rows; corresponds to Organophosphorous-compound FromTechnosphere)
  properties: carbon content, fossil 0.260898, dry mass 1 kg, wet mass 1 kg
- packaging, for fertilisers: 0.32597 kg; lognormal variance with pedigree 0.0592, pedigree (4,3,4,5,4)
  Total amount of active substance/s of fertilisers needed for the production of 'establishing orchard' is calculated to be circa 1.63E-01 kg. Fertiliser/s used in this dataset is/are: 'ammonium nitrate, as N', 'lime', 'magnesium oxide', 'phosphate fertiliser, as P2O5', 'potassium fertiliser, as K2O'. The total amount of active substance/s is doubled in order to account for the packaging of the dilluted product of fertiliser/s that is/are applied. Therefore, 3.26E-01 kg of packaging for fertilisers is justified with this exchange.
  properties: carbon content, fossil 0.825301, dry mass 1 kg, heating value, net 25.01 MJ, price 0.0642 EUR2005, wet mass 1 kg
  note on carbon content, fossil: Considering a chemical formula (C2H4)n for polyethylene, carbon content-fossil is calculated to be 0.856286 kg of Carbon per kg of dry mass.
- packaging, for pesticides: 0.0242583 kg; lognormal variance with pedigree 0.0592, pedigree (4,3,4,5,4)
  Total amount of active substance/s of pesticides needed for the production of establishing orchard is calculated to be circa 1.21E-02 kg. Pesticide/s used in this dataset is/are: '[thio]carbamate-compound', 'cyclic N-compound', 'glyphosate', 'organophosphorus-compound, unspecified', 'sulfur'. The total amount of active substance/s is doubled in order to account for the packaging of the dilluted product of pesticide/s that is/are applied. Therefore, 2.43E-02 kg of packaging for pesticides is justified with this exchange.
  properties: carbon content, fossil 0.85714, dry mass 1 kg, heating value, net 25.97 MJ, price 0.0642 EUR2005, wet mass 1 kg
- shed, large, wood, non-insulated, fire-unprotected: 0.000418058 m2; lognormal variance with pedigree 0.0153563, pedigree (2,1,4,5,1)
  for storage of divers materials 0.84 m2/ha and year
  properties: Surface 264 m2, lifetime 50 year
- sowing: 0.0005 ha; lognormal variance with pedigree 0.126177, pedigree (2,1,4,5,1)
  once before tree planting
- sulfur: 0.0101768 kg; lognormal variance with pedigree 0.0672655, pedigree (2,2,4,5,1)
  Corresponds to 20.35 kg/ha in 3 years
  properties: dry mass 1 kg, wet mass 1 kg
- tillage, ploughing: 0.0005 ha; lognormal variance with pedigree 0.126177, pedigree (2,1,4,5,1)
  once before tree planting
- tillage, rolling: 0.0005 ha; lognormal variance with pedigree 0.126177, pedigree (2,1,4,5,1)
  once before tree planting
- transport, tractor and trailer, agricultural: 0.0210502 metric ton*km; lognormal variance with pedigree 0.164439, pedigree (4,1,4,5,1)
  transport on the farm for divers materials, e.g. transport of fertiliser to the orchard where it is loaded on the fertiliser application machinery (42.1 tkm/ha in 3 years)

## Inputs from nature
- Carbon dioxide, in air [natural resource, in air]: 1.767 kg; lognormal variance with pedigree 0.0158498, pedigree (2,2,4,5,1)
  Corresponds to 3534 kg/ha in 3 years. The CO2 uptake is calculated from the carbon content of the product (i.e. tree that is 3 years old after planting); it is estimated by the following assumptions: tree hight 1.50 m; tree dyameter 0.05 m; specific weight of dry wood (20% water content) 650 kg/m3; (results in 1.914 kg/tree dry wood; CO2 fixation: 600 kg CO2/m3 dry wood
- Energy, gross calorific value, in biomass [natural resource, biotic]: 36.37 MJ; lognormal variance with pedigree 0.0158498, pedigree (2,2,4,5,1)
  Corresponds to 72748 MJ/ha in 3 years. Assumptions: gross caloric value 19 MJ/kg dry wood (20% water content); 1.914 kg/tree dry wood.
- Occupation, pasture, man made, intensive [natural resource, land]: 7.518 m2*year; lognormal variance with pedigree 0.0220616, pedigree (2,1,4,5,1)
  corresponds to 10024 m2 per year
- Transformation, from pasture, man made, intensive [natural resource, land]: 0.375 m2; lognormal variance with pedigree 0.0462144, pedigree (2,1,4,5,1)
  corresponds to 500 m2 per year
- Transformation, to pasture, man made, intensive [natural resource, land]: 0.375 m2; lognormal variance with pedigree 0.0462144, pedigree (2,1,4,5,1)
  corresponds to 500 m2 per year

## Emissions to nature
- Ammonia [air, non-urban air or from high stacks]: 0.000508178 kg; source EAA _ European Aluminium Association 2013; lognormal variance with pedigree 0.0467216, pedigree (2,2,4,5,1)
  from applied N-fertilisers and soil cultivation, corresponds to 1.02 kg/ha in 3 years
- Dinitrogen monoxide [air, non-urban air or from high stacks]: 0.000364958 kg; lognormal variance with pedigree 0.126664, pedigree (2,2,4,5,1)
  from denitrification, corresponds to 0.73 kg/ha in 3 years
- Nitrogen oxides [air, non-urban air or from high stacks]: 7.66425e-5 kg; source EEA 2013; lognormal variance with pedigree 0.126664, pedigree (2,2,4,5,1)
  Corresponds to 0.15 kg/ha in 3 years
- Cadmium II [soil, agricultural]: 1.974e-6 kg; source Freiermuth R. 2006; lognormal variance with pedigree 0.177866, pedigree (2,2,4,5,1)
- Chromium III [soil, agricultural]: 6.63008e-6 kg; source Freiermuth R. 2006; lognormal variance with pedigree 0.177866, pedigree (2,2,4,5,1)
  Corresponds to 1.33E-02 kg/ha in 3 years
- Copper ion [soil, agricultural]: 3.5433e-6 kg; source Freiermuth R. 2006; lognormal variance with pedigree 0.177866, pedigree (2,2,4,5,1)
  Corresponds to 7.09E-03 kg/ha in 3 years
- Difenoconazole [soil, agricultural]: 0.00130635 kg; lognormal variance with pedigree 0.0467216, pedigree (2,2,4,5,1)
  modelled as 100% to soil (copy past comment from crop DS as soon as they are in eE), corresponds to 2.61 kg/ha in 3 years
- Glufosinate [soil, agricultural]: 3.405e-5 kg; lognormal variance with pedigree 0.126664, pedigree (2,2,4,5,1)
  modelled as 100% to soil (copy past comment from crop DS as soon as they are in eE), corresponds to 0.07 kg/ha in 3 years
- Glyphosate [soil, agricultural]: 0.000487125 kg; lognormal variance with pedigree 0.126664, pedigree (2,2,4,5,1)
  modelled as 100% to soil (copy past comment from crop DS as soon as they are in eE), corresponds to 0.97 kg/ha in 3 years
- Lead II [soil, agricultural]: 8.24925e-7 kg; source Freiermuth R. 2006; lognormal variance with pedigree 0.177866, pedigree (2,2,4,5,1)
  Corresponds to 1.65E-03 kg/ha in 3 years
- Mercury II [soil, agricultural]: 5.44477e-10 kg; source Freiermuth R. 2006; lognormal variance with pedigree 0.177866, pedigree (2,2,4,5,1)
  Corresponds to 1.09E-06 kg/ha in 3 years
- Nickel II [soil, agricultural]: 1.8762e-6 kg; source Freiermuth R. 2006; lognormal variance with pedigree 0.177866, pedigree (2,2,4,5,1)
- Pirimicarb [soil, agricultural]: 0.000124875 kg; lognormal variance with pedigree 0.0467216, pedigree (2,2,4,5,1)
  modelled as 100% to soil (copy past comment from crop DS as soon as they are in eE), corresponds to 0.25 kg/ha in 3 years
- Sulfur [soil, agricultural]: 0.0101732 kg; lognormal variance with pedigree 0.241947, pedigree (2,2,4,5,1)
  Corresponds to 20.35 kg/ha in 3 years
- Zinc II [soil, agricultural]: 1.54493e-5 kg; source Freiermuth R. 2006; lognormal variance with pedigree 0.177866, pedigree (2,2,4,5,1)
- Cadmium II [water, ground-]: 5.03505e-11 kg; source Freiermuth R. 2006; lognormal variance with pedigree 0.358938, pedigree (2,2,4,5,1)
  mainly from applied fertilisers and pesticides, corresponds to 1.01E-07 kg/ha in 3 years
- Cadmium II [water, surface water]: 5.90932e-8 kg; source Freiermuth R. 2006; lognormal variance with pedigree 0.358938, pedigree (2,2,4,5,1)
  mainly from applied fertilisers and pesticides, corresponds to 1.18E-04 kg/ha in 3 years
- Chromium III [water, ground-]: 8.19375e-9 kg; source Freiermuth R. 2006; lognormal variance with pedigree 0.358938, pedigree (2,2,4,5,1)
  mainly from applied fertilisers and pesticides, corresponds to 1.64E-05 kg/ha in 3 years
- Chromium III [water, surface water]: 1.74187e-5 kg; source Freiermuth R. 2006; lognormal variance with pedigree 0.358938, pedigree (2,2,4,5,1)
- Copper ion [water, ground-]: 1.10498e-7 kg; source Freiermuth R. 2006; lognormal variance with pedigree 0.358938, pedigree (2,2,4,5,1)
  mainly from applied fertilisers and pesticides, corresponds to 2.21E-04 kg/ha in 3 years
- Copper ion [water, surface water]: 4.56817e-6 kg; source Freiermuth R. 2006; lognormal variance with pedigree 0.358938, pedigree (2,2,4,5,1)
  mainly from applied fertilisers and pesticides, corresponds to 9.14E-03 kg/ha in 3 years
- Lead II [water, ground-]: 3.47745e-10 kg; source Freiermuth R. 2006; lognormal variance with pedigree 0.358938, pedigree (2,2,4,5,1)
  mainly from applied fertilisers and pesticides, corresponds to 6.95E-07 kg/ha in 3 years
- Lead II [water, surface water]: 2.44058e-7 kg; source Freiermuth R. 2006; lognormal variance with pedigree 0.358938, pedigree (2,2,4,5,1)
  mainly from applied fertilisers and pesticides, corresponds to 4.88E-04 kg/ha in 3 years
- Mercury II [water, ground-]: 9.31725e-9 kg; source Freiermuth R. 2006; lognormal variance with pedigree 0.358938, pedigree (2,2,4,5,1)
  mainly from applied fertilisers and pesticides, corresponds to 1.86E-05 kg/ha in 3 years
- Nickel II [water, ground-]: 2.73112e-9 kg; source Freiermuth R. 2006; lognormal variance with pedigree 0.358938, pedigree (2,2,4,5,1)
  mainly from applied fertilisers and pesticides, corresponds to 5.46E-06 kg/ha in 3 years
- Nickel II [water, surface water]: 1.63102e-6 kg; source Freiermuth R. 2006; lognormal variance with pedigree 0.358938, pedigree (2,2,4,5,1)
- Nitrate [water, ground-]: 0.0111068 kg; lognormal variance with pedigree 0.177866, pedigree (2,2,4,5,1)
  from applied N-fertilisers, corresponds to 22.21 kg/ha in 3 years
- Phosphate [water, surface water]: 0.00158153 kg; source Prasuhn V.  2006; lognormal variance with pedigree 0.177866, pedigree (2,2,4,5,1)
- Phosphorus [water, surface water]: 0.00014814 kg; source Prasuhn V.  2006; lognormal variance with pedigree 0.177866, pedigree (2,2,4,5,1)
  from applied P-fertilisers, corresponds to 0.3 kg/ha in 3 years
- Zinc II [water, ground-]: 2.2056e-7 kg; source Freiermuth R. 2006; lognormal variance with pedigree 0.177866, pedigree (2,2,4,5,1)
  Corresponds to 4.41E-04 kg/ha in 3 years
- Zinc II [water, surface water]: 8.1615e-6 kg; source Freiermuth R. 2006; lognormal variance with pedigree 0.177866, pedigree (2,2,4,5,1)
  Corresponds to 1.63E-02 kg/ha in 3 years

## Sampling procedure
Inputs for fertilisers and pesticides and related machinery work processes are taken from ecoinvent v2.2 activity: 'Apple, IP, at farm/kg/CH U' that represent 1 year in the productive phase of an apple orchard. These data were adapted to the establishment phase of an orchard as follows: The reference flow is 0.00075 of 1 year in the productive phase; the factor 0.00075 is based on the assumption that in one year of the establishment phase uses 0.5 of the inputs of a productive year, the establishment phase lasts for 3 years and 2000 trees per ha are planted in the orchard (1 * 0.5 * 3 / 2000 = 0.00075).

## Extrapolations
The amount of the exchanges are copy from a regional dataset.
