# air separation facility construction

Dataset: EcoSpold 2, unit process
Geography: RoW
Time period: 1997-01-01 to 2023-12-31
Technology level: current
Classification: ISIC rev.4 ecoinvent: 4290:Construction of other civil engineering projects
Classification: EcoSpold01Categories: chemicals/inorganics
Tags: ConvertedDataset
Scenario: Business-as-Usual
System model: Allocation, cut-off by classification
Generated by: Alex Primas
Published in: Althaus H.-J. 2007
Database: ecoinvent
isCopyrightProtected: true
accessRestrictedTo: 1

## General comment
Large uncertainties for equipment used due to weak data from small air separation plants. Process refers to an estimated air separation plant with 80'000 t liquid products per year. Assumed life time 20 years.
[This dataset was already contained in the ecoinvent database version 2. It was not individually updated during the transfer to ecoinvent version 3. Life Cycle Impact Assessment results may still have changed, as they are affected by changes in the supply chain, i.e. in other datasets. This dataset was generated following the ecoinvent quality guidelines for version 2. It may have been subject to central changes described in the ecoinvent version 3 change report (http://www.ecoinvent.org/database/ecoinvent-version-3/reports-of-changes/), and the results of the central updates were reviewed extensively. The changes added e.g. consistent water flows and other information throughout the database. The documentation of this dataset can be found in the ecoinvent reports of version 2, which are still available via the ecoinvent website. The change report linked above covers all central changes that were made during the conversion process.]

## Included activities end
Aluminium for distillation column, approximated infrastructure process for further infrastructure and dismatling, land use, no energy for construction processes included.

## Geography
Data partly from U.S. plant producer.

## Technology
No specific technology modelled

## Reference product
- air separation facility: 1 unit; By-product classification allocatable product; CPC 53269: Other constructions for manufacturing
  EcoSpold01Location=RER
  production volume 2.67763 unit
    This is a placeholder value that does not reflect real-world production volumes. This dataset does not currently require a real-world production volume to work in the database framework, and no actual data were collected yet. This has no negative effect on the results of the ecoinvent database.
  property price 2.95463e6 EUR2005
    Convert from EU 27 price to the world by currency exchange rate.
  properties: carbon allocation 0 kg, carbon content 0

## Inputs from technosphere
- aluminium, wrought alloy: 10000 kg; lognormal variance with pedigree 0.148, pedigree (5,5,5,5,3)
  Estimated from data of small plants
  EcoSpold01Location=RER
  Uncertainty: Estimated from data of small plants
  properties: dry mass 1 kg, wet mass 1 kg
- chemical factory: 90000 kg; lognormal variance with pedigree 0.448, pedigree (5,5,5,5,3)
  EcoSpold01Location=RER
  Estimated from data of small plants
  Uncertainty: Estimated from data of small plants
- decommissioned chemical production facilities: -90000 kg; lognormal variance with pedigree 0.408, pedigree (5,5,1,5,3)
  (same comment as for aluminium, wrought alloy)
  production volume
    Calculated from the production volume of air separation facility in proportion to the respective output amounts.
  properties: carbon content, fossil 0.0169382, carbon content, non-fossil 5.78006e-6, dry mass 1 kg, wet mass 1 kg
  note on carbon content, fossil: Calculated from C content in input materials in the infrastructure

## Inputs from nature
- Occupation, construction site [natural resource, land]: 1000 m2*year; lognormal variance with pedigree 0.136, pedigree (4,5,5,5,3)
  Estimated from data of small plants
  Uncertainty: Estimated from data of small plants
- Occupation, industrial area [natural resource, land]: 20000 m2*year; lognormal variance with pedigree 0.136, pedigree (4,5,5,5,3)
  Estimated from data of small plants
  Uncertainty: Estimated from data of small plants
- Transformation, from unspecified [natural resource, land]: 1000 m2; lognormal variance with pedigree 0.216, pedigree (4,5,5,5,3)
  Estimated from data of small plants
  Uncertainty: Estimated from data of small plants
- Transformation, to industrial area [natural resource, land]: 1000 m2; lognormal variance with pedigree 0.216, pedigree (4,5,5,5,3)
  Estimated from data of small plants
  Uncertainty: Estimated from data of small plants

## Sampling procedure
Estimation from weak data of smaller plants.

## Extrapolations
Extrapolation small plants with a production volume of 0.1-3 t per hour to a larger plant with 10 t per hour production. This dataset has been copied from an original dataset covering the geography RER. The uncertainty has been adjusted accordingly.

## Review by Roland Hischier 2003-08-26
Passed.
