# treatment of waste paperboard, open burning

Dataset: EcoSpold 2, unit process
Geography: GLO
Time period: 2006-01-01 to 2023-12-31
Technology level: current
Classification: ISIC rev.4 ecoinvent: 3821:Treatment and disposal of non-hazardous waste
Scenario: Business-as-Usual
System model: Allocation, cut-off by classification
Generated by: Nikolia Stoikou
Database: ecoinvent
isCopyrightProtected: true
accessRestrictedTo: 1

## General comment
This dataset represents the activity of waste disposal of 'waste paperboard' in uncontrolled, open burning. Recommended use of this dataset: uncontrolled disposal of waste paperboard for waste material going to open burning as part of unsorted, unmanaged, unscavenged municipal waste mixture. Inventoried waste consists of fraction: 100% cardboard. Waste composition (wet, in ppmw): gross heating value 15.61 MJ/kg; net heating value 14.21 MJ/kg; H2O 166670; O na; H 98787; C 640480; S 1636.9; N 6258.4; P 425.31; B na; Cl 1999.5; Br 16.085; F 37.789; I na; Ag 1.0092; As 3.0708; Ba 232.91; Cd 0.34562; Co 7.8638; Cr 8.6236; Cu 68.797; Hg 39.61; Mn 56.696; Mo 1.4747; Ni 3.6203; Pb 16.792; Sb 0.37339; Se 54.889; Sn 1.3466; V 3.1424; Zn 58.914; Be 3.9562; Sc 0.92389; Sr 131.11; Ti 26.807; Tl 0.49387; W 1.0665; Si 2204.6; Fe 978.5; Ca 66160; Al 6756.6; K 1750.7; Mg 2016.5; Na 3106.1. Share of carbon in waste that is biogenic 100%. Recycling rates for metallic iron = 0% for metallic aluminium = 0% for metallic copper = 0% . A mass of 0.135kg residues are left on ground.

## Included activities start
The activity starts with the waste being available at the location (gate) of the uncontrolled disposal. Collection and transportation of the waste to the uncontrolled disposal location is not included.

## Included activities end
The activity ends with the waste being disposed, in an uncontrolled manner and waste-specific emissions from open burning are released to the environment (air and soil).

## Geography
Modelling parameters representing a generic open burning process, not geographical specific.

## Technology
This is an inventory for open burning of solid waste, representing an informal and uncontrolled burning. No flue gas treatment. Suitable for informal recycling or disposal. Based on Municipal waste incineration without any pollution control. Residues (minus any actually recycled metals) are left on site. Assumption of share of thermal NOx to total NOx in average waste burning process is 30%. Contribution from thermal NOx is 810mg per kg waste. Recycling rates for metallic iron = 0% for metallic aluminium = 0% for metallic copper = 0%.

## Time period
This dataset represents a generic open burning without any temporal distinction.

## Reference product
- waste paperboard: -1 kg; By-product classification Waste; CPC 39240: Waste and scrap of paper or paperboard; HS2017 470790: Paper or paperboard; waste and scrap, of paper or paperboard n.e.c. in heading no. 4707 and of unsorted was[...]
  main reference product of this activity
  production volume 6.1608e9 kg
    Estimated based on the total amount of this waste being treated in the database. The value is then adjusted to reflect the current treatment in the given geography
  property price 0 EUR2005
    Waste products are assigned a price of zero as they are assumed to require further treatment.
  properties: aluminium content 0.00810789, antimony content 4.48068e-7, arsenic content 3.68496e-6, barium content 0.000279494, beryllium content 4.74739e-6, bromine content 1.93019e-5, cadmium content 4.14741e-7, calcium content 0.0793914, carbon allocation 0.640476 kg, carbon content 0.768571, carbon content, fossil 0, carbon content, non-fossil 0.768571, chlorine content 0.00239941, chromium content 1.03483e-5, cobalt content 9.43654e-6, copper content 8.25559e-5, dry mass 0.833333 kg, fluorine content 4.53473e-5, heating value, gross 15.6086 MJ, heating value, net 14.2064 MJ, hydrogen content 0.118545, iron content 0.0011742, lead content 2.01507e-5, magnesium content 0.00241986, manganese content 6.80349e-5, mercury content 4.75321e-5, molybdenum content 1.76966e-6, nickel content 4.34433e-6, nitrogen content 0.00751004, phosphorus content 0.000510375, potassium content 0.00210086, scandium content 1.10866e-6, selenium content 6.58672e-5, silicon content 0.00264546, silver content 1.21105e-6, sodium content 0.00372738, strontium content 0.000157332, sulfur content 0.0019643, thallium content 5.9265e-7, tin content 1.61597e-6, titanium content 3.21686e-5, tungsten content 1.27983e-6, vanadium content 3.77089e-6, water content 0.2, water in wet mass 0.166667 kg, wet mass 1 kg, zinc content 7.06966e-5

## Inputs from nature
- Organic carbon, placed in landfill [inventory indicator, waste]: 0.003212 kg; lognormal variance with pedigree 0.078509, pedigree (1,1,4,1,1)
  organic carbon placed in landfill (for ecoscarcity LCIA only). Counted here is only organic carbon in burned resides remaining on ground.
  Uncertainty: Uncertainty calculated depending on waste input and uncertainty of transfer coefficents in incineration model.
- Waste mass, total, placed in landfill [inventory indicator, waste]: 0.13501 kg; lognormal variance with pedigree 0.049739, pedigree (1,1,4,1,1)
  waste mass placed in landfill (for ecoscarcity LCIA only). Counted here are only burned resides remaining on ground.
  Uncertainty: Uncertainty calculated depending on waste input and uncertainty of transfer coefficents in incineration model.
- Oxygen [natural resource, in air]: 2.4572 kg; lognormal variance with pedigree 0.023951, pedigree (1,1,4,1,1)
  oxygen from ambient air needed to combust and oxidise this waste. Net demand, i.e. without air O2 leaving the process uncombusted.
  Uncertainty: uncertainty is calculated from uncertainties in waste composition and transfer coefficients to flue gas and soild residues

## Emissions to nature
- Acetaldehyde [air, non-urban air or from high stacks]: 0.0004284 kg; lognormal variance with pedigree 0.0491, pedigree (1,1,4,1,1)
  Process-specific (constant) emissions to air from open burning.
  Uncertainty: uncertainty generic estimate
- Aluminium III [air, non-urban air or from high stacks]: 5.5693e-6 kg; lognormal variance with pedigree 0.53023, pedigree (1,1,4,1,1)
  Emissions to air from open burning.
  Uncertainty: Uncertainty calculated depending on waste input and uncertainty of transfer coefficents in incineration model.
- Antimony ion [air, non-urban air or from high stacks]: 8.9732e-13 kg; lognormal variance with pedigree 1.99, pedigree (1,1,4,1,1)
  (same comment as for Aluminium III)
- Arsenic ion [air, non-urban air or from high stacks]: 2.6172e-8 kg; lognormal variance with pedigree 1.4847, pedigree (1,1,4,1,1)
  (same comment as for Aluminium III)
- Barium II [air, non-urban air or from high stacks]: 9.5997e-6 kg; lognormal variance with pedigree 0.88338, pedigree (1,1,4,1,1)
  (same comment as for Aluminium III)
- Benzene [air, non-urban air or from high stacks]: 0.00097975 kg; lognormal variance with pedigree 0.0491, pedigree (1,1,4,1,1)
  (same comment as for Acetaldehyde)
- Beryllium II [air, non-urban air or from high stacks]: 7.4773e-9 kg; lognormal variance with pedigree 1.4848, pedigree (1,1,4,1,1)
  (same comment as for Aluminium III)
- Bromine [air, non-urban air or from high stacks]: 5.1581e-6 kg; lognormal variance with pedigree 1.2166, pedigree (1,1,4,1,1)
  (same comment as for Aluminium III)
- Cadmium II [air, non-urban air or from high stacks]: 1.9554e-9 kg; lognormal variance with pedigree 1.7762, pedigree (1,1,4,1,1)
  (same comment as for Aluminium III)
- Calcium II [air, non-urban air or from high stacks]: 0.001562 kg; lognormal variance with pedigree 0.20241, pedigree (1,1,4,1,1)
  (same comment as for Aluminium III)
- Carbon dioxide, non-fossil [air, non-urban air or from high stacks]: 2.2598 kg; lognormal variance with pedigree 0.0143963, pedigree (1,1,4,1,1)
  Emissions to air from open burning.
  Uncertainty: Uncertainty calculated depending on waste input, uncertainty of transfer coefficents in incineration model,and uncertainty in CO and CH4 emissions.
- Carbon monoxide, non-fossil [air, non-urban air or from high stacks]: 0.0386 kg; lognormal variance with pedigree 0.65557, pedigree (1,1,4,1,1)
  (same comment as for Acetaldehyde)
- Chromium III [air, non-urban air or from high stacks]: 1.2859e-8 kg; lognormal variance with pedigree 1.3879, pedigree (1,1,4,1,1)
  (same comment as for Aluminium III)
- Cobalt II [air, non-urban air or from high stacks]: 3.1717e-7 kg; lognormal variance with pedigree 1.3337, pedigree (1,1,4,1,1)
  (same comment as for Aluminium III)
- Copper ion [air, non-urban air or from high stacks]: 7.5613e-8 kg; lognormal variance with pedigree 1.1198, pedigree (1,1,4,1,1)
  (same comment as for Aluminium III)
- Dinitrogen monoxide [air, non-urban air or from high stacks]: 0.00011625 kg; lognormal variance with pedigree 0.0491, pedigree (1,1,4,1,1)
  (same comment as for Aluminium III)
- Dioxins, measured as 2,3,7,8-tetrachlorodibenzo-p-dioxin [air, non-urban air or from high stacks]: 3.2136e-11 kg; lognormal variance with pedigree 1.0564, pedigree (1,1,4,1,1)
  Process-specific (constant) emissions to air from open burning.
  Uncertainty: Uncertainty calculated from uncetainty in Chlorine content in waste and estimation formula
- Ethyl benzene [air, non-urban air or from high stacks]: 0.00032746 kg; lognormal variance with pedigree 0.0491, pedigree (1,1,4,1,1)
  (same comment as for Acetaldehyde)
- Formaldehyde [air, non-urban air or from high stacks]: 0.00044365 kg; lognormal variance with pedigree 0.0491, pedigree (1,1,4,1,1)
  (same comment as for Acetaldehyde)
- Heat, waste [air, non-urban air or from high stacks]: 15.609 MJ; lognormal variance with pedigree 0.057793, pedigree (1,1,4,1,1)
  Waste heat generated during combustion from the upper heating value of this waste.
  Uncertainty: uncertainty is calculated from uncertainties in waste composition.
- Hydrochloric acid [air, non-urban air or from high stacks]: 0.0013715 kg; lognormal variance with pedigree 0.57638, pedigree (1,1,4,1,1)
  (same comment as for Aluminium III)
- Hydrogen fluoride [air, non-urban air or from high stacks]: 4.2407e-6 kg; lognormal variance with pedigree 1.1129, pedigree (1,1,4,1,1)
  (same comment as for Aluminium III)
- Iron ion [air, non-urban air or from high stacks]: 1.7729e-6 kg; lognormal variance with pedigree 0.75617, pedigree (1,1,4,1,1)
  (same comment as for Aluminium III)
- Lead II [air, non-urban air or from high stacks]: 1.4111e-7 kg; lognormal variance with pedigree 1.261, pedigree (1,1,4,1,1)
  (same comment as for Aluminium III)
- Magnesium [air, non-urban air or from high stacks]: 6.0414e-6 kg; lognormal variance with pedigree 0.65074, pedigree (1,1,4,1,1)
  (same comment as for Aluminium III)
- Manganese II [air, non-urban air or from high stacks]: 4.826e-7 kg; lognormal variance with pedigree 1.0991, pedigree (1,1,4,1,1)
  (same comment as for Aluminium III)
- Mercury II [air, non-urban air or from high stacks]: 2.4006e-5 kg; lognormal variance with pedigree 1.094, pedigree (1,1,4,1,1)
  (same comment as for Aluminium III)
- Methane, non-fossil [air, non-urban air or from high stacks]: 0.0059 kg; lognormal variance with pedigree 0.0491, pedigree (1,1,4,1,1)
  (same comment as for Acetaldehyde)
- Molybdenum VI [air, non-urban air or from high stacks]: 7.3615e-9 kg; lognormal variance with pedigree 1.5916, pedigree (1,1,4,1,1)
  (same comment as for Aluminium III)
- Nickel II [air, non-urban air or from high stacks]: 5.165e-9 kg; lognormal variance with pedigree 1.5032, pedigree (1,1,4,1,1)
  (same comment as for Aluminium III)
- Nitrogen oxides [air, non-urban air or from high stacks]: 0.0084202 kg; lognormal variance with pedigree 0.3706, pedigree (1,1,4,1,1)
  (same comment as for Aluminium III)
- PAH, polycyclic aromatic hydrocarbons [air, non-urban air or from high stacks]: 0.0003443 kg; lognormal variance with pedigree 0.30974, pedigree (1,1,4,1,1)
  (same comment as for Acetaldehyde)
- Particulate Matter, < 2.5 um [air, non-urban air or from high stacks]: 0.0022592 kg; lognormal variance with pedigree 0.21114, pedigree (1,1,4,1,1)
  (same comment as for Aluminium III)
- Particulate Matter, > 10 um [air, non-urban air or from high stacks]: 0.00086891 kg; lognormal variance with pedigree 0.21114, pedigree (1,1,4,1,1)
  (same comment as for Aluminium III)
- Particulate Matter, > 2.5 um and < 10um [air, non-urban air or from high stacks]: 0.0012165 kg; lognormal variance with pedigree 0.21114, pedigree (1,1,4,1,1)
  (same comment as for Aluminium III)
- Phenol [air, non-urban air or from high stacks]: 1.4799e-5 kg; lognormal variance with pedigree 0.0491, pedigree (1,1,4,1,1)
  (same comment as for Acetaldehyde)
- Phosphorus [air, non-urban air or from high stacks]: 2.9222e-6 kg; lognormal variance with pedigree 0.83574, pedigree (1,1,4,1,1)
  (same comment as for Aluminium III)
- Polychlorinated biphenyls [air, non-urban air or from high stacks]: 1.1189e-7 kg; lognormal variance with pedigree 0.0491, pedigree (1,1,4,1,1)
  (same comment as for Acetaldehyde)
- Potassium I [air, non-urban air or from high stacks]: 2.5948e-5 kg; lognormal variance with pedigree 0.63583, pedigree (1,1,4,1,1)
  (same comment as for Aluminium III)
- Scandium [air, non-urban air or from high stacks]: 9.2389e-10 kg; lognormal variance with pedigree 1.6901, pedigree (1,1,4,1,1)
  (same comment as for Aluminium III)
- Selenium IV [air, non-urban air or from high stacks]: 4.7572e-6 kg; lognormal variance with pedigree 1.0656, pedigree (1,1,4,1,1)
  (same comment as for Aluminium III)
- Silicon [air, non-urban air or from high stacks]: 1.0301e-8 kg; lognormal variance with pedigree 0.82646, pedigree (1,1,4,1,1)
  (same comment as for Aluminium III)
- Silver I [air, non-urban air or from high stacks]: 5.1794e-9 kg; lognormal variance with pedigree 1.6402, pedigree (1,1,4,1,1)
  (same comment as for Aluminium III)
- Sodium I [air, non-urban air or from high stacks]: 7.6506e-5 kg; lognormal variance with pedigree 0.55365, pedigree (1,1,4,1,1)
  (same comment as for Aluminium III)
- Strontium II [air, non-urban air or from high stacks]: 1.3111e-7 kg; lognormal variance with pedigree 1.0364, pedigree (1,1,4,1,1)
  (same comment as for Aluminium III)
- Styrene [air, non-urban air or from high stacks]: 0.0005275 kg; lognormal variance with pedigree 0.0491, pedigree (1,1,4,1,1)
  (same comment as for Acetaldehyde)
- Sulfur dioxide [air, non-urban air or from high stacks]: 0.00070502 kg; lognormal variance with pedigree 0.6118, pedigree (1,1,4,1,1)
  (same comment as for Aluminium III)
- Thallium I [air, non-urban air or from high stacks]: 9.8775e-10 kg; lognormal variance with pedigree 1.7538, pedigree (1,1,4,1,1)
  (same comment as for Aluminium III)
- Tin ion [air, non-urban air or from high stacks]: 2.6389e-12 kg; lognormal variance with pedigree 1.8314, pedigree (1,1,4,1,1)
  (same comment as for Aluminium III)
- Titanium ion [air, non-urban air or from high stacks]: 2.8425e-7 kg; lognormal variance with pedigree 1.1944, pedigree (1,1,4,1,1)
  (same comment as for Aluminium III)
- Toluene [air, non-urban air or from high stacks]: 0.000372 kg; lognormal variance with pedigree 0.0491, pedigree (1,1,4,1,1)
  (same comment as for Acetaldehyde)
- Vanadium V [air, non-urban air or from high stacks]: 2.4262e-7 kg; lognormal variance with pedigree 1.4454, pedigree (1,1,4,1,1)
  (same comment as for Aluminium III)
- Water [air, non-urban air or from high stacks]: 0.00095696 m3; lognormal variance with pedigree 0.095898, pedigree (1,1,4,1,1)
  water vapour from waste humidity, hydrogen oxidation.
  Uncertainty: Uncertainty calculated from uncertainty in waste composition and the uncertainty of fraction to air.
- Zinc II [air, non-urban air or from high stacks]: 4.3832e-7 kg; lognormal variance with pedigree 1.0967, pedigree (1,1,4,1,1)
  (same comment as for Aluminium III)
- Non-hazardous waste disposed [inventory indicator, waste]: 1 kg; lognormal variance with pedigree 0.008, pedigree (1,1,4,1,1)
  EN15804 waste mass in open burning.
  Uncertainty: Uncertainty is not adjusted, as this is the refence product
- Aluminium III [soil, industrial]: 0.006751 kg; lognormal variance with pedigree 0.42287, pedigree (1,1,4,1,1)
  Emissions from open burning to residues left on ground.
  Uncertainty: Uncertainty calculated depending on waste input and uncertainty of transfer coefficents in incineration model.
- Antimony ion [soil, industrial]: 3.7339e-7 kg; lognormal variance with pedigree 1.7044, pedigree (1,1,4,1,1)
  (same comment as for Aluminium III)
- Arsenic ion [soil, industrial]: 3.0446e-6 kg; lognormal variance with pedigree 1.4313, pedigree (1,1,4,1,1)
  (same comment as for Aluminium III)
- Barium II [soil, industrial]: 0.00022331 kg; lognormal variance with pedigree 0.85762, pedigree (1,1,4,1,1)
  (same comment as for Aluminium III)
- Beryllium II [soil, industrial]: 3.9487e-6 kg; lognormal variance with pedigree 1.3981, pedigree (1,1,4,1,1)
  (same comment as for Aluminium III)
- Bromine [soil, industrial]: 1.0927e-5 kg; lognormal variance with pedigree 1.2134, pedigree (1,1,4,1,1)
  (same comment as for Aluminium III)
- Cadmium II [soil, industrial]: 3.4366e-7 kg; lognormal variance with pedigree 1.7143, pedigree (1,1,4,1,1)
  (same comment as for Aluminium III)
- Calcium II [soil, industrial]: 0.064598 kg; lognormal variance with pedigree 0.16778, pedigree (1,1,4,1,1)
  (same comment as for Aluminium III)
- Carbon [soil, industrial]: 0.003212 kg; lognormal variance with pedigree 0.078509, pedigree (1,1,4,1,1)
  (same comment as for Aluminium III)
- Chloride [soil, industrial]: 0.00066561 kg; lognormal variance with pedigree 0.5793, pedigree (1,1,4,1,1)
  (same comment as for Aluminium III)
- Chromium III [soil, industrial]: 8.6107e-6 kg; lognormal variance with pedigree 1.2955, pedigree (1,1,4,1,1)
  (same comment as for Aluminium III)
- Cobalt II [soil, industrial]: 7.5466e-6 kg; lognormal variance with pedigree 1.3076, pedigree (1,1,4,1,1)
  (same comment as for Aluminium III)
- Copper ion [soil, industrial]: 6.8721e-5 kg; lognormal variance with pedigree 1.0198, pedigree (1,1,4,1,1)
  (same comment as for Aluminium III)
- Dioxins, measured as 2,3,7,8-tetrachlorodibenzo-p-dioxin [soil, industrial]: 8.9266e-12 kg; lognormal variance with pedigree 1.5368, pedigree (1,1,4,1,1)
  (same comment as for Dioxins, measured as 2,3,7,8-tetrachlorodibenzo-p-dioxin)
- Fluoride [soil, industrial]: 3.3761e-5 kg; lognormal variance with pedigree 1.0996, pedigree (1,1,4,1,1)
  (same comment as for Aluminium III)
- Iron ion [soil, industrial]: 0.00097673 kg; lognormal variance with pedigree 0.66844, pedigree (1,1,4,1,1)
  (same comment as for Aluminium III)
- Lead II [soil, industrial]: 1.6651e-5 kg; lognormal variance with pedigree 1.2073, pedigree (1,1,4,1,1)
  (same comment as for Aluminium III)
- Magnesium [soil, industrial]: 0.0020105 kg; lognormal variance with pedigree 0.57481, pedigree (1,1,4,1,1)
  (same comment as for Aluminium III)
- Manganese II [soil, industrial]: 5.6213e-5 kg; lognormal variance with pedigree 1.0456, pedigree (1,1,4,1,1)
  (same comment as for Aluminium III)
- Mercury II [soil, industrial]: 1.5604e-5 kg; lognormal variance with pedigree 1.0958, pedigree (1,1,4,1,1)
  (same comment as for Aluminium III)
- Molybdenum VI [soil, industrial]: 1.4674e-6 kg; lognormal variance with pedigree 1.527, pedigree (1,1,4,1,1)
  (same comment as for Aluminium III)
- Nickel II [soil, industrial]: 3.6151e-6 kg; lognormal variance with pedigree 1.4097, pedigree (1,1,4,1,1)
  (same comment as for Aluminium III)
- Nitrogen [soil, industrial]: 6.266e-5 kg; lognormal variance with pedigree 0.48255, pedigree (1,1,4,1,1)
  (same comment as for Aluminium III)
- Phosphorus [soil, industrial]: 0.00042239 kg; lognormal variance with pedigree 0.77788, pedigree (1,1,4,1,1)
  (same comment as for Aluminium III)
- Potassium I [soil, industrial]: 0.0017248 kg; lognormal variance with pedigree 0.59299, pedigree (1,1,4,1,1)
  (same comment as for Aluminium III)
- Scandium [soil, industrial]: 9.2296e-7 kg; lognormal variance with pedigree 1.5877, pedigree (1,1,4,1,1)
  (same comment as for Aluminium III)
- Selenium IV [soil, industrial]: 5.0132e-5 kg; lognormal variance with pedigree 1.0499, pedigree (1,1,4,1,1)
  (same comment as for Aluminium III)
- Silicon [soil, industrial]: 0.0022045 kg; lognormal variance with pedigree 0.56338, pedigree (1,1,4,1,1)
  (same comment as for Aluminium III)
- Silver I [soil, industrial]: 1.004e-6 kg; lognormal variance with pedigree 1.5762, pedigree (1,1,4,1,1)
  (same comment as for Aluminium III)
- Sodium I [soil, industrial]: 0.0030296 kg; lognormal variance with pedigree 0.51973, pedigree (1,1,4,1,1)
  (same comment as for Aluminium III)
- Strontium II [soil, industrial]: 0.00013098 kg; lognormal variance with pedigree 0.93398, pedigree (1,1,4,1,1)
  (same comment as for Aluminium III)
- Sulfur [soil, industrial]: 0.0014019 kg; lognormal variance with pedigree 0.60172, pedigree (1,1,4,1,1)
  (same comment as for Aluminium III)
- Thallium I [soil, industrial]: 4.9289e-7 kg; lognormal variance with pedigree 1.6685, pedigree (1,1,4,1,1)
  (same comment as for Aluminium III)
- Tin ion [soil, industrial]: 1.3466e-6 kg; lognormal variance with pedigree 1.5388, pedigree (1,1,4,1,1)
  (same comment as for Aluminium III)
- Titanium ion [soil, industrial]: 2.6523e-5 kg; lognormal variance with pedigree 1.1452, pedigree (1,1,4,1,1)
  (same comment as for Aluminium III)
- Tungsten [soil, industrial]: 1.0665e-6 kg; lognormal variance with pedigree 1.5691, pedigree (1,1,4,1,1)
  (same comment as for Aluminium III)
- Vanadium V [soil, industrial]: 2.8998e-6 kg; lognormal variance with pedigree 1.4283, pedigree (1,1,4,1,1)
  (same comment as for Aluminium III)
- Zinc II [soil, industrial]: 5.8475e-5 kg; lognormal variance with pedigree 1.0405, pedigree (1,1,4,1,1)
  (same comment as for Aluminium III)
