# treatment of tyre wear emissions, lorry

Dataset: EcoSpold 2, unit process
Geography: RER
Time period: 2009-01-01 to 2023-12-31
Technology level: current
Classification: ISIC rev.4 ecoinvent: 3821:Treatment and disposal of non-hazardous waste
Scenario: Business-as-Usual
System model: Allocation, cut-off by classification
Generated by: Andrew Simons
Published in: Ntziachristos L., Paul P. 2009
Database: ecoinvent
isCopyrightProtected: true
accessRestrictedTo: 1

## General comment
This dataset represents the treatment of non-exhaust emissions produced by tyre abrasion from road freight transport. The datasets are treatments because they represent a removal of substances from the technosphere (removal of tyre material). This dataset and the emission factors within it relate to 1kg tyre wear. It is valid for Europe and represents the average data for road freight transport. Calculation of non-exhaust emissions (tyre, brake and road wear emissions) are based on EMEP/EEA (2013) and values for net vehicle weights and average load factors. Net vehicle weights are taken from the EcoTransIT (2011) report whilst the average load factors are taken from the Tremove model v2.7b (2009) and EcoTransIT (2011) report. The tyre wear emissions are to air, water and soil. All particulates are accounted for as emissions to air and have particle sizes below 100um. Anything above this does not remain airborne over longer periods. The fractions to water and soil are calculated by deducting the airborne emissions from the total tyre wear. This remaining amount is then simply split 50/50 between water and soil. It must be noted that elementary and organic carbon, substances very dominant in the emissions profile from tyre wear are currently not available in the ecoinvent database and are therfore not accounted for in this datase other than their representation as unspecified particulate emissions. This means that although the datasets represent 1kg of tyre wear the emissions do not sum up to 1kg. In order to use the treatment of non-exhaust emissions in a transport dataset the quantity of emissions per tkm must be calculated. This must then be devided by the specific load factor of the transport in question.Non-exhaust emissions are considered to be linearly scalable to gross vehicle weight (GVW). For tyre wear emissions from lorries the specific quantity is 8.055E-8 kg/kg GVW*km. Main data sources: De Ceuster, G., et al. (2009) TREMOVE: Final Report. Model code v2.7b, 2009. European Commission, Brussels, BE. Knörr, W. et al. (2011) Ecological Transport Information Tool for Worldwide Transports (EcoTransIT): Methodology and data update. Berlin, Hannover, Heidelberg, DE. Ntziachristos, L., Boulter, P. (2013) EMEP/EEA air pollutant emissions inventory guidebook 2009: Road vehicle tyre and brake wear; Road surface wear. European Environment Agency, Copenhagen, DK.

## Included activities start
The activity starts with the abrasion of lorry tyres on the road

## Included activities end
The activity ends with emissions of lorry tyre wear

## Reference product
- tyre wear emissions, lorry: -1 kg; source Ntziachristos, L. 2013; By-product classification Waste; CPC 39260: Used pneumatic tyres of rubber; HS2017 262190: Slag and ash n.e.c. in chapter 26; including seaweed ash (kelp) but excluding ash and residues from the inc[...]
  Road freight specific non-exhaust emissions. This dataset and the emission factors within it relate to 1kg of tyre wear. In order to use the treatment of non-exhaust emissions in a transport dataset the quantity of emissions per km must be calculated. This must then be devided by the specific load factor of the transport in question. Non-exhaust emissions are considered to be linearly scalable to gross vehicle weight (GVW). For tyre wear emissions from lorries the specific quantity is 8.055E-8 kg/kg GVW*km.
  production volume 4.78467e8 kg; = 5.94E+12*8.055E-08*1000
    Estimation. Calculated from production volume of reference product using the relative outputs. Annual production volume of non-exhaust tyre wear emissions = total Gtkm/yr * t emission/t gross vehicle weight and km = 5.94E+12 Gtkm/yr * 8.055E-08 t/Gtkm * 1000 Gtkm expresses the transport of freight and vehicle over one kilometer. Source for total tkm/yr in Europe (EU 19 + CH & NO): TREMOVE (2009) v2.7b. Amount of emissions per tkm taken from Ntziachristos, L., Boulter, P. (2009b). EMEP/EEA air pollutant emissions inventory guidebook 2009: Road vehicle tyre and brake wear; Road surface wear. Copenhagen, European Environment Agency. Net vehicle weights taken from ecoinvent v2 with minor alteration.
  property carbon content, fossil 0.675
    fossil carbon content on a dry matter basis. Represents the total organic carbon emissions to air, water and soil.
  property price 0 EUR2005
    Waste products are assigned a price of zero as they are assumed to require further treatment.
  properties: carbon allocation 0.675 kg, carbon content 0.675, carbon content, non-fossil 0, dry mass 1 kg, water content 0, water in wet mass 0 kg, wet mass 1 kg

## Emissions to nature
- Aluminium III [air, unspecified]: 8.51e-5 kg; source Ntziachristos, L. 2013; lognormal variance with pedigree 0.0413, pedigree (2,2,5,1,1)
  Calculated value. Derived from EMEP/EEA (2013) and based on an average gross vehicle weight (GVW) of all truck categories and load factors.
- Antimony ion [air, unspecified]: 5.25e-7 kg; source Ntziachristos, L. 2013; lognormal variance with pedigree 0.0413, pedigree (2,2,5,1,1)
  (same comment as for Aluminium III)
- Arsenic ion [air, unspecified]: 9.98e-7 kg; source Ntziachristos, L. 2013; lognormal variance with pedigree 0.0413, pedigree (2,2,5,1,1)
  (same comment as for Aluminium III)
- Barium II [air, unspecified]: 3.28e-5 kg; source Ntziachristos, L. 2013; lognormal variance with pedigree 0.658, pedigree (1,1,4,1,1)
  (same comment as for Aluminium III)
- Bromine [air, unspecified]: 5.25e-6 kg; source Ntziachristos, L. 2013; lognormal variance with pedigree 0.0413, pedigree (2,2,5,1,1)
  (same comment as for Aluminium III)
- Cadmium II [air, unspecified]: 1.23e-6 kg; source Ntziachristos, L. 2013; lognormal variance with pedigree 0.0413, pedigree (2,2,5,1,1)
  (same comment as for Aluminium III)
- Calcium II [air, unspecified]: 0.000234 kg; source Ntziachristos, L. 2013; lognormal variance with pedigree 0.0413, pedigree (2,2,5,1,1)
  (same comment as for Aluminium III)
- Chlorine [air, unspecified]: 0.000137 kg; source Ntziachristos, L. 2013; lognormal variance with pedigree 0.0413, pedigree (2,2,5,1,1)
  (same comment as for Aluminium III)
- Chromium III [air, unspecified]: 6.25e-6 kg; source Ntziachristos, L. 2013; lognormal variance with pedigree 0.0413, pedigree (2,2,5,1,1)
  (same comment as for Aluminium III)
- Cobalt II [air, unspecified]: 3.36e-6 kg; source Ntziachristos, L. 2013; lognormal variance with pedigree 0.0413, pedigree (2,2,5,1,1)
  (same comment as for Aluminium III)
- Copper ion [air, unspecified]: 4.57e-5 kg; source Ntziachristos, L. 2013; lognormal variance with pedigree 0.0413, pedigree (2,2,5,1,1)
  (same comment as for Aluminium III)
- Iron ion [air, unspecified]: 0.000449 kg; source Ntziachristos, L. 2013; lognormal variance with pedigree 0.658, pedigree (1,1,4,1,1)
  (same comment as for Aluminium III)
- Lead II [air, unspecified]: 4.62e-5 kg; source Ntziachristos, L. 2013; lognormal variance with pedigree 0.0413, pedigree (2,2,5,1,1)
  (same comment as for Aluminium III)
- Manganese II [air, unspecified]: 1.34e-5 kg; source Ntziachristos, L. 2013; lognormal variance with pedigree 0.0413, pedigree (2,2,5,1,1)
  (same comment as for Aluminium III)
- Molybdenum VI [air, unspecified]: 7.35e-7 kg; source Ntziachristos, L. 2013; lognormal variance with pedigree 0.0413, pedigree (2,2,5,1,1)
  (same comment as for Aluminium III)
- Nickel II [air, unspecified]: 7.85e-6 kg; source Ntziachristos, L. 2013; lognormal variance with pedigree 0.0413, pedigree (2,2,5,1,1)
  (same comment as for Aluminium III)
- Nitrate [air, unspecified]: 0.000394 kg; source Ntziachristos, L. 2013; lognormal variance with pedigree 0.0413, pedigree (2,2,5,1,1)
  (same comment as for Aluminium III)
- PAH, polycyclic aromatic hydrocarbons [air, unspecified]: 1.02e-6 kg; source Ntziachristos, L. 2013; lognormal variance with pedigree 0.0413, pedigree (2,2,5,1,1)
  (same comment as for Aluminium III)
- Particulate Matter, < 2.5 um [air, unspecified]: 0.0589 kg; source Ntziachristos, L. 2013; lognormal variance with pedigree 0.0413, pedigree (2,2,5,1,1)
  (same comment as for Aluminium III)
- Particulate Matter, > 10 um [air, unspecified]: 0.0561 kg; source Ntziachristos, L. 2013; lognormal variance with pedigree 0.0413, pedigree (2,2,5,1,1)
  (same comment as for Aluminium III)
- Particulate Matter, > 2.5 um and < 10um [air, unspecified]: 0.0252 kg; source Ntziachristos, L. 2013; lognormal variance with pedigree 0.0413, pedigree (2,2,5,1,1)
  (same comment as for Aluminium III)
- Potassium I [air, unspecified]: 7.35e-5 kg; source Ntziachristos, L. 2013; lognormal variance with pedigree 0.0413, pedigree (2,2,5,1,1)
  (same comment as for Aluminium III)
- Selenium IV [air, unspecified]: 5.25e-6 kg; source Ntziachristos, L. 2013; lognormal variance with pedigree 0.0413, pedigree (2,2,5,1,1)
  (same comment as for Aluminium III)
- Silicon [air, unspecified]: 0.000473 kg; source Ntziachristos, L. 2013; lognormal variance with pedigree 0.0413, pedigree (2,2,5,1,1)
  (same comment as for Aluminium III)
- Silver I [air, unspecified]: 2.63e-8 kg; source Ntziachristos, L. 2013; lognormal variance with pedigree 0.0413, pedigree (2,2,5,1,1)
  (same comment as for Aluminium III)
- Sodium I [air, unspecified]: 0.000169 kg; source Ntziachristos, L. 2013; lognormal variance with pedigree 0.0413, pedigree (2,2,5,1,1)
  (same comment as for Aluminium III)
- Strontium II [air, unspecified]: 3.78e-6 kg; source Ntziachristos, L. 2013; lognormal variance with pedigree 0.0413, pedigree (2,2,5,1,1)
  (same comment as for Aluminium III)
- Sulfate [air, unspecified]: 0.000656 kg; source Ntziachristos, L. 2013; lognormal variance with pedigree 0.0413, pedigree (2,2,5,1,1)
  (same comment as for Aluminium III)
- Sulfur dioxide [air, unspecified]: 0.000578 kg; source Ntziachristos, L. 2013; lognormal variance with pedigree 0.0413, pedigree (2,2,5,1,1)
  (same comment as for Aluminium III)
- Titanium ion [air, unspecified]: 9.92e-5 kg; source Ntziachristos, L. 2013; lognormal variance with pedigree 0.0413, pedigree (2,2,5,1,1)
  (same comment as for Aluminium III)
- Vanadium V [air, unspecified]: 2.63e-7 kg; source Ntziachristos, L. 2013; lognormal variance with pedigree 0.0413, pedigree (2,2,5,1,1)
  (same comment as for Aluminium III)
- Zinc II [air, unspecified]: 0.00195 kg; source Ntziachristos, L. 2013; lognormal variance with pedigree 0.0413, pedigree (2,2,5,1,1)
  (same comment as for Aluminium III)
- Aluminium III [soil, unspecified]: 0.000261 kg; source Ntziachristos, L. 2013; lognormal variance with pedigree 0.0413, pedigree (2,2,5,1,1)
  (same comment as for Aluminium III)
- Antimony ion [soil, unspecified]: 1.61e-6 kg; source Ntziachristos, L. 2013; lognormal variance with pedigree 0.0413, pedigree (2,2,5,1,1)
  (same comment as for Aluminium III)
- Arsenic ion [soil, unspecified]: 3.06e-6 kg; source Ntziachristos, L. 2013; lognormal variance with pedigree 0.0413, pedigree (2,2,5,1,1)
  (same comment as for Aluminium III)
- Barium II [soil, unspecified]: 0.000101 kg; source Ntziachristos, L. 2013; lognormal variance with pedigree 0.0413, pedigree (2,2,5,1,1)
  (same comment as for Aluminium III)
- Bromine [soil, unspecified]: 1.61e-5 kg; source Ntziachristos, L. 2013; lognormal variance with pedigree 0.0413, pedigree (2,2,5,1,1)
  (same comment as for Aluminium III)
- Cadmium II [soil, unspecified]: 3.79e-6 kg; source Ntziachristos, L. 2013; lognormal variance with pedigree 0.0413, pedigree (2,2,5,1,1)
  (same comment as for Aluminium III)
- Calcium II [soil, unspecified]: 0.000719 kg; source Ntziachristos, L. 2013; lognormal variance with pedigree 0.0413, pedigree (2,2,5,1,1)
  (same comment as for Aluminium III)
- Chlorine [soil, unspecified]: 0.000419 kg; source Ntziachristos, L. 2013; lognormal variance with pedigree 0.0413, pedigree (2,2,5,1,1)
  (same comment as for Aluminium III)
- Chromium III [soil, unspecified]: 1.92e-5 kg; source Ntziachristos, L. 2013; lognormal variance with pedigree 0.0413, pedigree (2,2,5,1,1)
  (same comment as for Aluminium III)
- Cobalt II [soil, unspecified]: 1.03e-5 kg; source Ntziachristos, L. 2013; lognormal variance with pedigree 0.0413, pedigree (2,2,5,1,1)
  (same comment as for Aluminium III)
- Copper ion [soil, unspecified]: 0.00014 kg; source Ntziachristos, L. 2013; lognormal variance with pedigree 0.0413, pedigree (2,2,5,1,1)
  (same comment as for Aluminium III)
- Iron ion [soil, unspecified]: 0.00138 kg; source Ntziachristos, L. 2013; lognormal variance with pedigree 0.0413, pedigree (2,2,5,1,1)
  (same comment as for Aluminium III)
- Lead II [soil, unspecified]: 0.000142 kg; source Ntziachristos, L. 2013; lognormal variance with pedigree 0.0413, pedigree (2,2,5,1,1)
  (same comment as for Aluminium III)
- Lithium I [soil, unspecified]: 1.05e-6 kg; source Ntziachristos, L. 2013; lognormal variance with pedigree 0.0413, pedigree (2,2,5,1,1)
  (same comment as for Aluminium III)
- Manganese II [soil, unspecified]: 4.11e-5 kg; source Ntziachristos, L. 2013; lognormal variance with pedigree 0.0413, pedigree (2,2,5,1,1)
  (same comment as for Aluminium III)
- Molybdenum VI [soil, unspecified]: 2.26e-6 kg; source Ntziachristos, L. 2013; lognormal variance with pedigree 0.0413, pedigree (2,2,5,1,1)
  (same comment as for Aluminium III)
- Nickel II [soil, unspecified]: 2.41e-5 kg; source Ntziachristos, L. 2013; lognormal variance with pedigree 0.0413, pedigree (2,2,5,1,1)
  (same comment as for Aluminium III)
- Nitrate [soil, unspecified]: 0.00121 kg; source Ntziachristos, L. 2013; lognormal variance with pedigree 0.0413, pedigree (2,2,5,1,1)
  (same comment as for Aluminium III)
- PAH, polycyclic aromatic hydrocarbons [soil, unspecified]: 3.15e-6 kg; source Ntziachristos, L. 2013; lognormal variance with pedigree 0.0413, pedigree (2,2,5,1,1)
  (same comment as for Aluminium III)
- Potassium I [soil, unspecified]: 0.000226 kg; source Ntziachristos, L. 2013; lognormal variance with pedigree 0.0413, pedigree (2,2,5,1,1)
  (same comment as for Aluminium III)
- Selenium IV [soil, unspecified]: 1.61e-5 kg; source Ntziachristos, L. 2013; lognormal variance with pedigree 0.0413, pedigree (2,2,5,1,1)
  (same comment as for Aluminium III)
- Silicon [soil, unspecified]: 0.00145 kg; source Ntziachristos, L. 2013; lognormal variance with pedigree 0.0413, pedigree (2,2,5,1,1)
  (same comment as for Aluminium III)
- Silver I [soil, unspecified]: 8.07e-8 kg; source Ntziachristos, L. 2013; lognormal variance with pedigree 0.0413, pedigree (2,2,5,1,1)
  (same comment as for Aluminium III)
- Sodium I [soil, unspecified]: 0.00052 kg; source Ntziachristos, L. 2013; lognormal variance with pedigree 0.0413, pedigree (2,2,5,1,1)
  (same comment as for Aluminium III)
- Strontium II [soil, unspecified]: 1.16e-5 kg; source Ntziachristos, L. 2013; lognormal variance with pedigree 0.0413, pedigree (2,2,5,1,1)
  (same comment as for Aluminium III)
- Sulfate [soil, unspecified]: 0.00202 kg; source Ntziachristos, L. 2013; lognormal variance with pedigree 0.0413, pedigree (2,2,5,1,1)
  (same comment as for Aluminium III)
- Sulfur [soil, unspecified]: 0.000474 kg; source Ntziachristos, L. 2013; lognormal variance with pedigree 0.0413, pedigree (2,2,5,1,1)
  (same comment as for Aluminium III)
- Titanium ion [soil, unspecified]: 0.000305 kg; source Ntziachristos, L. 2013; lognormal variance with pedigree 0.0413, pedigree (2,2,5,1,1)
  (same comment as for Aluminium III)
- Vanadium V [soil, unspecified]: 8.07e-7 kg; source Ntziachristos, L. 2013; lognormal variance with pedigree 0.0413, pedigree (2,2,5,1,1)
  (same comment as for Aluminium III)
- Zinc II [soil, unspecified]: 0.006 kg; source Ntziachristos, L. 2013; lognormal variance with pedigree 0.0413, pedigree (2,2,5,1,1)
  (same comment as for Aluminium III)
- Aluminium III [water, ground-]: 0.000261 kg; source Ntziachristos, L. 2013; lognormal variance with pedigree 0.0413, pedigree (2,2,5,1,1)
  (same comment as for Aluminium III)
- Antimony ion [water, ground-]: 1.61e-6 kg; source Ntziachristos, L. 2013; lognormal variance with pedigree 0.0413, pedigree (2,2,5,1,1)
  (same comment as for Aluminium III)
- Arsenic ion [water, ground-]: 3.06e-6 kg; source Ntziachristos, L. 2013; lognormal variance with pedigree 0.0413, pedigree (2,2,5,1,1)
  (same comment as for Aluminium III)
- Barium II [water, ground-]: 0.000101 kg; source Ntziachristos, L. 2013; lognormal variance with pedigree 0.0413, pedigree (2,2,5,1,1)
  (same comment as for Aluminium III)
- Bromine [water, ground-]: 1.61e-5 kg; source Ntziachristos, L. 2013; lognormal variance with pedigree 0.0413, pedigree (2,2,5,1,1)
  (same comment as for Aluminium III)
- Cadmium II [water, ground-]: 3.79e-6 kg; source Ntziachristos, L. 2013; lognormal variance with pedigree 0.0413, pedigree (2,2,5,1,1)
  (same comment as for Aluminium III)
- Calcium II [water, ground-]: 0.000719 kg; source Ntziachristos, L. 2013; lognormal variance with pedigree 0.0413, pedigree (2,2,5,1,1)
  (same comment as for Aluminium III)
- Chlorine [water, ground-]: 0.000419 kg; source Ntziachristos, L. 2013; lognormal variance with pedigree 0.0413, pedigree (2,2,5,1,1)
  (same comment as for Aluminium III)
- Chromium III [water, ground-]: 1.92e-5 kg; source Ntziachristos, L. 2013; lognormal variance with pedigree 0.0413, pedigree (2,2,5,1,1)
  (same comment as for Aluminium III)
- Cobalt II [water, ground-]: 1.03e-5 kg; source Ntziachristos, L. 2013; lognormal variance with pedigree 0.0413, pedigree (2,2,5,1,1)
  (same comment as for Aluminium III)
- Copper ion [water, ground-]: 0.00014 kg; source Ntziachristos, L. 2013; lognormal variance with pedigree 0.0413, pedigree (2,2,5,1,1)
  (same comment as for Aluminium III)
- Iron ion [water, ground-]: 0.00138 kg; source Ntziachristos, L. 2013; lognormal variance with pedigree 0.0413, pedigree (2,2,5,1,1)
  (same comment as for Aluminium III)
- Lead II [water, ground-]: 0.000142 kg; source Ntziachristos, L. 2013; lognormal variance with pedigree 0.0413, pedigree (2,2,5,1,1)
  (same comment as for Aluminium III)
- Lithium I [water, ground-]: 1.05e-6 kg; source Ntziachristos, L. 2013; lognormal variance with pedigree 0.0413, pedigree (2,2,5,1,1)
  (same comment as for Aluminium III)
- Manganese II [water, ground-]: 4.11e-5 kg; source Ntziachristos, L. 2013; lognormal variance with pedigree 0.0413, pedigree (2,2,5,1,1)
  (same comment as for Aluminium III)
- Molybdenum VI [water, ground-]: 2.26e-6 kg; source Ntziachristos, L. 2013; lognormal variance with pedigree 0.0413, pedigree (2,2,5,1,1)
  (same comment as for Aluminium III)
- Nickel II [water, ground-]: 2.41e-5 kg; lognormal variance with pedigree 0.0413, pedigree (2,2,5,1,1)
  (same comment as for Aluminium III)
- Nitrate [water, ground-]: 0.00121 kg; source Ntziachristos, L. 2013; lognormal variance with pedigree 0.0413, pedigree (2,2,5,1,1)
  (same comment as for Aluminium III)
- PAH, polycyclic aromatic hydrocarbons [water, ground-]: 3.15e-6 kg; source Ntziachristos, L. 2013; lognormal variance with pedigree 0.0413, pedigree (2,2,5,1,1)
  (same comment as for Aluminium III)
- Potassium I [water, ground-]: 0.000226 kg; source Ntziachristos, L. 2013; lognormal variance with pedigree 0.0413, pedigree (2,2,5,1,1)
  (same comment as for Aluminium III)
- Selenium IV [water, ground-]: 1.61e-5 kg; source Ntziachristos, L. 2013; lognormal variance with pedigree 0.0413, pedigree (2,2,5,1,1)
  (same comment as for Aluminium III)
- Silicon [water, ground-]: 0.00145 kg; source Ntziachristos, L. 2013; lognormal variance with pedigree 0.0413, pedigree (2,2,5,1,1)
  (same comment as for Aluminium III)
- Silver I [water, ground-]: 8.07e-8 kg; source Ntziachristos, L. 2013; lognormal variance with pedigree 0.0413, pedigree (2,2,5,1,1)
  (same comment as for Aluminium III)
- Sodium I [water, ground-]: 0.00052 kg; source Ntziachristos, L. 2013; lognormal variance with pedigree 0.0413, pedigree (2,2,5,1,1)
  (same comment as for Aluminium III)
- Strontium II [water, ground-]: 1.16e-5 kg; source Ntziachristos, L. 2013; lognormal variance with pedigree 0.0413, pedigree (2,2,5,1,1)
  (same comment as for Aluminium III)
- Sulfate [water, ground-]: 0.00202 kg; source Ntziachristos, L. 2013; lognormal variance with pedigree 0.0413, pedigree (2,2,5,1,1)
  (same comment as for Aluminium III)
- Sulfur [water, ground-]: 0.00177 kg; source Ntziachristos, L. 2013; lognormal variance with pedigree 0.0413, pedigree (2,2,5,1,1)
  (same comment as for Aluminium III)
- Titanium ion [water, ground-]: 0.000305 kg; source Ntziachristos, L. 2013; lognormal variance with pedigree 0.0413, pedigree (2,2,5,1,1)
  (same comment as for Aluminium III)
- Vanadium V [water, ground-]: 8.07e-7 kg; source Ntziachristos, L. 2013; lognormal variance with pedigree 0.0413, pedigree (2,2,5,1,1)
  (same comment as for Aluminium III)
- Zinc II [water, ground-]: 0.006 kg; source Ntziachristos, L. 2013; lognormal variance with pedigree 0.0413, pedigree (2,2,5,1,1)
  (same comment as for Aluminium III)

## Sampling procedure
Literature
