# sunflower seed production, for sowing

Dataset: EcoSpold 2, unit process
Geography: GLO
Time period: 1999-01-01 to 2023-12-31
Technology level: current
Classification: EcoSpold01Categories: agricultural means of production/seed
Classification: ISIC rev.4 ecoinvent: 0164:Seed processing for propagation
Scenario: Business-as-Usual
System model: Allocation, cut-off by classification
Share of production covered: 50 %
Generated by: Thomas Nemecek
Published in: Nemecek, T. 2007
Database: ecoinvent
isCopyrightProtected: true
accessRestrictedTo: 1

## General comment
Refers to 1 kg seed of rape seed (fresh weight), with a maximum water content of 6%
[This dataset was already contained in the ecoinvent database version 2. It was not individually updated during the transfer to ecoinvent version 3. Life Cycle Impact Assessment results may still have changed, as they are affected by changes in the supply chain, i.e. in other datasets. This dataset was generated following the ecoinvent quality guidelines for version 2. It may have been subject to central changes described in the ecoinvent version 3 change report (http://www.ecoinvent.org/database/ecoinvent-version-3/reports-of-changes/), and the results of the central updates were reviewed extensively. The changes added e.g. consistent water flows and other information throughout the database. The documentation of this dataset can be found in the ecoinvent reports of version 2, which are still available via the ecoinvent website. The change report linked above covers all central changes that were made during the conversion process.]

## Included activities start
The activity starts after the harvest of sunflower

## Included activities end
The seed is processed at the processing centre, treated (pre-cleaning, cleaning, eventually drying, chemical dressing (for integrated production) and bag filling), stored and afterwards transported to the regional storage centre. No data on wastewater production were available.

## Technology
Refers to average seed processing

## Time period
Date of the major data sources.

## Reference product
- sunflower seed, for sowing: 1 kg; name sunflower_seed_sowing; By-product classification allocatable product; CPC 01445: Sunflower seed; HS2017 120600: Oil seeds; sunflower seeds, whether or not broken
  production volume 4.90551e8 kg
    FAOSTAT 2011: "sunflower seed", average of the years 1999-2002. http://faostat.fao.org/. The original value was split into conventional/integrated seed (98%) and organic seed (2%), where 2% organic production is an extrapolation from Europe to the world (http://www.fao.org/docrep/004/y3557e/y3557e09.htm).
  property carbon content, fossil 0; name sunflower_seed_sowing_C_content_fossil
    fossil carbon content on a dry matter basis
  property carbon content, non-fossil 0.776596; name sunflower_seed_so_C_content_non_fossil_0
    biogene carbon content on a dry matter basis; rape seed has been used as an approximation (ecoinvent report 15a, pg 136). C content of rapeseed is 0.73 kg/kg wet mass (Tab 3.3, ecoinvent report 17)
  property dry mass 0.94 kg; name sunflower_seed_sowing_DM
  property energy content 28.435 MJ; name sunflower_seed_sowing_energy_content
    as gross calorific value (when relevant)
  property price 0.509334 EUR2005
    Calculated based on inputs: The price of the product has been calculated as a sum of the values of the material and energy inputs for this product. This value is therefore a rough estimation. It may underestimate the real price since there are additional expenses when producing any product. These expences can include for example labour costs, treatment of waste materials and profit for the producer. Please consider carefully whether this level of data quality is acceptable for your application.
  property water content 0.0638298; name sunflower_seed_sowing_water_content; = (1-sunflower_seed_sowing_DM)/sunflower_seed_sowing_DM
  property water in wet mass 0.06 kg; name sunflower_seed_sowing_WWM; = 1-sunflower_seed_sowing_DM
  property wet mass 1 kg; name sunflower_seed_sowing_WM
  properties: carbon allocation 0.73 kg, carbon content 0.776596

## Inputs from technosphere
- building, multi-storey: 2e-5 m3; lognormal variance with pedigree 0.0426, pedigree (2,1,5,5,1)
  EcoSpold01Location=RER
  See "01_crop production - seed production & processing_v1.0.pdf" - pdf-document on the dedicated talk page of ecoinvent (www.ecoinvent.org/documentation)
- electricity, low voltage: 0.058 kWh; lognormal variance with pedigree 0.0426, pedigree (2,1,5,5,1)
  EcoSpold01Location=CH
  See "01_crop production - seed production & processing_v1.0.pdf" - pdf-document on the dedicated talk page of ecoinvent (www.ecoinvent.org/documentation)
- sunflower seed: 1.5755 kg; lognormal variance with pedigree 0.0426, pedigree (2,1,5,5,1)
  See "01_crop production - seed production & processing_v1.0.pdf" - pdf-document on the dedicated talk page of ecoinvent (www.ecoinvent.org/documentation)
  properties: carbon content, non-fossil 0.574, dry mass 0.94 kg, water content 0.0638298, wet mass 1 kg
  note on carbon content, non-fossil: rapeseed have been used as an approximation (ecoinvent v2.2 report 15a, pg 136).

## Inputs from nature
- Occupation, construction site [natural resource, land]: 8e-6 m2*year; lognormal variance with pedigree 0.0826, pedigree (2,1,5,5,1)
  (same comment as for sunflower seed)
- Occupation, industrial area [natural resource, land]: 0.0002 m2*year; lognormal variance with pedigree 0.0826, pedigree (2,1,5,5,1)
  (same comment as for sunflower seed)
- Transformation, from unspecified [natural resource, land]: 4e-6 m2; lognormal variance with pedigree 0.1626, pedigree (2,1,5,5,1)
  (same comment as for sunflower seed)
- Transformation, to industrial area [natural resource, land]: 4e-6 m2; lognormal variance with pedigree 0.1626, pedigree (2,1,5,5,1)
  (same comment as for sunflower seed)

## Sampling procedure
Data based on a literature, expert information and enquiry of seed processing plants.

## Extrapolations
Production of imported seed is approximated by seed produced in Switzerland. This dataset has been copied from an original dataset covering the geography CH. The uncertainty has been adjusted accordingly.

## Review by Bo Weidema 2012-01-19
Passed
Some obsolete exchanges were suggested to be deleted and this was done.
