# potassium hydroxide production

Dataset: EcoSpold 2, unit process
Geography: RoW
Time period: 1998-01-01 to 2023-12-31
Technology level: current
Classification: ISIC rev.4 ecoinvent: 2011:Manufacture of basic chemicals
Synonyms: Caustic potash; Potash lye; 1310-58-3; Hydroxyde de potassium; Potassium hydrate
Scenario: Business-as-Usual
System model: Allocation, cut-off by classification
Generated by: Beatriz González Domínguez
Published in: Jungbluth N. 2007
Database: ecoinvent
isCopyrightProtected: true
accessRestrictedTo: 1

## General comment
This dataset represents the production of 1 kg of pure potassium hydroxide (KOH), which is commercialized in the form of a 85.6% aqueous solution. Potassium hydroxide forms solid flakes at room temperature and is used primarily for the production of potassium phosphates, as well as potassium soaps and detergents. It is manufactured by the electrolysis of potassium chloride brine in electrolytical cells.
This dataset is based on industrial as well as literature data. The original data is published in the ecoinvent report No. 17 (pg 702), that describes the production of 1 kg of 85.6% (~90%) pure KOH. The data in this report was scaled up to represent the product of interest.
References:
Jungbluth, N., Chudacoff, M., Dauriat, A., Dinkel, F., Doka, G., Faist Emmenegger, M., Gnansounou, E., Kljun, N., Schleiss, K., Spielmann, M., Stettler, C., Sutter, J. 2007: Life Cycle Inventories of Bioenergy. ecoinvent report No. 17, Swiss Centre for Life Cycle Inventories, Dübendorf, CH.

## Included activities start
The activity starts when the raw materials enter the process.

## Included activities end
This activity ends with the production of potassium hydroxide. The dataset includes all precursors, ancillary materials, emissions and estimated infrastructure.

## Technology
Potassium hydroxide is manufactured by the electrolysis of potassium chloride brine in electrolytical cells. Hydrogen and chlorine are withdrawn from the cell. The rest of the reaction mixture contains KOH, water, and unreacted potassium chloride. This reaction mixture is then concentrated in an evaporator. Most of the potassium chloride crystallizes by evaporation, and is recycled. After evaporation, the potassium hydroxide is precipitated. Potassium hydroxide, chlorine and hydrogen are obtained from potassium chloride brine according to the following reaction:
2 KCl + 2 H2O -> 2 KOH + Cl2 + H2
Reference:
Jungbluth, N., Chudacoff, M., Dauriat, A., Dinkel, F., Doka, G., Faist Emmenegger, M., Gnansounou, E., Kljun, N., Schleiss, K., Spielmann, M., Stettler, C., Sutter, J. 2007: Life Cycle Inventories of Bioenergy. ecoinvent report No. 17, Swiss Centre for Life Cycle Inventories, Dübendorf, CH.

## Reference product
- hydrogen, gaseous, low pressure: 1 kg; name H_l; By-product classification allocatable product; CPC 34210: Hydrogen, nitrogen, oxygen, carbon dioxide and rare gases; inorganic oxygen compounds of non-metals n.e.c.; HS2017 280410: Hydrogen; CAS 1333-74-0
  Calculated based on stoichiometry. The stoichiometric reaction is given in the technology comment.
  production volume 1.13637e7 kg; = RP_PV * (H_l / RP)
    Calculated from production volume of reference product using the relative outputs.
  property heating value, net 120.21 MJ
    LHV is calculated based on the elemental composition of the substance. Based on the CAS number of the substance (001333-74-0), the chemical formula of the substance is found to be: H2, (PubChem 2020). Reference: Kim, S., Chen, J., Cheng, T., Gindulyte, A., He, J., He, S., Li, Q., Shoemaker, B. A., Thiessen, P. A., Yu, B., Zaslavsky, L., Zhang, J., & Bolton, E. E. (2019). PubChem 2019 update: improved access to chemical data. Nucleic acids research, 47(D1), D1102–D1109. https://doi.org/10.1093/nar/gky1033
  property price 1.90471 EUR2005
    Price for 2021.
    Price based on HydrogenEurope: Clean Hydrogen Monitor 2022, available here: https://hydrogeneurope.eu/wp-content/uploads/2022/10/Clean_Hydrogen_Monitor_10-2022_DIGITAL.pdf, last accessed 2023-07-25.
    The prices were converted to EUR based on the annual exchange rates published by the European Central Bank (https://sdw.ecb.europa.eu/quickview.do?SERIES_KEY=120.EXR.A.USD.EUR.SP00.A, last accessed on 2022-02-15) and adjusted for inflation relative to 2005 using the producer price index (PPI) of the euro area, published by eurostat (https://ec.europa.eu/eurostat/databrowser/view/STS_INPP_A__custom_6416181/default/table?lang=en, last accessed on 2022-05-04).
  properties: allocation factor 0.0244905, carbon allocation 0 kg, carbon content 0, carbon content, fossil 0, carbon content, non-fossil 0, dry mass 1 kg, true value 0.0349388, water content 0, water in wet mass 0 kg, wet mass 1 kg

## Inputs from technosphere
- chemical factory, organics: 8.91118e-10 unit; = (RP + H_l + Cl_g)*4E-10; lognormal variance with pedigree 0.3498, pedigree (2,3,5,4,3)
  Calculated based on literature data published by the industry. For this activity, no information was readily available concerning infrastructure and land-use. Therefore, the infrastructure is estimated based on data from two chemical factories, the BASF site of Ludwigshafen and the chemical factory in Gendorf (which are both located in Germany), which produce a wide range of chemical substances. Based on this data, the following assumptions are made: the built area amounts to about 4.2 ha, the plant has an average output of 50'000 t/a and a lifespan of fifty years. The estimated infrastructure amount is therefore 4.00 E-10 units per kg of produced chemical.
  References:
  Althaus H.-J., Chudacoff M., Hischier R., Jungbluth N., Osses M. and Primas A. (2007) Life Cycle Inventories of Chemicals. ecoinvent report No. 8, v2.0. EMPA Dübendorf, Swiss Centre for Life Cycle Inventories, Dübendorf, CH.
  Gendorf (2000) Umwelterklärung 2000, Werk Gendorf. Werk Gendorf, Burgkirchen.
- electricity, medium voltage: 0.0964157, 1.92328, 0.646215, 0.0295258, 0.00590955, 0.00126891, 0.198608 kWh (7 suppliers, which the file names only by identifier); sum of these 2.90122 kWh; = 1.860096/0.856; lognormal variance with pedigree 0.0433, pedigree (2,2,5,5,1)
  Based on the amount in the previous version of this dataset. It is scaled up to represent the product of interest.
  Uncertainty: l
- heat, district or industrial, natural gas: 0.118817, 7.23056 MJ (2 suppliers, which the file names only by identifier); sum of these 7.34938 MJ; = 4.712/0.856; lognormal variance with pedigree 0.0433, pedigree (2,2,5,5,1)
  Based on the amount in the previous version of this dataset. It is scaled up to represent the product of interest.
  Uncertainty: i
  properties: heating value, net 1 MJ
- heat, district or industrial, other than natural gas: 4.10021, 0.00189955 MJ (2 suppliers, which the file names only by identifier); sum of these 4.10211 MJ; = 2.63004/0.856; lognormal variance with pedigree 0.0433, pedigree (2,2,5,5,1)
  (same comment as for heat, district or industrial, natural gas)
  properties: heating value, net 1 MJ
- potassium chloride: 2.03188 kg; = (0.823/0.856)*1.58289736294535; lognormal variance with pedigree 0.0433, pedigree (2,2,5,5,1)
  The exchange has been updated from 'potassium chloride, as K2O' into 'potassium chloride' and therefore its amount has been scaled (multiplied) from 0.9614 kg by 1.5829 kg of 'potassium chloride' per kg of 'potassium chloride, as K2O'. Original comment of the exchange is: Represents 1.5253 kg of KCl. Pure potassium chloride, recorded as potassium oxide (K2O) equivalents. Potassium-containing fertilizers are expressed as the amount of K2O needed to acquire the amount of potassium present in the fertilizer.
  Uncertainty: l
  properties: dry mass 1 kg, wet mass 1 kg
- salt tailing from potash mine: -0.000647687, -0.0352258 kg (2 suppliers, which the file names only by identifier); sum of these -0.0358734 kg; = 0.023/0.856; lognormal variance with pedigree 0.0201, pedigree (4,2,1,5,1)
  Value published in the ecoinvent report No. 17 (pg 703), which is scaled up for 1 kg of pure KOH.
  Uncertainty: a
  production volume; = RP_PV*BP_salt_tailing_from_potash_mine/ABS(RP)
    Calculated from the production volume of potassium hydroxide in proportion to the respective output amounts.
  properties: dry mass 1 kg, wet mass 1 kg
- wastewater, average: -0.000399425, -1.4221e-6 m3 (2 suppliers, which the file names only by identifier); sum of these -0.000400847 m3; = 0.000257/0.856; lognormal variance with pedigree 0.0201, pedigree (4,2,1,5,1)
  (same comment as for salt tailing from potash mine)
  production volume; = RP_PV*BP_wastewater_average/ABS(RP)
    (same comment as for salt tailing from potash mine)
  properties: dry mass 80 kg, mass concentration, TOC 0.1091 kg/m3, mass concentration, calcium 0.039453 kg/m3, mass concentration, chlorine 0.030031 kg/m3, mass concentration, hydrogen 0.013365 kg/m3, mass concentration, nitrogen 0.031015 kg/m3, mass concentration, oxygen 0.069824 kg/m3, mass concentration, potassium 0.012374 kg/m3, mass concentration, sodium 0.06456 kg/m3, mass concentration, sulfur 0.015602 kg/m3, water content 11.5, wet mass 1000 kg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
- water, completely softened: 1.36948, 1.8295 kg (2 suppliers, which the file names only by identifier); sum of these 3.19898 kg; = (2.195 - (1 - 0.856))/0.856; lognormal variance with pedigree 0.0433, pedigree (2,2,5,5,1)
  Value given in the ecoinvent report No. 17 (pg 703), from which the water that is used for the final dilution is subtracted. The amount is also scaled up, in order to have a final product that is 100% pure while maintaining the water balance in the dataset.
  Uncertainty: l
  properties: wet mass 1 kg

## Emissions to nature
- Water [air, unspecified]: 0.0023885 m3; = (1.814 - 0.28263)/1000/0.856; lognormal variance with pedigree 0.0827, pedigree (2,2,5,5,1)
  The original data is published in the ecoinvent report No. 17 (pg 703) that describes the production of 1 kg of 85.6% (~90%) pure KOH. The data in the report was first decreased based on stoichiometry to take into account the amount of water that is incorporated into the products during the reaction. The amount is then scaled up to represent the product of interest.
  property fraction, origin: fresh water 0.345477; name fraction_origin_fresh_water
  property fraction, origin: salt water 0; name fraction_origin_salt_water
  property fraction, origin: unspecified 0.654523; name fraction_origin_unspecified
- Chloride [water, surface water]: 0.0939635 kg; lognormal variance with pedigree 0.0601, pedigree (4,2,5,5,1)
  This emission is due to an excess of KCl in the reaction. The value has been back-calculated based on stoichiometry to match the input value of KCl given in ecoinvent report No. 17: 0.823 kg of KCl as K2O / 0.856 to produce 1 kg of 100% pure KOH.
  Uncertainty: c
- Potassium I [water, surface water]: 0.116678 kg; lognormal variance with pedigree 0.0601, pedigree (4,2,5,5,1)
  (same comment as for Chloride)

## Sampling procedure
This dataset is based on industry data in the US.

## Extrapolations
This dataset has been copied from an original dataset covering the geography RER. The uncertainty has been adjusted accordingly.
