# textile production, cotton, air jet loom weaving

Dataset: EcoSpold 2, unit process
Geography: RoW
Time period: 2015-04-01 to 2023-03-31
Technology level: current
Classification: EcoSpold01Categories: textiles/processing
Classification: ISIC rev.4 ecoinvent: 1312:Weaving of textiles
Scenario: Business-as-Usual
System model: Allocation, cut-off by classification
Generated by: Avraam Symeonidis
Published in: Faist Emmenegger, M. 2018
Database: ecoinvent
isCopyrightProtected: true
accessRestrictedTo: 1

## General comment
Inventory refers to the weaving of 1 kg yarn (450 GSM) into textile, the production of the yarn itself is not included. The dataset is extrapolated from the respective Indian dataset. For detailed information regarding technology please refer to the aforementioned datasets.
[This dataset is meant to replace the following datasets:]

## Included activities start
The activity starts with warping and sizing of cotton yarn.

## Included activities end
This process ends with conversion of cotton yarn at weaving plant to 1 kg of woven fabric.

## Geography
Global average based on data from India.

## Technology
Dataset extrapolated to correspond to global conditions.

## Reference product
- textile, woven cotton: 1 kg; name RP_amount_1; By-product classification allocatable product; CPC 26620: Woven fabrics of cotton, containing 85% or more by weight of cotton, weighing more than 200 g/m2; HS2017 5208: Woven fabrics of cotton, containing 85% or more by weight of cotton, weighing not more than 200 g/m2
  production volume 1.59752e11 kg; name RP_PV_1; = 22165000000*0.2*(100/2.7)
    Annual production volume was scaled based on GDP and the Indian production volume, given the fact that India accounts for approximately 2.7% of the Global GDP. Indian value: calculated using input from the Indian Ministry of textiles and assuming assuming a fabric weight of 200g/m2
    Reference: Indian Ministry of Textiles, accessed at: http://texmin.nic.in/sites/default/files/prod_variety_cloth.pdf on 4/4/2018.
  property carbon content, non-fossil 0.46
    Cotton fibers are considered to have a 46% C-content in dry mass ("Evolutionary and Biochemical Aspects", A.D. Kay and T. Vrede (in Global Ecology, 2010, Elsevier B.V., S.E. Jørgensen Ed.)
  property heating value, net 13.94 MJ
    LHV is calculated based on the Carbon content of the product. More details can be found on the respective documentation.
  properties: carbon allocation 0.46 kg, carbon content 0.46, carbon content, fossil 0, dry mass 1 kg, price 1.77 EUR2005, water content 0, water in wet mass 0 kg, wet mass 1 kg

## Inputs from technosphere
- building, hall: 0.000833333 m2; = 5000/(10000*12*50); lognormal variance with pedigree 0.3526, pedigree (4,4,3,4,4)
  square meters of building divided by production per year and life time of the plant
- electricity, low voltage: 0.0143281, 0.0775287, 0.00301302, 0.00117148, 0.0817751, 0.0194914, 0.00117549, 0.00401726, 0.00160515, 0.721746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 kWh (47 suppliers, which the file names only by identifier); sum of these 2.0497 kWh; = 0.0045+0.0480+1.7472+0.25; lognormal variance with pedigree 0.0532, pedigree (4,4,3,4,4)
  sum of electricity used for warping, sizing, air compressor and utilities. This data is in the lower range of comparable data. The consumption is strongly impacted by yarn size and fabric structure.
- lubricating oil: 0.048372, 0.229628 kg (2 suppliers, which the file names only by identifier); sum of these 0.278 kg; lognormal variance with pedigree 0.0532, pedigree (4,4,3,4,4)
  This is sum of greese and greese oil for lubricating machines
  properties: carbon content, fossil 0.75, dry mass 1 kg, heating value, net 40.2 MJ, wet mass 1 kg
  note on carbon content, fossil: Lubricating oil is produced from diesel. C-content/dry mass of fats and oils considered 75%, from: ecoinvent v2.2 report, n 15a, pg 40
  note on heating value, net: Literature value, Source: IPCC 2006, 2006 IPCC Guidelines for National Greenhouse Gas Inventories, Prepared by the National Greenhouse Gas Inventories Programme, Eggleston H.S., Buendia L., Miwa K., Ngara T. and Tanabe K. (eds). Published: IGES, Japan
- maize starch: 0.017 kg
  Maize starch used as sizing agent; primary data
  properties: carbon content, non-fossil 0.46, dry mass 0.86 kg, heating value, net 11.64 MJ, water content 0.162791, wet mass 1 kg
  note on carbon content, non-fossil: C-content of starch is considered 46% on dry mass basis (from "Evolutionary and Biochemical Aspects", A.D. Kay and T. Vrede (in Global Ecology, 2010, Elsevier B.V., S.E. Jørgensen Ed.)).
- waste mineral oil: -0.0018891, -0.199802, -0.0763086 kg (3 suppliers, which the file names only by identifier); sum of these -0.278 kg; lognormal variance with pedigree 0.0512, pedigree (4,4,1,4,4)
  This is produced due to the use of lubricating oil necessary for the operation of machinery.
  production volume; = RP_PV_1 * (BP_amount_4 / RP_amount_1)
    Calculated from production volume of reference product using the relative outputs.
  properties: carbon content, fossil 0.864444, dry mass 0.9 kg, heating value, net 34.7 MJ, water content 0.111111, wet mass 1 kg
  note on carbon content, fossil: Tab A.6, ecoinvent v2.2 report 13_I. C content has been calculated after data in the tables, and then referred to 1 kg DM
  note on heating value, net: Value taken from the general comment of the treatment dataset.
- waste paperboard: -7.94435e-6, -3.20113e-5, -5.92563e-5, -9.08538e-5, -0.00145636, -0.0177586, -0.000594965 kg (7 suppliers, which the file names only by identifier); sum of these -0.02 kg; lognormal variance with pedigree 0.0512, pedigree (4,4,1,4,4)
  waste cardboard cones are made of paper pulp and different types of fibres
  production volume; = RP_PV_1 * (BP_amount_1 / RP_amount_1)
    Calculated from production volume of reference product using the relative outputs.
  properties: carbon content, non-fossil 0.483259, dry mass 0.804 kg, heating value, net 15.92 MJ, water content 0.243781, wet mass 1 kg
  note on carbon content, non-fossil: C content was calculated for 1 kg DM, using data in Tab A.3, ecoinvent v2.2 report 13_I.
- waste yarn and waste textile: -0.02 kg; name BP_amount_3; lognormal variance with pedigree 0.0512, pedigree (4,4,1,4,4)
  Waste produced during the process.
  production volume; = RP_PV_1 * (BP_amount_3 / RP_amount_1)
    Calculated from production volume of reference product using the relative outputs.
  properties: carbon content, non-fossil 0.44455, dry mass 0.97917 kg, heating value, net 13.14 MJ, water content 0.0212731, wet mass 1 kg
- wastewater, average: -2.4063e-7, -4.0042e-5, -9.57485e-6, -1.42565e-7 m3 (4 suppliers, which the file names only by identifier); sum of these -5e-5 m3; = 0.05/1000; lognormal variance with pedigree 0.0512, pedigree (4,4,1,4,4)
  0.05 kgs converted to cubic meters
  production volume; = RP_PV_1 * (BP_amount_2 / RP_amount_1)
    Calculated from production volume of reference product using the relative outputs.
  properties: carbon content, non-fossil 0.194039, dry mass 0.346837 kg, water content 2882.2, wet mass 1000 kg
  note on carbon content, non-fossil: 0.0673 kg TOC/m3 (Tab A.17, ecoinvent v2.2 report 13_I). TOC was considered as Total Carbon.
- yarn, cotton: 1.02 kg; lognormal variance with pedigree 0.0532, pedigree (4,4,3,4,4)
  Input of raw material that is transformed into textile.
  properties: carbon content, non-fossil 0.46, dry mass 0.94 kg, heating value, net 12.95 MJ, water content 0.0638298, wet mass 1 kg

## Inputs from nature
- Water, well, in ground [natural resource, in water]: 0.0015 m3; = 1.5/1000; lognormal variance with pedigree 0.0532, pedigree (4,4,3,4,4)
  1.5 lit transformed in cubic meters

## Emissions to nature
- Water [air, unspecified]: 0.00145 m3; = 1.45/1000; lognormal variance with pedigree 0.0532, pedigree (4,4,3,4,4)
  1.45 kg transformed in cubic meters.

## Sampling procedure
Industry data. Representative mills in Haryana (North India) was chosen to provide data based on its technical representativeness of the current state of business and their willingness to participate.

## Extrapolations
Dataset is extrapolated from the respective Indian dataset. Uncertainty has been adjusted accordingly.
