# soybean meal and crude oil production

Dataset: EcoSpold 2, unit process
Geography: US
Time period: 2007-01-01 to 2023-12-31
Technology level: current
Classification: EcoSpold01Categories: biomass/fuels
Classification: ISIC rev.4 ecoinvent: 1040:Manufacture of vegetable and animal oils and fats
Scenario: Business-as-Usual
System model: Allocation, cut-off by classification
Share of production covered: 0 %
Generated by: Anne Greig
Published in: Omni Tech International 2010
Database: ecoinvent
isCopyrightProtected: true
accessRestrictedTo: 1

## General comment
This dataset represents the production of 1000 kg crude soybean oil and its respective output of soybean meal. The multioutput-process 'soybeans, in oil mill' delivers the co-products 'crude soybean oil, at oil mill' and 'soybean meal, at oil mill'.
[This dataset is meant to replace the following datasets:
- soybean meal and crude oil production, US, 1998 - 2006]

## Included activities start
From arrival of the soybeans to the mill through crushing and processing to crude, degummed soybean oil and soybean meal.

## Included activities end
The system boundary is at the mill.

## Geography
Data collected from 50 of the 60 soybean processing plants in North America that National Oilseed Processors Association represents.

## Technology
Typical North American oil mill designed for soybean oil solvent extraction (incl. pre-cracking of soybeans, dehulling, oil extraction, meal processing and degumming),

## Time period
Data for 2007: current technology for soybean crushing and processing.

## Parameters
- fraction, process water, to air: 0.15 dimensionless; name fraction_PW_to_air; lognormal variance with pedigree 0.092025, pedigree (4,4,3,2,4)
  Literature value. In case when no industry/process specific data are available, default evaporation fraction value is used. This value is 15% and is based on literature (Statistics Canada, 2007 & Shaffer, K.H., 2008, Consumptive water use in the Great Lakes Basin, USGS & Shiklomanov, 2003, World Water Resources at the Beginning of the 21st Century) and has been approved by an expert.
- fraction, tap water, to air: 0.15 dimensionless; name fraction_TW_to_air; = fraction_PW_to_air; lognormal variance with pedigree 0.092025, pedigree (4,4,3,2,4)
  Calculated value. See comment in the other parametres present in this dataset. Tap water is considered to be always used as process water, thus process water fractions to air are applied to all tap water input flows to calculate the amount of water consumed in the processes.
- utilisation rate: 1 dimensionless; name utilization_rate; lognormal variance with pedigree 0.0086, pedigree (4,1,1,1,1)

## Reference product
- soybean meal: 1 kg; name soybean_meal_output; source Omni Tech International  2010; By-product classification allocatable product; CPC 21920: Flours and meals of oil seeds or oleaginous fruits, except those of mustard; HS2017 120810: Flours and meals; of soya beans
  Produced during crushing and processing. Coproduct of crude soy oil at the mill.
  production volume 4.6639e10 kg; name soybean_meal_PV; = soybean_oil_crude_PV * soybean_meal_output / soybean_oil_crude_output
    Calculated from production volume of by-product (soybean oil) using the relative outputs.
  property carbon content, non-fossil 0.475627
    Composition data obtained from Table 2 in Uses of Canola Meal, J. Bonnardeaux, Department of Agriculture and Food, Western Australia, 2007. First, composition data were refered to 1 kg dry mass. Then, C-contents were calculated considering a C-content/dry mass of 46% in carbohydrates (including fibres), 53% in proteins and 75% in fats. All data from "Evolutionary and Biochemical Aspects", A.D. Kay and T. Vrede (in Global Ecology, 2010, Elsevier B.V., S.E. Jørgensen Ed.).
  properties: allocation factor 0.641296, carbon allocation 0.423308 kg, carbon content 0.475627, carbon content, fossil 0, dry mass 0.89 kg, price 0.528626 EUR2005, true value 2183.75, water content 0.123596, water in wet mass 0.11 kg, wet mass 1 kg

## Inputs from technosphere
- electricity, medium voltage: 0.0448643 kWh; lognormal variance with pedigree 0.0413, pedigree (2,2,5,1,1)
  Measured value
- heat, central or small-scale, other than natural gas: 0.0147027 MJ; = (1502729*0.01/238)+(1502729*0.005/238); source Omni Tech International  2010; lognormal variance with pedigree 0.0413, pedigree (2,2,5,1,1)
  Measured value. Original data is presented in kilocalories. 1 MJ = 238 kcal.
  properties: heating value, net 1 MJ
- heat, district or industrial, natural gas: 0.637119 MJ; = 1502729*0.65/238; source Omni Tech International  2010; lognormal variance with pedigree 0.0413, pedigree (2,2,5,1,1)
  Measured value. Original data is presented in kilocalories. 1 MJ = 238 kcal.
  properties: heating value, net 1 MJ
- heat, district or industrial, other than natural gas: 0.328361 MJ; = (1502729*0.005/238)+(1502729*0.01/238)+(1502729*0.32/238); source Omni Tech International  2010; lognormal variance with pedigree 0.0413, pedigree (2,2,5,1,1)
  Measured value. Original data is presented in kilocalories. 1 MJ = 238 kcal.
  properties: heating value, net 1 MJ
- hexane: 0.00045951 kg; source Omni Tech International  2010; lognormal variance with pedigree 0.050725, pedigree (2,2,5,2,1)
  Estimated value
  properties: carbon content, fossil 0.837209, dry mass 1 kg, heating value, net 45.02 MJ, wet mass 1 kg
- inert waste, for final disposal: -0.00135059 kg; name inert_waste_output; source Omni Tech International  2010; lognormal variance with pedigree 0.0013, pedigree (2,2,1,1,1)
  Calculated based on mass balance.
  production volume; name inert_waste_PV; = inert_waste_output / soybean_meal_output * soybean_meal_PV
    Calculated from production volume of reference product using the relative outputs.
  properties: dry mass 0.995 kg, water content 0.00502513, wet mass 1 kg
- oil mill: 1.41127e-10 unit; = 1/lifetime_capacity_kg*1000; lognormal variance with pedigree 0.4761, pedigree (4,5,5,3,5)
  Calculated value.
  property lifetime capacity [kg] 1.1e9 kg; name lifetime_capacity_kg; = 22000000*50
- soybean: 0.812836 kg; lognormal variance with pedigree 0.0407, pedigree (1,2,5,1,1)
  Measured value
  properties: carbon content, non-fossil 0.524508, dry mass 0.89 kg, water content 0.123596, wet mass 1 kg
  note on carbon content, non-fossil: Composition data obtained from Soybeans, green, raw, in (http://www.nal.usda.gov/fnic/foodcomp/search/). First, composition data were refered to 1 kg dry mass. Then, C-contents were calculated considering a C-content/dry mass of 46% in carbohydrates (including fibres), 53% in proteins and 75% in fats. All data from "Evolutionary and Biochemical Aspects", A.D. Kay and T. Vrede (in Global Ecology, 2010, Elsevier B.V., S.E. Jørgensen Ed.).
- tap water: 0.395396 kg; name tap_water_input; lognormal variance with pedigree 0.0432, pedigree (2,4,5,1,1)
  Measured value
  property carbon content, fossil 0.00178991; name C_content_fossil
  property carbon content, non-fossil 0; name C_content_non_fossil
  property dry mass 0.000337476 kg; name DM
  property water content 2962.17; name water_content
  property water in wet mass 0.999663 kg; name WWM
  property wet mass 1 kg; name WM

## Emissions to nature
- Hexane [air, non-urban air or from high stacks]: 0.00045951 kg; source Omni Tech International  2010; lognormal variance with pedigree 0.0821, pedigree (3,2,5,1,1)
  Calculated based on mass balance of hexane used
- Water [air, unspecified]: 5.93094e-5 m3; name water_to_air_unspecified; = (tap_water_input/1000)*fraction_TW_to_air; lognormal variance with pedigree 0.130025, pedigree (4,4,5,2,4)
  Calculated value based on literature values and expert opinion. See comments in the parametres' comment field.
  property fraction, origin: fresh water 1; name fraction_origin_fresh_water
  property fraction, origin: salt water 0; name fraction_origin_salt_water
  property fraction, origin: unspecified 0; name fraction_origin_unspecified
- BOD5, Biological Oxygen Demand [water, surface water]: 8.69343e-6 kg; = 0.14*0.75*32/12*0.2
  Calculation related to the oil water effluent. BOD5 = 0.2*COD (low nutrient content relative to carbon)
- COD, Chemical Oxygen Demand [water, surface water]: 4.34672e-5 kg; = 0.14*0.75*32/12
  Calculation related to the oil water effluent. COD = 0.14 kg * 0.75 kg C/kg * 32/12 (stoichiometric oxygen demand for the oxidation product CO2)
- DOC, Dissolved Organic Carbon [water, surface water]: 1.63002e-5 kg; = 0.14*0.75
  Calculation related to the oil water effluent. DOC = 0.14 kg * 0.75 kg C/kg = 0.105 kg
- Oils, non-fossil [water, surface water]: 2.17336e-5 kg; source Omni Tech International  2010; lognormal variance with pedigree 0.0821, pedigree (3,2,5,1,1)
  Calculated value
- TOC, Total Organic Carbon [water, surface water]: 1.63002e-5 kg; = 0.14*0.75
  Calculation related to the oil water effluent. TOC = 0.14 kg * 0.75 kg C/kg = 0.105 kg
- Water [water, unspecified]: 0.000336087 m3; name water_to_water_unspecified; = (tap_water_input/1000)*(1-fraction_TW_to_air); lognormal variance with pedigree 0.130025, pedigree (4,4,5,2,4)
  (same comment as for Water)
  property fraction, origin: fresh water 1; name fraction_origin_fresh_water_Ww
  property fraction, origin: salt water 0; name fraction_origin_salt_water_Ww
  property fraction, origin: unspecified 0; name fraction_origin_unspecified_Ww

## Sampling procedure
Primary data - from 50 North American soybean processing plants collected for a year's period.

## Review by Bo Weidema 2012-03-15
New US data. Documentation adequate, inputs relevant, mass balance correct, and correct handling of capacity utilisation. Data have been checked against the original publication.

## Review by Bo Weidema 2012-03-15
Passed. Capacity ultilisation of 100% is not so realistic.
