# slab and siding, hardwood, wet, measured as dry mass to generic market for residual hardwood, wet

Dataset: EcoSpold 2, unit process
Geography: Europe without Switzerland
Time period: 2014-01-01 to 2023-12-31
Technology level: current
Classification: ISIC rev.4 ecoinvent: 1610:Sawmilling and planing of wood
Scenario: Business-as-Usual
System model: Allocation, cut-off by classification
Generated by: Nora Minas
Database: ecoinvent
isCopyrightProtected: true
accessRestrictedTo: 1

## General comment
This activity is linking the more specific market for slab and siding, hardwood, to the more generic market for residual hardwood, wet.It makes accesible the specific product slab and siding, hardwood through the more generic product of wet residual hardwood.

## Included activities start
Entry of the specific product "slab and siding, hardwood, wet, measured as dry mass"

## Included activities end
Delivery of the generic product "residual hardwood, wet"

## Reference product
- residual hardwood, wet: 1 m3; name residual_hardwood_wet; By-product classification allocatable product; CPC 39283: Non-agglomerated wood waste and scrap; HS2017 440140: Wood; for fuel, sawdust and wood waste and scrap, not agglomerated
  production volume 450769 m3; = 2.93E+09*0.1/ residual_hardwood_wet_DM
    2.93E+09 kg is the rough Production Volumes of slab and siding, hardwood produced out of sawing. It is considered that 10% of this volume is consumed as the more generic product "residual hardwood, wet". The Dry Mass of this product is used to calculate the Production Volumes in m3.
  property dry mass 650 kg; name residual_hardwood_wet_DM
  property heating value, net 8612.79 MJ
    LHV is calculated based on the Carbon content of the product. More details can be found on the respective documentation.The property is based on a value of 7.79MJ/kg
  property price 41.8 EUR2005
    Temporary price data. Calculated as 90% of purchasers price based on: 2004 World Export prices from FaoStat http://faostat.fao.org/site/626/DesktopDefault.aspx?PageID=626#ancor downloaded 29 April 2009; calculated as export value divided by export volume. Commodity: 'wood residues'.
  properties: carbon allocation 321.1 kg, carbon content 0.494, carbon content, fossil 0, carbon content, non-fossil 0.494, water content 0.7, water in wet mass 455 kg, wet mass 1105 kg

## Inputs from technosphere
- slab and siding, hardwood, wet, measured as dry mass: 650 kg; name slab_hardwood_wet; = residual_hardwood_wet_DM* residual_hardwood_wet
  Calculated using the Dry Mass of the reference product
  property carbon content, fossil 0; name slab_hardwood_wet_C_content_fossil
  property carbon content, non-fossil 0.494; name slab_hardwood_wet_C_content_non_fossil
  property dry mass 1 kg; name slab_hardwood_wet_DM
  property water content 0.7; name slab_hardwood_wet_water_content
  property water in wet mass 0.7 kg; name slab_hardwood_wet_WWM
  property wet mass 1.7 kg; name slab_hardwood_wet_WM
  properties: heating value, net 7.79 MJ
