# treatment of average incineration residue, residual material landfill

Dataset: EcoSpold 2, unit process
Geography: RoW
Time period: 2010-01-01 to 2023-12-31
Technology level: current
Classification: ISIC rev.4 ecoinvent: 3822:Treatment and disposal of hazardous waste
Scenario: Business-as-Usual
System model: Allocation, cut-off by classification
Generated by: Nikolia Stoikou
Database: ecoinvent
isCopyrightProtected: true
accessRestrictedTo: 1

## General comment
This dataset represents the activity of waste disposal of 'average incineration residue' in a residual material landfill (RMLF). Recommended use of this dataset: for wastes-residues that are low in organic carbon (< 5 w-%) and are not biologically or chemically reactive in water. Inventoried waste consists of fraction: 100% average residual materials from MSWI. Waste composition (wet, in ppmw): H2O na; O 383510; H na; C 23003; S 23821; N 8.7626; P 4930.5; B 40.551; Cl 87663; Br 2869.7; F 8880.4; I 0.18135; Ag 6.5144; As 31.671; Ba 831.52; Cd 333.2; Co 7.0076; Cr 517.27; Cu 2548.9; Hg 28.032; Mn 819.3; Mo 10.987; Ni 71.922; Pb 5870.3; Sb 1474.3; Se 13.502; Sn 2164.1; V 41.653; Zn 26937; Be 1.1681; Sc na; Sr na; Ti 15534; Tl na; W na; Si 67641; Fe 9108.9; Ca 135070; Al 56995; K 55666; Mg 10568; Na 72988. Share of carbon in initial waste input that is biogenic 0%. Additional solidification of residues with 0.4 kg of cement.

## Included activities start
The activity starts with the waste being available at the gate of the treatment facility. Collection and transportation of the waste to the treatment plant is not included.

## Included activities end
The activity ends with the waste being treated and waste-specific emissions from the landfill are released to water (short-term emissions to water from leachate and long-term emissions to ground water). Expenditures for solidificalion with cement are also included.

## Geography
This dataset represents a landfill site with mean annual temperature (MAT) of 16.743579766537 degC, mean annual precipitation (MAP) of 1250.84108527132 mm/year, mean annual actual evaporation (EAT) of 460.58904958214 mm/year, and net infiltration of 790.3 mm/year. The leachate percolating through the residual material landfill has an average residence time of 4.43 years.
Reference for climatic parameters:
UN data, 2020. Precipitation, Environment Statistics Database, United Nations Statistics Division Available at: http://data.un.org/Data.aspx?q=precipitation&d=ENV&f=variableID%3a6;
World Bank, 2022. Surface area (sq.km), World Bank Group Available at: https://data.worldbank.org/indicator/AG.SRF.TOTL.K2;

## Technology
Residual material landfill for polluted, inorganic waste (VVEA Type C). With base seal and leachate collection system. Ultimate average landfill height is 10 meters. Operation phase duration is 30 years. Recultivation after closure. Additional solidification with cement requested. Based on average waste composition and climate data the end of carbonate phase in the residual material landfill is estimated to be reached after 60 000 years.

## Reference product
- average incineration residue: -1 kg; By-product classification Waste; CPC 39990: Other wastes n.e.c.
  main reference product of this activity
  production volume 3.24914e10 kg
    Estimated based on the total amount of this waste being treated in the database for the Swiss geography and scaled to represent the global geography based on the Swiss GDP
  property price 0 EUR2005
    Waste products are assigned a price of zero as they are assumed to require further treatment.
  properties: aluminium content 0.0569952, antimony content 0.00147431, arsenic content 3.16707e-5, barium content 0.000831521, beryllium content 1.16808e-6, boron content 4.05508e-5, bromine content 0.00286966, cadmium content 0.000333202, calcium content 0.135065, carbon allocation 0.0230027 kg, carbon content 0.0230027, carbon content, fossil 0.00893783, carbon content, non-fossil 0.0140649, chlorine content 0.0876625, chromium content 0.000517274, cobalt content 7.00759e-6, copper content 0.00254893, dry mass 1 kg, fluorine content 0.00888039, heating value, gross 0 MJ, heating value, net 0 MJ, iodine content 1.81347e-7, iron content 0.00910892, lead content 0.00587032, magnesium content 0.010568, manganese content 0.0008193, mercury content 2.80318e-5, molybdenum content 1.09875e-5, nickel content 7.19216e-5, nitrogen content 8.76264e-6, oxygen content 0.383508, phosphorus content 0.00493052, potassium content 0.0556661, selenium content 1.35016e-5, silicon content 0.0676413, silver content 6.51439e-6, sodium content 0.0729878, sulfur content 0.0238214, tin content 0.00216405, titanium content 0.0155341, vanadium content 4.16534e-5, water content 0, water in wet mass 0 kg, wet mass 1 kg, zinc content 0.026937

## Inputs from technosphere
- cast iron: 5.0555e-6 kg; lognormal variance with pedigree 0.31529, pedigree (1,1,2,1,1)
  for residual material landfill infrastructure
  properties: carbon content, fossil 0.04, dry mass 1 kg, wet mass 1 kg
- cement, unspecified: 0.019856, 0.00862982, 0.000222976, 0.00525903, 0.0327739, 0.00102874, 0.000751958, 0.000407541, 0.000809987, 0.00123833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 kg (11 suppliers, which the file names only by identifier); sum of these 0.4 kg; lognormal variance with pedigree 0.009284, pedigree (1,1,2,1,1)
  cement required for solidification of landfilled residual material
  properties: dry mass 1 kg, wet mass 1 kg
- concrete, 25MPa: 5.25256e-10, 1.12472e-9, 1.77831e-8, 1.74996e-8, 4.32437e-7 m3 (5 suppliers, which the file names only by identifier); sum of these 4.6937e-7 m3; lognormal variance with pedigree 0.31529, pedigree (1,1,2,1,1)
  for residual material landfill infrastructure
  properties: cement content 206 kg, dry mass 2285 kg, fly ash content 69 kg, gravel content 1100 kg, sand content 910 kg, water content 0.0538293, wet mass 2408 kg
- diesel, burned in building machine: 0.028614 MJ; lognormal variance with pedigree 0.012675, pedigree (1,1,2,1,1)
  for residual material landfill infrastructure and operation
  properties: heating value, net 1 MJ
- electricity, low voltage: 3.25524e-7, 1.45309e-8, 2.28508e-7, 4.74298e-6, 4.68156e-7, 2.91605e-9, 1.07495e-6, 1.63294e-6, 8.08969e-8 kWh (9 suppliers, which the file names only by identifier); sum of these 8.5714e-6 kWh; lognormal variance with pedigree 0.012648, pedigree (1,1,2,1,1)
  for residual material landfill operation
- excavation, hydraulic digger: 0.00030086 m3; lognormal variance with pedigree 0.31529, pedigree (1,1,2,1,1)
  for residual material landfill infrastructure
- excavation, skid-steer loader: 0.00030086 m3; lognormal variance with pedigree 0.31529, pedigree (1,1,2,1,1)
  for residual material landfill infrastructure
- extrusion, plastic pipes: 8.1818e-5 kg; lognormal variance with pedigree 0.31529, pedigree (1,1,2,1,1)
  for residual material landfill infrastructure
- gravel, round: 0.1367 kg; lognormal variance with pedigree 0.31529, pedigree (1,1,2,1,1)
  for residual material landfill infrastructure
  properties: dry mass 1 kg, wet mass 1 kg
- heat, district or industrial, other than natural gas: 0.000896921, 4.15527e-7, 2.28239e-5 MJ (3 suppliers, which the file names only by identifier); sum of these 0.00092016 MJ; lognormal variance with pedigree 0.012648, pedigree (1,1,2,1,1)
  for residual material landfill operation
  properties: heating value, net 1 MJ
- pitch: 0.000152039, 6.81502e-6, 3.35925e-6, 5.89428e-5, 9.72908e-6, 0.000859492, 0.000195322 kg (7 suppliers, which the file names only by identifier); sum of these 0.0012857 kg; lognormal variance with pedigree 0.31529, pedigree (1,1,2,1,1)
  for residual material landfill infrastructure
  properties: carbon content, fossil 0.83, dry mass 1 kg, heating value, net 28 MJ, wet mass 1 kg
- polyethylene, high density, granulate: 0.00024899 kg; lognormal variance with pedigree 0.31529, pedigree (1,1,2,1,1)
  for residual material landfill infrastructure
  properties: carbon content, fossil 0.857143, dry mass 1 kg, heating value, net 42.47 MJ, wet mass 1 kg
- polypropylene, granulate: 8.1981e-7 kg; lognormal variance with pedigree 0.31529, pedigree (1,1,2,1,1)
  for residual material landfill infrastructure
  properties: carbon content, fossil 0.857143, dry mass 1 kg, heating value, net 32.78 MJ, wet mass 1 kg
  note on heating value, net: Value extracted from "treatment of waste polypropylene, open burning"
- polyvinylchloride, bulk polymerised: 8.1981e-7 kg; lognormal variance with pedigree 0.31529, pedigree (1,1,2,1,1)
  for residual material landfill infrastructure
  properties: carbon content, fossil 0.387097, dry mass 1 kg, heating value, net 21.5 MJ, wet mass 1 kg
- reinforcing steel: 2.9923e-5 kg; lognormal variance with pedigree 0.31529, pedigree (1,1,2,1,1)
  for residual material landfill infrastructure
  properties: carbon content, fossil 0.004, dry mass 1 kg, wet mass 1 kg
- sand: 3.47377e-6, 0.000226058, 1.80342e-8 kg (3 suppliers, which the file names only by identifier); sum of these 0.00022955 kg; lognormal variance with pedigree 0.31529, pedigree (1,1,2,1,1)
  for residual material landfill infrastructure
  properties: dry mass 1 kg, wet mass 1 kg
- steel, chromium steel 18/8, hot rolled: 1.0384e-5 kg; lognormal variance with pedigree 0.31529, pedigree (1,1,2,1,1)
  for residual material landfill infrastructure
  properties: carbon content, fossil 0.0008, dry mass 1 kg, wet mass 1 kg
- synthetic rubber: 2.7327e-7 kg; lognormal variance with pedigree 0.31529, pedigree (1,1,2,1,1)
  for residual material landfill infrastructure
  properties: carbon content, fossil 0.871949, dry mass 1 kg, heating value, net 26.42 MJ, wet mass 1 kg
- tap water: 7.77534e-6, 1.18529e-5, 2.21168e-5, 5.95811e-5, 7.17197e-6, 0.000298882, 0.00342026, 0.00254866 kg (8 suppliers, which the file names only by identifier); sum of these 0.0063763 kg; lognormal variance with pedigree 0.31529, pedigree (1,1,2,1,1)
  for residual material landfill infrastructure
  properties: carbon content, fossil 0.00178991, dry mass 0.000337476 kg, water content 2962.17, wet mass 1 kg
- waste cement, hydrated: -0.998085, -0.00191503 kg (2 suppliers, which the file names only by identifier); sum of these -1 kg; lognormal variance with pedigree 0.004734, pedigree (1,1,1,1,1)
  hydrated cement output for solidification of landfilled residual material
  production volume
    calculated in proportion to reference product waste input to incinerator
  properties: dry mass 1 kg, wet mass 1 kg

## Inputs from nature
- Organic carbon, placed in landfill [inventory indicator, waste]: 0.023003 kg; lognormal variance with pedigree 0.27095, pedigree (1,1,2,1,1)
  organic carbon placed in residual material landfill (for ecoscarcity LCIA only)
- Waste mass, total, placed in landfill [inventory indicator, waste]: 1 kg; lognormal variance with pedigree 0.0002, pedigree (1,1,2,1,1)
  waste mass placed in residual material landfill (for ecoscarcity LCIA only)
- Occupation, construction site [natural resource, land]: 0.00028571 m2*year; lognormal variance with pedigree 0.21182, pedigree (1,1,2,1,1)
  for residual material landfill construction
- Occupation, dump site [natural resource, land]: 0.0017143 m2*year; lognormal variance with pedigree 0.21182, pedigree (1,1,2,1,1)
  for residual material landfill area during operation
- Occupation, shrub land, sclerophyllous [natural resource, land]: 0.00028571 m2*year; lognormal variance with pedigree 0.21182, pedigree (1,1,2,1,1)
  for residual material landfill area initial aftercare recultivation
- Occupation, traffic area, road network [natural resource, land]: 0.0025714 m2*year; lognormal variance with pedigree 0.21182, pedigree (1,1,2,1,1)
  for access road of residual material landfill during construction, operation, and aftercare
- Transformation, from dump site [natural resource, land]: 5.7143e-5 m2; lognormal variance with pedigree 0.53191, pedigree (1,1,2,1,1)
  for residual material landfill area initial aftercare recultivation
- Transformation, from pasture, man made [natural resource, land]: 9.1429e-5 m2; lognormal variance with pedigree 0.53191, pedigree (1,1,2,1,1)
  for residual material landfill and access road
- Transformation, from shrub land, sclerophyllous [natural resource, land]: 5.7143e-5 m2; lognormal variance with pedigree 0.53191, pedigree (1,1,2,1,1)
  for residual material landfill area initial aftercare recultivation
- Transformation, from traffic area, road network [natural resource, land]: 3.4286e-5 m2; lognormal variance with pedigree 0.53191, pedigree (1,1,2,1,1)
  for recultivation of access road of residual material landfill after aftercare period
- Transformation, to dump site [natural resource, land]: 5.7143e-5 m2; lognormal variance with pedigree 0.53191, pedigree (1,1,2,1,1)
  for residual material landfill area
- Transformation, to forest, unspecified [natural resource, land]: 5.7143e-5 m2; lognormal variance with pedigree 0.53191, pedigree (1,1,2,1,1)
  for residual material landfill area aftercare recultivation
- Transformation, to pasture, man made [natural resource, land]: 3.4286e-5 m2; lognormal variance with pedigree 0.53191, pedigree (1,1,2,1,1)
  for recultivation of landfill and access road of residual material landfill after aftercare period
- Transformation, to shrub land, sclerophyllous [natural resource, land]: 5.7143e-5 m2; lognormal variance with pedigree 0.53191, pedigree (1,1,2,1,1)
  for residual material landfill area initial aftercare recultivation
- Transformation, to traffic area, road network [natural resource, land]: 3.4286e-5 m2; lognormal variance with pedigree 0.53191, pedigree (1,1,2,1,1)
  for access road of residual material landfill

## Emissions to nature
- Heat, waste [air, urban air close to ground]: 3.0857e-5 MJ; lognormal variance with pedigree 0.012648, pedigree (1,1,2,1,1)
  from electricity consumption in residual material landfill operation
- Hazardous waste disposed [inventory indicator, waste]: 1 kg; lognormal variance with pedigree 0.0002, pedigree (1,1,2,1,1)
  EN15804 waste mass in residual material landfill
- Aluminium III [water, ground-, long-term]: 0.031477 kg; lognormal variance with pedigree 0.26271, pedigree (1,1,2,1,1)
  emissions to groundwater in residual material landfill
- Aluminium III [water, surface water]: 5.2549e-5 kg; lognormal variance with pedigree 0.83803, pedigree (1,1,2,1,1)
  emissions to surface water in residual material landfill
- Antimony ion [water, ground-, long-term]: 0.0013493 kg; lognormal variance with pedigree 0.60793, pedigree (1,1,2,1,1)
  emissions to groundwater in residual material landfill
- Antimony ion [water, surface water]: 0.00012505 kg; lognormal variance with pedigree 0.74242, pedigree (1,1,2,1,1)
  emissions to surface water in residual material landfill
- Arsenic ion [water, ground-, long-term]: 3.1273e-5 kg; lognormal variance with pedigree 1.1153, pedigree (1,1,2,1,1)
  emissions to groundwater in residual material landfill
- Arsenic ion [water, surface water]: 3.0871e-7 kg; lognormal variance with pedigree 1.4828, pedigree (1,1,2,1,1)
  emissions to surface water in residual material landfill
- BOD5, Biological Oxygen Demand [water, ground-, long-term]: 0.011525 kg; lognormal variance with pedigree 0.27096, pedigree (1,1,2,1,1)
  emissions to groundwater in residual material landfill
- BOD5, Biological Oxygen Demand [water, surface water]: 8.957e-5 kg; lognormal variance with pedigree 0.66657, pedigree (1,1,2,1,1)
  emissions to surface water in residual material landfill
- Barium II [water, ground-, long-term]: 0.0001116 kg; lognormal variance with pedigree 1.6902, pedigree (1,1,2,1,1)
  emissions to groundwater in residual material landfill
- Barium II [water, surface water]: 1.8631e-7 kg; lognormal variance with pedigree 1.5308, pedigree (1,1,2,1,1)
  emissions to surface water in residual material landfill
- Beryllium II [water, ground-, long-term]: 1.5677e-7 kg; lognormal variance with pedigree 1.922, pedigree (1,1,2,1,1)
  emissions to groundwater in residual material landfill
- Beryllium II [water, surface water]: 2.6172e-10 kg; lognormal variance with pedigree 1.922, pedigree (1,1,2,1,1)
  emissions to surface water in residual material landfill
- Boron [water, ground-, long-term]: 3.7111e-5 kg; lognormal variance with pedigree 1.0829, pedigree (1,1,2,1,1)
  emissions to groundwater in residual material landfill
- Boron [water, surface water]: 3.4394e-6 kg; lognormal variance with pedigree 1.2174, pedigree (1,1,2,1,1)
  emissions to surface water in residual material landfill
- Bromine [water, ground-, long-term]: 0.0027413 kg; lognormal variance with pedigree 0.52215, pedigree (1,1,2,1,1)
  emissions to groundwater in residual material landfill
- Bromine [water, surface water]: 0.0001284 kg; lognormal variance with pedigree 0.71927, pedigree (1,1,2,1,1)
  emissions to surface water in residual material landfill
- COD, Chemical Oxygen Demand [water, ground-, long-term]: 0.11734 kg; lognormal variance with pedigree 0.27096, pedigree (1,1,2,1,1)
  emissions to groundwater in residual material landfill
- COD, Chemical Oxygen Demand [water, surface water]: 0.00091189 kg; lognormal variance with pedigree 0.66657, pedigree (1,1,2,1,1)
  emissions to surface water in residual material landfill
- Cadmium II [water, ground-, long-term]: 8.2421e-6 kg; lognormal variance with pedigree 1.922, pedigree (1,1,2,1,1)
  emissions to groundwater in residual material landfill
- Cadmium II [water, surface water]: 1.376e-8 kg; lognormal variance with pedigree 1.875, pedigree (1,1,2,1,1)
  emissions to surface water in residual material landfill
- Calcium II [water, ground-, long-term]: 0.035804 kg; lognormal variance with pedigree 0.53641, pedigree (1,1,2,1,1)
  emissions to groundwater in residual material landfill
- Calcium II [water, surface water]: 5.9774e-5 kg; lognormal variance with pedigree 0.85502, pedigree (1,1,2,1,1)
  emissions to surface water in residual material landfill
- Chloride [water, ground-, long-term]: 0.08319 kg; lognormal variance with pedigree 0.13365, pedigree (1,1,2,1,1)
  emissions to groundwater in residual material landfill
- Chloride [water, surface water]: 0.0044724 kg; lognormal variance with pedigree 0.31739, pedigree (1,1,2,1,1)
  emissions to surface water in residual material landfill
- Chromium VI [water, ground-, long-term]: 0.0004932 kg; lognormal variance with pedigree 0.74479, pedigree (1,1,2,1,1)
  emissions to groundwater in residual material landfill
- Chromium VI [water, surface water]: 2.7415e-6 kg; lognormal variance with pedigree 1.1856, pedigree (1,1,2,1,1)
  emissions to surface water in residual material landfill
- Cobalt II [water, ground-, long-term]: 2.6254e-6 kg; lognormal variance with pedigree 1.5559, pedigree (1,1,2,1,1)
  emissions to groundwater in residual material landfill
- Cobalt II [water, surface water]: 4.383e-9 kg; lognormal variance with pedigree 1.922, pedigree (1,1,2,1,1)
  emissions to surface water in residual material landfill
- Copper ion [water, ground-, long-term]: 0.00020747 kg; lognormal variance with pedigree 1.922, pedigree (1,1,2,1,1)
  emissions to groundwater in residual material landfill
- Copper ion [water, surface water]: 3.4636e-7 kg; lognormal variance with pedigree 1.452, pedigree (1,1,2,1,1)
  emissions to surface water in residual material landfill
- DOC, Dissolved Organic Carbon [water, ground-, long-term]: 0.022825 kg; lognormal variance with pedigree 0.27096, pedigree (1,1,2,1,1)
  emissions to groundwater in residual material landfill
- DOC, Dissolved Organic Carbon [water, surface water]: 0.00017739 kg; lognormal variance with pedigree 0.66657, pedigree (1,1,2,1,1)
  emissions to surface water in residual material landfill
- Fluoride [water, ground-, long-term]: 0.0054434 kg; lognormal variance with pedigree 0.44167, pedigree (1,1,2,1,1)
  emissions to groundwater in residual material landfill
- Fluoride [water, surface water]: 1.4099e-5 kg; lognormal variance with pedigree 0.97506, pedigree (1,1,2,1,1)
  emissions to surface water in residual material landfill
- Iodide [water, ground-, long-term]: 1.7209e-7 kg; lognormal variance with pedigree 1.7889, pedigree (1,1,2,1,1)
  emissions to groundwater in residual material landfill
- Iodide [water, surface water]: 9.252e-9 kg; lognormal variance with pedigree 1.922, pedigree (1,1,2,1,1)
  emissions to surface water in residual material landfill
- Iron ion [water, ground-, long-term]: 9.6481e-5 kg; lognormal variance with pedigree 1.922, pedigree (1,1,2,1,1)
  emissions to groundwater in residual material landfill
- Iron ion [water, surface water]: 1.6107e-7 kg; lognormal variance with pedigree 1.5636, pedigree (1,1,2,1,1)
  emissions to surface water in residual material landfill
- Lead II [water, ground-, long-term]: 4.4057e-5 kg; lognormal variance with pedigree 1.922, pedigree (1,1,2,1,1)
  emissions to groundwater in residual material landfill
- Lead II [water, surface water]: 7.355e-8 kg; lognormal variance with pedigree 1.6625, pedigree (1,1,2,1,1)
  emissions to surface water in residual material landfill
- Magnesium [water, ground-, long-term]: 0.0026014 kg; lognormal variance with pedigree 0.8522, pedigree (1,1,2,1,1)
  emissions to groundwater in residual material landfill
- Magnesium [water, surface water]: 4.3429e-6 kg; lognormal variance with pedigree 1.13, pedigree (1,1,2,1,1)
  emissions to surface water in residual material landfill
- Manganese II [water, ground-, long-term]: 2.6206e-5 kg; lognormal variance with pedigree 1.922, pedigree (1,1,2,1,1)
  emissions to groundwater in residual material landfill
- Manganese II [water, surface water]: 4.375e-8 kg; lognormal variance with pedigree 1.7225, pedigree (1,1,2,1,1)
  emissions to surface water in residual material landfill
- Mercury II [water, ground-, long-term]: 3.7908e-6 kg; lognormal variance with pedigree 1.922, pedigree (1,1,2,1,1)
  emissions to groundwater in residual material landfill
- Mercury II [water, surface water]: 6.3286e-9 kg; lognormal variance with pedigree 1.922, pedigree (1,1,2,1,1)
  emissions to surface water in residual material landfill
- Molybdenum VI [water, ground-, long-term]: 7.8852e-6 kg; lognormal variance with pedigree 1.2595, pedigree (1,1,2,1,1)
  emissions to groundwater in residual material landfill
- Molybdenum VI [water, surface water]: 3.1023e-6 kg; lognormal variance with pedigree 1.2977, pedigree (1,1,2,1,1)
  emissions to surface water in residual material landfill
- Nickel II [water, ground-, long-term]: 3.2545e-5 kg; lognormal variance with pedigree 1.1632, pedigree (1,1,2,1,1)
  emissions to groundwater in residual material landfill
- Nickel II [water, surface water]: 5.4332e-8 kg; lognormal variance with pedigree 1.6954, pedigree (1,1,2,1,1)
  emissions to surface water in residual material landfill
- Nitrate [water, ground-, long-term]: 3.4473e-5 kg; lognormal variance with pedigree 1.2864, pedigree (1,1,2,1,1)
  emissions to groundwater in residual material landfill
- Nitrate [water, surface water]: 4.3331e-6 kg; lognormal variance with pedigree 1.3962, pedigree (1,1,2,1,1)
  emissions to surface water in residual material landfill
- Phosphate [water, ground-, long-term]: 0.0028935 kg; lognormal variance with pedigree 1.1369, pedigree (1,1,2,1,1)
  emissions to groundwater in residual material landfill
- Phosphate [water, surface water]: 4.8305e-6 kg; lognormal variance with pedigree 1.2559, pedigree (1,1,2,1,1)
  emissions to surface water in residual material landfill
- Potassium I [water, ground-, long-term]: 0.042263 kg; lognormal variance with pedigree 0.18001, pedigree (1,1,2,1,1)
  emissions to groundwater in residual material landfill
- Potassium I [water, surface water]: 0.013403 kg; lognormal variance with pedigree 0.22905, pedigree (1,1,2,1,1)
  emissions to surface water in residual material landfill
- Selenium IV [water, ground-, long-term]: 1.2356e-5 kg; lognormal variance with pedigree 1.2289, pedigree (1,1,2,1,1)
  emissions to groundwater in residual material landfill
- Selenium IV [water, surface water]: 1.1452e-6 kg; lognormal variance with pedigree 1.3634, pedigree (1,1,2,1,1)
  emissions to surface water in residual material landfill
- Silicon [water, ground-, long-term]: 0.067334 kg; lognormal variance with pedigree 0.15784, pedigree (1,1,2,1,1)
  emissions to groundwater in residual material landfill
- Silicon [water, surface water]: 0.0003078 kg; lognormal variance with pedigree 0.61802, pedigree (1,1,2,1,1)
  emissions to surface water in residual material landfill
- Silver I [water, ground-, long-term]: 5.3023e-7 kg; lognormal variance with pedigree 1.922, pedigree (1,1,2,1,1)
  emissions to groundwater in residual material landfill
- Silver I [water, surface water]: 8.8519e-10 kg; lognormal variance with pedigree 1.922, pedigree (1,1,2,1,1)
  emissions to surface water in residual material landfill
- Sodium I [water, ground-, long-term]: 0.048033 kg; lognormal variance with pedigree 0.15571, pedigree (1,1,2,1,1)
  emissions to groundwater in residual material landfill
- Sodium I [water, surface water]: 0.024955 kg; lognormal variance with pedigree 0.18174, pedigree (1,1,2,1,1)
  emissions to surface water in residual material landfill
- Sulfate [water, ground-, long-term]: 0.065898 kg; lognormal variance with pedigree 0.26752, pedigree (1,1,2,1,1)
  emissions to groundwater in residual material landfill
- Sulfate [water, surface water]: 0.0055667 kg; lognormal variance with pedigree 0.40996, pedigree (1,1,2,1,1)
  emissions to surface water in residual material landfill
- TOC, Total Organic Carbon [water, ground-, long-term]: 0.022825 kg; lognormal variance with pedigree 0.27096, pedigree (1,1,2,1,1)
  emissions to groundwater in residual material landfill
- TOC, Total Organic Carbon [water, surface water]: 0.00017739 kg; lognormal variance with pedigree 0.66657, pedigree (1,1,2,1,1)
  emissions to surface water in residual material landfill
- Tin ion [water, ground-, long-term]: 3.8147e-5 kg; lognormal variance with pedigree 1.922, pedigree (1,1,2,1,1)
  emissions to groundwater in residual material landfill
- Tin ion [water, surface water]: 6.3685e-8 kg; lognormal variance with pedigree 1.6754, pedigree (1,1,2,1,1)
  emissions to surface water in residual material landfill
- Titanium ion [water, ground-, long-term]: 0.0020849 kg; lognormal variance with pedigree 1.324, pedigree (1,1,2,1,1)
  emissions to groundwater in residual material landfill
- Titanium ion [water, surface water]: 3.4806e-6 kg; lognormal variance with pedigree 1.1646, pedigree (1,1,2,1,1)
  emissions to surface water in residual material landfill
- Vanadium V [water, ground-, long-term]: 4.0913e-5 kg; lognormal variance with pedigree 1.0789, pedigree (1,1,2,1,1)
  emissions to groundwater in residual material landfill
- Vanadium V [water, surface water]: 3.1751e-7 kg; lognormal variance with pedigree 1.4758, pedigree (1,1,2,1,1)
  emissions to surface water in residual material landfill
- Zinc II [water, ground-, long-term]: 0.0004284 kg; lognormal variance with pedigree 1.922, pedigree (1,1,2,1,1)
  emissions to groundwater in residual material landfill
- Zinc II [water, surface water]: 7.1518e-7 kg; lognormal variance with pedigree 1.3845, pedigree (1,1,2,1,1)
  emissions to surface water in residual material landfill
