# electricity production, natural gas, conventional power plant

Dataset: EcoSpold 2, unit process
Geography: LU
Time period: 1990-01-01 to 2023-12-31
Technology level: current
Classification: EcoSpold01Categories: natural gas/power plants
Classification: ISIC rev.4 ecoinvent: 3510:Electric power generation, transmission and distribution
Tags: natural gas power; fossil fuels; ConvertedDataset
Scenario: Business-as-Usual
System model: Allocation, cut-off by classification
Generated by: Thomas Heck
Published in: Faist Emmenegger, M. 2007
Database: ecoinvent
isCopyrightProtected: true
accessRestrictedTo: 1

## General comment
[This dataset was already contained in the ecoinvent database version 2. It was not individually updated during the transfer to ecoinvent version 3. Life Cycle Impact Assessment results may still have changed, as they are affected by changes in the supply chain, i.e. in other datasets. This dataset was generated following the ecoinvent quality guidelines for version 2. It may have been subject to central changes described in the ecoinvent version 3 change report (http://www.ecoinvent.org/database/ecoinvent-version-3/reports-of-changes/), and the results of the central updates were reviewed extensively. The changes added e.g. consistent water flows and other information throughout the database. The documentation of this dataset can be found in the ecoinvent reports of version 2, which are still available via the ecoinvent website. The change report linked above covers all central changes that were made during the conversion process.]
[Dataset to be replaced by "heat and power co-generation, natural gas, conventional power plant, 100MW electrical, LU, 1990 - 2015"]

## Included activities end
The module includes fuel input from high pressure (RER) network, infrastructure, emissions to air, and substances needed for operation.

## Technology
Average of installed power plants.

## Parameters
- fraction, cooling water, cooling pond system, to air: 0.032 dimensionless; name fraction_CW_CP_to_air; lognormal variance with pedigree 0.0413, pedigree (2,3,1,3,1)
  Calculated based on literature value (Scown, C.D., 2011, Water Footprint of U.S. Transportation Fuels and supplying information of the article) (Vionnet, S., Quantis Water Database - Technical Report, 2012).
- fraction, cooling water, once-through system, to air: 0.004 dimensionless; name fraction_CW_OT_to_air; lognormal variance with pedigree 0.0413, pedigree (2,3,1,3,1)
  (same comment as for fraction, cooling water, cooling pond system, to air)
- fraction, cooling water, recirculating system, to air: 0.771 dimensionless; name fraction_CW_R_to_air; lognormal variance with pedigree 0.0413, pedigree (2,3,1,3,1)
  (same comment as for fraction, cooling water, cooling pond system, to air)
- fraction, cooling water, to air: 0.0118019 dimensionless; name fraction_CW_to_air; lognormal variance with pedigree 0.092025, pedigree (4,4,3,2,4)
  Calculated value based on literature value (Scown, 2011 & Floerke, 2009, Future changes of freshwater needs in the electricity production sector & Stiegel, 2008, Estimating Freshwater Needs to Meet Future Thermoelectric Generation Requirements) (Vionnet, S., Quantis Water Database - Technical Report, 2012).
- fraction, process water, to air: 0.15 dimensionless; name fraction_PW_to_air; lognormal variance with pedigree 0.092025, pedigree (4,4,3,2,4)
  Literature value. In case when no industry/process specific data are available, default evaporation fraction value is used. This value is 15% and is based on literature (Statistics Canada, 2007 & Shaffer, K.H., 2008, Consumptive water use in the Great Lakes Basin, USGS & Shiklomanov, 2003, World Water Resources at the Beginning of the 21st Century) and has been approved by an expert.
- fraction, water, completely softened, to air: 0.15 dimensionless; name fraction_WCS_to_air; = fraction_PW_to_air; lognormal variance with pedigree 0.092025, pedigree (4,4,3,2,4)
  Calculated value. See comment in the other parametres present in this dataset. Water, completely softened is considered to be always used as process water, thus process water fractions to air are applied to all water, completely softened input flows to calculate the amount of water consumed in the processes.
- fraction, water, decarbonised, to air: 0.0118019 dimensionless; name fraction_WDC_to_air; = fraction_CW_to_air; lognormal variance with pedigree 0.092025, pedigree (4,4,3,2,4)
  Calculated value. See comments in the other parametres present in this dataset. Decarbonised water is considered to be always used as cooling water, thus cooling water fractions to air are applied to all carbonised water input flows to calculate the amount of water consumed in the processes.
- scaling factor: 14.7 dimensionless; name scaling_factor

## Reference product
- electricity, high voltage: 1 kWh; = 0.0680272108843537 * scaling_factor; By-product classification allocatable product; CPC 17100: Electrical energy; HS2017 271600: Electrical energy
  Amount was scaled to 1.
  production volume 1.591e9 kWh; name apv_el
    Literature value/statistics. Net production of grid-connected electricity in 2008. (Net = gross production minus direct electricity use needed for electricity production at the power plant).The annual production volume is valid for 2008, even if this dataset is valid for a longer time period.
  property price 0.0977 EUR2005
    Temporary price data. Calculated as 90% of purchasers price based on: 94% of the average price (to account for a 6% loss in transformation and transmission) for electricity for industrial consumersin 2005 (excluded taxes). From IEA.
  properties: Corresponding fuel use 14.7 MJ, carbon allocation 0 kg, carbon content 0

## Inputs from technosphere
- gas power plant, 100MW electrical: 9.9813e-11 unit; = 6.79E-12 * scaling_factor; lognormal variance with pedigree 0.16, pedigree (1,1,5,1,1)
  uncertainty of life time
  Amount was scaled to the amount of reference product.
- natural gas, high pressure: 0.376923 m3; = 0.0256410256410256 * scaling_factor; lognormal variance with pedigree 0.04, pedigree (1,1,5,1,1)
  0
  Amount was scaled to the amount of reference product.
  properties: carbon content, fossil 0.602381, dry mass 0.84 kg, heating value, gross 40 MJ, heating value, net 36 MJ, wet mass 0.84 kg
  note on carbon content, fossil: An average C content of 0.506 kg C/ m3 has been assumed (this average has been calculated using data in Tab 3.5, ecoinvent v2.2 report 6_V
  note on heating value, net: Literature value, Source: Christoph Meili;Niels Jungbluth;Maresa Bussa (2021) Life cycle inventories of crude oil and natural gas extraction. ESU-services Ltd. commissioned by BAFU & VSG, Schaffhausen, Switzerland, http://esu-services.ch/data/public-lci-reports/
- residue from cooling tower: -1.47e-5 kg; name residue; = 1E-06 * scaling_factor; lognormal variance with pedigree 1.08, pedigree (1,1,1,1,1)
  rough estimate, high uncertainty
  Amount was scaled to the amount of reference product.
  production volume; = apv_el*residue
    Calculated from the production volume of natural gas, burned in power plant in proportion to the respective output amounts.
  properties: carbon content, fossil 0.0544233, dry mass 0.7 kg, water content 0.428571, wet mass 1 kg
- water, completely softened: 0.0882 kg; name water_softened_input; = 0.006 * scaling_factor; lognormal variance with pedigree 0.25, pedigree (1,1,5,1,1)
  range of values from differnet references
  Amount was scaled to the amount of reference product.
  range of values from differnet references
  Amount was scaled to the amount of reference product.
  properties: wet mass 1 kg
- water, decarbonised: 2.94 kg; name water_decarbonised_input; = 0.2 * scaling_factor; lognormal variance with pedigree 0.25, pedigree (1,1,5,1,1)
  (same comment as for water, completely softened)
  properties: wet mass 1 kg

## Inputs from nature
- Water, cooling, unspecified natural origin [natural resource, in water]: 0.10095 m3; name water_cooling_UNO_input; source Scown, C.D., et al. 2011; lognormal variance with pedigree 0.130025, pedigree (4,4,5,2,4)
  Calculated based on literature (Scown, C.D., et al., 2011, Water Footprint of U.S. Trasportation Fuels;Scown, C.D., et al., 2011, Water Footprint of U.S. Trasportation Fuels (SI); Stiegel, 2008, Estimating Freshwater Needs to Meet Future Thermoelectric Generation Requirements; Floerke, M., 2009, Future changes of freshwater needs in the electricity production sector), (Vionnet, S., Quantis Water Database - Technical Report, 2012). Water use in this process is modelled based on literature (see references). The process boundaries are given by the boundaries of the power plant. The process ends when the energy (MJ) is produced and ready to be used for electricity production (kWh).
  Calculated based on literature data.
  property carbon content, fossil 0.0104329; name C_content_fossil
  property carbon content, non-fossil 0; name C_content_non_fossil
  property dry mass 0.1101 kg; name DM
  property water content 9081.65; name water_content
  property water in wet mass 999.89 kg; name WWM
  property wet mass 1000 kg; name WM

## Emissions to nature
- Acenaphthene [air, urban air close to ground]: 1.16571e-11 kg; = 7.93E-13 * scaling_factor; lognormal variance with pedigree 0.69, pedigree (1,1,5,1,1)
  US EPA 1998, high uncertainty reported qulitatively therein
  Amount was scaled to the amount of reference product.
- Acetaldehyde [air, urban air close to ground]: 1.176e-8 kg; = 8E-10 * scaling_factor; lognormal variance with pedigree 1.12, pedigree (1,1,5,1,1)
  rough estimate, high uncertainty
  Amount was scaled to the amount of reference product.
- Acetic acid [air, urban air close to ground]: 1.7787e-6 kg; = 1.21E-07 * scaling_factor; lognormal variance with pedigree 1.12, pedigree (1,1,5,1,1)
  rough estimate, high uncertainty
  Amount was scaled to the amount of reference product.
- Benzene [air, urban air close to ground]: 1.36122e-8 kg; = 9.26E-10 * scaling_factor; lognormal variance with pedigree 0.69, pedigree (1,1,5,1,1)
  (same comment as for Acenaphthene)
- Benzo(a)pyrene [air, urban air close to ground]: 7.7763e-12 kg; = 5.29E-13 * scaling_factor; lognormal variance with pedigree 0.69, pedigree (1,1,5,1,1)
  (same comment as for Acenaphthene)
- Butane [air, urban air close to ground]: 1.36122e-5 kg; = 9.26E-07 * scaling_factor; lognormal variance with pedigree 0.69, pedigree (1,1,5,1,1)
  (same comment as for Acenaphthene)
- Carbon dioxide, fossil [air, urban air close to ground]: 0.8232 kg; = 0.056 * scaling_factor; lognormal variance with pedigree 0.04, pedigree (1,1,5,1,1)
  composition of natural gas
  Amount was scaled to the amount of reference product.
- Carbon monoxide, fossil [air, urban air close to ground]: 0.000147 kg; = 1E-05 * scaling_factor; lognormal variance with pedigree 0.34, pedigree (1,1,5,1,1)
  estimate from range of values from different references
  Amount was scaled to the amount of reference product.
- Dinitrogen monoxide [air, urban air close to ground]: 1.47e-5 kg; = 1E-06 * scaling_factor; lognormal variance with pedigree 0.34, pedigree (1,1,5,1,1)
  (same comment as for Carbon monoxide, fossil)
- Dioxins, measured as 2,3,7,8-tetrachlorodibenzo-p-dioxin [air, urban air close to ground]: 4.263e-16 kg; = 2.9E-17 * scaling_factor; lognormal variance with pedigree 1.12, pedigree (1,1,5,1,1)
  rough estimate, high uncertainty
  Amount was scaled to the amount of reference product.
- Ethane [air, urban air close to ground]: 2.0139e-5 kg; = 1.37E-06 * scaling_factor; lognormal variance with pedigree 0.69, pedigree (1,1,5,1,1)
  (same comment as for Acenaphthene)
- Formaldehyde [air, urban air close to ground]: 4.8657e-7 kg; = 3.31E-08 * scaling_factor; lognormal variance with pedigree 0.69, pedigree (1,1,5,1,1)
  (same comment as for Acenaphthene)
- Hexane [air, urban air close to ground]: 1.16571e-5 kg; = 7.93E-07 * scaling_factor; lognormal variance with pedigree 0.69, pedigree (1,1,5,1,1)
  (same comment as for Acenaphthene)
- Mercury II [air, urban air close to ground]: 4.41e-10 kg; = 3E-11 * scaling_factor; lognormal variance with pedigree 0.69, pedigree (1,1,5,1,1)
  trace element in natural gas
  Amount was scaled to the amount of reference product.
- Methane, fossil [air, urban air close to ground]: 1.47e-5 kg; = 1E-06 * scaling_factor; lognormal variance with pedigree 0.69, pedigree (1,1,5,1,1)
  (same comment as for Carbon monoxide, fossil)
- Nitrogen oxides [air, urban air close to ground]: 0.000735 kg; = 5E-05 * scaling_factor; lognormal variance with pedigree 0.34, pedigree (1,1,5,1,1)
  (same comment as for Carbon monoxide, fossil)
- PAH, polycyclic aromatic hydrocarbons [air, urban air close to ground]: 1.176e-7 kg; = 8E-09 * scaling_factor; lognormal variance with pedigree 1.12, pedigree (1,1,5,1,1)
  rough estimate, high uncertainty
  Amount was scaled to the amount of reference product.
- Particulate Matter, < 2.5 um [air, urban air close to ground]: 7.35e-6 kg; = 5E-07 * scaling_factor; lognormal variance with pedigree 0.34, pedigree (1,1,5,1,1)
  (same comment as for Carbon monoxide, fossil)
- Pentane [air, urban air close to ground]: 1.6905e-5 kg; = 1.15E-06 * scaling_factor; lognormal variance with pedigree 0.69, pedigree (1,1,5,1,1)
  (same comment as for Acenaphthene)
- Propane [air, urban air close to ground]: 1.03635e-5 kg; = 7.05E-07 * scaling_factor; lognormal variance with pedigree 0.69, pedigree (1,1,5,1,1)
  (same comment as for Acenaphthene)
- Propionic acid [air, urban air close to ground]: 2.352e-7 kg; = 1.6E-08 * scaling_factor; lognormal variance with pedigree 1.12, pedigree (1,1,5,1,1)
  rough estimate, high uncertainty
  Amount was scaled to the amount of reference product.
- Sulfur dioxide [air, urban air close to ground]: 7.35e-6 kg; = 5E-07 * scaling_factor; lognormal variance with pedigree 0.04, pedigree (1,1,5,1,1)
  composition of natural gas
  Amount was scaled to the amount of reference product.
- Toluene [air, urban air close to ground]: 2.205e-8 kg; = 1.5E-09 * scaling_factor; lognormal variance with pedigree 0.69, pedigree (1,1,5,1,1)
  (same comment as for Acenaphthene)
- Water [air, unspecified]: 0.00123933 m3; name water_to_air_unspecified; = (water_softened_input/1000)*fraction_WCS_to_air+(water_decarbonised_input/1000)*fraction_WDC_to_air+water_cooling_UNO_input*fraction_CW_to_air; lognormal variance with pedigree 0.130025, pedigree (4,4,5,2,4)
  Calculated value based on literature values and expert opinion. See comments in the parametres" comment field.
  property fraction, origin: fresh water 0.0386723; name fraction_origin_fresh_water
  property fraction, origin: salt water 0; name fraction_origin_salt_water
  property fraction, origin: unspecified 0.961328; name fraction_origin_unspecified
- Water [water, unspecified]: 0.102739 m3; name water_to_water_unspecified; = (water_softened_input/1000)*(1-fraction_WCS_to_air)+(water_decarbonised_input/1000)*(1-fraction_WDC_to_air)+water_cooling_UNO_input*(1-fraction_CW_to_air); lognormal variance with pedigree 0.130025, pedigree (4,4,5,2,4)
  (same comment as for Water)
  property fraction, origin: fresh water 0.0290083; name fraction_origin_fresh_water_Ww
  property fraction, origin: salt water 0; name fraction_origin_salt_water_Ww
  property fraction, origin: unspecified 0.970992; name fraction_origin_unspecified_Ww

## Sampling procedure
Literature

## Extrapolations
The Annual Production Volume is valid for the year 2008. Uncertainty has been adjusted accordingly.

## Review by Michael Spielmann (obsolete) 2004-04-02
had passed

## Review by Bo Weidema 2013-02-13
technology level modified
