# carbon tetrachloride production

Dataset: EcoSpold 2, unit process
Geography: RoW
Time period: 1997-01-01 to 2023-12-31
Technology level: current
Classification: EcoSpold01Categories: chemicals/organics
Classification: ISIC rev.4 ecoinvent: 2011:Manufacture of basic chemicals
Synonyms: Tetrachloromethane
Tags: ConvertedDataset
Scenario: Business-as-Usual
System model: Allocation, cut-off by classification
Generated by: Roland Hischier
Published in: Althaus H.-J. 2004
Database: ecoinvent
isCopyrightProtected: true
accessRestrictedTo: 1

## General comment
Data are from the Eco-profiles of the European plastics industry (APME). Not included are the values reported for: recyclable wastes, amount of air / N2 / O2 consumed, unspecified metal emission to air and to water, mercaptan emission to air, unspecified CFC/HCFC emission to air. The amount of "sulphur (bonded)" is assumed to be included into the amount of raw oil.
[This dataset was already contained in the ecoinvent database version 2. It was not individually updated during the transfer to ecoinvent version 3. Life Cycle Impact Assessment results may still have changed, as they are affected by changes in the supply chain, i.e. in other datasets. This dataset was generated following the ecoinvent quality guidelines for version 2. It may have been subject to central changes described in the ecoinvent version 3 change report (http://www.ecoinvent.org/database/ecoinvent-version-3/reports-of-changes/), and the results of the central updates were reviewed extensively. The changes added e.g. consistent water flows and other information throughout the database. The documentation of this dataset can be found in the ecoinvent reports of version 2, which are still available via the ecoinvent website. The change report linked above covers all central changes that were made during the conversion process.]

## Included activities end
Aggregated data for all processes from raw material extraction until delivery at plant

## Geography
5 major European producers

## Technology
production by three different routes (methane with chlorine / chlorination of chloromethane / chlorination of higher hydrocarbons)

## Time period
date of literature used

## Parameters
- fraction, cooling water, cooling pond system, to air: 0.032 dimensionless; name fraction_CW_CP_to_air; lognormal variance with pedigree 0.0413, pedigree (2,3,1,3,1)
  Calculated based on literature value (Scown, C.D., 2011, Water Footprint of U.S. Transportation Fuels and supplying information of the article) (Vionnet, S., Quantis Water Database - Technical Report, 2012).
- fraction, cooling water, once-through system, to air: 0.004 dimensionless; name fraction_CW_OT_to_air; lognormal variance with pedigree 0.0413, pedigree (2,3,1,3,1)
  (same comment as for fraction, cooling water, cooling pond system, to air)
- fraction, cooling water, recirculating system, to air: 0.771 dimensionless; name fraction_CW_R_to_air; lognormal variance with pedigree 0.0413, pedigree (2,3,1,3,1)
  (same comment as for fraction, cooling water, cooling pond system, to air)
- fraction, cooling water, to air: 0.3875 dimensionless; name fraction_CW_to_air; = (0.5*fraction_CW_OT_to_air)+(0.5*fraction_CW_R_to_air); lognormal variance with pedigree 0.092025, pedigree (4,4,3,2,4)
  Calculated value based on literature value (see comments of the other parametres present in this dataset) and expert opinion. In the case when no industry/literature data are available about the type of cooling or directly fraction, cooling water, to air specific for the process a default assumption is applied. It is assumed that the once-through cooling system is used in 50% of all cases and recirculating system is used in another 50% of all cases.
- fraction, process water, to air: 0.205 dimensionless; name fraction_PW_to_air; lognormal variance with pedigree 0.092025, pedigree (4,4,3,2,4)

## Reference product
- carbon tetrachloride: 1 kg; By-product classification allocatable product; CPC 34110: Hydrocarbons and their halogenated, sulphonated, nitrated or nitrosated derivatives; HS2017 290314: Saturated chlorinated derivatives of acyclic hydrocarbons; carbon tetrachloride; CAS 56-23-5
  EcoSpold01Location=RER
  production volume 1.09569e8 kg
    Table 2.1 in UNEP (2007): Montreal Protocol on Substances that Deplete the Ozone Layer. 2006 Assessment Report of
    the Technology and Economic Assessment Panel <http://ozone.unep.org/Assessment_Panels/TEAP/Reports/TEAP_Reports/teap_assessment_report06.pdf>. Note that the April 2007 progress report <http://ozone.unep.org/teap/Reports/TEAP_Reports/Teap_progress_report_April2007.pdf> (and later) also contains information on a large number of uses.
  property heating value, net 2.37 MJ
    LHV is calculated based on the elemental composition of the substance. Based on the CAS number of the substance (000056-23-5), the chemical formula of the substance is found to be: CCl4, (PubChem 2020).
    Reference: Kim, S., Chen, J., Cheng, T., Gindulyte, A., He, J., He, S., Li, Q., Shoemaker, B. A., Thiessen, P. A., Yu, B., Zaslavsky, L., Zhang, J., & Bolton, E. E. (2019). PubChem 2019 update: improved access to chemical data. Nucleic acids research, 47(D1), D1102–D1109. https://doi.org/10.1093/nar/gky1033
  properties: carbon allocation 0.0789474 kg, carbon content 0.0789474, carbon content, fossil 0.0789474, carbon content, non-fossil 0, dry mass 1 kg, price 5.4 EUR2005, water content 0, water in wet mass 0 kg, wet mass 1 kg

## Inputs from technosphere
All rows: lognormal variance with pedigree 0.002, pedigree (1,1,1,5,1)
- average incineration residue: -0.0207 kg
  EcoSpold01Location=CH
  production volume
    Calculated from the production volume of carbon tetrachloride in proportion to the respective output amounts.
  properties: carbon content, fossil 0.0325466, carbon content, non-fossil 0.0511208, dry mass 1 kg, wet mass 1 kg
  note on carbon content, fossil: Tab A.1, ecoinvent v2.2 report 13_I. It is considered that 61.1% of the C has a biogenic origin
- decommissioned chemical production facilities: -2e-6 kg
  EcoSpold01Location=RER
  production volume
    (same comment as for average incineration residue)
  properties: carbon content, fossil 0.0169382, carbon content, non-fossil 5.78006e-6, dry mass 1 kg, wet mass 1 kg
  note on carbon content, fossil: Calculated from C content in input materials in the infrastructure
- hazardous waste, for underground deposit: -0.0049 kg
  EcoSpold01Location=DE
  production volume
    (same comment as for average incineration residue)
  properties: carbon content, fossil 0.554667, dry mass 1 kg, wet mass 1 kg
  note on carbon content, fossil: Tab A.6, ecoinvent v2.2 report 13_I, average hazardous waste composition was used, and referred to 0% water mass. No waste-specific emission are currently inventoried for underground deposits. Accordingly, no waste composition must be specified. For generic, average waste to underground deposit deposition in a 200 liter steel drum without cement solidification is assumed (ecoinvent v2.2 report 13_I).
- municipal solid waste: -1.26596e-5, -1.50328e-6, -9.35601e-6, -0.00714256, -1.05193e-6, -3.37652e-7, -7.63186e-7, -3.17717e-5 kg (8 suppliers, which the file names only by identifier); sum of these -0.0072 kg
  EcoSpold01Location=CH
  production volume
    (same comment as for average incineration residue)
  properties: carbon content, fossil 0.171549, carbon content, non-fossil 0.261655, dry mass 0.771 kg, heating value, net 11.74 MJ, water content 0.297017, wet mass 1 kg
  note on carbon content, fossil: MSW composition in tab 4.1, ecoinvent v2.2 report 13_I. C content referred to 1 kg DM
  note on heating value, net: Value taken from the general comment of the treatment dataset.
- spoil from hard coal mining: -0.048 kg
  EcoSpold01Location=GLO
  production volume
    (same comment as for average incineration residue)
  properties: carbon content, fossil 0.007879, dry mass 1 kg, wet mass 1 kg
  note on carbon content, fossil: Composition of coal spoil is adopted by proxy from lignite spoil (pg 19, Doka G. (2009) Life Cycle Inventory of the disposal of lignite spoil, coal spoil and coal tailings. Doka Life Cycle Assessments, Zurich. Commissioned by the Swiss Centre for Life Cycle Inventories ecoinvent Centre)
- waste plastic, mixture: -1.32521e-10, -1.25841e-10, -4.94541e-7, -4.80192e-9, -3.20846e-10, -5.35369e-11, -2.42651e-11 kg (7 suppliers, which the file names only by identifier); sum of these -5e-7 kg
  EcoSpold01Location=CH
  production volume
    (same comment as for average incineration residue)
  properties: carbon content, fossil 0.747344, dry mass 0.847 kg, heating value, net 30.79 MJ, water content 0.180638, wet mass 1 kg
  note on carbon content, fossil: C content in 1 kg DM was calculated using data in Tab A.2, ecoinvent v2.2 report 13_I
- waste wood, untreated: -2.08012e-8, -5.41462e-10, -4.03494e-7, -7.40599e-9, -3.14256e-9, -4.96813e-9, -5.96463e-8 kg (7 suppliers, which the file names only by identifier); sum of these -5e-7 kg
  EcoSpold01Location=CH
  production volume
    (same comment as for average incineration residue)
  properties: carbon content, non-fossil 0.48632, dry mass 0.8 kg, heating value, net 13.99 MJ, water content 0.25, wet mass 1 kg
  note on carbon content, non-fossil: Tab A.4, ecoinvent v2.2 report 13_I. C content has been referred to 1 kg DM,

## Inputs from nature
- Aluminium [natural resource, in ground]: 5.76e-6 kg; lognormal variance with pedigree 0.042, pedigree (1,1,5,5,1)
  24% Al in bauxite; 11% Al in ore
- Barium [natural resource, in ground]: 0.00061 kg; lognormal variance with pedigree 0.042, pedigree (1,1,5,5,1)
  15% BaSO4 in ore
- Calcite [natural resource, in ground]: 0.022 kg; lognormal variance with pedigree 0.042, pedigree (1,1,5,5,1)
- Clay, unspecified [natural resource, in ground]: 2e-6 kg; lognormal variance with pedigree 0.042, pedigree (1,1,5,5,1)
- Coal, brown [natural resource, in ground]: 0.018 kg; lognormal variance with pedigree 0.042, pedigree (1,1,5,5,1)
- Coal, hard [natural resource, in ground]: 0.11 kg; lognormal variance with pedigree 0.042, pedigree (1,1,5,5,1)
- Energy, potential (in hydropower reservoir), converted [natural resource, in water]: 0.89 MJ
- Fluorspar [natural resource, in ground]: 3e-6 kg; lognormal variance with pedigree 0.042, pedigree (1,1,5,5,1)
  92% CaF2 in ore
- Gas, natural [natural resource, in ground]: 0.362 Sm3; lognormal variance with pedigree 0.042, pedigree (1,1,5,5,1)
- Iron [natural resource, in ground]: 8.5e-5 kg; lognormal variance with pedigree 0.042, pedigree (1,1,5,5,1)
  46% Fe in siderite; 25% Fe in ore
- Oil, crude [natural resource, in ground]: 0.12 kg; lognormal variance with pedigree 0.042, pedigree (1,1,5,5,1)
- Sand, unspecified [natural resource, in ground]: 0.00078 kg; lognormal variance with pedigree 0.042, pedigree (1,1,5,5,1)
- Sodium chloride [natural resource, in ground]: 1.1 kg; lognormal variance with pedigree 0.042, pedigree (1,1,5,5,1)
- Sulfur [natural resource, in ground]: 0.0015 kg; lognormal variance with pedigree 0.042, pedigree (1,1,5,5,1)
- Sylvite [natural resource, in ground]: 5e-6 kg; lognormal variance with pedigree 0.042, pedigree (1,1,5,5,1)
  25% Sylvite in sylvinite
- Uranium [natural resource, in ground]: 2.19e-5 kg; lognormal variance with pedigree 0.042, pedigree (1,1,5,5,1)
- Water, cooling, unspecified natural origin [natural resource, in water]: 0.14 m3; name water_cooling_UNO_input; lognormal variance with pedigree 0.042, pedigree (1,1,5,5,1)
- Water, river [natural resource, in water]: 1.7e-6 m3; name water_river_input; lognormal variance with pedigree 0.042, pedigree (1,1,5,5,1)
- Water, salt, ocean [natural resource, in water]: 7.4e-7 m3; name water_salt_ocean_input; lognormal variance with pedigree 0.042, pedigree (1,1,5,5,1)
- Water, unspecified natural origin [natural resource, in water]: 0.0075 m3; name water_UNO_input; lognormal variance with pedigree 0.042, pedigree (1,1,5,5,1)
- Water, well, in ground [natural resource, in water]: 0.0018 m3; name water_well_in_ground_input; lognormal variance with pedigree 0.042, pedigree (1,1,5,5,1)
- Wood, unspecified, standing [natural resource, biotic]: 7.6e-9 m3; lognormal variance with pedigree 0.042, pedigree (1,1,5,5,1)

## Emissions to nature
- Aldehydes, unspecified [air, urban air close to ground]: 5e-7 kg; lognormal variance with pedigree 0.042, pedigree (1,1,5,5,1)
- Ammonia [air, urban air close to ground]: 5e-7 kg; lognormal variance with pedigree 0.042, pedigree (1,1,5,5,1)
- Carbon dioxide, fossil [air, urban air close to ground]: 1.4 kg; lognormal variance with pedigree 0.042, pedigree (1,1,5,5,1)
- Carbon monoxide, fossil [air, urban air close to ground]: 0.001 kg; lognormal variance with pedigree 0.042, pedigree (1,1,5,5,1)
- Chlorine [air, urban air close to ground]: 5e-7 kg; lognormal variance with pedigree 0.042, pedigree (1,1,5,5,1)
- Cyanide [air, urban air close to ground]: 5e-7 kg; lognormal variance with pedigree 0.042, pedigree (1,1,5,5,1)
- Dinitrogen monoxide [air, urban air close to ground]: 5e-7 kg; lognormal variance with pedigree 0.042, pedigree (1,1,5,5,1)
- Ethylene dichloride [air, urban air close to ground]: 5e-7 kg; lognormal variance with pedigree 0.042, pedigree (1,1,5,5,1)
- Fluorine [air, urban air close to ground]: 5e-7 kg; lognormal variance with pedigree 0.042, pedigree (1,1,5,5,1)
- Hydrocarbons, aromatic [air, urban air close to ground]: 5e-7 kg; lognormal variance with pedigree 0.042, pedigree (1,1,5,5,1)
- Hydrocarbons, chlorinated [air, urban air close to ground]: 0.00045 kg; lognormal variance with pedigree 0.042, pedigree (1,1,5,5,1)
- Hydrochloric acid [air, urban air close to ground]: 6.2e-5 kg; lognormal variance with pedigree 0.042, pedigree (1,1,5,5,1)
- Hydrogen [air, urban air close to ground]: 0.00021 kg; lognormal variance with pedigree 0.042, pedigree (1,1,5,5,1)
- Hydrogen fluoride [air, urban air close to ground]: 3e-6 kg; lognormal variance with pedigree 0.042, pedigree (1,1,5,5,1)
- Hydrogen sulfide [air, urban air close to ground]: 5e-7 kg; lognormal variance with pedigree 0.042, pedigree (1,1,5,5,1)
- Lead II [air, urban air close to ground]: 5e-7 kg; lognormal variance with pedigree 0.042, pedigree (1,1,5,5,1)
- Mercury II [air, urban air close to ground]: 5e-7 kg; lognormal variance with pedigree 0.042, pedigree (1,1,5,5,1)
- Methane, fossil [air, urban air close to ground]: 0.0091 kg; lognormal variance with pedigree 0.042, pedigree (1,1,5,5,1)
- NMVOC, non-methane volatile organic compounds [air, urban air close to ground]: 0.000969 kg; lognormal variance with pedigree 0.042, pedigree (1,1,5,5,1)
- Nitrogen oxides [air, urban air close to ground]: 0.0074 kg; lognormal variance with pedigree 0.042, pedigree (1,1,5,5,1)
- Particulate Matter, < 2.5 um [air, urban air close to ground]: 0.000525 kg; lognormal variance with pedigree 0.042, pedigree (1,1,5,5,1)
- Particulate Matter, > 10 um [air, urban air close to ground]: 0.000672 kg; lognormal variance with pedigree 0.042, pedigree (1,1,5,5,1)
- Particulate Matter, > 2.5 um and < 10um [air, urban air close to ground]: 0.000903 kg; lognormal variance with pedigree 0.042, pedigree (1,1,5,5,1)
- Sulfate [air, urban air close to ground]: 4.9e-7 kg; lognormal variance with pedigree 0.042, pedigree (1,1,5,5,1)
- Sulfur dioxide [air, urban air close to ground]: 0.007 kg; lognormal variance with pedigree 0.042, pedigree (1,1,5,5,1)
- Vinyl chloride [air, urban air close to ground]: 5e-7 kg; lognormal variance with pedigree 0.042, pedigree (1,1,5,5,1)
- Water [air, unspecified]: 0.056157 m3; name water_to_air_unspecified; lognormal variance with pedigree 0.0827, pedigree (2,2,5,5,1)
  Calculated value based on literature values and expert opinion. See comments in the parametres' comment field.
  property fraction, origin: fresh water 0.00657707; name fraction_origin_fresh_water
  property fraction, origin: salt water 2.70136e-6; name fraction_origin_salt_water
  property fraction, origin: unspecified 0.99342; name fraction_origin_unspecified
- Acidity, unspecified [water, surface water]: 1.6e-5 kg; lognormal variance with pedigree 0.042, pedigree (1,1,5,5,1)
- Aluminium III [water, surface water]: 5e-7 kg; lognormal variance with pedigree 0.042, pedigree (1,1,5,5,1)
- Ammonium [water, surface water]: 5e-7 kg; lognormal variance with pedigree 0.042, pedigree (1,1,5,5,1)
- BOD5, Biological Oxygen Demand [water, surface water]: 1.1e-5 kg; lognormal variance with pedigree 0.042, pedigree (1,1,5,5,1)
- COD, Chemical Oxygen Demand [water, surface water]: 5.3e-5 kg; lognormal variance with pedigree 0.042, pedigree (1,1,5,5,1)
- Calcium II [water, surface water]: 0.0029 kg; lognormal variance with pedigree 0.042, pedigree (1,1,5,5,1)
- Carbonate [water, surface water]: 5e-7 kg; lognormal variance with pedigree 0.042, pedigree (1,1,5,5,1)
- Chloride [water, surface water]: 0.063 kg; lognormal variance with pedigree 0.042, pedigree (1,1,5,5,1)
- Chlorinated solvents, unspecified [water, surface water]: 6e-6 kg; lognormal variance with pedigree 0.042, pedigree (1,1,5,5,1)
- Copper ion [water, surface water]: 5e-7 kg; lognormal variance with pedigree 0.042, pedigree (1,1,5,5,1)
- Cyanide [water, surface water]: 5e-7 kg; lognormal variance with pedigree 0.042, pedigree (1,1,5,5,1)
- DOC, Dissolved Organic Carbon [water, surface water]: 4e-6 kg; lognormal variance with pedigree 0.042, pedigree (1,1,5,5,1)
  Calculated as equal to TOC.
- Dissolved solids [water, surface water]: 0.000171 kg; lognormal variance with pedigree 0.042, pedigree (1,1,5,5,1)
- Fluoride [water, surface water]: 5e-7 kg; lognormal variance with pedigree 0.042, pedigree (1,1,5,5,1)
- Hydrocarbons, unspecified [water, surface water]: 1.2e-5 kg; lognormal variance with pedigree 0.042, pedigree (1,1,5,5,1)
- Iron ion [water, surface water]: 3e-6 kg; lognormal variance with pedigree 0.042, pedigree (1,1,5,5,1)
- Magnesium [water, surface water]: 2e-6 kg; lognormal variance with pedigree 0.042, pedigree (1,1,5,5,1)
- Mercury II [water, surface water]: 5e-7 kg; lognormal variance with pedigree 0.042, pedigree (1,1,5,5,1)
- Nickel II [water, surface water]: 5e-7 kg; lognormal variance with pedigree 0.042, pedigree (1,1,5,5,1)
- Nitrate [water, surface water]: 5e-7 kg; lognormal variance with pedigree 0.042, pedigree (1,1,5,5,1)
- Nitrogen [water, surface water]: 5e-7 kg; lognormal variance with pedigree 0.042, pedigree (1,1,5,5,1)
- Oils, unspecified [water, surface water]: 1e-6 kg; lognormal variance with pedigree 0.042, pedigree (1,1,5,5,1)
- Phenol [water, surface water]: 3e-6 kg; lognormal variance with pedigree 0.042, pedigree (1,1,5,5,1)
- Phosphorus [water, surface water]: 2.2e-7 kg; lognormal variance with pedigree 0.042, pedigree (1,1,5,5,1)
- Potassium I [water, surface water]: 5e-7 kg; lognormal variance with pedigree 0.042, pedigree (1,1,5,5,1)
- Sodium I [water, surface water]: 0.036 kg; lognormal variance with pedigree 0.042, pedigree (1,1,5,5,1)
- Sulfate [water, surface water]: 0.0019 kg; lognormal variance with pedigree 0.042, pedigree (1,1,5,5,1)
- Sulfide [water, surface water]: 5e-6 kg; lognormal variance with pedigree 0.042, pedigree (1,1,5,5,1)
- Suspended solids, unspecified [water, surface water]: 0.0015 kg; lognormal variance with pedigree 0.042, pedigree (1,1,5,5,1)
- TOC, Total Organic Carbon [water, surface water]: 4e-6 kg; lognormal variance with pedigree 0.042, pedigree (1,1,5,5,1)
- Water [water, unspecified]: 0.0931454 m3; name water_to_water_unspecified; lognormal variance with pedigree 0.0827, pedigree (2,2,5,5,1)
  (same comment as for Water)
  property carbon content, fossil 0; name C_content_fossil
  property carbon content, non-fossil 0; name C_content_non_fossil
  property dry mass 0 kg; name DM
  property fraction, origin: fresh water 0.0153776; name fraction_origin_fresh_water_Ww
  property fraction, origin: salt water 6.31593e-6; name fraction_origin_salt_water_Ww
  property fraction, origin: unspecified 0.984616; name fraction_origin_unspecified_Ww
  property water in wet mass 1000 kg; name WWM
  property wet mass 1000 kg; name WM
- Zinc II [water, surface water]: 5e-7 kg; lognormal variance with pedigree 0.042, pedigree (1,1,5,5,1)

## Sampling procedure
literature values based on company survey

## Extrapolations
no extrapolation This dataset has been copied from an original dataset covering the geography RER. The uncertainty has been adjusted accordingly.

## Review by Mischa Classen 2010-04-06
passed.
