# weed control, by brush cutter, pasture

Dataset: EcoSpold 2, unit process
Geography: BR
Time period: 2012-01-01 to 2023-12-31
Technology level: current
Classification: ISIC rev.4 ecoinvent: 0162:Support activities for animal production
Classification: EcoSpold01Categories: agricultural means of production/work processes
Synonyms: mowing
Scenario: Business-as-Usual
System model: Allocation, cut-off by classification
Generated by: Marília I. S. Folegatti Matsuura
Published in: Folegatti-Matsuura M. 2018
Database: ecoinvent
isCopyrightProtected: true
accessRestrictedTo: 1

## General comment
This dataset represents an example of a typical mechanical weed control, by brush cutter. The functional unit (FU) is one ha. The operation time is 0.3 h/FU and the fuel consumption is 17.0 liters per hour.
This is a common operation in pasture cultivation in Brazil.

## Included activities start
From agricultural field foreseen to be processed.

## Included activities end
The dataset includes the diesel fuel consumption and the amount of agricultural machinery and of the shed, which has to be attributed to the mechanical weed control. Also taken into consideration is the amount of emissions to the air from combustion and the emission to the soil from tyre abrasion during the work process. The dataset doesn't include the dust other than from combustion and noise. This activity ends with weed control, transfer back to the shed and uncoupling of the implement from the tractor.

## Geography
The inventory is modelled for farming processes in Brazil.

## Technology
Current technology about weed control operation during pasture production.
This activity is performed with a tractor (power 80 hp; weight 3740 kg) and a brush cutter (weight 800 kg). Life spam of the tractor is considered as 6000 hours and of the implement as 2500 hours. Machinery used, fuel consumption and operation efficiencies were based on expert's informations and unpublished data.

## Time period
Most of the data used to modelling this activity were collected in the last few years (2012-2016).

## Reference product
- weed control, by brush cutter, pasture: 1 ha; By-product classification allocatable product; CPC 86122: Support services to farm animal husbandry
  production volume 2.79998e7 ha; = 195998383/7
    Area of permanent meadows and pasture in Brazil, year 2014, according to the FAOSTAT data. See more in: http://www.fao.org/faostat/en/#data/RL.
  property price 3.02652 EUR2005
    Calculated based on inputs: The price of the product has been calculated as a sum of the values of the material and energy inputs for this product. This value is therefore a rough estimation. It may underestimate the real price since there are additional expenses when producing any product. These expences can include for example labour costs, treatment of waste materials and profit for the producer. Please consider carefully whether this level of data quality is acceptable for your application.
  properties: carbon allocation 0 kg, carbon content 0

## Inputs from technosphere
- agricultural machinery, unspecified: 0.096 kg; source Nemecek, T. 2007; lognormal variance with pedigree 0.004, pedigree (1,4,3,1,1)
  Related to the implement (rotary cutter with 2 blades; weight 800 kg) coupled to the tractor.
- diesel: 4.35 kg; name diesel_consumption; source Dias, F. R. T. 2017; lognormal variance with pedigree 0.004, pedigree (1,4,3,1,1)
  Amount for typical system from Dias et al. (2017).
  properties: carbon content, fossil 0.865, dry mass 1 kg, heating value, net 42.8 MJ, wet mass 1 kg
  note on carbon content, fossil: C-content of diesel is 86.5% (ecoinvent v2.2 report 6_IV, Tab 3.14)
- shed: 0.00267 m2; lognormal variance with pedigree 0.304, pedigree (1,4,3,1,1)
  Proxy, based on ecoinvent database.
- tractor, 4-wheel, agricultural: 0.187 kg; source Nemecek, T. 2007; lognormal variance with pedigree 0.004, pedigree (1,4,3,1,1)
  Proxy, based on ecoinvent database. Power 80 hp; weight 3740 kg.

## Emissions to nature
All rows: source Nemecek, T. 2007
- Ammonia [air, non-urban air or from high stacks]: 8.7e-5 kg; = 2,00E-05* diesel_consumption; lognormal variance with pedigree 0.0601, pedigree (1,2,3,1,3)
  Emissions from diesel combustion were calculated based on the emissions factor described in Nemecek and Kagi (2007).
- Benzene [air, non-urban air or from high stacks]: 3.1755e-5 kg; = 7,30E-06* diesel_consumption; lognormal variance with pedigree 0.0601, pedigree (1,2,3,1,3)
  (same comment as for Ammonia)
- Benzo(a)pyrene [air, non-urban air or from high stacks]: 1.305e-7 kg; = 3,00E-08* diesel_consumption; lognormal variance with pedigree 0.6601, pedigree (1,2,3,1,3)
  (same comment as for Ammonia)
- Cadmium II [air, non-urban air or from high stacks]: 4.35e-8 kg; = 1,00E-08* diesel_consumption; lognormal variance with pedigree 0.6601, pedigree (1,2,3,1,3)
  (same comment as for Ammonia)
- Carbon dioxide, fossil [air, non-urban air or from high stacks]: 13.572 kg; = 3,12E+00* diesel_consumption; lognormal variance with pedigree 0.0201, pedigree (1,2,3,1,3)
  (same comment as for Ammonia)
- Carbon monoxide, fossil [air, non-urban air or from high stacks]: 0.0056985 kg; = 1,31E-03* diesel_consumption; lognormal variance with pedigree 0.654, pedigree (1,4,3,1,1)
  (same comment as for Ammonia)
- Chromium III [air, non-urban air or from high stacks]: 2.175e-7 kg; = 5,00E-08* diesel_consumption; lognormal variance with pedigree 0.6601, pedigree (1,2,3,1,3)
  (same comment as for Ammonia)
- Copper ion [air, non-urban air or from high stacks]: 7.395e-6 kg; = 1,70E-06* diesel_consumption; lognormal variance with pedigree 0.6601, pedigree (1,2,3,1,3)
  (same comment as for Ammonia)
- Dinitrogen monoxide [air, non-urban air or from high stacks]: 0.000522 kg; = 1,20E-04* diesel_consumption; lognormal variance with pedigree 0.0601, pedigree (1,2,3,1,3)
  (same comment as for Ammonia)
- Methane, fossil [air, non-urban air or from high stacks]: 0.00056115 kg; = 1,29E-04* diesel_consumption; lognormal variance with pedigree 0.0601, pedigree (1,2,3,1,3)
  (same comment as for Ammonia)
- NMVOC, non-methane volatile organic compounds [air, non-urban air or from high stacks]: 0.0036018 kg; = 8,28E-04* diesel_consumption; lognormal variance with pedigree 0.044, pedigree (1,4,3,1,1)
  (same comment as for Ammonia)
- Nickel II [air, non-urban air or from high stacks]: 3.045e-7 kg; = 7,00E-08* diesel_consumption; lognormal variance with pedigree 0.6601, pedigree (1,2,3,1,3)
  (same comment as for Ammonia)
- Nitrogen oxides [air, non-urban air or from high stacks]: 0.05568 kg; = 1,28E-02* diesel_consumption; lognormal variance with pedigree 0.044, pedigree (1,4,3,1,1)
  (same comment as for Ammonia)
- PAH, polycyclic aromatic hydrocarbons [air, non-urban air or from high stacks]: 1.43115e-5 kg; = 3,29E-06* diesel_consumption; lognormal variance with pedigree 0.3201, pedigree (1,2,3,1,3)
  (same comment as for Ammonia)
- Particulate Matter, < 2.5 um [air, non-urban air or from high stacks]: 0.0343215 kg; = 7,89E-03* diesel_consumption; lognormal variance with pedigree 0.3201, pedigree (1,2,3,1,3)
  (same comment as for Ammonia)
- Selenium IV [air, non-urban air or from high stacks]: 4.35e-8 kg; = 1,00E-08* diesel_consumption; lognormal variance with pedigree 0.0601, pedigree (1,2,3,1,3)
  (same comment as for Ammonia)
- Sulfur dioxide [air, non-urban air or from high stacks]: 0.0043935 kg; = 1,01E-03* diesel_consumption; lognormal variance with pedigree 0.0201, pedigree (1,2,3,1,3)
  (same comment as for Ammonia)
- Zinc II [air, non-urban air or from high stacks]: 4.35e-6 kg; = 1,00E-06* diesel_consumption; lognormal variance with pedigree 0.6601, pedigree (1,2,3,1,3)
  (same comment as for Ammonia)
- Cadmium II [soil, agricultural]: 4.15e-6 kg; lognormal variance with pedigree 0.044, pedigree (1,4,3,1,1)
  Emissions of heavy metals from tyre abrasion were calculated based on Nemecek and Kagi (2007).
- Lead II [soil, agricultural]: 1.8e-5 kg; lognormal variance with pedigree 0.044, pedigree (1,4,3,1,1)
  (same comment as for Cadmium II)
- Zinc II [soil, agricultural]: 0.000111 kg; lognormal variance with pedigree 0.044, pedigree (1,4,3,1,1)
  (same comment as for Cadmium II)

## Sampling procedure
The main source of data for the inputs are projects conducted by Embrapa Pantanal (CPAP) and Embrapa Gado de Corte (CNPGC). Data are also provided by relevant experts related to agricultural sector in Brazil.
Emissions from burning of fossil fuels are estimated according to Nemecek and Kagi (2007).

## Extrapolations
Values given in the reference are representative for the chosen work processes. Processes are typical procedures for Brazil around the year 2016, they are not statistical average processes.

## Review by Jens Lansche 2017-12-14
Emissions calculated according to Nemecek and Kägi, 2007. All review comments considered.
