# asparagus seedling production, for planting

Dataset: EcoSpold 2, unit process
Geography: RoW
Time period: 2009-01-01 to 2023-12-31
Technology level: current
Classification: ISIC rev.4 ecoinvent: 0130:Plant propagation
Tags: WFLDB
Scenario: Business-as-Usual
System model: Allocation, cut-off by classification
Generated by: [System]
Database: ecoinvent
isCopyrightProtected: true
accessRestrictedTo: 1

## General comment
This global dataset is a copy of the regional FR dataset, except for the following modifications.
The production volume represents the global annual production.
The geographicalCorrelation score of every pedigree matrix of was changed to '5'.
The comments below were part of the FR regional dataset.
This dataset represents the production of 1 asparagus seedling (crown) raised in a nursery during one year. From an asparagus nursery of 1 ha, seedlings for 10 ha productive asparagus fields can be obtained, i.e. a total of 250'000 seedlings are obtained from 1 ha nursery.
PEF-Quality: data quality rating (DQR) =1.17 (i.e. excellent quality). This dataset refers to an average situation; for specific situations exchanges might differ substantially due to site specific parameters

## Included activities start
The activity starts with soil cultivation of the field where after an establishing phase of two years seelings will be harvested for 7 years.

## Included activities end
The inventory includes all activites of an average year in the productive phase of an asparagus field, i.e. soil cultivation, pesticide application, fertilisation and harvesting (manually). Machine infrastructure including a shed for shelter and fuel use are also considered as well as transport on farm. Inputs of fertilisers, pesticides, irrigation water are included. Direct field emissions from crop production activities (e.g. fertiliser and pesticide use) and land use change are considered. Also regarded are the first two years of the non-productive phase, i.e.planting (manually), soil cultivation (plough), fertilisation (manure) and PE foil.
From a mint nursery of 1 ha, seedlings for 12.5 ha productive mint fields can be obtained, i.e. a total of 1'388'887.5 seedlings are obtained from 1 ha nursery. Transport from the nursery to the farm is not included.
The activity ends with harvesting asparagus seedlings (crowns).

## Reference product
- asparagus seedling, for planting: 1 unit; By-product classification allocatable product; CPC 01961: Live plants; bulbs, tubers and roots; cuttings and slips; mushroom spawn; HS2017 060210: Plants, live; unrooted cuttings and slips
  production volume 5.02113e9 unit
    Source: FAOSTAT. Average, 2009-2012. Calculation method: crop production volume [kg] / crop productivity [kg/ha] * planting density [units/ha] = units
  property carbon content, non-fossil 0.439481
    calculation: C-content of components according to ecoinvent report No. 15a. Source of composition: https://ndb.nal.usda.gov/ndb/search/. Unspecific seedling used as proxy.
  property price 0.00231498 EUR2005
    Calculated based on inputs: The price of the product has been calculated as a sum of the values of the material and energy inputs for this product. This value is therefore a rough estimation. It may underestimate the real price since there are additional expenses when producing any product. These expences can include for example labour costs, treatment of waste materials and profit for the producer. Please consider carefully whether this level of data quality is acceptable for your application.
  properties: carbon allocation 0.254036 kg, carbon content 0.439481, carbon content, fossil 0, dry mass 0.578035 kg, water content 0.73, water in wet mass 0.421965 kg, wet mass 1 kg

## Inputs from technosphere
- [thio]carbamate-compound: 1.13518e-6 kg; source Roy G.  2015; lognormal variance with pedigree 0.0158498, pedigree (2,2,4,5,1)
  Literature value or expert estimation (Personal written communication, Gregory Roy, Ctifl, 2015).
  properties: carbon content, fossil 0.626349, dry mass 1 kg, wet mass 1 kg
- acetamide-anillide-compound, unspecified: 4.52379e-6 kg; source Roy G.  2015; lognormal variance with pedigree 0.0158498, pedigree (2,2,4,5,1)
  (same comment as for [thio]carbamate-compound)
  properties: carbon content, fossil 0.659175, dry mass 1 kg, wet mass 1 kg
- ammonium nitrate: 0.000110364, 0.000374656, 0.00014359 kg (3 suppliers, which the file names only by identifier); sum of these 0.00062861 kg; source Marc Lambert 2015; lognormal variance with pedigree 0.126177, pedigree (2,1,4,5,1)
  The exchange has been updated from 'ammonium nitrate, as N' into 'ammonium nitrate' and therefore its amount has been scaled (multiplied) from 0.0002 kg by 2.8573 kg of 'ammonium nitrate' per kg of 'ammonium nitrate, as N'. Original comment of the exchange is: Calculated based on literature values or expert estimation: The total amount of nutrient (Personal written communication, Gregory Roy, Ctifl, 2015) multiplied by the share of fertiliser type (Personal written communication, Marc Lambert, Yara, 2015). See supporting documentation 'WFLDB-Documentation.pdf' chapter 'Fertiliser application' for L3 and L4 data (https://ecoquery.ecoinvent.org/File/Reports).
  Corresponds to 55.0 kg/ha
  properties: dry mass 1 kg, wet mass 1 kg
- application of plant protection product, by field sprayer: 4.8e-5 ha; source Roy G.  2015; lognormal variance with pedigree 0.126664, pedigree (2,2,4,5,1)
  (same comment as for [thio]carbamate-compound)
- cyclic N-compound: 9.33138e-7 kg; source Roy G.  2015; lognormal variance with pedigree 0.0158498, pedigree (2,2,4,5,1)
  (same comment as for [thio]carbamate-compound)
  properties: carbon content, fossil 0.641962, dry mass 1 kg, wet mass 1 kg
- dinitroaniline-compound: 2.7651e-6 kg; source Roy G.  2015; lognormal variance with pedigree 0.0158498, pedigree (2,2,4,5,1)
  (same comment as for [thio]carbamate-compound)
  properties: carbon content, fossil 0.55516, dry mass 1 kg, wet mass 1 kg
- diphenylether-compound: 5.95633e-7 kg; source Roy G.  2015; lognormal variance with pedigree 0.0158498, pedigree (2,2,4,5,1)
  (same comment as for [thio]carbamate-compound)
  properties: carbon content, fossil 0.560061, dry mass 1 kg, wet mass 1 kg
- dithiocarbamate-compound: 1.58841e-6 kg; source Roy G.  2015; lognormal variance with pedigree 0.0158498, pedigree (2,2,4,5,1)
  (same comment as for [thio]carbamate-compound)
  properties: carbon content, fossil 0.179339, dry mass 1 kg, wet mass 1 kg
- fertilising, by broadcaster: 1.2e-5 ha; source Roy G.  2015; lognormal variance with pedigree 0.126177, pedigree (2,1,4,5,1)
  (same comment as for [thio]carbamate-compound)
- horticultural fleece: 0.0057144 m2; source Blanke M. 2012; lognormal variance with pedigree 0.126177, pedigree (2,1,4,5,1)
  Literature value or expert estimation (Blanke et al. 2012).
  properties: carbon content, fossil 0.85714, dry mass 1 kg, wet mass 1 kg
  note on carbon content, fossil: Polypropylene is formed by the polymerisation of propylene, C3H6
- inorganic nitrogen fertiliser, as N: 7.37104e-9, 2.02429e-7, 1.35319e-7, 3.59751e-8, 1.72966e-6, 2.05179e-7, 1.33779e-7, 2.60737e-8, 2.20328e-6, 1.12766e-7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 kg (63 suppliers, which the file names only by identifier); sum of these 0.00022 kg; source Marc Lambert 2015; lognormal variance with pedigree 0.126177, pedigree (2,1,4,5,1)
  Calculated based on literature values or expert estimation: The total amount of nutrient (Personal written communication, Gregory Roy, Ctifl, 2016) multiplied by the share of fertiliser type (Personal written communication, Marc Lambert, Yara, 2015). See supporting documentation 'WFLDB-Documentation.pdf' chapter 'Fertiliser application' for L3 and L4 data (https://ecoquery.ecoinvent.org/File/Reports).
  Corresponds to 55.0 kg/ha
  properties: dry mass 1 kg, wet mass 1 kg
- inorganic phosphorus fertiliser, as P2O5: 6.29943e-8, 1.71097e-8, 4.65708e-8, 1.13615e-7, 1.4176e-6, 3.14656e-6, 4.31961e-7, 5.28702e-8, 6.58515e-7, 2.92473e-8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 kg (63 suppliers, which the file names only by identifier); sum of these 0.0002 kg; source Marc Lambert 2015; lognormal variance with pedigree 0.126177, pedigree (2,1,4,5,1)
  Calculated based on literature values or expert estimation: The total amount of nutrient (Personal written communication, Gregory Roy, Ctifl, 2017) multiplied by the share of fertiliser type (Personal written communication, Marc Lambert, Yara, 2015). See supporting documentation 'WFLDB-Documentation.pdf' chapter 'Fertiliser application' for L3 and L4 data (https://ecoquery.ecoinvent.org/File/Reports).
  Corresponds to 25.0 kg/ha
  properties: dry mass 1 kg, wet mass 1 kg
- irrigation: 8.79047e-7, 0.00206148, 1.75795e-5, 0.00107275, 1.35434e-5, 3.63126e-5, 4.99146e-5, 0.00386978, 7.92231e-6, 2.03751e-7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 m3 (16 suppliers, which the file names only by identifier); sum of these 0.008 m3; source Roy G.  2015; lognormal variance with pedigree 0.126177, pedigree (2,1,4,5,1)
  Calculated value: The total amount of water used for irrigation (Personal written communication, Gregory Roy, Ctifl, 2015) multiplied by the country-share of irrigation technique (Personal written communication, Gregory Roy, Ctifl, 2015). See supporting documentation 'WFLDB-Documentation.pdf' chapter 'Water use for irrigation' (https://ecoquery.ecoinvent.org/File/Reports). Total amount of irrigation: 4000 m3/ha*year. Only 50% of the fields are irrigated, leading to 2000 m3/ha*year on average at the country-level.
  properties: dry mass 0.11 kg, water content 9089.91, wet mass 1000 kg
- liquid manure spreading, by vacuum tanker: 7.784e-7 m3; source Roy G.  2015; lognormal variance with pedigree 0.126177, pedigree (2,1,4,5,1)
  This amount corresponds to the input of liquid manure. Personal written communication, Gregory Roy, Ctifl, 2015
- manure, liquid, cattle: 0.000669415 kg; source Marc Lambert 2015; lognormal variance with pedigree 0.126177, pedigree (2,1,4,5,1)
  Calculated based on literature values: The total amount of manure (Personal written communication, Marc Lambert, Yara, 2015) multiplied by the country-share of manure per animal category (FAOSTAT 2015). See supporting documentation 'WFLDB-Documentation.pdf' chapter 'Fertiliser application' (https://ecoquery.ecoinvent.org/File/Reports).
  Corresponds to 0.167 m3/ha
  properties: carbon content, non-fossil 0.68, dry mass 0.075 kg, water content 12.333, wet mass 1 kg
- manure, liquid, swine: 0.000100462 kg; source Marc Lambert 2015; lognormal variance with pedigree 0.126177, pedigree (2,1,4,5,1)
  Calculated based on literature values: The total amount of manure (Personal written communication, Marc Lambert, Yara, 2015) multiplied by the country-share of manure per animal category (FAOSTAT 2015). See supporting documentation 'WFLDB-Documentation.pdf' chapter 'Fertiliser application' (https://ecoquery.ecoinvent.org/File/Reports).
  Corresponds to 0.0251 m3/ha
  properties: carbon content, non-fossil 0.64, dry mass 0.05 kg, water content 19, wet mass 1 kg
- manure, solid, cattle: 0.000521995 kg; source Marc Lambert 2015; lognormal variance with pedigree 0.126177, pedigree (2,1,4,5,1)
  Calculated based on literature values: The total amount of manure (Personal written communication, Marc Lambert, Yara, 2015) multiplied by the country-share of manure per animal category (FAOSTAT 2015). See supporting documentation 'WFLDB-Documentation.pdf' chapter 'Fertiliser application' (https://ecoquery.ecoinvent.org/File/Reports).
  Corresponds to 130.0 kg/ha
  properties: carbon content, non-fossil 0.441, dry mass 0.22 kg, water content 3.5454, wet mass 1 kg
- nitrile-compound: 1.85315e-6 kg; source Roy G.  2015; lognormal variance with pedigree 0.0158498, pedigree (2,2,4,5,1)
  (same comment as for [thio]carbamate-compound)
  properties: carbon content, fossil 0.344995, dry mass 1 kg, wet mass 1 kg
- organophosphorus-compound, unspecified: 8.47152e-6 kg; source Roy G.  2015; lognormal variance with pedigree 0.0158498, pedigree (2,2,4,5,1)
  (same comment as for [thio]carbamate-compound)
  properties: carbon content, fossil 0.260898, dry mass 1 kg, wet mass 1 kg
- packaging, for fertilisers: 0.00248 kg; lognormal variance with pedigree 0.0592, pedigree (4,3,4,5,4)
  Total amount of active substance/s of fertilisers needed for the production of 'asparagus seedling, for planting' is calculated to be circa 1.24E-03 kg. Fertiliser/s used in this dataset is/are: 'ammonium nitrate, as N', 'nitrogen fertiliser, as N', 'phosphate fertiliser, as P2O5', 'potassium chloride, as K2O'. The total amount of active substance/s is doubled in order to account for the packaging of the dilluted product of fertiliser/s that is/are applied. Therefore, 2.48E-03 kg of packaging for fertilisers is justified with this exchange.
  properties: carbon content, fossil 0.825301, dry mass 1 kg, heating value, net 25.01 MJ, price 0.0642 EUR2005, wet mass 1 kg
  note on carbon content, fossil: Considering a chemical formula (C2H4)n for polyethylene, carbon content-fossil is calculated to be 0.856286 kg of Carbon per kg of dry mass.
- packaging, for pesticides: 4.52753e-5 kg; lognormal variance with pedigree 0.0592, pedigree (4,3,4,5,4)
  Total amount of active substance/s of pesticides needed for the production of asparagus seedling, for planting is calculated to be circa 2.26E-05 kg. Pesticide/s used in this dataset is/are: '[thio]carbamate-compound', 'acetamide-anillide-compound, unspecified', 'cyclic N-compound', 'dinitroaniline-compound', 'diphenylether-compound', 'dithiocarbamate-compound', 'nitrile-compound', 'organophosphorus-compound, unspecified', 'pyrethroid-compound', 'triazine-compound, unspecified'. The total amount of active substance/s is doubled in order to account for the packaging of the dilluted product of pesticide/s that is/are applied. Therefore, 4.53E-05 kg of packaging for pesticides is justified with this exchange.
  properties: carbon content, fossil 0.85714, dry mass 1 kg, heating value, net 25.97 MJ, price 0.0642 EUR2005, wet mass 1 kg
- potassium chloride: 0.000949738 kg; source Marc Lambert 2015; lognormal variance with pedigree 0.126177, pedigree (2,1,4,5,1)
  The exchange has been updated from 'potassium chloride, as K2O' into 'potassium chloride' and therefore its amount has been scaled (multiplied) from 0.0006 kg by 1.5829 kg of 'potassium chloride' per kg of 'potassium chloride, as K2O'. Original comment of the exchange is: Calculated based on literature values or expert estimation: The total amount of nutrient (Personal written communication, Gregory Roy, Ctifl, 2019) multiplied by the share of fertiliser type (Personal written communication, Marc Lambert, Yara, 2015). See supporting documentation 'WFLDB-Documentation.pdf' chapter 'Fertiliser application' for L3 and L4 data (https://ecoquery.ecoinvent.org/File/Reports).
  Corresponds to 150.0 kg/ha
  properties: dry mass 1 kg, wet mass 1 kg
- poultry manure, dried: 9.53246e-5 kg; source Marc Lambert 2015; lognormal variance with pedigree 0.126177, pedigree (2,1,4,5,1)
  Calculated based on literature values: The total amount of manure (Personal written communication, Marc Lambert, Yara, 2015) multiplied by the country-share of manure per animal category (FAOSTAT 2015). See supporting documentation 'WFLDB-Documentation.pdf' chapter 'Fertiliser application' (https://ecoquery.ecoinvent.org/File/Reports).
  properties: cadmium content 2.92e-7, carbon content, non-fossil 0.33389, copper content 4.38e-5, dry mass 0.865 kg, lead content 2.92e-6, mercury content 2e-7, nickel content 4e-5, nitrogen content 0.532, phosphorus content 0.0167, potassium content 0.024, water content 0.156069, wet mass 1 kg, zinc content 0.000349
- poultry manure, fresh: 4.2614e-6 kg; source Marc Lambert 2015; lognormal variance with pedigree 0.126177, pedigree (2,1,4,5,1)
  Calculated based on literature values: The total amount of manure (Personal written communication, Marc Lambert, Yara, 2015) multiplied by the country-share of manure per animal category (FAOSTAT 2015). See supporting documentation 'WFLDB-Documentation.pdf' chapter 'Fertiliser application' (https://ecoquery.ecoinvent.org/File/Reports).
  Corresponds to 0.00213 m3/ha
  properties: carbon content, non-fossil 0.33389, dry mass 0.38 kg, water content 1.63158, wet mass 1 kg
- pyrethroid-compound: 1.69007e-8 kg; source Roy G.  2015; lognormal variance with pedigree 0.0158498, pedigree (2,2,4,5,1)
  (same comment as for [thio]carbamate-compound)
  properties: carbon content, fossil 0.623, dry mass 1 kg, wet mass 1 kg
- solid manure loading and spreading, by hydraulic loader and spreader: 0.00061732 kg; source Roy G.  2015; lognormal variance with pedigree 0.126177, pedigree (2,1,4,5,1)
  This amount corresponds the input of solid manure. Personal written communication, Gregory Roy, Ctifl, 2015
- tillage, harrowing, by spring tine harrow: 4e-6 ha; lognormal variance with pedigree 0.126177, pedigree (2,1,4,5,1)
  Estimation based on a modified MEXALCA-approach (Roches et al. 2010; Nemecek et al. 2012): See supporting documentation 'WFLDB-Documentation.pdf' chapter 'Machinery processes' for L2 data (https://ecoquery.ecoinvent.org/File/Reports).
- tillage, ploughing: 5.7144e-7 ha; source Blanke M. 2012; lognormal variance with pedigree 0.126177, pedigree (2,1,4,5,1)
  Literature value or expert estimation (Blanke et al. 2012).
- transport, tractor and trailer, agricultural: 3.31695e-5, 1.34883e-7 metric ton*km (2 suppliers, which the file names only by identifier); sum of these 3.33044e-5 metric ton*km; lognormal variance with pedigree 0.164439, pedigree (4,1,4,5,1)
  On-farm transport: Yield (in tonnes) multiplied by the average distance from field to farm. The distance was assumed to be 2 km (proxy).
- triazine-compound: 7.54812e-7 kg; source Roy G.  2015; lognormal variance with pedigree 0.0158498, pedigree (2,2,4,5,1)
  (same comment as for [thio]carbamate-compound)
  properties: carbon content, fossil 0.475616, dry mass 1 kg, wet mass 1 kg

## Inputs from nature
- Carbon dioxide, in air [natural resource, in air]: 0.0023202 kg; lognormal variance with pedigree 0.0158498, pedigree (2,2,4,5,1)
  CO2 uptake by biomass
- Energy, gross calorific value, in biomass [natural resource, biotic]: 0.0245788 MJ; lognormal variance with pedigree 0.0158498, pedigree (2,2,4,5,1)
  Gross energy content is related to MJ/kg dry matter of product. Source: ecoinvent data.
- Occupation, annual crop [natural resource, land]: 0.040108 m2*year; lognormal variance with pedigree 0.0220616, pedigree (2,1,4,5,1)
  Related to the duration from harvest date of previous crop to harvest date of main crop.
- Transformation, from arable land, unspecified use [natural resource, land]: 0.04 m2; lognormal variance with pedigree 0.0462144, pedigree (2,1,4,5,1)
  10000 m2 divided by the life time of the crop.
- Transformation, to arable land, unspecified use [natural resource, land]: 0.04 m2; lognormal variance with pedigree 0.0462144, pedigree (2,1,4,5,1)
  10000 m2 divided by the life time of the crop.

## Emissions to nature
- Ammonia [air, non-urban air or from high stacks]: 5.0128e-5 kg; source EEA 2013; lognormal variance with pedigree 0.0467216, pedigree (2,2,4,5,1)
  Calculated value - EMEP/EEA (2013). See 'WFLDB-Guidelines.pdf', available at https://ecoquery.ecoinvent.org/File/Reports.
- Dinitrogen monoxide [air, non-urban air or from high stacks]: 1.0255e-5 kg; source IPCC 2006; lognormal variance with pedigree 0.126664, pedigree (2,2,4,5,1)
  Calculated value - IPCC (2006). See 'WFLDB-Guidelines.pdf', available at https://ecoquery.ecoinvent.org/File/Reports.
- Nitrogen oxides [air, non-urban air or from high stacks]: 1.74928e-5 kg; source EEA 2013; lognormal variance with pedigree 0.126664, pedigree (2,2,4,5,1)
  Calculated value - EEA/EMEP (2013). See 'WFLDB-Guidelines.pdf', available at https://ecoquery.ecoinvent.org/File/Reports.
- Water [air, non-urban air or from high stacks]: 0.00487 m3; lognormal variance with pedigree 0.126177, pedigree (2,1,4,5,1)
  Calculated value - Emission calculated from water balance. See 'WFLDB-Guidelines.pdf', available at https://ecoquery.ecoinvent.org/File/Reports.
- Acetamiprid [soil, agricultural]: 3.2961e-7 kg; lognormal variance with pedigree 0.0467216, pedigree (2,2,4,5,1)
  Calculated value - 100% emission in soil. See 'WFLDB-Guidelines.pdf', available at https://ecoquery.ecoinvent.org/File/Reports.
- Azoxystrobin [soil, agricultural]: 1.80255e-6 kg; lognormal variance with pedigree 0.0467216, pedigree (2,2,4,5,1)
  (same comment as for Acetamiprid)
- Boscalid [soil, agricultural]: 4.40029e-6 kg; lognormal variance with pedigree 0.0467216, pedigree (2,2,4,5,1)
  (same comment as for Acetamiprid)
- Cadmium II [soil, agricultural]: 2.73391e-8 kg; source Freiermuth R.  2006
  Comment on mathematicalRelation:
  2.74744e-08 from Calculated value - Freiermuth (2006). See 'WFLDB-Guidelines.pdf', available at https://ecoquery.ecoinvent.org/File/Reports.
  -1.352675264e-10 from Crop, default, heavy metals uptake model
  Heavy metal uptake can be excluded by setting the parameter heavyMetalUptakeSwitch to zero.
- Chromium III [soil, agricultural]: 1.99622e-7 kg; source Freiermuth R.  2006
  Comment on mathematicalRelation:
  2.00348e-07 from Calculated value - Freiermuth (2006). See 'WFLDB-Guidelines.pdf', available at https://ecoquery.ecoinvent.org/File/Reports.
  -7.260272e-10 from Crop, default, heavy metals uptake model
  Heavy metal uptake can be excluded by setting the parameter heavyMetalUptakeSwitch to zero.
- Clomazone [soil, agricultural]: 6.30379e-8 kg; lognormal variance with pedigree 0.0467216, pedigree (2,2,4,5,1)
  (same comment as for Acetamiprid)
- Copper ion [soil, agricultural]: 6.21959e-8 kg; source Freiermuth R.  2006
  Comment on mathematicalRelation:
  7.1024e-08 from Calculated value - Freiermuth (2006). See 'WFLDB-Guidelines.pdf', available at https://ecoquery.ecoinvent.org/File/Reports.
  -8.828091104e-09 from Crop, default, heavy metals uptake model
  Heavy metal uptake can be excluded by setting the parameter heavyMetalUptakeSwitch to zero.
- Cycloxydim [soil, agricultural]: 6.18018e-7 kg; lognormal variance with pedigree 0.0467216, pedigree (2,2,4,5,1)
  (same comment as for Acetamiprid)
- Deltamethrin [soil, agricultural]: 1.02591e-8 kg; lognormal variance with pedigree 0.0467216, pedigree (2,2,4,5,1)
  (same comment as for Acetamiprid)
- Difenoconazole [soil, agricultural]: 5.15015e-7 kg; lognormal variance with pedigree 0.0467216, pedigree (2,2,4,5,1)
  (same comment as for Acetamiprid)
- Dimethoate [soil, agricultural]: 2.06006e-6 kg; lognormal variance with pedigree 0.0467216, pedigree (2,2,4,5,1)
  (same comment as for Acetamiprid)
- Fluazifop [soil, agricultural]: 5.79372e-7 kg; lognormal variance with pedigree 0.0467216, pedigree (2,2,4,5,1)
  (same comment as for Acetamiprid)
- Glufosinate [soil, agricultural]: 6.18018e-6 kg; lognormal variance with pedigree 0.0467216, pedigree (2,2,4,5,1)
  (same comment as for Acetamiprid)
- Lambda-cyhalothrin [soil, agricultural]: 6.18018e-9 kg; lognormal variance with pedigree 0.0467216, pedigree (2,2,4,5,1)
  (same comment as for Acetamiprid)
- Lead II [soil, agricultural]: 1.84908e-8 kg; source Freiermuth R.  2006
  Comment on mathematicalRelation:
  1.92112e-08 from Calculated value - Freiermuth (2006). See 'WFLDB-Guidelines.pdf', available at https://ecoquery.ecoinvent.org/File/Reports.
  -7.203921632e-10 from Crop, default, heavy metals uptake model
  Heavy metal uptake can be excluded by setting the parameter heavyMetalUptakeSwitch to zero.
- Mancozeb [soil, agricultural]: 1.54505e-6 kg; lognormal variance with pedigree 0.0467216, pedigree (2,2,4,5,1)
  (same comment as for Acetamiprid)
- Mercury II [soil, agricultural]: 2.85969e-10 kg; source Freiermuth R.  2006
  Comment on mathematicalRelation:
  -5.402708096e-11 from Crop, default, heavy metals uptake model
  Heavy metal uptake can be excluded by setting the parameter heavyMetalUptakeSwitch to zero.
- Metribuzin [soil, agricultural]: 7.34206e-7 kg; lognormal variance with pedigree 0.0467216, pedigree (2,2,4,5,1)
  (same comment as for Acetamiprid)
- Nickel II [soil, agricultural]: 4.17444e-8 kg; source Freiermuth R.  2006
  Comment on mathematicalRelation:
  4.3136e-08 from Calculated value - Freiermuth (2006). See 'WFLDB-Guidelines.pdf', available at https://ecoquery.ecoinvent.org/File/Reports.
  -1.391574336e-09 from Crop, default, heavy metals uptake model
  Heavy metal uptake can be excluded by setting the parameter heavyMetalUptakeSwitch to zero.
- Oryzalin [soil, agricultural]: 2.68962e-6 kg; lognormal variance with pedigree 0.0467216, pedigree (2,2,4,5,1)
  (same comment as for Acetamiprid)
- Pyraclostrobin [soil, agricultural]: 1.10419e-6 kg; lognormal variance with pedigree 0.0467216, pedigree (2,2,4,5,1)
  (same comment as for Acetamiprid)
- Zinc II [soil, agricultural]: 3.36316e-7 kg; source Freiermuth R.  2006
  Comment on mathematicalRelation:
  -4.265975968e-08 from Crop, default, heavy metals uptake model
  Heavy metal uptake can be excluded by setting the parameter heavyMetalUptakeSwitch to zero.
- Cadmium II [water, ground-]: 1.82244e-10 kg; source Freiermuth R.  2006; lognormal variance with pedigree 0.358938, pedigree (2,2,4,5,1)
  Calculated value - Freiermuth (2006). See 'WFLDB-Guidelines.pdf', available at https://ecoquery.ecoinvent.org/File/Reports.
- Cadmium II [water, surface water]: 2.2458e-10 kg; source Freiermuth R.  2006; lognormal variance with pedigree 0.358938, pedigree (2,2,4,5,1)
  (same comment as for Cadmium II)
- Chromium III [water, ground-]: 8.1112e-8 kg; source Freiermuth R.  2006; lognormal variance with pedigree 0.358938, pedigree (2,2,4,5,1)
  (same comment as for Cadmium II)
- Chromium III [water, surface water]: 2.07332e-8 kg; source Freiermuth R.  2006; lognormal variance with pedigree 0.358938, pedigree (2,2,4,5,1)
  (same comment as for Cadmium II)
- Copper ion [water, ground-]: 1.33128e-8 kg; source Freiermuth R.  2006; lognormal variance with pedigree 0.358938, pedigree (2,2,4,5,1)
  (same comment as for Cadmium II)
- Copper ion [water, surface water]: 2.90936e-8 kg; source Freiermuth R.  2006; lognormal variance with pedigree 0.358938, pedigree (2,2,4,5,1)
  (same comment as for Cadmium II)
- Lead II [water, ground-]: 5.9924e-10 kg; source Freiermuth R.  2006; lognormal variance with pedigree 0.358938, pedigree (2,2,4,5,1)
  (same comment as for Cadmium II)
- Lead II [water, surface water]: 4.9912e-9 kg; source Freiermuth R.  2006; lognormal variance with pedigree 0.358938, pedigree (2,2,4,5,1)
  (same comment as for Cadmium II)
- Mercury II [water, ground-]: 3.42912e-12 kg; source Freiermuth R.  2006; lognormal variance with pedigree 0.358938, pedigree (2,2,4,5,1)
  (same comment as for Cadmium II)
- Mercury II [water, surface water]: 4.0764e-11 kg; source Freiermuth R.  2006; lognormal variance with pedigree 0.358938, pedigree (2,2,4,5,1)
  (same comment as for Cadmium II)
- Nickel II [water, surface water]: 1.44644e-8 kg; source Freiermuth R.  2006; lognormal variance with pedigree 0.358938, pedigree (2,2,4,5,1)
  (same comment as for Cadmium II)
- Nitrate [water, ground-]: 0.000522655 kg; source Richner W. 2014; lognormal variance with pedigree 0.177866, pedigree (2,2,4,5,1)
- Phosphate [water, ground-]: 8.6064e-7 kg; source Prasuhn V.  2006; lognormal variance with pedigree 0.377166, pedigree (5,5,5,5,5)
- Phosphorus [water, surface water]: 5.5212e-7 kg; source Prasuhn V.  2006; lognormal variance with pedigree 0.177866, pedigree (2,2,4,5,1)
  Calculated value - Prasuhn (2006) and SQCB-Erosion. See 'WFLDB-Guidelines.pdf', available at https://ecoquery.ecoinvent.org/File/Reports.
- Water [water, ground-]: 0.00062596 m3; lognormal variance with pedigree 0.126177, pedigree (2,1,4,5,1)
  (same comment as for Water)
- Water [water, surface water]: 0.00250388 m3; lognormal variance with pedigree 0.126177, pedigree (2,1,4,5,1)
  (same comment as for Water)
- Zinc II [water, ground-]: 7.584e-8 kg; source Freiermuth R.  2006; lognormal variance with pedigree 0.358938, pedigree (2,2,4,5,1)
  (same comment as for Cadmium II)
- Zinc II [water, surface water]: 3.23328e-8 kg; source Freiermuth R.  2006; lognormal variance with pedigree 0.358938, pedigree (2,2,4,5,1)
  (same comment as for Cadmium II)

## Sampling procedure
Asparagus has a lifetime of 9 years and 7 years in the productive phase (2 years of establishment, non-productive phase) . The dataset regards an average year of the productive phase of the nursery including also the inventories of the two establishement years (non-productive phase). The nursery is irrigated with 4000 m3/ha is applied on 50% of the fields. This results in a total amount water of 2000 m3/ha.
Data collection and direct field emissions follow the WFLDB Methodological Guidelines for the Life Cycle Inventory of Agricultural Products in the latest version, available at: (Report section: https://v30.ecoquery.ecoinvent.org/File/Reports).
Input data sources were categorised from level 0 (L0) to level (L4) as follows: L0 = estimate, proxy; L1 = statistical data (e.g. FAOSTAT); L2 = L1 adapted to crop or country; L3 = literature data or approved L1 L2 by experts; medium detailing (i.e. kg of total N-fertiliser); L4 = L3 data of high detailing (i.e. portion N-fertiliser types).In this dataset data were obtained for yield: L3; Fertilisers: L4; Pesticides: L4; Machinery: L4; Irrigation: L3. Detailed information about the sources used for data sampling can be taken from WFLDB 3.0 - Documentation, available at: (Report section: https://v30.ecoquery.ecoinvent.org/File/Reports).

## Extrapolations
The amount of the exchanges are copy from a regional dataset.

## Review by Assumpció ANTON 2016-05-30
Be aware that the use of statistics in input calculations could provide some specific inputs not common for specific crops, this should be corrected if better information is available and better reflexed in DQR . Currently, I would dissent for some of good marks provided, being a revision of criteria applied advisable.
Pesticides will need to be amended periodically checking for update of pesticides' ban.
