# concrete production, 50MPa, with cement, Portland

Dataset: EcoSpold 2, unit process
Geography: North America without Quebec
Time period: 2006-01-01 to 2023-12-31
Technology level: current
Classification: ISIC rev.4 ecoinvent: 2395:Manufacture of articles of concrete, cement and plaster
Synonyms: ready mixed concrete; ready-mix concrete
Scenario: Business-as-Usual
System model: Allocation, cut-off by classification
Generated by: Geneviève Martineau
Published in: Marceau 2006
Database: ecoinvent
isCopyrightProtected: true
accessRestrictedTo: 1

## General comment
This dataset represents the production of North American 50 MPa ready-mix concrete. Density: 2"332 kg/m³. Ingredients (for 1 m³): Cement 344 kg, Water 155 kg, Gravel 950 kg, Sand 798 kg, Fly ash, Silica fume or Blast furnace slag 81.85 kg, Admixtures (air-entrainers, water reducing admixture and superplastisizers) 3,75 kg. 50 MPa concrete is intended for structurally reinforced specialty usage, exposed to chlorides and other severe environments, with or without freezing and thawing conditions, and with high durability performances expectations (e.g. work of art etc.) (following the Canadian CSA specs - http://www.rmcao.org/sites/default/files/CSA%20Quickspec%202012.pdf). Generic concrete mixes (cement, SCM, aggregate, water, admixtures) provided by the Technical Committee of Association Béton Québec (Canada) (Recipe compliant with Quebec standards for Work of art concrete, Ministère des transports du Québec - Ministry of Transport, Québec- Canada).The average water consumption (not including batch water) is 65 L/m³ of ready mixed concrete. The average amount of water disposed is 35 L/m³. Water not discarded is recycled back into the process or into other products, and therefore not accounted for in this dataset. Annual production volume of Ready-Mix concrete for North America estimated based on US production, and GDP ratio. Distribution by ready-mix strength class estimated as: - 20 MPa = 20% - 25 MPa = 40% - 30-32 MPa = 15% - 35 MPa = 24% - 50 MPa = 1% (coherent with distribution presented in http://www.ermco.eu/documents/ermco-documents/ermco_-statistics2008_091310.pdf (Table 3)
[This dataset is meant to replace the following datasets: - concrete production 50MPa, RNA only, GLO, 2006 - 2006]

## Included activities start
From reception of raw materials at the ready-mix plant gate.

## Included activities end
This activity ends before the delivery of concrete at the construction site. The dataset includes the whole manufacturing processes to produce ready-mixed concrete, internal processes (material handling and mixing) and infrastructure. The dataset does not include: - the transport of concrete in a mixing truck. The combustion of 5.74 litres of diesel should be used to take into account the average transportation of 1m³ of concrete.

## Geography
North American dataset extrapolated from a Quebec (Canada) concrete production. For some exchanges RER-modules have been used as proxy. Data quality indicators adjusted accordingly.

## Technology
Typical technology for average North American production. Data quality indicators adjusted accordingly.

## Parameters
- fraction: 0 dimensionless
- fraction of 50 MPa concrete to overall concrete production: 0.01 dimensionless; name fraction_50MPa_concrete; lognormal variance with pedigree 0.0014, pedigree (2,2,1,3,1)
  For Annual production volume purpose. Extrapolated value. In Quebec, Canada, 50MPa concrete represent 1% of the overall ready-mix concrete production. Source; Personal communication, ABQ (Association Béton Québec), October 2013.
- fraction, process water, to air: 0.15 dimensionless; name fraction_PW_to_air; lognormal variance with pedigree 0.0226, pedigree (4,4,3,5,3)
  Rough estimation to represent water evaporation of process water. Source: 2007, Kellenberger D et al. (ecoinvent "Concrete production, normal" dataset)
- fraction_01: 0.8 dimensionless; name fraction_ethylene_oxide; lognormal variance with pedigree 0.0427, pedigree (3,1,1,3,4)
  Literature value. Superplastisizer assumed to be 80% ehtlyne oxide. Extrapolated from 20 MPa mix admixtures. Source: Athena and morrison Hershfield (2012): Life Cycle Assessment of Precast Concrete Commerical Buildings Cradle-to-Grave
- fraction_02: 0.2 dimensionless; name fraction_acetic_acid; lognormal variance with pedigree 0.0427, pedigree (3,1,1,3,4)
  Literature value. Superplastisizer assumed to be 20% acetic acid. Extrapolated from 20 MPa mix admixtures. Source: Athena and morrison Hershfield (2012): Life Cycle Assessment of Precast Concrete Commerical Buildings Cradle-to-Grave
- north america production volume in cubic meter: 1.36778e8 m3; name PV_ready_mix_RNA; = 270E09/2350/0.84; lognormal variance with pedigree 0.0033, pedigree (3,2,1,1,2)
  Based on U.S. Ready-Mix concrete production in 2008 (270 Mt, assuming an average density of 2350 kg/m³), Literature value from: Sakai, K and Noguchi, T. (2012) The Sustainable Use of Concrete. CRC Press, 188 pages. (p.27).
- quebec production volume in cubic meter: 4.7e6 m3; name PV_ready_mix_Qc; lognormal variance with pedigree 0.0026, pedigree (3,1,1,1,1)
  Estimated value, from Association Béton Québec (2008). Source: http://www.betonabq.org/images/fichiers_documents/rapport%20annuel%202008.pdf
- superplastisizer: 2.25 kg; lognormal variance with pedigree 0.0036, pedigree (3,2,2,3,2)
  Extrapolated value. Estimation for Quebec Province (Canada) by Association Béton Québec Technical Committee.

## Reference product
- concrete, 50MPa: 1 m3; name ref; By-product classification allocatable product; CPC 37510: Non-refractory mortars and concretes; HS2017 6810: Cement, concrete or artificial stone; whether or not reinforced, articles thereof
  50 MPa concrete is intended for structurally reinforced specialty usage, exposed to chlorides and other severe environments, with or without freezing and thawing conditions, and with high durability performances expectations (e.g. work of art etc.) (following the Canadian CSA specs - http://www.rmcao.org/sites/default/files/CSA%20Quickspec%202012.pdf)
  production volume 1.36778e6 m3; name PV_ref; = fraction_50MPa_concrete* PV_ready_mix_RNA
    Considering North American production only, and a 5% proportion of ready-mix concrete of 50MPa strength class. See parameters and Activity Description for details.
  property carbon content, fossil 1e-51; name ref_C_content_fossil
    Estimated value to zero, based on components properties.
  property cement content 344 kg; name cement
    Extrapolated value. Estimation for Quebec Province by Association Béton Québec Technical Committee - nov 2013.Based on Ministère des transports du Québec (Ministry of Transport, Québec- Canada). Recipe compliant with Quebec standards for Work of art concrete.
  property dry mass 2173 kg; name ref_DM; = sand+gravel+fly_ash+cement
  property fly ash content 81 kg; name fly_ash
    (same comment as for concrete, 50MPa)
  property gravel content 950 kg; name gravel
    (same comment as for concrete, 50MPa)
  property price 185 EUR2005
    Estimated to be the same price as in case of concrete, normal (Data are not easily available. Therefore, an average price of products supplied by the activities in the same ISIC 3 code has been applied.This price is obtained as '_49 Concrete, asphalt and other mineral products, EU27 virgin, EU27' in the 'EU & DK Input Output Database' (available in SimaPro). The price is assumed to be valid for both RER2003, RER 2004, world 2003 and world 2004. Multiplied by density.).
  property sand content 798 kg; name sand
    (same comment as for concrete, 50MPa)
  property water content 0.07133; name ref_water_content; = ref_WWM/ref_DM
  property water in wet mass 155 kg; name ref_WWM; = batch_water
  property wet mass 2328 kg; name ref_WM; = ref_WWM+ref_DM
  properties: carbon allocation 2.173e-48 kg, carbon content 1e-51

## Inputs from technosphere
- acetic acid, without water, in 98% solution state: 0.45 kg; = 0.45*ref; lognormal variance with pedigree 0.04, pedigree (1,1,5,1,1)
  See parameters
  Uncertainty: C
  property carbon content, fossil 0.400016; name AA_C_content_fossil
  properties: dry mass 1 kg, heating value, net 14.6 MJ, wet mass 1 kg
  note on heating value, net: Based on literature, page 10, Althaus H.-J., Chudacoff M., Hischier R., Jungbluth N., Osses M. and Primas A. (2007) Life Cycle Inventories of Chemicals. Final report ecoinvent data v2.0 No. 8. EMPA, Swiss Centre for Life Cycle Inventories, Dübendorf, CH, Online-Version under: www.ecoinvent.org.
- alkylbenzene sulfonate, linear, petrochemical: 0.205 kg; = 0.205*ref; lognormal variance with pedigree 0.0828, pedigree (3,2,5,3,4)
  Extrapolated value. Air-entrainers. Estimated value for Quebec by Association Béton Québec Technical Committee- (Nov 2013) .
  properties: carbon content, fossil 0.407018, dry mass 1 kg, heating value, net 28.88 MJ, wet mass 1 kg
  note on carbon content, fossil: European LAS is a mixture of differ-ent homologues (C10-C13 alkyl chains) including all positional isomers with the exception of 1-alkyl substituted ones. The typical homologue distribution is 15%, 30%, 30% and 25% for C10, C11, C12 and C13 with an average alkyl chain of C11.6 and an average molecular weight of 342 as the sodium salt (ecoinvent v2.2 report 12)
- cement, Portland: 347.62 kg; = 347.620274914089*ref; lognormal variance with pedigree 0.04, pedigree (1,1,5,1,1)
  Including waste concrete. See Exchange Properties
  Uncertainty: C
  properties: dry mass 1 kg, wet mass 1 kg
- chemical, organic: 1.29 kg; = 1.29*ref; lognormal variance with pedigree 0.0433, pedigree (3,3,5,3,1)
  Extrapolated value. Water reducing admixture (usually based on lignosulphonate). Estimated value for Quebec concrete by Association Béton Québec Technical Committee- (Nov 2013)
  properties: carbon content, fossil 0.628, dry mass 1 kg, heating value, net 19.03 MJ, wet mass 1 kg
  note on carbon content, fossil: This dataset is an unweighted average of 20 organic substances (listed in Tab 88.1, ecoinvent v2.2 report 8, part II), being part of the top100 chemicals included in this database. The C-content has also been calculated as an unweighted average of the C content of the substances composing this dataset.
- concrete mixing factory: 4.57e-7 unit; = 0.000000457*ref; source Kellenberger D. 2007; lognormal variance with pedigree 0.3626, pedigree (2,1,5,5,1)
  Literature value. From ecoinvent dataset "concrete production, normal"
- diesel, burned in building machine: 15.6427 MJ; = 15.6427152*ref; lognormal variance with pedigree 0.04, pedigree (1,1,5,1,1)
  See parameters. Energy use in ready-mix plant. Includes air emissions from diesel combustion.
  Uncertainty: C
  property density 0.84 kg/l; name density_diesel
  property fuel input in physical units, m3 0.0004351 m3; name diesel_input; = 0.4351/1000
  property heating value, net 1 MJ; name NHV_diesel
- electricity, medium voltage: 0.320003, 3.794 kWh (2 suppliers, which the file names only by identifier); sum of these 4.114 kWh; = 4.114*ref; source Marceau, M.L. 2007; lognormal variance with pedigree 0.0581, pedigree (4,1,5,3,1)
  Literature value. Energy use in ready-mix plant.
  Uncertainty: T
- ethylene oxide: 1.8 kg; = 1.8*ref; lognormal variance with pedigree 0.04, pedigree (1,1,5,1,1)
  See parameters.
  Uncertainty: C
  properties: carbon content, fossil 0.545455, dry mass 1 kg, heating value, net 27.53 MJ, wet mass 1 kg
- fatty alcohol: 0.205 kg; = 0.205*ref; lognormal variance with pedigree 0.0828, pedigree (3,2,5,3,4)
  (same comment as for alkylbenzene sulfonate, linear, petrochemical)
  properties: carbon content, fossil 0.0408973, carbon content, non-fossil 0.743434, dry mass 1 kg, heating value, net 41.01 MJ, wet mass 1 kg
- gravel, round: 959.998 kg; = 959.997852233677*ref; lognormal variance with pedigree 0.04, pedigree (1,1,5,1,1)
  Including waste concrete. See Exchange Properties
  Uncertainty: C
  properties: dry mass 1 kg, wet mass 1 kg
- heat, district or industrial, natural gas: 10.6323 MJ; = 10.63227*ref; lognormal variance with pedigree 0.04, pedigree (1,1,5,1,1)
  See parameters. Energy use in ready-mix plant. Includes air emissions from natural gas combustion.
  Uncertainty: C
  property fuel input in physical units, m3 0.2929 m3; name natural_gas_input
  property heating value, net 1 MJ; name NHV_natural_gas
- lubricating oil: 0.0119 kg; = 0.0119*ref; source Kellenberger D. 2007; lognormal variance with pedigree 0.0526, pedigree (2,1,5,5,1)
  Literature value. From ecoinvent dataset "concrete production, normal"
  properties: carbon content, fossil 0.75, dry mass 1 kg, heating value, net 40.2 MJ, wet mass 1 kg
  note on carbon content, fossil: Lubricating oil is produced from diesel. C-content/dry mass of fats and oils considered 75%, from: ecoinvent v2.2 report, n 15a, pg 40
  note on heating value, net: Literature value, Source: IPCC 2006, 2006 IPCC Guidelines for National Greenhouse Gas Inventories, Prepared by the National Greenhouse Gas Inventories Programme, Eggleston H.S., Buendia L., Miwa K., Ngara T. and Tanabe K. (eds). Published: IGES, Japan
- sand: 806.398 kg; = 806.398195876289*ref; lognormal variance with pedigree 0.04, pedigree (1,1,5,1,1)
  Including waste concrete. See Exchange Properties
  Uncertainty: C
  properties: dry mass 1 kg, wet mass 1 kg
- steel, low-alloyed, hot rolled: 0.0238 kg; = 0.0238*ref; source Kellenberger D. 2007; lognormal variance with pedigree 0.0526, pedigree (2,1,5,5,1)
  Literature value. From ecoinvent dataset "concrete production, normal"
  properties: carbon content, fossil 0.005, dry mass 1 kg, wet mass 1 kg
  note on carbon content, fossil: Low alloyed steel composition given in Tab. 3.2 ecoinvent v2.2 report 10_partII. Steel assumed to have a C content of 0.5%
- synthetic rubber: 0.00713 kg; = 0.00713*ref; source Kellenberger D. 2007; lognormal variance with pedigree 0.0526, pedigree (2,1,5,5,1)
  Literature value. From ecoinvent dataset "concrete production, normal"
  properties: carbon content, fossil 0.871949, dry mass 1 kg, heating value, net 26.42 MJ, wet mass 1 kg
  note on carbon content, fossil: EPDM (Ethylene-propene-diene terpolymer) rubber is a terpolymer of ethylene, propene, and a diene with the residual unsaturated portion of the diene in the side chain (ecoinvent v2.2 report 7-part XX & Ullmann). Chemical formula (deduced from Evidences of Solvent-Induced Miscibility in Polychloroprene-co-Ethylene-Propene Diene Terpolymer Blends, Dubey et al., Journal of Applied Polymer Science, 2009, 111:1884-1891): C20H35
- tap water: 195.941 kg; = 195.941176470588*ref; lognormal variance with pedigree 0.04, pedigree (1,1,5,1,1)
  Water use in ready-mix plant, assumed to be sourced from municipal water system. See Exchange properties comment for Sources.
  Uncertainty: C
  property batch water 155 kg; name batch_water
  property non-process water, net -40.9412 kg; name non_process_water; = WWater*1000/(1-fraction_PW_to_air)
  properties: carbon content, fossil 0.00178991, dry mass 0.000337476 kg, water content 2962.17, wet mass 1 kg
  note on batch water: Extrapolated value. Estimation for Quebec Province by Association Béton Québec Technical Committee - nov 2013.Based on Ministère des transports du Québec (Ministry of Transport, Québec- Canada). Recipe compliant with Quebec standards for Work of art concrete.
  note on carbon content, fossil: Bicarbonate content is 2.93 mol/m3. CO2 content is 0.1 mol/m3 (ecoinvent v2.2 report 8, Tab 93.1).
  note on non-process water, net: The average water consumption (not including batch water) is 65 L/m3 of ready mixed concrete. The average amount of water disposed is 34,8 L/m3. Water not discarded is recycled back into the process or into other products. Source: Athena (2005):Cement and Structural Concrete: LCI Update 2005 An amount of 15% water evaporated to air was assumed, in order to calculate to non-process water input.
- waste concrete: -24.5 kg; name Waste; = 24.5*ref; source Marceau, M.L. 2007; lognormal variance with pedigree 0.0107, pedigree (2,1,1,3,1)
  Literature value. Solid waste consists of concrete and small amounts of paste (cement and water after aggregate has been reclaimed)
  production volume; = PV_ref*Waste/ref
    Calculated from the production volume of reference product, in proportion to the respective output amounts.
  properties: carbon content, fossil 1e-51, dry mass 0.933419 kg, water content 0.07133, wet mass 1 kg
- wastewater from concrete production: -0.0348 m3; name WWater; = 0.0348*ref; source Marceau, M.L. 2007; lognormal variance with pedigree 0.0107, pedigree (2,1,1,3,1)
  Literature value. Table E1a.
  production volume; = PV_ref*WWater/ref
    (same comment as for waste concrete)
  properties: carbon content, fossil 0.027074, dry mass 0.449139 kg, water content 2225.48, wet mass 1000 kg
  note on carbon content, fossil: TOC =0.01216 kg/m3 (Tab A.20, ecoinvent v2.2 report 13_I). TOC was considered as Total Carbon.

## Emissions to nature
- Water [air, unspecified]: 0.00614118 m3; = 0.00614117647058823*ref; lognormal variance with pedigree 0.04, pedigree (1,1,5,1,1)
  Calculated value. See exchange propeties.
  Uncertainty: C
- Chlorides, unspecified [water, unspecified]: 3.09e-9 kg; = 0.00000000309*ref; source Marceau, M.L. 2007; lognormal variance with pedigree 0.0413, pedigree (2,1,5,3,1)
  Literature value. Table E1a.
- Copper ion [water, unspecified]: 1.55e-8 kg; = 0.0000000155*ref; source Marceau, M.L. 2007; lognormal variance with pedigree 0.0413, pedigree (2,1,5,3,1)
  Literature value. Table E1a.
- Iron ion [water, unspecified]: 1.55e-8 kg; = 0.0000000155*ref; source Marceau, M.L. 2007; lognormal variance with pedigree 0.0413, pedigree (2,1,5,3,1)
  Literature value. Table E1a.
- Oils, unspecified [water, unspecified]: 2.32e-7 kg; = 0.000000232*ref; source Marceau, M.L. 2007; lognormal variance with pedigree 0.0413, pedigree (2,1,5,3,1)
  Literature value. Table E1a.
- Suspended solids, unspecified [water, unspecified]: 4.64e-7 kg; = 0.000000464*ref; source Marceau, M.L. 2007; lognormal variance with pedigree 0.0413, pedigree (2,1,5,3,1)
  Literature value. Table E1a.

## Sampling procedure
Data on process inputs were provided by the Technical Committee of Association Béton Québec (Canada). Water use is from Confidential Life Cycle Inventory Survey of Ready-Mix Concrete Plant (Marceau, VanGeem, and Ranchero 2006a). This survey was distributed to a sample of member-plants of the National Ready Mixed Concrete Association. The sample was chosen so that the plants in the sample are representative of climates of the conterminous United States and plant size in terms of production in cubic yards of ready mixed concrete. The sample consists of 47 plants.

## Extrapolations
This activity represents a North American concrete production. The generic concrete mix (cement, SCM, aggregate, water, admixtures) provided for Québec (Canada), was used to represent an average North American concrete recipe. Some flows have been kept as in the original (European) ecoinvent dataset (infrastructure, lubricant, rubber, and steel). The uncertainty has been adjusted accordingly.
