# jute production, rainfed

Dataset: EcoSpold 2, unit process
Geography: RoW
Time period: 2016-03-01 to 2023-12-31
Technology level: current
Classification: EcoSpold01Categories: agricultural production/plant production
Classification: ISIC rev.4 ecoinvent: 0116:Growing of fibre crops
Scenario: Business-as-Usual
System model: Allocation, cut-off by classification
Generated by: Muhammed Noor Hossain
Database: ecoinvent
isCopyrightProtected: true
accessRestrictedTo: 1

## General comment
The dataset represents the production of 1 kg of jute plant on a global scale in 2017. The dataset is approximated from data collected in Bangladesh. The yield is 2680 kg/ha.The inventory is modelled for fresh matter.

## Included activities start
This activity starts right after the harvest of the previous crop. The soil is prepared for the jute cultivation.

## Included activities end
The activity ends at the harvesting of the mature jute plant.

## Technology
Cultivation of Jute from conventional production standards

## Parameters
- LUC_crop_specific: 1 dimensionless
  This parameter allows to switch between a "crop specific" and a "country specific" approach when calculating the LUC of a crop. By default, the chosen approach is "crop specific", so the value of the parameter is 1. If you want to apply a "country specific" approach, turn the parameter to 0.

## Reference product
- jute plant, harvested: 1 kg; By-product classification allocatable product; CPC 01922: Jute, kenaf, and other textile bast fibres, raw or retted, except flax, true hemp and ramie; HS2017 5303: Jute and other textile bast fibres (not flax, true hemp and ramie), raw or processed but not spun; tow and wa[...]
  The output of the jute cultivation activity. Mature jute plant is harvested.
  production volume 3.49186e9 kg
    The annual production volume data is not readily available. However, annual production volume of jute fibre is welcome. From the literature, we also know that 1 kg jute fibre as output of retting process requires 2.4 kg fresh jute plant. Hence, we have multiplied the annual production volume of jute fibre with 2.4. www.ijma.org/world-jute.html
  property price 0.362736 EUR2005
    Literature value. Price from FAOSTAT data Producer Prices - Annual (retrieved from: http://www.fao.org/faostat/en/#data/PP, accessed 15Feb2018). Data from 2005.
  properties: carbon allocation 0.0843824 kg, carbon content 0.475, carbon content, fossil 0, carbon content, non-fossil 0.475, dry mass 0.177647 kg, water content 4.62914, water in wet mass 0.822353 kg, wet mass 1 kg

## Inputs from technosphere
- inorganic phosphorus fertiliser, as P2O5: 0.000102806, 0.000228193, 0.00197425, 6.37133e-5, 1.56469e-5, 2.21569e-5, 5.5278e-5, 7.26054e-6, 3.55848e-5, 8.48423e-7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 kg (29 suppliers, which the file names only by identifier); sum of these 0.014467 kg; lognormal variance with pedigree 0.0026, pedigree (1,1,3,1,1)
  EcoSpold01Location=RER
  Calculated Value. The data was collected for a hactare area from the focus group discussion. The input to hactare is 93.06 kg.
  properties: dry mass 1 kg, wet mass 1 kg
- linseed seed, for sowing: 0.000886525 kg; lognormal variance with pedigree 0.2106, pedigree (5,5,5,5,5)
  Calculated Value. The data was collected for a hactare area from the focus group discussion.
  properties: carbon content, non-fossil 1, dry mass 1 kg, wet mass 1 kg
- packaging, for fertilisers: 0.0802416 kg; lognormal variance with pedigree 0.0532, pedigree (4,3,3,5,4)
  Total amount of active substance/s of fertilisers needed for the production of 'jute plant, harvested' is calculated to be circa 4.01E-02 kg. Fertiliser/s used in this dataset is/are: 'phosphate fertiliser, as P2O5', 'potassium chloride, as K2O', 'urea, as N'. The total amount of active substance/s is doubled in order to account for the packaging of the dilluted product of fertiliser/s that is/are applied. Therefore, 8.02E-02 kg of packaging for fertilisers is justified with this exchange.
  properties: carbon content, fossil 0.825301, dry mass 1 kg, heating value, net 25.01 MJ, price 0.0642 EUR2005, wet mass 1 kg
  note on carbon content, fossil: Considering a chemical formula (C2H4)n for polyethylene, carbon content-fossil is calculated to be 0.856286 kg of Carbon per kg of dry mass.
- potassium chloride: 0.00152802, 0.0184248 kg (2 suppliers, which the file names only by identifier); sum of these 0.0199529 kg; lognormal variance with pedigree 0.0026, pedigree (1,1,3,1,1)
  EcoSpold01Location=RER
  The exchange has been updated from 'potassium chloride, as K2O' into 'potassium chloride' and therefore its amount has been scaled (multiplied) from 0.0126 kg by 1.5829 kg of 'potassium chloride' per kg of 'potassium chloride, as K2O'. Original comment of the exchange is: Calculated Value. The data was collected for a hactare area from the focus group discussion. The input to hactare is 81.08 kg.
  properties: dry mass 1 kg, wet mass 1 kg
- tillage, ploughing: 8.91638e-5 ha; lognormal variance with pedigree 0.0026, pedigree (1,1,3,1,1)
  EcoSpold01Location=CH
  The data was collected for a hactare area from the focus group discussion.
- urea: 0.0130889, 0.00165538, 0.00205212, 0.011177 kg (4 suppliers, which the file names only by identifier); sum of these 0.0279734 kg; lognormal variance with pedigree 0.0026, pedigree (1,1,3,1,1)
  EcoSpold01Location=RER
  The exchange has been updated from 'urea, as N' into 'urea' and therefore its amount has been scaled (multiplied) from 0.013 kg by 2.1438 kg of 'urea' per kg of 'urea, as N'. Original comment of the exchange is: Calculated Value. The data was collected for a hactare area from the focus group discussion. The input to hactare is 83.93 kg.
  properties: carbon content, fossil 0.2, dry mass 1 kg, wet mass 1 kg

## Inputs from nature
- Carbon dioxide, in air [natural resource, in air]: 0.403061 kg; lognormal variance with pedigree 0.0106, pedigree (4,1,3,1,1)
  Calculated Value. This value has been calculated by using the ecoinvent LCI calculation tool for crop production.
  Uncertainty: The ecoinvent LCI calculation tool for crop production used India as a proxy for Bangladesh and Hemp as for Jute.
- Energy, gross calorific value, in biomass [natural resource, biotic]: 4.6875 MJ; lognormal variance with pedigree 0.0106, pedigree (4,1,3,1,1)
  (same comment as for Carbon dioxide, in air)
- Occupation, arable land, unspecified use [natural resource, land]: 0.454637 m2*year; lognormal variance with pedigree 0.012, pedigree (4,1,3,1,1)
  (same comment as for Carbon dioxide, in air)
- Transformation, from arable land, unspecified use [natural resource, land]: 1.55456 m2; lognormal variance with pedigree 0.018, pedigree (4,1,3,1,1)
  (same comment as for Carbon dioxide, in air)
- Transformation, to arable land, unspecified use [natural resource, land]: 1.55456 m2; lognormal variance with pedigree 0.018, pedigree (4,1,3,1,1)
  Calculated Value. This value has been calculated by using the ecoinvent LCI calculation tool for crop production.

## Emissions to nature
- Ammonia [air, non-urban air or from high stacks]: 0.00317469 kg; lognormal variance with pedigree 0.0521, pedigree (4,4,3,3,1)
  (same comment as for Transformation, to arable land, unspecified use)
- Carbon dioxide, fossil [air, non-urban air or from high stacks]: 0.0204994 kg; lognormal variance with pedigree 0.0521, pedigree (4,4,3,3,1)
  (same comment as for Transformation, to arable land, unspecified use)
- Carbon dioxide, from soil or biomass stock [air, non-urban air or from high stacks]: 0.0410448 kg; = 110/2680
  Due to lack o data related to land use change of annual crops in Bangladesh, this exchange is added to cover the impact of LUC, using the methodology applied in Global datasets.
  Global average LUC emissions according 2nd edition of the Quantis-modified tool developed by Blonk Consultants 'WFLDB-adapted-Blonk 2014 direct-land-use-change-assessment-tool_2015-05-18a.xlsx', tab. 'Country & land use unknown'. The emission are based on the relative change in production areas in all countries for a given crop. The weighted average is used which takes into acount relative difference in crop expansion into primary forest, secondary forest, grassland, perennial and annual land. The amount of 110 kg of CO2 per ha*year (taken from the tool) is divided with the yield of jute plant, harvested, 2680 kg/ha.
- Dinitrogen monoxide [air, non-urban air or from high stacks]: 0.000300283 kg; lognormal variance with pedigree 0.0521, pedigree (4,4,3,3,1)
  (same comment as for Transformation, to arable land, unspecified use)
- Nitrogen oxides [air, non-urban air or from high stacks]: 0.000520158 kg; lognormal variance with pedigree 0.0521, pedigree (4,4,3,3,1)
  (same comment as for Transformation, to arable land, unspecified use)
- Cadmium II [soil, agricultural]: 1.26413e-6 kg; lognormal variance with pedigree 0.0521, pedigree (4,4,3,3,1)
  (same comment as for Transformation, to arable land, unspecified use)
- Chromium III [soil, agricultural]: -2.69843e-5 kg; normal variance with pedigree 0.04, pedigree (4,4,3,3,1)
  (same comment as for Transformation, to arable land, unspecified use)
- Copper ion [soil, agricultural]: -2.58873e-5 kg; normal variance with pedigree 0.04, pedigree (4,4,3,3,1)
  (same comment as for Transformation, to arable land, unspecified use)
- Lead II [soil, agricultural]: -6.51523e-6 kg; normal variance with pedigree 0.04, pedigree (4,4,3,3,1)
  (same comment as for Transformation, to arable land, unspecified use)
- Mercury II [soil, agricultural]: -7.82321e-8 kg; normal variance with pedigree 0.04, pedigree (4,4,3,3,1)
  (same comment as for Transformation, to arable land, unspecified use)
- Nickel II [soil, agricultural]: -2.72393e-5 kg; normal variance with pedigree 0.04, pedigree (4,4,3,3,1)
  (same comment as for Transformation, to arable land, unspecified use)
- Zinc II [soil, agricultural]: -4.55726e-5 kg; normal variance with pedigree 0.04, pedigree (4,4,3,3,1)
  (same comment as for Transformation, to arable land, unspecified use)
- Cadmium II [water, ground-]: 2.22302e-9 kg; lognormal variance with pedigree 0.0521, pedigree (4,4,3,3,1)
  (same comment as for Transformation, to arable land, unspecified use)
- Cadmium II [water, surface water]: 3.40636e-7 kg; lognormal variance with pedigree 0.0521, pedigree (4,4,3,3,1)
  (same comment as for Transformation, to arable land, unspecified use)
- Chromium III [water, ground-]: 9.42461e-7 kg; lognormal variance with pedigree 0.0521, pedigree (4,4,3,3,1)
  (same comment as for Transformation, to arable land, unspecified use)
- Chromium III [water, surface water]: 3.41872e-5 kg; lognormal variance with pedigree 0.0521, pedigree (4,4,3,3,1)
  (same comment as for Transformation, to arable land, unspecified use)
- Copper ion [water, ground-]: 1.53387e-7 kg; lognormal variance with pedigree 0.0521, pedigree (4,4,3,3,1)
  (same comment as for Transformation, to arable land, unspecified use)
- Copper ion [water, surface water]: 2.73276e-5 kg; lognormal variance with pedigree 0.0521, pedigree (4,4,3,3,1)
  (same comment as for Transformation, to arable land, unspecified use)
- Lead II [water, ground-]: 6.32705e-9 kg; lognormal variance with pedigree 0.0521, pedigree (4,4,3,3,1)
  (same comment as for Transformation, to arable land, unspecified use)
- Lead II [water, surface water]: 6.5688e-6 kg; lognormal variance with pedigree 0.0521, pedigree (4,4,3,3,1)
  (same comment as for Transformation, to arable land, unspecified use)
- Mercury II [water, ground-]: 4.83468e-11 kg; lognormal variance with pedigree 0.0521, pedigree (4,4,3,3,1)
  (same comment as for Transformation, to arable land, unspecified use)
- Mercury II [water, surface water]: 8.67363e-8 kg; lognormal variance with pedigree 0.0521, pedigree (4,4,3,3,1)
  (same comment as for Transformation, to arable land, unspecified use)
- Nickel II [water, surface water]: 2.85122e-5 kg; lognormal variance with pedigree 0.0521, pedigree (4,4,3,3,1)
  (same comment as for Transformation, to arable land, unspecified use)
- Nitrate [water, ground-]: 0.0194462 kg; lognormal variance with pedigree 0.0521, pedigree (4,4,3,3,1)
  (same comment as for Transformation, to arable land, unspecified use)
- Phosphate [water, ground-]: 9.73175e-6 kg; lognormal variance with pedigree 0.0521, pedigree (4,4,3,3,1)
  (same comment as for Transformation, to arable land, unspecified use)
- Phosphate [water, surface water]: 2.99897e-5 kg; lognormal variance with pedigree 0.0521, pedigree (4,4,3,3,1)
  (same comment as for Transformation, to arable land, unspecified use)
- Phosphorus [water, surface water]: 0.0029727 kg; lognormal variance with pedigree 0.0521, pedigree (4,4,3,3,1)
  (same comment as for Transformation, to arable land, unspecified use)
- Zinc II [water, ground-]: 1.10672e-6 kg; lognormal variance with pedigree 0.0521, pedigree (4,4,3,3,1)
  (same comment as for Transformation, to arable land, unspecified use)
- Zinc II [water, surface water]: 5.30791e-5 kg; lognormal variance with pedigree 0.0521, pedigree (4,4,3,3,1)
  (same comment as for Transformation, to arable land, unspecified use)

## Review by Assumpció ANTON 2018-03-20
GLO geography score should be changed as it was agreed
