# electricity production, hydro, aluminium industry

Dataset: EcoSpold 2, unit process
Geography: IAI Area, EU27 & EFTA
Time period: 2015-01-01 to 2023-12-31
Technology level: current
Classification: ISIC rev.4 ecoinvent: 3510:Electric power generation, transmission and distribution
Classification: EcoSpold01Categories: hard coal/power plants
Tags: electricity, primary aluminium industry; re-labelling activity
Scenario: Business-as-Usual
System model: Allocation, cut-off by classification
Generated by: Djibril RENE
Database: ecoinvent
isCopyrightProtected: true
accessRestrictedTo: 1

## General comment
This is a dataset used to create an aluminium industry specific electricity market for aluminium-producing countries within EU27 and EFTA (see Geography comment field for list of countries). The production volume represents the total amount of hydroelectricity used for aluminium production (electrolysis and ingot casting) in the region. The dataset also identifies the technology and country providing the hydroelectricity.
Electricity markets specific to the aluminium-industry are needed in an LCI database because primary aluminium production is very energy intensive, and hence the location of production plants is often determined by access to large amounts of cheap electricity, which often results in an electricity mix that is different from the general grid mix of the countries where the production plants are located.
It is assumed that the production of electricity in general and in aluminium industry specific power plants is identical. Details on actual electricity generation with each technology can be found in the corresponding datasets.
The share of hydroelectricity produced by the different technologies (reservoir, run-of-river, pumped storage) is calculated using both (1) estimates of the share of hydroelectricity coming from each country within the EU27+EFTA region (using country-specific aluminium production volumes, supplied by the European Aluminium Association and validated by the International Aluminium Institute, and, for all countries except GR, SK and SI, International Energy Agency data on electricity sources within each country) and (2) ecoinvent v3 country-specific split of hydroelectricity into different technologies. For countries SK, SI and GR, the share of hydroelectricity in the aluminium-specific grid mix were supplied by the IAI rather than determined by IEA data.
Calculations are detailed in the report 'Calculating grid mixes for the aluminium industry in ecoinvent v3', available on the ecoinvent website.

## Included activities start
Re-labelling dataset, not representing a real transformation activity. Conceptually, the activity can be said to start with the production of electricity.

## Included activities end
Re-labelling dataset, not representing a real transformation activity. Conceptually, the activity can be said to end with a given amount of high voltage electricity labelled as specifically used for the production of electricity.

## Geography
Aluminium producing European countries within EU27 and EFTA whose aluminium producers are part of the European Aluminium Association (France, Germany, Greece, Iceland, Italy, Netherlands, Norway, Spain, Sweden, United Kingdom, Romania, Slovakia and Slovenia)

## Time period
Production volume updated with 2015 data from IAI

## Reference product
- electricity, high voltage, aluminium industry: 1 kWh; = PS_DE+PS_ES+PS_FR+PS_GB+PS_GR+PS_IT+PS_NO+PS_RO+PS_SI+PS_SK+PS_SE+ResA_FR+ResA_DE+ResA_IT+ResA_NO+ResNA_ES+ResNA_IS+ResNA_SE+ResNA_SK+RoR_DE+RoR_ES+RoR_FR+RoR_GB+RoR_GR+RoR_IT+RoR_NL+RoR_RO+RoR_SE+RoR_SI+RoR_SK; By-product classification allocatable product; CPC 17100: Electrical energy; HS2017 271600: Electrical energy
  Expressed as sum of contributing technologies (inputs) to allow uncertainty analysis: each technology share is uncertain, and in a Monte Carlo analysis will always be normalized by the sum contribution of each technology
  production volume 4.42894e10 kWh
    The production volume, which is ultimately used to determine the share of hydroelectricity in the downstream market for aluminium industry specific high voltage electricity, is calculated by multiplying the following data:
    (1) electricity mix used to produce aluminium in the EU27+EFTA region, provided by the European Aluminium Association (EAA) and validated by the International Aluminium Institute.
    (2) primary aluminium production volumes of each aluminium producing country in the EU27+EFTA region, provided by EAA.
    (3) electricity requirements, per tonne primary aluminium, for both Söderberg (global average) and prebake (region-specific data) electrolysis technologies, as well as the EU27+EFTA specific proportion of aluminium produced by each technology.
    (4) electricity compensating line and transformation losses from production to consumption as medium voltage electricity. Losses estimated using country-level ecoinvent v3.2 data for all countries.
    (5) electricity consumed in ingot casting.
  property price 0.0977 EUR2005
    Calculated in temporary price data. 94% of the average price (to account for a 6% loss in transformation and transmission) for electricity for industrial consumersin 2005 (excluded taxes). From IEA.
  properties: carbon allocation 0 kg, carbon content 0

## Inputs from technosphere
- electricity, high voltage: 0.00379543 kWh; name PS_NO; lognormal variance with pedigree 0.0113, pedigree (3,2,4,1,2)
  Calculated amount (see general comments).
- electricity, high voltage: 0.00241011 kWh; name PS_DE; lognormal variance with pedigree 0.0252, pedigree (4,5,4,1,2)
  Calculated amount (see general comments).
- electricity, high voltage: 0.0212366 kWh; name RoR_RO; lognormal variance with pedigree 0.0113, pedigree (3,2,4,1,2)
  Calculated amount (see general comments).
- electricity, high voltage: 0.0025768 kWh; name PS_ES; lognormal variance with pedigree 0.0113, pedigree (3,2,4,1,2)
  Calculated amount (see general comments).
- electricity, high voltage: 0.00632201 kWh; name RoR_GR; lognormal variance with pedigree 0.0113, pedigree (3,2,4,1,2)
  Calculated amount (see general comments).
- electricity, high voltage: 0.00293294 kWh; name ResA_FR; lognormal variance with pedigree 0.0113, pedigree (3,2,4,1,2)
  Calculated amount (see general comments).
- electricity, high voltage: 0.00145207 kWh; name PS_FR; lognormal variance with pedigree 0.0113, pedigree (3,2,4,1,2)
  Calculated amount (see general comments).
- electricity, high voltage: 0.000256412 kWh; name PS_GB; lognormal variance with pedigree 0.0113, pedigree (3,2,4,1,2)
  Calculated amount (see general comments).
- electricity, high voltage: 0.00497642 kWh; name ResNA_ES; lognormal variance with pedigree 0.0113, pedigree (3,2,4,1,2)
  Calculated amount (see general comments).
- electricity, high voltage: 0.00833122 kWh; name RoR_SK; lognormal variance with pedigree 0.0113, pedigree (3,2,4,1,2)
  Calculated amount (see general comments).
- electricity, high voltage: 0.00969958 kWh; name RoR_SI; lognormal variance with pedigree 0.0113, pedigree (3,2,4,1,2)
  Calculated amount (see general comments).
- electricity, high voltage: 0.502371 kWh; name ResA_NO; lognormal variance with pedigree 0.0113, pedigree (3,2,4,1,2)
  Calculated amount (see general comments).
- electricity, high voltage: 0.0064271 kWh; name ResNA_SE; lognormal variance with pedigree 0.0113, pedigree (3,2,4,1,2)
  Calculated amount (see general comments).
- electricity, high voltage: 0.355672 kWh; name ResNA_IS; lognormal variance with pedigree 0.0113, pedigree (3,2,4,1,2)
  Calculated amount (see general comments).
- electricity, high voltage: 4.63431e-5 kWh; name RoR_NL; lognormal variance with pedigree 0.0113, pedigree (3,2,4,1,2)
  Calculated amount (see general comments).
- electricity, high voltage: 0.00644734 kWh; name RoR_DE; lognormal variance with pedigree 0.0113, pedigree (3,2,4,1,2)
  Calculated amount (see general comments).
- electricity, high voltage: 5.12983e-5 kWh; name PS_SE; lognormal variance with pedigree 0.0113, pedigree (3,2,4,1,2)
  Calculated amount (see general comments).
- electricity, high voltage: 0.000468531 kWh; name PS_SI; lognormal variance with pedigree 0.0113, pedigree (3,2,4,1,2)
  Calculated amount (see general comments).
- electricity, high voltage: 0.00122806 kWh; name ResA_DE; lognormal variance with pedigree 0.0113, pedigree (3,2,4,1,2)
  Calculated amount (see general comments).
- electricity, high voltage: 0.00966011 kWh; name RoR_ES; lognormal variance with pedigree 0.0113, pedigree (3,2,4,1,2)
  Calculated amount (see general comments).
- electricity, high voltage: 0.00510393 kWh; name ResA_IT; lognormal variance with pedigree 0.0113, pedigree (3,2,4,1,2)
  Calculated amount (see general comments).
- electricity, high voltage: 0.00287096 kWh; name RoR_IT; lognormal variance with pedigree 0.0113, pedigree (3,2,4,1,2)
  Calculated amount (see general comments).
- electricity, high voltage: 0.0146821 kWh; name RoR_FR; lognormal variance with pedigree 0.0113, pedigree (3,2,4,1,2)
  Calculated amount (see general comments).
- electricity, high voltage: 0.000909673 kWh; name PS_SK; lognormal variance with pedigree 0.0113, pedigree (3,2,4,1,2)
  Calculated amount (see general comments).
- electricity, high voltage: 0.000376891 kWh; name PS_IT; lognormal variance with pedigree 0.0113, pedigree (3,2,4,1,2)
  Calculated amount (see general comments).
- electricity, high voltage: 0.00277707 kWh; name ResNA_SK; lognormal variance with pedigree 0.0113, pedigree (3,2,4,1,2)
  Calculated amount (see general comments).
- electricity, high voltage: 0.000482249 kWh; name PS_RO; lognormal variance with pedigree 0.0113, pedigree (3,2,4,1,2)
  Calculated amount (see general comments).
- electricity, high voltage: 0.000457236 kWh; name RoR_GB; lognormal variance with pedigree 0.0113, pedigree (3,2,4,1,2)
  Calculated amount (see general comments).
- electricity, high voltage: 0.0257084 kWh; name RoR_SE; lognormal variance with pedigree 0.0113, pedigree (3,2,4,1,2)
  Calculated amount (see general comments).
- electricity, high voltage: 0.000269938 kWh; name PS_GR; lognormal variance with pedigree 0.0113, pedigree (3,2,4,1,2)
  Calculated amount (see general comments).

## Sampling procedure
IAI data used for total electricity used in the production of aluminium that is from hydroelectric plants. ecoinvent data used to split hydroelectricity production to the respective technologies (reservoir, run-of-river, pumped storage). The cited 97% representativeness is for IAI data (data based on 97% of regional aluminium production). The percent representativeness of data used to split hydroelectricity production to different types of plants (national grid proxy) is 100%.

## Extrapolations
For the split of hydroelectricity production to the respective technologies (reservoir, run-of-river, pumped storage), shares of different types of hydroelectric plants in the countries, when available, were used as a proxy for the split relevant for the aluminium industry, see general comments.
