# propanal production

Dataset: EcoSpold 2, unit process
Geography: RoW
Time period: 1989-01-01 to 2023-12-31
Technology level: current
Classification: EcoSpold01Categories: chemicals/organics
Classification: ISIC rev.4 ecoinvent: 2011:Manufacture of basic chemicals
Synonyms: propione aldehyde
Tags: ConvertedDataset
Scenario: Business-as-Usual
System model: Allocation, cut-off by classification
Share of production covered: 100 %
Generated by: Jürgen Sutter
Published in: Sutter, J. 2007
Database: ecoinvent
isCopyrightProtected: true
accessRestrictedTo: 1

## General comment
The process "propanal, at plant, RER" is modelled for the production of propanal from ethylene in Europe. Raw materials are modelled with a stoechiometric calculation. Energy consumptions are modelled with data from a similar process. The emissions are estimated. Infrastructure and transports are calculated with standard values.
[This dataset was already contained in the ecoinvent database version 2. It was not individually updated during the transfer to ecoinvent version 3. Life Cycle Impact Assessment results may still have changed, as they are affected by changes in the supply chain, i.e. in other datasets. This dataset was generated following the ecoinvent quality guidelines for version 2. It may have been subject to central changes described in the ecoinvent version 3 change report (http://www.ecoinvent.org/database/ecoinvent-version-3/reports-of-changes/), and the results of the central updates were reviewed extensively. The changes added e.g. consistent water flows and other information throughout the database. The documentation of this dataset can be found in the ecoinvent reports of version 2, which are still available via the ecoinvent website. The change report linked above covers all central changes that were made during the conversion process.]

## Included activities end
Production of propanal including materials, energy uses, infrastructure and emissions.

## Geography
The inventory is modelled for Europe.

## Technology
Hydroformylation of ethylene

## Time period
Time of publications

## Parameters
- fraction, cooling water, cooling pond system, to air: 0.032 dimensionless; name fraction_CW_CP_to_air; lognormal variance with pedigree 0.0413, pedigree (2,3,1,3,1)
  Calculated based on literature value (Scown, C.D., 2011, Water Footprint of U.S. Transportation Fuels and supplying information of the article) (Vionnet, S., Quantis Water Database - Technical Report, 2012).
- fraction, cooling water, once-through system, to air: 0.004 dimensionless; name fraction_CW_OT_to_air; lognormal variance with pedigree 0.0413, pedigree (2,3,1,3,1)
  (same comment as for fraction, cooling water, cooling pond system, to air)
- fraction, cooling water, recirculating system, to air: 0.771 dimensionless; name fraction_CW_R_to_air; lognormal variance with pedigree 0.0413, pedigree (2,3,1,3,1)
  (same comment as for fraction, cooling water, cooling pond system, to air)
- fraction, cooling water, to air: 0.3875 dimensionless; name fraction_CW_to_air; = (0.5*fraction_CW_OT_to_air)+(0.5*fraction_CW_R_to_air); lognormal variance with pedigree 0.092025, pedigree (4,4,3,2,4)
  Calculated value based on literature value (see comments of the other parametres present in this dataset) and expert opinion. In the case when no industry/literature data are available about the type of cooling or directly fraction, cooling water, to air specific for the process a default assumption is applied. It is assumed that the once-through cooling system is used in 50% of all cases and recirculating system is used in another 50% of all cases.
- fraction, process water, to air: 0.205 dimensionless; name fraction_PW_to_air; lognormal variance with pedigree 0.092025, pedigree (4,4,3,2,4)
  Literature value (Statistics Canada, 2007 & Shaffer, K.H., 2008, Consumptive water use in the Great Lakes Basin, USGS) (Vionnet, S., Quantis Water Database - Technical Report, 2012).
- fraction, water, deionised, to air: 0.205 dimensionless; name fraction_WDI_to_air; = fraction_PW_to_air; lognormal variance with pedigree 0.092025, pedigree (4,4,3,2,4)
  Calculated value. See comment in the other parametres present in this dataset. Deionised water is considered to be always used as process water, thus process water fractions to air are applied to all deionised water input flows to calculate the amount of water consumed in the processes.

## Reference product
- propanal: 1 kg; By-product classification allocatable product; CPC 34170: Ethers, alcohol peroxides, ether peroxides, epoxides, acetals and hemiacetals, and their halogenated, sulphona[…]; HS2017 291212: Aldehydes; acyclic, without other oxygen function, ethanal (acetaldehyde); CAS 123-38-6
  EcoSpold01Location=RER
  production volume 2.67763 kg
    This is a placeholder value that does not reflect real-world production volumes. This dataset does not currently require a real-world production volume to work in the database framework, and no actual data were collected yet. This has no negative effect on the results of the ecoinvent database.
  property heating value, net 31.32 MJ
    LHV is calculated based on the elemental composition of the substance. Based on the CAS number of the substance (000123-38-6), the chemical formula of the substance is found to be: C3H6O, (PubChem 2020).
    Reference: Kim, S., Chen, J., Cheng, T., Gindulyte, A., He, J., He, S., Li, Q., Shoemaker, B. A., Thiessen, P. A., Yu, B., Zaslavsky, L., Zhang, J., & Bolton, E. E. (2019). PubChem 2019 update: improved access to chemical data. Nucleic acids research, 47(D1), D1102–D1109. https://doi.org/10.1093/nar/gky1033
  property price 1.14011 EUR2005
    Calculated based on inputs: The price of the product has been calculated as a sum of the values of the material and energy inputs for this product. This value is therefore a rough estimation. It may underestimate the real price since there are additional expenses when producing any product. These expences can include for example labour costs, treatment of waste materials and profit for the producer. Please consider carefully whether this level of data quality is acceptable for your application.
  properties: carbon allocation 0.62069 kg, carbon content 0.62069, carbon content, fossil 0.62069, carbon content, non-fossil 0, dry mass 1 kg, water content 0, water in wet mass 0 kg, wet mass 1 kg

## Inputs from technosphere
- carbon monoxide: 0.50817 kg; lognormal variance with pedigree 0.078, pedigree (4,5,5,5,1)
  Stoechiometric calculation
  EcoSpold01Location=RER
  Uncertainty: Stoechiometric calculation
  properties: carbon content, fossil 0.428571, dry mass 1 kg, heating value, net 12.99 MJ, wet mass 1 kg
  note on carbon content, fossil: CO. It is assumed that CO is produced from partial combustion of heavy heating oil.
- chemical factory, organics: 4e-10 unit; lognormal variance with pedigree 0.448, pedigree (4,5,5,5,5)
  Estimation
  EcoSpold01Location=RER
  Uncertainty: Estimation
- electricity, medium voltage: 0.0131083, 0.261482, 0.0878572, 0.00401423, 0.000803443, 0.000172517, 0.0270021 kWh (7 suppliers, which the file names only by identifier); sum of these 0.39444 kWh; lognormal variance with pedigree 0.086, pedigree (4,5,5,5,3)
  Estimation
  EcoSpold01Location=UCTE
  Uncertainty: Estimation
- ethylene: 0.00147489, 0.506695 kg (2 suppliers, which the file names only by identifier); sum of these 0.50817 kg; lognormal variance with pedigree 0.078, pedigree (4,5,5,5,1)
  EcoSpold01Location=RER
  Stoechiometric calculation
  Uncertainty: Stoechiometric calculation
  properties: carbon content, fossil 0.857143, dry mass 1 kg, heating value, net 43.22 MJ, wet mass 1 kg
- heat, district or industrial, natural gas: 0.0675777, 4.11242 MJ (2 suppliers, which the file names only by identifier); sum of these 4.18 MJ; lognormal variance with pedigree 0.086, pedigree (4,5,5,5,3)
  Uncertainty: Estimation
  properties: heating value, net 1 MJ
- heat, district or industrial, other than natural gas: 11.3528, 0.00525956 MJ (2 suppliers, which the file names only by identifier); sum of these 11.3581 MJ; lognormal variance with pedigree 0.086, pedigree (4,5,5,5,3)
  EcoSpold01Location=RER
  Estimation
  Uncertainty: Estimation
  properties: heating value, net 1 MJ
- hydrogen, gaseous, medium pressure, merchant: 0.0222973, 0.0140007 kg (2 suppliers, which the file names only by identifier); sum of these 0.036298 kg; lognormal variance with pedigree 0.078, pedigree (4,5,5,5,1)
  EcoSpold01Location=RER
  Stoechiometric calculation
  Uncertainty: Stoechiometric calculation
  properties: dry mass 1 kg, heating value, net 120.21 MJ, wet mass 1 kg
- nitrogen, liquid: 0.005 kg; lognormal variance with pedigree 0.086, pedigree (4,5,5,5,3)
  EcoSpold01Location=RER
  Estimation
  Uncertainty: Estimation
  properties: dry mass 1 kg, wet mass 1 kg
- water, deionised: 1 kg; name water_deionised_input; lognormal variance with pedigree 0.086, pedigree (4,5,5,5,3)
  EcoSpold01Location=CH
  Estimation
  Uncertainty: Estimation
  properties: wet mass 1 kg

## Inputs from nature
- Water, cooling, unspecified natural origin [natural resource, in water]: 0.12 m3; name water_cooling_UNO_input; lognormal variance with pedigree 0.086, pedigree (4,5,5,5,3)
  Estimation
  Uncertainty: Estimation

## Emissions to nature
- Carbon dioxide, fossil [air, urban air close to ground]: 0.10892 kg; lognormal variance with pedigree 0.1786, pedigree (4,5,5,5,5)
  Calculated from the water treatment
  Uncertainty: Calculated from the water treatment
- Carbon monoxide, fossil [air, urban air close to ground]: 0.0010163 kg; lognormal variance with pedigree 0.798, pedigree (4,5,5,5,5)
  Estimation
  Uncertainty: Estimation
- Ethylene [air, urban air close to ground]: 0.0010163 kg; lognormal variance with pedigree 0.188, pedigree (4,5,5,5,5)
  Estimation
  Uncertainty: Estimation
- Hydrogen [air, urban air close to ground]: 0.0018149 kg; lognormal variance with pedigree 0.188, pedigree (4,5,5,5,5)
  Estimation
  Uncertainty: Estimation
- Water [air, unspecified]: 0.046705 m3; name water_to_air_unspecified; lognormal variance with pedigree 0.0827, pedigree (2,2,5,5,1)
  Calculated value based on literature values and expert opinion. See comments in the parametres' comment field.
  property fraction, origin: fresh water 0.00438925; name fraction_origin_fresh_water
  property fraction, origin: salt water 0; name fraction_origin_salt_water
  property fraction, origin: unspecified 0.995611; name fraction_origin_unspecified
- BOD5, Biological Oxygen Demand [water, surface water]: 0.00801 kg; lognormal variance with pedigree 0.188, pedigree (4,5,5,5,5)
  Calculated from the water emissions
  Uncertainty: Calculated from the water emissions
- COD, Chemical Oxygen Demand [water, surface water]: 0.00801 kg; lognormal variance with pedigree 0.188, pedigree (4,5,5,5,5)
  Calculated from the water emissions
  Uncertainty: Calculated from the water emissions
- DOC, Dissolved Organic Carbon [water, surface water]: 0.00209 kg; lognormal variance with pedigree 0.188, pedigree (4,5,5,5,5)
  Calculated from the water emissions
  Uncertainty: Calculated from the water emissions
- Ethylene [water, surface water]: 0.0024392 kg; lognormal variance with pedigree 0.448, pedigree (4,5,5,5,5)
  Estimation
  Uncertainty: Estimation
- TOC, Total Organic Carbon [water, surface water]: 0.00209 kg; lognormal variance with pedigree 0.188, pedigree (4,5,5,5,5)
  Calculated from the water emissions
  Uncertainty: Calculated from the water emissions
- Water [water, unspecified]: 0.074295 m3; name water_to_water_unspecified; lognormal variance with pedigree 0.0827, pedigree (2,2,5,5,1)
  (same comment as for Water)
  property carbon content, fossil 0; name C_content_fossil
  property carbon content, non-fossil 0; name C_content_non_fossil
  property dry mass 0 kg; name DM
  property fraction, origin: fresh water 0.0107006; name fraction_origin_fresh_water_Ww
  property fraction, origin: salt water 0; name fraction_origin_salt_water_Ww
  property fraction, origin: unspecified 0.989299; name fraction_origin_unspecified_Ww
  property water in wet mass 1000 kg; name WWM
  property wet mass 1000 kg; name WM

## Sampling procedure
Literature data

## Extrapolations
Transports and emissions are modelled with standard values. Energy consumptions are modelled with a similar process This dataset has been copied from an original dataset covering the geography RER. The uncertainty has been adjusted accordingly.

## Review by Roland Hischier 2007-09-01
passed.
