# paper mill construction, non-integrated

Dataset: EcoSpold 2, unit process
Geography: RER
Time period: 2000-01-01 to 2023-12-31
Technology level: current
Classification: EcoSpold01Categories: paper & cardboard/graphic paper
Classification: ISIC rev.4 ecoinvent: 4290:Construction of other civil engineering projects
Tags: ConvertedDataset
Scenario: Business-as-Usual
System model: Allocation, cut-off by classification
Generated by: Roland Hischier
Published in: Hischier R. 2007
Database: ecoinvent
isCopyrightProtected: true
accessRestrictedTo: 1

## General comment
The dataset represents a non-integrated paper mill with a annual production of 368 kt and a total life time of 50 years.
[This dataset was already contained in the ecoinvent database version 2. It was not individually updated during the transfer to ecoinvent version 3. Life Cycle Impact Assessment results may still have changed, as they are affected by changes in the supply chain, i.e. in other datasets. This dataset was generated following the ecoinvent quality guidelines for version 2. It may have been subject to central changes described in the ecoinvent version 3 change report (http://www.ecoinvent.org/database/ecoinvent-version-3/reports-of-changes/), and the results of the central updates were reviewed extensively. The changes added e.g. consistent water flows and other information throughout the database. The documentation of this dataset can be found in the ecoinvent reports of version 2, which are still available via the ecoinvent website. The change report linked above covers all central changes that were made during the conversion process.]

## Included activities end
This module includes the land-use, buildings (hall and multi-story) and streets within the mill area, machineries for pulp preparation and for paper and energy production as well as the dismanteling/disposal of the whole infrastructure (without the paper machine)

## Geography
Average land-use from European paper mills, valable for whole Europe

## Technology
Typical European paper mill

## Reference product
- paper mill, non-integrated: 1 unit; By-product classification allocatable product; CPC 53269: Other constructions for manufacturing
  EcoSpold01Location=RER
  production volume 1.32237 unit
    This is a placeholder value that does not reflect real-world production volumes. This dataset does not currently require a real-world production volume to work in the database framework, and no actual data were collected yet. This has no negative effect on the results of the ecoinvent database. The placeholder value of this activity was scaled according to the nominal GDP of 2005 (source: United Nations, http://data.un.org/Glossary.aspx?q=GDP+%28current+US%24%29, accessed 20130726) to reflect an appropriate share of the global production volume, which is also a placeholder value.
  property price 2.00454e9 EUR2005
    Convert from EU 27 price to the world by currency exchange rate.
  properties: carbon allocation 0 kg, carbon content 0

## Inputs from technosphere
- building, hall, steel construction: 96600 m2; lognormal variance with pedigree 0.5181, pedigree (5,5,5,3,4)
  EcoSpold01Location=CH
  Estimated, based on information for integrated mill
  Uncertainty: Estimated, based on information for integrated mill
- building, multi-storey: 121000 m3; lognormal variance with pedigree 0.5181, pedigree (5,5,5,3,4)
  EcoSpold01Location=RER
  Estimated, based on information for integrated mill
  Uncertainty: Estimated, based on information for integrated mill
- chemical factory: 625000 kg; lognormal variance with pedigree 0.5181, pedigree (5,5,5,3,4)
  (same comment as for building, multi-storey)
- decommissioned chemical production facilities: -625000 kg; lognormal variance with pedigree 0.4781, pedigree (5,5,1,3,4)
  Estimated, based on information for integrated mill
  EcoSpold01Location=RER
  Uncertainty: Estimated, based on information for integrated mill
  production volume
    Calculated from the production volume of paper mill, non-integrated in proportion to the respective output amounts.
  properties: carbon content, fossil 0.0169382, carbon content, non-fossil 5.78006e-6, dry mass 1 kg, wet mass 1 kg
  note on carbon content, fossil: Calculated from C content in input materials in the infrastructure
- industrial furnace, 1MW, oil: 2.5 unit; lognormal variance with pedigree 0.5181, pedigree (5,5,5,3,4)
  Estimated, based on information for integrated mill
  EcoSpold01Location=CH
  Uncertainty: Estimated, based on information for integrated mill
- paper machine: 2 unit; lognormal variance with pedigree 0.4561, pedigree (5,5,5,3,3)
  (same comment as for decommissioned chemical production facilities)
- road, company, internal: 604000 m2*year; lognormal variance with pedigree 0.5181, pedigree (5,5,5,3,4)
  (same comment as for industrial furnace, 1MW, oil)
- wastewater treatment facility, capacity 1.6E8l/year: 1.67 unit; lognormal variance with pedigree 0.5181, pedigree (5,5,5,3,4)
  (same comment as for industrial furnace, 1MW, oil)

## Inputs from nature
- Occupation, construction site [natural resource, land]: 242000 m2*year; lognormal variance with pedigree 0.2381, pedigree (5,5,5,3,4)
  Estimated, based on information for integrated mill
  Uncertainty: Estimated, based on information for integrated mill
- Occupation, industrial area [natural resource, land]: 1.04e7 m2*year; lognormal variance with pedigree 0.1861, pedigree (5,5,5,3,3)
  (same comment as for Occupation, construction site)
- Transformation, from unspecified [natural resource, land]: 208000 m2; lognormal variance with pedigree 0.2761, pedigree (5,5,5,3,3)
  (same comment as for Occupation, construction site)
- Transformation, to industrial area [natural resource, land]: 208200 m2; lognormal variance with pedigree 0.2761, pedigree (5,5,5,3,3)
  (same comment as for Occupation, construction site)

## Sampling procedure
literature and estimations from similar processes

## Extrapolations
All information is estimated, based on dataset for an integrated paper mill.

## Review by Hans-Jörg Althaus 2003-07-02
passed
