# transport, freight, lorry 28 metric ton, fatty acid methyl ester 100%

Dataset: EcoSpold 2, unit process
Geography: RoW
Time period: 2000-01-01 to 2023-12-31
Technology level: current
Classification: ISIC rev.4 ecoinvent: 4923:Freight transport by road
Synonyms: truck; Heavy Duty Vehicle; Lastwagen
Scenario: Business-as-Usual
System model: Allocation, cut-off by classification
Generated by: Frédéric Gindroz
Published in: Jungbluth N. 2007
Database: ecoinvent
isCopyrightProtected: true
accessRestrictedTo: 1

## General comment
Based on Swiss 28 metric ton lorry running with vegetable oil. Inventory refers to the entire transport life cycle. For road infrastructure, expenditures and environmental interventions due to construction of roads have been allocated based on the Gross tonne kilometre performance. Expenditures due to operation of the road infrastructure, as well as land use have been allocated based on the yearly vehicle kilometre performance. For the attribution of vehicle share to the transport performance a vehicle life time performance of 3.14E06 tkm/vehicle have been assumed. An average load of 5.82 t/vehicle is assumed. The data of the energy use and combustion emissions represents average data for the operation of heavy duty vehicles (20-28t) in Switzerland, with an average load of 50%. The transport datasets 'operation of a vehicle' are related to life cycles of other products and using the reference unit of [km].

## Included activities start
The dataset starts with the consumption of rape methyl ester.

## Included activities end
Based on Swiss 28 metric ton lorry running with vegetable oil. Operation, lorry 28t, rape methyl ester 100%; lorry 28t; maintenance, lorry 28t; road; for the data of the energy use and combustion emissions: rape methyl ester, at regional storage supplies is included. Direct airborne emissions of gaseous substances, particulate matters and heavy metals are accounted for. Heavy metal emissions to water and to soil are included. Tyre abrasion is included.

## Geography
Extrapolated from 'transport, freight, lorry 28 metric ton, vegetable oil methyl ester 100%, CH 2004': The data for vehicle operation and road infrastructure reflect Swiss conditions. Data for vehicle manufacturing and maintenance represents generic European data. Data for the vehicle disposal reflect Swiss situation. The data of the energy use and combustion emissions refer to average transport conditions in Switzerland.

## Technology
Vehicle operation: Euro3. Road construction comprises bitumen and concrete roads. For the manufacturing of vehicles, the data reflects current modern technologies. operation, lorry 28t, rape methyl ester 100%. operation, lorry 28t, rape methyl ester 100%. These data include precombustion emissions, exhaust emissions or tail pipe emissions as well as non-exhaust emissions due to vehicle motion, e.g. tyre abrasion.

## Reference product
- transport, freight, lorry 28 metric ton, fatty acid methyl ester 100%: 1 metric ton*km; By-product classification allocatable product; CPC 6511: Road transport services of freight
  production volume 3.96633 metric ton*km; name transport_RP_PV
    This is a placeholder value that does not reflect real-world production volumes. This dataset does not currently require a real-world production volume to work in the database framework, and no actual data were collected yet. This has no negative effect on the results of the ecoinvent database.
  property price 0.0596283 EUR2005
    Calculated based on inputs: The price of the product has been calculated as a sum of the values of the material and energy inputs for this product. This value is therefore a rough estimation. It may underestimate the real price since there are additional expenses when producing any product. These expences can include for example labour costs, treatment of waste materials and profit for the producer. Please consider carefully whether this level of data quality is acceptable for your application.
  properties: carbon allocation 0 kg, carbon content 0

## Inputs from technosphere
- fatty acid methyl ester: 0.0458638 kg; lognormal variance with pedigree 0.2106, pedigree (5,5,5,5,5)
  Calculated value. The fuel consumption was derived from carbon balance calculation, considering the carbon content of measured tail pipe emissions of CO2, CO and CH4. Following the ecoinvent procedure, the carbon contents of NMVOC-emissions are neglected. Note that the calculated fuel consumption was not always in good correspondence with the according literature values. One possible reason for the differences is that the measurements were based on a fuel with slightly different carbon content than the fuel specified within the study; another possible reason is the neglection of the carbon content of NMVOC in the carbon balance. Energy use and combustion emissions
  Uncertainty: S
  properties: carbon content, fossil 0.041, carbon content, non-fossil 0.732, dry mass 1 kg, heating value, net 37.2 MJ, wet mass 1 kg
  note on heating value, net: Based on literature, report 17, page 439. Jungbluth, N., Chudacoff, M., Dauriat, A., Dinkel, F., Doka, G., Faist Emmenegger, M., Gnansounou, E., Kljun, N., Schleiss, K., Spielmann, M., Stettler, C., Sutter, J. 2007: Life Cycle Inventories of Bioenergy. ecoinvent report No. 17, Swiss Centre for Life Cycle Inventories, Dübendorf, CH.
- lorry, 28 metric ton: 3.18e-7 unit; lognormal variance with pedigree 0.044, pedigree (3,1,5,5,1)
  Calculated value. For consistency, the kilometric performance, the infrastructure data, and the demand factors for the transport components have been adopted from Spielmann et al. (2004), i.e. are derived from ecoinvent database. It is assumed, that these factors do not depend on the type of fuel. This means that in case of 28-t lorry, an average load of 5.82 t per vehicle was assumed.
  Uncertainty: 1
- maintenance, lorry 28 metric ton: 3.18e-7 unit; lognormal variance with pedigree 0.044, pedigree (3,1,5,5,1)
  (same comment as for lorry, 28 metric ton)
- road: 0.00199 m*year; lognormal variance with pedigree 0.044, pedigree (3,1,5,5,1)
  (same comment as for lorry, 28 metric ton)
- road maintenance: 3.18e-7 m*year; lognormal variance with pedigree 0.344, pedigree (3,1,5,5,1)
  (same comment as for lorry, 28 metric ton)

## Emissions to nature
- 1,1,1,2-Tetrafluoroethane [air, unspecified]: 3.9388e-7 kg; source EPA 2002; lognormal variance with pedigree 0.162, pedigree (1,1,5,5,1)
  Literature study and own assumptions: initial input cooling agent: 2kg/vehicle. Yearly loss 8%. Yearly kilometric performance: 70000vkm. Energy use and combustion emissions
  Further References:
  Hendriksen P., Vermeulen R.J., Rijkeboer R.C., Bremmers D., Smokers R.T.M. and Winkel R.G. (2003) Evaluation of the envrionmental impact of modern passenger cars on petrol, diesel, automotive LPG, CNG. TNO Report No. 03.OR.VM.055.1/PHE, Netherlands Organisation for Applied Scientific Research, Delft.
  Keller et al. (1998) Ökprofile von Treibstoffen. BUWAL Umwelt-Materialien Nr-104, Bern.
  Keller M., de Haan P., Knörr W., Hausberger S. and Steven H. (2004) Handobook Emission Factor for Road Transport, Version 2.1, Umweltbundesamt Berlin, Swiss Agency for the Envrionment, Forest and Landscape, Umweltbundesamt Wien, INFRAS, Bern.
  Lance D. & Andersson J. (2003) DfT Biofuels Evaluation - Final Report of Teste Programme to Evaluate Emissions Performance of Vegetable Oil Fuel on Two Light Duty Diesel Vehicles. Ricardo Consulting Engineers, West Sussex.
  Lehmann U. (2002) Bio-Ethanol Projekt, Untersuchungsbericht Nr. 202672, EMPA, Eidgenössische Materialprüfungs- und Forschungsanstalt, Dübendorf.
  Munack A., Stein H., Bünger J., Schröder O. and Krahl J. (2003) Systematiche Untersuchungen der Emissionen aus der motorischen Verbrennung von RME, MK1 und DK. FAL Bundesfroschungsanstalt für landwirtschaft, Brauschweig.
  Ohlström M., Mäkinen T. Laurikko J. and Pipatti R. (2001) New concepts for biofuels in transportation, VTT research notes.
  Scharmer K. (2001) Biodiesel, Energie- und Umweltbilanz Rapsölmethylester, UFOP Union zur Förderung von Oel- und Proteinpflanzen e.V., Bonn.
  Union zur Förderung von Oel- und Proteinpflanzen (2004): http://www.ufop.de/900.htm
  Vehicle Certification Agency (2004): http://www.vcycarfueldata.org.uk
- Ammonia [air, unspecified]: 8.6e-7 kg; source EPA 2002; lognormal variance with pedigree 0.0886, pedigree (4,3,5,5,3)
  Literature value. The emission factors were derived on the basis of a literature research (CPCB 2003; EPA 2002; Hendriksen et al. 2003; Keller et al. 1998; Keller et al. 2005; Lance and Anderson 2003; Lehmann 2002; Munack et al. 2003; Ohltröm et al. 2001; Scharmer et al. 2001; UFOP 2004; VCA 2004). Energy use and combustion emissions
  Further References:
  Hendriksen P., Vermeulen R.J., Rijkeboer R.C., Bremmers D., Smokers R.T.M. and Winkel R.G. (2003) Evaluation of the envrionmental impact of modern passenger cars on petrol, diesel, automotive LPG, CNG. TNO Report No. 03.OR.VM.055.1/PHE, Netherlands Organisation for Applied Scientific Research, Delft.
  Keller et al. (1998) Ökprofile von Treibstoffen. BUWAL Umwelt-Materialien Nr-104, Bern.
  Keller M., de Haan P., Knörr W., Hausberger S. and Steven H. (2004) Handobook Emission Factor for Road Transport, Version 2.1, Umweltbundesamt Berlin, Swiss Agency for the Envrionment, Forest and Landscape, Umweltbundesamt Wien, INFRAS, Bern.
  Lance D. & Andersson J. (2003) DfT Biofuels Evaluation - Final Report of Teste Programme to Evaluate Emissions Performance of Vegetable Oil Fuel on Two Light Duty Diesel Vehicles. Ricardo Consulting Engineers, West Sussex.
  Lehmann U. (2002) Bio-Ethanol Projekt, Untersuchungsbericht Nr. 202672, EMPA, Eidgenössische Materialprüfungs- und Forschungsanstalt, Dübendorf.
  Munack A., Stein H., Bünger J., Schröder O. and Krahl J. (2003) Systematiche Untersuchungen der Emissionen aus der motorischen Verbrennung von RME, MK1 und DK. FAL Bundesfroschungsanstalt für landwirtschaft, Brauschweig.
  Ohlström M., Mäkinen T. Laurikko J. and Pipatti R. (2001) New concepts for biofuels in transportation, VTT research notes.
  Scharmer K. (2001) Biodiesel, Energie- und Umweltbilanz Rapsölmethylester, UFOP Union zur Förderung von Oel- und Proteinpflanzen e.V., Bonn.
  Union zur Förderung von Oel- und Proteinpflanzen (2004): http://www.ufop.de/900.htm
  Vehicle Certification Agency (2004): http://www.vcycarfueldata.org.uk
  Uncertainty: M
- Benzene [air, unspecified]: 2.00242e-7 kg; source EPA 2002; lognormal variance with pedigree 0.1112, pedigree (2,3,5,5,3)
  (same comment as for Ammonia)
- Cadmium II [air, unspecified]: 7.2412e-10 kg; source Spielmann M. 2004; lognormal variance with pedigree 0.718, pedigree (4,5,5,5,1)
  Literature value. Non-exhaust emissions are mainly produced from tyre abrasion, break wear and road abrasion. Spielmann et al. (2004) give an overview of the kind and amounts of the respective emissions. Since these emission factors do not depend on the type of consumed fuel, the values given in Spielmann et al. (2004) were adopted for the present study and applied for each transport system. Energy use and combustion emissions
  Uncertainty: 1
- Carbon dioxide, fossil [air, unspecified]: 0.00682702 kg; source EPA 2002; lognormal variance with pedigree 0.0712, pedigree (2,3,5,5,3)
  (same comment as for Ammonia)
- Carbon dioxide, non-fossil [air, unspecified]: 0.122887 kg; source EPA 2002; lognormal variance with pedigree 0.0712, pedigree (2,3,5,5,3)
  (same comment as for Ammonia)
- Carbon monoxide, fossil [air, unspecified]: 8.58865e-6 kg; source EPA 2002; lognormal variance with pedigree 0.7112, pedigree (2,3,5,5,3)
  (same comment as for Ammonia)
- Carbon monoxide, non-fossil [air, unspecified]: 0.000154595 kg; source EPA 2002; lognormal variance with pedigree 0.7112, pedigree (2,3,5,5,3)
  (same comment as for Ammonia)
- Chromium III [air, unspecified]: 6.5188e-9 kg; source Spielmann M. 2004; lognormal variance with pedigree 0.718, pedigree (4,5,5,5,1)
  (same comment as for Cadmium II)
- Copper ion [air, unspecified]: 1.08532e-8 kg; source Spielmann M. 2004; lognormal variance with pedigree 0.718, pedigree (4,5,5,5,1)
  (same comment as for Cadmium II)
- Dinitrogen monoxide [air, unspecified]: 1.21062e-6 kg; source EPA 2002; lognormal variance with pedigree 0.1112, pedigree (2,3,5,5,3)
  (same comment as for Ammonia)
- Lead II [air, unspecified]: 3.612e-9 kg; source Spielmann M. 2004; lognormal variance with pedigree 0.718, pedigree (4,5,5,5,1)
  (same comment as for Cadmium II)
- Methane, fossil [air, unspecified]: 3.64554e-8 kg; source EPA 2002; lognormal variance with pedigree 0.1112, pedigree (2,3,5,5,3)
  (same comment as for Ammonia)
- Methane, non-fossil [air, unspecified]: 6.56197e-7 kg; source EPA 2002; lognormal variance with pedigree 0.1112, pedigree (2,3,5,5,3)
  (same comment as for Ammonia)
- NMVOC, non-methane volatile organic compounds [air, unspecified]: 2.7981e-5 kg; source EPA 2002; lognormal variance with pedigree 0.1112, pedigree (2,3,5,5,3)
  (same comment as for Ammonia)
- Nickel II [air, unspecified]: 5.7964e-9 kg; source Spielmann M. 2004; lognormal variance with pedigree 0.718, pedigree (4,5,5,5,1)
  (same comment as for Cadmium II)
- Nitrogen oxides [air, unspecified]: 0.00120269 kg; source EPA 2002; lognormal variance with pedigree 0.1112, pedigree (2,3,5,5,3)
  (same comment as for Ammonia)
- Particulate Matter, < 2.5 um [air, unspecified]: 2.30394e-5 kg; source Spielmann M. 2004; lognormal variance with pedigree 0.3786, pedigree (4,3,5,5,3)
  Literature value. Non-exhaust emissions are mainly produced from tyre abrasion, break wear and road abrasion. Spielmann et al. (2004) give an overview of the kind and amounts of the respective emissions. Since these emission factors do not depend on the type of consumed fuel, the values given in Spielmann et al. (2004) were adopted for the present study and applied for each transport system. Energy use and combustion emissions
  Uncertainty: M
- Particulate Matter, > 10 um [air, unspecified]: 7.36074e-5 kg; source Spielmann M. 2004; lognormal variance with pedigree 0.1186, pedigree (4,3,5,5,3)
  (same comment as for Particulate Matter, < 2.5 um)
- Particulate Matter, > 2.5 um and < 10um [air, unspecified]: 1.36692e-5 kg; source Spielmann M. 2004; lognormal variance with pedigree 0.1986, pedigree (4,3,5,5,3)
  (same comment as for Particulate Matter, < 2.5 um)
- Zinc II [air, unspecified]: 5.8136e-7 kg; source Spielmann M. 2004; lognormal variance with pedigree 0.718, pedigree (4,5,5,5,1)
  (same comment as for Cadmium II)
- Cadmium II [soil, unspecified]: 1.7888e-9 kg; source Spielmann M. 2004; lognormal variance with pedigree 0.842, pedigree (1,1,5,5,1)
  Literature value. Non-exhaust emissions are mainly produced from tyre abrasion, break wear and road abrasion. Spielmann et al. (2004) give an overview of the kind and amounts of the respective emissions. Since these emission factors do not depend on the type of consumed fuel, the values given in Spielmann et al. (2004) were adopted for the present study and applied for each transport system. Energy use and combustion emissions
- Chromium III [soil, unspecified]: 1.60992e-8 kg; source Spielmann M. 2004; lognormal variance with pedigree 0.842, pedigree (1,1,5,5,1)
  (same comment as for Cadmium II)
- Copper ion [soil, unspecified]: 2.6832e-8 kg; source Spielmann M. 2004; lognormal variance with pedigree 0.842, pedigree (1,1,5,5,1)
  (same comment as for Cadmium II)
- Lead II [soil, unspecified]: 8.944e-9 kg; source Spielmann M. 2004; lognormal variance with pedigree 0.842, pedigree (1,1,5,5,1)
  (same comment as for Cadmium II)
- Nickel II [soil, unspecified]: 1.43104e-8 kg; source Spielmann M. 2004; lognormal variance with pedigree 0.842, pedigree (1,1,5,5,1)
  (same comment as for Cadmium II)
- Zinc II [soil, unspecified]: 1.4362e-6 kg; source Spielmann M. 2004; lognormal variance with pedigree 0.842, pedigree (1,1,5,5,1)
  (same comment as for Cadmium II)
- Cadmium II [water, unspecified]: 1.7888e-9 kg; source Spielmann M. 2004; lognormal variance with pedigree 0.842, pedigree (1,1,5,5,1)
  (same comment as for Cadmium II)
- Chromium III [water, unspecified]: 1.60992e-8 kg; source Spielmann M. 2004; lognormal variance with pedigree 0.842, pedigree (1,1,5,5,1)
  (same comment as for Cadmium II)
- Copper ion [water, unspecified]: 2.6832e-8 kg; source Spielmann M. 2004; lognormal variance with pedigree 0.842, pedigree (1,1,5,5,1)
  (same comment as for Cadmium II)
- Lead II [water, unspecified]: 8.944e-9 kg; source Spielmann M. 2004; lognormal variance with pedigree 0.842, pedigree (1,1,5,5,1)
  (same comment as for Cadmium II)
- Nickel II [water, unspecified]: 1.43104e-8 kg; source Spielmann M. 2004; lognormal variance with pedigree 0.842, pedigree (1,1,5,5,1)
  (same comment as for Cadmium II)
- Zinc II [water, unspecified]: 1.4362e-6 kg; source Spielmann M. 2004; lognormal variance with pedigree 0.842, pedigree (1,1,5,5,1)
  (same comment as for Cadmium II)

## Sampling procedure
National statistics, literature studies

## Extrapolations
see Technology and Geography. This dataset has been copied from an original dataset covering the geography CH. The uncertainty has been adjusted accordingly.
