# expansion vessel production, 80l

Dataset: EcoSpold 2, unit process
Geography: RoW
Time period: 1993-01-01 to 2023-12-31
Technology level: current
Classification: ISIC rev.4 ecoinvent: 2512:Manufacture of tanks, reservoirs and containers of metal
Classification: EcoSpold01Categories: solar collector systems/production of components
Tags: ConvertedDataset
Scenario: Business-as-Usual
System model: Allocation, cut-off by classification
Generated by: Niels Jungbluth
Published in: Jungbluth, N. 2007
Database: ecoinvent
isCopyrightProtected: true
accessRestrictedTo: 1

## General comment
Expansion vessel with a capacity of 80l
[This dataset was already contained in the ecoinvent database version 2. It was not individually updated during the transfer to ecoinvent version 3. Life Cycle Impact Assessment results may still have changed, as they are affected by changes in the supply chain, i.e. in other datasets. This dataset was generated following the ecoinvent quality guidelines for version 2. It may have been subject to central changes described in the ecoinvent version 3 change report (http://www.ecoinvent.org/database/ecoinvent-version-3/reports-of-changes/), and the results of the central updates were reviewed extensively. The changes added e.g. consistent water flows and other information throughout the database. The documentation of this dataset can be found in the ecoinvent reports of version 2, which are still available via the ecoinvent website. The change report linked above covers all central changes that were made during the conversion process.]

## Included activities end
Production and disposal of an expansion vessel. Including materials and energy use of production. Not including infrastructure for factory.

## Geography
Production in CH.

## Technology
Expansion vessel (steel body with plastic) for heat exchange fluid used in a solar collector system.

## Time period
Time of information.

## Reference product
- expansion vessel, 80l: 1 unit; By-product classification allocatable product; CPC 39370: Vessels and other floating structures for breaking up; HS2017 730900: Reservoirs, tanks, vats and similar containers; for any material (excluding compressed or liquefied gas), o[...]
  EcoSpold01Location=CH
  production volume 3.96633 unit
    This is a placeholder value that does not reflect real-world production volumes. This dataset does not currently require a real-world production volume to work in the database framework, and no actual data were collected yet. This has no negative effect on the results of the ecoinvent database.
  property price 28.8 EUR2005
    The production volume of this product is small compared to other products supplied by the activities within the same ISIC 3 category. Therefore, an average price of products supplied by the activities in the same ISIC 3 code has been applied.This price is obtained as '_65 Fabricated metal products, except machinery, EU27' (3.63 EURO2003/kg dry soilds) in the 'EU & DK Input Output Database' (available in SimaPro); Weight of product according to Ecoinvent: approx 8 kg per unit
  properties: carbon allocation 0 kg, carbon content 0

## Inputs from technosphere
- alkyd paint, white, without solvent, in 60% solution state: 0.1 kg; lognormal variance with pedigree 0.0526, pedigree (2,1,5,5,1)
  Questionnaire
  EcoSpold01Location=RER
  Uncertainty: Questionnaire
  properties: carbon content, fossil 0.140367, carbon content, non-fossil 0.199629, dry mass 1 kg, heating value, net 10.3 MJ, wet mass 1 kg
  note on carbon content, fossil: C content was calculated as an addition of C content in the raw materials.
- butyl acrylate: 1.5 kg; lognormal variance with pedigree 0.0526, pedigree (2,1,5,5,1)
  EcoSpold01Location=RER
  Questionnaire
  Uncertainty: Questionnaire
  properties: carbon content, fossil 0.756757, dry mass 1 kg, heating value, net 31.22 MJ, wet mass 1 kg
- corrugated board box: 0.559064, 0.0208252, 1.22011 kg (3 suppliers, which the file names only by identifier); sum of these 1.8 kg; lognormal variance with pedigree 0.0526, pedigree (2,1,5,5,1)
  Questionnaire
  EcoSpold01Location=CH
  Uncertainty: Questionnaire
  properties: carbon content, fossil 0.000656085, carbon content, non-fossil 0.432275, dry mass 0.945 kg, heating value, net 12.86 MJ, water content 0.0582011, wet mass 1 kg
  note on carbon content, fossil: Fossil C content was calculated after fossil C contents of chemicals used in the production of board (Tab 10-15 & 10.16 ecoinvent v2.2 report 11_III, part 10)
  note on carbon content, non-fossil: Biogenic C content was calculated after biogenic C contents of chemicals used in the production of board (Tab 10.15 & 10.16, ecoinvent v2.2 report 11_III, part 10).
- electricity, medium voltage: 0.480457, 9.58405, 3.22021, 0.147133, 0.0294484, 0.00632324, 0.669225, 0.989701, 2.07346 kWh (9 suppliers, which the file names only by identifier); sum of these 17.2 kWh; lognormal variance with pedigree 0.0526, pedigree (2,1,5,5,1)
  EcoSpold01Location=CH
  Questionnaire
  Uncertainty: Questionnaire
- heat, district or industrial, other than natural gas: 37.2255, 0.0172459, 0.947274 MJ (3 suppliers, which the file names only by identifier); sum of these 38.19 MJ; lognormal variance with pedigree 0.0526, pedigree (2,1,5,5,1)
  Questionnaire
  EcoSpold01Location=CH
  Uncertainty: Questionnaire
  properties: heating value, net 1 MJ
- hot water tank factory: 4e-7 unit; lognormal variance with pedigree 0.35, pedigree (5,5,5,5,5)
  EcoSpold01Location=CH
  Rough estimation
  Uncertainty: Rough estimation
- polypropylene, granulate: 0.07 kg; lognormal variance with pedigree 0.0526, pedigree (2,1,5,5,1)
  EcoSpold01Location=RER
  Questionnaire
  Uncertainty: Questionnaire
  properties: carbon content, fossil 0.857143, dry mass 1 kg, heating value, net 32.78 MJ, wet mass 1 kg
  note on carbon content, fossil: Polypropylene is formed by the polymerisation of propylene, C3H6 (ecoinvent v2.2 report 11_II)
  note on heating value, net: Value extracted from "treatment of waste polypropylene, open burning"
- steel, low-alloyed, hot rolled: 12.2 kg; lognormal variance with pedigree 0.0526, pedigree (2,1,5,5,1)
  EcoSpold01Location=RER
  Questionnaire
  Uncertainty: Questionnaire
  properties: carbon content, fossil 0.005, dry mass 1 kg, wet mass 1 kg
  note on carbon content, fossil: Low alloyed steel composition given in Tab. 3.2 ecoinvent v2.2 report 10_partII. Steel assumed to have a C content of 0.5%
- waste paperboard, unsorted: -1.8 kg; lognormal variance with pedigree 0.0146, pedigree (2,1,3,5,1)
  Questionnaire
  EcoSpold01Location=CH
  Uncertainty: Questionnaire
  production volume
    Calculated from the production volume of expansion vessel, 80l in proportion to the respective output amounts.
  properties: carbon content, non-fossil 0.483259, dry mass 0.804 kg, heating value, net 15.92 MJ, price 0.03924 EUR2005, water content 0.243781, wet mass 1 kg
  note on carbon content, non-fossil: C content was calculated for 1 kg DM, using data in Tab A.3, ecoinvent v2.2 report 13_I.
- waste plastic, mixture: -0.000420625, -0.000399423, -1.56969, -0.0152414, -0.0129864, -0.00101837, -0.000169928, -7.7018e-5 kg (8 suppliers, which the file names only by identifier); sum of these -1.6 kg; lognormal variance with pedigree 0.0146, pedigree (2,1,3,5,1)
  EcoSpold01Location=CH
  Questionnaire
  Uncertainty: Questionnaire
  production volume
    (same comment as for waste paperboard, unsorted)
  properties: carbon content, fossil 0.747344, dry mass 0.847 kg, heating value, net 30.79 MJ, water content 0.180638, wet mass 1 kg
  note on carbon content, fossil: C content in 1 kg DM was calculated using data in Tab A.2, ecoinvent v2.2 report 13_I
  note on heating value, net: Value taken from the general comment of the treatment dataset.
- waste polypropylene: -7.63469e-6, -0.000248226, -1.47215e-6, -1.94655e-5, -0.00029133, -0.0694206, -8.03996e-6, -3.24805e-6 kg (8 suppliers, which the file names only by identifier); sum of these -0.07 kg; lognormal variance with pedigree 0.0146, pedigree (2,1,3,5,1)
  EcoSpold01Location=CH
  Questionnaire
  Uncertainty: Questionnaire
  production volume
    (same comment as for waste paperboard, unsorted)
  properties: carbon content, fossil 0.825208, dry mass 0.841 kg, heating value, net 32.78 MJ, water content 0.189061, wet mass 1 kg
  note on carbon content, fossil: C content in 1 kg DM was calculated using data in Tab A.1, ecoinvent v2.2 report 13_I
  note on heating value, net: Value assumed for all polypropylene products. Source: Phyllis2, database for (treated) biomass, algae, feedstocks for biogas production and biochar, https://phyllis.nl/Biomass/View/1186, ECN.TNO
- welding, gas, steel: 1 m; lognormal variance with pedigree 0.0526, pedigree (2,1,5,5,1)
  Questionnaire
  EcoSpold01Location=RER
  Uncertainty: Questionnaire

## Sampling procedure
Questionnaire.

## Extrapolations
Estimation that the energy for production is three times higher than for the 25l vessel. This dataset has been copied from an original dataset covering the geography CH. The uncertainty has been adjusted accordingly.

## Review by Sebastiano Meier 2003-07-16
Passed.
