# limestone production, crushed, for mill

Dataset: EcoSpold 2, unit process
Geography: CA-QC
Time period: 2012-01-01 to 2023-12-31
Technology level: current
Classification: EcoSpold01Categories: construction materials/others
Classification: ISIC rev.4 ecoinvent: 0810:Quarrying of stone, sand and clay
Tags: single enterprise data
Scenario: Business-as-Usual
System model: Allocation, cut-off by classification
Share of production covered: 100 %
Generated by: Geneviève Martineau
Published in: Kellenberger D. 2007
Database: ecoinvent
isCopyrightProtected: true
accessRestrictedTo: 1

## General comment
This dataset represents the production of crushed limestone. In Quebec, crushed limestone is generally an intermediate product (not intended for sale): Limestone, crushed is a pre-product for the milling process into lime.
Diesel and electricity consumption, as well as air emissions were provided by the only limetone producer in Quebec. A weighted average of their three (3) limestone plants is used.
No water consumption in this process: limestone is crushed without washing.
Infrastructure data was extrapolated from "limestone production, crushed, GLO 2002" ecoinvent dataset:The value of the infrastructure is normalized with a annual production capacity of about 195'000 tons of product per year. The estimated lifespan of the machines is 25 years.

## Included activities start
From limestone unprocessesd

## Included activities end
This activity ends with the limestone, crushed, for mill. In Quebec, this product is used onsite to produce pulverized limestone (see "lime, milled, loose" dataset). Not used to produce quicklime.

This dataset includes the processes: primary crushing, and onsite material transportation by conveyor belts and building machines. One part of the total heating energy for "production" and "administration" is included. Equipment included in the infrastructure: 1 crusher, 1 sieve and 1 small silo.

## Geography
Quebec data are from the only company that produces limestone on the territory. Unavalable data were extrapolated based on the GLO dataset exchanges.

## Technology
Heavy machines (excl. building machines) are operated electrically.

## Reference product
- limestone, crushed, for mill: 1 kg; name limestone_out; By-product classification allocatable product; CPC 15200: Gypsum; anhydrite; limestone flux; limestone and other calcareous stone, of a kind used for the manufacture of[…]; HS2017 252100: Limestone flux; limestone and other calcareous stone, of a kind used for the manufacture of lime or cement; CAS 1317-65-3
  EcoSpold01Location=CH
  production volume 3.3e8 kg
    Primary data for 2012 limestone crushed for mill production in Quebec. Source: Association des Producteurs de Pierre à Chaux du Québec.
  property carbon content, fossil 0.117492
    Table 3.1, ecoinvent v2.2 report 7, part VII, pg 3. MW CaCO3=100, MW MgCO3=84
  property price 0.0141398 EUR2005
    Calculated based on inputs: The price of the product has been calculated as a sum of the values of the material and energy inputs for this product. This value is therefore a rough estimation. It may underestimate the real price since there are additional expenses when producing any product. These expences can include for example labour costs, treatment of waste materials and profit for the producer. Please consider carefully whether this level of data quality is acceptable for your application.
  properties: carbon allocation 0.117257 kg, carbon content 0.117492, carbon content, non-fossil 0, dry mass 0.998 kg, heating value, net 0 MJ, water content 0.00200401, water in wet mass 0.002 kg, wet mass 1 kg

## Inputs from technosphere
- conveyor belt: 2.78e-8 m; source Kellenberger D. 2007; lognormal variance with pedigree 0.3712, pedigree (4,3,5,5,2)
  EcoSpold01Location=RER
  Extrapolated value, based on "limestone production, crushed, for mill, GLO 2002" dataset.
- diesel, burned in building machine: 0.00340282 MJ; = diesel_consumption/building_machine_yield; lognormal variance with pedigree 0.008, pedigree (1,1,4,1,1)
  Calculated value. See Exchange properties.
  Diesel is used for on site transportation of material. Source : Questionnaire.
  Uncertainty: Calculated variable. Uncertainty will be determined from propagation of uncertainty factors of underlying variables. Uncertainty of actual relation between variables not accounted at this time.
  property fuel input in physical units, kg 7.9626e-5 kg; name diesel_consumption
  property kgFuel_Input 0.0234 kg; name building_machine_yield
  properties: heating value, net 1 MJ
  note on fuel input in physical units, kg: Amount of diesel for on site transportation of 1 kg of limestone. Source: questionnaire. Considering diesel density of 0,84 kg/l (ecoinvent report 1, Table 4.6)
  note on kgFuel_Input: Amount of diesel burned in building machine per MJ. Source: "diesel, burned in building machine, GLO 2001" dataset, ecoinvent v 3.01
- electricity, medium voltage: 0.000255163 kWh; lognormal variance with pedigree 0.0101, pedigree (1,2,4,5,1)
  Measured value. Electricity is used for conveyors and rock crushers. Source: questionnaire.
  EcoSpold01Location=CH
- heat, central or small-scale, other than natural gas: 0.00141 MJ; source Kellenberger D. 2007; lognormal variance with pedigree 0.0438, pedigree (1,3,5,5,2)
  Extrapolated value, based on "limestone production, crushed, for mill, GLO 2002" dataset.
  EcoSpold01Location=CH
  properties: heating value, net 1 MJ
- industrial machine, heavy, unspecified: 6.12e-6 kg; source Kellenberger D. 2007; lognormal variance with pedigree 0.3712, pedigree (4,3,5,5,2)
  (same comment as for conveyor belt)
- limestone, unprocessed: 1 kg; = limestone_out; lognormal variance with pedigree 0.008, pedigree (1,1,4,1,1)
  EcoSpold01Location=CH
  Measured value: No loss during the process. Source questionnaire.
  Uncertainty: Calculated variable. Uncertainty will be determined from propagation of uncertainty factors of underlying variables. Uncertainty of actual relation between variables not accounted at this time
  properties: carbon content, fossil 0.117257, dry mass 0.998 kg, water content 0.00200401, wet mass 1 kg
  note on carbon content, fossil: Table 3.1, ecoinvent v2.2 report 7, part VII, pg 3. MW CaCO3=100, MW MgCO3=84. C content of limestone is 0.117257 kg/kg DM

## Emissions to nature
- Particulate Matter, < 2.5 um [air, non-urban air or from high stacks]: 1.75e-5 kg; lognormal variance with pedigree 0.308, pedigree (1,1,4,1,1)
  Measured value. Source: questionnaire.
- Particulate Matter, > 10 um [air, non-urban air or from high stacks]: 0.000148 kg; lognormal variance with pedigree 0.048, pedigree (1,1,4,1,1)
  Measured value. Source: questionnaire.
- Particulate Matter, > 2.5 um and < 10um [air, non-urban air or from high stacks]: 7.51e-5 kg; lognormal variance with pedigree 0.128, pedigree (1,1,4,1,1)
  Measured value. Source: questionnaire.

## Sampling procedure
Information provided by the only Quebec producer

## Extrapolations
A weighted average of the three limestone production plants in Quebec was used.
When no information available, GLO exchanges have been used as proxy for Quebec. The uncertainty has been adjusted accordingly.

See Geography and Technolgy fields for details.
