# treatment of bottom ash, MSWI, waste textile, soiled, slag compartment

Dataset: EcoSpold 2, unit process
Geography: GLO
Time period: 1994-01-01 to 2023-12-31
Technology level: current
Classification: ISIC rev.4 ecoinvent: 3821:Treatment and disposal of non-hazardous waste
Scenario: Business-as-Usual
System model: Allocation, cut-off by classification
Generated by: Mattia Clementi
Database: ecoinvent
isCopyrightProtected: true
accessRestrictedTo: 1

## General comment
The process represents the treatment of controlled landfilling in slag compartment of a waste (bottom ash) that is exclusively generated in another waste treatment. Bottom ash is the by-product that is generated during the municipal solid waste incineration (MSWI) of 'waste textile, soiled'. Recommended use of this dataset: to be used within the specific chain of treatments for 'waste textile, soiled'. Share of biogenic carbon in the sludge: 72.071%.

## Included activities start
The activity starts with the waste being available at the gate of the treatment facility. Collection and transportation of the waste to the treatment plant is not included.

## Included activities end
The activity ends with the waste being treated and waste-specific emissions from the slag compartment landfill are released to water (short-term emissions to surface water and long-term emissions to ground water).

## Geography
Modelling parameters affecting the treatment technology are not specific to this geography.

## Technology
Slag compartment for bottom ash from incineration with base seal and leachate collection system (Landfill type D). Recultivation after closure.

## Reference product
- bottom ash, MSWI, waste textile, soiled: -1 kg; By-product classification Waste; CPC 3932: Ash and residue (except from the manufacture of iron or steel), containing metals or metallic compounds, except[…]; HS2017 262110: Slag and ash; ash and residues from the incineration of municipal waste
  main reference product of this activity (supply of disposal service).
  production volume 9.26177e7 kg
    calculated in proportion to incinerated waste reference product
  property price 0 EUR2005
    Waste products are assigned a price of zero as they are assumed to require further treatment.
  properties: arsenic content 6.57248e-7, cadmium content 9.74089e-8, carbon allocation 0.0448434 kg, carbon content 0.0505665, carbon content, fossil 0.0141229, carbon content, non-fossil 0.0364436, chlorine content 0.000718979, chromium content 1.09301e-5, copper content 0.00144946, dry mass 0.88682 kg, lead content 0.00044962, mercury content 4.22201e-11, nickel content 5.48629e-6, nitrogen content 0.0257584, oxygen content 0.628028, phosphorus content 0.00116928, sulfur content 0.290708, thallium content 3.81414e-7, water content 0.127624, water in wet mass 0.11318 kg, wet mass 1 kg, zinc content 0.00113406

## Inputs from technosphere
- process-specific burdens, slag landfill: 0.00841689, 0.280494, 0.71109 kg (3 suppliers, which the file names only by identifier); sum of these 1 kg
  mass-specific expenditures required for landfilling of bottom ash.
- slag landfill: 1.7778e-9 unit
  slag compartment infrastructure required for landfilling of bottom ash.

## Inputs from nature
- Organic carbon, placed in landfill [inventory indicator, waste]: 0.022422 kg
  Mass of organic carbon in waste (without inorganic carbon), initially put in slag compartment. The exchange represents a flow that is within the technosphere. This exchange should only be used to apply ecofactors for the Swiss LCIA method of Ecological Scarcity and not any other purpose.
- Waste mass, total, placed in landfill [inventory indicator, waste]: 1 kg
  Mass of waste initially put in a slag compartment. The exchange represents a flow that is within the technosphere. This exchange should only be used to apply ecofactors for the Swiss LCIA method of Ecological Scarcity and not any other purpose.

## Emissions to nature
- Non-hazardous waste disposed [inventory indicator, waste]: 1 kg
  Inventory indicator for waste mass disposed. To be used in EN15804 "other data" results.
- Arsenic ion [water, ground-, long-term]: 5.8198e-7 kg; lognormal variance with pedigree 1.8916, pedigree (1,1,5,1,1)
  complement of long-term emissions from incinerator bottom ash in slag compartment
  Uncertainty: Uncertainty calculated from uncertainty of composition of incinerated waste, and incinerator model uncertainty and slag compartment transfer coefficient uncertainty.
- Arsenic ion [water, surface water]: 8.7676e-10 kg; lognormal variance with pedigree 2.4917, pedigree (1,1,5,1,1)
  short-term emissions from incinerator bottom ash in slag compartment
  Uncertainty: Uncertainty calculated from uncertainty of composition of incinerated waste, and incinerator model uncertainty and slag compartment transfer coefficient uncertainty.
- BOD5, Biological Oxygen Demand [water, ground-, long-term]: 0.018468 kg
  complement of long-term emissions from incinerator bottom ash in slag compartment
- BOD5, Biological Oxygen Demand [water, surface water]: 6.666e-5 kg; lognormal variance with pedigree 0.50271, pedigree (1,1,5,1,1)
  (same comment as for Arsenic ion)
- COD, Chemical Oxygen Demand [water, ground-, long-term]: 0.056459 kg
  complement of long-term emissions from incinerator bottom ash in slag compartment
- COD, Chemical Oxygen Demand [water, surface water]: 0.00020379 kg; lognormal variance with pedigree 0.50271, pedigree (1,1,5,1,1)
  (same comment as for Arsenic ion)
- Cadmium II [water, ground-, long-term]: 8.634e-8 kg; lognormal variance with pedigree 1.8943, pedigree (1,1,5,1,1)
  (same comment as for Arsenic ion)
- Cadmium II [water, surface water]: 4.4444e-11 kg; lognormal variance with pedigree 2.6338, pedigree (1,1,5,1,1)
  (same comment as for Arsenic ion)
- Chloride [water, ground-, long-term]: 8.685e-5 kg; lognormal variance with pedigree 0.57953, pedigree (1,1,5,1,1)
  (same comment as for Arsenic ion)
- Chloride [water, surface water]: 0.00055075 kg; lognormal variance with pedigree 0.56078, pedigree (1,1,5,1,1)
  (same comment as for Arsenic ion)
- Chromium VI [water, ground-, long-term]: 6.3427e-8 kg; lognormal variance with pedigree 4.9314, pedigree (1,1,5,1,1)
  (same comment as for Arsenic ion)
- Chromium VI [water, surface water]: 2.7718e-10 kg; lognormal variance with pedigree 2.7349, pedigree (1,1,5,1,1)
  (same comment as for Arsenic ion)
- Copper ion [water, ground-, long-term]: 0.0012854 kg; lognormal variance with pedigree 1.03852, pedigree (1,1,5,1,1)
  (same comment as for Arsenic ion)
- Copper ion [water, surface water]: 4.4628e-8 kg; lognormal variance with pedigree 2.1341, pedigree (1,1,5,1,1)
  (same comment as for Arsenic ion)
- DOC, Dissolved Organic Carbon [water, ground-, long-term]: 0.022341 kg
  complement of long-term emissions from incinerator bottom ash in slag compartment
- DOC, Dissolved Organic Carbon [water, surface water]: 8.0641e-5 kg; lognormal variance with pedigree 0.50271, pedigree (1,1,5,1,1)
  (same comment as for Arsenic ion)
- Lead II [water, ground-, long-term]: 0.00039873 kg; lognormal variance with pedigree 1.1127, pedigree (1,1,5,1,1)
  (same comment as for Arsenic ion)
- Lead II [water, surface water]: 7.2783e-9 kg; lognormal variance with pedigree 2.2933, pedigree (1,1,5,1,1)
  (same comment as for Arsenic ion)
- Mercury II [water, ground-, long-term]: 3.6461e-11 kg; lognormal variance with pedigree 1.8979, pedigree (1,1,5,1,1)
  (same comment as for Arsenic ion)
- Mercury II [water, surface water]: 9.8088e-13 kg; lognormal variance with pedigree 2.152, pedigree (1,1,5,1,1)
  (same comment as for Arsenic ion)
- Nickel II [water, ground-, long-term]: 4.8623e-6 kg; lognormal variance with pedigree 1.7735, pedigree (1,1,5,1,1)
  (same comment as for Arsenic ion)
- Nickel II [water, surface water]: 3.0638e-9 kg; lognormal variance with pedigree 2.4866, pedigree (1,1,5,1,1)
  (same comment as for Arsenic ion)
- Nitrate [water, ground-, long-term]: 0.082059 kg; lognormal variance with pedigree 0.133669, pedigree (1,1,5,1,1)
  (same comment as for Arsenic ion)
- Nitrate [water, surface water]: 0.019103 kg; lognormal variance with pedigree 0.20046, pedigree (1,1,5,1,1)
  (same comment as for Arsenic ion)
- Phosphate [water, ground-, long-term]: 4.1947e-5 kg; lognormal variance with pedigree 5.7435, pedigree (1,1,5,1,1)
  (same comment as for Arsenic ion)
- Phosphate [water, surface water]: 7.0029e-8 kg; lognormal variance with pedigree 2.2174, pedigree (1,1,5,1,1)
  (same comment as for Arsenic ion)
- Sulfate [water, ground-, long-term]: 0.70289 kg; lognormal variance with pedigree 0.29323, pedigree (1,1,5,1,1)
  (same comment as for Arsenic ion)
- Sulfate [water, surface water]: 0.070532 kg; lognormal variance with pedigree 0.42106, pedigree (1,1,5,1,1)
  (same comment as for Arsenic ion)
- TOC, Total Organic Carbon [water, ground-, long-term]: 0.022341 kg
  complement of long-term emissions from incinerator bottom ash in slag compartment
- TOC, Total Organic Carbon [water, surface water]: 8.0641e-5 kg; lognormal variance with pedigree 0.50271, pedigree (1,1,5,1,1)
  (same comment as for Arsenic ion)
- Thallium I [water, ground-, long-term]: 3.3803e-7 kg; lognormal variance with pedigree 1.8915, pedigree (1,1,5,1,1)
  (same comment as for Arsenic ion)
- Thallium I [water, surface water]: 2.13e-10 kg; lognormal variance with pedigree 2.6045, pedigree (1,1,5,1,1)
  (same comment as for Arsenic ion)
- Zinc II [water, ground-, long-term]: 0.0010057 kg; lognormal variance with pedigree 0.92525, pedigree (1,1,5,1,1)
  (same comment as for Arsenic ion)
- Zinc II [water, surface water]: 2.9938e-8 kg; lognormal variance with pedigree 2.0412, pedigree (1,1,5,1,1)
  (same comment as for Arsenic ion)
