# heat and power co-generation unit construction, 500kW electrical, components for electricity only

Dataset: EcoSpold 2, unit process
Geography: RER
Time period: 1987-01-01 to 2023-12-31
Technology level: current
Classification: EcoSpold01Categories: natural gas/cogeneration
Classification: ISIC rev.4 ecoinvent: 4220:Construction of utility projects
Tags: ConvertedDataset
Scenario: Business-as-Usual
System model: Allocation, cut-off by classification
Generated by: Thomas Heck
Published in: Heck, T. 2007
Database: ecoinvent
isCopyrightProtected: true
accessRestrictedTo: 1

## General comment
The module summarises infrastructure components of a cogeneration unit.
[This dataset was already contained in the ecoinvent database version 2. It was not individually updated during the transfer to ecoinvent version 3. Life Cycle Impact Assessment results may still have changed, as they are affected by changes in the supply chain, i.e. in other datasets. This dataset was generated following the ecoinvent quality guidelines for version 2. It may have been subject to central changes described in the ecoinvent version 3 change report (http://www.ecoinvent.org/database/ecoinvent-version-3/reports-of-changes/), and the results of the central updates were reviewed extensively. The changes added e.g. consistent water flows and other information throughout the database. The documentation of this dataset can be found in the ecoinvent reports of version 2, which are still available via the ecoinvent website. The change report linked above covers all central changes that were made during the conversion process.]

## Included activities end
The module includes all components related exclusively to electricity production.

## Geography
Extrapolated from data of a plant in Switzerland, assumed valid for Europe (RER).

## Technology
Extrapolated from data of a 160kWe lambda=1 plant, adjusted to lean burn technology currently available on market, no catalytic converters.

## Reference product
- heat and power co-generation unit, 500kW electrical, components for electricity only: 1 unit; By-product classification allocatable product; CPC 46113: Electric generating sets and rotary converters; HS2017 85: Electrical machinery and equipment and parts thereof; sound recorders and reproducers; television image and sou[...]
  EcoSpold01Location=RER
  production volume 1.32237 unit
    This is a placeholder value that does not reflect real-world production volumes. This dataset does not currently require a real-world production volume to work in the database framework, and no actual data were collected yet. This has no negative effect on the results of the ecoinvent database. The placeholder value of this activity was scaled according to the nominal GDP of 2005 (source: United Nations, http://data.un.org/Glossary.aspx?q=GDP+%28current+US%24%29, accessed 20130726) to reflect an appropriate share of the global production volume, which is also a placeholder value.
  property price 12570.9 EUR2005
    Calculated based on inputs: The price of the product has been calculated as a sum of the values of the material and energy inputs for this product. This value is therefore a rough estimation. It may underestimate the real price since there are additional expenses when producing any product. These expences can include for example labour costs, treatment of waste materials and profit for the producer. Please consider carefully whether this level of data quality is acceptable for your application.
  properties: carbon allocation 0 kg, carbon content 0

## Inputs from technosphere
- assembly of generator and motor, auxilliaries and energy use, heat and power co-generation unit, 160kW electrical: 2.22 unit; lognormal variance with pedigree 0.04, pedigree (1,1,5,1,1)
  activityLink introduced to establish a direct link to the corresponding regional supply of this product
  EcoSpold01Location=RER
- electric parts, heat and power co-generation unit, 160kW electrical: 1.7 unit; lognormal variance with pedigree 0.04, pedigree (1,1,5,1,1)
  EcoSpold01Location=RER
- generator, 200kW electrical: 2.78 unit; lognormal variance with pedigree 0.04, pedigree (1,1,5,1,1)
  EcoSpold01Location=RER

## Sampling procedure
Operator and manufacturer information

## Extrapolations
see Geography/Text, see Technolgy Text

## Review by Gerald Rebitzer (obsolete) 2003-07-03
passed
