# fibre production, jute, retting

Dataset: EcoSpold 2, unit process
Geography: BD
Time period: 2016-03-01 to 2023-12-31
Technology level: current
Classification: ISIC rev.4 ecoinvent: 1311:Preparation and spinning of textile fibres
Scenario: Business-as-Usual
System model: Allocation, cut-off by classification
Generated by: Mireille Faist Emmenegger
Published in: Faist Emmenegger, M. 2018
Database: ecoinvent
isCopyrightProtected: true
accessRestrictedTo: 1

## General comment
In practice, jute retting activity involves immersion of the bundles of jute into stagnant water in the jute cultivation field, tanks, ponds, ditches etc., or in slowly flowing clear water in canals, rivulets, rivers etc. The minimum ratio of plant material to water in the case of a stagnant water body should be 1:20. After several days of immersion, the jute fibre gets loosen from the stalk and is extracted from the jute stalk which becomes the byproduct of jute retting activity.
In Bangladesh, since the retting activity is usually accomplished either on the jute growing field or in canals, and sometime rivers during the rainy season, the wastewater from the jute retting process gets either diluted by rainwater or washed away. Accordingly, the wastewater gets naturally assimilated and does not need any waste water treatment. The environmental impacts of wastewater from jute retting process is minimal.
Moreover, even if the jute plants needs transportation from the field to another place for subsequent processing, it is usually done for a very short distance to pretty nearby places. Therefore, the only input that has been considered for the jute retting activity is water.
http://jute.org/retting.html
[This dataset was corrected on 20230912 regarding the amount of jute plant, harvested used (now in fresh matter; before it was in dry matter and thus different than the IN dataset). Due to this correction, also the amount of water and transport was corrected reflecting the amount of jute plant, harvested used.]

## Included activities start
The activity starts with the immersion of the jute plant bundles into the water.

## Included activities end
The activity ends with the extraction of the jute fibres from the retted plants. In Bangladesh, Single Stem Stripping is mostly used to extract fibres. It is done manually by hand. The Jute Fibre then gets dried in the sun.

## Geography
Bangladesh

## Reference product
- stalk: 1 kg; name BP_amount_1; By-product classification allocatable product; CPC 01929: Other fibre crops, raw, n.e.c.; HS2017 530500: Coconut, abaca (Manila hemp or Musa textilis Nee), ramie and other vegetable textile fibres n.e.c., raw or [...]
  production volume 2.24569e9 kg; = RP_PV_1 * (BP_amount_1 / RP_amount_1)
    Calculated from production volume of reference product using the relative outputs.
  property heating value, net 13.79 MJ
    net (lower) heating (calorific) value. lower calorific value of jute stalk is 3300 kcal/kg (CDM, CER methodology)
  property price 0.00702 EUR2005
    Temporary price data.The price of jute fibre is 0.227 Euro (calculated as 90% of purchasers price based on: 2005 import and export prices (total trades (USD) divided by total weight (kg) in biggest economies of the world: EU27, USA, Brasil, China, India, Japan and Russia) from UN Commodity Trade Statistics Database (http://data.un.org/Explorer.aspxDatabase [Accessed 2011.06.20]). Commodity: Jute and other textile bast fibres, raw or retted)). When producing 1kg of jute fibre, 1.7027kg of stalk is produced as a by-product. The economic allocation factor in eiv2.2 was 95% for jute fibre and 5% for stalk. Following this assumption the price of the stalk is calculated to be ((0.05*0.227)/(1.7027-0.05*1.7027)=) 0.007 Euro.
  properties: allocation factor 0.0414985, carbon allocation 0.382479 kg, carbon content 0.43507, carbon content, fossil 0, carbon content, non-fossil 0.43507, dry mass 0.879121 kg, true value 0.009828, water content 0.1375, water in wet mass 0.120879 kg, wet mass 1 kg

## Inputs from technosphere
- jute plant, harvested: 0.400458 kg; name jute_plant; = 2.4/DM_jute
  The output of the jute cultivation activity. Mature jute plant is harvested. Jute is generally harvested when the plants are at early pod stage. The harvest index remains more or less constant over 60–105 day period following sowing. However, it reaches its peak during 110-120 day period following sowing.
  The plants are usually cut close to the ground by hand. A curved, sickle type knife is used to cut the plants. The plants are then sorted out according to height and diameter. The assorted plants are tied into bundles. Each bundle weighs 8-10 kg. The bundles are kept standing in the field for 3–4 days for defoliation.
  property dry mass 0.177647 kg; name DM_jute
  properties: carbon content, non-fossil 0.475, water content 4.62914, wet mass 1 kg
- transport, freight, lorry, unspecified: 0.00600687 metric ton*km; = (jute_plant/1000)*15; lognormal variance with pedigree 0.0106, pedigree (4,1,3,1,1)
  The plants are transported from nearby fields; the estimated distance is 15 km.

## Inputs from nature
- Water, unspecified natural origin [natural resource, in water]: 0.00800917 m3; = jute_plant*20/1000; lognormal variance with pedigree 0.125577, pedigree (4,1,3,1,1)
  1 kg jute fibre as output of retting process requires 13.5 kg fresh jute. Again, the minimum ratio of plant material to water in stagnant water should be 1:20.

## Emissions to nature
- Water [air, unspecified]: 0.000320719 m3; = 10.81982388/1000
  Balance for the water included in the jute plant.
- Water [water, surface water]: 0.00800917 m3; = jute_plant*20/1000; lognormal variance with pedigree 0.125577, pedigree (4,1,3,1,1)
  Balance of water. 1 kg jute fibre as output of retting process requires 13.5 kg fresh jute. Again, the minimum ratio of plant material to water in stagnant water should be 1:20.

## Sampling procedure
Focus group discussion, expert interviews, literature data and assumptions. Data collection started off with the existing literature data survey. Bangladesh Yearbook of Agricultural Statistics documents the production statistics of jute goods. Bangladesh Agricultural Information Service describes a standard agricultural practice for the jute cultivation in Bangladesh. The literature data were supported by a total of three focus group discussions among the jute farmers and agricultural extension officers of jute growing areas in Bangladesh. Standardized questionnaires were developed and adapted to jute-specific cultivation and post-harvest situation. The secondary data from literature and the primary data from surveys were compared and matched to obtain highest data quality. The collected data on inputs to the field activities are then used to calculate impacts by using the Agriculture Life Cycle Inventory Generator tool from Quantis International.

## Extrapolations
The data on inputs to the field activites are collected directly from the farmers and farming experts.
