# treatment of municipal solid waste, open dump, hyperarid infiltration class (-250mm)

Dataset: EcoSpold 2, unit process
Geography: GLO
Time period: 2006-01-01 to 2023-12-31
Technology level: current
Classification: ISIC rev.4 ecoinvent: 3821:Treatment and disposal of non-hazardous waste
Scenario: Business-as-Usual
System model: Allocation, cut-off by classification
Generated by: Nikolia Stoikou
Database: ecoinvent
isCopyrightProtected: true
accessRestrictedTo: 1

## General comment
This dataset represents the activity of waste disposal of 'municipal solid waste' in a open dump. Recommended use of this dataset: open dumping of mixed municipal waste in a hypararid water infiltration class location. Not suitable to represent any single specific waste material, like plastics, paper, cardboard. If your waste is a specific mixture of waste materials, inventory the respective waste materials individually. Inventoried waste contains several fractions: 21% paper; 8% Mixed cardboard; 15% plastics; 3% laminated materials; 2% laminated packaging, e.g. drinks cartons; 3% combined goods e.g. diapers; 3% glass; 2% textiles; 8% minerals; 9% natural products; 22% compostable material; 2.65% inert metals; 1% volatile metals; 0.0065% batteries; 0.34% electronic goods. Waste composition (wet, in ppmw): gross heating value 13.27 MJ/kg; net heating value 11.74 MJ/kg; H2O 228830; O 257060; H 48250; C 334230; S 1119; N 3123.8; P 893.79; B 7.1933; Cl 6866.2; Br 13.552; F 56.358; I 0.0121; Ag 0.714; As 0.62521; Ba 149.04; Cd 11.748; Co 1.3453; Cr 315.21; Cu 1212.8; Hg 1.4424; Mn 259.36; Mo 1.9551; Ni 107.38; Pb 502.42; Sb 22.564; Se 0.31969; Sn 73.44; V 9.2147; Zn 1311.2; Be na; Sc na; Sr na; Ti na; Tl na; W na; Si 48510; Fe 29996; Ca 14062; Al 12420; K 2059.7; Mg 3377.7; Na 5143.9. Share of carbon in initial waste that is biogenic 60.4%. Share of metals in waste not oxidised and bulk-recyclable (exclude very small or thin parts) Iron: 60.03%; Alu: 17.81%; Copper: 72.83%. Overall degradability of waste during 100 years: 18.73%. Degradability of composing waste fractions: paper: 27%; Mixed cardboard: 32.4%; plastics: 1%; laminated materials: 18%; laminated packaging, e.g. drinks cartons: 18%; combined goods e.g. diapers: 18%; glass: 0%; textiles: 12%; minerals: 0%; natural products: 27%; compostable material: 27%; inert metals: 10%; volatile metals: 0%; batteries: 0%; electronic goods: 0%; . 0.04873 kg waste mass remains in the landfill even after the long term period.

## Included activities start
The activity starts with the waste being available at the location (gate) of the uncontrolled disposal. Collection and transportation of the waste to the uncontrolled disposal location is not included.

## Included activities end
The activity ends with the waste being disposed, in an uncontrolled manner and waste-specific emissions from open dump are released to air via gas, air and soil via windblown evaporites, and to groundwater.

## Geography
This dataset represents an open dump location of 'infiltration class 1 hyperarid'. Location site with mean annual temperature (MAT) of 8 degC, mean annual precipitation (MAP) of 350 mm/year, and net infiltration of -250 mm/year. Negative infiltration means that leachate flow is reversed and flows upward to the surface, where waste is evaporated and dissolved solids become solid evaporites. Temperature at site can result in permafrost conditions, which slows down water flow by a factor of (alpha t) 0.999. Total climate adjustments with alpha pt of 0.999. The leachate percolating through the open dump has an average residence time of 7.01 years.
Reference for climatic parameters: Doka, G., 2018, Inventory parameters for regionalised waste disposal mixes

## Technology
This is an inventory for an open, uncontrolled waste dump for municipal solid waste. Ultimate average landfill height is 7 meters. Operation phase duration is 15 years. The total, waste-specific raw landfill gas mass produced in the landfill is 0.1106 kg. The total CH4 mass in the raw landfill gas is 0.05454 kg. Percentage of landfill gas directly emitted is 100w%. A Methane Correction Factor (MCF) for landfill air emissions of 0.7057 is employed. Leachate of the landfill is not treated, but emitted untreated. Leachate flow is upward to the surface due to net negative infiltration. No leachate treatment can be performed. Based on average waste composition and chosen climate data the end of carbonate phase is estimated to be reached 3'171 years after waste deposition. Arid conditions at this location prompt formation of evaporites from landfill contents which are partially eroded by wind. It is assumed that 10% of these evaporites are eroded by wind and airborne. Initial decay in the first 100 years of this waste results in a wind erosion rate corresponding to 97.23 g/m2.year and long-term decay corresponds to wind erosion of 7.135 g/m2.year.

## Reference product
- municipal solid waste: -1 kg; By-product classification Waste; CPC 39910: Municipal waste; HS2017 382510: Residual products of the chemical or allied industries, not elsewhere specified or included; municipal waste
  main reference product of this activity
  production volume 6.2e10 kg
    Estimated based on the total amount of this waste being treated in the database. The value is then adjusted to reflect the current treatment in the given geography
  property price 0 EUR2005
    Waste products are assigned a price of zero as they are assumed to require further treatment.
  properties: aluminium content 0.0161048, antimony content 2.92588e-5, arsenic content 8.10725e-7, barium content 0.000193261, boron content 9.32769e-6, bromine content 1.75732e-5, cadmium content 1.52333e-5, calcium content 0.0182347, carbon allocation 0.334231 kg, carbon content 0.433405, carbon content, fossil 0.171573, carbon content, non-fossil 0.261832, chlorine content 0.00890356, chromium content 0.000408741, cobalt content 1.74444e-6, copper content 0.00157262, dry mass 0.771174 kg, fluorine content 7.30809e-5, heating value, gross 13.2716 MJ, heating value, net 11.742 MJ, hydrogen content 0.0625675, iodine content 1.56904e-8, iron content 0.038897, lead content 0.000651503, magnesium content 0.0043799, manganese content 0.000336318, mercury content 1.87038e-6, molybdenum content 2.53517e-6, nickel content 0.000139246, nitrogen content 0.00405077, oxygen content 0.333341, phosphorus content 0.001159, potassium content 0.00267086, selenium content 4.14548e-7, silicon content 0.0629038, silver content 9.25861e-7, sodium content 0.00667017, sulfur content 0.00145107, tin content 9.52314e-5, vanadium content 1.19489e-5, water content 0.296725, water in wet mass 0.228826 kg, wet mass 1 kg, zinc content 0.00170033

## Inputs from nature
- Organic carbon, placed in landfill [inventory indicator, waste]: 0.33423 kg; lognormal variance with pedigree 0.040731, pedigree (1,1,4,1,1)
  organic carbon placed in open dump (for ecoscarcity LCIA only);
- Waste mass, total, placed in landfill [inventory indicator, waste]: 1 kg; lognormal variance with pedigree 0.008, pedigree (1,1,4,1,1)
  waste mass placed in open dump (for ecoscarcity LCIA only);
- Occupation, dump site [natural resource, land]: 0.0035714 m2*year; lognormal variance with pedigree 0.32902, pedigree (1,1,4,1,1)
  for operation phase of open dump area;
- Transformation, from pasture, man made [natural resource, land]: 0.00014286 m2; lognormal variance with pedigree 0.32902, pedigree (1,1,4,1,1)
  for initial conversion of open dump;
- Transformation, to dump site [natural resource, land]: 0.00014286 m2; lognormal variance with pedigree 0.32902, pedigree (1,1,4,1,1)
  conversion to open dump area;

## Emissions to nature
- Aluminium III [air, low population density, long-term]: 0.0012324 kg; lognormal variance with pedigree 0.34967, pedigree (1,1,4,1,1)
  windblown leachate evaporites from open dump in arid climate;
- Aluminium III [air, non-urban air or from high stacks]: 9.5968e-6 kg; lognormal variance with pedigree 0.74093, pedigree (1,1,4,1,1)
  Contributions: landfill gas emission from open dump and from windblown leachate evaporites in arid climate;
- Antimony ion [air, low population density, long-term]: 1.6347e-7 kg; lognormal variance with pedigree 1.9298, pedigree (1,1,4,1,1)
  windblown leachate evaporites from open dump in arid climate;
- Antimony ion [air, non-urban air or from high stacks]: 1.2936e-8 kg; lognormal variance with pedigree 1.5933, pedigree (1,1,4,1,1)
  (same comment as for Aluminium III)
- Arsenic ion [air, low population density, long-term]: 8.3708e-9 kg; lognormal variance with pedigree 1.9298, pedigree (1,1,4,1,1)
  windblown leachate evaporites from open dump in arid climate;
- Arsenic ion [air, non-urban air or from high stacks]: 3.4206e-9 kg; lognormal variance with pedigree 1.6027, pedigree (1,1,4,1,1)
  (same comment as for Aluminium III)
- Barium II [air, low population density, long-term]: 1.3807e-5 kg; lognormal variance with pedigree 0.91737, pedigree (1,1,4,1,1)
  windblown leachate evaporites from open dump in arid climate;
- Barium II [air, non-urban air or from high stacks]: 1.0989e-6 kg; lognormal variance with pedigree 1.0598, pedigree (1,1,4,1,1)
  (same comment as for Aluminium III)
- Boron [air, low population density, long-term]: 7.1933e-16 kg; lognormal variance with pedigree 1.9298, pedigree (1,1,4,1,1)
  windblown leachate evaporites from open dump in arid climate;
- Boron [air, non-urban air or from high stacks]: 7.1933e-7 kg; lognormal variance with pedigree 1.3194, pedigree (1,1,4,1,1)
  landfill gas emission from open dump and from windblown leachate evaporites in arid climate;
- Bromine [air, low population density, long-term]: 1.1843e-6 kg; lognormal variance with pedigree 1.2368, pedigree (1,1,4,1,1)
  windblown leachate evaporites from open dump in arid climate;
- Bromine [air, non-urban air or from high stacks]: 1.9216e-7 kg; lognormal variance with pedigree 1.1452, pedigree (1,1,4,1,1)
  (same comment as for Aluminium III)
- Cadmium II [air, low population density, long-term]: 1.1607e-6 kg; lognormal variance with pedigree 1.2546, pedigree (1,1,4,1,1)
  windblown leachate evaporites from open dump in arid climate;
- Cadmium II [air, non-urban air or from high stacks]: 1.4863e-8 kg; lognormal variance with pedigree 1.4752, pedigree (1,1,4,1,1)
  (same comment as for Aluminium III)
- Calcium II [air, low population density, long-term]: 0.0013749 kg; lognormal variance with pedigree 0.33513, pedigree (1,1,4,1,1)
  windblown leachate evaporites from open dump in arid climate;
- Calcium II [air, non-urban air or from high stacks]: 3.1386e-5 kg; lognormal variance with pedigree 0.60345, pedigree (1,1,4,1,1)
  (same comment as for Aluminium III)
- Carbon dioxide, fossil [air, non-urban air or from high stacks]: 0.0052891 kg; lognormal variance with pedigree 0.12405, pedigree (1,1,4,1,1)
  landfill gas emission from open dump;
- Carbon dioxide, non-fossil [air, non-urban air or from high stacks]: 0.11573 kg; lognormal variance with pedigree 0.12405, pedigree (1,1,4,1,1)
  landfill gas emission from open dump;
- Chromium III [air, low population density, long-term]: 1.0216e-7 kg; lognormal variance with pedigree 1.9298, pedigree (1,1,4,1,1)
  windblown leachate evaporites from open dump in arid climate;
- Chromium III [air, non-urban air or from high stacks]: 3.375e-8 kg; lognormal variance with pedigree 1.4553, pedigree (1,1,4,1,1)
  (same comment as for Aluminium III)
- Cobalt II [air, low population density, long-term]: 1.2292e-7 kg; lognormal variance with pedigree 1.5395, pedigree (1,1,4,1,1)
  windblown leachate evaporites from open dump in arid climate;
- Cobalt II [air, non-urban air or from high stacks]: 1.1631e-8 kg; lognormal variance with pedigree 1.6658, pedigree (1,1,4,1,1)
  (same comment as for Aluminium III)
- Copper ion [air, low population density, long-term]: 0.00012125 kg; lognormal variance with pedigree 0.64049, pedigree (1,1,4,1,1)
  windblown leachate evaporites from open dump in arid climate;
- Copper ion [air, non-urban air or from high stacks]: 2.9159e-8 kg; lognormal variance with pedigree 1.473, pedigree (1,1,4,1,1)
  (same comment as for Aluminium III)
- Hydrochloric acid [air, low population density, long-term]: 0.00056074 kg; lognormal variance with pedigree 0.42293, pedigree (1,1,4,1,1)
  windblown leachate evaporites from open dump in arid climate;
- Hydrochloric acid [air, non-urban air or from high stacks]: 0.00014203 kg; lognormal variance with pedigree 0.40291, pedigree (1,1,4,1,1)
  (same comment as for Aluminium III)
- Hydrogen fluoride [air, low population density, long-term]: 4.9761e-6 kg; lognormal variance with pedigree 1.0475, pedigree (1,1,4,1,1)
  windblown leachate evaporites from open dump in arid climate;
- Hydrogen fluoride [air, non-urban air or from high stacks]: 5.9228e-6 kg; lognormal variance with pedigree 1.1416, pedigree (1,1,4,1,1)
  (same comment as for Aluminium III)
- Iodine [air, low population density, long-term]: 3.7678e-10 kg; lognormal variance with pedigree 1.9298, pedigree (1,1,4,1,1)
  windblown leachate evaporites from open dump in arid climate;
- Iodine [air, non-urban air or from high stacks]: 9.3689e-10 kg; lognormal variance with pedigree 1.7093, pedigree (1,1,4,1,1)
  (same comment as for Aluminium III)
- Iron ion [air, low population density, long-term]: 0.0029965 kg; lognormal variance with pedigree 0.24945, pedigree (1,1,4,1,1)
  windblown leachate evaporites from open dump in arid climate;
- Iron ion [air, non-urban air or from high stacks]: 3.1117e-6 kg; lognormal variance with pedigree 0.89286, pedigree (1,1,4,1,1)
  (same comment as for Aluminium III)
- Lead II [air, low population density, long-term]: 5.0225e-5 kg; lognormal variance with pedigree 0.7559, pedigree (1,1,4,1,1)
  windblown leachate evaporites from open dump in arid climate;
- Lead II [air, non-urban air or from high stacks]: 1.6899e-8 kg; lognormal variance with pedigree 1.5429, pedigree (1,1,4,1,1)
  (same comment as for Aluminium III)
- Magnesium [air, low population density, long-term]: 0.00029693 kg; lognormal variance with pedigree 0.51014, pedigree (1,1,4,1,1)
  windblown leachate evaporites from open dump in arid climate;
- Magnesium [air, non-urban air or from high stacks]: 4.0926e-5 kg; lognormal variance with pedigree 0.60933, pedigree (1,1,4,1,1)
  (same comment as for Aluminium III)
- Manganese II [air, low population density, long-term]: 2.5342e-5 kg; lognormal variance with pedigree 0.8434, pedigree (1,1,4,1,1)
  windblown leachate evaporites from open dump in arid climate;
- Manganese II [air, non-urban air or from high stacks]: 5.9505e-7 kg; lognormal variance with pedigree 1.1068, pedigree (1,1,4,1,1)
  (same comment as for Aluminium III)
- Mercury II [air, low population density, long-term]: 1.4382e-7 kg; lognormal variance with pedigree 1.5299, pedigree (1,1,4,1,1)
  windblown leachate evaporites from open dump in arid climate;
- Mercury II [air, non-urban air or from high stacks]: 1.4954e-9 kg; lognormal variance with pedigree 1.8806, pedigree (1,1,4,1,1)
  (same comment as for Aluminium III)
- Methane, fossil [air, non-urban air or from high stacks]: 0.0012548 kg; lognormal variance with pedigree 0.16458, pedigree (1,1,4,1,1)
  landfill gas emission from open dump;
- Methane, non-fossil [air, non-urban air or from high stacks]: 0.027456 kg; lognormal variance with pedigree 0.16458, pedigree (1,1,4,1,1)
  landfill gas emission from open dump;
- Molybdenum VI [air, low population density, long-term]: 5.7393e-8 kg; lognormal variance with pedigree 1.8593, pedigree (1,1,4,1,1)
  windblown leachate evaporites from open dump in arid climate;
- Molybdenum VI [air, non-urban air or from high stacks]: 5.6402e-9 kg; lognormal variance with pedigree 1.7273, pedigree (1,1,4,1,1)
  (same comment as for Aluminium III)
- Nickel II [air, low population density, long-term]: 1.07e-5 kg; lognormal variance with pedigree 0.96055, pedigree (1,1,4,1,1)
  windblown leachate evaporites from open dump in arid climate;
- Nickel II [air, non-urban air or from high stacks]: 3.8435e-8 kg; lognormal variance with pedigree 1.4444, pedigree (1,1,4,1,1)
  (same comment as for Aluminium III)
- Nitrate [air, low population density, long-term]: 0.00068634 kg; lognormal variance with pedigree 0.53177, pedigree (1,1,4,1,1)
  windblown leachate evaporites from open dump in arid climate;
- Nitrate [air, non-urban air or from high stacks]: 0.0006522 kg; lognormal variance with pedigree 0.53512, pedigree (1,1,4,1,1)
  (same comment as for Boron)
- Nitrogen oxides [air, non-urban air or from high stacks]: 8.6435e-7 kg; lognormal variance with pedigree 0.79411, pedigree (1,1,4,1,1)
  landfill gas emission from open dump;
- Particulate Matter, < 2.5 um [air, low population density, long-term]: 0.01221 kg; lognormal variance with pedigree 0.51352, pedigree (1,1,4,1,1)
  windblown leachate evaporites from open dump in arid climate;
- Particulate Matter, < 2.5 um [air, non-urban air or from high stacks]: 0.00027781 kg; lognormal variance with pedigree 0.65117, pedigree (1,1,4,1,1)
  (same comment as for Boron)
- Particulate Matter, > 10 um [air, low population density, long-term]: 0.030526 kg; lognormal variance with pedigree 0.25288, pedigree (1,1,4,1,1)
  windblown leachate evaporites from open dump in arid climate;
- Particulate Matter, > 10 um [air, non-urban air or from high stacks]: 0.00069451 kg; lognormal variance with pedigree 0.39053, pedigree (1,1,4,1,1)
  (same comment as for Boron)
- Particulate Matter, > 2.5 um and < 10um [air, low population density, long-term]: 0.018315 kg; lognormal variance with pedigree 0.33189, pedigree (1,1,4,1,1)
  windblown leachate evaporites from open dump in arid climate;
- Particulate Matter, > 2.5 um and < 10um [air, non-urban air or from high stacks]: 0.00041671 kg; lognormal variance with pedigree 0.46954, pedigree (1,1,4,1,1)
  (same comment as for Boron)
- Phosphorus [air, low population density, long-term]: 5.919e-6 kg; lognormal variance with pedigree 1.9298, pedigree (1,1,4,1,1)
  windblown leachate evaporites from open dump in arid climate;
- Phosphorus [air, non-urban air or from high stacks]: 1.3538e-6 kg; lognormal variance with pedigree 0.99613, pedigree (1,1,4,1,1)
  (same comment as for Boron)
- Potassium I [air, low population density, long-term]: 0.00016325 kg; lognormal variance with pedigree 0.57449, pedigree (1,1,4,1,1)
  windblown leachate evaporites from open dump in arid climate;
- Potassium I [air, non-urban air or from high stacks]: 4.2817e-5 kg; lognormal variance with pedigree 0.63052, pedigree (1,1,4,1,1)
  (same comment as for Aluminium III)
- Selenium IV [air, low population density, long-term]: 6.6196e-9 kg; lognormal variance with pedigree 1.9298, pedigree (1,1,4,1,1)
  windblown leachate evaporites from open dump in arid climate;
- Selenium IV [air, non-urban air or from high stacks]: 6.1063e-10 kg; lognormal variance with pedigree 1.9298, pedigree (1,1,4,1,1)
  (same comment as for Aluminium III)
- Silicon [air, low population density, long-term]: 7.3434e-5 kg; lognormal variance with pedigree 1.9298, pedigree (1,1,4,1,1)
  windblown leachate evaporites from open dump in arid climate;
- Silicon [air, non-urban air or from high stacks]: 2.0787e-5 kg; lognormal variance with pedigree 0.66256, pedigree (1,1,4,1,1)
  (same comment as for Aluminium III)
- Silver I [air, low population density, long-term]: 7.14e-8 kg; lognormal variance with pedigree 1.621, pedigree (1,1,4,1,1)
  windblown leachate evaporites from open dump in arid climate;
- Sodium I [air, low population density, long-term]: 0.00040925 kg; lognormal variance with pedigree 0.45882, pedigree (1,1,4,1,1)
  windblown leachate evaporites from open dump in arid climate;
- Sodium I [air, non-urban air or from high stacks]: 0.00010537 kg; lognormal variance with pedigree 0.51647, pedigree (1,1,4,1,1)
  (same comment as for Aluminium III)
- Sulfate [air, low population density, long-term]: 0.00030813 kg; lognormal variance with pedigree 0.65156, pedigree (1,1,4,1,1)
  windblown leachate evaporites from open dump in arid climate;
- Sulfate [air, non-urban air or from high stacks]: 2.3463e-5 kg; lognormal variance with pedigree 0.8041, pedigree (1,1,4,1,1)
  (same comment as for Boron)
- Sulfur dioxide [air, non-urban air or from high stacks]: 2.7407e-5 kg; lognormal variance with pedigree 0.99153, pedigree (1,1,4,1,1)
  landfill gas emission from open dump;
- Tin ion [air, low population density, long-term]: 7.3426e-6 kg; lognormal variance with pedigree 1.0111, pedigree (1,1,4,1,1)
  windblown leachate evaporites from open dump in arid climate;
- Tin ion [air, non-urban air or from high stacks]: 1.3662e-9 kg; lognormal variance with pedigree 1.8777, pedigree (1,1,4,1,1)
  (same comment as for Aluminium III)
- Vanadium V [air, low population density, long-term]: 1.9727e-7 kg; lognormal variance with pedigree 1.8754, pedigree (1,1,4,1,1)
  windblown leachate evaporites from open dump in arid climate;
- Vanadium V [air, non-urban air or from high stacks]: 1.8286e-8 kg; lognormal variance with pedigree 1.5654, pedigree (1,1,4,1,1)
  (same comment as for Aluminium III)
- Water [air, non-urban air or from high stacks]: 5.9278e-5 m3; lognormal variance with pedigree 0.11132, pedigree (1,1,4,1,1)
  from water contained in landfilled waste, released to air in arid sites;
- Zinc II [air, low population density, long-term]: 0.0001309 kg; lognormal variance with pedigree 0.63036, pedigree (1,1,4,1,1)
  windblown leachate evaporites from open dump in arid climate;
- Zinc II [air, non-urban air or from high stacks]: 2.2937e-7 kg; lognormal variance with pedigree 1.2061, pedigree (1,1,4,1,1)
  (same comment as for Aluminium III)
- Non-hazardous waste disposed [inventory indicator, waste]: 1 kg; lognormal variance with pedigree 0.008, pedigree (1,1,4,1,1)
  EN15804 waste mass in sanitary landfill;
- Aluminium III [soil, industrial]: 0.011178 kg; lognormal variance with pedigree 0.34432, pedigree (1,1,4,1,1)
  Contributions: from leachate evaporites in hyperarid climate in open dump;
- Antimony ion [soil, industrial]: 1.5874e-6 kg; lognormal variance with pedigree 1.9298, pedigree (1,1,4,1,1)
  Contributions: from leachate evaporites in hyperarid climate in open dump;
- Arsenic ion [soil, industrial]: 1.0234e-7 kg; lognormal variance with pedigree 1.9298, pedigree (1,1,4,1,1)
  Contributions: from leachate evaporites in hyperarid climate in open dump;
- Barium II [soil, industrial]: 0.00013413 kg; lognormal variance with pedigree 0.82781, pedigree (1,1,4,1,1)
  Contributions: from leachate evaporites in hyperarid climate in open dump;
- Boron [soil, industrial]: 6.4739e-6 kg; lognormal variance with pedigree 1.3194, pedigree (1,1,4,1,1)
  Contributions: from leachate evaporites in hyperarid climate in open dump;
- Bromine [soil, industrial]: 1.2176e-5 kg; lognormal variance with pedigree 1.0644, pedigree (1,1,4,1,1)
  Contributions: from leachate evaporites in hyperarid climate in open dump;
- Cadmium II [soil, industrial]: 1.0572e-5 kg; lognormal variance with pedigree 1.2348, pedigree (1,1,4,1,1)
  Contributions: from leachate evaporites in hyperarid climate in open dump;
- Calcium II [soil, industrial]: 0.012656 kg; lognormal variance with pedigree 0.32141, pedigree (1,1,4,1,1)
  Contributions: from leachate evaporites in hyperarid climate in open dump;
- Carbon [soil, industrial]: 0.25172 kg; lognormal variance with pedigree 0.042085, pedigree (1,1,4,1,1)
  Contributions: from leachate evaporites in hyperarid climate in open dump;
- Chloride [soil, industrial]: 0.0061639 kg; lognormal variance with pedigree 0.31698, pedigree (1,1,4,1,1)
  Contributions: from leachate evaporites in hyperarid climate in open dump;
- Chromium III [soil, industrial]: 1.2225e-6 kg; lognormal variance with pedigree 1.9298, pedigree (1,1,4,1,1)
  Contributions: from leachate evaporites in hyperarid climate in open dump;
- Cobalt II [soil, industrial]: 1.2107e-6 kg; lognormal variance with pedigree 1.4011, pedigree (1,1,4,1,1)
  Contributions: from leachate evaporites in hyperarid climate in open dump;
- Copper ion [soil, industrial]: 0.0010915 kg; lognormal variance with pedigree 0.64015, pedigree (1,1,4,1,1)
  Contributions: from leachate evaporites in hyperarid climate in open dump;
- Fluoride [soil, industrial]: 4.575e-5 kg; lognormal variance with pedigree 1.0166, pedigree (1,1,4,1,1)
  Contributions: from leachate evaporites in hyperarid climate in open dump;
- Heat, waste [soil, industrial]: 1.7319 MJ; lognormal variance with pedigree 0.11094, pedigree (1,1,4,1,1)
  from decomposed waste material in open dump;
- Iodide [soil, industrial]: 1.0786e-8 kg; lognormal variance with pedigree 1.4756, pedigree (1,1,4,1,1)
  Contributions: from leachate evaporites in hyperarid climate in open dump;
- Iron ion [soil, industrial]: 0.026997 kg; lognormal variance with pedigree 0.24883, pedigree (1,1,4,1,1)
  Contributions: from leachate evaporites in hyperarid climate in open dump;
- Lead II [soil, industrial]: 0.00045218 kg; lognormal variance with pedigree 0.75537, pedigree (1,1,4,1,1)
  Contributions: from leachate evaporites in hyperarid climate in open dump;
- Magnesium [soil, industrial]: 0.0030398 kg; lognormal variance with pedigree 0.42079, pedigree (1,1,4,1,1)
  Contributions: from leachate evaporites in hyperarid climate in open dump;
- Manganese II [soil, industrial]: 0.00023342 kg; lognormal variance with pedigree 0.81441, pedigree (1,1,4,1,1)
  Contributions: from leachate evaporites in hyperarid climate in open dump;
- Mercury II [soil, industrial]: 1.2971e-6 kg; lognormal variance with pedigree 1.5256, pedigree (1,1,4,1,1)
  Contributions: from leachate evaporites in hyperarid climate in open dump;
- Molybdenum VI [soil, industrial]: 5.6717e-7 kg; lognormal variance with pedigree 1.7188, pedigree (1,1,4,1,1)
  Contributions: from leachate evaporites in hyperarid climate in open dump;
- Nickel II [soil, industrial]: 9.6644e-5 kg; lognormal variance with pedigree 0.95497, pedigree (1,1,4,1,1)
  Contributions: from leachate evaporites in hyperarid climate in open dump;
- Nitrogen [soil, industrial]: 0.0027203 kg; lognormal variance with pedigree 0.30495, pedigree (1,1,4,1,1)
  Contributions: from leachate evaporites in hyperarid climate in open dump;
- Phosphorus [soil, industrial]: 6.5455e-5 kg; lognormal variance with pedigree 1.9298, pedigree (1,1,4,1,1)
  Contributions: from leachate evaporites in hyperarid climate in open dump;
- Potassium I [soil, industrial]: 0.0018536 kg; lognormal variance with pedigree 0.42147, pedigree (1,1,4,1,1)
  Contributions: from leachate evaporites in hyperarid climate in open dump;
- Selenium IV [soil, industrial]: 6.5058e-8 kg; lognormal variance with pedigree 1.9298, pedigree (1,1,4,1,1)
  Contributions: from leachate evaporites in hyperarid climate in open dump;
- Silicon [soil, industrial]: 0.00084752 kg; lognormal variance with pedigree 1.9298, pedigree (1,1,4,1,1)
  Contributions: from leachate evaporites in hyperarid climate in open dump;
- Silver I [soil, industrial]: 6.426e-7 kg; lognormal variance with pedigree 1.621, pedigree (1,1,4,1,1)
  from leachate evaporites in hyperarid climate in open dump;
- Sodium I [soil, industrial]: 0.0046292 kg; lognormal variance with pedigree 0.33396, pedigree (1,1,4,1,1)
  Contributions: from leachate evaporites in hyperarid climate in open dump;
- Sulfur [soil, industrial]: 0.00099479 kg; lognormal variance with pedigree 0.58365, pedigree (1,1,4,1,1)
  Contributions: from leachate evaporites in hyperarid climate in open dump;
- Tin ion [soil, industrial]: 6.6096e-5 kg; lognormal variance with pedigree 1.0108, pedigree (1,1,4,1,1)
  Contributions: from leachate evaporites in hyperarid climate in open dump;
- Vanadium V [soil, industrial]: 1.9396e-6 kg; lognormal variance with pedigree 1.7513, pedigree (1,1,4,1,1)
  Contributions: from leachate evaporites in hyperarid climate in open dump;
- Zinc II [soil, industrial]: 0.0011801 kg; lognormal variance with pedigree 0.6282, pedigree (1,1,4,1,1)
  Contributions: from leachate evaporites in hyperarid climate in open dump;
- Heat, waste [water, ground-, long-term]: 11.086 MJ; lognormal variance with pedigree 0.074266, pedigree (1,1,4,1,1)
  from decomposed waste material in open dump;
