# liquid crystal display production, unmounted, mobile device

Dataset: EcoSpold 2, unit process
Geography: GLO
Time period: 2014-01-01 to 2023-12-31
Technology level: current
Classification: ISIC rev.4 ecoinvent: 2610:Manufacture of electronic components and boards
Scenario: Business-as-Usual
System model: Allocation, cut-off by classification
Generated by: Johannes Müller
Database: ecoinvent
isCopyrightProtected: true
accessRestrictedTo: 1

## General comment
This activity represents the production of a thin unmounted liquid crystal display for the use in mobile devices (smartphone, tablet). kg was chosen as a unit for the dataset to be scalable. It includes materials for the steel frame, glass cover, backlight and controller board for the display. Data is based on an LCA of the Fairphone 1 with a 4.3 inch (960x540, 16:9) LCD display (weight of 0.04563 kg).
Source: Güvendik, M. (2014). From smartphone to futurephone: assessing the environmental impacts of different circular economy scenarios of a smartphone using LCA.

## Included activities start
From reception of materials and auxiliares at the factory gate.

## Included activities end
The activity includes the materials, processes and energy use (included through processing datasets) for the production of an unmounted liquid crystal display used in mobile applications. Data on factory, disposal and packaging are not included.

## Geography
Geography GLO was chosen because the dataset aims to represent the production of an average electronic device.

## Technology
Literature source points to manufacturing in China. The dataset includes processing of steel and plastic as well as the sputtering and assembly of the LCD display.

## Time period
Data for composition are from 2014 but represent current technology.

## Parameters
- Weight of smartphone display: 0.0456304 kg; name weight_lcd_smartphone
  Literature Value. Source: Güvendik, M. (2014). From smartphone to futurephone: assessing the environmental impacts of different circular economy scenarios of a smartphone using LCA.
- Weight of tablet display: 0.123143 kg; name weight_lcd_tablet
  Weighted Average. Calculated from different sources.
  Sources:
  - Hischier, R., Achachlouei, M. A. and Hilty, L. M. (2014) ‘Evaluating the sustainability of electronic media: Strategies for life cycle inventory data collection and their implications for LCA results’, Environmental Modelling and Software, 56(Lci), pp. 27–36. doi: 10.1016/j.envsoft.2014.01.001.
  - Hischier, R. et al. (2015) ‘Grey Energy and Environmental Impacts of ICT Hardware’, in ICT Innovations for Sustainability. Springer, pp. 171–189. doi: 10.1007/978-3-319-09228-7.
  - Apple Inc. (2014) 9.7-inch iPad Pro Environmental Report. Available at: http://www.apple.com/environment/reports/.
  - Apple Inc. (2019) iPad Environmental report.
  - Apple Inc. (2017) iPad Environmental Report.
  - Apple Inc. (2017) 10.5-inch iPad Pro Environmental Report.
  - Apple Inc. (2017) 12.9-inch iPad Pro Environmental Report.

## Reference product
- liquid crystal display, unmounted, mobile device: 1 kg; By-product classification allocatable product; CPC 47315: Monitors and projectors, principally used in an automatic data processing system; HS2017 852852: Monitors; other than cathode-ray tube; capable of directly connecting to and designed for use with an autom[...]
  production volume 8.23575e7 kg; name PV_RP; = (1416000000*weight_lcd_smartphone)+(144100000*weight_lcd_tablet)
    Sum of sold Smartphones and Tablet in 2019 adjusted by respective weight of the components.
    Smartphones (1.416e9): Units sold from 4Q18: 383E6, 1Q19: 311E6, 2Q19:346.3E6, 3Q19:375.2E6. Source: Trendforce Corp, (2019, January 29). Global Smartphone Market Cooling in 2019 with a YoY Decline of 10% in Production Volume, Says TrendForce [Press Release]. Retrieved from https://press.trendforce.com/press/20190129-3208.html, Trendforce Corp, (2019, May 16). Apple Fell to Number Three in 1Q19, While a Worsening US-China Trade Dispute May Add Insult to Injury, Says TrendForce [Press Release]. Retrieved from https://press.trendforce.com/press/20190516-3245.html, Trendforce Corp, (2019, November 28). Global Smartphone Production Volume Grows 9.2% in 3Q19, with Minor Projected Decline in 4Q19, Says TrendForce [Press Release]. Retrieved from https://press.trendforce.com/press/20191128-3313.html
    Tablets (144.1e6): IDC Worldwide Quarterly PCD Tracker (2020, January 30). Worldwide Tablet Shipments Continue to Decline in Q4 2019, According to IDC [Press Release]. Retrieved from https://www.idc.com/getdoc.jsp?containerId=prUS45959420
  property price 24.0431 EUR2005
    Calculated based on inputs: The price of the product has been calculated as a sum of the values of the material and energy inputs for this product. This value is therefore a rough estimation. It may underestimate the real price since there are additional expenses when producing any product. These expences can include for example labour costs, treatment of waste materials and profit for the producer. Please consider carefully whether this level of data quality is acceptable for your application.
  properties: carbon allocation 0.0118222 kg, carbon content 0.0118222, carbon content, fossil 0.0118222, carbon content, non-fossil 0, dry mass 1 kg, water content 0, water in wet mass 0 kg, wet mass 1 kg

## Inputs from technosphere
- electricity, medium voltage: 94.5643 kWh; lognormal variance with pedigree 0.2106, pedigree (5,5,5,5,5)
  Calculated Value. The display has an area of 51.7cm2, scaled to 1 kg by weight (factor 22) and an energy use of 0.1 kWh/cm2 from Ercan (2016). The total energy use is 113.3 kWh. The 'liquid crystal display, minor components, auxilliaries and assembly effort' provides 18.7357 and the rest is added through this exchange.
  Ercan, M., Malmodin, J., Bergmark, P., Kimfalk, E., & Nilsson, E. (2016). Life cycle assessment of a smartphone. ICT for Sustainability 2016.
- glass, for liquid crystal display: 0.742926 kg; name lcd_glass; lognormal variance with pedigree 0.0138, pedigree (2,4,4,5,2)
  Literature Value. Represents LCD Screen. Scaled to result in a dataset with weight of 1kg.
  properties: dry mass 1 kg, wet mass 1 kg
- injection moulding: 0.112907 kg; lognormal variance with pedigree 0.0138, pedigree (2,4,4,5,2)
  Literature Value. Service representing the processing of plastic. Scaled to result in a dataset with weight of 1kg.
- integrated circuit, logic type: 0.000260791 kg; lognormal variance with pedigree 0.0138, pedigree (2,4,4,5,2)
  Literature Value. Represents display controller. Scaled to result in a dataset with weight of 1kg.
  properties: carbon content, fossil 0.221701, dry mass 1 kg, wet mass 1 kg
- light emitting diode: 0.00898525 kg; lognormal variance with pedigree 0.0138, pedigree (2,4,4,5,2)
  Literature Value. Represents backlight LEDs. Scaled to result in a dataset with weight of 1kg.
  properties: carbon content, fossil 0.0203273, dry mass 1 kg, wet mass 1 kg
- liquid crystal display, minor components, auxilliaries and assembly effort: 1 kg; lognormal variance with pedigree 0.0138, pedigree (2,4,4,5,2)
  Literature Value. Scaled to result in a dataset with weight of 1kg.
- polycarbonate: 0.0126717, 0.00212113 kg (2 suppliers, which the file names only by identifier); sum of these 0.0147928 kg; lognormal variance with pedigree 0.0138, pedigree (2,4,4,5,2)
  Literature Value. Scaled to result in a dataset with weight of 1kg.
  properties: carbon content, fossil 0.755906, dry mass 1 kg, heating value, net 29.57 MJ, wet mass 1 kg
- printed wiring board, surface mounted, unspecified, Pb free: 0.00593903 kg; lognormal variance with pedigree 0.0138, pedigree (2,4,4,5,2)
  Literature Value. Represents flexible Printed Circuit. Scaled to result in a dataset with weight of 1kg.
  properties: carbon content, fossil 0.132522, dry mass 1 kg, wet mass 1 kg
- sheet rolling, chromium steel: 0.213674 kg; = steel; lognormal variance with pedigree 0.0138, pedigree (2,4,4,5,2)
  Literature Value. Service representing the processing of steel. Scaled to result in a dataset with weight of 1kg.
- sputtering, indium tin oxide, for liquid crystal display: 8.02098e-8 m3; lognormal variance with pedigree 0.0138, pedigree (2,4,4,5,2)
  Literature Value. Scaled to result in a dataset with weight of 1kg.
- steel, chromium steel 18/8: 0.213674 kg; name steel; lognormal variance with pedigree 0.0138, pedigree (2,4,4,5,2)
  Literature Value. Used in the frame of the display. Scaled to result in a dataset with weight of 1kg.
  properties: carbon content, fossil 0.0008, dry mass 1 kg, wet mass 1 kg
  note on carbon content, fossil: Stainless steel model is the grade 304 steel (18/8 stainless, 18% chromium 8% nickel; max. 0.08% C)

## Sampling procedure
In the study (Güvendik, 2014), the display was dismanteled and the components identified and weighed.

## Extrapolations
The data from Güvendik, 2014 was scaled by mass to fit the reference product of 1kg. The original unit has a weight of 0.04563 kg.
