# maintenance, train, passenger, regional

Dataset: EcoSpold 2, unit process
Geography: CH
Time period: 1993-01-01 to 2023-12-31
Technology level: current
Classification: EcoSpold01Categories: transport systems/train
Classification: ISIC rev.4 ecoinvent: 3315:Repair of transport equipment, except motor vehicles
Tags: ConvertedDataset
Scenario: Business-as-Usual
System model: Allocation, cut-off by classification
Generated by: Michael Spielmann (obsolete)
Published in: Spielmann M. 2004
Database: ecoinvent
isCopyrightProtected: true
accessRestrictedTo: 1

## General comment
The dataset represents the maintenance of a regional train in Switzerland with a total weight of 171t and a life span of 40 years.
[This dataset was already contained in the ecoinvent database version 2. It was not individually updated during the transfer to ecoinvent version 3. Life Cycle Impact Assessment results may still have changed, as they are affected by changes in the supply chain, i.e. in other datasets. This dataset was generated following the ecoinvent quality guidelines for version 2. It may have been subject to central changes described in the ecoinvent version 3 change report (http://www.ecoinvent.org/database/ecoinvent-version-3/reports-of-changes/), and the results of the central updates were reviewed extensively. The changes added e.g. consistent water flows and other information throughout the database. The documentation of this dataset can be found in the ecoinvent reports of version 2, which are still available via the ecoinvent website. The change report linked above covers all central changes that were made during the conversion process.]

## Included activities start
Service starts with material expenditures for maintenance.

## Included activities end
The dataset ends with the maintenance of one regional train. The dataset includes material consumption, transport, energy and fuel consumption, disposal and treatment.

## Geography
Data represents a train maintenance in Switzerland.

## Technology
For passenger transport equipment no SBB data has been available for the stationary energy and material consumption. Thus literature data is employed in this project. representing expenditures for one major revision (Maibach, 1999) as well as a regular substitution of break shoes (40 kg break shoes/car (Maibach, 1999).
References:
Maibach M., Peter D. and Seiler B. (1999) Ökoinventar Transporte: Grundlagen für den ökologischen Vergleich von Transportsystemen und den Einbezug von Transportsystemen in Ökobilanzen. Technischer Schlussbericht. In: Schweizerischer Nationalfonds zur Förderung der wissenschaftlichen Forschung (ed. SPP Umwelt M.). 2nd Edition. INFRAS, Zürich

## Parameters
- fraction, process water, to air: 0.15 dimensionless; name fraction_PW_to_air; lognormal variance with pedigree 0.092025, pedigree (4,4,3,2,4)
  Literature value. In case when no industry/process specific data are available, default evaporation fraction value is used. This value is 15% and is based on literature (Statistics Canada, 2007 & Shaffer, K.H., 2008, Consumptive water use in the Great Lakes Basin, USGS & Shiklomanov, 2003, World Water Resources at the Beginning of the 21st Century) and has been approved by an expert.
- fraction, tap water, to air: 0.15 dimensionless; name fraction_TW_to_air; = fraction_PW_to_air; lognormal variance with pedigree 0.092025, pedigree (4,4,3,2,4)
  Calculated value. See comment in the other parametres present in this dataset. Tap water is considered to be always used as process water, thus process water fractions to air are applied to all tap water input flows to calculate the amount of water consumed in the processes.

## Reference product
- maintenance, train, passenger, regional: 1 unit; By-product classification allocatable product; CPC 87149: Maintenance and repair services of other transport equipment
  EcoSpold01Location=CH
  production volume 0.0336675 unit
    This is a placeholder value that does not reflect real-world production volumes. This dataset does not currently require a real-world production volume to work in the database framework, and no actual data were collected yet. This has no negative effect on the results of the ecoinvent database. The placeholder value of this activity was scaled according to the nominal GDP of 2005 (source: United Nations, http://data.un.org/Glossary.aspx?q=GDP+%28current+US%24%29, accessed 20130726) to reflect an appropriate share of the global production volume, which is also a placeholder value.
  property price 29037.3 EUR2005
    Calculated based on inputs: The price of the product has been calculated as a sum of the values of the material and energy inputs for this product. This value is therefore a rough estimation. It may underestimate the real price since there are additional expenses when producing any product. These expences can include for example labour costs, treatment of waste materials and profit for the producer. Please consider carefully whether this level of data quality is acceptable for your application.
  properties: carbon allocation 0 kg, carbon content 0

## Inputs from technosphere
- alkyd paint, white, without solvent, in 60% solution state: 155 kg; lognormal variance with pedigree 0.0588, pedigree (2,2,5,3,3)
  EcoSpold01Location=RER
  Literature value from Maibach (1999).
  Uncertainty: literature studies
  properties: carbon content, fossil 0.140367, carbon content, non-fossil 0.199629, dry mass 1 kg, heating value, net 10.3 MJ, wet mass 1 kg
  note on carbon content, fossil: C content was calculated as an addition of C content in the raw materials.
- aluminium, cast alloy: 106.24 kg; lognormal variance with pedigree 0.0588, pedigree (2,2,5,3,3)
  (same comment as for alkyd paint, white, without solvent, in 60% solution state)
  properties: dry mass 1 kg, wet mass 1 kg
- aluminium, wrought alloy: 225.76 kg; lognormal variance with pedigree 0.0588, pedigree (2,2,5,3,3)
  (same comment as for alkyd paint, white, without solvent, in 60% solution state)
  properties: dry mass 1 kg, wet mass 1 kg
- electricity, medium voltage: 13900 kWh; lognormal variance with pedigree 0.1788, pedigree (2,2,5,3,3)
  EcoSpold01Location=CH
  Literature value from Maibach (1999).
  Uncertainty: literature studies; rough estimate (basic uncertainty =2)
- flat glass, uncoated: 660 kg; lognormal variance with pedigree 0.0588, pedigree (2,2,5,3,3)
  (same comment as for alkyd paint, white, without solvent, in 60% solution state)
  properties: dry mass 1 kg, wet mass 1 kg
- glued laminated timber, MUF-glue: 0.442 m3; lognormal variance with pedigree 0.0588, pedigree (2,2,5,3,3)
  Literature value from Maibach (1999). The split between PUR-glue and MUF-glue glued laminated timber is made based on the Swiss relative production volumes for the products.
  EcoSpold01Location=RER
  Uncertainty: literature studies
  properties: carbon content, fossil 0.01638, carbon content, non-fossil 0.442689, dry mass 403.64 kg, heating value, net 5517.96 MJ, price 298 EUR2005, water content 0.0975126, wet mass 443 kg
- glued laminated timber, PUR-glue: 0.442 m3; lognormal variance with pedigree 0.0588, pedigree (2,2,5,3,3)
  Literature value from Maibach (1999). The split between PUR-glue and MUF-glue glued laminated timber is made based on the Swiss relative production volumes for the products.
  properties: carbon content, fossil 0.00801, carbon content, non-fossil 0.446904, dry mass 399.46 kg, heating value, net 5409.08 MJ, price 298 EUR2005, water content 0.0989836, wet mass 439 kg
- heat, district or industrial, natural gas: 97400 MJ; lognormal variance with pedigree 0.1788, pedigree (2,2,5,3,3)
  EcoSpold01Location=RER
  Literature value from Maibach (1999).
  Uncertainty: literature studies; rough estimate (basic uncertainty =2)
  properties: heating value, net 1 MJ
- heat, district or industrial, other than natural gas: 97400 MJ; lognormal variance with pedigree 0.1788, pedigree (2,2,5,3,3)
  Literature value from Maibach (1999).
  EcoSpold01Location=CH
  Uncertainty: literature studies; rough estimate (basic uncertainty =2)
  properties: heating value, net 1 MJ
- lead: 203 kg; lognormal variance with pedigree 0.0588, pedigree (2,2,5,3,3)
  (same comment as for alkyd paint, white, without solvent, in 60% solution state)
  properties: dry mass 1 kg, wet mass 1 kg
- lubricating oil: 125 kg; lognormal variance with pedigree 0.0586, pedigree (4,3,5,1,1)
  Literature value from Maibach (1999).
  EcoSpold01Location=RER
  Uncertainty: literature studies; estimate based on ICE maintenance figures (assuming 25% of the ICE expenditures).
  properties: carbon content, fossil 0.75, dry mass 1 kg, heating value, net 40.2 MJ, wet mass 1 kg
  note on carbon content, fossil: Lubricating oil is produced from diesel. C-content/dry mass of fats and oils considered 75%, from: ecoinvent v2.2 report, n 15a, pg 40
  note on heating value, net: Literature value, Source: IPCC 2006, 2006 IPCC Guidelines for National Greenhouse Gas Inventories, Prepared by the National Greenhouse Gas Inventories Programme, Eggleston H.S., Buendia L., Miwa K., Ngara T. and Tanabe K. (eds). Published: IGES, Japan
- paper, woodfree, uncoated: 20700 kg; lognormal variance with pedigree 0.0586, pedigree (4,3,5,1,1)
  EcoSpold01Location=RER
  Literature value from Maibach (1999).
  Uncertainty: literature studies; estimate based on ICE maintenance figures (assuming 25% of the ICE expenditures).
  properties: carbon content, fossil 0.0251406, carbon content, non-fossil 0.281215, dry mass 0.945 kg, heating value, net 14.11 MJ, water content 0.0582011, wet mass 1 kg
  note on carbon content, fossil: Fossil C content was calculated after fossil C contents of chemicals used in the production of the paper (in Tab 8.54 & 8.55 ecoinvent v2.2 report 11_III, part 8).
  note on carbon content, non-fossil: Biogenic C content was calculated after biogenic C contents of chemicals used in the production of the paper (in Tab 8.54 & 8.55 ecoinvent v2.2 report 11_III, part 8). The cellulose content in 1 kg of paper (on a wet mas basis) was estimated as (1-chemical content), C content of cellulose was considered 0.44 kgC/kg dry mass (ecoinvent v2.2 report, n 15a, pg 40)
- pitch: 375 kg; lognormal variance with pedigree 0.0588, pedigree (2,2,5,3,3)
  EcoSpold01Location=CH
  Literature value from Maibach (1999).
  Uncertainty: literature studies
  properties: carbon content, fossil 0.83, dry mass 1 kg, heating value, net 28 MJ, wet mass 1 kg
- polyethylene, high density, granulate: 1970 kg; lognormal variance with pedigree 0.0588, pedigree (2,2,5,3,3)
  (same comment as for alkyd paint, white, without solvent, in 60% solution state)
  properties: carbon content, fossil 0.857143, dry mass 1 kg, heating value, net 42.47 MJ, wet mass 1 kg
  note on carbon content, fossil: Polyethylene is formed out of a huge amount of ethylene monomers (C2H4) (ecoinvent v2.2 report 11_II). MW=28 g/mol
- reinforcing steel: 5000 kg; lognormal variance with pedigree 0.0588, pedigree (2,2,5,3,3)
  (same comment as for alkyd paint, white, without solvent, in 60% solution state)
  properties: carbon content, fossil 0.004, dry mass 1 kg, wet mass 1 kg
- solvent, organic: 125 kg; lognormal variance with pedigree 0.0588, pedigree (2,2,5,3,3)
  Literature value from Maibach (1999).
  EcoSpold01Location=GLO
  Uncertainty: literature studies; estimate based on ICE maintenance figures (assuming 25% of the ICE expenditures).
  properties: carbon content, fossil 0.63072, dry mass 1 kg, heating value, net 19.11 MJ, wet mass 1 kg
  note on carbon content, fossil: Mixture of 15 of the most often used solvents (list in ecoinvent v2.2 report 11-III, pg 293). C content was calculated as an unweighted average of C content of the different solvents
- stone wool, packed: 81.2 kg; lognormal variance with pedigree 0.0588, pedigree (2,2,5,3,3)
  Literature value from Maibach (1999).
  EcoSpold01Location=CH
  Uncertainty: literature studies
  properties: carbon content, fossil 0.015401, dry mass 1 kg, wet mass 1 kg
  note on carbon content, fossil: The chemical composition of the glass fibres used in the rock wool production is similar to the composition of naturally cooled volcano basalt and has a composition listed in Tab. 3.1 and 3.2 in ecoinvent v2.2 report 16, part XIV. Rock wool contains: a minimum of 96% mineral fibres,between 0.5 and 3.0 weight percent of phenolic resin depending on the specific product characteristics, and about 0.2 percent mineral oil (ecoinvent v2.2 report 16, part XIV). An average composition of 1.8% phenolic resin, 0.2% mineral oil, and 98% mineral fibres has been assumed and used to calculate C content of the rock wool
- synthetic rubber: 1020 kg; lognormal variance with pedigree 0.0588, pedigree (2,2,5,3,3)
  Literature value from Maibach (1999).
  EcoSpold01Location=RER
  Uncertainty: literature studies
  properties: carbon content, fossil 0.871949, dry mass 1 kg, heating value, net 26.42 MJ, wet mass 1 kg
  note on carbon content, fossil: EPDM (Ethylene-propene-diene terpolymer) rubber is a terpolymer of ethylene, propene, and a diene with the residual unsaturated portion of the diene in the side chain (ecoinvent v2.2 report 7-part XX & Ullmann). Chemical formula (deduced from Evidences of Solvent-Induced Miscibility in Polychloroprene-co-Ethylene-Propene Diene Terpolymer Blends, Dubey et al., Journal of Applied Polymer Science, 2009, 111:1884–1891): C20H35
- tap water: 114000 kg; name tap_water_input; lognormal variance with pedigree 0.0586, pedigree (4,3,5,1,1)
  EcoSpold01Location=CH
  Literature value from Maibach (1999).
  Uncertainty: literature studies; estimate based on ICE maintenance figures (assuming 25% of the ICE expenditures).
  properties: carbon content, fossil 0.00178991, dry mass 0.000337476 kg, water content 2962.17, wet mass 1 kg
  note on carbon content, fossil: Bicarbonate content is 2.93 mol/m3. CO2 content is 0.1 mol/m3 (ecoinvent v2.2 report 8, Tab 93.1).
- waste emulsion paint: -13.9 kg; lognormal variance with pedigree 0.019, pedigree (2,2,2,3,3)
  (same comment as for stone wool, packed)
  production volume
    Calculated from the production volume of maintenance, train, passenger, regional in proportion to the respective output amounts.
  properties: carbon content, fossil 0.27, dry mass 1 kg, heating value, net 8.18 MJ, wet mass 1 kg
  note on carbon content, fossil: Tab A.4, ecoinvent v2.2 report 13_I. C content has been calculated after data in the tables, and then referred to 1 kg DM
- waste glass: -660 kg; lognormal variance with pedigree 0.019, pedigree (2,2,2,3,3)
  Literature value from Maibach (1999).
  EcoSpold01Location=CH
  Uncertainty: own assumptions based on the new input
  production volume
    (same comment as for waste emulsion paint)
  properties: dry mass 1 kg, heating value, net 0.05 MJ, wet mass 1 kg
  note on heating value, net: Value extracted from "treatment of waste glass, open dump, very wet infiltration class (1000mm)"
- waste plastic, mixture: -1970 kg; lognormal variance with pedigree 0.019, pedigree (2,2,2,3,3)
  (same comment as for waste glass)
  production volume
    (same comment as for waste emulsion paint)
  properties: carbon content, fossil 0.747344, dry mass 0.847 kg, heating value, net 30.79 MJ, water content 0.180638, wet mass 1 kg
  note on carbon content, fossil: C content in 1 kg DM was calculated using data in Tab A.2, ecoinvent v2.2 report 13_I
  note on heating value, net: Value taken from the general comment of the treatment dataset.
- waste wood, untreated: -632 kg; lognormal variance with pedigree 0.019, pedigree (2,2,2,3,3)
  (same comment as for waste glass)
  production volume
    (same comment as for waste emulsion paint)
  properties: carbon content, non-fossil 0.48632, dry mass 0.8 kg, heating value, net 13.99 MJ, water content 0.25, wet mass 1 kg
  note on carbon content, non-fossil: Tab A.4, ecoinvent v2.2 report 13_I. C content has been referred to 1 kg DM,
- wastewater, average: -114 m3; lognormal variance with pedigree 0.0188, pedigree (4,3,2,1,1)
  Literature value from Maibach (1999).
  EcoSpold01Location=CH
  Uncertainty: literature studies; estimate based on ICE maintenance figures (assuming 25% of the ICE expenditures).
  production volume
    (same comment as for waste emulsion paint)
  properties: carbon content, non-fossil 0.194039, dry mass 0.346837 kg, water content 2882.2, wet mass 1000 kg
  note on carbon content, non-fossil: 0.0673 kg TOC/m3 (Tab A.17, ecoinvent v2.2 report 13_I). TOC was considered as Total Carbon.

## Emissions to nature
- NMVOC, non-methane volatile organic compounds [air, non-urban air or from high stacks]: 78.3 kg; lognormal variance with pedigree 0.1786, pedigree (4,3,5,1,1)
  Literature value from Maibach (1999).
  Uncertainty: Derived from the used paint and solvent, assuming all solvent is emitted to air.
- Water [air, unspecified]: 17.1 m3; name water_to_air_unspecified; = (tap_water_input/1000*fraction_TW_to_air); lognormal variance with pedigree 0.0807, pedigree (2,2,5,1,1)
  Calculated value based on literature values and expert opinion. See comments in the parametres' comment field.
  property fraction, origin: fresh water 1; name fraction_origin_fresh_water
  property fraction, origin: salt water 0; name fraction_origin_salt_water
  property fraction, origin: unspecified 0; name fraction_origin_unspecified

## Sampling procedure
The data of the material composition and energy consumption is based on literature studies.

## Review by Niels Jungbluth 2004-04-01
Passed.

## Review by Roland Hischier 2011-09-23
Transfer of documentation done.
--> "source" von Exchanges fehlend ...
