# paper production, woodfree, coated, at non-integrated mill

Dataset: EcoSpold 2, unit process
Geography: RoW
Time period: 2000-01-01 to 2023-12-31
Technology level: current
Classification: EcoSpold01Categories: paper & cardboard/graphic paper
Classification: ISIC rev.4 ecoinvent: 1701:Manufacture of pulp, paper and paperboard
Synonyms: coated fine paper
Tags: ConvertedDataset
Scenario: Business-as-Usual
System model: Allocation, cut-off by classification
Generated by: Roland Hischier
Published in: Hischier R. 2007
Database: ecoinvent
isCopyrightProtected: true
accessRestrictedTo: 1

## General comment
This dataset in an identical copy of corresponding RER dataset. Wood free, coated paper (also called coated fine paper) is used for all kind of printing and other graphic purposes. Wood free paper is defined as containing at least 90% of the fibres in form of chemical pulp. Coated means that the paper is coated with a coating material like kaolin or calcium carbonate on one or two sides. This dataset represents the production at non-integrated mills which means that market pulp is bought as an input for paper production.
The main sources for the dataset are the Finnish EcoData database from KCL (KCL (2002)) as well as several CER‘s of integrated and non-integrated paper mills (Äänekoski (2001); Grycksbo (2002); Kangas (2001); Kymi (2001); Nordland Papier (2001); Oulu (2002); Uetersen (2001))
An additional source is the European IPPC documentation for the paper and pulp industry (European Commission (2000)).
References
Äänekoski (2001) EMAS statement 2000. M-real Paper, Äänekoski (Finland)
Grycksbo (2002) Environmental Report 2001. StoraEnso, Grycksbo (Sweden) as pdf-File under: http://www.storaenso.com/CDAvgn/main/0,,1_-2395-2103-,00.html
Kangas (2001) EMAS statement 2000. M-real Paper, Jyväskylä (Finland)
KCL (2002) KCL EcoData - life cycle inventory database. The Finnish Pulp and Paper Research Institute (KCL), Espoo (Finnland)
Kymi (2001) Kymi Paper Oy Environmental Protection in 2000. UPM-Kymmene Kymi Paper Oy, Kuusankoski (Finland) as pdf-File under: http://www.paper.upm-kymmene.com
Nordland Papier (2001) Umwelterklärung 2001. UPM-Kymmene Nordland Papier AG, Dörpen (Germany) as pdf-File under: http://www.paper.upm-kymmene.com
Oulu (2002) Environmental Statement 2001. Stora Enso Oyj, Oulu (Finland) as pdf-File under: http://www.storaenso.com/CDAvgn/main/0,,1_-2393-2097-,00.html
Uetersen (2001) Vereinfachte Umwelterklärung 2000. StoraEnso Uetersen GmbH, Uetersen (Germany) as pdf-File under: http://www.storaenso.com/CDAvgn/main/0,,1_-2394-2102-,00.html

## Included activities start
This activity starts with the reception of the raw materials, such as sulfate market pulp.

## Included activities end
This module includes the European production of coated woodfree paper in a non-integrated mill - including pulp preparation, paper production, energy production on-site and internal waste water treatment.

## Geography
Data from several European fine paper producers used as European average data.

## Technology
Average of present used technology

## Time period
Data represent the average technology in the late 1990ies and early 2000s. The production volume is valid for 2018.

## Parameters
- fraction, cooling water, cooling pond system, to air: 0.032 dimensionless; name fraction_CW_CP_to_air; lognormal variance with pedigree 0.0413, pedigree (2,3,1,3,1)
  Calculated based on literature value (Scown, C.D., 2011, Water Footprint of U.S. Transportation Fuels and supplying information of the article) (Vionnet, S., Quantis Water Database - Technical Report, 2012).
- fraction, cooling water, once-through system, to air: 0.004 dimensionless; name fraction_CW_OT_to_air; lognormal variance with pedigree 0.0413, pedigree (2,3,1,3,1)
  (same comment as for fraction, cooling water, cooling pond system, to air)
- fraction, cooling water, recirculating system, to air: 0.771 dimensionless; name fraction_CW_R_to_air; lognormal variance with pedigree 0.0413, pedigree (2,3,1,3,1)
  (same comment as for fraction, cooling water, cooling pond system, to air)
- fraction, cooling water, to air: 0.3875 dimensionless; name fraction_CW_to_air; = (0.5*fraction_CW_OT_to_air)+(0.5*fraction_CW_R_to_air); lognormal variance with pedigree 0.092025, pedigree (4,4,3,2,4)
  Calculated value based on literature value (see comments of the other parametres present in this dataset) and expert opinion. In the case when no industry/literature data are available about the type of cooling or directly fraction, cooling water, to air specific for the process a default assumption is applied. It is assumed that the once-through cooling system is used in 50% of all cases and recirculating system is used in another 50% of all cases.
- fraction, process water, to air: 0.15 dimensionless; name fraction_PW_to_air; lognormal variance with pedigree 0.092025, pedigree (4,4,3,2,4)

## Reference product
- paper, woodfree, coated: 1 kg; name Amount_ref; By-product classification allocatable product; CPC 32113: Mechanical wood pulp; semi-chemical wood pulp; pulps of fibrous cellulosic material other than wood; HS2017 481013: Paper and paperboard; coated with kaolin or other inorganic substances, for printing & writing, graphics, c[...]
  EcoSpold01Location=RER
  production volume 3.6171e9 kg; name PV_ref; = (6212000000*0.2)/(21908724538088.93/85693321610361.34)
    The global annual PV was estimated by scaling the European PV according to the ratio of the European GDP and global GDP. According to expert judgement 20 % of graphical paper is produced at non-integrated mills.
    Source: CEPI Key Statistics 2018, <http://www.cepi.org/system/files/public/documents/publications/Final%20Key%20Statistics%202018.pdf>
    <http://www.cepi.org/system/files/public/documents/publications/Final%20Key%20Statistics%202018.pdf>
  property carbon content, fossil 0.0312042
    Fossil C content was calculated after fossil C contents of chemicals used in the production of the paper (in Tab 8.72 & 8.73 ecoinvent v2.2 report 11_III, part 8).
  property carbon content, non-fossil 0.28
    Biogenic C content was calculated after biogenic C contents of chemicals used in the production of the paper (in Tab 8.72 & 8.73 ecoinvent v2.2 report 11_III, part 8). The cellulose content in 1 kg of paper (on a wet mas basis) was estimated as (1-chemical content), C content of cellulose was considered 0.44 kgC/kg dry mass (ecoinvent v2.2 report, n 15a, pg 40)
  property price 0.729 EUR2005
    Export prices for the World+ according to: http://faostat.fao.org/site/626/DesktopDefault.aspx?PageID=626#ancor downloaded 28 April 2009; calculated as export value divided by export volume.
  properties: carbon allocation 0.294088 kg, carbon content 0.311204, dry mass 0.945 kg, heating value, net 14.11 MJ, water content 0.0582011, water in wet mass 0.055 kg, wet mass 1 kg

## Inputs from technosphere
- alkylketene dimer sizing agent, for paper production: 0.00434 kg; lognormal variance with pedigree 0.044, pedigree (1,4,5,5,1)
  EcoSpold01Location=RER
  Information from one fine paper producer
  Uncertainty: information from one fine paper producer
  properties: carbon content, non-fossil 0.538229, dry mass 1 kg, heating value, net 16.31 MJ, wet mass 1 kg
  note on carbon content, non-fossil: Biogenic C content was calculated after biogenic C contents of chemicals used in the production of the paper (in Tab 8.72 & 8.73 ecoinvent v2.2 report 11_III, part 8). The cellulose content in 1 kg of paper (on a wet mas basis) was estimated as (1-chemical content), C content of cellulose was considered 0.44 kgC/kg dry mass (ecoinvent v2.2 report, n 15a, pg 40) Chemical formula of alkyl ketene dimer was considered as C38H72O20, and the molecular weight 848g/mol. It is produced from Fatty acids, from vegetarian oil
- ash from paper production sludge: -0.00134 kg; name Amount_BP4; lognormal variance with pedigree 0.0026, pedigree (1,3,1,5,1)
  Average from several european fine paper producers
  EcoSpold01Location=CH
  Uncertainty: average from several european fine paper producers
  production volume; = PV_ref*( Amount_BP4/ Amount_ref)
    Calculated from the production volume of paper, woodfree, coated in proportion to the respective output amounts.
  properties: carbon content, non-fossil 0.0092, dry mass 1 kg, wet mass 1 kg
  note on carbon content, non-fossil: Biogenic C content was calculated after biogenic C contents of chemicals used in the production of the paper (in Tab 8.72 & 8.73 ecoinvent v2.2 report 11_III, part 8). The cellulose content in 1 kg of paper (on a wet mas basis) was estimated as (1-chemical content), C content of cellulose was considered 0.44 kgC/kg dry mass (ecoinvent v2.2 report, n 15a, pg 40) Tab 6.21, ecoinvent v2.2 report 11_III
- chemical, inorganic: 0.0372 kg; lognormal variance with pedigree 0.044, pedigree (1,4,5,5,1)
  EcoSpold01Location=GLO
  Information from one fine paper producer
  Uncertainty: information from one fine paper producer
  properties: carbon content, fossil 0.003, dry mass 1 kg, wet mass 1 kg
  note on carbon content, fossil: Fossil C content was calculated after fossil C contents of chemicals used in the production of the paper (in Tab 8.72 & 8.73 ecoinvent v2.2 report 11_III, part 8). This dataset is an unweighted average of 20 inorganic substances (listed in Tab 88.1, ecoinvent v2.2 report 8, part II), being part of the top100 chemicals included in this database. The C-content has also been calculated as an unweighted average of the C content of the substances composing this dataset.
- chemical, organic: 0.00742 kg; lognormal variance with pedigree 0.044, pedigree (1,4,5,5,1)
  Information from one fine paper producer
  EcoSpold01Location=GLO
  Uncertainty: information from one fine paper producer
  properties: carbon content, fossil 0.628, dry mass 1 kg, heating value, net 19.03 MJ, wet mass 1 kg
  note on carbon content, fossil: Fossil C content was calculated after fossil C contents of chemicals used in the production of the paper (in Tab 8.72 & 8.73 ecoinvent v2.2 report 11_III, part 8). This dataset is an unweighted average of 20 organic substances (listed in Tab 88.1, ecoinvent v2.2 report 8, part II), being part of the top100 chemicals included in this database. The C-content has also been calculated as an unweighted average of the C content of the substances composing this dataset.
- electricity, medium voltage: 0.0136387, 0.272062, 0.0914121, 0.00417665, 0.000835952, 0.000179498, 0.0280947 kWh (7 suppliers, which the file names only by identifier); sum of these 0.4104 kWh; lognormal variance with pedigree 0.0426, pedigree (1,3,5,5,1)
  EcoSpold01Location=NORDEL
  Average from several european fine paper producers
  Uncertainty: average from several european fine paper producers
- hazardous waste, for underground deposit: -0.00016 kg; name Amount_BP2; lognormal variance with pedigree 0.0026, pedigree (1,3,1,5,1)
  Average from several european fine paper producers
  EcoSpold01Location=DE
  Uncertainty: average from several european fine paper producers
  production volume; = PV_ref*( Amount_BP2/ Amount_ref)
    (same comment as for ash from paper production sludge)
  properties: carbon content, fossil 0.554667, dry mass 1 kg, wet mass 1 kg
  note on carbon content, fossil: Fossil C content was calculated after fossil C contents of chemicals used in the production of the paper (in Tab 8.72 & 8.73 ecoinvent v2.2 report 11_III, part 8). Tab A.6, ecoinvent v2.2 report 13_I, average hazardous waste composition was used, and referred to 0% water mass. No waste-specific emission are currently inventoried for underground deposits. Accordingly, no waste composition must be specified. For generic, average waste to underground deposit deposition in a 200 liter steel drum without cement solidification is assumed (ecoinvent v2.2 report 13_I).
- heat, district or industrial, natural gas: 3.36142 MJ; lognormal variance with pedigree 0.0432, pedigree (1,3,5,5,1)
  EcoSpold01Location=RER
  Heat input as reported by Hischier 2007. Activity Link set to the respective heat supplying activity.
  Uncertainty: average from several european fine paper producers
  properties: heating value, net 1 MJ
- heat, district or industrial, other than natural gas: 0.257912 MJ; lognormal variance with pedigree 0.0432, pedigree (1,3,5,5,1)
  Heat input as reported by Hischier 2007. Activity Link set to the respective heat supplying activity.
  EcoSpold01Location=RER
  Uncertainty: average from several european fine paper producers
  properties: heating value, net 1 MJ
- kaolin: 0.202352 kg; lognormal variance with pedigree 0.044, pedigree (1,4,5,5,1)
  (same comment as for alkylketene dimer sizing agent, for paper production)
  properties: dry mass 1 kg, wet mass 1 kg
- lime: 0.2024 kg; lognormal variance with pedigree 0.044, pedigree (1,4,5,5,1)
  Information from one fine paper producer
  EcoSpold01Location=CH
  Uncertainty: information from one fine paper producer
  properties: carbon content, fossil 0.120005, dry mass 1 kg, wet mass 1 kg
  note on carbon content, fossil: Fossil C content was calculated after fossil C contents of chemicals used in the production of the paper (in Tab 8.72 & 8.73 ecoinvent v2.2 report 11_III, part 8). CaCO3 (MW=100)
- malusil: 4.8e-5 kg; lognormal variance with pedigree 0.044, pedigree (1,4,5,5,1)
  Uncertainty: information from one fine paper producer
  properties: dry mass 1 kg, wet mass 1 kg
- municipal solid waste: -2.74292e-6, -3.2571e-7, -2.02714e-6, -0.00154755, -2.27919e-7, -7.31579e-8, -1.65357e-7, -6.88386e-6 kg (8 suppliers, which the file names only by identifier); sum of these -0.00156 kg; lognormal variance with pedigree 0.0026, pedigree (1,3,1,5,1)
  EcoSpold01Location=CH
  Average from several european fine paper producers
  Uncertainty: average from several european fine paper producers
  production volume; = PV_ref*( Amount_BP1/ Amount_ref)
    (same comment as for ash from paper production sludge)
  properties: carbon content, fossil 0.171549, carbon content, non-fossil 0.261655, dry mass 0.771 kg, heating value, net 11.74 MJ, water content 0.297017, wet mass 1 kg
  note on carbon content, fossil: Fossil C content was calculated after fossil C contents of chemicals used in the production of the paper (in Tab 8.72 & 8.73 ecoinvent v2.2 report 11_III, part 8). MSW composition in tab 4.1, ecoinvent v2.2 report 13_I. C content referred to 1 kg DM
  note on carbon content, non-fossil: Biogenic C content was calculated after biogenic C contents of chemicals used in the production of the paper (in Tab 8.72 & 8.73 ecoinvent v2.2 report 11_III, part 8). The cellulose content in 1 kg of paper (on a wet mas basis) was estimated as (1-chemical content), C content of cellulose was considered 0.44 kgC/kg dry mass (ecoinvent v2.2 report, n 15a, pg 40) MSW composition in tab 4.1, ecoinvent v2.2 report 13_I. C content referred to 1 kg DM
  note on heating value, net: Value taken from the general comment of the treatment dataset.
- optical brighteners, for paper production: 0.00484 kg; lognormal variance with pedigree 0.044, pedigree (1,4,5,5,1)
  Information from one fine paper producer
  EcoSpold01Location=RER
  Uncertainty: information from one fine paper producer
  properties: carbon content, fossil 0.557859, dry mass 1 kg, heating value, net 16.9 MJ, wet mass 1 kg
  note on carbon content, fossil: Fossil C content was calculated after fossil C contents of chemicals used in the production of the paper (in Tab 8.72 & 8.73 ecoinvent v2.2 report 11_III, part 8). Mixture of two optical brighteners (DAS-1 and distyrylbiphenyl type), ecoinvent v2.2 report 11-III, pg 298
- paper mill, non-integrated: 5.44e-11 unit; lognormal variance with pedigree 0.448, pedigree (4,5,5,5,5)
  EcoSpold01Location=RER
  Own assumption
  Uncertainty: own assumption
- potato starch: 0.0397 kg; lognormal variance with pedigree 0.044, pedigree (1,4,5,5,1)
  EcoSpold01Location=DE
  Information from one fine paper producer
  Uncertainty: information from one fine paper producer
  properties: carbon content, non-fossil 0.46, dry mass 0.8 kg, heating value, net 10.66 MJ, water content 0.25, wet mass 1 kg
  note on carbon content, non-fossil: Biogenic C content was calculated after biogenic C contents of chemicals used in the production of the paper (in Tab 8.72 & 8.73 ecoinvent v2.2 report 11_III, part 8). The cellulose content in 1 kg of paper (on a wet mas basis) was estimated as (1-chemical content), C content of cellulose was considered 0.44 kgC/kg dry mass (ecoinvent v2.2 report, n 15a, pg 40) C-content of starch is considered 46% on dry mass basis (from "Evolutionary and Biochemical Aspects", A.D. Kay and T. Vrede (in Global Ecology, 2010, Elsevier B.V., S.E. Jørgensen Ed.)).
- sludge from pulp and paper production: -0.00473 kg; name Amount_BP3; lognormal variance with pedigree 0.0026, pedigree (1,3,1,5,1)
  (same comment as for municipal solid waste)
  production volume; = PV_ref*( Amount_BP3/ Amount_ref)
    (same comment as for ash from paper production sludge)
  properties: carbon content, non-fossil 0.21, dry mass 0.75 kg, heating value, net 2.65 MJ, water content 0.333333, wet mass 1 kg
  note on carbon content, non-fossil: Biogenic C content was calculated after biogenic C contents of chemicals used in the production of the paper (in Tab 8.72 & 8.73 ecoinvent v2.2 report 11_III, part 8). The cellulose content in 1 kg of paper (on a wet mas basis) was estimated as (1-chemical content), C content of cellulose was considered 0.44 kgC/kg dry mass (ecoinvent v2.2 report, n 15a, pg 40) Tab 6.21, ecoinvent v2.2 report 11_III & Tab A.9, ecoinvent v2.2 report 13_I. Sludge from pulp and paper contains 15.75% carbon
- sulfate pulp, bleached: 0.51585 kg; = 0.543*0.95; lognormal variance with pedigree 0.0426, pedigree (1,3,5,5,1)
  pulp input is 5% unbleached pulp and 95% bleached pulp
  Uncertainty: average from several european fine paper producers
  properties: carbon content, non-fossil 0.494, dry mass 0.9 kg, heating value, net 13.23 MJ, water content 0.111111, wet mass 1 kg
  note on carbon content, non-fossil: C content of dry mass of sulfate pulp is 0.494 kgC/kg dry wood (ecoinvent v2.2 report 6_IX & ecoinvent v2.2 report 9). No other C containing products in the formulation of the pulp.
- sulfate pulp, unbleached: 0.02715 kg; = 0.543*0.05; lognormal variance with pedigree 0.0426, pedigree (1,3,5,5,1)
  (same comment as for sulfate pulp, bleached)
  properties: carbon content, non-fossil 0.494, dry mass 0.9 kg, heating value, net 13.23 MJ, price 0.355 EUR2005, water content 0.111111, wet mass 1 kg

## Inputs from nature
- Water, cooling, unspecified natural origin [natural resource, in water]: 0.0124 m3; name water_cooling_UNO_input; lognormal variance with pedigree 0.0426, pedigree (1,3,5,5,1)
  Average from several european fine paper producers
  Uncertainty: average from several european fine paper producers
- Water, unspecified natural origin [natural resource, in water]: 0.0084 m3; name water_UNO_input; lognormal variance with pedigree 0.0426, pedigree (1,3,5,5,1)
  (same comment as for Water, cooling, unspecified natural origin)

## Emissions to nature
- Water [air, unspecified]: 0.006065 m3; name water_to_air_unspecified; lognormal variance with pedigree 0.0827, pedigree (2,2,5,5,1)
  Calculated value based on literature values and expert opinion. See comments in the parametres' comment field.
  property fraction, origin: fresh water 0; name fraction_origin_fresh_water
  property fraction, origin: salt water 0; name fraction_origin_salt_water
  property fraction, origin: unspecified 1; name fraction_origin_unspecified
- BOD5, Biological Oxygen Demand [water, surface water]: 0.00047 kg; lognormal variance with pedigree 0.0826, pedigree (1,3,5,5,1)
  (same comment as for Water, cooling, unspecified natural origin)
- COD, Chemical Oxygen Demand [water, surface water]: 0.00172 kg; lognormal variance with pedigree 0.0826, pedigree (1,3,5,5,1)
  (same comment as for Water, cooling, unspecified natural origin)
- DOC, Dissolved Organic Carbon [water, surface water]: 0.000637037 kg; lognormal variance with pedigree 0.0826, pedigree (1,3,5,5,1)
  Calculated as equal to TOC.
  Uncertainty: average from several european fine paper producers
- Nitrogen [water, surface water]: 4e-5 kg; lognormal variance with pedigree 0.0826, pedigree (1,3,5,5,1)
  (same comment as for Water, cooling, unspecified natural origin)
- Phosphorus [water, surface water]: 5.1e-6 kg; lognormal variance with pedigree 0.0826, pedigree (1,3,5,5,1)
  (same comment as for Water, cooling, unspecified natural origin)
- Suspended solids, unspecified [water, surface water]: 0.00011 kg; lognormal variance with pedigree 0.0826, pedigree (1,3,5,5,1)
  (same comment as for Water, cooling, unspecified natural origin)
- TOC, Total Organic Carbon [water, surface water]: 0.000637037 kg; lognormal variance with pedigree 0.0826, pedigree (1,3,5,5,1)
  Calculated by default as TOC (gC) = COD/2.7 (COD measured in g O2). Should more correctly be calculated from the carbon content of the specified emissions to water.
  Uncertainty: average from several european fine paper producers
- Water [water, unspecified]: 0.014735 m3; name water_to_water_unspecified; lognormal variance with pedigree 0.0827, pedigree (2,2,5,5,1)
  (same comment as for Water)
  property carbon content, fossil 0; name C_content_fossil
  property carbon content, non-fossil 0; name C_content_non_fossil
  property dry mass 0 kg; name DM
  property fraction, origin: fresh water 0; name fraction_origin_fresh_water_Ww
  property fraction, origin: salt water 0; name fraction_origin_salt_water_Ww
  property fraction, origin: unspecified 1; name fraction_origin_unspecified_Ww
  property water in wet mass 1000 kg; name WWM
  property wet mass 1000 kg; name WM

## Sampling procedure
Based on literature and statistics (see dataset field “Published Source”)

## Extrapolations
This dataset has been copied from an original dataset covering the geography RER. The uncertainty has been adjusted accordingly.

## Review by Hans-Jörg Althaus 2003-08-06
Passed
