# industrial furnace production, natural gas

Dataset: EcoSpold 2, unit process
Geography: RER
Time period: 1993-01-01 to 2023-12-31
Technology level: current
Classification: EcoSpold01Categories: natural gas/heating systems
Classification: ISIC rev.4 ecoinvent: 2815:Manufacture of ovens, furnaces and furnace burners
Tags: ConvertedDataset
Scenario: Business-as-Usual
System model: Allocation, cut-off by classification
Generated by: Thomas Heck
Published in: Faist Emmenegger, M. 2007
Database: ecoinvent
isCopyrightProtected: true
accessRestrictedTo: 1

## General comment
About 100 kW gas input. Data identical to oil industral furnace 1 MW.
[This dataset was already contained in the ecoinvent database version 2. It was not individually updated during the transfer to ecoinvent version 3. Life Cycle Impact Assessment results may still have changed, as they are affected by changes in the supply chain, i.e. in other datasets. This dataset was generated following the ecoinvent quality guidelines for version 2. It may have been subject to central changes described in the ecoinvent version 3 change report (http://www.ecoinvent.org/database/ecoinvent-version-3/reports-of-changes/), and the results of the central updates were reviewed extensively. The changes added e.g. consistent water flows and other information throughout the database. The documentation of this dataset can be found in the ecoinvent reports of version 2, which are still available via the ecoinvent website. The change report linked above covers all central changes that were made during the conversion process.]

## Included activities end
Asssuming that oil and gas boilers of comparable capacity have approximately the same material and energy uses for manufactring, the module for oil industrial furnace 1 MW has been directly used. Thus, through the description of the infrastructure of the oil boiler, the module includes the most important materials used for production. It includes also the transport of these materials and the energy and water needed for production.

## Geography
The average (oil) boilers in CH are assumed to be the same as in RER.

## Technology
It was assumed that the material requirement for a gas boiler is approximately the same as for an oil boiler. Moreover, is has been assumed that these materials are about the same in modern (2000) boilers as well as in average installed boilers.

## Time period
see entry for module "industrial furnace 1MW, oil"

## Reference product
- industrial furnace, natural gas: 1 unit; By-product classification allocatable product; CPC 43420: Industrial or laboratory furnaces and ovens, except non-electric bakery ovens; other industrial or laboratory […]; HS2017 841780: Furnaces and ovens; including incinerators, non-electric, for industrial or laboratory use, n.e.c. in headi[...]
  EcoSpold01Location=RER
  production volume 1.32237 unit
    This is a placeholder value that does not reflect real-world production volumes. This dataset does not currently require a real-world production volume to work in the database framework, and no actual data were collected yet. This has no negative effect on the results of the ecoinvent database. The placeholder value of this activity was scaled according to the nominal GDP of 2005 (source: United Nations, http://data.un.org/Glossary.aspx?q=GDP+%28current+US%24%29, accessed 20130726) to reflect an appropriate share of the global production volume, which is also a placeholder value.
  property price 72252 EUR2005
    Calculated based on inputs: The price of the product has been calculated as a sum of the values of the material and energy inputs for this product. This value is therefore a rough estimation. It may underestimate the real price since there are additional expenses when producing any product. These expences can include for example labour costs, treatment of waste materials and profit for the producer. Please consider carefully whether this level of data quality is acceptable for your application.
  properties: carbon allocation 0 kg, carbon content 0

## Inputs from technosphere
- industrial furnace, 1MW, oil: 1 unit; lognormal variance with pedigree 0.04, pedigree (1,1,5,1,1)
  EcoSpold01Location=CH
  uncertainty of extrapolation from oil boiler to gas boiler, rough estimate.

## Extrapolations
see Geography/Text and Technology/Text

## Review by Michael Spielmann (obsolete) 2003-07-06
passed.
