# textile production, cotton, circular knitting

Dataset: EcoSpold 2, unit process
Geography: RoW
Time period: 2016-01-01 to 2023-12-31
Technology level: current
Classification: ISIC rev.4 ecoinvent: 1391:Manufacture of knitted and crocheted fabrics
Scenario: Business-as-Usual
System model: Allocation, cut-off by classification
Generated by: Mireille Faist Emmenegger
Database: ecoinvent
isCopyrightProtected: true
accessRestrictedTo: 1

## General comment
Inventory refers to 1 kg knitted textile
This dataset covers all relevant input and output flows of the represented gate to gate unit process with a good overall data quality. The inventory is based on industry data. The global dataset is based on the IN and BD datasets.
Knitting is a method by which thread or yarn may be turned into cloth by making consecutive loops called stitches. A new loop is pulled through each loop and a new loop is created. Knitting creates a fabric which is more stretchable and comfortable.
Circular knitting is a form of knitting that creates a seamless tube. Knitting is worked in rounds in a spiral (the equivalent of rows in flat knitting). This form of knitting is used to create T- shirt Jersey fabric and socks
Cotton Inc (2017): LCA UPDATE OF COTTON FIBER AND FABRIC LIFE CYCLE INVENTORY.
Cotton Inc (2017): LCA UPDATE OF COTTON FIBER AND FABRIC LIFE CYCLE INVENTORY.
Cotton Inc (2017): LCA UPDATE OF COTTON FIBER AND FABRIC LIFE CYCLE INVENTORY.
Cotton Inc (2017): LCA UPDATE OF COTTON FIBER AND FABRIC LIFE CYCLE INVENTORY.
Cotton Inc (2017): LCA UPDATE OF COTTON FIBER AND FABRIC LIFE CYCLE INVENTORY.

## Included activities start
The activity begins with yarn .

## Included activities end
The activity ends with the knitted greige fabric.

## Geography
The data are based on primary data collected by cotton Inc.

## Technology
Data set represents average technology.
Once the yarn is received in packaged form, it is placed in creel to feed the knitting zone into the feeder. Upon setting the specific yarn as per the fabric requirement, machine is set as per specific design requirement and the machine processes yarn into loops culminating into production of fabric.

## Reference product
- textile, knit cotton: 1 kg; name RP_amount_1; By-product classification allocatable product; CPC 28190: Other knitted or crocheted fabrics; HS2017 600192: Fabrics; pile fabrics (excluding long pile and loop pile), of man-made fibres, knitted or crocheted
  production volume 6.41274e9 kg; name PV; = 5.2E8/0.075
    Assumption based on the The Fibre Year 2017: Indian production is about 7.5% of world production
  properties: carbon allocation 0.46 kg, carbon content 0.46, carbon content, non-fossil 0.46, dry mass 1 kg, price 11.7 EUR2005, wet mass 1 kg

## Inputs from technosphere
- building, hall: 3.2751e-5 m2; lognormal variance with pedigree 0.3046, pedigree (2,1,3,5,1)
  Approximation based on industry data.
- building, hall, steel construction: 1.03107e-5 m2; lognormal variance with pedigree 0.018, pedigree (4,1,3,5,1)
  Approximation based on industry data.
- electricity, low voltage: 0.00186951, 0.0101158, 0.000393133, 0.000152853, 0.0106699, 0.00254321, 0.000153375, 0.000524166, 0.000209437, 0.0941722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 kWh (46 suppliers, which the file names only by identifier); sum of these 0.266667 kWh; = 0.96/3.6; lognormal variance with pedigree 0.0066, pedigree (1,4,3,5,1)
  Sum of electricity used for knitting machines. Electricity consumption for utilities are not included in this dataset
- heat, district or industrial, natural gas: 1.39 MJ; lognormal variance with pedigree 0.0052, pedigree (2,4,3,1,1)
  Value from industrial partner [Cotton Inc.]
  properties: heating value, net 1 MJ
- paraffin: 0.00177 kg; name oil; lognormal variance with pedigree 0.003825, pedigree (2,3,3,2,1)
  Knitting lubricant
  properties: carbon content, fossil 0.847059, dry mass 1 kg, heating value, net 41.5 MJ, wet mass 1 kg
  note on heating value, net: Indicative value. Reference: Fuels - Higher and Lower Calorific Values, available at: https://www.engineeringtoolbox.com/fuels-higher-calorific-values-d_169.html
- waste mineral oil: -6.01385e-6, -0.000636061, -0.000242925 kg (3 suppliers, which the file names only by identifier); sum of these -0.000885 kg; = oil*0.5; lognormal variance with pedigree 0.0046, pedigree (1,4,1,5,1)
  This is produced due to the use of lubricating oil necessary for the operation of machinery.
  production volume; = PV * (BP_amount_1 / RP_amount_1)
    Calculated from production volume of reference product using the relative outputs.
  properties: carbon content, fossil 0.864444, dry mass 0.9 kg, heating value, net 34.7 MJ, water content 0.111111, wet mass 1 kg
  note on carbon content, fossil: Tab A.6, ecoinvent v2.2 report 13_I. C content has been calculated after data in the tables, and then referred to 1 kg DM
  note on heating value, net: Value taken from the general comment of the treatment dataset.
- waste yarn and waste textile: -0.02 kg; name WY; lognormal variance with pedigree 0.0118, pedigree (4,3,1,5,2)
  This waste is landfilled. Data based on expert judgement based on company data
  production volume; = PV*WY
    Calculated based on production volume and waste yarn share.
  properties: carbon content, non-fossil 0.44455, dry mass 0.97917 kg, heating value, net 13.14 MJ, water content 0.0212731, wet mass 1 kg
- yarn, cotton: 1.02 kg; lognormal variance with pedigree 0.0066, pedigree (1,4,3,5,1)
  Most of the waste and by products are being reused in the plant hence they are not considered in the inventory
  properties: carbon content, non-fossil 0.46, dry mass 0.94 kg, heating value, net 12.95 MJ, water content 0.0638298, wet mass 1 kg

## Emissions to nature
- Oils, unspecified [soil, unspecified]: 0.000885 kg; = oil*0.5; lognormal variance with pedigree 0.0052, pedigree (2,4,3,1,1)
  Assumption: half of the oil which is used as an input ends up in the soil.

## Extrapolations
Extrapolated from data from mostly vertically integrated mills.
