# tomato production, fresh grade, open field

Dataset: EcoSpold 2, unit process
Geography: IN-MH
Time period: 2015-01-01 to 2023-12-31
Technology level: current
Classification: ISIC rev.4 ecoinvent: 0113:Growing of vegetables and melons, roots and tubers
Scenario: Business-as-Usual
System model: Allocation, cut-off by classification
Generated by: Sanjeevan Bajaj
Database: ecoinvent
isCopyrightProtected: true
accessRestrictedTo: 1

## General comment
This dataset represents the production of 1 kg of fresh Tomato during May-December, 2016 at a farm located in village Vadner Bhairav, District Nashik of Maharashtra State in India. In this area, fields are irrigated with ground water using electric pump for surface irrigation. The farm has a yield of 70,000 kg fresh matter per ha for this crop cycle. Sowing date for the crop is 15-July, 2016 and harvesting date is 20-December, 2016. Mineral NPK fertilizer input is 66.91-261.23-108.04 kg/ha. Organic fertilizer applied amounts to 40,000 kg of manure from cattle dung. Fungicide used has active ingredient as Carbendazim 731.25g/ha, Difenoconazole 56.25g/ha, Dimethomorph 750g/ha, Mancozeb 831g/ha, Metalaxil 20.8g/ha, Copper oxichloride 1500g/ha (Copper (Cu) used as proxy). Insecticide used has active ingredient as Abamectin 31.25g/ha, Chlorantranilipore 60g/ha (Clothianidin used as proxy), Cyantraniliprole 90g/ha (Thiamethoxam used as proxy), and Imidacloprid 36.49g/ha. Machinery is used only for soil cultivation with fuel consumption of 12.48 kg/ha using plough, hoeing, earthen up and rotary cultivator for soil tillage. For plant protection machinery are used which consumes fuel 15.6kg/ha.
[This dataset is meant to replace the following datasets:
- tomato production, fresh grade, IN-MH, 2015 - 2018]

## Included activities start
This activity starts about four weeks after the harvest of the previous crop. The soil is prepared for cultivation in May and sowing of seeds started about five weeks after soil preparation. Thereafter the crop is mature for harvesting in about 5 months.

## Included activities end
The activity ends with the harvesting of the mature Tomato from the Tomato plant. Thereafter the field is prepared for cultivation of the next crop.

## Technology
Cultivation of Tomato follows conventional production standards

## Time period
Soil cultivating date for the main crop: 04-May, 2016; Harvesting date main crop: 20-December, 2016. The soil cultivation, sowing and harvesting dates are taken as the middle date of the week or fortnight told to the data collector by the farmer. Total time from date of sowing to date of harvesting comes to 155 days. The data is collected for one crop cycle. The cycle of one year is considered for entry in ecoeditor.

## Parameters
- LUC_crop_specific: 1 dimensionless
  This parameter allows to switch between a "crop specific" and a "country specific" approach when calculating the LUC of a crop. By default, the chosen approach is "crop specific", so the value of the parameter is 1. If you want to apply a "country specific" approach, turn the parameter to 0.

## Reference product
- tomato, fresh grade: 1 kg; By-product classification allocatable product; CPC 01234: Tomatoes; HS2017 070200: Vegetables; tomatoes, fresh or chilled
  production volume 9.7658e8 kg; = 976.58*1000*1000
    http://agriexchange.apeda.gov.in/India%20Production/India_Productions.aspx?cat=Vegetables&hscode=1088
    Production volume given in thousand tonnes, figure used is for Maharashtra
  property price 1.09 EUR2005
    Calculated from the trade statistics for the year 2005 published by the UN (COMTRADE database, accessed 20151105) as an average of 5 biggest importers of tomato in the world; USA, DE, UK, FR and NL. Comtrade cathegory: 702: Tomatoes, fresh or chilled.
  properties: carbon allocation 0 kg, carbon content 0

## Inputs from technosphere
- acetamide-anillide-compound, unspecified: 2.97143e-7 kg; lognormal variance with pedigree 0.0052, pedigree (2,4,3,1,1)
  properties: carbon content, fossil 0.659175, dry mass 1 kg, wet mass 1 kg
- application of plant protection product, by field sprayer: 0.000126623 ha; lognormal variance with pedigree 0.0052, pedigree (2,4,3,1,1)
  Pesticide Spray
- benzimidazole-compound: 1.04464e-5 kg; lognormal variance with pedigree 0.0052, pedigree (2,4,3,1,1)
  The data was collected for a hectare area through interview
  properties: carbon content, fossil 0.529668, dry mass 1 kg, wet mass 1 kg
- compost: 0.571429 kg; lognormal variance with pedigree 0.0052, pedigree (2,4,3,1,1)
  Home made compost
  property cadmium content 3.6e-7; name Cd_content
  property chromium content 2.23e-5; name Cr_content
  property copper content 5.77e-5; name Cu_content
  property dry mass 0.5 kg; name DM
  property lead content 4.9e-5; name Pb_content
  property mercury content 1.2e-7; name Hg_content
  property nickel content 1.63e-5; name Ni_content
  property nitrogen content 0.014; name N_content
  property phosphorus content 0.0035; name P_content
  property potassium content 0.01; name K_content
  property zinc content 0.000184; name Zn_content
  properties: carbon content, non-fossil 0.183645, water content 1, wet mass 1 kg
- copper oxide: 2.14286e-5 kg; lognormal variance with pedigree 0.0052, pedigree (2,4,3,1,1)
  The data was collected for a hectare area through interview
  properties: dry mass 1 kg, wet mass 1 kg
- cyclic N-compound: 1.4182e-5 kg; lognormal variance with pedigree 0.0052, pedigree (2,4,3,1,1)
  This exchange is an aggregation of amounts:
  5.212857142857143E-7. Comment:
  8.571428571428571E-7. Comment:
  1.2857142857142856E-6. Comment:
  1.0714285714285714E-5. Comment:
  8.035714285714286E-7. Comment:
  properties: carbon content, fossil 0.641962, dry mass 1 kg, wet mass 1 kg
- dolomite: 0.00704502 kg; lognormal variance with pedigree 0.0052, pedigree (2,4,3,1,1)
  The data was collected for a hectare area through interview
  properties: carbon content, fossil 0.130435, dry mass 1 kg, heating value, net 3.95 MJ, wet mass 1 kg
- inorganic nitrogen fertiliser, as N: 0.000955857 kg; lognormal variance with pedigree 0.0052, pedigree (2,4,3,1,1)
  This exchange is an aggregation of amounts:
  9.558571428571429E-5. Comment:
  6.404242857142858E-4. Comment:
  9.558571428571429E-5. Comment:
  5.735142857142857E-5. Comment:
  6.691E-5. Comment:
  properties: dry mass 1 kg, wet mass 1 kg
- inorganic phosphorus fertiliser, as P2O5: 0.00373179 kg; lognormal variance with pedigree 0.0052, pedigree (2,4,3,1,1)
  This exchange is an aggregation of amounts:
  0.0010822178571428572. Comment:
  4.8513214285714293E-4. Comment:
  0.00156735. Comment:
  5.970857142857144E-4. Comment:
  properties: dry mass 1 kg, wet mass 1 kg
- inorganic potassium fertiliser, as K2O: 0.000246943 kg; lognormal variance with pedigree 0.0052, pedigree (2,4,3,1,1)
  The data was collected for a hectare area through interview
  properties: dry mass 1 kg, wet mass 1 kg
- irrigation: 0.110268 m3; lognormal variance with pedigree 0.0052, pedigree (2,4,3,1,1)
  The data was collected for a hectare area through interview
  properties: dry mass 0.11 kg, water content 9089.91, wet mass 1000 kg
- lime: 0.000167676 kg; lognormal variance with pedigree 0.0052, pedigree (2,4,3,1,1)
  The data was collected for a hectare area through interview
  properties: carbon content, fossil 0.120005, dry mass 1 kg, wet mass 1 kg
- mancozeb: 1.18714e-5 kg; lognormal variance with pedigree 0.0052, pedigree (2,4,3,1,1)
  The data was collected for a hectare area through interview
  properties: carbon content, fossil 0.17759, dry mass 1 kg, wet mass 1 kg
- packaging, for fertilisers: 0.0268875 kg; lognormal variance with pedigree 0.0532, pedigree (4,3,3,5,4)
  Total amount of active substance/s of fertilisers needed for the production of 'tomato, fresh grade' is calculated to be circa 1.34E-02 kg. Fertiliser/s used in this dataset is/are: 'dolomite', 'lime', 'nitrogen fertiliser, as N', 'phosphate fertiliser, as P2O5', 'potassium chloride, as K2O', 'potassium fertiliser, as K2O', 'potassium sulfate, as K2O'. The total amount of active substance/s is doubled in order to account for the packaging of the dilluted product of fertiliser/s that is/are applied. Therefore, 2.69E-02 kg of packaging for fertilisers is justified with this exchange.
  properties: carbon content, fossil 0.825301, dry mass 1 kg, heating value, net 25.01 MJ, price 0.0642 EUR2005, wet mass 1 kg
  note on carbon content, fossil: Considering a chemical formula (C2H4)n for polyethylene, carbon content-fossil is calculated to be 0.856286 kg of Carbon per kg of dry mass.
- packaging, for pesticides: 0.000117344 kg; lognormal variance with pedigree 0.0532, pedigree (4,3,3,5,4)
  Total amount of active substance/s of pesticides needed for the production of tomato, fresh grade is calculated to be circa 5.87E-05 kg. Pesticide/s used in this dataset is/are: 'acetamide-anillide-compound, unspecified', 'benzimidazole-compound', 'copper oxide', 'cyclic N-compound', 'mancozeb', 'pesticide, unspecified'. The total amount of active substance/s is doubled in order to account for the packaging of the dilluted product of pesticide/s that is/are applied. Therefore, 1.17E-04 kg of packaging for pesticides is justified with this exchange.
  properties: carbon content, fossil 0.85714, dry mass 1 kg, heating value, net 25.97 MJ, price 0.0642 EUR2005, wet mass 1 kg
- pesticide, unspecified: 4.46429e-7 kg; lognormal variance with pedigree 0.0052, pedigree (2,4,3,1,1)
  properties: carbon content, fossil 0.486978, dry mass 1 kg, wet mass 1 kg
- polyethylene, high density, granulate: 0.00255357 kg; lognormal variance with pedigree 0.0052, pedigree (2,4,3,1,1)
  The data was collected for a hectare area through interview
  properties: carbon content, fossil 0.857143, dry mass 1 kg, heating value, net 42.47 MJ, wet mass 1 kg
  note on carbon content, fossil: Polyethylene is formed out of a huge amount of ethylene monomers (C2H4) (ecoinvent v2.2 report 11_II). MW=28 g/mol
- potassium chloride: 0.000586328 kg; lognormal variance with pedigree 0.0052, pedigree (2,4,3,1,1)
  The exchange has been updated from 'potassium chloride, as K2O' into 'potassium chloride' and therefore its amount has been scaled (multiplied) from 0.0004 kg by 1.5829 kg of 'potassium chloride' per kg of 'potassium chloride, as K2O'. Original comment of the exchange is: The data was collected for a hectare area through interview
  properties: dry mass 1 kg, wet mass 1 kg
- potassium sulfate: 0.00171313 kg; lognormal variance with pedigree 0.0052, pedigree (2,4,3,1,1)
  The exchange has been updated from 'potassium sulfate, as K2O' into 'potassium sulfate' and therefore its amount has been scaled (multiplied) from 0.0009 kg by 1.85 kg of 'potassium sulfate' per kg of 'potassium sulfate, as K2O'. Original comment of the exchange is: The data was collected for a hectare area through interview
  properties: dry mass 1 kg, wet mass 1 kg
- tillage, harrowing, by rotary harrow: 5.06335e-6 ha; lognormal variance with pedigree 0.0052, pedigree (2,4,3,1,1)
  The data was collected for a hectare area through interview
- tillage, hoeing and earthing-up, potatoes: 2.02183e-5 ha; lognormal variance with pedigree 0.0052, pedigree (2,4,3,1,1)
  The data was collected for a hectare area through interview
- tillage, ploughing: 6.13519e-6 ha; lognormal variance with pedigree 0.0052, pedigree (2,4,3,1,1)

## Inputs from nature
- Carbon dioxide, in air [natural resource, in air]: 0.081455 kg; lognormal variance with pedigree 0.0052, pedigree (2,4,3,1,1)
  Calculated Value. This value has been calculated by using the ecoinvent LCI calculation tool for crop production.
- Energy, gross calorific value, in biomass [natural resource, biotic]: 0.936732 MJ; lognormal variance with pedigree 0.0052, pedigree (2,4,3,1,1)
  The data was collected for a hectare area through interview
- Occupation, annual crop, irrigated [natural resource, land]: 0.113095 m2*year; lognormal variance with pedigree 0.0066, pedigree (2,4,3,1,1)
  (same comment as for Carbon dioxide, in air)
- Transformation, from annual crop, irrigated [natural resource, land]: 0.142857 m2; lognormal variance with pedigree 0.0126, pedigree (2,4,3,1,1)
  (same comment as for Carbon dioxide, in air)
- Transformation, to annual crop, irrigated [natural resource, land]: 0.142857 m2; lognormal variance with pedigree 0.0126, pedigree (2,4,3,1,1)
  (same comment as for Carbon dioxide, in air)

## Emissions to nature
- Ammonia [air, non-urban air or from high stacks]: 0.000419725 kg; lognormal variance with pedigree 0.0126, pedigree (2,4,3,1,1)
  (same comment as for Carbon dioxide, in air)
- Carbon dioxide, fossil [air, non-urban air or from high stacks]: 0.00343649 kg; lognormal variance with pedigree 0.0052, pedigree (2,4,3,1,1)
  (same comment as for Carbon dioxide, in air)
- Dinitrogen monoxide [air, non-urban air or from high stacks]: 8.9018e-5 kg; lognormal variance with pedigree 0.0346, pedigree (2,4,3,1,1)
  (same comment as for Carbon dioxide, in air)
- Nitrogen oxides [air, non-urban air or from high stacks]: 0.000303934 kg; lognormal variance with pedigree 0.0446, pedigree (2,4,3,1,1)
  (same comment as for Carbon dioxide, in air)
- Water [air, non-urban air or from high stacks]: 0.0562366 m3; lognormal variance with pedigree 0.0052, pedigree (2,4,3,1,1)
  (same comment as for Carbon dioxide, in air)
- Abamectin [soil, agricultural]: 4.46429e-7 kg; lognormal variance with pedigree 0.0376, pedigree (2,4,3,1,1)
  (same comment as for Carbon dioxide, in air)
- Cadmium II [soil, agricultural]: 3.46938e-7 kg; lognormal variance with pedigree 0.0446, pedigree (2,4,3,1,1)
  (same comment as for Carbon dioxide, in air)
- Carbendazim [soil, agricultural]: 1.04464e-5 kg; lognormal variance with pedigree 0.0376, pedigree (2,4,3,1,1)
  (same comment as for Carbon dioxide, in air)
- Chromium III [soil, agricultural]: 6.8945e-6 kg; lognormal variance with pedigree 0.0446, pedigree (2,4,3,1,1)
  (same comment as for Carbon dioxide, in air)
- Clothianidin [soil, agricultural]: 8.57143e-7 kg; lognormal variance with pedigree 0.0376, pedigree (2,4,3,1,1)
  (same comment as for Carbon dioxide, in air)
- Copper ion [soil, agricultural]: 5.71841e-5 kg; lognormal variance with pedigree 0.0446, pedigree (2,4,3,1,1)
  This exchange is an aggregation of amounts:
  3.575554474438295E-5. Comment: Calculated
  2.1428571428571428E-5. Comment: Calculated
- Difenoconazole [soil, agricultural]: 8.03571e-7 kg; lognormal variance with pedigree 0.0376, pedigree (2,4,3,1,1)
  (same comment as for Carbon dioxide, in air)
- Dimethomorph [soil, agricultural]: 1.07143e-5 kg; lognormal variance with pedigree 0.0376, pedigree (2,4,3,1,1)
  (same comment as for Carbon dioxide, in air)
- Imidacloprid [soil, agricultural]: 5.21286e-7 kg; lognormal variance with pedigree 0.0376, pedigree (2,4,3,1,1)
  (same comment as for Carbon dioxide, in air)
- Lead II [soil, agricultural]: 1.25841e-5 kg; lognormal variance with pedigree 0.0446, pedigree (2,4,3,1,1)
  (same comment as for Carbon dioxide, in air)
- Mancozeb [soil, agricultural]: 1.18714e-5 kg; lognormal variance with pedigree 0.0376, pedigree (2,4,3,1,1)
  (same comment as for Carbon dioxide, in air)
- Mercury II [soil, agricultural]: 3.58577e-8 kg; lognormal variance with pedigree 0.0446, pedigree (2,4,3,1,1)
  (same comment as for Carbon dioxide, in air)
- Metalaxil [soil, agricultural]: 2.97143e-7 kg; lognormal variance with pedigree 0.0376, pedigree (2,4,3,1,1)
  (same comment as for Carbon dioxide, in air)
- Nickel II [soil, agricultural]: 3.68984e-6 kg; lognormal variance with pedigree 0.0446, pedigree (2,4,3,1,1)
  (same comment as for Carbon dioxide, in air)
- Thiamethoxam [soil, agricultural]: 1.28571e-6 kg; lognormal variance with pedigree 0.0376, pedigree (2,4,3,1,1)
  (same comment as for Carbon dioxide, in air)
- Zinc II [soil, agricultural]: 5.49432e-5 kg; lognormal variance with pedigree 0.0446, pedigree (2,4,3,1,1)
  (same comment as for Carbon dioxide, in air)
- Cadmium II [water, ground-]: 5.53891e-10 kg; lognormal variance with pedigree 0.0946, pedigree (2,4,3,1,1)
  (same comment as for Carbon dioxide, in air)
- Cadmium II [water, surface water]: 1.73767e-8 kg; lognormal variance with pedigree 0.0946, pedigree (2,4,3,1,1)
  (same comment as for Carbon dioxide, in air)
- Chromium III [water, ground-]: 2.38637e-7 kg; lognormal variance with pedigree 0.0946, pedigree (2,4,3,1,1)
  (same comment as for Carbon dioxide, in air)
- Chromium III [water, surface water]: 1.55289e-6 kg; lognormal variance with pedigree 0.0946, pedigree (2,4,3,1,1)
  (same comment as for Carbon dioxide, in air)
- Copper ion [water, ground-]: 4.06856e-8 kg; lognormal variance with pedigree 0.0946, pedigree (2,4,3,1,1)
  (same comment as for Carbon dioxide, in air)
- Copper ion [water, surface water]: 2.26359e-6 kg; lognormal variance with pedigree 0.0946, pedigree (2,4,3,1,1)
  (same comment as for Carbon dioxide, in air)
- Lead II [water, ground-]: 6.68647e-9 kg; lognormal variance with pedigree 0.0946, pedigree (2,4,3,1,1)
  (same comment as for Carbon dioxide, in air)
- Lead II [water, surface water]: 1.41781e-6 kg; lognormal variance with pedigree 0.0946, pedigree (2,4,3,1,1)
  (same comment as for Carbon dioxide, in air)
- Mercury II [water, ground-]: 1.45123e-11 kg; lognormal variance with pedigree 0.0946, pedigree (2,4,3,1,1)
  (same comment as for Carbon dioxide, in air)
- Mercury II [water, surface water]: 4.39195e-9 kg; lognormal variance with pedigree 0.0946, pedigree (2,4,3,1,1)
  (same comment as for Carbon dioxide, in air)
- Nickel II [water, surface water]: 1.4163e-6 kg; lognormal variance with pedigree 0.0946, pedigree (2,4,3,1,1)
  (same comment as for Carbon dioxide, in air)
- Nitrate [water, ground-]: 0.00184274 kg; lognormal variance with pedigree 0.0446, pedigree (2,4,3,1,1)
  (same comment as for Carbon dioxide, in air)
- Phosphate [water, ground-]: 2.4274e-6 kg; lognormal variance with pedigree 0.0446, pedigree (2,4,3,1,1)
  (same comment as for Carbon dioxide, in air)
- Phosphate [water, surface water]: 1.00316e-5 kg; lognormal variance with pedigree 0.0446, pedigree (2,4,3,1,1)
  (same comment as for Carbon dioxide, in air)
- Phosphorus [water, surface water]: 0.000118729 kg; lognormal variance with pedigree 0.0446, pedigree (2,4,3,1,1)
  (same comment as for Carbon dioxide, in air)
- Water [water, ground-]: 0.0430045 m3; lognormal variance with pedigree 0.0052, pedigree (2,4,3,1,1)
  (same comment as for Carbon dioxide, in air)
- Water [water, surface water]: 0.0110268 m3; lognormal variance with pedigree 0.0052, pedigree (2,4,3,1,1)
  (same comment as for Carbon dioxide, in air)
- Zinc II [water, ground-]: 3.67175e-7 kg; lognormal variance with pedigree 0.0946, pedigree (2,4,3,1,1)
  (same comment as for Carbon dioxide, in air)
- Zinc II [water, surface water]: 3.9852e-6 kg; lognormal variance with pedigree 0.0946, pedigree (2,4,3,1,1)
  (same comment as for Carbon dioxide, in air)

## Sampling procedure
The farmer was identified and contacted by agriculture science faculty familiar with the local farmers in the region. Data was collected directly from the farmer through semi-structured interview using a questionnaire based on the input requirements of the ecoinvent LCI calculation tool for crop production. The farmer does not maintain any written records and has provided the data from recent memory. In this region, typically farmers are unable to provide exact name of active ingredient in the pesticide they use and the same was noted from details given on the pesticide packet. Individual farmer is not able to calculate fuel consumption for his own farm alone and this information has been collected from farming community of the area.

## Extrapolations
Ecoinvent LCI calculation tool for crop production was used to calculate field emissions from the cultivation process.
