# treatment of used beverage cans, for recycling, unsorted, sorting

Dataset: EcoSpold 2, unit process
Geography: RoW
Time period: 2012-01-01 to 2023-12-31
Technology level: current
Classification: ISIC rev.4 ecoinvent: 3830:Materials recovery
Scenario: Business-as-Usual
System model: Allocation, cut-off by classification
Generated by: Avraam Symeonidis
Database: ecoinvent
isCopyrightProtected: true
accessRestrictedTo: 1

## General comment
This activity represents the treatment of used beverage cans (UBCs) from separate collection, i.e., a source-segregated municipal solid waste fraction, through sorting for recycling. The sorting of 'used beverage cans' yields 'aluminium scrap, post-consumer, prepared for melting' which is typically used for the production of aluminium, wrought alloy (Haupt et al. (2018)).
Source:
Melanie Haupt, Thomas Kägi, Stefanie Hellweg, Life cycle inventories of waste management processes, Data in Brief, Volume 19, 2018, Pages 1441-1457, https://doi.org/10.1016/j.dib.2018.05.067.

## Included activities start
The activity starts with 'used beverage cans' being available to the sorting facility. Collection of this 'used beverage cans, for recycling' is documented in the respective market for this waste.

## Included activities end
The activity ends with 'used beverage cans' being sorted and 'aluminium scrap, post-consumer, prepared for melting' being available for transportation at the gates of the sorting facility.

## Reference product
- aluminium scrap, post-consumer, prepared for melting: 1 kg; name RP1; By-product classification Recyclable; CPC 39363: Waste and scrap of aluminium; HS2017 760200: Aluminium; waste and scrap
  production volume 5.18959e8 kg; = PVRP*RP1/abs(RP)
    Calculated from production volume of reference product using the relative outputs.
  property price 0.806 EUR2005
    Temporary price data. Calculated as 90% of purchasers price based on: 2005 import and export prices (total trades (USD) divided by total weight (kg) in biggest economies of the world: EU27, USA, Brasil, China, India, Japan and Russia) from UN Commodity Trade Statistics Database (http://data.un.org/Explorer.aspxDatabase [Accessed 2011.06.17]). Commodity: Waste or scrap, aluminium
  properties: carbon allocation 0 kg, carbon content 0, carbon content, fossil 0, carbon content, non-fossil 0, dry mass 1 kg, water content 0, water in wet mass 0 kg, wet mass 1 kg

## Inputs from technosphere
- diesel, burned in building machine: 0.0176327 MJ; lognormal variance with pedigree 0.692, pedigree (1,1,5,5,1)
  properties: heating value, net 1 MJ
- electricity, medium voltage: 0.00033911, 0.00676449, 0.00227285, 0.000103847, 2.07849e-5, 4.46299e-6, 0.000698538 kWh (7 suppliers, which the file names only by identifier); sum of these 0.0102041 kWh; lognormal variance with pedigree 0.692, pedigree (1,1,5,5,1)
- municipal solid waste: -3.58833e-5, -4.26099e-6, -2.65193e-5, -0.0202453, -2.98167e-6, -9.57063e-7, -2.16323e-6, -9.00557e-5 kg (8 suppliers, which the file names only by identifier); sum of these -0.0204082 kg; lognormal variance with pedigree 0.0192, pedigree (4,3,4,5,1)
  production volume; = PVRP*BP/abs(RP)
    Calculated from production volume of reference product using the relative outputs.
  properties: carbon content, fossil 0.171549, carbon content, non-fossil 0.261655, dry mass 0.771 kg, heating value, net 11.74 MJ, water content 0.297017, wet mass 1 kg
  note on heating value, net: Value taken from the general comment of the treatment dataset.
- used beverage cans: 1.02041 kg; name RP
  production volume; name PVRP; = 5950000*100/0.8
    PV value is scaled from the CH value given that Switzerland accounts for 0.8% of the global GDP and Europe without Switzerland circa 28%.
  properties: carbon content, fossil 0.0026453, carbon content, non-fossil 0.00403464, dry mass 0.99542 kg, price 0.685 EUR2005, water content 0.00460107, wet mass 1 kg
  note on carbon content, fossil: fossil carbon content on a dry matter basis; estimated by assuming 2% impurities with composition as residual MSW with 77.1% dry matter and a fossil carbon content of 17.2% (on dry matter basis)
  note on carbon content, non-fossil: non-fossil carbon content on a dry matter basis; estimated by assuming 2% impurities with composition as residual MSW with 77.1% dry matter and a non-fossil carbon content of 26.2% (on dry matter basis)
- waste preparation facility: 2.04082e-9 unit; lognormal variance with pedigree 0.692, pedigree (1,1,5,5,1)

## Extrapolations
This dataset for GLO has been extrapolated from the corresponding activity in Switzerland. The uncertainty information has been adjusted accordingly.
