# concrete production, 30MPa, for drilled piles, with cement, Portland

Dataset: EcoSpold 2, unit process
Geography: RoW
Time period: 2013-01-01 to 2023-12-31
Technology level: current
Classification: ISIC rev.4 ecoinvent: 2395:Manufacture of articles of concrete, cement and plaster
Synonyms: ready-mixed concrete; Transportbeton; Bohrpfahlbeton
Scenario: Business-as-Usual
System model: Allocation, cut-off by classification
Generated by: Daniela Baumann
Published in: Werner F. 2014
Database: ecoinvent
isCopyrightProtected: true
accessRestrictedTo: 1

## General comment
This dataset contains the production of 30MPa concrete used for drilled piles with Portland cement from primary aggregates (no input of recycled gravel or sand). This type of concrete is used in concrete pile construction under dry or wet conditions with high requirements (alkali-aggregate reaction (AAR), frost-dew resistance).
Density: 2400 kg/m3, content of cement: 355 kg/m3
Exposition class according to EN 206-1: no normative requirements

## Included activities start
The activity starts with the ingredients for the concrete at the factory gate.

## Included activities end
Includes the whole manufacturing processes to produce ready-mixed concrete, internal processes (transport, etc.) and infrastructure. No administration is included.

## Geography
Swiss data. For some exchanges RER-modules have been used as proxy

## Technology
Typical technology for average Swiss production

## Parameters
- fraction, process water, to air: 0.15 dimensionless; name fraction_PW_to_air; lognormal variance with pedigree 0.092025, pedigree (4,4,3,2,4)
  Literature value. In case when no industry/process specific data are available, default evaporation fraction value is used. This value is 15% and is based on literature (Statistics Canada, 2007 & Shaffer, K.H., 2008, Consumptive water use in the Great Lakes Basin, USGS & Shiklomanov, 2003, World Water Resources at the Beginning of the 21st Century) and has been approved by an expert.
- fraction, tap water, to air: 0.15 dimensionless; name fraction_TW_to_air; = fraction_PW_to_air; lognormal variance with pedigree 0.092025, pedigree (4,4,3,2,4)
  Calculated value. See comment in the other parametres present in this dataset. Tap water is considered to be always used as process water, thus process water fractions to air are applied to all tap water input flows to calculate the amount of water consumed in the processes.
- fraction, water, completely softened, to air: 0.15 dimensionless; name fraction_WCS_to_air; = fraction_PW_to_air; lognormal variance with pedigree 0.092025, pedigree (4,4,3,2,4)
  Calculated value. See comment in the other parametres present in this dataset. Water, completely softened is considered to be always used as process water, thus process water fractions to air are applied to all water, completely softened input flows to calculate the amount of water consumed in the processes.

## Reference product
- concrete, 30MPa: 1 m3; name m_concrete; By-product classification allocatable product; CPC 37510: Non-refractory mortars and concretes; HS2017 6810: Cement, concrete or artificial stone; whether or not reinforced, articles thereof
  production volume 2.63292e6 m3; name p_concrete
    The global production volume was calculated as follows: 1) The total production volume of each country was calculated 2) The production volume was scaled based on construction output (*) 3) The average of the results was assumed to be the GLO PV 4) The share of each different technology was calculated 5) The weighted average of the shares for each country was used to split the GLO PV into different technologies (*) Construction output assumed per country Country Share ZA 0.50% BR 2.01% CH 0.36% CO 0.58% IN 9.67% PE 0.31% CA-QC 0.37% RNA without CA-QC 9.03% AT 0.40% Source: OECD. 2018. Input-Output Tables. http://www.oecd.org/trade/input-outputtables.htm. United Nations Statistics Division. 2019. UN data. A world of information. http://data.un.org/. Timmer, M.P., E. Dietzenbacher, B. Los, R. Stehrer, and G.J. de Vries. 2015. An Illustrated User Guide to the World Input-Output Database: the Case of Global Automotive Production. Review of International Economics 23(3): 575-605. http://doi.wiley.com/10.1111/roie.12178. The data was adjusted based on PPP, data from: The World Bank. 2019. World Bank Open Data. https://data.worldbank.org/
  property cement content 0 kg; name cement
  property gravel content 0 kg; name gravel
  property price 185 EUR2005
    Calculated value based on data from United Nations Commodity Trade Statistics Database (comtrade.un.org). UN comtrade category: 681019 Tiles & flagstones of cement, concrete, artificial ston. Year 2005. Using exchange rate of 1EURO = 1.209 USD. Average of price of import into 5 main markets (EU, US, JP, IN and CN).
  property sand content 0 kg; name sand
  properties: carbon allocation 0 kg, carbon content 0, carbon content, fossil 0, carbon content, non-fossil 0, dry mass 2205 kg, water content 0.0861678, water in wet mass 190 kg, wet mass 2395 kg

## Inputs from technosphere
All rows: source Werner F. 2014
- cement, Portland: 307.558, 11.6548, 15.5489, 17.0457, 0.705757, 0.643454, 0.627131, 0.799886, 0.416416 kg (9 suppliers, which the file names only by identifier); sum of these 355 kg; lognormal variance with pedigree 0.018, pedigree (4,1,3,5,1)
  properties: dry mass 1 kg, wet mass 1 kg
- concrete mixing factory: 4.17e-7 unit; lognormal variance with pedigree 0.3228, pedigree (2,1,2,5,1)
- diesel, burned in building machine: 0.5 MJ; lognormal variance with pedigree 0.0128, pedigree (2,1,2,5,1)
  properties: heating value, net 1 MJ
- electricity, medium voltage: 0.139668, 2.78606, 0.936108, 0.0427711, 0.00856058, 0.00183815, 0.194542, 0.287704, 0.602749 kWh (9 suppliers, which the file names only by identifier); sum of these 5 kWh; lognormal variance with pedigree 0.0128, pedigree (2,1,2,5,1)
- gravel, round: 1150 kg; lognormal variance with pedigree 0.0203, pedigree (4,2,2,5,1)
  properties: dry mass 1 kg, wet mass 1 kg
- heat, district or industrial, natural gas: 0.104354, 6.35041, 2.34523 MJ (3 suppliers, which the file names only by identifier); sum of these 8.8 MJ; lognormal variance with pedigree 0.0262, pedigree (3,4,2,5,1)
  properties: heating value, net 1 MJ
- heat, district or industrial, other than natural gas: 8.57775, 0.00397391, 0.218277 MJ (3 suppliers, which the file names only by identifier); sum of these 8.8 MJ; lognormal variance with pedigree 0.0262, pedigree (3,4,2,5,1)
  properties: heating value, net 1 MJ
- lubricating oil: 0.02 kg; lognormal variance with pedigree 0.0128, pedigree (2,1,2,5,1)
  properties: carbon content, fossil 0.75, dry mass 1 kg, heating value, net 40.2 MJ, wet mass 1 kg
  note on carbon content, fossil: Lubricating oil is produced from diesel. C-content/dry mass of fats and oils considered 75%, from: ecoinvent v2.2 report, n 15a, pg 40
  note on heating value, net: Literature value, Source: IPCC 2006, 2006 IPCC Guidelines for National Greenhouse Gas Inventories, Prepared by the National Greenhouse Gas Inventories Programme, Eggleston H.S., Buendia L., Miwa K., Ngara T. and Tanabe K. (eds). Published: IGES, Japan
- municipal solid waste: -8.49621e-5, -1.00889e-5, -6.41018e-5, -6.27906e-5, -0.0479355, -0.00161484, -7.0598e-6, -2.26607e-6, -5.12194e-6, -0.000213228 kg (10 suppliers, which the file names only by identifier); sum of these -0.05 kg; lognormal variance with pedigree 0.0126, pedigree (2,1,1,5,1)
  production volume; = w_solid_waste/m_concrete*p_concrete
    Calculated from the production volume of concrete, high exacting requirements in proportion to the respective output amounts.
  properties: carbon content, fossil 0.171549, carbon content, non-fossil 0.261655, dry mass 0.771 kg, heating value, net 11.74 MJ, water content 0.297017, wet mass 1 kg
  note on carbon content, fossil: MSW composition in tab 4.1, ecoinvent v2.2 report 13_I. C content referred to 1 kg DM
  note on heating value, net: Value taken from the general comment of the treatment dataset.
- sand: 10.6687, 694.276, 0.055387 kg (3 suppliers, which the file names only by identifier); sum of these 705 kg; lognormal variance with pedigree 0.018, pedigree (4,1,3,5,1)
  properties: dry mass 1 kg, wet mass 1 kg
- synthetic rubber: 0.12 kg; lognormal variance with pedigree 0.0128, pedigree (2,1,2,5,1)
  properties: carbon content, fossil 0.871949, dry mass 1 kg, heating value, net 26.42 MJ, wet mass 1 kg
  note on carbon content, fossil: EPDM (Ethylene-propene-diene terpolymer) rubber is a terpolymer of ethylene, propene, and a diene with the residual unsaturated portion of the diene in the side chain (ecoinvent v2.2 report 7-part XX & Ullmann). Chemical formula (deduced from Evidences of Solvent-Induced Miscibility in Polychloroprene-co-Ethylene-Propene Diene Terpolymer Blends, Dubey et al., Journal of Applied Polymer Science, 2009, 111:1884–1891): C20H35
- tap water: 0.231688, 0.353189, 0.659034, 1.77539, 0.213709, 8.90604, 101.916, 75.9446 kg (8 suppliers, which the file names only by identifier); sum of these 190 kg; lognormal variance with pedigree 0.0166, pedigree (3,3,3,5,1)
  properties: carbon content, fossil 0.00178991, dry mass 0.000337476 kg, water content 2962.17, wet mass 1 kg
  note on carbon content, fossil: Bicarbonate content is 2.93 mol/m3. CO2 content is 0.1 mol/m3 (ecoinvent v2.2 report 8, Tab 93.1).
- waste concrete: -0.369058, -5.03094 kg (2 suppliers, which the file names only by identifier); sum of these -5.4 kg; lognormal variance with pedigree 0.0126, pedigree (2,1,1,5,1)
  production volume; = w_concrete/m_concrete*p_concrete
    (same comment as for municipal solid waste)
  properties: dry mass 0.5 kg, water content 1, wet mass 1 kg

## Sampling procedure
Measured data of several Swiss plants.

## Extrapolations
This dataset is a copy of the corresponding CH dataset.
