# phenol production, cumene oxidation

Dataset: EcoSpold 2, unit process
Geography: RoW
Time period: 2017-01-01 to 2023-12-31
Technology level: current
Classification: ISIC rev.4 ecoinvent: 2011:Manufacture of basic chemicals
Synonyms: Hock process; cumene-phenol process; Cumene process
Scenario: Business-as-Usual
System model: Allocation, cut-off by classification
Generated by: Iasonas Ioannou
Database: ecoinvent
isCopyrightProtected: true
accessRestrictedTo: 1

## General comment
This dataset represents the co-production of phenol and acetone by means of cumene oxidation. This process, also called Hock process, transforms cumene and oxygen into phenol and acetone.
phenol is an organic substance with a CAS no. : 000108-95-2. It is called 'phenol' under IUPAC naming and its molecular formula is: C6H6O. It is solid under normal conditions of temperature and pressure, has a crystalline form and has an odour characteristic of aromatic compounds. It is modelled as a pure substance. Modelling this substance in a solution requires the user to add the solvent of their choice in their models. There is no publicly available information about the consumption of this substance on a consumer level. On industrial sites, the substance is used for the manufacture of products in the following sectors: coating products, fillers, putties, plasters, modelling clay, inks and toners and polymers.
acetone is an organic substance with a CAS no. : 000067-64-1. It is called 'propan-2-one' under IUPAC naming and its molecular formula is: C3H6O. It is liquid under normal conditions of temperature and pressure. It is modelled as a pure substance. Modelling this substance in a solution requires the user to add the solvent of their choice in their models. On a consumer level, is used in the following products: coating products, anti-freeze products, lubricants and greases, adhesives and sealants, fillers, putties, plasters, modelling clay and non-metal-surface treatment products. On industrial sites, the substance is used for the manufacture of products in the following sectors: washing & cleaning products, laboratory chemicals, photo-chemicals, cosmetics and personal care products and pharmaceuticals.
In western Europe the production capacity of phenol amounted to 2.6 million tonnes in 2014, which was equivalent to 21% of the global production. Notably, the economic viability of the phenol production,via the Hook process, is strongly linked to the price of the acetone by.product that is characterised by high variability.
In this dataset, the raw material inputs, and process-specific material exchanges, are modelled with a generic stoichiometry-based tool, using literature or estimated yields. The emissions are modelled with a default value, which is estimated based on losses, unreacted chemicals, among others. At the same time, the energy consumption is based on data from literature sources. Finally, the auxiliary (i.e., cooling water and infrastructure) exchanges are modelled with a default value based on industry data from literature sources. For more information on the calculations refer to the sampling procedure.
References:
Chauvel, Alain, Gilles Lefebvre, and L. Castex in "Petrochemical processes. Technical and economical characteristics Vol. 2." (1989).
Weber M., Weber M., Kleine-Boymann M. (2011): Phenol, Ullmann's Encyclopedia of Industrial Chemistry, Wiley-VCH.
Hischier, R. (2005) Establishing Life Cycle Inventories of Chemicals Based on Differing Data Availability (9 pp). The International Journal of Life Cycle Assessment, Volume 10, Issue 1, pp 59-67. 10.1065/lca2004.10.181.7
Gallardo Hipolito, M. 2011. Life Cycle Assessment of platform chemicals from fossil and lignocellulosic biomass scenarios LCA of phenolic compounds, solvent, soft and hard plastic precursors. Master in Industrial Ecology. Norwegian University of Science and Technology Department of Energy and Process Engineering. Retrieved from: http://daim.idi.ntnu.no/masteroppgaver/006/6362/tittelside.pdf, accessed 6 January 2017
Saygin, D. 2009. Chemical and Petrochemical Sector Potential of best practice technology and other measures for improving energy efficiency. IEA information paper. IEA/OECD. Retrieved from: https://www.iea.org/publications/freepublications/publication/chemical_petrochemical_sector.pdf, accessed 6 January 2017

## Included activities start
The activity starts when the raw materials enter the process.

## Included activities end
The activity ends with phenol being ready for further transformation or transportation at the production site gate. Materials entering the process are included as well as energy uses, infrastructure and emissions.

## Geography
The inventory is modelled at the Global level. The main material inputs and outputs of this activity are generated with on a generic stoichiometry-based model, using literature or estimated yields. Furthermore, the source of information for the heat and electricity inputs is literature data for the specific technology. Finally, the main source of information for the values for water (process and cooling), nitrogen, chemical factory is industry data from the GENDORF Chemical Park, which is based in Germany and produced an average of 2462760 tonnes of chemical substances in the years 2015-2019. For more information on the calculations refer to the sampling procedure.
The dataset could also be considered as not geography-specific, and thus, valid for a broader geographical coverage.
References:
Hischier, R. (2005) Establishing Life Cycle Inventories of Chemicals Based on Differing Data Availability (9 pp). The International Journal of Life Cycle Assessment, Volume 10, Issue 1, pp 59-67. 10.1065/lca2004.10.181.7
Chemiepark GENDORF, Umwelterklärung 2016, https://www.gendorf.de/Nachbarn/Umweltschutz/Industrie%20und%20Nachhaltigkeit
Chemiepark GENDORF, Umwelterklärung 2017, https://www.gendorf.de/Nachbarn/Umweltschutz/Industrie%20und%20Nachhaltigkeit
Chemiepark GENDORF, Umwelterklärung 2020, https://www.gendorf.de/Nachbarn/Umweltschutz/Industrie%20und%20Nachhaltigkeit
Falcke, Heino, et al. "Best Available Techniques (BAT) reference document for the production of large volume organic chemicals." Publications Office of the European Union: Luxembourg (2017).

## Technology
In the Hock process, cumene reacts with oxygen to give phenol and acetone. For each kilogram of phenol produced, 0.62 kg of acetone are obtained. The process consists of two fundamental chemical reactions: cumene oxidation with oxygen to cumene hydroperoxide (CHP). CHP is then cleaved to phenol and acetone by using a strong mineral acid or zeolite-based catalyst.
Chemical reaction:
C9H12 + R°-> C9H12° C9H12° + O2 ->C6H6O + C3H6O
The oxidation of cumene is usually carried out in a series of bubble column reactors. Fresh as well as recycled cumene are fed to the first reactor with oxygen acting as an oxidant in each reactor. The bubble columns are operated at pressures ranging from atmospheric to about 700 kPa and temperatures in the range 80 –120 °C. The temperature can be controled by internal or external heat exchangers. The condensed cumene is recycled to the oxidation reactors. The CHP concentration in the oxidation product is increased by vacuum distillation in column to about 65-90 %. In a second step, the formed CHP is cleaved to phenol and acetone. For this, a series of heat exchangers within a circulation loop are used as reactors because the reaction is very fast and exothermic. The CHP is spontaneously diluted in the circulation product, which consists of phenol, acetone, cumene, and several byproducts as well as residual amounts of CHP. Normally sulfuric acid is used as the catalyst at a concentration of several hundred parts per million by weight. The temperature is in the range 40 – 80 °C at atmospheric pressure.
In this dataset, a yield of 95% was assumed.
Reference(s):
Chauvel, Alain, Gilles Lefebvre, and L. Castex in "Petrochemical processes. Technical and economical characteristics Vol. 2." (1989).
Weber M., Weber M., Kleine-Boymann M. (2011): Phenol, Ullmann's Encyclopedia of Industrial Chemistry, Wiley-VCH.
Hischier, R. (2005) Establishing Life Cycle Inventories of Chemicals Based on Differing Data Availability (9 pp). The International Journal of Life Cycle Assessment, Volume 10, Issue 1, pp 59–67. 10.1065/lca2004.10.181.7
Gallardo Hipolito, M. 2011. Life Cycle Assessment of platform chemicals from fossil and lignocellulosic biomass scenarios LCA of phenolic compounds, solvent, soft and hard plastic precursors. Master in Industrial Ecology. Norwegian University of Science and Technology Department of Energy and Process Engineering. Retrieved from: http://daim.idi.ntnu.no/masteroppgaver/006/6362/tittelside.pdf, accessed 6 January 2017
Saygin, D. 2009. Chemical and Petrochemical Sector Potential of best practice technology and other measures for improving energy efficiency. IEA information paper. IEA/OECD. Retrieved from: https://www.iea.org/publications/freepublications/publication/chemical_petrochemical_sector.pdf, accessed 6 January 2017
Falcke, H., Holbrook, S., Clenahan, I., Carretero, A.L., Sanalan, T., Brinkmann, T., Joze, R., Benoît, Z., Serge, R. and Sancho, L.D., 2017. Best Available Techniques (BAT) reference document for the production of large volume organic chemicals. Publications Office of the European Union: Luxembourg

## Time period
The time period spans from the earliest year from which at least one of the input values was obtained until 2022, but overall form the most realistic picture of the production. Besides, the activity is partly generated, in terms of material inputs and outputs, based on a generic stoichiometry-based model, using literature or estimated yields, which does not expect to change over time.
The source of information for the heat and electricity inputs is literature data (from 2017) for the specific technology. Finally, the main source of information for the values for water (process and cooling), nitrogen, chemical factory is industry data from the GENDORF Chemical Park. The values are a 5-year average of data from 2015-2019 published by the GENDORF Chemical Park, which is based in Germany and produced an average of tonnes of chemical substances in the years 2462760. The end time period is therefore set based on the years from Gendorf reference.
For more information on the calculations refer to the sampling procedure and in the comments of the exchanges.
References:
Hischier, R. (2005) Establishing Life Cycle Inventories of Chemicals Based on Differing Data Availability (9 pp). The International Journal of Life Cycle Assessment, Volume 10, Issue 1, pp 59-67. 10.1065/lca2004.10.181.7
Chemiepark GENDORF, Umwelterklärung 2016, https://www.gendorf.de/Nachbarn/Umweltschutz/Industrie%20und%20Nachhaltigkeit
Chemiepark GENDORF, Umwelterklärung 2017, https://www.gendorf.de/Nachbarn/Umweltschutz/Industrie%20und%20Nachhaltigkeit
Chemiepark GENDORF, Umwelterklärung 2020, https://www.gendorf.de/Nachbarn/Umweltschutz/Industrie%20und%20Nachhaltigkeit
Falcke, Heino, et al. "Best Available Techniques (BAT) reference document for the production of large volume organic chemicals." Publications Office of the European Union: Luxembourg (2017).

## Reference product
- phenol: 1 kg; name RP; By-product classification allocatable product; CPC 34139: Other alcohols, phenols, phenol-alcohols, and their halogenated, sulphonated, nitrated or nitrosated derivativ[…]; HS2017 290711: Monophenols; phenol (hydroxybenzene) and its salts; CAS 108-95-2
  In 2008 for phenol, 'the largest use with around 44% was for the production of bisphenol-A, followed by phenolic resins (26%), cyclohexanone/caprolactame (12%), and others like alkylphenols (4%)” (Weber and Weber 2010). Reference(s): Weber and Weber 2010. In Gallardo Hipolito, M. 2011. Life Cycle Assessment of platform chemicals from fossil and lignocellulosic biomass scenarios LCA of phenolic compounds, solvent, soft and hard plastic precursors. Master in Industrial Ecology. Norwegian University of Science and Technology Department of Energy and Process Engineering. Retrieved from: http://e-archivo.uc3m.es/bitstream/handle/10016/14718/Life%20Cycle%20Assessment%20of%20platform%20chemicals%20from%20fossil%20and%20lignocelulose%20scenarios.%20Martin%20Gallardo.pdf?sequence=2, accessed 6 January 2017
  production volume 8.784e9 kg; name RP_PV
    The production volume from 2019 is based on Statista, available here: https://www.statista.com/statistics/979265/global-phenol-market-volume/, last accessed 22-07-2022.
  property heating value, net 30.93 MJ
    LHV is calculated based on the elemental composition of the substance. Based on the CAS number of the substance (000108-95-2), the chemical formula of the substance is found to be: C6H6O, (PubChem 2020). Reference: Kim, S., Chen, J., Cheng, T., Gindulyte, A., He, J., He, S., Li, Q., Shoemaker, B. A., Thiessen, P. A., Yu, B., Zaslavsky, L., Zhang, J., & Bolton, E. E. (2019). PubChem 2019 update: improved access to chemical data. Nucleic acids research, 47(D1), D1102–D1109. https://doi.org/10.1093/nar/gky1033
  property price 1.09644 EUR2005
    Calculated value based on data from United Nations Commodity Trade Statistics Database (comtrade.un.org). UN comtrade category: 290711 Monophenols; phenol (hydroxybenzene) and its salts. Average of years 2015-2019. Average of price of import into 5 main markets (EU, US, JP, IN and CN), last accessed 2022-08-02.
    The price was converted to EUR based on the annual exchange rates published by the European Central Bank (https://sdw.ecb.europa.eu/quickview.do?SERIES_KEY=120.EXR.A.USD.EUR.SP00.A, last accessed on 2022-02-15) and adjusted for inflation relative to 2005 using the producer price index (PPI) of the euro area, published by eurostat (https://appsso.eurostat.ec.europa.eu/nui/show.do?dataset=sts_inpp_a&lang=en, last accessed on 2022-05-04).
  properties: allocation factor 0.80239, carbon allocation 0.765957 kg, carbon content 0.765957, carbon content, fossil 0.765957, carbon content, non-fossil 0, dry mass 1 kg, true value 1.09644, water content 0, water in wet mass 0 kg, wet mass 1 kg

## Inputs from technosphere
- chemical factory, organics: 5.19023e-10 unit; = (RP + BP_acetone_liquid) * 4.0e-10; lognormal variance with pedigree 0.3448, pedigree (2,4,2,5,4)
  Calculated based on literature data published by the industry. For this activity, no information was readily available concerning infrastructure and land-use. Therefore, the infrastructure is estimated based on data from two chemical factories, the BASF site of Ludwigshafen and the chemical factory in Gendorf (which are both located in Germany), which produce a wide range of chemical substances. Based on this data, the following assumptions are made: the built area amounts to about 4.2 ha, the plant has an average output of 50'000 t/a and a lifespan of fifty years. The estimated infrastructure amount is therefore 4.00 E-10 units per kg of produced chemical. References: Althaus H.-J., Chudacoff M., Hischier R., Jungbluth N., Osses M. and Primas A. (2007) Life Cycle Inventories of Chemicals. ecoinvent report No. 8, v2.0. EMPA Dübendorf, Swiss Centre for Life Cycle Inventories, Dübendorf, CH. Gendorf (2000) Umwelterklärung 2000, Werk Gendorf. Werk Gendorf, Burgkirchen.
- cumene: 1.08408 kg; lognormal variance with pedigree 0.0046, pedigree (2,3,2,5,2)
  Calculated value based on stoichiometric calculations and literature data. For more information on the calculations refer to the sampling procedure.
  properties: carbon content, fossil 0.9, dry mass 1 kg, heating value, net 39.35 MJ, wet mass 1 kg
- electricity, medium voltage: 0.00506647, 0.101065, 0.0339575, 0.00155153, 0.000310537, 6.66792e-5, 0.0104365 kWh (7 suppliers, which the file names only by identifier); sum of these 0.152454 kWh; lognormal variance with pedigree 0.0046, pedigree (2,3,2,5,2)
  Value reported in Falcke, Heino, et al. "Best Available Techniques (BAT) reference document for the production of large volume organic chemicals." Publications Office of the European Union: Luxembourg (2017).
- heat, from steam, in chemical industry: 5.62676 MJ; lognormal variance with pedigree 0.0046, pedigree (2,3,2,5,2)
  Value reported in Falcke, Heino, et al. "Best Available Techniques (BAT) reference document for the production of large volume organic chemicals." Publications Office of the European Union: Luxembourg (2017). Namely, an average value of 2.55 kg of steam per kg phenol was estimated based on the reported steam requirments, i.e., (1.9 kg at medium pressure, 18 bar, and 0.4-0.9 kg at low-pressure, 5 bar. The latter value was converted to energy by multiplying with 2.75 MJ per kg,
  properties: heating value, net 1 MJ
- sulfuric acid: 0.000401195 kg; lognormal variance with pedigree 0.006, pedigree (3,3,2,5,2)
  Sulfuric acid is typically used as the catalyst at a concentration of several hundred parts per million by weight.
  According to the following patent; WO2009042246A1, accessible in https://patents.google.com/patent/WO2009042246A1/en, the catalyst concentration (sulfuric acid) ranges between 0.018 to 0.2 wt.%, and thus, an intermediate value was used.
  properties: dry mass 1 kg, wet mass 1 kg
- wastewater, average: -1.82056e-6, -6.48188e-9 m3 (2 suppliers, which the file names only by identifier); sum of these -1.82704e-6 m3; lognormal variance with pedigree 0.0452, pedigree (2,4,1,5,4)
  Calculated based on literature data published by the GENDORF Chemical Park. The factory produced an average of 2462760 tonnes of chemical substances (including intermediates) per year in the years 2015-2019. The average ouput of wastewater going to an external wastewater treatment plant in the years 2015-2019 was 5608 m3 per year. This equals 0.000002277 m3/kg chemical produced. References: Chemiepark GENDORF, Umwelterklärung 2016, https://www.gendorf.de/Nachbarn/Umweltschutz/Industrie%20und%20Nachhaltigkeit Chemiepark GENDORF, Umwelterklärung 2017, https://www.gendorf.de/Nachbarn/Umweltschutz/Industrie%20und%20Nachhaltigkeit Chemiepark GENDORF, Umwelterklärung 2020, https://www.gendorf.de/Nachbarn/Umweltschutz/Industrie%20und%20Nachhaltigkeit
  production volume; = BP_wastewater_average*RP_PV/ABS(RP)
    Calculated from the production volume of the reference product in proportion to the respective output amounts.
  properties: carbon content, non-fossil 0.194039, dry mass 0.346837 kg, mass concentration, TOC 0.1091 kg/m3, mass concentration, calcium 0.039453 kg/m3, mass concentration, chlorine 0.030031 kg/m3, mass concentration, hydrogen 0.013365 kg/m3, mass concentration, nitrogen 0.031015 kg/m3, mass concentration, oxygen 0.069824 kg/m3, mass concentration, sodium 0.06456 kg/m3, mass concentration, sulfur 0.015602 kg/m3, water content 2882.2, wet mass 1000 kg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
  note on carbon content, non-fossil: 0.0673 kg TOC/m3 (Tab A.17, ecoinvent v2.2 report 13_I). TOC was considered as Total Carbon.
- water, deionised: 0.0180538 kg; lognormal variance with pedigree 0.0046, pedigree (2,3,2,5,2)
  Calculated based on literature data published by the GENDORF Chemical Park. The factory produced an average of 2462760 tonnes of chemical substances (including intermediates) per year in the years 2015-2019. The average consumption of tap water in the years 2015-2019 was 55352 t per year. This equals 0.0225 kg/kg chemical produced.
  properties: wet mass 1 kg

## Inputs from nature
- Oxygen [natural resource, in air]: 0.29006 kg; lognormal variance with pedigree 0.044, pedigree (2,3,2,5,4)
  (same comment as for cumene)
- Water, cooling, unspecified natural origin [natural resource, in water]: 0.0118007 m3; lognormal variance with pedigree 0.012, pedigree (2,3,2,5,3)
  Calculated based on literature data published by the GENDORF Chemical Park. The factory produced an average of 2462760 tonnes of chemical substances (including intermediates) per year in the years 2015-2019. The average amount of cooling water released in the years 2015-2019 was 34408800 t per year. It was assumed that 5% of the cooling water was emitted to air during its use, therefore, to calculate the input of cooling water, the output value reported by GENDORF was scaled up by the factor 1/0.95. This equals 0.014707 m3/kg chemical produced. References: Chemiepark GENDORF, Umwelterklärung 2016, https://www.gendorf.de/Nachbarn/Umweltschutz/Industrie%20und%20Nachhaltigkeit Chemiepark GENDORF, Umwelterklärung 2017, https://www.gendorf.de/Nachbarn/Umweltschutz/Industrie%20und%20Nachhaltigkeit Chemiepark GENDORF, Umwelterklärung 2020, https://www.gendorf.de/Nachbarn/Umweltschutz/Industrie%20und%20Nachhaltigkeit
- Water, river [natural resource, in water]: 0.000774651 m3; lognormal variance with pedigree 0.012, pedigree (2,3,2,5,3)
  Calculated based on literature data published by the GENDORF Chemical Park. The factory produced an average of 2462760 tonnes of chemical substances (including intermediates) per year in the years 2015-2019. The average consumption of river water in the years 2015-2019 was 22000820 t per year. However, since the cooling water is modelled as an input, the amount of river water was adjusted to avoid double counting. 55% of the input amount of cooling water was deducted from the amount of river water, as that is the share of river water versus well water. This equals 0.00096543 m3/kg chemical produced. References: Chemiepark GENDORF, Umwelterklärung 2016, https://www.gendorf.de/Nachbarn/Umweltschutz/Industrie%20und%20Nachhaltigkeit Chemiepark GENDORF, Umwelterklärung 2017, https://www.gendorf.de/Nachbarn/Umweltschutz/Industrie%20und%20Nachhaltigkeit Chemiepark GENDORF, Umwelterklärung 2020, https://www.gendorf.de/Nachbarn/Umweltschutz/Industrie%20und%20Nachhaltigkeit
- Water, well, in ground [natural resource, in water]: 0.000655167 m3; lognormal variance with pedigree 0.012, pedigree (2,3,2,5,3)
  Calculated based on literature data published by the GENDORF Chemical Park. The factory produced an average of 2462760 tonnes of chemical substances (including intermediates) per year in the years 2015-2019. The average consumption of well water in the years 2015-2019 was 18607480 t per year. However, since the cooling water is modelled as an input, the amount of well water was adjusted to avoid double counting. 45% of the input amount of cooling water was deducted from the amount of well water, as that is the share of well water versus river water. This equals 0.00081652 m3/kg chemical produced. References: Chemiepark GENDORF, Umwelterklärung 2016, https://www.gendorf.de/Nachbarn/Umweltschutz/Industrie%20und%20Nachhaltigkeit Chemiepark GENDORF, Umwelterklärung 2017, https://www.gendorf.de/Nachbarn/Umweltschutz/Industrie%20und%20Nachhaltigkeit Chemiepark GENDORF, Umwelterklärung 2020, https://www.gendorf.de/Nachbarn/Umweltschutz/Industrie%20und%20Nachhaltigkeit

## Emissions to nature
- Acetone [air, unspecified]: 0.00092706 kg; lognormal variance with pedigree 0.006, pedigree (3,3,2,5,2)
  Calculated losses, based on the boiling point of a chemical, to water or to air. In addition, unreacted chemicals are assumed to go to wastewater treatment, which has a conversion rate in biological treatment of 95% of carbon into carbon dioxide. The remaining 5% are released as emissions to water.
- Carbon dioxide, fossil [air, unspecified]: 0.183758 kg; lognormal variance with pedigree 0.006, pedigree (3,3,2,5,2)
  Calculated based on the carbon content of unreacted chemical substances. The unreacted chemicals are assumed to go to wastewater treatment, which has a conversion rate in biological treatment of 95% of carbon into carbon dioxide. The remaining 5% are released as emissions to water, unspecified.
- Oxygen [air, unspecified]: 0.00217183 kg; lognormal variance with pedigree 0.006, pedigree (3,3,2,5,2)
  (same comment as for Acetone)
- Water [air, unspecified]: 0.00117951 m3; lognormal variance with pedigree 0.0454, pedigree (2,4,2,5,4)
  Calculated based on literature data published by the GENDORF Chemical Park. The factory produced an average of 2462760 tonnes of chemical substances (including intermediates) per year in the years 2015-2019. To determine the emissions of water to air, the difference of all water inputs (from river, well, tap water and cooling) and outputs (wastewater, emissions to water) was calculated. The average ouput of water to air in the years 2015-2019 was 3620444 m3 per year. This equals 0.00147 m3/kg chemical produced. For more information on the other water exchanges please consult the respective exchange comment. References: Chemiepark GENDORF, Umwelterklärung 2016, https://www.gendorf.de/Nachbarn/Umweltschutz/Industrie%20und%20Nachhaltigkeit Chemiepark GENDORF, Umwelterklärung 2017, https://www.gendorf.de/Nachbarn/Umweltschutz/Industrie%20und%20Nachhaltigkeit Chemiepark GENDORF, Umwelterklärung 2020, https://www.gendorf.de/Nachbarn/Umweltschutz/Industrie%20und%20Nachhaltigkeit
- Acetone [water, unspecified]: 7.80608e-5 kg; lognormal variance with pedigree 0.006, pedigree (3,3,2,5,2)
  (same comment as for Acetone)
- BOD5, Biological Oxygen Demand [water, unspecified]: 0.00858656 kg; lognormal variance with pedigree 0.218, pedigree (4,5,5,5,5)
  Calculated value. The BOD, COD, TOC and BOD5 are calculated based on the amount and type of emissions released to water in the same activity.
- COD, Chemical Oxygen Demand [water, unspecified]: 0.00858656 kg; lognormal variance with pedigree 0.218, pedigree (4,5,5,5,5)
  (same comment as for BOD5, Biological Oxygen Demand)
- Cumene [water, unspecified]: 0.0027102 kg; lognormal variance with pedigree 0.006, pedigree (3,3,2,5,2)
  (same comment as for Acetone)
- DOC, Dissolved Organic Carbon [water, unspecified]: 0.00263709 kg; lognormal variance with pedigree 0.218, pedigree (4,5,5,5,5)
  (same comment as for BOD5, Biological Oxygen Demand)
- Phenol [water, unspecified]: 0.000200597 kg; lognormal variance with pedigree 0.006, pedigree (3,3,2,5,2)
  (same comment as for Acetone)
- TOC, Total Organic Carbon [water, unspecified]: 0.00263709 kg; lognormal variance with pedigree 0.218, pedigree (4,5,5,5,5)
  (same comment as for BOD5, Biological Oxygen Demand)
- Water [water, unspecified]: 0.0120679 m3; lognormal variance with pedigree 0.0454, pedigree (2,4,2,5,4)
  Calculated based on literature data published by the GENDORF Chemical Park. The factory produced an average of 2462760 tonnes of chemical substances (including intermediates) per year in the years 2015-2019. The amount of water released back to the environment consists of the sum of the amount of process water treated in the internal WWTP that is then released back to the environment and the amount of cooling water released back to the environment. The average ouput of the internal WWTP in the years 2015-2019 was 2628800 m3 and that of cooling water released back to the environment was 34408800 m3. This gives a yearly average of 37037600 m3 emissions of water to water. This equals 0.01504 m3/kg chemical produced. References: Chemiepark GENDORF, Umwelterklärung 2016, https://www.gendorf.de/Nachbarn/Umweltschutz/Industrie%20und%20Nachhaltigkeit Chemiepark GENDORF, Umwelterklärung 2017, https://www.gendorf.de/Nachbarn/Umweltschutz/Industrie%20und%20Nachhaltigkeit Chemiepark GENDORF, Umwelterklärung 2020, https://www.gendorf.de/Nachbarn/Umweltschutz/Industrie%20und%20Nachhaltigkeit

## Sampling procedure
Literature data and stoichiometric calculation. This inventory is partially based on a generic model of the production of chemicals. The data generated by this model have been improved with compound-specific data when available. The model of the production of chemicals is using specific industry or literature data wherever possible and more generic data on chemical production processes to fill compound-specific data gaps when necessary. The basic principles of the model have been published in literature (Hischier, 2005). The model has been updated and extended with newly available data from the chemical industry. In the model, unreacted fractions are treated in a waste treatment process, and emissions reported are after a waste treatment process that is included in the scope of this dataset. For volatile reactants, a small level of evaporation is assumed. Solvents and catalysts are mostly recycled in closed-loop systems within the scope of the dataset and reported flows are for losses from this system.
The source of information for the heat and electricity inputs is literature data (from 2017) for the specific technology. Finally, the main source of information for the values for water (process and cooling), nitrogen, and chemical factory is industry data from the GENDORF Chemical Park. The values are a 5-year average of data from 2015 to 2019 published by the GENDORF Chemical Park, which is based in Germany and produced an average of 2462760 tonnes of chemical substances in the years 2015-2019. For more information refer to the comments of the exchanges.

References:
Hischier, R. (2005) Establishing Life Cycle Inventories of Chemicals Based on Differing Data Availability (9 pp). The International Journal of Life Cycle Assessment, Volume 10, Issue 1, pp 59-67. 10.1065/lca2004.10.181.7
Chemiepark GENDORF, Umwelterklärung 2016, https://www.gendorf.de/Nachbarn/Umweltschutz/Industrie%20und%20Nachhaltigkeit
Chemiepark GENDORF, Umwelterklärung 2017, https://www.gendorf.de/Nachbarn/Umweltschutz/Industrie%20und%20Nachhaltigkeit
Chemiepark GENDORF, Umwelterklärung 2020, https://www.gendorf.de/Nachbarn/Umweltschutz/Industrie%20und%20Nachhaltigkeit
Falcke, Heino, et al. "Best Available Techniques (BAT) reference document for the production of large volume organic chemicals." Publications Office of the European Union: Luxembourg (2017).

## Extrapolations
This dataset has been copied from an original dataset covering the geography RER. The uncertainty has been adjusted accordingly.
