# ceramic tile production

Dataset: EcoSpold 2, unit process
Geography: RoW
Time period: 1998-01-01 to 2023-12-31
Technology level: current
Classification: ISIC rev.4 ecoinvent: 2392:Manufacture of clay building materials
Classification: EcoSpold01Categories: construction materials/coverings
Tags: ConvertedDataset
Scenario: Business-as-Usual
System model: Allocation, cut-off by classification
Generated by: Hans-Jörg Althaus
Published in: Kellenberger D. 2007
Database: ecoinvent
isCopyrightProtected: true
accessRestrictedTo: 1

## General comment
Data from one producer only. Composition of ceramic might differ from case to case. This dataset refers to oxidic ceramics.
[This dataset was already contained in the ecoinvent database version 2. It was not individually updated during the transfer to ecoinvent version 3. Life Cycle Impact Assessment results may still have changed, as they are affected by changes in the supply chain, i.e. in other datasets. This dataset was generated following the ecoinvent quality guidelines for version 2. It may have been subject to central changes described in the ecoinvent version 3 change report (http://www.ecoinvent.org/database/ecoinvent-version-3/reports-of-changes/), and the results of the central updates were reviewed extensively. The changes added e.g. consistent water flows and other information throughout the database. The documentation of this dataset can be found in the ecoinvent reports of version 2, which are still available via the ecoinvent website. The change report linked above covers all central changes that were made during the conversion process.]

## Included activities end
gate to gate production of ceramic tiles, including transports of raw materials to factory and of product to Switzerland

## Geography
data from Italy

## Technology
large scale, single fired production in Europe. Gas fired kiln

## Parameters
- fraction, process water, to air: 0.15 dimensionless; name fraction_PW_to_air; lognormal variance with pedigree 0.092025, pedigree (4,4,3,2,4)
- fraction, tap water, to air: 0.15 dimensionless; name fraction_TW_to_air; lognormal variance with pedigree 0.092025, pedigree (4,4,3,2,4)

## Reference product
- ceramic tile: 1 kg; By-product classification allocatable product; CPC 37350: Non-refractory ceramic building bricks, flooring blocks, support or filler tiles, roofing tiles, chimney-pots,[…]; HS2017 690510: Ceramic roofing tiles
  EcoSpold01Location=CH
  production volume 3.96633 kg
    This is a placeholder value that does not reflect real-world production volumes. This dataset does not currently require a real-world production volume to work in the database framework, and no actual data were collected yet. This has no negative effect on the results of the ecoinvent database.
  property price 0.38 EUR2005
    Average 2005 prices for EU27, USA, China, Japan and India from Import/Export data (US$ and tonnes) in UN Commodity Trade Statistics Database; Commodity: unglazed ceramic flags, paving, hearth or wall tiles
  properties: carbon allocation 0 kg, carbon content 0, carbon content, fossil 0, carbon content, non-fossil 0, dry mass 1 kg, water content 0, water in wet mass 0 kg, wet mass 1 kg

## Inputs from technosphere
- aluminium oxide, non-metallurgical: 0.000332678, 5.63222e-5 kg (2 suppliers, which the file names only by identifier); sum of these 0.000389 kg; lognormal variance with pedigree 0.0426, pedigree (1,3,5,5,1)
  EcoSpold01Location=RER
  properties: dry mass 1 kg, wet mass 1 kg
- barite: 0.000556 kg; lognormal variance with pedigree 0.0426, pedigree (1,3,5,5,1)
  EcoSpold01Location=RER
  properties: dry mass 1 kg, wet mass 1 kg
- ceramic factory: 4e-9 unit; lognormal variance with pedigree 0.3526, pedigree (1,3,5,5,1)
  EcoSpold01Location=CH
- clay: 0.489 kg; lognormal variance with pedigree 0.0426, pedigree (1,3,5,5,1)
  EcoSpold01Location=CH
  properties: dry mass 0.965 kg, water content 0.0362694, wet mass 1 kg
- electricity, medium voltage: 0.0087432, 0.174407, 0.0586003, 0.00267747, 0.000535893, 0.000115068, 0.0121783, 0.0180103, 0.0377321 kWh (9 suppliers, which the file names only by identifier); sum of these 0.313 kWh; lognormal variance with pedigree 0.0426, pedigree (1,3,5,5,1)
  EcoSpold01Location=UCTE
- feldspar: 0.386 kg; lognormal variance with pedigree 0.0426, pedigree (1,3,5,5,1)
  EcoSpold01Location=RER
  properties: dry mass 1 kg, wet mass 1 kg
- hazardous waste, for underground deposit: -0.00961 kg; lognormal variance with pedigree 0.0026, pedigree (1,3,1,5,1)
  EcoSpold01Location=DE
  production volume
    Calculated from the production volume of ceramic tiles in proportion to the respective output amounts.
  properties: carbon content, fossil 0.554667, dry mass 1 kg, wet mass 1 kg
  note on carbon content, fossil: Tab A.6, ecoinvent v2.2 report 13_I, average hazardous waste composition was used, and referred to 0% water mass. No waste-specific emission are currently inventoried for underground deposits. Accordingly, no waste composition must be specified. For generic, average waste to underground deposit deposition in a 200 liter steel drum without cement solidification is assumed (ecoinvent v2.2 report 13_I).
- heat, district or industrial, natural gas: 0.0661282, 4.02421, 1.48616 MJ (3 suppliers, which the file names only by identifier); sum of these 5.5765 MJ; lognormal variance with pedigree 0.0426, pedigree (1,3,5,5,1)
  EcoSpold01Location=RER
  properties: heating value, net 1 MJ
- lead: 0.00665 kg; lognormal variance with pedigree 0.0426, pedigree (1,3,5,5,1)
  EcoSpold01Location=RER
  properties: dry mass 1 kg, wet mass 1 kg
- lime, packed: 0.0257717, 0.0515283 kg (2 suppliers, which the file names only by identifier); sum of these 0.0773 kg; lognormal variance with pedigree 0.0426, pedigree (1,3,5,5,1)
  EcoSpold01Location=CH
  properties: carbon content, fossil 0.117492, dry mass 0.998 kg, water content 0.00200401, wet mass 1 kg
  note on carbon content, fossil: Table 3.1, ecoinvent v2.2 report 7, part VII, pg 3. MW CaCO3=100, MW MgCO3=84
- silica sand: 0.17 kg; lognormal variance with pedigree 0.0426, pedigree (1,3,5,5,1)
  EcoSpold01Location=DE
  properties: dry mass 0.99 kg, water content 0.010101, wet mass 1 kg
- sodium perborate, tetrahydrate, powder: 0.00611 kg; lognormal variance with pedigree 0.0426, pedigree (1,3,5,5,1)
  EcoSpold01Location=RER
  properties: dry mass 1 kg, heating value, net 7.04 MJ, wet mass 1 kg
- stucco: 0.0623 kg; lognormal variance with pedigree 0.0606, pedigree (1,3,5,5,3)
  EcoSpold01Location=CH
  properties: dry mass 1 kg, wet mass 1 kg
- tap water: 0.000813348, 0.00123988, 0.00231356, 0.00623255, 0.000750231, 0.0312649, 0.35778, 0.266606 kg (8 suppliers, which the file names only by identifier); sum of these 0.667 kg; source Nicoletti G. M. 2002; lognormal variance with pedigree 0.0426, pedigree (1,3,5,5,1)
  Literature value.
  EcoSpold01Location=RER
  properties: carbon content, fossil 0.00178991, dry mass 0.000337476 kg, water content 2962.17, wet mass 1 kg
  note on carbon content, fossil: Bicarbonate content is 2.93 mol/m3. CO2 content is 0.1 mol/m3 (ecoinvent v2.2 report 8, Tab 93.1).
- tin: 4.9e-5 kg; lognormal variance with pedigree 0.0426, pedigree (1,3,5,5,1)
  EcoSpold01Location=RER
  properties: dry mass 1 kg, wet mass 1 kg
- titanium dioxide: 0.0184 kg; lognormal variance with pedigree 0.0426, pedigree (1,3,5,5,1)
  EcoSpold01Location=RER
  properties: dry mass 1 kg, wet mass 1 kg
- wastewater from ceramic production: -2e-5 m3; lognormal variance with pedigree 0.0026, pedigree (1,3,1,5,1)
  EcoSpold01Location=CH
  production volume
    (same comment as for hazardous waste, for underground deposit)
  properties: dry mass 0.337476 kg, water content 2962.17, wet mass 1000 kg
- zinc: 0.00339 kg; lognormal variance with pedigree 0.0426, pedigree (1,3,5,5,1)
  EcoSpold01Location=RER
  properties: dry mass 1 kg, wet mass 1 kg

## Emissions to nature
- Particulate Matter, < 2.5 um [air, unspecified]: 0.00871 kg; lognormal variance with pedigree 0.0626, pedigree (1,3,5,5,1)
- Water [air, unspecified]: 0.00010005 m3; name water_to_air_unspecified; lognormal variance with pedigree 0.0827, pedigree (2,2,5,5,1)
  Calculated value based on literature values and expert opinion. See comments in the parametres' comment field.
  property fraction, origin: fresh water 1; name fraction_origin_fresh_water
  property fraction, origin: salt water 0; name fraction_origin_salt_water
  property fraction, origin: unspecified 0; name fraction_origin_unspecified
- Water [water, unspecified]: 0.00054695 m3; name water_to_water_unspecified; lognormal variance with pedigree 0.0827, pedigree (2,2,5,5,1)
  (same comment as for Water)
  property carbon content, fossil 0; name C_content_fossil
  property carbon content, non-fossil 0; name C_content_non_fossil
  property dry mass 0 kg; name DM
  property fraction, origin: fresh water 1; name fraction_origin_fresh_water_Ww
  property fraction, origin: salt water 0; name fraction_origin_salt_water_Ww
  property fraction, origin: unspecified 0; name fraction_origin_unspecified_Ww
  property water in wet mass 1000 kg; name WWM
  property wet mass 1000 kg; name WM

## Sampling procedure
publication

## Extrapolations
see Geography This dataset has been copied from an original dataset covering the geography CH. The uncertainty has been adjusted accordingly.

## Review by Roberto Dones 2003-08-11
passed
