# hardwood forestry, azobe, sustainable forest management

Dataset: EcoSpold 2, unit process
Geography: CM
Time period: 2000-01-01 to 2023-12-31
Technology level: current
Classification: ISIC rev.4 ecoinvent: 0220:Logging
Synonyms: Bongassi; Ekki; Lophira alata
Tags: Swiss brush-up completed
Scenario: Business-as-Usual
System model: Allocation, cut-off by classification
Generated by: Frank Werner
Published in: Althaus H.J. 2007
Database: ecoinvent
isCopyrightProtected: true
accessRestrictedTo: 1

## General comment
This dataset represents well-documented, legally operating logging company with modern equipment; emissions from biomass burning according to IPCC 2003
The data refers to wood 'under bark'. CO2 assimilation is based on 49.4% carbon in the wood including the bark (19%). Biomass energy equals gross calorific value including bark.

## Included activities start
Plantation establishment process starting from azobe tree planting. Natural growth process starting from standing azobe trees at plantation.

## Included activities end
This acitivity ends with harvested azobe tree logs, at forest road. The dataset includes harvesting, hauling operations, fuel used for forest road construction and emissions from burning of branchings. The dataset does not include the branchings left to rot on the ground, land use of forest roads, use of gravel nor the logging impacts on further vegetation or environmental impacts from post-harvest processes (potential forest degradation/deforestation). This activity ends with standing azobe trees before harvesting. The dataset includes the CO2 absorption from air and the land use for the trees to grow (including 9% bark). The dataset does not include land use of the forest road area.

## Technology
The technology of the dataset reflects modern machinery and equipment. Technology involves large modern motorised forestry equipment.
Felling is by hand chainsaw, and cross-cutting takes place in the forest prior to extraction; extraction from the stump to the siding is by bulldozer or wheel-skidder.The typical overall average Azobe yield in littoral forest concessions in Cameroon is about 6 m3/ha (~1/2 tree/ha). Many small trees, often whole populations, are left standing to be harvested in another cycle, 35 – 40 years afterwards; total rotation length can thus be assumed to be 70 to 80 years. The forest area is left to regenerate naturally as part of a policyclical forest management.
The high technological standard and legal operations of this dataset cannot be assumed to be representative for Azobe harvesting.
Azobe (Lophira alata; also know as Ekki or Bongossi) is a large to very large tree, up to over 50 m height and 150 cm diameter, fairly cylindrical almost down to the ground, without buttresses. It prefers sandy to sandy-loam moist soil, in a near fresh water swamps and riverbanks.
The production practise equals natural growth in sustainable forestry.
Natural growth relates to the forest area and CO2 from the atmosphere needed to produce azobe trees.

## Reference product
- sawlog and veneer log, azobe, measured as solid wood under bark: 1 m3; By-product classification allocatable product; CPC 03120: Logs of non-coniferous wood
  production volume 21527.5 m3; = 63503*0.339
    Calculated. The value is calculated from the amount of azobe exported from cameroon (link: http://www.fao.org/docrep/x2161e/x2161e05.htm) multiplied by 0.339 which is the share of sustainable forest (link: http://wwf.panda.org/who_we_are/wwf_offices/cameroon/?144321/Sustainable-forest-management-in-Southeast-Cameroon).
  property carbon content, non-fossil 0.494
    C content of dry mass is 0.494 kgC/kg dry wood (ecoinvent v2.2 report 21).
  property heating value, net 14232 MJ
    LHV is calculated based on the Carbon content of the product. More details can be found on the respective documentation.The property is based on a value of 10.95MJ/kg
  property price 174.94 EUR2005
    Reference: FAOSTAT (accessed 20140112). The price is calculated by using data on total world import quantity (m3) and import value (1000 USD), year 2005. 15174881 m3 of Ind Rwd Wir (NC) Tropica was imported in the world in 2005. The import value was 3209966000 USD. The calculated price is thus (3209966000/15174881*0.8)=174.936586454945 Euro.
  properties: carbon allocation 609.877 kg, carbon content 0.494, carbon content, fossil 0, dry mass 1234.57 kg, water content 0.3, water in wet mass 370.37 kg, wet mass 1604.94 kg

## Inputs from technosphere
- diesel, burned in building machine: 551.4 MJ; lognormal variance with pedigree 0.065, pedigree (1,1,5,1,1)
  properties: UVEK_link_1 734, UVEK_relative_amount_1 1, heating value, net 1 MJ
  note on UVEK_link_1: to be used only in special submissions in coordination with ecoinvent and the Swiss FOEN
- lubricating oil: 0.91 kg; lognormal variance with pedigree 0.065, pedigree (1,1,5,1,1)
  properties: UVEK_link_1 2866, UVEK_relative_amount_1 1, carbon content, fossil 0.75, dry mass 1 kg, heating value, net 40.2 MJ, wet mass 1 kg
  note on carbon content, fossil: Lubricating oil is produced from diesel. C-content/dry mass of fats and oils considered 75%, from: ecoinvent v2.2 report, n 15a, pg 40
  note on heating value, net: Literature value, Source: IPCC 2006, 2006 IPCC Guidelines for National Greenhouse Gas Inventories, Prepared by the National Greenhouse Gas Inventories Programme, Eggleston H.S., Buendia L., Miwa K., Ngara T. and Tanabe K. (eds). Published: IGES, Japan
- power sawing, without catalytic converter: 0.1 hour; lognormal variance with pedigree 0.0691, pedigree (3,4,5,3,1)

## Inputs from nature
- Carbon dioxide, in air [natural resource, in air]: 3940 kg; lognormal variance with pedigree 0.0691, pedigree (3,4,5,3,1)
  Calculated Value. Dried matter = 1000 kg/m3, carbon content of dried matter = 49.4 %; including bark
- Energy, gross calorific value, in biomass [natural resource, biotic]: 53000 MJ; lognormal variance with pedigree 0.0691, pedigree (3,4,5,3,1)
  Energy content of wood
- Occupation, forest, extensive [natural resource, land]: 17940 m2*year; lognormal variance with pedigree 0.41, pedigree (5,5,5,5,5)
- Transformation, from forest, extensive [natural resource, land]: 240 m2; lognormal variance with pedigree 0.56, pedigree (5,5,5,5,5)
- Transformation, to forest, extensive [natural resource, land]: 240 m2; lognormal variance with pedigree 0.56, pedigree (5,5,5,5,5)
- Wood, hard, standing [natural resource, biotic]: 2 m3; lognormal variance with pedigree 0.0691, pedigree (3,4,5,3,1)

## Emissions to nature
- Carbon dioxide, non-fossil [air, unspecified]: 1970.8 kg; lognormal variance with pedigree 0.0691, pedigree (3,4,5,3,1)
- Dinitrogen monoxide [air, non-urban air or from high stacks]: 0.011846 kg; lognormal variance with pedigree 0.2441, pedigree (3,4,5,3,1)
- Methane, non-fossil [air, non-urban air or from high stacks]: 1.7231 kg; lognormal variance with pedigree 0.2441, pedigree (3,4,5,3,1)
- Particulate Matter, < 2.5 um [air, non-urban air or from high stacks]: 6 kg; lognormal variance with pedigree 0.5941, pedigree (3,4,5,3,1)
- Particulate Matter, > 10 um [air, non-urban air or from high stacks]: 4 kg; lognormal variance with pedigree 0.2441, pedigree (3,4,5,3,1)
- Particulate Matter, > 2.5 um and < 10um [air, non-urban air or from high stacks]: 5 kg; lognormal variance with pedigree 0.3941, pedigree (3,4,5,3,1)

## Sampling procedure
literature
