# cement production, Portland SR3

Dataset: EcoSpold 2, unit process
Geography: TN
Time period: 2019-01-01 to 2023-12-31
Technology level: current
Classification: ISIC rev.4 ecoinvent: 2394:Manufacture of cement, lime and plaster
Synonyms: CEM SR3; Sulfate Resistant Cement SR3
Scenario: Business-as-Usual
System model: Allocation, cut-off by classification
Share of production covered: 15 %
Generated by: [Deleted]Makrem Cherni
Published in: Cherni Makrem 2022
Database: ecoinvent
isCopyrightProtected: true
accessRestrictedTo: 1

## General comment
The information details the manufacturing of CEM SR3 using milled limestone and gypsum as fillers.The dataset describes the production of cement (CEM SR3). Tunisia has five types of cement (CEM I to CEM V) based on the supplementary cementitious materials (limestone).
CEM SR3 is a Sulphate Resistant Cement that is made by 95-90% of clinker and mixed with 5 to 10% of limestone.
Portland SR3 production process consists of four main steps: (1) Quarrying of limestone and other raw materials to the processing plant. (2) Preparation of “raw meal” for pyroprocessing (3) Pyroprocessing of raw materials to produce clinker using the dry process. (4) Final grinding of the clinker together with inter-grinding with a small proportion of gypsum to produce Portland SR3 cement. Steps (1) to (4) are not considered in dataset.
NT47.01(2017): Ciment - Partie 1: Composition, spécifications et critères des conformité des ciments courants

## Included activities start
From the reception of raw materials at the cement factory.

## Included activities end
This activity ends with the Portland cement SR3 produced in the cement silos (after milling). The dataset does not include packaging and administration

## Geography
The dataset represents the production of Sulfate Resistant Cement (CEM SR3) in Tunisia.

## Technology
In Tunisia, all cement production is through dry kiln process. The clinker (90-95%) is ground with gypsum (3-5%) and depending on the type of cement and technical standard (NT-47.01 2017 Eqv EN 197-1) with other materials such as limestone (5 to 10%) to sulfate resistant cement cement.

## Time period
Time period corresponds to data collection period (2019).

## Reference product
- cement, Portland SR3: 1 kg; name cement; By-product classification allocatable product; CPC 37440: Portland cement, aluminous cement, slag cement and similar hydraulic cements, except in the form of clinkers; HS2017 252100: Limestone flux; limestone and other calcareous stone, of a kind used for the manufacture of lime or cement
  Sulphate Resistant Cement with 90-95% of clinker and 5-10% limestone.
  Estimated from one cement plant, since there no public data on the production of each type of cements in Tunisia (due to confidentiality manner).
  production volume 9.55328e8 kg; name PV_cement; = 8096*10^6*11.8%
    Total production volume of hydraulic cement in Tunisia in 2019: 8'096'000 metric ton. Source: USGS (2019). U.S. Geological Survey, Minerals Yearbook Annual Tables, 2019. Available at: https://www.usgs.gov/centers/national-minerals-information-center/cement-statistics-and-information
    The share of Portland SR3 in the market is 11.8%. This share is based on the annual production from the cement manufacturer.
  property price 0.0660224 EUR2005
    Average price from two cement manufacturers in Tunisia for the year 2022 for bulk cement, Portland SR3. The prices were converted to EUR based on the annual exchange rates published by the European Central Bank (https://sdw.ecb.europa.eu/quickview.do?SERIES_KEY=120.EXR.A.USD.EUR.SP00.A, last accessed on 2023-06-01) and adjusted for inflation relative to 2005 using the producer price index (PPI) of the euro area, published by eurostat (https://ec.europa.eu/eurostat/databrowser/view/STS_INPP_A__custom_6416181/default/table?lang=en, last accessed on 2023-06-01).
  properties: carbon allocation 0 kg, carbon content 0, carbon content, fossil 0, carbon content, non-fossil 0, dry mass 1 kg, water content 0, water in wet mass 0 kg, wet mass 1 kg

## Inputs from technosphere
- cement factory: 5.36e-11 unit; source Kellenberger D. 2007; lognormal variance with pedigree 0.3126, pedigree (2,4,4,5,1)
  Literature Value. Extrapolated from the "cement production, Portland, GLO 2022" dataset, accessed 15.09.2022.
  Uncertainty: Variance of log-transformed data was taken from ecoinvent report no 1, table 10.3. Value represents demand of infrastructure for input/output group c.
- clinker: 0.9155 kg; lognormal variance with pedigree 0.0046, pedigree (1,4,3,1,1)
  Values were calculated based on primary data collection in Tunisia. The data were collected from one cement plant which represent 15% of the cement market share.
  properties: dry mass 1 kg, wet mass 1 kg
- electricity, medium voltage: 0.0425 kWh; lognormal variance with pedigree 0.0046, pedigree (1,4,3,1,1)
  Electricity used to crush and grind additives (limestone and gypsum) and also to grind cement (clinker with additives). Values were calculated based on primary data from manufacturer. Based on annual average.
  Uncertainty: Variance of log-transformed data was taken from ecoinvent report no 1, table 10.3. Value represents demand of products, electricity etc. for input/output group c.
- gypsum, mineral: 0.02406 kg; lognormal variance with pedigree 0.0046, pedigree (1,4,3,1,1)
  Gyspum used for regulating the setting time of cement. Values were calculated based on primary data collected from manufacturer.
  Uncertainty: Variance of log-transformed data was taken from ecoinvent report no 1, table 10.3. Value represents demand of products, electricity etc. for input/output group c.
  properties: dry mass 1 kg, wet mass 1 kg
- limestone, crushed, for mill: 0.06043 kg; lognormal variance with pedigree 0.0046, pedigree (1,4,3,1,1)
  Values were calculated based on primary data collection in Tunisia. The data were collected from one cement companies which represent 15% of the cement market share.
  properties: dry mass 0.998 kg, water content 0.00200401, wet mass 1 kg
- lubricating oil: 3.088e-6 kg; name lubricating_oil_input; lognormal variance with pedigree 0.0046, pedigree (1,4,3,1,1)
  Values were calculated based on primary data collection in Tunisia from the manufacturer. Lubricating oil used to lubricate heavy machinery (ball mills).
  properties: carbon content, fossil 0.75, dry mass 1 kg, heating value, net 40.2 MJ, wet mass 1 kg
  note on carbon content, fossil: Lubricating oil is produced from diesel. C-content/dry mass of fats and oils considered 75%, from: ecoinvent v2.2 report, n 15a, pg 40
  note on heating value, net: Literature value, Source: IPCC 2006, 2006 IPCC Guidelines for National Greenhouse Gas Inventories, Prepared by the National Greenhouse Gas Inventories Programme, Eggleston H.S., Buendia L., Miwa K., Ngara T. and Tanabe K. (eds). Published: IGES, Japan
- scrap steel: -6.79e-5 kg; name waste_steel; = steel_input; lognormal variance with pedigree 0.0046, pedigree (1,4,1,5,1)
  Data collected from manufacturer. The steel used in the replacement of thesteel balls from the cement mill must be disposed of after use. Therefore, same amount as steel input is used to model the waste.
  production volume; = PV_cement * waste_steel / cement
    Calculated from production volume of reference product using the relative outputs.
  properties: carbon content, fossil 0.005, dry mass 1 kg, wet mass 1 kg
  note on carbon content, fossil: The carbon content is set as 0,005 the same as in the steel, low alloyed, to maintain the carbon balance.
- steel, low-alloyed: 6.79e-5 kg; name steel_input; lognormal variance with pedigree 0.0046, pedigree (1,4,3,1,1)
  Values were calculated based on primary data collection in Tunisia.
  this refer to steel balls replaced from cement mill.
  properties: dry mass 1 kg, wet mass 1 kg
- waste mineral oil: -3.088e-6 kg; name waste_oil; = lubricating_oil_input; lognormal variance with pedigree 0.0026, pedigree (1,4,1,1,1)
  Data collected from manufacturer. The lubricating oil must be disposed of after use (the lubricating oil is used to lube the machinery and does not become part of the product). Therefore, same amount as lubricating oil input is used to model the waste.
  production volume; = PV_cement * waste_oil / cement
    Calculated from production volume of reference product using the relative outputs.
  properties: carbon content, fossil 0.75, dry mass 0.9 kg, heating value, net 34.7 MJ, water content 0.111111, wet mass 1 kg
  note on carbon content, fossil: The carbon content is set as 0,75 the same as in the lubricating oil, to maintain the carbon balance.
  note on heating value, net: Value taken from the general comment of the treatment dataset.

## Emissions to nature
- Water [air, unspecified]: 1.2086e-7 m3; lognormal variance with pedigree 0.0052, pedigree (2,4,3,1,1)
  Water vapour from the drying of the limestone.
  Uncertainty: B

## Sampling procedure
Data represent 15% of Tunisia's 2019 cement production. Using confidential surveys, one cement manufacturer gave information on the production of cement in 2019. The manufacturer's estimated cement composition is represented by the weighted average of raw material flows. Since manufacturers did not provide the production amounts of each kind of cement owing to privacy issues, the weighting factor utilized is the overall volume of cement produced. The yearly average of the manufacturer unit flows was calculated for additional input flows, such as grinding aids, equipment maintenance supplies, fuels and power. With the exception of the grinding aids, all other flows' consumption is given for the whole cement plant, which often makes several types of cement. Manufacturer information on fuel usage was provided in terms of mass or volume. To make the dataset simpler and to take into account the accompanying air emissions, they were transformed into energy using their lower heating values and modeled as a heat input. The "cement Portland/GLO" information was used to estimate the infrastructure input flow (cement plant) (accessed 15.09.2022). The weighted average of the sample was taken into consideration while calculating the exchange amounts. In order to maintain consistency with other EcoInvent datasets, no conversion to the geometric mean of the lognormal distribution was performed.

## Extrapolations
Data represent 15% of Tunisian cement production. This sample is extrapolated to reflect total output in the country. The primary values are regarded appropriate for a typical production of Sulfate Resistant Cement in Tunisia.

## Review by Bruno Peuportier 2023-05-02
All explanations and corrections have been completed
