# harvesting, use of harvesting cart

Dataset: EcoSpold 2, unit process
Geography: US
Time period: 2021-01-01 to 2023-12-31
Technology level: current
Classification: ISIC rev.4 ecoinvent: 2821:Manufacture of agricultural and forestry machinery
Scenario: Business-as-Usual
System model: Allocation, cut-off by classification
Generated by: Juanita Barrera
Database: ecoinvent
isCopyrightProtected: true
accessRestrictedTo: 1

## General comment
This dataset represents the service of harvesting 1 kg of maize by a harvesting cart. It has an operational time of 0.001605 h/ha and a lifetime operational time is 1200 h. Its fuel consumption is 0.015245 kg diesel per kg of harvesting maize, while it weighs 1500 kg. The yield of maize in the US is 107945 hg/ha.

## Included activities start
The process starts when the harvesting cart is on the agricultural field to be harvested

## Included activities end
This activity ends with the delivery of harvested maize. The dataset includes the diesel fuel consumption and the amount of agricultural machinery and of the shed attributed to harvesting. It was also taken into consideration the amount of emissions to the air from combustion and the emission to the soil from tyre abrasion during the work process.

## Geography
The inventory is modelled for agricultural processes in the US.

## Technology
The input of agricultural trailer is used as a proxy for harvesting cart.

## Reference product
- harvesting, use of harvesting cart: 1 kg; By-product classification allocatable product; CPC 86119: Other support services to crop production
  production volume 3.60252e11 kg
    FAOSTAT data year 2020 (total production volume of maize)
  property price 60.8279 EUR2005
    The price is from the year 2020. Price information has been directly provided by the data provider based on the following reference: University of Minnesota, Machinery cost estimates, W.F. Lazarus, 2020. The prices were adjusted for inflation relative to 2005 using the producer price index (PPI) of the euro area, published by eurostat (https://ec.europa.eu/eurostat/databrowser/view/STS_INPP_A__custom_6416181/default/table?lang=en, last accessed on 2023-06-01).
  properties: carbon allocation 0 kg, carbon content 0

## Inputs from technosphere
- agricultural trailer: 1.85859e-7 kg; lognormal variance with pedigree 0.304, pedigree (2,4,2,4,2)
  agricultural trailer is used as a proxy for harvesting cart. The cart has an operational time of 0.001605h/ha (2021 Nebraska Crop budget projections, Robert Klein and Glennis McClure, UNL Extension). The trailer has a lifetime operational time of 1200h, and it weights 1500 kg. Based on FAOSTAT data, 2020 the yield of maize in the US is 107945 hg/ha = 10794,5 kg/ha
- diesel: 0.015245 kg; lognormal variance with pedigree 0.0069, pedigree (1,2,2,1,2)
  2021 Nebraska Crop budget projections, Robert Klein and Glennis McClure, UNL Extension
  properties: carbon content, fossil 0.865, dry mass 1 kg, heating value, net 42.8 MJ, wet mass 1 kg
- shed: 0.00198 m2; lognormal variance with pedigree 0.304, pedigree (2,4,2,4,2)
  proxy
- tractor, 4-wheel, agricultural: 0.321 kg; lognormal variance with pedigree 0.304, pedigree (2,4,2,4,2)
  proxy for 1 h of tractor use

## Emissions to nature
- Ammonia [air, non-urban air or from high stacks]: 3.06055e-7 kg; lognormal variance with pedigree 0.0583, pedigree (1,2,2,1,3)
  Proxy, based on 'Agricultural Field Work Processes' - pdf-document on the dedicated talk page of ecoinvent (www.ecoinvent.org/talk-pages)
- Benzene [air, non-urban air or from high stacks]: 1.11161e-7 kg; lognormal variance with pedigree 0.0583, pedigree (1,2,2,1,3)
  (same comment as for Ammonia)
- Benzo(a)pyrene [air, non-urban air or from high stacks]: 4.56195e-10 kg; lognormal variance with pedigree 0.6583, pedigree (1,2,2,1,3)
  (same comment as for Ammonia)
- Cadmium II [air, non-urban air or from high stacks]: 1.5245e-10 kg; lognormal variance with pedigree 0.6583, pedigree (1,2,2,1,3)
  (same comment as for Ammonia)
- Carbon dioxide, fossil [air, non-urban air or from high stacks]: 0.0473519 kg; lognormal variance with pedigree 0.0183, pedigree (1,2,2,1,3)
  (same comment as for Ammonia)
- Carbon monoxide, fossil [air, non-urban air or from high stacks]: 9.96122e-5 kg; lognormal variance with pedigree 0.6522, pedigree (1,4,2,1,1)
  (same comment as for Ammonia)
- Chromium III [air, non-urban air or from high stacks]: 7.6225e-10 kg; lognormal variance with pedigree 0.6583, pedigree (1,2,2,1,3)
  (same comment as for Ammonia)
- Copper ion [air, non-urban air or from high stacks]: 2.58992e-8 kg; lognormal variance with pedigree 0.6583, pedigree (1,2,2,1,3)
  (same comment as for Ammonia)
- Dinitrogen monoxide [air, non-urban air or from high stacks]: 1.82767e-6 kg; lognormal variance with pedigree 0.0583, pedigree (1,2,2,1,3)
  (same comment as for Ammonia)
- Methane, fossil [air, non-urban air or from high stacks]: 1.96626e-6 kg; lognormal variance with pedigree 0.0583, pedigree (1,2,2,1,3)
  (same comment as for Ammonia)
- NMVOC, non-methane volatile organic compounds [air, non-urban air or from high stacks]: 2.97393e-5 kg; lognormal variance with pedigree 0.0422, pedigree (1,4,2,1,1)
  (same comment as for Ammonia)
- Nickel II [air, non-urban air or from high stacks]: 1.06542e-9 kg; lognormal variance with pedigree 0.6583, pedigree (1,2,2,1,3)
  (same comment as for Ammonia)
- Nitrogen oxides [air, non-urban air or from high stacks]: 0.000586124 kg; lognormal variance with pedigree 0.0422, pedigree (1,4,2,1,1)
  (same comment as for Ammonia)
- PAH, polycyclic aromatic hydrocarbons [air, non-urban air or from high stacks]: 5.02392e-8 kg; lognormal variance with pedigree 0.3183, pedigree (1,2,2,1,3)
  (same comment as for Ammonia)
- Particulate Matter, < 2.5 um [air, non-urban air or from high stacks]: 7.91123e-5 kg; lognormal variance with pedigree 0.3183, pedigree (1,2,2,1,3)
  (same comment as for Ammonia)
- Selenium IV [air, non-urban air or from high stacks]: 1.5245e-10 kg; lognormal variance with pedigree 0.0583, pedigree (1,2,2,1,3)
  (same comment as for Ammonia)
- Sulfur dioxide [air, non-urban air or from high stacks]: 1.53605e-5 kg; lognormal variance with pedigree 0.0183, pedigree (1,2,2,1,3)
  (same comment as for Ammonia)
- Zinc II [air, non-urban air or from high stacks]: 1.5245e-8 kg; lognormal variance with pedigree 0.6583, pedigree (1,2,2,1,3)
  (same comment as for Ammonia)
- Cadmium II [soil, agricultural]: 1.57936e-9 kg; lognormal variance with pedigree 0.0422, pedigree (1,4,2,1,1)
  (same comment as for Ammonia)
- Lead II [soil, agricultural]: 6.98729e-9 kg; lognormal variance with pedigree 0.0422, pedigree (1,4,2,1,1)
  (same comment as for Ammonia)
- Zinc II [soil, agricultural]: 4.21547e-6 kg; lognormal variance with pedigree 0.0422, pedigree (1,4,2,1,1)
  (same comment as for Ammonia)

## Extrapolations
The dataset is modeled for agricultural production system in US. Data Quality indicators are adjusted accordingly. The input of agricultural trailer is used as a proxy for harvesting cart.
