# amine oxides production

Dataset: EcoSpold 2, unit process
Geography: RoW
Time period: 2015-01-01 to 2023-12-31
Technology level: current
Classification: ISIC rev.4 ecoinvent: 2023:Manufacture of soap and detergents, cleaning and polishing preparations, pe
Synonyms: N-oxide; amine-N-oxide
Scenario: Business-as-Usual
System model: Allocation, cut-off by classification
Generated by: Lucia Valsasina
Database: ecoinvent
isCopyrightProtected: true
accessRestrictedTo: 1

## General comment
Amine oxides are surfactants and are therefore used for cleaning products and in the personal care industry. These products are used as foam stabilizers, for thickening, emulsification, conditioning, and as emollients. These are usually used in a concentration up to 10%. Amine oxides are always sold in solution state, usually in water with concentration between 25% and 35% (OECD 2006).
The annual production volume of amine oxides is of 26 thousand tonnes, 16 thousand tonnes and 6.8 thousand tonnes in the US, EU, Japan respectively (OECD 2006).
Reference(s):
Gendorf (2016) Umwelterklärung 2015, Werk Gendorf Industriepark, www.gendorf.de
OECD SIDS 2006. SIDS Initial Assessment Report For SIAM 22 Paris, France, 18-21 April 2006. Retrieved from: webnet.oecd.org/hpv/ui/handler.axd?id=b50d7d1a-50d1-488a-97e4-9cc71005b1a1, accessed 2 February 2017
Roose et al. 2015. Amines, Aliphatic. In Ullmann's Encyclopedia of Industrial Chemistry, Electronic Release, pp.1-55. Wiley-VCH, Weinheim.
For more information on the model please refer to the dedicate ecoinvent report, access it in the Report section of ecoQuery (http://www.ecoinvent.org/login-databases.html)

## Included activities start
The activity starts when the raw materials enter the process.

## Included activities end
Materials entering the process are included as well as energy uses, infrastructure and emissions.

## Geography
The inputs to the process are calculated based on stoichiometry and literature data, they are therefore considered to be valid for the chosen geography. The inputs of heat, electricity, water, factory and nitrogen are mostly taken as average of industry data. Industry data values are a 5-year average of data (2011 - 2015) published by the Gendorf factory (Gendorf, 2016, Umwelterklärung, www.gendorf.de), (Gendorf, 2015, Umwelterklärung, www.gendorf.de), (Gendorf, 2014, Umwelterklärung, www.gendorf.de). The Gendorf factory is based in Germany, it produces a wide range of chemical substances. The factory produced 1657400 tonnes of chemical substances in the year 2015 (Gendorf, 2016, Umwelterklärung, www.gendorf.de) and 740000 tonnes of intermediate products. Given the range of chemicals produced by the german site, the values are used for the GLO geography, with uncertainty adjusted accordingly.

## Technology
Amine oxides are all surfactants because of their similar structure. All amine oxides are formed by an amine oxide polar “head” and an alkyl hydrophobic “tail”. The alkyl chain has between 8 and 20 C atoms (OECD 2006). This activity describes an amine oxide with C14. The product is the result of the reaction of dodecanol and dimethylamine (Roose et al. 2015). Hydrogen peroxide is used as oxidizing agent.
Chemical reaction:
C12H26O + (CH3)2NH + H2O2 -> C14H31NO + 2H2O
This inventory representing production of a particular chemical compound is at least partially based on a generic model on the production of chemicals. The data generated by this model have been improved by compound-specific data when available.
The model on production of chemicals is using specific industry or literature data wherever possible and more generic data on chemical production processes to fill compound-specific data gaps when necessary. The basic principles of the model have been published in literature (Hischier 2005, Establishing Life Cycle Inventories of Chemicals Based on Differing Data Availability). The model has been updated and extended with newly available data from the chemical industry.
In the model, unreacted fractions are treated in a waste treatment process, and emissions reported are after a waste treatment process that is included in the scope of this dataset. For volatile reactants, a small level of evaporation is assumed. Solvents and catalysts are mostly recycled in closed-loop systems within the scope of the dataset and reported flows are for losses from this system.
The main source of information for the values for heat, electricity, water (process and cooling), nitrogen, chemical factory is industry data from Gendorf. The values are a 5-year average of data (2011 - 2015) published by the Gendorf factory (Gendorf, 2016, Umwelterklärung, www.gendorf.de), (Gendorf, 2015, Umwelterklärung, www.gendorf.de), (Gendorf, 2014, Umwelterklärung, www.gendorf.de). The Gendorf factory is based in Germany, it produces a wide range of chemical substances. The factory produced 1657400 tonnes of chemical substances in the year 2015 (Gendorf, 2016, Umwelterklärung, www.gendorf.de) and 740000 tonnes of intermediate products.
Reference(s):
Hischier, R. (2005) Establishing Life Cycle Inventories of Chemicals Based on Differing Data Availability (9 pp). The International Journal of Life Cycle Assessment, Volume 10, Issue 1, pp 59–67. 10.1065/lca2004.10.181.7
Gendorf (2016) Umwelterklärung 2015, Werk Gendorf Industriepark, www.gendorf.de
OECD SIDS 2006. SIDS Initial Assessment Report For SIAM 22 Paris, France, 18-21 April 2006. Retrieved from: webnet.oecd.org/hpv/ui/handler.axd?id=b50d7d1a-50d1-488a-97e4-9cc71005b1a1, accessed 2 February 2017
Roose et al. 2015. Amines, Aliphatic. In Ullmann's Encyclopedia of Industrial Chemistry, Electronic Release, pp.1-55. Wiley-VCH, Weinheim.
For more information on the model please refer to the dedicate ecoinvent report, access it in the Report section of ecoQuery (http://www.ecoinvent.org/login-databases.html)

## Time period
The activity is based on stoichiometry and literature data, it is therefore considered not to change significantly over time in terms of inputs. The inputs of heat, electricity, water, factory and nitrogen are mostly taken as average of industry data. Industry data values are a 5-year average of data (2011 - 2015) published by the Gendorf factory (Gendorf, 2016, Umwelterklärung, www.gendorf.de), (Gendorf, 2015, Umwelterklärung, www.gendorf.de), (Gendorf, 2014, Umwelterklärung, www.gendorf.de). The Gendorf factory is based in Germany, it produces a wide range of chemical substances. The factory produced 1657400 tonnes of chemical substances in the year 2015 (Gendorf, 2016, Umwelterklärung, www.gendorf.de) and 740000 tonnes of intermediate products. The time period is therefore set based on the years from Gendorf reference.

## Reference product
- amine oxides: 1 kg; name RP; By-product classification allocatable product; CPC 35310: Organic surface active agents, except soap; HS2017 340213: Organic surface-active agents; non-ionic (other than soap), whether or not put up for retail sale
  Amine oxides are surfactants and are therefore used for cleaning products and in the personal care industry. These products are used as foam stabilizers, for thickening, emulsification, conditioning, and as emollients. These are usually used in a concentration up to 10%. Amine oxides are always sold in solution state, usually in water with concentration between 25 and 35% (OECD 2006).
  Reference:
  OECD SIDS 2006. SIDS Initial Assessment Report For SIAM 22 Paris, France, 18-21 April 2006. Retrieved from: webnet.oecd.org/hpv/ui/handler.axd?id=b50d7d1a-50d1-488a-97e4-9cc71005b1a1, accessed 2 February 2017
  production volume 1.32535e8 kg; name RP_PV
    Estimated value. The Global production volume is estimated based on information from Cefic (European Chemical Industry Council) and the American Chemistry Council.
    According to Cefic (2016) the Global sales of chemicals in the year 2015 was 3 534 billion euros. The reported share of sales per regions are: EU28 14.7%; Other Europe (Switzerland, Norway, Turkey, Russia and Ukraine) 2.7%; NAFTA (US, Canada and Mexico) 16.5%; Latin America 3.8%; China 39.9%; Japan 3.9%; Republic of Korea 3.2%; India 2.2%; Rest of Asia 11.9%; Rest of the World 1.3%. Cefic also reports the US total sales, 518.7 billion euros of the global 3 534 billion euros (14.7%). The same share is reported from the American Chemistry Council (2016), according to this source the USA sales account for 15% of global sales for the year 2016.
    According to the OECD SIDS report (2006) the production of amine oxide for 2006 was 26 000 thousand tonnes in US, 16 000 thousand tonnes in EU, and 6.5 thousand tonnes in Japan.
    As no information was found for the Global production volume, this values is calculated as the average of the values mentioned above in relation to the sales share from the respective regions; RER, which is here defined as EU28 plus Other Europe adn assumed to equal Western Europe, share of sales (14.7% + 2.7% = 17.4%), USA 15%, and Japan 3.9%.
    Reference(s):
    Cefic 2016. Facts and figures 2016 of the European chemical industry. Accessible at: http://www.cefic.org/Facts-and-Figures/Chemicals-Industry-Profile/, accessed 1 June 2017
    American Chemistry Council 2016. Outlook: U.S. Chemical Industry Continues to Outpace Industrial Output; Accounts for More Than One-Half of Construction Spending by Manufacturing Sector. Accessible at: https://www.americanchemistry.com/Media/PressReleasesTranscripts/ACC-news-releases/US-Chemical-Industry-Continues-to-Outpace-Industrial-Output.html, accessed 1 June 2017
    OECD. 2006. SIDS Initial Assessment Report For SIAM 22 Paris, France, 18-21 April 2006. Retrieved from: webnet.oecd.org/hpv/ui/handler.axd?id=b50d7d1a-50d1-488a-97e4-9cc71005b1a1, accessed 29 June 2017
  property carbon content, fossil 0.366498
    Estimated value. The two inputs to this activity, dodecanol and methylamine, can be both from fossil and non fossil sources. Dodecanol can be produced from coconut oil or from the Ziengler process (from ethylene), mehthylamine is produced from ammonia and methanol, methanol can be from both biomass or fossil sources. We therefore we assume a 50/50 share of carbon fossil and non fossil.
  property carbon content, non-fossil 0.366498
    (same comment as for amine oxides)
  property price 4.50332 EUR2005
    Calculated based on inputs: The price of the product has been calculated as a sum of the values of the material and energy inputs for this product. This value is therefore a rough estimation. It may underestimate the real price since there are additional expenses when producing any product. These expences can include for example labour costs, treatment of waste materials and profit for the producer. Please consider carefully whether this level of data quality is acceptable for your application.
  properties: carbon allocation 0.732996 kg, carbon content 0.732996, dry mass 1 kg, water content 0, water in wet mass 0 kg, wet mass 1 kg

## Inputs from technosphere
- chemical factory, organics: 4e-10 unit; lognormal variance with pedigree 0.3448, pedigree (2,4,2,5,4)
  Calculated based on literature data published by the industry. For this activity, no information was readily available concerning infrastructure and land-use. Therefore, the infrastructure is estimated based on data from two chemical factories, the BASF site of Ludwigshafen and the chemical factory in Gendorf (which are both located in Germany), which produce a wide range of chemical substances. Based on this data, the following assumptions are made: the built area amounts to about 4.2 ha, the plant has an average output of 50'000 t/a and a lifespan of fifty years. The estimated infrastructure amount is therefore 4.00 E-10 units per kg of produced chemical.
  References:
  Althaus H.-J., Chudacoff M., Hischier R., Jungbluth N., Osses M. and Primas A. (2007) Life Cycle Inventories of Chemicals. ecoinvent report No. 8, v2.0. EMPA Dübendorf, Swiss Centre for Life Cycle Inventories, Dübendorf, CH.
  Gendorf (2000) Umwelterklärung 2000, Werk Gendorf. Werk Gendorf, Burgkirchen.
- dodecanol: 0.859308 kg; lognormal variance with pedigree 0.0101, pedigree (2,3,2,3,3)
  Calculated value based on stoichiometric calculations and literature data.
  229.40628g/mol is the molar mass of amine oxide (C14H31NO).
  properties: carbon content, fossil 0.386749, carbon content, non-fossil 0.386749, dry mass 1 kg, heating value, net 40.34 MJ, wet mass 1 kg
- electricity, medium voltage: 0.013262, 0.264547, 0.088887, 0.00406128, 0.00081286, 0.000174539, 0.0273186 kWh (7 suppliers, which the file names only by identifier); sum of these 0.399063 kWh; lognormal variance with pedigree 0.0454, pedigree (2,4,2,5,4)
  Calculated based on literature data published by the GENDORF Chemical Park. The factory produced an average of 2462760 tonnes of chemical substances (including intermediates) per year in the years 2015-2019. The average consumption of electricity in the years 2015-2019 was 982796751 kWh per year. This equals 0.39906 kWh/kg chemical produced.
  References:
  Chemiepark GENDORF, Umwelterklärung 2016, https://www.gendorf.de/Nachbarn/Umweltschutz/Industrie%20und%20Nachhaltigkeit
  Chemiepark GENDORF, Umwelterklärung 2017, https://www.gendorf.de/Nachbarn/Umweltschutz/Industrie%20und%20Nachhaltigkeit
  Chemiepark GENDORF, Umwelterklärung 2020, https://www.gendorf.de/Nachbarn/Umweltschutz/Industrie%20und%20Nachhaltigkeit
- heat, district or industrial, natural gas: 0.0304984, 1.85597 MJ (2 suppliers, which the file names only by identifier); sum of these 1.88647 MJ; lognormal variance with pedigree 0.0454, pedigree (2,4,2,5,4)
  Calculated based on literature data published by the GENDORF Chemical Park. The factory produced an average of 2462760 tonnes of chemical substances (including intermediates) per year in the years 2015-2019. The average consumption of natural gas in the years 2015-2019 was 4645920000 MJ per year. This equals 1.8865 MJ/kg chemical produced.
  References:
  Chemiepark GENDORF, Umwelterklärung 2016, https://www.gendorf.de/Nachbarn/Umweltschutz/Industrie%20und%20Nachhaltigkeit
  Chemiepark GENDORF, Umwelterklärung 2017, https://www.gendorf.de/Nachbarn/Umweltschutz/Industrie%20und%20Nachhaltigkeit
  Chemiepark GENDORF, Umwelterklärung 2020, https://www.gendorf.de/Nachbarn/Umweltschutz/Industrie%20und%20Nachhaltigkeit
  properties: heating value, net 1 MJ
- heat, from steam, in chemical industry: 0.20781 MJ; lognormal variance with pedigree 0.0454, pedigree (2,4,2,5,4)
  Calculated based on literature data published by the GENDORF Chemical Park. The factory produced an average of 2462760 tonnes of chemical substances (including intermediates) per year in the years 2015-2019. The average consumption of steam (internal and external sources) in the years 2015-2019 was 511785800 MJ per year. This equals 0.2078 MJ/kg chemical produced.
  References:
  Chemiepark GENDORF, Umwelterklärung 2016, https://www.gendorf.de/Nachbarn/Umweltschutz/Industrie%20und%20Nachhaltigkeit
  Chemiepark GENDORF, Umwelterklärung 2017, https://www.gendorf.de/Nachbarn/Umweltschutz/Industrie%20und%20Nachhaltigkeit
  Chemiepark GENDORF, Umwelterklärung 2020, https://www.gendorf.de/Nachbarn/Umweltschutz/Industrie%20und%20Nachhaltigkeit
  properties: heating value, net 1 MJ
- hydrogen peroxide, without water, in 50% solution state: 0.156861 kg; lognormal variance with pedigree 0.0101, pedigree (2,3,2,3,3)
  Calculated value based on stoichiometric calculations and literature data.
  34.01468g/mol is the molar mass of hydrogen peroxide, without water, in 50% solution state (H2O2).
  229.40628g/mol is the molar mass of amine oxide (C14H31NO).
  properties: dry mass 1 kg, heating value, net 7.13 MJ, wet mass 1 kg
- methylamine: 0.143223 kg; lognormal variance with pedigree 0.0101, pedigree (2,3,2,3,3)
  Calculated value based on stoichiometric calculations and literature data.
  31.05744g/mol is the molar mass of methylamine (CH5N).
  229.40628g/mol is the molar mass of amine oxide (C14H31NO).
  properties: carbon content, fossil 0.386735, dry mass 1 kg, heating value, net 31.23 MJ, wet mass 1 kg
- wastewater, average: -2.26904e-6, -8.07865e-9 m3 (2 suppliers, which the file names only by identifier); sum of these -2.27712e-6 m3; lognormal variance with pedigree 0.0452, pedigree (2,4,1,5,4)
  Calculated based on literature data published by the GENDORF Chemical Park. The factory produced an average of 2462760 tonnes of chemical substances (including intermediates) per year in the years 2015-2019. The average ouput of wastewater going to an external wastewater treatment plant in the years 2015-2019 was 5608 m3 per year. This equals 0.000002277 m3/kg chemical produced.
  References:
  Chemiepark GENDORF, Umwelterklärung 2016, https://www.gendorf.de/Nachbarn/Umweltschutz/Industrie%20und%20Nachhaltigkeit
  Chemiepark GENDORF, Umwelterklärung 2017, https://www.gendorf.de/Nachbarn/Umweltschutz/Industrie%20und%20Nachhaltigkeit
  Chemiepark GENDORF, Umwelterklärung 2020, https://www.gendorf.de/Nachbarn/Umweltschutz/Industrie%20und%20Nachhaltigkeit
  production volume; = BP_wastewater_average*RP_PV/ABS(RP)
    Calculated from the production volume of the reference product in proportion to the respective output amounts.
  properties: carbon content, non-fossil 0.194039, dry mass 0.346837 kg, water content 2882.2, wet mass 1000 kg
  note on carbon content, non-fossil: 0.0673 kg TOC/m3 (Tab A.17, ecoinvent v2.2 report 13_I). TOC was considered as Total Carbon.

## Inputs from nature
- Water, cooling, unspecified natural origin [natural resource, in water]: 0.014707 m3; lognormal variance with pedigree 0.0454, pedigree (2,4,2,5,4)
  Calculated based on literature data published by the GENDORF Chemical Park. The factory produced an average of 2462760 tonnes of chemical substances (including intermediates) per year in the years 2015-2019. The average amount of cooling water released in the years 2015-2019 was 34408800 t per year. It was assumed that 5% of the cooling water was emitted to air during its use, therefore, to calculate the input of cooling water, the output value reported by GENDORF was scaled up by the factor 1/0.95. This equals 0.014707 m3/kg chemical produced.
  References:
  Chemiepark GENDORF, Umwelterklärung 2016, https://www.gendorf.de/Nachbarn/Umweltschutz/Industrie%20und%20Nachhaltigkeit
  Chemiepark GENDORF, Umwelterklärung 2017, https://www.gendorf.de/Nachbarn/Umweltschutz/Industrie%20und%20Nachhaltigkeit
  Chemiepark GENDORF, Umwelterklärung 2020, https://www.gendorf.de/Nachbarn/Umweltschutz/Industrie%20und%20Nachhaltigkeit
- Water, river [natural resource, in water]: 0.000965426 m3; lognormal variance with pedigree 0.0454, pedigree (2,4,2,5,4)
  Calculated based on literature data published by the GENDORF Chemical Park. The factory produced an average of 2462760 tonnes of chemical substances (including intermediates) per year in the years 2015-2019. The average consumption of river water in the years 2015-2019 was 22000820 t per year. However, since the cooling water is modelled as an input, the amount of river water was adjusted to avoid double counting. 55% of the input amount of cooling water was deducted from the amount of river water, as that is the share of river water versus well water. This equals 0.00096543 m3/kg chemical produced.
  References:
  Chemiepark GENDORF, Umwelterklärung 2016, https://www.gendorf.de/Nachbarn/Umweltschutz/Industrie%20und%20Nachhaltigkeit
  Chemiepark GENDORF, Umwelterklärung 2017, https://www.gendorf.de/Nachbarn/Umweltschutz/Industrie%20und%20Nachhaltigkeit
  Chemiepark GENDORF, Umwelterklärung 2020, https://www.gendorf.de/Nachbarn/Umweltschutz/Industrie%20und%20Nachhaltigkeit
- Water, well, in ground [natural resource, in water]: 0.000816522 m3; lognormal variance with pedigree 0.0454, pedigree (2,4,2,5,4)
  Calculated based on literature data published by the GENDORF Chemical Park. The factory produced an average of 2462760 tonnes of chemical substances (including intermediates) per year in the years 2015-2019. The average consumption of well water in the years 2015-2019 was 18607480 t per year. However, since the cooling water is modelled as an input, the amount of well water was adjusted to avoid double counting. 45% of the input amount of cooling water was deducted from the amount of well water, as that is the share of well water versus river water. This equals 0.00081652 m3/kg chemical produced.
  References:
  Chemiepark GENDORF, Umwelterklärung 2016, https://www.gendorf.de/Nachbarn/Umweltschutz/Industrie%20und%20Nachhaltigkeit
  Chemiepark GENDORF, Umwelterklärung 2017, https://www.gendorf.de/Nachbarn/Umweltschutz/Industrie%20und%20Nachhaltigkeit
  Chemiepark GENDORF, Umwelterklärung 2020, https://www.gendorf.de/Nachbarn/Umweltschutz/Industrie%20und%20Nachhaltigkeit

## Emissions to nature
- Amine oxides [air, unspecified]: 0.00502513 kg; lognormal variance with pedigree 0.0106, pedigree (2,3,2,4,3)
  Calculated value. The values is based on a generic model. The basic principles of the model have been published in literature (Hischier 2005, Establishing Life Cycle Inventories of Chemicals Based on Differing Data Availability). The model has been updated and extended with newly available data from the chemical industry. Find more information in the dedicated report on the ecoinvent website.
  Reference(s):
  Hischier, R. (2005) Establishing Life Cycle Inventories of Chemicals Based on Differing Data Availability (9 pp). The International Journal of Life Cycle Assessment, Volume 10, Issue 1, pp 59–67. 10.1065/lca2004.10.181.7
- Carbon dioxide, fossil [air, unspecified]: 0.115684 kg; lognormal variance with pedigree 0.0106, pedigree (2,3,2,4,3)
  (same comment as for Amine oxides)
- Methylamine [air, unspecified]: 0.000716116 kg; lognormal variance with pedigree 0.0106, pedigree (2,3,2,4,3)
  (same comment as for Amine oxides)
- Water [air, unspecified]: 0.00147008 m3; lognormal variance with pedigree 0.0848, pedigree (2,4,2,5,4)
  Calculated based on literature data published by the GENDORF Chemical Park. The factory produced an average of 2462760 tonnes of chemical substances (including intermediates) per year in the years 2015-2019. To determine the emissions of water to air, the difference of all water inputs (from river, well, tap water and cooling) and outputs (wastewater, emissions to water) was calculated. The average ouput of water to air in the years 2015-2019 was 3620444 m3 per year. This equals 0.00147 m3/kg chemical produced. For more information on the other water exchanges please consult the respective exchange comment.
  References:
  Chemiepark GENDORF, Umwelterklärung 2016, https://www.gendorf.de/Nachbarn/Umweltschutz/Industrie%20und%20Nachhaltigkeit
  Chemiepark GENDORF, Umwelterklärung 2017, https://www.gendorf.de/Nachbarn/Umweltschutz/Industrie%20und%20Nachhaltigkeit
  Chemiepark GENDORF, Umwelterklärung 2020, https://www.gendorf.de/Nachbarn/Umweltschutz/Industrie%20und%20Nachhaltigkeit
- Dodecanol [water, unspecified]: 0.00214827 kg; lognormal variance with pedigree 0.0106, pedigree (2,3,2,4,3)
  (same comment as for Amine oxides)
- Hydrogen peroxide [water, unspecified]: 0.000392152 kg; lognormal variance with pedigree 0.0106, pedigree (2,3,2,4,3)
  (same comment as for Amine oxides)
- Water [water, unspecified]: 0.0150391 m3; lognormal variance with pedigree 0.0848, pedigree (2,4,2,5,4)
  Calculated based on literature data published by the GENDORF Chemical Park. The factory produced an average of 2462760 tonnes of chemical substances (including intermediates) per year in the years 2015-2019. The amount of water released back to the environment consists of the sum of the amount of process water treated in the internal WWTP that is then released back to the environment and the amount of cooling water released back to the environment. The average ouput of the internal WWTP in the years 2015-2019 was 2628800 m3 and that of cooling water released back to the environment was 34408800 m3. This gives a yearly average of 37037600 m3 emissions of water to water. This equals 0.01504 m3/kg chemical produced.
  References:
  Chemiepark GENDORF, Umwelterklärung 2016, https://www.gendorf.de/Nachbarn/Umweltschutz/Industrie%20und%20Nachhaltigkeit
  Chemiepark GENDORF, Umwelterklärung 2017, https://www.gendorf.de/Nachbarn/Umweltschutz/Industrie%20und%20Nachhaltigkeit
  Chemiepark GENDORF, Umwelterklärung 2020, https://www.gendorf.de/Nachbarn/Umweltschutz/Industrie%20und%20Nachhaltigkeit

## Sampling procedure
Literature data and stochiometric calculation.

## Extrapolations
This dataset is extrapolated from the european dataset. The uncertainty has been adjusted accordingly.

## Review by Emilia Moreno Ruiz 2017-08-10
This dataset was additionally reviewed in a separate review process by Eric Johnson of Atlantic Consulting as well as Emilia Moreno Ruiz and Gregor Wernet of ecoinvent.
