# rock crushing

Dataset: EcoSpold 2, unit process
Geography: RER
Time period: 1999-01-01 to 2023-12-31
Technology level: current
Classification: EcoSpold01Categories: construction processes/machinery
Classification: ISIC rev.4 ecoinvent: 2824:Manufacture of machinery for mining, quarrying and construction
Synonyms: Breaker
Tags: ConvertedDataset
Scenario: Business-as-Usual
System model: Allocation, cut-off by classification
Generated by: Daniel Kellenberger (obsolete)
Published in: Kellenberger D. 2007
Database: ecoinvent
isCopyrightProtected: true
accessRestrictedTo: 1

## General comment
Most data are taken from an LCA report and are based on a specific type of crusher (Nordberg HP 400 SX). The transportation distances are estimated and the transport requirements added. This module may not be used if having a high importance in a certain context. Crusher throughput capacity declared by the producer: 454 tons per hour
[This dataset was already contained in the ecoinvent database version 2. It was not individually updated during the transfer to ecoinvent version 3. Life Cycle Impact Assessment results may still have changed, as they are affected by changes in the supply chain, i.e. in other datasets. This dataset was generated following the ecoinvent quality guidelines for version 2. It may have been subject to central changes described in the ecoinvent version 3 change report (http://www.ecoinvent.org/database/ecoinvent-version-3/reports-of-changes/), and the results of the central updates were reviewed extensively. The changes added e.g. consistent water flows and other information throughout the database. The documentation of this dataset can be found in the ecoinvent reports of version 2, which are still available via the ecoinvent website. The change report linked above covers all central changes that were made during the conversion process.]

## Included activities end
Includes the machine, spares and wears, lubricating oil, and the transportation of the new parts to the assembly plant as well as transportation of the crusher to the operational sites. Electricity consumption and dust emissions are not included.

## Geography
Certain elementary flows or intermediate product flows are extrapolated from Swiss conditions.

## Technology
Rock crusher type Nordberg HP400 SX produced in the USA in 1999, used as basis

## Reference product
- rock crushing: 1 kg; By-product classification allocatable product; CPC 44440: Machinery for sorting, screening, separating, washing, crushing, grinding, mixing or kneading earth, stone, or[…]; HS2017 847420: Machines; for crushing or grinding earth, stone, ores or other mineral substances
  EcoSpold01Location=RER
  production volume 1.32237 kg
    This is a placeholder value that does not reflect real-world production volumes. This dataset does not currently require a real-world production volume to work in the database framework, and no actual data were collected yet. This has no negative effect on the results of the ecoinvent database. The placeholder value of this activity was scaled according to the nominal GDP of 2005 (source: United Nations, http://data.un.org/Glossary.aspx?q=GDP+%28current+US%24%29, accessed 20130726) to reflect an appropriate share of the global production volume, which is also a placeholder value.
  property price 8.06314e-5 EUR2005
    Calculated based on inputs: The price of the product has been calculated as a sum of the values of the material and energy inputs for this product. This value is therefore a rough estimation. It may underestimate the real price since there are additional expenses when producing any product. These expences can include for example labour costs, treatment of waste materials and profit for the producer. Please consider carefully whether this level of data quality is acceptable for your application.
  properties: carbon allocation 0 kg, carbon content 0

## Inputs from technosphere
- cast iron: 7e-6 kg; lognormal variance with pedigree 0.0761, pedigree (1,5,5,3,3)
  EcoSpold01Location=RER
  properties: carbon content, fossil 0.04, dry mass 1 kg, wet mass 1 kg
  note on carbon content, fossil: Cast iron is made by remelting pig iron in small furnaces (e.g. cupola furnaces or electric arc furnaces) and poured into moulds to make castings. It usually contains 2% to 6% carbon (ecoinvent v2.2 report 10_partII). An average content of 4% was considered
- electricity, medium voltage: 0.000715859 kWh; = 1/2270000000*1625000; lognormal variance with pedigree 0.0898, pedigree (4,3,5,4,4)
  Calculated based on literature (ecoinvent version 2 report no. 7_BuildingProducts). 2270000000 kg/year is the total annual throughput of the rock crusher, 1625000 kWh/year is the measured electricity consumption.
- industrial machine, heavy, unspecified: 4.41e-7 kg; lognormal variance with pedigree 0.438, pedigree (5,5,5,1,1)
  EcoSpold01Location=RER
  activityLink introduced to establish a direct link to the corresponding regional supply of this product
- lubricating oil: 4.5e-7 kg; lognormal variance with pedigree 0.0761, pedigree (1,5,5,3,3)
  EcoSpold01Location=RER
  properties: carbon content, fossil 0.75, dry mass 1 kg, heating value, net 40.2 MJ, wet mass 1 kg
  note on carbon content, fossil: Lubricating oil is produced from diesel. C-content/dry mass of fats and oils considered 75%, from: ecoinvent v2.2 report, n 15a, pg 40
  note on heating value, net: Literature value, Source: IPCC 2006, 2006 IPCC Guidelines for National Greenhouse Gas Inventories, Prepared by the National Greenhouse Gas Inventories Programme, Eggleston H.S., Buendia L., Miwa K., Ngara T. and Tanabe K. (eds). Published: IGES, Japan

## Sampling procedure
most data from LCA study

## Extrapolations
See geography

## Review by Roberto Dones 2003-07-21
passed

## Review by Bo Weidema 2012-09-14
electricity consumption added
