# treatment of waste brick, sorting plant

Dataset: EcoSpold 2, unit process
Geography: Europe without Switzerland
Time period: 1994-01-01 to 2023-12-31
Technology level: current
Classification: EcoSpold01Categories: waste management/recycling
Classification: ISIC rev.4 ecoinvent: 3830:Materials recovery
Tags: Treatment
Scenario: Business-as-Usual
System model: Allocation, cut-off by classification
Generated by: [System]
Database: ecoinvent
isCopyrightProtected: true
accessRestrictedTo: 1

## General comment
The waste contains 1kg inert material (GSD=100%). Waste density is 1600 kg/m3.

## Included activities end
energy for dismantling, particulate matter emissions from dismantling and handling, machines for handling in sorting plant, electricity demand for sorting plant, transport to dismantling facilities, final disposal of waste material,

## Technology
Building demolition with skid-steer loaders. Dry sorting plant for building wastes with pre-sorting of mixed waste, crushing and manual sorting.

## Reference product
- waste brick: -1 kg; name RP; By-product classification Waste; CPC 39990: Other wastes n.e.c.; HS2017 690100: Bricks, blocks, tiles and other ceramic goods of siliceous fossil meals (e.g. kieselguhr, tripolite or diat[...]
  production volume 9.4429e9 kg; name RP_PV; = 4.85333E+12*0.15*0.25*0.296480529*0.21*0.5/0.6
    Estimated value. Brick global production is of 300000 billion/year (Baum 2010). Assume an average 3.5 kg per brick (LITTLEHAMPTON CLAY BRICKS AND PAVERS n.d.), results in 4853.33 billion kg per year. China, India, Pakistan, and Bangladesh represent 75% of world production.
    The EU without CH production volume is scaled from the remaining 25% of global production using nominal GDP of 2005 (source: United Nations, http://data.un.org/Glossary.aspx?q=GDP+%28current+US%24%29, accessed 20130726 and 20130312). Where EU GDP is 33% of the world. Gross domestic product (GDP) at current prices is GDP at prices of the current reporting period. Also known as nominal GDP. The Swiss production volume hence results in a value of 1.82E+11kg.
    The waste generation is estimated to be 15% (taken from the estimated value for gypsum, source: WRAP 'International practice in plasterboard recycling: Canada', n.d).
    The recycling rate is assumed to be 21% (IMA Europe 2013). . The shares sent to landfill and recycling are divided to include sorting. It is assumed that half the product is sent directly to recycling and half goes through sorting; knowing that 40% of the waste sent to sorting is landfilled, while 60% is recycled the corresponding shares are calculated.
    References:
    Baum, E. (2010) Black carbon from brick kilns. Clean air task force. Retrieved from: <http://www.catf.us/resources/presentations/files/Black_Carbon_from_Brick_Kilns.pdf>, accessed 4th of May 2016
    IMA Europe (2013) Recycling Industrial Minerals. Retrieved from: <http://www.ima-europe.eu/sites/ima-europe.eu/files/publications/IMA%20Recycling%20Sheets%20FULL%20published%20on%2024.10.2013_0.pdf>, accessed 8th of July 2016
    LITTLEHAMPTON CLAY BRICKS AND PAVERS n.d. Retrieved from: <http://littlehamptonbrick.com.au/clay-bricks/brick-specifications/>, accessed 4th May 2016
    WRAP (n.d.) International practice in plasterboard recycling: Canada. Retrieved from: http://www.wrap.org.uk/sites/files/wrap/Case%20study%20-%20Plasterboard%20recycling%20in%20Canada.pdf, accessed 3 May 2016
  property price 0 EUR2005
    Waste products are assigned a price of zero as they are assumed to require further treatment.
  properties: carbon allocation 0 kg, carbon content 0, carbon content, fossil 0, carbon content, non-fossil 0, dry mass 1 kg, water content 0, water in wet mass 0 kg, wet mass 1 kg

## Inputs from technosphere
- diesel, burned in building machine: 0.0359 MJ; lognormal variance with pedigree 0.072, pedigree (1,1,5,5,1)
  energy for demolition. Uncertainty from range in (DAFSTB 1996)
  properties: heating value, net 1 MJ
- electricity, low voltage: 0.0037 kWh; lognormal variance with pedigree 0.052, pedigree (1,1,5,5,1)
  demand in sorting plant. Uncertainty from range in literature
- excavation, hydraulic digger: 0.000694 m3; lognormal variance with pedigree 0.052, pedigree (1,1,5,5,1)
  handling in sorting plant. Uncertainty from range in literature
- inert waste: -0.4 kg; name inert_waste; lognormal variance with pedigree 0.042, pedigree (1,1,1,5,1)
  disposed masses. Uncertainty calculated from uncertainty in transfer coefficients and uncertainty of waste fractions
  production volume; = inert_waste*RP_PV/ABS( RP)
    Calculated from the production volume of waste brick in proportion to the respective output amounts.
  properties: dry mass 1 kg, wet mass 1 kg
- sorting facility, for construction waste: 1e-10 unit; lognormal variance with pedigree 0.042, pedigree (1,1,5,5,1)
  Uncertainty heeded in exchanges, 1kg = 1kg

## Emissions to nature
- Particulate Matter, < 2.5 um [air, urban air close to ground]: 1.66e-5 kg; lognormal variance with pedigree 0.3632, pedigree (2,3,5,5,1)
  Emission from dismantling and handling. from one extrapolated PM10 emission factor and generic PM fractions from measurements
- Particulate Matter, > 10 um [air, urban air close to ground]: 8.35e-5 kg; lognormal variance with pedigree 0.0932, pedigree (2,3,5,5,1)
  (same comment as for Particulate Matter, < 2.5 um)
- Particulate Matter, > 2.5 um and < 10um [air, urban air close to ground]: 6.34e-5 kg; lognormal variance with pedigree 0.1832, pedigree (2,3,5,5,1)
  (same comment as for Particulate Matter, < 2.5 um)

## Sampling procedure
waste-specific calculation based on literature data

## Extrapolations
none This dataset has been copied from an original dataset covering the geography CH. The uncertainty has been adjusted accordingly.
