# fibre production, flax, scutching

Dataset: EcoSpold 2, unit process
Geography: RER
Time period: 2014-01-01 to 2023-12-31
Technology level: current
Classification: ISIC rev.4 ecoinvent: 0116:Growing of fibre crops
Scenario: Business-as-Usual
System model: Allocation, cut-off by classification
Generated by: Marie Demaegdt
Database: ecoinvent
isCopyrightProtected: true
accessRestrictedTo: 1

## General comment
The data represent the scutching process for EUROPEAN FLAX™ fibre: western Europe - France, Belgium or Netherlands – amount for 3/4 of world production of flax fibre. EUROPEAN FLAX™ is a certification of origin and traceability owned by the Alliance for European Flax-Linen and Hemp (formerly known as CELC) which covers 100% of the fibres obtained from western European scutching, and guarantees third party verified traceability downstream. Scutching is an entirely mechanical process performed on flax straw, dew-retted, To extract the fibres and separate them from the woody stalk of the plant (shives). European Flax™ average yield in weight is 22% fibre, flax, long, scutched and 11% fibre, flax, short, scutched, those yields are entirely specific to western Europe and not reproducible in other geographies. Beyond fibres, the entire plant is used and nothing is wasted. Long and short fibres are used for textiles and technical textiles; shives for mulch, bedding, panel board, combustion; seeds for oil; even the soil and dust are used for potting soil. In this dataset, for this 1st version, only long and short fibres have been taken into account in the allocation, other co-products will be accounted for in a future iteration (long and short fibres together represent 94% of value of the whole products and co-products of scutching). Next processing steps: fibre, flax, long, scutched will undergo hackling to produce Hackled long fibre sliver and Hackle short fibre; while fibre, flax, short, scutched will be re-scutched to be used either for cottonizing or for carding and combing (for more information see the Mapping published by the Alliance in https://allianceflaxlinenhemp.eu/en/european-flax-linen-hemp-media-library). Scutching is performed all year round, either during the year after harvest or later as it can be stored a long time without losing its quality. Packaging for long fibres is usually flax rope, it has not been taken into account as considered neglectable. Packaging for fibre, flax, short, scutched is iron wire, hence an average 5 g/kg scutching short fibre has been included. Transport within the mill is included (straw from storage to scutching line and fibres to storage). Transport from field to scutching is not included.

## Included activities start
This activity begins from feeding the flax straw, dew-retted into scutching line

## Included activities end
The activity ends with the baling of fibre (long and short). Transport from filed to scutching is excluded.

## Geography
The data represent a weighted average across the 3 European countries producing flax: France, Belgium and the Netherlands. This production is 100% certified to EUROPEAN FLAX™ and represents 3/4 of the global production for flax straw, dew-retted. Source: statistic data for production of retted straw and of long and short fibres. The data was gathered by the Flax-Linen Economic Observatory of the Alliance for Linen-Flax and Hemp, from national organisations for flax cultivation and scutching in France, Belgium and the Netherlands.

## Technology
The data refer to the average scutching process for the geography given.

## Time period
The data refer to 5 years of scutching production from 2014 until and including 2018.

## Reference product
- fibre, flax, short, scutched: 1 kg; name BP_1; By-product classification allocatable product; CPC 26190: Other vegetable textile fibres, processed but not spun; tow and waste of these fibres; HS2017 5301: Flax, raw or processed but not spun; flax tow and waste (including yarn waste and garnetted stock)
  Calculated from average weighted yield of fibre, flax, short, scutched in France, Belgium and the Netherlands. 1 kilo flax straw, dew-retted = 11% of straw weight, that represents half the yield of the fibre, flax, short, scutched.
  production volume 7.6e7 kg; = PV_RP * (BP_1 / RP)
    Calculated from production volume of reference product using the relative outputs. On average between 20214 and 2018, in France + Belgium + Netherlands 73 000 tons of flax, fibre, short scutched were produced per year. Source: statistic data for production of retted straw and of long and short fibres. The data was gathered by the Flax-Linen Economic Observatory of the Alliance for Linen-Flax and Hemp, from national organisations for flax cultivation and scutching in France, Belgium and the Netherlands.
  property carbon content, non-fossil 0.4526
    "Carbon content on a dry mass basis. All carbon is assumed to be biogenic due to the nature of the product. Carbon content of Flax fiber is 0.4526 kg of non-fossil carbon per kg of dry mass of flax fiber. Value is calculated based on the the composition of flax which is 92% cellulose and 4% Lignin. Composition of Flax fibers accessed on 10/11/2017 on: http://textilefashionstudy.com/chemical-composition-of-flax-fiber-linen-fiber-composition/ . The value of 45% is also found in: Environmental Impact Analysis of the Production of Flax Fibres to be Used as Composite Material Reinforcement Article in Journal of Biobased Materials and Bioenergy · March 2011
  property heating value, net 13.23 MJ
    LHV is calculated based on the Carbon content of the product. More details can be found on the respective documentation.
  property price 0.576188 EUR2005
    Average data calculated by the Flax-Linen Economic Observatory of the Alliance for European Flax-Linen & Hemp, based on statistic data from national organisations for flax cultivation and scutching in France, Belgium and the Netherlands. It is to be noted that there is no stock market for flax fibre, and there is a large variability according to crop and weather conditions, among many factors. The prices were converted to EUR based on the annual exchange rates published by the European Central Bank (https://sdw.ecb.europa.eu/quickview.do?SERIES_KEY=120.EXR.A.AUD.EUR.SP00.A, last accessed on 2023-06-01) and adjusted for inflation relative to 2005 using the producer price index (PPI) of the euro area, published by eurostat (https://ec.europa.eu/eurostat/databrowser/view/STS_INPP_A__custom_6416181/default/table?lang=en, last accessed on 2023-06-01).
  properties: allocation factor 0.124566, carbon allocation 0.398288 kg, carbon content 0.4526, carbon content, fossil 0, dry mass 0.88 kg, true value 0.288094, water content 0.136364, water in wet mass 0.12 kg, wet mass 1 kg

## Inputs from technosphere
- diesel, burned in building machine: 0.000148233 MJ; lognormal variance with pedigree 0.33, pedigree (5,5,5,5,5)
  proxy for vehicles such as trolleys / forklifts which carry the material between scutching's storage and scutching machine.
  properties: heating value, net 1 MJ
- electricity, low voltage: 0.0229201 kWh; lognormal variance with pedigree 0.2106, pedigree (5,5,5,5,5)
  Average between a sample of scutchers weighted based on the machines' technical representativeness (age of scutching lines).
- flax straw, dew-retted: 1.13355 kg; lognormal variance with pedigree 0.2106, pedigree (5,5,5,5,5)
  Calculated from average yield of long scutched fibre in France, Belgium and the Netherlands, weighted each country's production. 1 kg of flax straw, dew-retted = 22% of straw weight.
  properties: carbon content, non-fossil 0.475, dry mass 0.92 kg, water content 0.0869565, wet mass 1 kg
- heat, district or industrial, natural gas: 0.00274045 MJ; lognormal variance with pedigree 0.2106, pedigree (5,5,5,5,5)
  Weigthed average data of thermal energy from natural gas, according to the different plants in the three conisdered countries. Data provided by the Alliance for European Flax_linen & Hemp
  properties: heating value, net 1 MJ
- steel, unalloyed: 0.000622829 kg; lognormal variance with pedigree 0.2106, pedigree (5,5,5,5,5)
  This service is included in the dataset to produce iron wire used as packaging for short scutching fibre. An average 5g / kg of short scutching fibre is considered. Hence, for this dataset, considering 0,5 of short scutching fibre, 0.0025 is reported (Note that this is a conservative value, from companies who use iron wire. Some scutchers integrate the next processing step without the need for packaging).
  properties: carbon content, fossil 0.0025, dry mass 1 kg, wet mass 1 kg
- waste wood, untreated: -0.759851 kg; name BP_2
  This is used as a proxy for coproduct lignocellulosic biomass, future updates will include specific biomass from fibre production, flax, scutching process, i.e. shive (straw) and dubest.
  production volume; = PV_RP * (BP_2 / RP)
    Calculated from production volume of reference product using the relative outputs.
  properties: carbon content, non-fossil 0.48632, dry mass 0.8 kg, heating value, net 13.99 MJ, water content 0.25, wet mass 1 kg
  note on heating value, net: Value taken from the general comment of the treatment dataset.
- wire drawing, steel: 0.000622829 kg; lognormal variance with pedigree 0.2106, pedigree (5,5,5,5,5)
  This service is included in the dataset to produce iron wire used as packaging for short scutching fibre. An average 5g / kg short scutching fibre is considered. Hence, for this dataset, considering 0,5 of short scutching fibre, 0.0025 is reported (Note that this is a conservative value, from companies who use iron wire. Some scutchers integrate the next processing step without the need for packaging).
  properties: price 0.057 EUR2005

## Sampling procedure
Data collection has been performed by the Alliance for European Flax-Linen & Hemp from referent sources incl. Arvalis and Inagro (agronomic institutes referent respectively for France and for Belgium-Netherlands) for average agricultural technical itinerary practiced in these 3 countries; and interbranch production statistics. These data represent the European production which is 100% certified to European Flax (TM) and amounts for 3/4 of the global production for fibre, flax, long, scutched on 2023.

## Extrapolations
The data on inputs to the field activities are collected directly from the Alliance for European Flax-Linen & Hemp. The ecoinvent LCI calculation tool for crop production was used to calculate field emissions from the cultivation process.
