# sodium borate mine operation and beneficiation

Dataset: EcoSpold 2, unit process
Geography: US
Time period: 2005-01-01 to 2023-12-31
Technology level: current
Classification: EcoSpold01Categories: chemicals/inorganics
Classification: ISIC rev.4 ecoinvent: 0891:Mining of chemical and fertilizer minerals
Scenario: Business-as-Usual
System model: Allocation, cut-off by classification
Generated by: Eleonora Crenna
Published in: Allard, G. 2013
Database: ecoinvent
isCopyrightProtected: true
accessRestrictedTo: 1

## General comment
This dataset represents the production of 1 kg of sodium borate from borax, a naturally occurring mineral containing boron in form of B2O3. After being extracted from open pit sites and crushed, the ores are
dissolved in water and screened to separate the resulting insolubles from the solution. Sodium borate is especially used in household products, such as detergents and disinfectant. This dataset considers the production of sodium borate occurring in open pit sites in the US, which together with Turkey are the world’s leading producers of boron minerals (USGS, 2017. Minerals Yearbook - Boron).
[This dataset is meant to replace the following datasets:
- sodium borates production, US, 2000 - 2000]

## Included activities start
The activity starts with the mining of borax (Na2B4O7*10H2O) from the ground.

## Included activities end
The activity ends with the production of sodium borate (anhydrous).

## Geography
Data used are assumed to represent conditions in the US. Proxy data from a study in Mexico were used for some flows. See specific comments to exchanges.

## Technology
Sodium borates are obtained from surface mining of borax (Na2B4O7 * 10H2O) deposits, also called tincal. Open pit mining requires drilling and blasting to reach load deposits. Ores are removed from the mine and transported to milling and beneficiating plants for concentrating the ore. After being crushed, the ores are
dissolved in water and screened to separate the resulting insolubles from the solution. The crystals of sodium borate are dried from the solution and can either be sold as anhydrous borax or treated further to produce other borate materials.
References:
US EPA. Archive document - Boron. Available at: https://archive.epa.gov/pesticides/reregistration/web/pdf/0024fact.pdf
US Borax, 2019. Boron operations brochure. Available at: https://www.borax.com/BoraxCorp/media/Borax-Main/Resources/Brochures/boron-operations.pdf

## Time period
date of published literature

## Reference product
- sodium borates: 1 kg; name RefProd; By-product classification allocatable product; CPC 16190: Other chemical minerals; HS2017 252800: Natural borates and concentrates thereof (whether or not calcined), but not including borates separated fro[...]
  production volume 1.3e9 kg; name RefProd_PV
    The production volumes is expressed in kg. PV is approximated with the production of borates in the US in 2016.
    Reference;
    Government of India, Ministry of Mines, Indian Bureau of Mines. 2017. Indian Minerals Yearbook (Part- III : Mineral Reviews) - 56th Edition - Boron minerals.
  property boron content 0.128242; name RefProd_B_content; = (2*10.81)/(2*10.81+3*16)*0.325/0.787
    boron content on a dry matter basis. Calculated value based on stoichiometry (B MW = 10.81 g/mol; O MW = 16 g/mol), the concentration of B2O3 in final sodium borates and the recovery rate of B2O3 as reported in Acarkan, N., Bulut, G., Kangal, O., & Önal, G. (2005). A new process for upgrading boron content and recovery of borax concentrate. Minerals Engineering, 18(7), 739-741.
  property price 0.0158256 EUR2005
    Calculated based on inputs: The price of the product has been calculated as a sum of the values of the material and energy inputs for this product. This value is therefore a rough estimation. It may underestimate the real price since there are additional expenses when producing any product. These expences can include for example labour costs, treatment of waste materials and profit for the producer. Please consider carefully whether this level of data quality is acceptable for your application.
  properties: carbon allocation 0 kg, carbon content 0, carbon content, fossil 0, carbon content, non-fossil 0, dry mass 1 kg, water content 0, water in wet mass 0 kg, wet mass 1 kg

## Inputs from technosphere
- blasting: 0.000271 kg; lognormal variance with pedigree 0.2687, pedigree (4,3,5,3,5)
  EcoSpold01Location=RER
  Amount taken from the dataset "sodium borates production" (GLO) as published in ecoinvent v3.8, based on Althaus et al. (2007).
  Reference:
  Althaus H.-J., Chudacoff M., Hischier R., Jungbluth N., Osses M. and Primas A. (2007) Life Cycle Inventories of Chemicals. ecoinvent report No. 8, v2.0. EMPA Dübendorf, Swiss Centre for Life Cycle Inventories, Dübendorf, CH, from www.ecoinvent.org <http://www.ecoinvent.org>.
  Uncertainty: approximation with data from iron mining & lime treatment
- conveyor belt: 2.78e-8 m; lognormal variance with pedigree 0.5787, pedigree (4,3,5,3,5)
  Amount taken from the dataset "sodium borates production" (GLO) as published in ecoinvent v3.8, based on Althaus et al. (2007).
  Reference:
  Althaus H.-J., Chudacoff M., Hischier R., Jungbluth N., Osses M. and Primas A. (2007) Life Cycle Inventories of Chemicals. ecoinvent report No. 8, v2.0. EMPA Dübendorf, Swiss Centre for Life Cycle Inventories, Dübendorf, CH, from www.ecoinvent.org <http://www.ecoinvent.org>.
  EcoSpold01Location=RER
  Uncertainty: approximation with data from iron mining & lime treatment
- diesel, burned in building machine: 0.226995 MJ; = 143000/50000000*(0.3453/0.787/0.2366)*42.8; lognormal variance with pedigree 0.0513, pedigree (4,4,5,3,2)
  EcoSpold01Location=GLO
  Approximation from the pre-feasibility study of colemanite deposits in Mexico (Chapter 21.0 Capital and operating coast, Table 22): 143 tonnes of fuel are required for 50K tonnes of colemanite. Conversion in MJ: 42.8 MJ/kg according to Ecoinvent data quality guidelines.
  Reference:
  Allard, G., Salazar Velazquez, R., Verley, C.G., Vidal, M.F., 2013. Preliminary Economic Assessment for the El Cajon Borate Deposit, Magdalena Basin Project, Sonora, Mexico (Pursuant to National Instrument 43-101 of the Canadian Securities Administrators).
  Weidema et al. 2013. Overview and methodology - Data quality guideline for the ecoinvent database version 3.
  Uncertainty: approximation with data from iron mining & lime treatment
- electricity, medium voltage: 0.185442 kWh; = 100/1000*(0.3453/0.787/0.2366); lognormal variance with pedigree 0.0513, pedigree (4,4,5,3,2)
  EcoSpold01Location=UCTE
  Approximation from the pre-feasibility study of colemanite deposits in Mexico (Chapter 21.0 Capital and operating coast, Table 22): 100 kWh electricity are required for 1 metric ton of colemanite.
  Reference:
  Allard, G., Salazar Velazquez, R., Verley, C.G., Vidal, M.F., 2013. Preliminary Economic Assessment for the El Cajon Borate Deposit, Magdalena Basin Project, Sonora, Mexico (Pursuant to National Instrument 43-101 of the Canadian Securities Administrators).
  Uncertainty: approximation with data from iron mining & lime treatment
- heat, district or industrial, natural gas: 3.36576 MJ; = 50/1000*36.3*(0.3453/0.787/0.2366); lognormal variance with pedigree 0.0513, pedigree (4,4,5,3,2)
  Approximation from the pre-feasibility study of colemanite deposits in Mexico (Chapter 21.0 Capital and operating coast, Table 22): 50m3 natural gas are required for 1 metric ton colemanite. 36.3 MJ/m3 --> Conversion in MJ in data quality guidelines.
  Reference:
  Allard, G., Salazar Velazquez, R., Verley, C.G., Vidal, M.F., 2013. Preliminary Economic Assessment for the El Cajon Borate Deposit, Magdalena Basin Project, Sonora, Mexico (Pursuant to National Instrument 43-101 of the Canadian Securities Administrators).
- mine infrastructure, open cast, non-ferrous metal: 7.79171e-11 unit; = 5E-11 * (boron_in_ground_amount + gangue_amount); lognormal variance with pedigree 0.050625, pedigree (4,4,5,2,1)
  Calculated value based "mine construction, open cast, non-ferrous metal" (GLO) dataset and the amount of mined ores.
- non-sulfidic tailing, off-site: -0.777631 kg; name tailing_amount; = (boron_in_ground_amount + gangue_amount - RefProd - PM_amount )/tailing_DM; lognormal variance with pedigree 0.0513, pedigree (4,4,5,3,2)
  Calculated value, to obtain mass balance.
  production volume; = RefProd_PV * tailing_amount / RefProd
    Calculated from production volume of reference product using the relative outputs.
  property dry mass 0.7 kg; name tailing_DM
  property water in wet mass 0.3 kg; name tailing_wwm
  properties: water content 0.428571, wet mass 1 kg
- recultivation, iron mine: 9.42e-5 m2; lognormal variance with pedigree 0.3987, pedigree (4,3,5,3,5)
  Amount taken from the dataset "sodium borates production" (GLO) as published in ecoinvent v3.8, based on Althaus et al. (2007).
  Reference:
  Althaus H.-J., Chudacoff M., Hischier R., Jungbluth N., Osses M. and Primas A. (2007) Life Cycle Inventories of Chemicals. ecoinvent report No. 8, v2.0. EMPA Dübendorf, Swiss Centre for Life Cycle Inventories, Dübendorf, CH, from www.ecoinvent.org <http://www.ecoinvent.org>.
- wastewater, average: -0.00162113 m3; name WW_amount; = water_well_in_ground_input - (tailing_amount * tailing_wwm)/1000; lognormal variance with pedigree 0.1786, pedigree (4,5,5,5,5)
  Calculated value, to obtain mass balance. This exchange is used as a proxy for wastewater coming from the mining. The actual composition of wastewater is unknown.
  production volume; = RefProd_PV * WW_amount / RefProd
    Calculated from production volume of reference product using the relative outputs.
  property dry mass 0.346837 kg; name WW_DM
  properties: carbon content, non-fossil 0.194039, water content 2882.2, wet mass 1000 kg
  note on carbon content, non-fossil: 0.0673 kg TOC/m3 (Tab A.17, ecoinvent v2.2 report 13_I). TOC was considered as Total Carbon.

## Inputs from nature
- Boron [natural resource, in ground]: 0.128242 kg; name boron_in_ground_amount; = (0.325/0.265)*0.265/(2*10.81+3*16)*10.81*2/0.787; lognormal variance with pedigree 0.0912, pedigree (4,4,5,4,4)
  Calculated value based on boron content in natural borax in ground. Approximation from borax deposits in Turckey. Acarkan et al. (2005) report that borax ore of 26-27% B2O3 is treated to produce a concentrate having 32-33% B2O3. Recovery rate is 78.7%. B MW = 10.81 g/mol; O MW = 16 g/mol
  Reference:
  Acarkan, N., Bulut, G., Kangal, O., & Önal, G. (2005). A new process for upgrading boron content and recovery of borax concentrate. Minerals Engineering, 18(7), 739-741.
- Gangue [natural resource, in ground]: 1.4301 kg; name gangue_amount; = (0.325/0.265)/0.787 - boron_in_ground_amount; lognormal variance with pedigree 0.0513, pedigree (4,4,5,3,2)
  Calculated value, based on B2O3 content in both borax ores (26-27%) and in sodium borate (32-33%). The recovery rate of B2O3 is 78.7%.
  Reference:
  Acarkan, N., Bulut, G., Kangal, O., & Önal, G. (2005). A new process for upgrading boron content and recovery of borax concentrate. Minerals Engineering, 18(7), 739-741.
- Occupation, mineral extraction site [natural resource, land]: 0.00706 m2*year; lognormal variance with pedigree 0.3087, pedigree (4,3,5,3,5)
  (same comment as for recultivation, iron mine)
- Transformation, from forest, unspecified [natural resource, land]: 9.42e-5 m2; lognormal variance with pedigree 0.3987, pedigree (4,3,5,3,5)
  (same comment as for recultivation, iron mine)
- Transformation, to mineral extraction site [natural resource, land]: 9.42e-5 m2; lognormal variance with pedigree 0.3987, pedigree (4,3,5,3,5)
  (same comment as for recultivation, iron mine)
- Water, well, in ground [natural resource, in water]: 0.00185442 m3; name water_well_in_ground_input; = 50000000/50000000/1000*(.3453/0.787/0.2366); lognormal variance with pedigree 0.0513, pedigree (4,4,5,3,2)
  Water pumped from well for exploration and drilling programs. Approximation from the pre-feasibility study of colemanite deposits in Mexico (Chapter 21.0 Capital and operating coast, Table 22): 50k tonnes of water are required for 50k tonnes of colemanite.
  Reference:
  Allard, G., Salazar Velazquez, R., Verley, C.G., Vidal, M.F., 2013. Preliminary Economic Assessment for the El Cajon Borate Deposit, Magdalena Basin Project, Sonora, Mexico (Pursuant to National Instrument 43-101 of the Canadian Securities Administrators).
  Uncertainty: approximation with data from iron mining & lime treatment
  property dry mass 0.1101 kg; name Water_well_DM

## Emissions to nature
- Particulate Matter, > 10 um [air, urban air close to ground]: 0.014 kg; name PM_amount; = 14/1000; lognormal variance with pedigree 0.138, pedigree (4,5,5,5,4)
  Literature. Particulates are generated from the dryers, and have an average diameter of 44um.
  References:
  Energy and Environmental Profile of the U.S. Mining Industry, 2013. Chapter 3: Potash, Soda Ash, and Borates. Table 3-6, Available at: https://www.energy.gov/sites/prod/files/2013/11/f4/potash_soda_borate.pdf
  U.S.E.P.A. 1980. Source category survey: Borax and Boric acid industry. 58 pp.
  Uncertainty: approximation with data from iron mining & lime treatment

## Sampling procedure
Due to lack of specific information on the extraction of boron from natural borax in the US, some values were approximated and others copied from the previous dataset "sodium borate production" (GLO) as published in ecoinvent v.3.8, based on Althaus et al. (2007). See Extrapolations and exchange comments for more details.

Reference:
Althaus H.-J., Chudacoff M., Hischier R., Jungbluth N., Osses M. and Primas A. (2007) Life Cycle Inventories of Chemicals. ecoinvent report No. 8, v2.0. EMPA Dübendorf, Swiss Centre for Life Cycle Inventories, Dübendorf, CH, from www.ecoinvent.org <http://www.ecoinvent.org>.

## Extrapolations
The amount of boron in ground is extrapolated from the information available for borax deposits in Turkey (Acarkan et al., 2005), and the inputs of energy, diesel and process water were approximated from the pre-feasibility study in Mexican colemanite deposits (Allard et al., 2013). The amount of airborne emissions was retrieved from the Energy and Environmental Profile of the U.S. Mining Industry (2013). The amount of gangue in ground, the tailings and wastewater were calculated to obtain mass balance, For further details, see comments to the related exchanges.

References:
Acarkan, N., Bulut, G., Kangal, O., & Önal, G. (2005). A new process for upgrading boron content and recovery of borax concentrate. Minerals Engineering, 18(7), 739-741
Allard, G., Salazar Velazquez, R., Verley, C.G., Vidal, M.F., 2013. Preliminary Economic Assessment for the El Cajon Borate Deposit, Magdalena Basin Project, Sonora, Mexico (Pursuant to National Instrument 43-101 of the Canadian Securities Administrators)
Energy and Environmental Profile of the U.S. Mining Industry, 2013. Chapter 3: Potash, Soda Ash, and Borates. Table 3-6, Available at: https://www.energy.gov/sites/prod/files/2013/11/f4/potash_soda_borate.pdf
