# tungsten carbide powder production

Dataset: EcoSpold 2, unit process
Geography: RoW
Time period: 1979-01-01 to 2023-12-31
Technology level: current
Classification: ISIC rev.4 ecoinvent: 2420:Manufacture of basic precious and other non-ferrous metals
Synonyms: WC-powder
Scenario: Business-as-Usual
System model: Allocation, cut-off by classification
Generated by: Nora Minas
Published in: Furberg A. 2019
Database: ecoinvent
isCopyrightProtected: false
accessRestrictedTo: 1

## General comment
This dataset represents the production of 1 Kg tungsten carbide powder (WC-powder) by pyrometal-lurgy. Production steps include calcination of ammonium paratungstate yielding tungsten blue oxide, the formation of tungsten metal powder through hydrogen reduction and the carburization of tung-sten metal powder to WC-powder. The carbon content in WC-powder is assuemd to be 6.1 %.
The data for this dataset is taken from a LCI provided by Furberg et al. (2019) which was build based on data from literature.
Furberg, A., Arvidsson, R., Molander, S., 2019. Environmental life cycle assessment of cemented carbide (WC-Co) production. J. Clean. Prod. 209, 1126–1138. https://doi.org/10.1016/j.jclepro.2018.10.272

## Included activities start
The activity starts when the raw material enters the process

## Included activities end
This activity ends with the production of 1 Kg WC-powder

## Geography
This dataset represent tungsten carbide powder production outside of China

## Technology
APT is calcined leading to the formation of tungsten blue oxide, H20 and NH3. For this inventory tungsten blue oxide is assumed to be pure WO3. NH3 gas is assumed to be recovered at a rate of 61 %. Tungsten blue oxide conversion to tungsten metal powder is conducted in a H2 reducing atmos-phere. Finally, tungsten metal powder is mixed with carbon black and carburized in a reducing H2 at-mosphere. CO2 formation result from the burning of excess CH4 and C2H2 formed during carburiza-tion. Total fugitive loss of H2 was calculated to be 6.7 % based on the inventory provided by Furberg et al. (2019) and excess H2 was assumed to be recovered completely.
Furberg, A., Arvidsson, R., Molander, S., 2019. Environmental life cycle assessment of cemented carbide (WC-Co) production. J. Clean. Prod. 209, 1126–1138. https://doi.org/10.1016/j.jclepro.2018.10.272

## Time period
Input for carbon black is based on a publication from 1979: Yih, S.W.H., Wang, C.T., 1979. Tungsten - Sources, Metallurgy, Properties and Applications.

## Reference product
- tungsten carbide powder: 1 kg; By-product classification allocatable product; CPC 41601: Tungsten, molybdenum, tantalum, magnesium, cobalt, cadmium, titanium, zirconium, beryllium, gallium, hafnium, […]; HS2017 284990: Carbides; whether or not chemically defined, other than of calcium or silicon; CAS 12070-12-1
  production volume 31271.5 kg; = 47900/0.939
    Global production Volume of tungsten carbide was 47.9 t in 2010 (in metric tonnes of W content). Assuming a carbon content of 6.1 % this yields the PV of 51012 Kg.
  property price 32.39 EUR2005
    Geometric mean of prices from manufacturers' listings on Alibaba (05/06/2020); long term market data were not available.
  properties: carbon allocation 0.061 kg, carbon content 0.061, carbon content, fossil 0.061, dry mass 1 kg, tungsten content 0.939, water content 0, water in wet mass 0 kg, wet mass 1 kg

## Inputs from technosphere
- ammonium paratungstate: 1.3072 kg; lognormal variance with pedigree 0.0095, pedigree (2,5,2,3,1)
  Amount calculated based on the tungsten balance. Assumption W content of APT 0.702, tungsten content of tungsten carbide powder 0.939.
  properties: dry mass 0.977 kg, tungsten content 0.718327, water content 0.0235415, wet mass 1 kg
  note on tungsten content: tungsten content on a dry matter basis. According to Ma et al. (2017) APT has a WO3 content of 0.885. The conversion factor from WO3 to W is 0.793
- carbon black: 0.065 kg; source Furberg A.  2019; lognormal variance with pedigree 0.0493, pedigree (2,5,5,3,1)
  Used for carburization
  properties: carbon content, fossil 1, dry mass 1 kg, heating value, net 25.76 MJ, wet mass 1 kg
- electricity, medium voltage: 0.0101517, 0.000902909, 0.0787239, 0.10316, 0.109247, 0.055645, 0.00768542, 0.048643, 0.00205334, 0.32875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 kWh (47 suppliers, which the file names only by identifier); sum of these 7.8 kWh; source Furberg A.  2019; lognormal variance with pedigree 0.0493, pedigree (2,5,5,3,1)
- hydrogen, gaseous, low pressure: 0.00535106, 0.00557289, 0.0380761 kg (3 suppliers, which the file names only by identifier); sum of these 0.049 kg; source Furberg A.  2019; lognormal variance with pedigree 0.0493, pedigree (2,5,5,3,1)
  Used for carburization and hydrogen reduction
  properties: dry mass 1 kg, heating value, net 120.21 MJ, wet mass 1 kg

## Emissions to nature
- Ammonia [air, non-urban air or from high stacks]: 0.094 kg; source Furberg A.  2019; lognormal variance with pedigree 0.0887, pedigree (2,5,5,3,1)
- Carbon dioxide, fossil [air, non-urban air or from high stacks]: 0.013 kg; source Furberg A.  2019; lognormal variance with pedigree 0.0493, pedigree (2,5,5,3,1)
- Hydrogen [air, non-urban air or from high stacks]: 0.0033 kg; source Furberg A.  2019; lognormal variance with pedigree 0.0493, pedigree (2,5,5,3,1)

## Sampling procedure
Literature
