# welding, arc, aluminium

Dataset: EcoSpold 2, unit process
Geography: RoW
Time period: 1997-01-01 to 2023-12-31
Technology level: current
Classification: EcoSpold01Categories: metals/processing
Classification: ISIC rev.4 ecoinvent: 2592:Treatment and coating of metals; machining
Synonyms: MAG
Tags: ConvertedDataset
Scenario: Business-as-Usual
System model: Allocation, cut-off by classification
Generated by: Hans-Jörg Althaus
Published in: Classen M. 2009
Database: ecoinvent
isCopyrightProtected: true
accessRestrictedTo: 1

## General comment
Based on rather rough estimates. Not to be used if welding is of importance in the system considered.
[This dataset was already contained in the ecoinvent database version 2. It was not individually updated during the transfer to ecoinvent version 3. Life Cycle Impact Assessment results may still have changed, as they are affected by changes in the supply chain, i.e. in other datasets. This dataset was generated following the ecoinvent quality guidelines for version 2. It may have been subject to central changes described in the ecoinvent version 3 change report (http://www.ecoinvent.org/database/ecoinvent-version-3/reports-of-changes/), and the results of the central updates were reviewed extensively. The changes added e.g. consistent water flows and other information throughout the database. The documentation of this dataset can be found in the ecoinvent reports of version 2, which are still available via the ecoinvent website. The change report linked above covers all central changes that were made during the conversion process.]

## Included activities start
The activity starts with the materials entering the process. The material on which this activity is applied it is not included as input.

## Included activities end
Includes the arc welding of aluminium and the transports of the filler rod and the protective gas to the place of use.

## Geography
Data-set is representive for Europe

## Technology
MIG Welding of aluminum with helium as protective gas.

## Reference product
- welding, arc, aluminium: 1 m; By-product classification allocatable product; CPC 88731: Metal treatment and coating services
  EcoSpold01Location=RER
  production volume 2.65986 m
    This is a placeholder value that does not reflect real-world production volumes. This dataset does not currently require a real-world production volume to work in the database framework, and no actual data were collected yet. This has no negative effect on the results of the ecoinvent database.
  property price 0.03558 EUR2005
    Calculated based on inputs: The price of the product has been calculated as a sum of the values of the material and energy inputs for this product. This value is therefore a rough estimation. It may underestimate the real price since there are additional expenses when producing any product. These expences can include for example labour costs, treatment of waste materials and profit for the producer. Please consider carefully whether this level of data quality is acceptable for your application.
  properties: carbon allocation 0 kg, carbon content 0

## Inputs from technosphere
- aluminium, wrought alloy: 0.0183 kg; lognormal variance with pedigree 0.178, pedigree (5,5,5,5,3)
  .
  properties: dry mass 1 kg, wet mass 1 kg
- argon, crude, liquid: 0.00357 kg; lognormal variance with pedigree 0.178, pedigree (5,5,5,5,3)
  EcoSpold01Location=RER
  properties: dry mass 1 kg, wet mass 1 kg
- electricity, medium voltage: 0.00251608, 0.0501902, 0.00125644, 0.00077051, 0.000154217, 3.31138e-5, 0.00518291, 0.0148966 kWh (8 suppliers, which the file names only by identifier); sum of these 0.075 kWh; lognormal variance with pedigree 0.178, pedigree (5,5,5,5,3)
  EcoSpold01Location=UCTE
- electronics, for control units: 1e-5 kg; lognormal variance with pedigree 0.488, pedigree (5,5,5,5,3)
  EcoSpold01Location=RER
  properties: carbon content, fossil 0.337146, carbon content, non-fossil 0.00013442, dry mass 1 kg, wet mass 1 kg
  note on carbon content, fossil: The control unit has a composition of 46% steel (housing), 32% plastics, 14% printed wiring boards and 8% cables (various types).;

## Emissions to nature
- Aluminium III [air, unspecified]: 8.45e-5 kg; lognormal variance with pedigree 0.228, pedigree (5,5,5,5,3)
- Carbon monoxide, fossil [air, unspecified]: 6.67e-5 kg; lognormal variance with pedigree 0.228, pedigree (5,5,5,5,3)
- Helium [air, unspecified]: 3.57e-6 kg; lognormal variance with pedigree 0.228, pedigree (5,5,5,5,3)
- Nitrogen oxides [air, unspecified]: 2e-6 kg; lognormal variance with pedigree 0.228, pedigree (5,5,5,5,3)
- Ozone [air, unspecified]: 9.06e-6 kg; lognormal variance with pedigree 0.228, pedigree (5,5,5,5,3)
- Particulate Matter, < 2.5 um [air, unspecified]: 0.000141 kg; lognormal variance with pedigree 0.488, pedigree (5,5,5,5,3)
- Silicon [air, unspecified]: 1.41e-5 kg; lognormal variance with pedigree 0.228, pedigree (5,5,5,5,3)
- Zinc II [air, unspecified]: 4.23e-5 kg; lognormal variance with pedigree 0.228, pedigree (5,5,5,5,3)

## Sampling procedure
Literature

## Extrapolations
none This dataset has been copied from an original dataset covering the geography RER. The uncertainty has been adjusted accordingly.

## Review by Roland Hischier 2003-06-17
Passed.
