# photovoltaic laminate production, CdTe

Dataset: EcoSpold 2, unit process
Geography: RoW
Time period: 2020-01-01 to 2023-12-31
Technology level: current
Classification: ISIC rev.4 ecoinvent: 2610:Manufacture of electronic components and boards
Synonyms: PV-module; Solarmodul
Scenario: Business-as-Usual
System model: Allocation, cut-off by classification
Generated by: Parikhit Sinha
Published in: Parikhit Sinha 2021
Database: ecoinvent
isCopyrightProtected: false
accessRestrictedTo: 1

## General comment
Integrated production of photovoltaic thin film modules in a single continuous assembly line process that consists of three steps: semiconductor deposition, cell definition, and module finishing. The bill of material inputs and auxiliary material as well as energy and water needed for the production of the modules are considered. Tap water is purchased and purified to ultrapure water within First Solar's manufacturing facilities, with the electricity usage for purification included in the life cycle inventory. Material losses during module manufacturing have been taken into account. The amounts of waste, wastewater, direct airborne stack emissions, and emissions to water after on-site wastewater treatment are also taken into account. The modules produced at First Solar have a size of 2.47m2. The weight is 34.5kg. The efficiency is 17.6%. The rated nominal power is about 435Wp per module.
Emissions and energy requirements of internal recycling are considered. The main output of "glass cullet, sorted" of the recycling process is added as By-Product as this is not reused internally.
This dataset represents a weighted average by production volume of local First Solar producers. In 2020, First Solar accounted for >95% of global CdTe PV production.

## Included activities start
The activity starts with the reception of the raw materials at the factory gate and describes module production through a continuous assembly line process that consists of three steps: semiconductor deposition, cell definition, and module finishing.

## Included activities end
The process ends with the production of the panel and includes the consumption of electricity and heat use, materials, infrastructure, disposal of wastes, and emissions to air and water.

## Geography
Global average weighted by production volume of local First Solar producers.

## Technology
Production technology of thin film cells. Sublimation of the powders and condensation of the vapours on a glass substrate by vapour transport deposition (VTD).
In the first step, float glass is fed into the continuous assembly line followed by vapor transport deposition of semiconductor and recrystallization treatment. In the second step, laser scribing is applied to separate the semiconductor film into solar cells and back contact metals are deposited. In the third step, busbar, back glass, encapsulant, junction box, aluminum frame, and product label are applied to create a finished product.

## Time period
Data refers to 2020.

## Reference product
- photovoltaic laminate, CdTe: 1 m2; name RP; By-product classification allocatable product; CPC 47150: Diodes, transistors and similar semi-conductor devices; photosensitive semi-conductor devices; light emitting […]; HS2017 854140: Electrical apparatus; photosensitive, including photovoltaic cells, whether or not assembled in modules or [...]
  production volume 851724 m2; name RP_PV; = 2.47 * 6.1E9/435
    435W/2.47 m2. Total global production of CdTe panels is 6.1GW in 2020.
    Fraunhofer Institute for Solar Energy Systems, Photovoltaics Report, Freiburg, Germany, 27 July 2021, p.23.
  property carbon content, fossil 0.022973; name RP_C_content_fossil
    fossil carbon content on a dry matter basis. Calculated based on inputs.
  property carbon content, non-fossil 0; name RP_C_content_non_fossil
    biogene carbon content on a dry matter basis
  property dry mass 14 kg; name RP_DM
  property price 242 EUR2005
    The production volume of this product is small compared to other products supplied by the activities within the same ISIC 3 category. Therefore, an average price of products supplied by the activities in the same ISIC 3 code has been applied.This price is obtained as '_69 Radio, television and communication equipment, EU27' in the 'EU & DK Input Output Database' (available in SimaPro, 19.28 EUR2003 per kg DS). The price is assumed to be valid for both RER2005, world 2005. Weight of product according to Ecoinvent: approx 12.6 kg per m2.
  property water content 0; name RP_water_content
  property water in wet mass 0 kg; name RP_WWM
  property wet mass 14 kg; name RP_WM
  properties: carbon allocation 0.321622 kg, carbon content 0.022973

## Inputs from technosphere
- aluminium alloy, AlMg3: 1.60635 kg; lognormal variance with pedigree 0.00339024, pedigree (1,1,2,5,1)
  2020 data for First Solar in Vietnam, US, Malysia
  Weighted average of regional datasets.
  properties: dry mass 1 kg, wet mass 1 kg
- aluminium, wrought alloy: 0.015 kg; lognormal variance with pedigree 0.0041, pedigree (1,2,3,5,1)
  Same amount as in Dataset from Jungbluth et al. Original source: Fthenakis, 2004.
  - Jungbluth N., Stucki M, and Frischknecht R. (2009) Photovoltaics. In Dones, R. (Ed.) et al., Sachbilanzen von Energiesystemen: Grundlagen für den ökologischen Vergleich von Energiesystemen und den Einbezug von Energiesystemen in Ökobilanzen für die Schweiz. ecoinvent report No. 6-XII, Swiss Centre for Life Cycle Inventories, Dübendorf, CH, 2009.
  - Fthenakis V. (2004) Life cycle impact analysis of cadmium in CdTe PV production. In: Renewable & sustainable energy reviews, 2004(8), pp. 303-334.
  Weighted average of regional datasets.
  Uncertainty: Fthenakis, literature
  properties: dry mass 1 kg, wet mass 1 kg
- cadmium telluride, semiconductor-grade: 0.0244429 kg; lognormal variance with pedigree 0.00339024, pedigree (1,1,2,5,1)
  2020 data for First Solar in Vietnam for cadmium telluride and other semiconductor and back contact materials.
  Weighted average of regional datasets.
  properties: dry mass 1 kg, wet mass 1 kg
- carbon dioxide, liquid: 0.00146532, 0.00696105 kg (2 suppliers, which the file names only by identifier); sum of these 0.00842637 kg; lognormal variance with pedigree 0.0226, pedigree (3,4,4,5,3)
  Proxy for dry ice for equipment cleaning.
  Weighted average of regional datasets.
  properties: carbon content, fossil 0.272727, dry mass 1 kg, heating value, net 8.27 MJ, wet mass 1 kg
- chemical, inorganic: 0.0057775 kg; lognormal variance with pedigree 0.00339024, pedigree (1,1,2,5,1)
  2020 data for First Solar in Vietnam, US, Malysia
  Weighted average of regional datasets.
  properties: carbon content, fossil 0.003, dry mass 1 kg, wet mass 1 kg
  note on carbon content, fossil: This dataset is an unweighted average of 20 inorganic substances (listed in Tab 88.1, ecoinvent v2.2 report 8, part II), being part of the top100 chemicals included in this database. The C-content has also been calculated as an unweighted average of the C content of the substances composing this dataset.
- chromium: 0.00315 kg; lognormal variance with pedigree 0.0041, pedigree (1,2,3,5,1)
  (same comment as for aluminium, wrought alloy)
  properties: dry mass 1 kg, wet mass 1 kg
- copper, cathode: 0.00324186 kg; lognormal variance with pedigree 0.00339024, pedigree (1,1,2,5,1)
  2020 data for First Solar in Vietnam, US, Malysia
  Weighted average of regional datasets.
  property copper content 1; name copper_content_cathode
  properties: dry mass 1 kg, wet mass 1 kg
- electricity, medium voltage: 0.0219295, 0.00195045, 0.170058, 0.235993, 0.120203, 0.0166019, 0.105078, 0.00443559, 0.71016, 0.017851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 kWh (46 suppliers, which the file names only by identifier); sum of these 20.8282 kWh; lognormal variance with pedigree 0.00339024, pedigree (1,1,2,5,1)
  2020 data for First Solar in Vietnam, US, Malysia
  Weighted average of regional datasets.
- ethylvinylacetate, foil: 0.380307 kg; lognormal variance with pedigree 0.00339024, pedigree (1,1,2,5,1)
  2020 data for First Solar in Vietnam, US, Malysia
  Weighted average of regional datasets.
  properties: carbon content, fossil 0.79734, dry mass 1 kg, heating value, net 35.99 MJ, wet mass 1 kg
- flat glass, uncoated: 0.925364, 4.49366 kg (2 suppliers, which the file names only by identifier); sum of these 5.41903 kg; lognormal variance with pedigree 0.00339024, pedigree (1,1,2,5,1)
  2020 data for First Solar in Vietnam, US, Malysia
  Weighted average of regional datasets.
  properties: dry mass 1 kg, wet mass 1 kg
- glass cullet, sorted: -0.462622 kg; name BP_glass_cullet; lognormal variance with pedigree 0.0072, pedigree (2,4,3,5,1)
  Output of internal recycling not reused in the production.
  Weighted average of regional datasets.
  production volume; = abs(RP_PV * (BP_glass_cullet/RP))
    Calculated from production volume of reference product using the relative outputs.
  properties: dry mass 1 kg, price 0.08 EUR2005, wet mass 1 kg
- glass fibre reinforced plastic, polyamide, injection moulded: 0.10776 kg; lognormal variance with pedigree 0.0178303, pedigree (1,4,4,5,1)
  Fthenakis, literature, sum up of several materials
  Weighted average of regional datasets.
  properties: carbon content, fossil 0.446018, dry mass 1 kg, wet mass 1 kg
- hazardous waste, for incineration: -0.0961484, -0.0462374, -0.00120862 kg (3 suppliers, which the file names only by identifier); sum of these -0.143594 kg; lognormal variance with pedigree 0.00783029, pedigree (1,1,1,5,1)
  2020 data for First Solar in Vietnam, US, Malysia
  Weighted average of regional datasets.
  production volume; = abs(RP_PV * (BP_hazardous_waste/RP))
    Calculated from the production volume of photovoltaic laminate, CdTe in proportion to the respective output amounts.
  properties: carbon content, fossil 0.554667, dry mass 0.75 kg, heating value, net 17 MJ, water content 0.333333, wet mass 1 kg
  note on carbon content, fossil: Tab A.6, ecoinvent v2.2 report 13_I. C content has been calculated after data in the tables, and then referred to 1 kg DM
- heat, district or industrial, natural gas: 1.87852 MJ; lognormal variance with pedigree 0.0126, pedigree (1,4,4,5,1)
  natural gas, burned in boiler modulating >100kW
  Weighted average of regional datasets.
  properties: heating value, net 1 MJ
- hydrogen peroxide, without water, in 50% solution state: 0.000900798, 0.0042762 kg (2 suppliers, which the file names only by identifier); sum of these 0.005177 kg; = 0.31*0.0167; lognormal variance with pedigree 0.0178303, pedigree (1,4,4,5,1)
  IEA PVPS 2020. Original amount of 0.0167 kg (substance + water) in 31% solution state.
  Weighted average of regional datasets.
  properties: dry mass 1 kg, heating value, net 7.13 MJ, wet mass 1 kg
- isopropanol: 0.00036192, 0.00171808 kg (2 suppliers, which the file names only by identifier); sum of these 0.00208 kg; lognormal variance with pedigree 0.0178303, pedigree (1,4,4,5,1)
  IEA PVPS 2020
  Weighted average of regional datasets.
  properties: carbon content, fossil 0.6, dry mass 1 kg, heating value, net 34.3 MJ, wet mass 1 kg
- municipal solid waste: -0.00415949, -0.000213596, -2.53635e-5, -0.000161153, -0.000157856, -0.120511, -1.77484e-5, -5.69692e-6, -1.28766e-5, -0.000536057 kg (10 suppliers, which the file names only by identifier); sum of these -0.1258 kg; lognormal variance with pedigree 0.00783029, pedigree (1,1,1,5,1)
  2020 data for First Solar in Vietnam, US, Malysia
  Weighted average of regional datasets.
  production volume; = abs(RP_PV * (BP_municipal_waste/RP))
    (same comment as for hazardous waste, for incineration)
  properties: carbon content, fossil 0.171549, dry mass 0.771 kg, heating value, net 11.74 MJ, water content 0.297017, wet mass 1 kg
  note on carbon content, fossil: MSW composition in tab 4.1, ecoinvent v2.2 report 13_I. C content referred to 1 kg DM
- nitric acid, without water, in 50% solution state: 0.000717983, 0.00265296, 0.00115259, 0.00437197, 0.00127116, 0.00934042, 0.00106681, 0.0034501 kg (8 suppliers, which the file names only by identifier); sum of these 0.024024 kg; = 0.42*0.0572; lognormal variance with pedigree 0.0178303, pedigree (1,4,4,5,1)
  IEA PVPS 2020. Original amount of 0.0572 kg (substance + water) in 42% solution state.
  Weighted average of regional datasets.
  properties: dry mass 1 kg, wet mass 1 kg
- nitrogen, liquid: 0.0574346, 0.0157654 kg (2 suppliers, which the file names only by identifier); sum of these 0.0732 kg; lognormal variance with pedigree 0.0178303, pedigree (1,4,4,5,1)
  IEA PVPS 2020
  Weighted average of regional datasets.
  properties: dry mass 1 kg, wet mass 1 kg
- photovoltaic panel factory: 4e-6 unit; lognormal variance with pedigree 0.306368, pedigree (2,1,2,5,1)
  IEA PVPS 2020
  Weighted average of regional datasets.
- section bar extrusion, aluminium: 1.60635 kg; lognormal variance with pedigree 0.00339024, pedigree (1,1,2,5,1)
  2020 data for First Solar in Vietnam, US, Malysia
  Weighted average of regional datasets.
- silicone product: 0.0388105, 0.0789885 kg (2 suppliers, which the file names only by identifier); sum of these 0.117799 kg; lognormal variance with pedigree 0.00380474, pedigree (1,1,2,5,1)
  2020 data for First Solar in Vietnam, US, Malysia
  Weighted average of regional datasets.
  properties: carbon content, fossil 0.324324, dry mass 1 kg, heating value, net 9.83 MJ, wet mass 1 kg
- sodium chloride, powder: 0.0453 kg; lognormal variance with pedigree 0.0178303, pedigree (1,4,4,5,1)
  IEA PVPS 2020
  Weighted average of regional datasets.
  properties: dry mass 1 kg, wet mass 1 kg
- sodium hydroxide, without water, in 50% solution state: 0.0021929, 0.0224571 kg (2 suppliers, which the file names only by identifier); sum of these 0.02465 kg; = 0.5 * 4.93E-2; lognormal variance with pedigree 0.0178303, pedigree (1,4,4,5,1)
  IEA PVPS 2020. Original amount of 4.93E-2 kg (substance + water) in 50% solution state
  Weighted average of regional datasets.
  properties: dry mass 1 kg, heating value, net 3.03 MJ, wet mass 1 kg
- solar glass, low-iron: 6.7977 kg; lognormal variance with pedigree 0.00339024, pedigree (1,1,2,5,1)
  2020 data for First Solar in Vietnam, US, Malysia
  Weighted average of regional datasets.
  properties: dry mass 1 kg, wet mass 1 kg
- steel, chromium steel 18/8: 0.0112097 kg; lognormal variance with pedigree 0.00339024, pedigree (1,1,2,5,1)
  2020 data for First Solar in Vietnam, US, Malysia
  Weighted average of regional datasets.
  properties: carbon content, fossil 0.0008, dry mass 1 kg, wet mass 1 kg
  note on carbon content, fossil: Stainless steel model is the grade 304 steel (18/8 stainless, 18% chromium 8% nickel; max. 0.08% C)
- sulfuric acid: 0.0347543, 0.00454574 kg (2 suppliers, which the file names only by identifier); sum of these 0.0393 kg; lognormal variance with pedigree 0.0178303, pedigree (1,4,4,5,1)
  IEA PVPS 2020
  Weighted average of regional datasets.
  properties: dry mass 1 kg, wet mass 1 kg
- synthetic rubber: 0.0288476 kg; lognormal variance with pedigree 0.00803029, pedigree (1,1,2,5,1)
  2020 data for First Solar in Vietnam, US, Malaysia. Represents a synthetic rubber edge seal.
  Weighted average of regional datasets.
  properties: carbon content, fossil 0.871949, dry mass 1 kg, heating value, net 26.42 MJ, wet mass 1 kg
  note on carbon content, fossil: EPDM (Ethylene-propene-diene terpolymer) rubber is a terpolymer of ethylene, propene, and a diene with the residual unsaturated portion of the diene in the side chain (ecoinvent v2.2 report 7-part XX & Ullmann). Chemical formula (deduced from Evidences of Solvent-Induced Miscibility in Polychloroprene-co-Ethylene-Propene Diene Terpolymer Blends, Dubey et al., Journal of Applied Polymer Science, 2009, 111:1884–1891): C20H35
- tap water: 81.4754 kg; name tap_water; = 81.40603847 + 0.0167 * (1-0.31) + 0.0493 * (1-0.5) + 0.0572 * (1-0.42); lognormal variance with pedigree 0.00339024, pedigree (1,1,2,5,1)
  2020 data for First Solar in Vietnam, US, Malaysia; includes water for hydrogen peroxide solution (0.0167 kg), water for nitric acid solution (0.0572 kg), and water for sodium hydroxide solution (0.0493 kg)
  Weighted average of regional datasets.
  property water in wet mass 0.999663 kg; name wwm_tapwater
  properties: carbon content, fossil 0.00178991, dry mass 0.000337476 kg, water content 2962.17, wet mass 1 kg
  note on carbon content, fossil: Bicarbonate content is 2.93 mol/m3. CO2 content is 0.1 mol/m3 (ecoinvent v2.2 report 8, Tab 93.1).
- wastewater from PV cell production: -0.0388479, -0.000187863 m3 (2 suppliers, which the file names only by identifier); sum of these -0.0390357 m3; lognormal variance with pedigree 0.0072, pedigree (2,4,3,5,1)
  2020 data for First Solar in Vietnam, US, Malysia
  Weighted average of regional datasets.
  production volume; = abs(RP_PV * (BP_wastewater/RP))
    Calculated from production volume of reference product using the relative outputs.
  properties: carbon content, fossil 0.121726, dry mass 2.2181 kg, water content 449.836, wet mass 1000 kg

## Emissions to nature
- 1,1,1,2-Tetrafluoroethane [air, urban air close to ground]: 7.52207e-6 kg; lognormal variance with pedigree 0.650368, pedigree (1,1,2,5,1)
  2020 data for First Solar in Vietnam, US, Malysia
  Weighted average of regional datasets.
- Cadmium II [air, urban air close to ground]: 6.09789e-7 kg; lognormal variance with pedigree 0.650368, pedigree (1,1,2,5,1)
  2020 data for First Solar in Vietnam, US, Malysia
  Weighted average of regional datasets.
- Carbon dioxide, fossil [air, urban air close to ground]: 0.00842637 kg; lognormal variance with pedigree 0.650368, pedigree (1,1,2,5,1)
  2020 data for First Solar in Vietnam, US, Malaysia; emissions from equipment cleaning
  Weighted average of regional datasets.
- Carbon monoxide, fossil [air, urban air close to ground]: 0.000320882 kg; lognormal variance with pedigree 0.650368, pedigree (1,1,2,5,1)
  2020 data for First Solar in Vietnam, US, Malaysia; emissions from equipment cleaning and also natural gas combustion in US.
  Weighted average of regional datasets.
- Nitric acid [air, urban air close to ground]: 0.000120634 kg; lognormal variance with pedigree 0.650368, pedigree (1,1,2,5,1)
  2020 data for First Solar in Vietnam, US, Malysia
  Weighted average of regional datasets.
- Nitrogen oxides [air, urban air close to ground]: 0.00133171 kg; lognormal variance with pedigree 0.650368, pedigree (1,1,2,5,1)
  2020 data for First Solar in Vietnam, US, Malaysia; ; emissions from equipment cleaning and also natural gas combustion in US.
  Weighted average of regional datasets.
- Trifluoromethane [air, urban air close to ground]: 1.20864e-6 kg; lognormal variance with pedigree 0.650368, pedigree (1,1,2,5,1)
  2020 data for First Solar in Vietnam, US, Malysia
  Weighted average of regional datasets.
- Water [air, urban air close to ground]: 0.0424341 m3; = (tap_water * wwm_tapwater - (BP_wastewater * BP_wastewater_WWM + BP_municipal_waste * wwm_MSW + BP_hazardous_waste * wwm_haz_waste)) / WWM_water; lognormal variance with pedigree 0.0028, pedigree (1,1,2,5,1)
  Evaporation of water used in cooling towers.
  Weighted average of regional datasets.
  property water in wet mass 1000 kg; name WWM_water
- BOD5, Biological Oxygen Demand [water, unspecified]: 0.000292228 kg; lognormal variance with pedigree 0.304532, pedigree (1,1,2,5,1)
  2020 data for First Solar in Vietnam, US, Malysia
  Weighted average of regional datasets.
- COD, Chemical Oxygen Demand [water, unspecified]: 0.00108574 kg; lognormal variance with pedigree 0.304532, pedigree (1,1,2,5,1)
  2020 data for First Solar in Vietnam, US, Malysia
  Weighted average of regional datasets.
- Cadmium II [water, unspecified]: 1.97036e-7 kg; lognormal variance with pedigree 0.304532, pedigree (1,1,2,5,1)
  2020 data for First Solar in Vietnam, US, Malysia
  Weighted average of regional datasets.
- Copper ion [water, unspecified]: 8.28513e-7 kg; lognormal variance with pedigree 0.304532, pedigree (1,1,2,5,1)
  2020 data for First Solar in Vietnam, US, Malysia
  Weighted average of regional datasets.
- DOC, Dissolved Organic Carbon [water, unspecified]: 0.000402125 kg; lognormal variance with pedigree 0.304532, pedigree (1,1,2,5,1)
  2020 data for First Solar in Vietnam, US, Malysia
  Weighted average of regional datasets.
- Suspended solids, unspecified [water, unspecified]: 0.000361454 kg; lognormal variance with pedigree 0.304532, pedigree (1,1,2,5,1)
  2020 data for First Solar in Vietnam, US, Malysia
  Weighted average of regional datasets.
- TOC, Total Organic Carbon [water, unspecified]: 0.000402125 kg; lognormal variance with pedigree 0.304532, pedigree (1,1,2,5,1)
  2020 data for First Solar in Vietnam, US, Malysia
  Weighted average of regional datasets.

## Sampling procedure
Producer information and literature data based on producer information.

## Extrapolations
Global average weighted by production volume based on First Solar production data only.

## Review by Christian Bauer 2021-11-24
passed
