# treatment of residues, MSWI-WWT, rainwater mineral oil storage, residual material landfill

Dataset: EcoSpold 2, unit process
Geography: RoW
Time period: 1994-01-01 to 2023-12-31
Technology level: current
Classification: ISIC rev.4 ecoinvent: 3822:Treatment and disposal of hazardous waste
Scenario: Business-as-Usual
System model: Allocation, cut-off by classification
Generated by: Nikolia Stoikou
Database: ecoinvent
isCopyrightProtected: true
accessRestrictedTo: 1

## General comment
The process represents the treatment of a waste (residues) that is exclusively produced from another waste treatment. Residues are generated in the municipal solid waste incineration (MSWI) of sewage sludge (with 70% water) that in turn is generated from wastewater treatment (WWT) of 'rainwater mineral oil storage'. Recommended use of this dataset: to be used within the specific chain of treatments for 'rainwater mineral oil storage'. Share of biogenic carbon in the sludge: 0%.

## Included activities start
The activity starts with the waste being available at the gate of the treatment facility. Collection and transportation of the waste to the treatment plant is not included.

## Included activities end
The activity ends with the waste being treated and waste-specific emissions from the landfill are released to water (short-term emissions to surface water and long-term emissions to ground water).

## Geography
Modelling parameters affecting the treatment technology are not specific to this geography.

## Technology
Residual material landfill for polluted, inorganic waste with base seal and leachate collection system. Recultivation after closure.

## Reference product
- residues, MSWI-WWT, rainwater mineral oil storage: -1 kg; By-product classification Waste; CPC 39320: Ash and residue (except from the manufacture of iron or steel), containing metals or metallic compounds, excep[…]; HS2017 262110: Slag and ash; ash and residues from the incineration of municipal waste
  production volume 3.85491e-5 kg
    Calculated in proportion to incinerated waste reference product. The production volume is accounting as well regional specific losses (wastewater not sewered) for this geography
  properties: aluminium content 0.00559751, barium content 0.00242807, boron content 2.96362e-5, cadmium content 8.63592e-5, calcium content 0.369219, carbon allocation 0.00355824 kg, carbon content 0.00355824, carbon content, fossil 0.00355824, carbon content, non-fossil 0, chromium content 0.000697192, copper content 0.000301724, dry mass 1 kg, iron content 0.00968404, lead content 0.000246257, magnesium content 0.00412071, manganese content 0.00847505, nickel content 3.03303e-5, nitrogen content 9.62457e-6, oxygen content 0.309851, phosphorus content 0.0132634, potassium content 0.0233677, price 0 EUR2005, sodium content 0.182569, strontium content 6.55293e-6, sulfur content 0.0317928, water content 0, water in wet mass 0 kg, wet mass 1 kg, zinc content 0.034666

## Inputs from technosphere
- cement, unspecified: 0.000494757, 0.00906934, 0.000234332, 0.00552688, 0.0344431, 0.00108113, 0.000790256, 0.000428297, 0.000851241, 0.0013014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 kg (11 suppliers, which the file names only by identifier); sum of these 0.4 kg; lognormal variance with pedigree 0.049084, pedigree (1,1,5,1,1)
  cement required for solidification of landfilled residual material
  Uncertainty: Uncertainty calculated from uncertainty of composition of incinerated waste, and incinerator model uncertainty and residual material landfill transfer coefficient uncertainty.
  properties: dry mass 1 kg, wet mass 1 kg
- process-specific burdens, residual material landfill: 0.988302, 0.0116981 kg (2 suppliers, which the file names only by identifier); sum of these 1 kg
  mass-specific expenditures required for landfilling of residual material
- residual material landfill: 2.0833e-9 unit
  residual material landfill infrastructure required for landfilling of residual material
- waste cement, hydrated: -4.82186e-5, -0.999952 kg (2 suppliers, which the file names only by identifier); sum of these -1 kg; lognormal variance with pedigree 0.5224, pedigree (5,5,5,5,5)
  hydrated cement output for solidification of landfilled residual material
  Uncertainty: Uncertainty calculated from uncertainty of composition of incinerated waste, and incinerator model uncertainty and residual material landfill transfer coefficient uncertainty.
  production volume
    Calculated from the production volume of the reference product in proportion to the respective output amounts.
  properties: dry mass 1 kg, wet mass 1 kg

## Inputs from nature
- Organic carbon, placed in landfill [inventory indicator, waste]: 0.0035582 kg; lognormal variance with pedigree 0.106147, pedigree (1,1,5,1,1)
  Mass of organic carbon in waste (without inorganic carbon), initially put in residual material landfill. The exchange represents a flow that is within the technosphere. This exchange should only be used to apply ecofactors for the Swiss LCIA method of Ecological Scarcity and not any other purpose.
  Uncertainty: Uncertainty calculated from uncertainty of composition of incinerated waste, and incinerator model uncertainty and residual material landfill transfer coefficient uncertainty.
- Waste mass, total, placed in landfill [inventory indicator, waste]: 1 kg
  Mass of waste initially put in a residual material landfill. The exchange represents a flow that is within the technosphere. This exchange should only be used to apply ecofactors for the Swiss LCIA method of Ecological Scarcity and not any other purpose.

## Emissions to nature
- Hazardous waste disposed [inventory indicator, waste]: 1 kg
  Inventory indicator for waste mass disposed. To be used in EN15804 "other data" results.
- Aluminium III [water, ground-, long-term]: 0.0016616 kg; lognormal variance with pedigree 0.49174, pedigree (1,1,5,1,1)
  complement of long-term emissions from residual material in residual material landfill
  Uncertainty: Uncertainty calculated from uncertainty of composition of incinerated waste, and incinerator model uncertainty and residual material landfill transfer coefficient uncertainty.
- Aluminium III [water, surface water]: 2.774e-6 kg; lognormal variance with pedigree 0.86743, pedigree (1,1,5,1,1)
  short-term emissions from residual material in residual material landfill
  Uncertainty: Uncertainty calculated from uncertainty of composition of incinerated waste, and incinerator model uncertainty and residual material landfill transfer coefficient uncertainty.
- BOD5, Biological Oxygen Demand [water, ground-, long-term]: 0.0019008 kg; lognormal variance with pedigree 0.15375, pedigree (1,1,5,1,1)
  (same comment as for Aluminium III)
- BOD5, Biological Oxygen Demand [water, surface water]: 3.1734e-6 kg; lognormal variance with pedigree 0.74916, pedigree (1,1,5,1,1)
  (same comment as for Aluminium III)
- Barium II [water, ground-, long-term]: 2.0057e-5 kg; lognormal variance with pedigree 5.9209, pedigree (1,1,5,1,1)
  (same comment as for Aluminium III)
- Barium II [water, surface water]: 3.3483e-8 kg; lognormal variance with pedigree 1.3874, pedigree (1,1,5,1,1)
  (same comment as for Aluminium III)
- Boron [water, ground-, long-term]: 2.914e-5 kg; lognormal variance with pedigree 0.19698, pedigree (1,1,5,1,1)
  (same comment as for Aluminium III)
- Boron [water, surface water]: 2.322e-7 kg; lognormal variance with pedigree 0.59063, pedigree (1,1,5,1,1)
  (same comment as for Aluminium III)
- COD, Chemical Oxygen Demand [water, ground-, long-term]: 0.0058112 kg; lognormal variance with pedigree 0.15375, pedigree (1,1,5,1,1)
  (same comment as for Aluminium III)
- COD, Chemical Oxygen Demand [water, surface water]: 9.7016e-6 kg; lognormal variance with pedigree 0.74916, pedigree (1,1,5,1,1)
  (same comment as for Aluminium III)
- Cadmium II [water, ground-, long-term]: 5.8628e-7 kg; lognormal variance with pedigree 6.7638, pedigree (1,1,5,1,1)
  (same comment as for Aluminium III)
- Cadmium II [water, surface water]: 9.7877e-10 kg; lognormal variance with pedigree 1.776, pedigree (1,1,5,1,1)
  (same comment as for Aluminium III)
- Calcium II [water, ground-, long-term]: 0.033362 kg; lognormal variance with pedigree 1.5243, pedigree (1,1,5,1,1)
  (same comment as for Aluminium III)
- Calcium II [water, surface water]: 5.5696e-5 kg; lognormal variance with pedigree 0.98066, pedigree (1,1,5,1,1)
  (same comment as for Aluminium III)
- Chromium VI [water, ground-, long-term]: 0.00013239 kg; lognormal variance with pedigree 0.30076, pedigree (1,1,5,1,1)
  (same comment as for Aluminium III)
- Chromium VI [water, surface water]: 4.191e-5 kg; lognormal variance with pedigree 0.46182, pedigree (1,1,5,1,1)
  (same comment as for Aluminium III)
- Copper ion [water, ground-, long-term]: 1.1615e-5 kg; lognormal variance with pedigree 2.9417, pedigree (1,1,5,1,1)
  (same comment as for Aluminium III)
- Copper ion [water, surface water]: 1.939e-8 kg; lognormal variance with pedigree 1.3034, pedigree (1,1,5,1,1)
  (same comment as for Aluminium III)
- DOC, Dissolved Organic Carbon [water, ground-, long-term]: 0.0022995 kg; lognormal variance with pedigree 0.15375, pedigree (1,1,5,1,1)
  (same comment as for Aluminium III)
- DOC, Dissolved Organic Carbon [water, surface water]: 3.8389e-6 kg; lognormal variance with pedigree 0.74916, pedigree (1,1,5,1,1)
  (same comment as for Aluminium III)
- Iron ion [water, ground-, long-term]: 4.8536e-5 kg; lognormal variance with pedigree 7.1643, pedigree (1,1,5,1,1)
  (same comment as for Aluminium III)
- Iron ion [water, surface water]: 8.1029e-8 kg; lognormal variance with pedigree 1.4359, pedigree (1,1,5,1,1)
  (same comment as for Aluminium III)
- Lead II [water, ground-, long-term]: 1.2774e-6 kg; lognormal variance with pedigree 7.3175, pedigree (1,1,5,1,1)
  (same comment as for Aluminium III)
- Lead II [water, surface water]: 2.1325e-9 kg; lognormal variance with pedigree 1.6753, pedigree (1,1,5,1,1)
  (same comment as for Aluminium III)
- Magnesium [water, ground-, long-term]: 0.00046821 kg; lognormal variance with pedigree 1.2832, pedigree (1,1,5,1,1)
  (same comment as for Aluminium III)
- Magnesium [water, surface water]: 7.8165e-7 kg; lognormal variance with pedigree 0.97158, pedigree (1,1,5,1,1)
  (same comment as for Aluminium III)
- Manganese II [water, ground-, long-term]: 7.0006e-5 kg; lognormal variance with pedigree 5.9286, pedigree (1,1,5,1,1)
  (same comment as for Aluminium III)
- Manganese II [water, surface water]: 1.1687e-7 kg; lognormal variance with pedigree 1.3951, pedigree (1,1,5,1,1)
  (same comment as for Aluminium III)
- Nickel II [water, ground-, long-term]: 1.0981e-5 kg; lognormal variance with pedigree 0.4755, pedigree (1,1,5,1,1)
  (same comment as for Aluminium III)
- Nickel II [water, surface water]: 1.8332e-8 kg; lognormal variance with pedigree 0.93591, pedigree (1,1,5,1,1)
  (same comment as for Aluminium III)
- Nitrate [water, ground-, long-term]: 3.4574e-5 kg; lognormal variance with pedigree 0.21864, pedigree (1,1,5,1,1)
  (same comment as for Aluminium III)
- Nitrate [water, surface water]: 8.0486e-6 kg; lognormal variance with pedigree 0.28543, pedigree (1,1,5,1,1)
  (same comment as for Aluminium III)
- Phosphate [water, ground-, long-term]: 0.0090857 kg; lognormal variance with pedigree 0.68272, pedigree (1,1,5,1,1)
  (same comment as for Aluminium III)
- Phosphate [water, surface water]: 1.5168e-5 kg; lognormal variance with pedigree 0.90326, pedigree (1,1,5,1,1)
  (same comment as for Aluminium III)
- Potassium I [water, ground-, long-term]: 0.016781 kg; lognormal variance with pedigree 0.111326, pedigree (1,1,5,1,1)
  (same comment as for Aluminium III)
- Potassium I [water, surface water]: 0.006587 kg; lognormal variance with pedigree 0.14963, pedigree (1,1,5,1,1)
  (same comment as for Aluminium III)
- Sodium I [water, ground-, long-term]: 0.11405 kg; lognormal variance with pedigree 0.086005, pedigree (1,1,5,1,1)
  (same comment as for Aluminium III)
- Sodium I [water, surface water]: 0.068514 kg; lognormal variance with pedigree 0.106462, pedigree (1,1,5,1,1)
  (same comment as for Aluminium III)
- Strontium II [water, ground-, long-term]: 2.3724e-6 kg; lognormal variance with pedigree 0.46664, pedigree (1,1,5,1,1)
  (same comment as for Aluminium III)
- Strontium II [water, surface water]: 3.9606e-9 kg; lognormal variance with pedigree 0.92704, pedigree (1,1,5,1,1)
  (same comment as for Aluminium III)
- Sulfate [water, ground-, long-term]: 0.085145 kg; lognormal variance with pedigree 0.10138, pedigree (1,1,5,1,1)
  (same comment as for Aluminium III)
- Sulfate [water, surface water]: 0.010233 kg; lognormal variance with pedigree 0.21464, pedigree (1,1,5,1,1)
  (same comment as for Aluminium III)
- TOC, Total Organic Carbon [water, ground-, long-term]: 0.0022995 kg; lognormal variance with pedigree 0.15375, pedigree (1,1,5,1,1)
  (same comment as for Aluminium III)
- TOC, Total Organic Carbon [water, surface water]: 3.8389e-6 kg; lognormal variance with pedigree 0.74916, pedigree (1,1,5,1,1)
  (same comment as for Aluminium III)
- Zinc II [water, ground-, long-term]: 0.00042487 kg; lognormal variance with pedigree 5.0227, pedigree (1,1,5,1,1)
  (same comment as for Aluminium III)
- Zinc II [water, surface water]: 7.0929e-7 kg; lognormal variance with pedigree 1.3444, pedigree (1,1,5,1,1)
  (same comment as for Aluminium III)

## Extrapolations
Modelling parameters are based on an average residual material landfill in Switzerland.
