# treatment of waste polyethylene terephthalate, for recycling, unsorted, sorting

Dataset: EcoSpold 2, unit process
Geography: RoW
Time period: 2010-01-01 to 2023-12-31
Technology level: current
Classification: ISIC rev.4 ecoinvent: 3811:Collection of non-hazardous waste
Scenario: Business-as-Usual
System model: Allocation, cut-off by classification
Generated by: Thomas Kägi
Published in: Kägi T. 2017
Database: ecoinvent
isCopyrightProtected: true
accessRestrictedTo: 1

## General comment
This dataset was built as a weighted average of regional datasets of the same activityName. Weights are based on production volumes.
Europe without Switzerland: production volume = 3e+09 kg/year, weight = 0.7602
US: production volume = 1e+09 kg/year, weight = 0.2281
CH: production volume = 5e+07 kg/year, weight = 0.01177

## Included activities start
Service is starting with the receipt of unsorted waste PET

## Included activities end
This module includes all processes of the sorting of waste PET up to the factory gate. Machinery infrastructure is excluded

## Allocation
no allocation involved

## Geography
This dataset is a weighted average built from the following geographies: Europe without Switzerland, US, CH.

## Reference product
- waste polyethylene terephthalate, for recycling, sorted: 1 kg; name BP_amount_1; By-product classification Recyclable; CPC 39270: Waste, parings and scrap of plastics; HS2017 391510: Ethylene polymers; waste, parings and scrap
  production volume 2.75462e8 kg; = apv_rp/ABS(a_RP) *BP_amount_1
    PVs of by-products/waste are scaled according to their relationship with the reference product.
  property price 0.035 EUR2005
    Convert from EU 27 price to the world by currency exchange rate.
  properties: carbon allocation 0.615264 kg, carbon content 0.624, carbon content, fossil 0.624, carbon content, non-fossil 0, dry mass 0.986 kg, heating value, net 22.95 MJ, water content 0.0141988, water in wet mass 0.014 kg, wet mass 1 kg

## Inputs from technosphere
- diesel, burned in building machine: 0.071935 MJ; lognormal variance with pedigree 0.0506, pedigree (1,1,4,5,4)
  properties: heating value, net 1 MJ
- electricity, low voltage: 4.58759e-5, 0.000589264, 0.00072143, 0.0149742, 0.00147803, 9.20632e-6, 0.000255402 kWh (7 suppliers, which the file names only by identifier); sum of these 0.0180734 kWh; lognormal variance with pedigree 0.0432, pedigree (2,1,5,5,1)
- heat, central or small-scale, other than natural gas: 0.000310889 MJ; lognormal variance with pedigree 0.0187, pedigree (1,2,4,5,3)
  properties: heating value, net 1 MJ
- heat, district or industrial, natural gas: 1.07319e-9, 6.53084e-8 MJ (2 suppliers, which the file names only by identifier); sum of these 6.63816e-8 MJ; lognormal variance with pedigree 0.0432, pedigree (2,1,5,5,1)
  properties: heating value, net 1 MJ
- municipal solid waste: -0.000167448, -1.98837e-5, -0.000123751, -0.094474, -1.39138e-5, -4.46609e-6, -1.00946e-5, -0.000420241 kg (8 suppliers, which the file names only by identifier); sum of these -0.0952338 kg; lognormal variance with pedigree 0.0032, pedigree (2,1,1,5,1)
  production volume; = apv_rp*BP_amount_2/ABS(a_RP)
    (same comment as for waste polyethylene terephthalate, for recycling, sorted)
  properties: carbon content, fossil 0.171549, carbon content, non-fossil 0.261655, dry mass 0.771 kg, heating value, net 11.74 MJ, water content 0.297017, wet mass 1 kg
  note on carbon content, fossil: MSW composition in tab 4.1, ecoinvent v2.2 report 13_I. C content referred to 1 kg DM
  note on heating value, net: Value taken from the general comment of the treatment dataset.
- propane, burned in building machine: 0.000249466 MJ; lognormal variance with pedigree 0.0432, pedigree (2,1,5,5,1)
  properties: heating value, net 1 MJ
- steel, low-alloyed: 0.00863799 kg; lognormal variance with pedigree 0.0666, pedigree (4,5,4,5,4)
  properties: carbon content, fossil 0.005, dry mass 1 kg, wet mass 1 kg
- waste polyethylene terephthalate, for recycling, unsorted: 1.09523 kg; name a_RP
  production volume; name APV_RP
    Global production volume (PV) derived for waste material inputs (collected for recycling) by scaling, using the material recovery efficiencies in the inventories, starting from estimates for the amounts of recycled materials based on WRF (2016) 'The New Plastics Economy - Rethinking the future of plastics'; figure 4.
    PVs of by-products/waste are scaled according to their relationship with the reference product.
  properties: carbon content, fossil 0.601, dry mass 0.968 kg, heating value, net 22.95 MJ, price 0.0315 EUR2005, water content 0.0330579, wet mass 1 kg
- waste preparation facility: 2.16701e-9 unit; lognormal variance with pedigree 0.2026, pedigree (5,1,5,5,5)
  properties: lifetime 50 year, lifetime capacity [kg] 5e8 kg
- wire drawing, steel: 0.00863799 kg; lognormal variance with pedigree 0.0666, pedigree (4,5,4,5,4)

## Sampling procedure
Uncertainty estimation according to the pedigree matrix
