# concrete production, 25MPa, for building construction, for interior use, with cement, Portland

Dataset: EcoSpold 2, unit process
Geography: RoW
Time period: 2006-01-01 to 2023-12-31
Technology level: current
Classification: ISIC rev.4 ecoinvent: 2395:Manufacture of articles of concrete, cement and plaster
Synonyms: ready-mix concrete; ready mixed concrete
Scenario: Business-as-Usual
System model: Allocation, cut-off by classification
Generated by: Geneviève Martineau
Published in: Marceau 2006
Database: ecoinvent
isCopyrightProtected: true
accessRestrictedTo: 1

## General comment
This dataset is a copy of the corresponding activity of CA-QC. This dataset represents the production of Quebec 25 MPa ready-mix concrete. Density: 2"432 kg/m³. Ingredients (for 1 m³): Cement 279 kg, Water 166 kg, Gravel 1010 kg, Sand 955 kg, Fly ash 21.21 kg, Water reducing admixture 0,9 kg. 25 MPa concrete is intended for interior slabs not exposed to freeze-thaw, including residential, commercial and industrial uses (following the Canadian CSA specs - http://www.rmcao.org/sites/default/files/CSA%20Quickspec%202012.pdf). Generic concrete mixes (cement, SCM, aggregate, water and admixtures) provided by the Technical Committee of Association Béton Québec (Canada). The amount of fly ash indicated above (about 7% of inputs) represents a theoretical average. Producers using it generally add 15-20% of fly ash in the mix. The average water consumption (not including batch water) is 65 L/m³ of ready mixed concrete. The average amount of water disposed is 35 L/m³. Water not discarded is recycled back into the process or into other products, and therefore not accounted for in this dataset.

## Included activities start
From reception of raw materials at the ready-mix plant gate.

## Included activities end
This activity ends before the delivery of concrete at the construction site. The dataset includes the whole manufacturing processes to produce ready-mixed concrete, internal processes (material handling and mixing) and infrastructure. The dataset does not include: - the transport of concrete in a mixing truck. The combustion of 5.74 litres of diesel should be used to take into account the average transportation of 1m³ of concrete.

## Geography
This dataset is a copy of the corresponding activity of CA-QC. Therefore, Quebec data is used. For some exchanges RNA or RER-modules have been used. Data quality indicators adjusted accordingly.

## Technology
Typical technology for average North American production.

## Parameters
- fraction: 0 dimensionless
  Estimated value. In Quebec, Canada, 25MPa concrete represent 40% of the ready-mix production. Source; Personal communication, ABQ (Association Béton Québec), October 2013.
- fraction of 25 MPa concrete to overall concrete production: 0.4 dimensionless; name fraction_25MPa_concrete; lognormal variance with pedigree 0.0014, pedigree (2,2,1,3,1)
  For Annual production volume purpose.Estimated value for Quebec: 25MPa concrete represent 40% of the overall ready-mix concrete production. Source; Personal communication, ABQ (Association Béton Québec), October 2013.
- fraction, process water, to air: 0.15 dimensionless; name fraction_PW_to_air; lognormal variance with pedigree 0.0226, pedigree (4,4,3,5,3)
  Rough estimation to represent water evaporation of process water.
- fraction_01: 0.8 dimensionless; name fraction_ethylene_oxide; lognormal variance with pedigree 0.0427, pedigree (3,1,1,3,4)
  Literature value. Superplastisizer assumed to be 80% ehtlyne oxide. Extrapolated from 20 MPa mix admixtures. Source: Athena and morrison Hershfield (2012): Life Cycle Assessment of Precast Concrete Commerical Buildings Cradle-to-Grave
- fraction_02: 0.2 dimensionless; name fraction_acetic_acid; lognormal variance with pedigree 0.0427, pedigree (3,1,1,3,4)
  Literature value. Superplastisizer assumed to be 20% acetic acid. Extrapolated from 20 MPa mix admixtures. Source: Athena and morrison Hershfield (2012): Life Cycle Assessment of Precast Concrete Commerical Buildings Cradle-to-Grave
- superplastisizer: 1e-50 kg
  Estimated value (zero), from Association Béton Québec (ABQ) Technical Committee.

## Reference product
- concrete, 25MPa: 1 m3; name ref; By-product classification allocatable product; CPC 37510: Non-refractory mortars and concretes; HS2017 6810: Cement, concrete or artificial stone; whether or not reinforced, articles thereof
  25 MPa concrete is intended for interior slabs, not exposed to freeze-thaw, including residential, commercial and industrial uses.
  production volume 9.16232e8 m3; name PV_ref
    The global production volume was calculated as follows:
    1) The total production volume of each country was calculated
    2) The production volume was scaled based on construction output (*)
    3) The average of the results was assumed to be the GLO PV
    4) The share of each different technology was calculated
    5) The weighted average of the shares for each country was used to split the GLO PV into different technologies
    (*) Construction output assumed per country
    Country Share
    ZA 0.50%
    BR 2.01%
    CH 0.36%
    CO 0.58%
    IN 9.67%
    PE 0.31%
    CA-QC 0.37%
    RNA without CA-QC 9.03%
    AT 0.40%
    Source:
    OECD. 2018. Input-Output Tables. http://www.oecd.org/trade/input-outputtables.htm.
    United Nations Statistics Division. 2019. UN data. A world of information. http://data.un.org/.
    Timmer, M.P., E. Dietzenbacher, B. Los, R. Stehrer, and G.J. de Vries. 2015. An Illustrated User Guide to the World Input-Output Database: the Case of Global Automotive Production. Review of International Economics 23(3): 575-605. http://doi.wiley.com/10.1111/roie.12178.
    The data was adjusted based on PPP, data from: The World Bank. 2019. World Bank Open Data. https://data.worldbank.org/
  property carbon content, fossil 1e-51; name ref_C_content_fossil
    Estimated value to zero, based on components properties.
  property cement content 279 kg; name cement
    Estimated value, from Association Béton Québec (ABQ) technical comitee, November 2013.
  property dry mass 2265 kg; name ref_DM; = sand+gravel+fly_ash+cement
  property fly ash content 21 kg; name fly_ash
    Estimated value, from Association Béton Québec (ABQ) technical comitee, November 2013.
  property gravel content 1010 kg; name gravel
    Estimated value, from Association Béton Québec (ABQ) technical comitee, November 2013.
  property price 185 EUR2005
    Estimated to be the same price as in case of concrete, normal (Data are not easily available. Therefore, an average price of products supplied by the activities in the same ISIC 3 code has been applied.This price is obtained as '_49 Concrete, asphalt and other mineral products, EU27 virgin, EU27' in the 'EU & DK Input Output Database' (available in SimaPro). The price is assumed to be valid for both RER2003, RER 2004, world 2003 and world 2004. Multiplied by density.).
  property sand content 955 kg; name sand
    Estimated value, from Association Béton Québec (ABQ) technical comitee, November 2013.
  property water content 0.0732892; name ref_water_content; = ref_WWM/ref_DM
  property water in wet mass 166 kg; name ref_WWM; = batch_water
  property wet mass 2431 kg; name ref_WM; = ref_WWM+ref_DM
  properties: carbon allocation 2.265e-48 kg, carbon content 1e-51

## Inputs from technosphere
- acetic acid, without water, in 98% solution state: 2e-51 kg; = 2E-51*ref; lognormal variance with pedigree 0.0028, pedigree (1,1,2,5,1)
  See parameters
  Uncertainty: C
  property carbon content, fossil 0.400016; name AA_C_content_fossil
  properties: dry mass 1 kg, heating value, net 14.6 MJ, wet mass 1 kg
  note on heating value, net: Based on literature, page 10, Althaus H.-J., Chudacoff M., Hischier R., Jungbluth N., Osses M. and Primas A. (2007) Life Cycle Inventories of Chemicals. Final report ecoinvent data v2.0 No. 8. EMPA, Swiss Centre for Life Cycle Inventories, Dübendorf, CH, Online-Version under: www.ecoinvent.org.
- cement, Portland: 255.787, 9.69296, 14.1764, 0.586957, 0.035664, 0.521566, 0.665241, 0.346321 kg (8 suppliers, which the file names only by identifier); sum of these 281.812 kg; = 281.811805841218*ref; lognormal variance with pedigree 0.0022, pedigree (1,1,2,5,1)
  Including waste concrete. See Exchange Properties
  Uncertainty: C
  properties: dry mass 1 kg, wet mass 1 kg
- chemical, organic: 0.91 kg; = 0.91*ref; lognormal variance with pedigree 0.0049, pedigree (3,2,2,5,1)
  Water reducing admixture (usually based on lignosulphonate). Estimated value by Association Béton Québec Technical Committee.
  properties: carbon content, fossil 0.628, dry mass 1 kg, heating value, net 19.03 MJ, wet mass 1 kg
  note on carbon content, fossil: This dataset is an unweighted average of 20 organic substances (listed in Tab 88.1, ecoinvent v2.2 report 8, part II), being part of the top100 chemicals included in this database. The C-content has also been calculated as an unweighted average of the C content of the substances composing this dataset.
- concrete mixing factory: 4.57e-7 unit; = 0.000000457*ref; source Kellenberger D. 2007; lognormal variance with pedigree 0.3246, pedigree (2,1,3,5,1)
  Literature value. From ecoinvent dataset "concrete production, normal"
- diesel, burned in building machine: 15.6427 MJ; = 15.6427152*ref; lognormal variance with pedigree 0.0022, pedigree (1,1,2,5,1)
  See parameters. Energy use in ready-mix plant. Includes air emissions from diesel combustion.
  Uncertainty: C
  property density 0.84 kg/l; name density_diesel
  property fuel input in physical units, m3 0.0004351 m3; name diesel_input; = 0.4351/1000
  property heating value, net 1 MJ; name NHV_diesel
- electricity, medium voltage: 0.141378, 2.82018, 0.0432949, 0.610468, 0.00866542, 0.00186066, 0.196925, 0.291227 kWh (8 suppliers, which the file names only by identifier); sum of these 4.114 kWh; = 4.114*ref; source Marceau, M.L. 2007; lognormal variance with pedigree 0.0202, pedigree (4,1,2,5,1)
  Literature value. Energy use in ready-mix plant.
  Uncertainty: T
- ethylene oxide: 1.568e-51, 6.432e-51 kg (2 suppliers, which the file names only by identifier); sum of these 8e-51 kg; = 8E-51*ref; lognormal variance with pedigree 0.0028, pedigree (1,1,2,5,1)
  See parameters.
  Uncertainty: C
  properties: carbon content, fossil 0.545455, dry mass 1 kg, heating value, net 27.53 MJ, wet mass 1 kg
- gravel, round: 0.265247, 1019.91 kg (2 suppliers, which the file names only by identifier); sum of these 1020.18 kg; = 1020.17893870835*ref; lognormal variance with pedigree 0.0022, pedigree (1,1,2,5,1)
  Including waste concrete. See Exchange Properties
  Uncertainty: C
  properties: dry mass 1 kg, wet mass 1 kg
- heat, district or industrial, natural gas: 2.8693, 7.76297 MJ (2 suppliers, which the file names only by identifier); sum of these 10.6323 MJ; = 10.63227*ref; lognormal variance with pedigree 0.0022, pedigree (1,1,2,5,1)
  See parameters. Energy use in ready-mix plant. Includes air emissions from natural gas combustion.
  Uncertainty: C
  properties: fuel input in physical units, m3 0.2929 m3, heating value, net 1 MJ
- lubricating oil: 0.0020706, 0.0098294 kg (2 suppliers, which the file names only by identifier); sum of these 0.0119 kg; = 0.0119*ref; source Kellenberger D. 2007; lognormal variance with pedigree 0.0146, pedigree (2,1,3,5,1)
  Literature value. From ecoinvent dataset "concrete production, normal"
  properties: carbon content, fossil 0.75, dry mass 1 kg, heating value, net 40.2 MJ, wet mass 1 kg
  note on carbon content, fossil: Lubricating oil is produced from diesel. C-content/dry mass of fats and oils considered 75%, from: ecoinvent v2.2 report, n 15a, pg 40
  note on heating value, net: Literature value, Source: IPCC 2006, 2006 IPCC Guidelines for National Greenhouse Gas Inventories, Prepared by the National Greenhouse Gas Inventories Programme, Eggleston H.S., Buendia L., Miwa K., Ngara T. and Tanabe K. (eds). Published: IGES, Japan
- sand: 14.595, 0.174749, 949.779, 0.0757702 kg (4 suppliers, which the file names only by identifier); sum of these 964.625 kg; = 964.624640065816*ref; lognormal variance with pedigree 0.0022, pedigree (1,1,2,5,1)
  Including waste concrete. See Exchange Properties
  Uncertainty: C
  properties: dry mass 1 kg, wet mass 1 kg
- steel, low-alloyed, hot rolled: 0.0238 kg; = 0.0238*ref; source Kellenberger D. 2007; lognormal variance with pedigree 0.0146, pedigree (2,1,3,5,1)
  Literature value. From ecoinvent dataset "concrete production, normal"
  properties: carbon content, fossil 0.005, dry mass 1 kg, wet mass 1 kg
  note on carbon content, fossil: Low alloyed steel composition given in Tab. 3.2 ecoinvent v2.2 report 10_partII. Steel assumed to have a C content of 0.5%
- synthetic rubber: 0.00713 kg; = 0.00713*ref; source Kellenberger D. 2007; lognormal variance with pedigree 0.0146, pedigree (2,1,3,5,1)
  Literature value. From ecoinvent dataset "concrete production, normal"
  properties: carbon content, fossil 0.871949, dry mass 1 kg, heating value, net 26.42 MJ, wet mass 1 kg
  note on carbon content, fossil: EPDM (Ethylene-propene-diene terpolymer) rubber is a terpolymer of ethylene, propene, and a diene with the residual unsaturated portion of the diene in the side chain (ecoinvent v2.2 report 7-part XX & Ullmann). Chemical formula (deduced from Evidences of Solvent-Induced Miscibility in Polychloroprene-co-Ethylene-Propene Diene Terpolymer Blends, Dubey et al., Journal of Applied Polymer Science, 2009, 111:1884-1891): C20H35
- tap water: 0.544661, 0.83029, 1.54928, 4.17365, 20.9366, 178.907 kg (6 suppliers, which the file names only by identifier); sum of these 206.941 kg; = 206.941176470588*ref; lognormal variance with pedigree 0.0022, pedigree (1,1,2,5,1)
  Water use in ready-mix plant, assumed to be sourced from municipal water system. See Exchange properties comment for Sources.
  Uncertainty: C
  properties: batch water 166 kg, carbon content, fossil 0.00178991, dry mass 0.000337476 kg, non-process water, net -40.9412 kg, water content 2962.17, wet mass 1 kg
  note on batch water: Estimated value by Association Béton Québec Technical Committee- (Nov 2013)
  note on carbon content, fossil: Bicarbonate content is 2.93 mol/m3. CO2 content is 0.1 mol/m3 (ecoinvent v2.2 report 8, Tab 93.1).
  note on non-process water, net: The average water consumption (not including batch water) is 65 L/m3 of ready mixed concrete. The average amount of water disposed is 34,8 L/m3. Water not discarded is recycled back into the process or into other products. Source: Athena (2005):Cement and Structural Concrete: LCI Update 2005 An amount of 15% water evaporated to air was assumed, in order to calculate to non-process water input.
- waste concrete: -1.67402, -22.8201, -0.0059187 kg (3 suppliers, which the file names only by identifier); sum of these -24.5 kg; = 24.5*ref; source Marceau, M.L. 2007; lognormal variance with pedigree 0.0126, pedigree (2,1,1,5,1)
  Literature value. Solid waste consists of concrete and small amounts of paste (cement and water after aggregate has been reclaimed)
  production volume; name PV_waste_concrete; = PV_ref*Waste/ref
    Calculated from the reference production volume, in proportion to the respective output amounts.
  properties: carbon content, fossil 1e-51, dry mass 0.931715 kg, water content 0.0732892, wet mass 1 kg
- wastewater from concrete production: -0.000167479, -0.0346325 m3 (2 suppliers, which the file names only by identifier); sum of these -0.0348 m3; = 0.0348*ref; source Marceau, M.L. 2007; lognormal variance with pedigree 0.0126, pedigree (2,1,1,5,1)
  Literature value. Table E1a.
  production volume; name PV_wastewater; = PV_ref*WWater/ref
    (same comment as for waste concrete)
  properties: carbon content, fossil 0.027074, dry mass 0.449139 kg, water content 2225.48, wet mass 1000 kg
  note on carbon content, fossil: TOC =0.01216 kg/m3 (Tab A.20, ecoinvent v2.2 report 13_I). TOC was considered as Total Carbon.

## Emissions to nature
- Water [air, unspecified]: 0.00614118 m3; = 0.00614117647058823*ref; lognormal variance with pedigree 0.0022, pedigree (1,1,2,5,1)
  Calculated value. See exchange propeties.
  Uncertainty: C
- Chlorides, unspecified [water, unspecified]: 3.09e-9 kg; = 0.00000000309*ref; source Marceau, M.L. 2007; lognormal variance with pedigree 0.0034, pedigree (2,1,2,5,1)
  Literature value. Table E1a.
- Copper ion [water, unspecified]: 1.55e-8 kg; = 0.0000000155*ref; source Marceau, M.L. 2007; lognormal variance with pedigree 0.0034, pedigree (2,1,2,5,1)
  Literature value. Table E1a.
- Iron ion [water, unspecified]: 1.55e-8 kg; = 0.0000000155*ref; source Marceau, M.L. 2007; lognormal variance with pedigree 0.0034, pedigree (2,1,2,5,1)
  Literature value. Table E1a.
- Oils, unspecified [water, unspecified]: 2.32e-7 kg; = 0.000000232*ref; source Marceau, M.L. 2007; lognormal variance with pedigree 0.0034, pedigree (2,1,2,5,1)
  Literature value. Table E1a.
- Suspended solids, unspecified [water, unspecified]: 4.64e-7 kg; = 0.000000464*ref; source Marceau, M.L. 2007; lognormal variance with pedigree 0.0034, pedigree (2,1,2,5,1)
  Literature value. Table E1a.

## Sampling procedure
Data on process inputs were provided by the Technical Committee of Association Béton Québec (Canada). Water use is from Confidential Life Cycle Inventory Survey of Ready-Mix Concrete Plant (Marceau, VanGeem, and Ranchero 2006a). This survey was distributed to a sample of member-plants of the National Ready Mixed Concrete Association. The sample was chosen so that the plants in the sample are representative of climates of the conterminous United States and plant size in terms of production in cubic yards of ready mixed concrete. The sample consists of 47 plants.

## Extrapolations
This dataset is a copy of the corresponding activity of CA-QC. This activity represents a Quebec concrete production. Some flows have been kept as in the original (European) ecoinvent dataset (infrastructure, lubricant, rubber, and steel). The uncertainty has been adjusted accordingly.
