# bamboo pole production

Dataset: EcoSpold 2, unit process
Geography: EC
Time period: 2010-01-01 to 2028-12-31
Technology level: current
Classification: ISIC rev.4 ecoinvent: 162:Manufacture of products of wood, cork, straw and plaiting materials
Scenario: Business-as-Usual
System model: Allocation, cut-off by classification
Generated by: K.Padron;E.Barros;J.Aguirre;S.Martines
Database: ecoinvent
isCopyrightProtected: true
accessRestrictedTo: 1

## General comment
This dataset represents the production of 1 kg of bamboo pole with a water content of u=16%. The data was obtained from information on the process of bamboo pole production provided during the visit in July 2022 at the facility "Unodec" (Portoviejo, EC). This facility can be seen as representative for the average EC production.
Bamboo culms are usually trimmed to a size that allows them to be inserted into the preservation pond. It is assumed that the bamboo culms with a water content of 80% are used for the production of bamboo poles. The production takes place at a bamboo processing facility and includes the washing and treatment process. First, the culms are cleaned with a pressure washer. A solution of boric acid, borax and water is used to treat bamboo against fungi and pests. Residues of bamboo are used as firewood to heat up the treatment solution. Finally, bamboo poles are dried in the open air (therefore the infrastructure is not accounted for in this dataset), supported and interleaved on the two sides of a trestle in scissors position. To use bamboo poles in construction, their water content must be equal to or less than the equilibrium humidity of the site. In this case, for Portoviejo 16%.
Data collection was performed by Kristi Marcela Padrón Flasher, Monica Estefania Barros Bermeo, Jonnathan Patricio Aguirre Collahuazo and Juan Sebastian Martines Tola from the Inclusive Circular Economy and Sustainable Development Research Group (ECI) of the University of Cuenca (EC). This dataset was developed in the frame of the CEELA (Strengthening capacities for energy efficiency in buildings in Latin America) project with the support of the Swiss Agency for Development and Cooperation (SDC). Some data was calculated using literature values.

## Included activities start
The activity starts with the culms being available at the processing facility. The transport to the processing facility is not included.

## Included activities end
This activity ends with the production of bamboo poles at the processing facility. The dataset includes the inputs associated with the washing treatment. Infrastructure and transport are not included, as well as losses of boric acid and borax. The latter are not expected to be significant.

## Geography
Data for Ecuador

## Technology
Current production technology representative in Ecuador. Bamboo forestry experts in Ecuador, Juan Carlos Salazar, agricultural engineer and Fabian Moreno, project manager of the International Bamboo and Rattan Organization (INBAR) Ecuador confirmed that the use of electric instruments for sawing is not very usual in preservation centers, where bamboo poles are produced. According to Fabian Moreno machinery will be introduced in the production process in the future due to the demand for good quality bamboo poles. The culm’s perforation is done with a long steel rod. This process allows the entry of the preservation solution (Morán, 2009).
Reference:
Morán, J. (2009). Construir con Guadua: Manual de construcción (Vol. 2, pp. 13–17). INBAR. https://bambuecuador.files.wordpress.com/2018/01/2009-construir-con-guadua-manual-de-construccic3b3n.pdf

## Time period
Time period referring to the data source: 2010-2023. Based on expert opinion data is considered to be valid at least up to 2028.

## Parameters
- water_dilution: 0.1667 kg
  Original value from the industrial partner in Ecuador. It represents the amount of water inside the pool, which is absorbed by the poles and therefore needs to be re-integrated in the pool to re-fill it up to the initial 13000 L. It is calculated as 13000L / (130000 L /3 L/pole * 18 kg/pole) = 0.1667 kg water per kg bamboo pole.
- water_washing: 1.111 kg
  Original value from the industrial partner in Ecuador. Water used for cleaning/washing the bamboo culms.

## Reference product
- bamboo pole: 1 kg; name RP; By-product classification allocatable product; CPC 31212: Wood, continuously shaped along any of its edges or faces (including strips and friezes for parquet flooring, […]; HS2017 440921: Wood; bamboo (including unassembled strips and friezes for parquet flooring), continuously shaped along any[...]
  This datatset represents the production of 1 kg of bamboo pole. One bamboo pole has an average weight of 18 kg, and average dimensions of 6 meters (length) x 11 cm (diameter).
  production volume 5.18953e7 kg; name PV_RP; = 15531400/1.67*18*0.31
    Production volume is expressed in kg. About 15,531,400 culms of Guadua Angustifolia Kunt were harvested in Ecuador in 2022 on approximately 15,000 ha (INBAR, 2015). 1.67 kg of culm are needed to produce 1 pole and a pole weights about 18 kg (Fabian Moreno, project manager INBAR Ecuador). 31% of harvested bamboo culms are destinated to construction, therefore, this percentage is considered to be used to produce bamboo pole.
    Reference:
    INBAINBAR. (2015). Estudio de la cadena desde la producción al consumo del bambú en Ecuador. https://bambuecuador.files.wordpress.com/2018/01/2015-estudio-de-la-cadena-desde-la-producciocc81n-al-consumo-del-bmabucc81-en-ecuador.pdf
  property heating value, net 17.68 MJ
    Jetsada P. & Panmanas S. (2017),Evaluation of lower heating value and elemental composition of bamboo using near infrared spectroscopy,Energy,Volume 121,Pages 147-158,ISSN 0360-5442,https://doi.org/10.1016/j.energy.2017.01.020.
  property price 0.529363 EUR2005
    Based on expert judgement, price given as 0.64 USD/kg. Converted with an exchange rate of 1EURO = 1.209 USD.
  property water in wet mass 0.137931 kg; name WWM_pole
  property wet mass 1 kg; name WM_pole
  properties: carbon allocation 0.425862 kg, carbon content 0.494, carbon content, fossil 0, carbon content, non-fossil 0.494, dry mass 0.862069 kg, water content 0.16

## Inputs from technosphere
- bamboo culm: 1.667 kg; name amount_culm; lognormal variance with pedigree 0.0026, pedigree (1,4,1,1,1)
  Amount of bamboo culm needed to produce bamboo pole.
  property dry mass 0.555556 kg; name DM_culm
  property water in wet mass 0.444444 kg; name WWM_culm
  property wet mass 1 kg; name WM_culm
  properties: carbon content, non-fossil 0.494, heating value, net 9.87 MJ, water content 0.8
- borax, anhydrous, powder: 0.00416667 kg; = (25*13)/(13000/3)*(1/18); lognormal variance with pedigree 0.0026, pedigree (1,4,1,1,1)
  Amount of borax used to prepare the treatment solution of the poles. The treatment solution is kept in a pool where the poles are submerged, once the treatment is finished the poles are extracted and the solution is recovered. The value is calculated considering that 25kg/m3 borax is used in a 13 m3 pool. Each pole absorbs 3L of solution, which means that with 13m3 water (13000L) in a pool approx. 433 pole can be treated -> (25 kg/pool)/ (433 poles/pool) * (poles/18 kg)
  properties: dry mass 1 kg, wet mass 1 kg
- boric acid, anhydrous, powder: 0.00416667 kg; = (25*13)/(13000/3)*(1/18); lognormal variance with pedigree 0.0026, pedigree (1,4,1,1,1)
  Amount of boric acid used to prepare the treatment solution of the poles. The treatment solution is kept in a pool where the poles are submerged, once the treatment is finished the poles are extracted and the solution is recovered. The value is calculated considering that 25kg/m3 borax is used in a 13 m3 pool. Each pole absorbs 3L of solution, which means that with 13m3 water (13000L) in a pool approx. 433 pole can be treated -> (25 kg/pool)/ (433 poles/pool) * (poles/18 kg)
  properties: dry mass 1 kg, wet mass 1 kg
- electricity, medium voltage: 0.0134713 kWh; = (15/0.1031)/(600*18); lognormal variance with pedigree 0.0528, pedigree (3,5,2,5,4)
  Refers to the electricity consumed by the pressure water pump, used to clean bamboo culms before the preservation process. It is calculated considering that in one month 600 poles of 18kg each are washed, the monthly energy cost is 15USD and the energy price 0.1031 USD/kWh.
- tap water: 1.2777 kg; = water_washing+ water_dilution; lognormal variance with pedigree 0.0026, pedigree (1,4,1,1,1)
  Water used for cleaning/washing the bamboo culms and for the dilution of boric acid and borax to create a solution of 5%.
  properties: carbon content, fossil 0.00178991, dry mass 0.000337476 kg, water content 2962.17, wet mass 1 kg
  note on carbon content, fossil: Bicarbonate content is 2.93 mol/m3. CO2 content is 0.1 mol/m3 (ecoinvent v2.2 report 8, Tab 93.1).
- waste bamboo residues: -0.0742889 kg; name bamboo_residues; lognormal variance with pedigree 0.0026, pedigree (1,4,1,1,1)
  Value calculated through mass balance. The value refers to the by-product of trimming processes to obtain exact dimensions when needed. It is considered here that all residues are burned or used as firewood to prepare the pole treatment solution. In reality, however, they are also donated to make handicrafts.
  production volume; = PV_RP*(bamboo_residues/RP)
    Calculated from production volume of reference product using the relative outputs.
  property carbon content, non-fossil 0.494; name DM_residues
  property dry mass 0.862069 kg; name DM_waste
  property water in wet mass 0.137931 kg; name WWM_waste
  property wet mass 1 kg; name WM_waste
  properties: heating value, net 17.68 MJ, water content 0.16
  note on heating value, net: Jetsada P. & Panmanas S. (2017),Evaluation of lower heating value and elemental composition of bamboo using near infrared spectroscopy,Energy,Volume 121,Pages 147-158,ISSN 0360-5442,https://doi.org/10.1016/j.energy.2017.01.020.

## Emissions to nature
- Acetaldehyde [air, urban air close to ground]: 7.69073e-8 kg; lognormal variance with pedigree 0.0846, pedigree (2,4,1,5,4)
  Calculated value. Some of the bamboo residues which are produced as a by-product are used as internal fuel for the required heat input for the drying process. Emissions for the combustion of bamboo residues are approximated with the combustion of wood chips using the dataset “heat production, softwood chips from forest, at furnace 300kW”. It is assumed that per kg of bamboo pole, 0.066 kg of waste bamboo residues [kg of dry mass] are burned as fuel.
- Ammonia [air, urban air close to ground]: 2.18114e-6 kg; lognormal variance with pedigree 0.0846, pedigree (2,4,1,5,4)
  (same comment as for Acetaldehyde)
- Arsenic ion [air, urban air close to ground]: 1.26e-9 kg; lognormal variance with pedigree 0.6946, pedigree (2,4,1,5,4)
  (same comment as for Acetaldehyde)
- Benzene [air, urban air close to ground]: 1.14731e-6 kg; lognormal variance with pedigree 0.0846, pedigree (2,4,1,5,4)
  (same comment as for Acetaldehyde)
- Benzo(a)pyrene [air, urban air close to ground]: 6.30388e-10 kg; lognormal variance with pedigree 0.0846, pedigree (2,4,1,5,4)
  (same comment as for Acetaldehyde)
- Bromine [air, urban air close to ground]: 7.56465e-8 kg; lognormal variance with pedigree 0.0846, pedigree (2,4,1,5,4)
  (same comment as for Acetaldehyde)
- Cadmium II [air, urban air close to ground]: 8.82543e-10 kg; lognormal variance with pedigree 0.6946, pedigree (2,4,1,5,4)
  (same comment as for Acetaldehyde)
- Calcium II [air, urban air close to ground]: 7.37554e-6 kg; lognormal variance with pedigree 0.0846, pedigree (2,4,1,5,4)
  (same comment as for Acetaldehyde)
- Carbon dioxide, non-fossil [air, urban air close to ground]: 0.128599 kg; lognormal variance with pedigree 0.0452, pedigree (2,4,1,5,4)
  (same comment as for Acetaldehyde)
- Carbon monoxide, non-fossil [air, urban air close to ground]: 0.000630388 kg; lognormal variance with pedigree 0.6946, pedigree (2,4,1,5,4)
  (same comment as for Acetaldehyde)
- Chlorine [air, urban air close to ground]: 2.2694e-7 kg; lognormal variance with pedigree 0.0846, pedigree (2,4,1,5,4)
  (same comment as for Acetaldehyde)
- Chromium III [air, urban air close to ground]: 4.99267e-9 kg; lognormal variance with pedigree 0.6946, pedigree (2,4,1,5,4)
  (same comment as for Acetaldehyde)
- Chromium VI [air, urban air close to ground]: 5.0431e-11 kg; lognormal variance with pedigree 0.6946, pedigree (2,4,1,5,4)
  (same comment as for Acetaldehyde)
- Copper ion [air, urban air close to ground]: 2.77371e-8 kg; lognormal variance with pedigree 0.6946, pedigree (2,4,1,5,4)
  (same comment as for Acetaldehyde)
- Dinitrogen monoxide [air, urban air close to ground]: 3.15194e-6 kg; lognormal variance with pedigree 0.0846, pedigree (2,4,1,5,4)
  (same comment as for Acetaldehyde)
- Dioxins, measured as 2,3,7,8-tetrachlorodibenzo-p-dioxin [air, urban air close to ground]: 3.9084e-14 kg; lognormal variance with pedigree 0.0846, pedigree (2,4,1,5,4)
  (same comment as for Acetaldehyde)
- Ethyl benzene [air, urban air close to ground]: 3.78233e-8 kg; lognormal variance with pedigree 0.0846, pedigree (2,4,1,5,4)
  (same comment as for Acetaldehyde)
- Fluorine [air, urban air close to ground]: 6.30388e-8 kg; lognormal variance with pedigree 0.0846, pedigree (2,4,1,5,4)
  (same comment as for Acetaldehyde)
- Formaldehyde [air, urban air close to ground]: 1.63901e-7 kg; lognormal variance with pedigree 0.0846, pedigree (2,4,1,5,4)
  (same comment as for Acetaldehyde)
- Hexachlorobenzene [air, urban air close to ground]: 9.07758e-15 kg; lognormal variance with pedigree 0.0846, pedigree (2,4,1,5,4)
  (same comment as for Acetaldehyde)
- Hydrocarbons, aliphatic, alkanes, unspecified [air, urban air close to ground]: 1.14731e-6 kg; lognormal variance with pedigree 0.0846, pedigree (2,4,1,5,4)
  (same comment as for Acetaldehyde)
- Hydrocarbons, aliphatic, unsaturated [air, urban air close to ground]: 3.9084e-6 kg; lognormal variance with pedigree 0.0846, pedigree (2,4,1,5,4)
  (same comment as for Acetaldehyde)
- Lead II [air, urban air close to ground]: 3.15194e-8 kg; lognormal variance with pedigree 0.6946, pedigree (2,4,1,5,4)
  (same comment as for Acetaldehyde)
- Magnesium [air, urban air close to ground]: 4.53879e-7 kg; lognormal variance with pedigree 0.0846, pedigree (2,4,1,5,4)
  (same comment as for Acetaldehyde)
- Manganese II [air, urban air close to ground]: 2.14332e-7 kg; lognormal variance with pedigree 0.6946, pedigree (2,4,1,5,4)
  (same comment as for Acetaldehyde)
- Mercury II [air, urban air close to ground]: 3.78233e-10 kg; lognormal variance with pedigree 0.6946, pedigree (2,4,1,5,4)
  (same comment as for Acetaldehyde)
- Methane, non-fossil [air, urban air close to ground]: 5.67349e-6 kg; lognormal variance with pedigree 0.0846, pedigree (2,4,1,5,4)
  (same comment as for Acetaldehyde)
- NMVOC, non-methane volatile organic compounds [air, urban air close to ground]: 1.32381e-5 kg; lognormal variance with pedigree 0.0846, pedigree (2,4,1,5,4)
  (same comment as for Acetaldehyde)
- Nickel II [air, urban air close to ground]: 7.56465e-9 kg; lognormal variance with pedigree 0.6946, pedigree (2,4,1,5,4)
  (same comment as for Acetaldehyde)
- Nitrogen oxides [air, urban air close to ground]: 0.000126078 kg; lognormal variance with pedigree 0.0846, pedigree (2,4,1,5,4)
  (same comment as for Acetaldehyde)
- PAH, polycyclic aromatic hydrocarbons [air, urban air close to ground]: 1.39946e-8 kg; lognormal variance with pedigree 0.3446, pedigree (2,4,1,5,4)
  (same comment as for Acetaldehyde)
- Particulate Matter, < 2.5 um [air, urban air close to ground]: 0.00011347 kg; lognormal variance with pedigree 0.3446, pedigree (2,4,1,5,4)
  (same comment as for Acetaldehyde)
- Particulate Matter, > 2.5 um and < 10um [air, urban air close to ground]: 6.30388e-6 kg; lognormal variance with pedigree 0.1646, pedigree (2,4,1,5,4)
  (same comment as for Acetaldehyde)
- Pentachlorophenol [air, urban air close to ground]: 1.02123e-11 kg; lognormal variance with pedigree 0.0846, pedigree (2,4,1,5,4)
  (same comment as for Acetaldehyde)
- Phosphorus [air, urban air close to ground]: 3.78233e-7 kg; lognormal variance with pedigree 0.0846, pedigree (2,4,1,5,4)
  (same comment as for Acetaldehyde)
- Potassium I [air, urban air close to ground]: 2.95021e-5 kg; lognormal variance with pedigree 0.0846, pedigree (2,4,1,5,4)
  (same comment as for Acetaldehyde)
- Sodium I [air, urban air close to ground]: 1.63901e-6 kg; lognormal variance with pedigree 0.0846, pedigree (2,4,1,5,4)
  (same comment as for Acetaldehyde)
- Sulfur dioxide [air, urban air close to ground]: 3.15194e-6 kg; lognormal variance with pedigree 0.0452, pedigree (2,4,1,5,4)
  (same comment as for Acetaldehyde)
- Toluene [air, urban air close to ground]: 3.78233e-7 kg; lognormal variance with pedigree 0.0846, pedigree (2,4,1,5,4)
  (same comment as for Acetaldehyde)
- Water [air, unspecified]: 0.000592711 m3; = (WWM_culm*amount_culm - WWM_waste* bamboo_residues - WWM_pole*RP)/1000; lognormal variance with pedigree 0.0026, pedigree (1,4,1,1,1)
  Value was calculated to maintain water balance.It represents the water lost by culms and water that evaporates from the drying process.
- Water [air, urban air close to ground]: 9.45582e-5 m3; lognormal variance with pedigree 0.0846, pedigree (2,4,1,5,4)
  (same comment as for Acetaldehyde)
- Zinc II [air, urban air close to ground]: 3.78233e-7 kg; lognormal variance with pedigree 0.6946, pedigree (2,4,1,5,4)
  (same comment as for Acetaldehyde)
- m-Xylene [air, urban air close to ground]: 1.51293e-7 kg; lognormal variance with pedigree 0.0846, pedigree (2,4,1,5,4)
  (same comment as for Acetaldehyde)
- Water [water, ground-]: 0.00102216 m3; = 0.8 *(water_washing + water_dilution)/1000; lognormal variance with pedigree 0.0053, pedigree (1,4,3,3,2)
  Calculated value. This represents the amount of water that flows onto the ground after washing bamboo culms with the pressure washer. It is assumed that 80% of the water is emitted to groundwater and 20 % to surface water.
  Reference:
  Gmünder S., Rubio L., Kounina A., Bunge J., Conza A., Soni H., Notten P., (2019). Life Cycle Inventories of Water Supply and Distribution. ecoinvent Association, Zürich, Switzerland
- Water [water, surface water]: 0.00025554 m3; = 0.2 *(water_washing + water_dilution)/1000; lognormal variance with pedigree 0.0053, pedigree (1,4,3,3,2)
  (same comment as for Water)

## Sampling procedure
Data were gathered in a bamboo pole factory located in Portoviejo, Ecuador, through a process assessment in a technical visit. The data from the facility visited can be seen as representative for the average EC production.

## Review by Fabio Valebona 2023-02-23
Dataset is very well documented, and the assumptions considered are reasonable.
