# sulfate pulp production, from hardwood, bleached

Dataset: EcoSpold 2, unit process
Geography: CA-QC
Time period: 2011-01-01 to 2023-12-31
Technology level: current
Classification: ISIC rev.4 ecoinvent: 1701:Manufacture of pulp, paper and paperboard
Classification: EcoSpold01Categories: paper & cardboard/graphic paper
Synonyms: kraft pulp
Scenario: Business-as-Usual
System model: Allocation, cut-off by classification
Share of production covered: 100 %
Generated by: Florentine Brunner
Database: ecoinvent
isCopyrightProtected: true
accessRestrictedTo: 1

## General comment
This dataset replaces the dataset "sulfate pulp production, elementary chlorine free bleached, CA-QC, 2012" in ecoinvent version 3.4 and earlier. Sulfate pulp supply chains in different geographies are not structured in the same way, they apply different criteria and levels by which pulping processes are disaggregated. This activity therefore exists in parallel to sulfate pulp supply chains in other geographies.
It represents the production of elementary chlorine free (ECF) bleached sulfate pulp from the kraft process in Quebec. Data are an average of mills using softwood (3%) and mills using hardwood (97%), As the share of mills using softwood is minor, this activity is modelled as "sulfate pulp production, from hardwood, bleached.

## Included activities start
The activity starts at the reception of wood chips from sawmills and pulpwood.

## Included activities end
The activity ends with bundled sulfate pulp at 90% water on wet mass basis ready for shipping.
The dataset includes wood handling, chemical (kraft) pulping and ECF bleaching, drying process, on-site energy production, recovery cycles of chemicals, internal waste water treatment and on-site industrial landfilling.
The dataset doesn't include on-site pick-up truck operation, which uses petrol (negligible).

## Allocation
The data originate partly from a paper mill which produces different types of woodfree papers and kraft pulp. The allocation of most materials and energy inputs between the different coproducts was avoided by subdividing the process of paper making into many subprocesses and collecting data specifically for those subprocesses. However, it was inevitable to make allocation for some general inputs, e.g. diesel burned in on-site vehicles. In those cases, the allocation was done with the dry mass content of the coproducts.

## Geography
Data from important pulp mills in the province of Quebec, Canada.

## Reference product
- sulfate pulp, bleached: 1 kg; By-product classification allocatable product; CPC 32112: Chemical wood pulp, other than dissolving grades; HS2017 470321: Wood pulp; chemical wood pulp, soda or sulphate, (other than dissolving grades), semi-bleached or bleached,[...]
  production volume 4.2e8 kg; name ref_PV
    Estimation with production capacities. Does not include kraft pulp produced in integrated paper mills and not going on the market.
  property carbon content, non-fossil 0.494
    C content of dry mass of sulfate pulp is 0.494 kgC/kg dry wood (ecoinvent v2.2 report 6_IX & ecoinvent v2.2 report 9). No other C containing products in the formulation of the pulp.
  properties: carbon allocation 0.4446 kg, carbon content 0.494, carbon content, fossil 0, dry mass 0.9 kg, heating value, net 13.23 MJ, price 0.355 EUR2005, water content 0.111111, water in wet mass 0.1 kg, wet mass 1 kg

## Inputs from technosphere
- EDTA, ethylenediaminetetraacetic acid: 0.000309 kg; lognormal variance with pedigree 0.0086, pedigree (1,1,4,1,1)
  Measured value.
  properties: carbon content, fossil 0.410959, dry mass 1 kg, heating value, net 19.09 MJ, wet mass 1 kg
- adipic acid: 6.1419e-7 kg; lognormal variance with pedigree 0.0092, pedigree (2,1,4,1,1)
  Concentration between 1 to 5%, assumed at 3% to calculate this amount,
  properties: carbon content, fossil 0.493151, dry mass 1 kg, heating value, net 23.23 MJ, wet mass 1 kg
- aluminium sulfate, powder: 0.0010306 kg; lognormal variance with pedigree 0.0092, pedigree (2,1,4,1,1)
  Measured value. Proxy for polyaluminum silicate sulfate and aluminum sulfate.
  properties: dry mass 1 kg, wet mass 1 kg
- bark chips, wet, measured as dry mass: 0.27348 kg; lognormal variance with pedigree 0.0086, pedigree (1,1,4,1,1)
  Measured value. Reported in dry mass. For energy production. 50% water on a wet mass basis.
  properties: carbon content, non-fossil 0.494, dry mass 1 kg, heating value, net 4.81 MJ, water content 1, wet mass 2 kg
- chemical, organic: 0.000133 kg; lognormal variance with pedigree 0.0086, pedigree (1,1,4,1,1)
  Proxy for several organic chemicals
  properties: carbon content, fossil 0.628, dry mass 1 kg, heating value, net 19.03 MJ, wet mass 1 kg
  note on carbon content, fossil: This dataset is an unweighted average of 20 organic substances (listed in Tab 88.1, ecoinvent v2.2 report 8, part II), being part of the top100 chemicals included in this database. The C-content has also been calculated as an unweighted average of the C content of the substances composing this dataset.
- diesel, burned in building machine: 0.0759594 MJ; = diesel_fuel_input_in_liter * diesel_density * diesel_Net_Heat_Value*42.8; lognormal variance with pedigree 0.008, pedigree (1,1,4,1,1)
  Measured value.
  Uncertainty: Calculated variable. Uncertainty will be determined from propagation of uncertainty factors of underlying variables.
  property density 0.84 kg/l; name diesel_density
  property heating value, net 1 MJ; name diesel_Net_Heat_Value
  property literFuel_Input 0.0021128 l; name diesel_fuel_input_in_liter
- dithiocarbamate-compound: 7.2554e-5 kg; lognormal variance with pedigree 0.0092, pedigree (2,1,4,1,1)
  Reported as "biocides". Assumed equally split between dithiocarbamate and triazine-compound..
  properties: carbon content, fossil 0.179339, dry mass 1 kg, wet mass 1 kg
- electricity, medium voltage: 0.040474 kWh; lognormal variance with pedigree 0.0086, pedigree (1,1,4,1,1)
  Measured value.
- ethylene glycol: 7.99e-7 kg; lognormal variance with pedigree 0.0092, pedigree (2,1,4,1,1)
  Measured value. Reported as "glycol".
  properties: carbon content, fossil 0.387097, dry mass 1 kg, heating value, net 23.44 MJ, wet mass 1 kg
- fatty alcohol: 0.00081149 kg; lognormal variance with pedigree 0.0092, pedigree (2,1,4,1,1)
  Proxy for ''antifoaming agent''. Some assumptions have been done on water content.
  properties: carbon content, fossil 0.0408973, carbon content, non-fossil 0.743434, dry mass 1 kg, heating value, net 41.01 MJ, wet mass 1 kg
- hazardous waste, for incineration: -2.3897e-7 kg; name dieselAmount; lognormal variance with pedigree 0.0006, pedigree (1,1,1,1,1)
  Extrapolation. Reported as ''diesel, methanol, labpack, biocide sent to incineration''.
  production volume; = ref_PV*dieselAmount
    Calculated from the reference production volume.
  properties: carbon content, fossil 0.554667, dry mass 0.75 kg, heating value, net 17 MJ, water content 0.333333, wet mass 1 kg
  note on carbon content, fossil: Tab A.6, ecoinvent v2.2 report 13_I. C content has been calculated after data in the tables, and then referred to 1 kg DM
  note on heating value, net: Value taken from the general comment of the treatment dataset.
- heavy fuel oil: 0.057196 kg; lognormal variance with pedigree 0.0086, pedigree (1,1,4,1,1)
  Measured value.
  properties: carbon content, fossil 0.849, dry mass 1 kg, heating value, net 41.2 MJ, wet mass 1 kg
- hydrazine: 9.0543e-6 kg; lognormal variance with pedigree 0.0086, pedigree (1,1,4,1,1)
  Measured value.
  properties: dry mass 1 kg, heating value, net 15.13 MJ, wet mass 1 kg
- hydrochloric acid, without water, in 30% solution state: 2.0699e-5 kg; lognormal variance with pedigree 0.0092, pedigree (2,1,4,1,1)
  Amount reported without concentration, assumed to be for the solution with water. A concentration of 30% was used.
  properties: dry mass 1 kg, heating value, net 3.32 MJ, wet mass 1 kg
- hydrogen peroxide, without water, in 50% solution state: 0.0015806 kg; lognormal variance with pedigree 0.0092, pedigree (2,1,4,1,1)
  Measured value.
  EcoSpold01Location=RER
  properties: dry mass 1 kg, heating value, net 7.13 MJ, wet mass 1 kg
- light fuel oil: 0.00012733 kg; lognormal variance with pedigree 0.0086, pedigree (1,1,4,1,1)
  Measured value. Reported in liters. A density of 0.86 kg/l was assumed.
  properties: carbon content, fossil 0.862, dry mass 1 kg, heating value, net 42.6 MJ, wet mass 1 kg
- lime: 0.0072316 kg; lognormal variance with pedigree 0.0092, pedigree (2,1,4,1,1)
  Measured value. Reported as ''milled calcium carbonate''.
  properties: carbon content, fossil 0.120005, dry mass 1 kg, wet mass 1 kg
- lubricating oil: 1.8812e-5 kg; lognormal variance with pedigree 0.0086, pedigree (1,1,4,1,1)
  All types. Reported in litres. Density of 0.85 kg/l assumed.
  properties: carbon content, fossil 0.75, dry mass 1 kg, heating value, net 40.2 MJ, wet mass 1 kg
  note on carbon content, fossil: Lubricating oil is produced from diesel. C-content/dry mass of fats and oils considered 75%, from: ecoinvent v2.2 report, n 15a, pg 40
  note on heating value, net: Literature value, Source: IPCC 2006, 2006 IPCC Guidelines for National Greenhouse Gas Inventories, Prepared by the National Greenhouse Gas Inventories Programme, Eggleston H.S., Buendia L., Miwa K., Ngara T. and Tanabe K. (eds). Published: IGES, Japan
- malusil: 0.0045307 kg; lognormal variance with pedigree 0.0092, pedigree (2,1,4,1,1)
  Measured value. Reported as ''talc''.
  properties: dry mass 1 kg, wet mass 1 kg
- manganese: 1.341e-5 kg; lognormal variance with pedigree 0.0092, pedigree (2,1,4,1,1)
  Measured value. Proxy for ''manganese based additive''.
  properties: dry mass 1 kg, wet mass 1 kg
- methanol: 0.0070129 kg; lognormal variance with pedigree 0.0092, pedigree (2,1,4,1,1)
  EcoSpold01Location=GLO
  Measured value.
  properties: carbon content, fossil 0.375, dry mass 1 kg, heating value, net 20 MJ, wet mass 1 kg
  note on carbon content, fossil: Fossil C content was calculated after fossil C contents of chemicals used in the production of the paper (in Tab 8.54 & 8.55 ecoinvent v2.2 report 11_III, part 8). CH3OH
  note on heating value, net: Based on literature, page 533, Report 17: Jungbluth, N., Chudacoff, M., Dauriat, A., Dinkel, F., Doka, G., Faist Emmenegger, M., Gnansounou, E., Kljun, N., Schleiss, K., Spielmann, M., Stettler, C., Sutter, J. 2007: Life Cycle Inventories of Bioenergy. ecoinvent report No. 17, Swiss Centre for Life Cycle Inventories, Dübendorf, CH.
- municipal solid waste: -7.3675e-5 kg; name municipalSolidWasteAmount; lognormal variance with pedigree 0.0006, pedigree (1,1,1,1,1)
  EcoSpold01Location=CH
  production volume; = ref_PV*municipalSolidWasteAmount
    Calculated from the reference production volume.
  properties: carbon content, fossil 0.171549, carbon content, non-fossil 0.261655, dry mass 0.771 kg, heating value, net 11.74 MJ, water content 0.297017, wet mass 1 kg
  note on carbon content, fossil: Fossil C content was calculated after fossil C contents of chemicals used in the production of the paper (in Tab 8.54 & 8.55 ecoinvent v2.2 report 11_III, part 8). MSW composition in tab 4.1, ecoinvent v2.2 report 13_I. C content referred to 1 kg DM
  note on carbon content, non-fossil: Biogenic C content was calculated after biogenic C contents of chemicals used in the production of the paper (in Tab 8.54 & 8.55 ecoinvent v2.2 report 11_III, part 8). The cellulose content in 1 kg of paper (on a wet mas basis) was estimated as (1-chemical content), C content of cellulose was considered 0.44 kgC/kg dry mass (ecoinvent v2.2 report, n 15a, pg 40) MSW composition in tab 4.1, ecoinvent v2.2 report 13_I. C content referred to 1 kg DM
- natural gas, high pressure: 0.010614 m3; lognormal variance with pedigree 0.0086, pedigree (1,1,4,1,1)
  EcoSpold01Location=RER
  Measured value. In Nm3.
  properties: carbon content, fossil 0.602381, dry mass 0.84 kg, heating value, gross 40 MJ, heating value, net 36 MJ, wet mass 0.84 kg
  note on carbon content, fossil: An average C content of 0.506 kg C/ m3 has been assumed (this average has been calculated using data in Tab 3.5, ecoinvent v2.2 report 6_V
  note on heating value, net: Literature value, Source: Christoph Meili;Niels Jungbluth;Maresa Bussa (2021) Life cycle inventories of crude oil and natural gas extraction. ESU-services Ltd. commissioned by BAFU & VSG, Schaffhausen, Switzerland, http://esu-services.ch/data/public-lci-reports/
- oxygen, liquid: 0.0046836 kg; lognormal variance with pedigree 0.0092, pedigree (2,1,4,1,1)
  EcoSpold01Location=RER
  Measured value.
  properties: dry mass 1 kg, wet mass 1 kg
- phosphoric acid, industrial grade, without water, in 85% solution state: 0.0002625 kg; lognormal variance with pedigree 0.0086, pedigree (1,1,4,1,1)
  Measured value.
  properties: dry mass 1 kg, wet mass 1 kg
- propane, burned in building machine: 0.00734295 MJ; name propane; = propane_fuel_input_in_liter * propane_density * propane_Net_Heat_Value*46.0; lognormal variance with pedigree 0.008, pedigree (1,1,4,1,1)
  (same comment as for diesel, burned in building machine)
  property density 0.515 kg/l; name propane_density
  property heating value, net 1 MJ; name propane_Net_Heat_Value
  property literFuel_Input 0.00030996 l; name propane_fuel_input_in_liter
- pulp factory: 5e-11 unit; lognormal variance with pedigree 0.448, pedigree (4,5,5,5,5)
  Estimation
- pulpwood, hardwood, measured as solid wood under bark: 0.00030064 m3; lognormal variance with pedigree 0.0086, pedigree (1,1,4,1,1)
  EcoSpold01Location=RER
  Measured value. Reported as dry mass including bark. A density of 650 kg/m3 and a bark volume fraction of 12% were assumed. The species composing the total hardwood pulpwood input (excluding wood chips) are (mass %):
  Hardwoods (97%):
  Maple 37%
  Beech 7%
  Yellow birch 16%
  White birch 11%
  Aspen 13%
  Other hardwoods 13%
  Softwoods (3%):
  Eastern hemlock 0.6%
  Larch 0.45%
  Spruce (White) 0.855%
  Balsam Fir 1.05%
  White and red pine 0.045%
  The estimated wood density of hardwoods calculated with the above percentages and generic densities specific to each species is very close to 650 kg/m3 (645 kg/m3), including aspen, which has a low density.
  properties: carbon content, non-fossil 0.494, dry mass 563.2 kg, heating value, net 6071.3 MJ, water content 0.8, wet mass 1013.76 kg
  note on carbon content, non-fossil: Biogenic C content was calculated after biogenic C contents of chemicals used in the production of the paper (in Tab 8.54 & 8.55 ecoinvent v2.2 report 11_III, part 8). The cellulose content in 1 kg of paper (on a wet mas basis) was estimated as (1-chemical content), C content of cellulose was considered 0.44 kgC/kg dry mass (ecoinvent v2.2 report, n 15a, pg 40) C content of dry mass is 0.494 kgC/kg dry wood (ecoinvent v2.2 report 9)
  note on heating value, net: Value based on "hardwood forestry, mixed species, sustainable forest management"The property is based on a value of 11.58MJ/kg
- quicklime, milled, loose: 0.0098819 kg; lognormal variance with pedigree 0.0092, pedigree (2,1,4,1,1)
  Measured value.
  EcoSpold01Location=CH
  properties: dry mass 0.99 kg, water content 0.010101, wet mass 1 kg
- retention aid, for paper production: 3.8675e-6 kg; lognormal variance with pedigree 0.0092, pedigree (2,1,4,1,1)
  Proxy for polyacrylamides. Some assumptions have been done on water content.
  properties: carbon content, fossil 0.5, dry mass 1 kg, heating value, net 15.15 MJ, wet mass 1 kg
- sawlog and veneer log, softwood, measured as solid wood under bark: 1.3736e-5 m3; lognormal variance with pedigree 0.0086, pedigree (1,1,4,1,1)
  Measured value. Reported as dry mass including bark. A density of 450 kg/m3 and a bark volume fraction of 10% were assumed. This wood input is better represented by the Quebec softwood sawlog than the generic pulpwood.
  properties: carbon content, non-fossil 0.494, dry mass 461.364 kg, heating value, net 4483.78 MJ, water content 0.7, wet mass 784.318 kg
  note on heating value, net: Value based on the dataset "softwood forestry, mixed species, sustainable forest management"The property is based on a value of 11.58MJ/kg
- sludge from pulp and paper production: -0.022927 kg; name primarySecondarySludgeAmount; lognormal variance with pedigree 0.0006, pedigree (1,1,1,1,1)
  EcoSpold01Location=CH
  Extrapolation. Reported as ''primary and secondary sludge sent to landfarming''.
  production volume; = ref_PV*primarySecondarySludgeAmount
    Calculated from the reference production volume.
  properties: carbon content, non-fossil 0.21, dry mass 0.258 kg, heating value, net 2.65 MJ, water content 2.87597, wet mass 1 kg
  note on carbon content, non-fossil: Biogenic C content was calculated after biogenic C contents of chemicals used in the production of the paper (in Tab 8.54 & 8.55 ecoinvent v2.2 report 11_III, part 8). The cellulose content in 1 kg of paper (on a wet mas basis) was estimated as (1-chemical content), C content of cellulose was considered 0.44 kgC/kg dry mass (ecoinvent v2.2 report, n 15a, pg 40) Tab 6.21, ecoinvent v2.2 report 11_III & Tab A.9, ecoinvent v2.2 report 13_I. Sludge from pulp and paper contains 15.75% carbon
- sodium chlorate, powder: 0.056978 kg; lognormal variance with pedigree 0.0086, pedigree (1,1,4,1,1)
  EcoSpold01Location=RER
  Measured value.
  properties: dry mass 1 kg, wet mass 1 kg
- sodium chloride, powder: 0.0015835 kg; lognormal variance with pedigree 0.0092, pedigree (2,1,4,1,1)
  EcoSpold01Location=RER
  Measured value.
  properties: dry mass 1 kg, wet mass 1 kg
- sodium hydroxide, without water, in 50% solution state: 0.040736 kg; lognormal variance with pedigree 0.0086, pedigree (1,1,4,1,1)
  Measured value.
  EcoSpold01Location=RER
  properties: dry mass 1 kg, heating value, net 3.03 MJ, wet mass 1 kg
- sodium hypochlorite, without water, in 15% solution state: 0.00019164 kg; lognormal variance with pedigree 0.0092, pedigree (2,1,4,1,1)
  Amount reported without concentration, assumed to be for the solution with water. A concentration of 15% was used.
  properties: dry mass 1 kg, wet mass 1 kg
- solvent, organic: 7.0917e-7 kg; lognormal variance with pedigree 0.0092, pedigree (2,1,4,1,1)
  Proxy for ''polymer/flocculant", "solvent" and "cleaning agent''. Some assumptions have been done on water content.
  properties: carbon content, fossil 0.63072, dry mass 1 kg, heating value, net 19.11 MJ, wet mass 1 kg
- spent antifreezer liquid: -4.2292e-7 kg; name antifreezerFluidsAmount; lognormal variance with pedigree 0.0006, pedigree (1,1,1,1,1)
  Reported as ''antifreezer, fluids (glycol) sent to incineration''
  production volume; = ref_PV*antifreezerFluidsAmount
    Calculated from the reference production volume.
  properties: carbon content, fossil 0.431328, dry mass 0.482 kg, heating value, net 0.56 MJ, water content 1.07469, wet mass 1 kg
- spent solvent mixture: -3.0946e-7 kg; name spentSolventAmount; lognormal variance with pedigree 0.0006, pedigree (1,1,1,1,1)
  Reported as "solvents and flammable liquids sent to incineration".
  production volume; = ref_PV*spentSolventAmount
    Calculated from the reference production volume.
  properties: carbon content, fossil 0.571257, dry mass 0.835 kg, heating value, net 21.7 MJ, water content 0.197605, wet mass 1 kg
  note on carbon content, fossil: Tab A.7, ecoinvent v2.2 report 13_I. C content has been calculated after data in the tables, and then referred to 1 kg DM
- sugar, from sugar beet: 6.4215e-5 kg; lognormal variance with pedigree 0.0086, pedigree (1,1,4,1,1)
  Measured value.
  properties: carbon content, non-fossil 0.44, dry mass 1 kg, wet mass 1 kg
- sulfuric acid: 0.03381 kg; lognormal variance with pedigree 0.0092, pedigree (2,1,4,1,1)
  EcoSpold01Location=RER
  Measured value. 1.1% of this amount accounts for the active compound in cleaning agents as a proxy.
  properties: dry mass 1 kg, wet mass 1 kg
- tap water: 0.34189 kg; lognormal variance with pedigree 0.0086, pedigree (1,1,4,1,1)
  Calculated value. Water consumption for sanitary installations calculated with a monthly average.
  properties: carbon content, fossil 0.00178991, dry mass 0.000337476 kg, water content 2962.17, wet mass 1 kg
  note on carbon content, fossil: Bicarbonate content is 2.93 mol/m3. CO2 content is 0.1 mol/m3 (ecoinvent v2.2 report 8, Tab 93.1).
- triazine-compound: 7.2554e-5 kg; lognormal variance with pedigree 0.0092, pedigree (2,1,4,1,1)
  Reported as "biocides". Assumed equally split between dithiocarbamate and triazine-compound.
  properties: carbon content, fossil 0.475616, dry mass 1 kg, wet mass 1 kg
- urea: 0.000194871 kg; lognormal variance with pedigree 0.0086, pedigree (1,1,4,1,1)
  The exchange has been updated from 'urea, as N' into 'urea' and therefore its amount has been scaled (multiplied) from 0.0001 kg by 2.1438 kg of 'urea' per kg of 'urea, as N'. Original comment of the exchange is: Measured value.
  properties: carbon content, fossil 0.2, dry mass 1 kg, wet mass 1 kg
- waste mineral oil: -1.9879e-5 kg; name oilGreaseWasteAmount; lognormal variance with pedigree 0.0006, pedigree (1,1,1,1,1)
  Reported as ''oil and grease waste sent to incineration''
  production volume; = ref_PV*oilGreaseWasteAmount
    Calculated from the reference production volume.
  properties: carbon content, fossil 0.864444, dry mass 0.9 kg, heating value, net 34.7 MJ, water content 0.111111, wet mass 1 kg
- waste textile, soiled: -1.0692e-5 kg; name oilyClothAmount; lognormal variance with pedigree 0.0006, pedigree (1,1,1,1,1)
  Reported as ''oily cloth sent to landfill''.
  production volume; = ref_PV*oilyClothAmount
    Calculated from the reference production volume.
  properties: carbon content, non-fossil 0.570519, dry mass 0.75 kg, heating value, net 14.45 MJ, water content 0.333333, wet mass 1 kg
- wood ash mixture, pure: -0.013994 kg; name woodAsh; lognormal variance with pedigree 0.0006, pedigree (1,1,1,1,1)
  Extrapolation. Reported as ''primary and secondary sludge sent to landfarming''.
  production volume; = ref_PV*woodAsh
    Calculated from the reference production volume.
  properties: carbon content, non-fossil 0.012, dry mass 1 kg, wet mass 1 kg
- wood chips, wet, measured as dry mass: 1.8124, 0.075161 kg (2 suppliers, which the file names only by identifier); sum of these 1.88756 kg; lognormal variance with pedigree 0.0086, pedigree (1,1,4,1,1)
  Measured value. Reported in dry mass. In fact, 5% of the total wood chip input come directly from forest and 0.4% from construction waste.
  properties: carbon content, non-fossil 0.494, dry mass 1 kg, heating value, net 10.84 MJ, water content 1.1, wet mass 2.1 kg
  note on heating value, net: Value based on the dataset 'softwood forestry, mixed species, sustainable forest management'

## Inputs from nature
- Water, unspecified natural origin [natural resource, in water]: 0.073535 m3; lognormal variance with pedigree 0.0086, pedigree (1,1,4,1,1)
  Measured value.

## Emissions to nature
- 4-Methyl-2-pentanone [air, non-urban air or from high stacks]: 1.7049e-7 kg; lognormal variance with pedigree 0.0486, pedigree (2,1,4,1,1)
  Calculated value. Calculation based on emission factors from the data provider.
- Acetaldehyde [air, non-urban air or from high stacks]: 4.3778e-6 kg; lognormal variance with pedigree 0.0486, pedigree (2,1,4,1,1)
  Calculated value. Calculation based on emission factors from the data provider.
- Acetic acid [air, non-urban air or from high stacks]: 1.4136e-6 kg; lognormal variance with pedigree 0.1306, pedigree (2,5,5,5,4)
  Calculated value. Calculation based on values from ecoinvent v3 heat production technologies, inputs of fuels and burned biomass generated on-site.
- Acetone [air, non-urban air or from high stacks]: 3.3787e-7 kg; lognormal variance with pedigree 0.0486, pedigree (2,1,4,1,1)
  Calculated value. Calculation based on emission factors from the data provider.
- Acrolein [air, non-urban air or from high stacks]: 1.898e-6 kg; lognormal variance with pedigree 0.0486, pedigree (2,1,4,1,1)
  Calculated value. Calculation based on emission factors from the data provider.
- Ammonia [air, non-urban air or from high stacks]: 0.00014514 kg; lognormal variance with pedigree 0.0486, pedigree (2,1,4,1,1)
  Calculated value. Calculation based on emission factors from the data provider.
- Arsenic ion [air, non-urban air or from high stacks]: 3.4742e-8 kg; lognormal variance with pedigree 0.6586, pedigree (2,1,4,1,1)
  Calculated value. Calculation based on emission factors from the data provider.
- Benzene [air, non-urban air or from high stacks]: 5.5245e-6 kg; lognormal variance with pedigree 0.1306, pedigree (2,5,5,5,4)
  (same comment as for Acetic acid)
- Benzo(a)pyrene [air, non-urban air or from high stacks]: 1.7515e-9 kg; lognormal variance with pedigree 0.1306, pedigree (2,5,5,5,4)
  (same comment as for Acetic acid)
- Bromine [air, non-urban air or from high stacks]: 5.1833e-7 kg; lognormal variance with pedigree 0.1306, pedigree (2,5,5,5,4)
  (same comment as for Acetic acid)
- Butane [air, non-urban air or from high stacks]: 2.9128e-7 kg; lognormal variance with pedigree 0.1306, pedigree (2,5,5,5,4)
  (same comment as for Acetic acid)
- Cadmium II [air, non-urban air or from high stacks]: 1.2987e-8 kg; lognormal variance with pedigree 0.6586, pedigree (2,1,4,1,1)
  Calculated value. Calculation based on emission factors from the data provider.
- Calcium II [air, non-urban air or from high stacks]: 5.0785e-5 kg; lognormal variance with pedigree 0.1306, pedigree (2,5,5,5,4)
  (same comment as for Acetic acid)
- Carbon dioxide, fossil [air, non-urban air or from high stacks]: 0.20718 kg; lognormal variance with pedigree 0.0092, pedigree (2,1,4,1,1)
  Calculated value. Calculation based on emission factors from the data provider.
- Carbon dioxide, non-fossil [air, non-urban air or from high stacks]: 2.8669 kg; lognormal variance with pedigree 0.0092, pedigree (2,1,4,1,1)
  Calculated value. Calculation based on emission factors from the data provider.
- Carbon monoxide, fossil [air, non-urban air or from high stacks]: 0.0011211 kg; lognormal variance with pedigree 0.6586, pedigree (2,1,4,1,1)
  Calculated value. Calculation based on emission factors from the data provider.
- Carbon monoxide, non-fossil [air, non-urban air or from high stacks]: 0.0522 kg; lognormal variance with pedigree 0.7406, pedigree (2,5,5,5,4)
  (same comment as for Acetic acid)
- Chlorine [air, non-urban air or from high stacks]: 1.555e-6 kg; lognormal variance with pedigree 0.1306, pedigree (2,5,5,5,4)
  (same comment as for Acetic acid)
- Chromium III [air, non-urban air or from high stacks]: 8.2601e-8 kg; lognormal variance with pedigree 0.6586, pedigree (2,1,4,1,1)
  Calculated value. Calculation based on emission factors from the data provider.
- Chromium VI [air, non-urban air or from high stacks]: 3.1142e-9 kg; lognormal variance with pedigree 0.6586, pedigree (2,1,4,1,1)
  Calculated value. Calculation based on emission factors from the data provider.
- Cobalt II [air, non-urban air or from high stacks]: 7.4335e-8 kg; lognormal variance with pedigree 0.6586, pedigree (2,1,4,1,1)
  Calculated value. Calculation based on emission factors from the data provider.
- Copper ion [air, urban air close to ground]: 2.6863e-9 kg; lognormal variance with pedigree 0.7406, pedigree (2,5,5,5,4)
  (same comment as for Acetic acid)
- Dinitrogen monoxide [air, non-urban air or from high stacks]: 1.2084e-5 kg; lognormal variance with pedigree 0.0486, pedigree (2,1,4,1,1)
  Calculated value. Calculation based on emission factors from the data provider.
- Dioxins, measured as 2,3,7,8-tetrachlorodibenzo-p-dioxin [air, non-urban air or from high stacks]: 2.5647e-15 kg; lognormal variance with pedigree 0.0486, pedigree (2,1,4,1,1)
  Calculated value. Calculation based on emission factors from the data provider.
- Ethanol [air, non-urban air or from high stacks]: 6.7578e-7 kg; lognormal variance with pedigree 0.0486, pedigree (2,1,4,1,1)
  Calculated value. Calculation based on emission factors from the data provider.
- Ethyl benzene [air, non-urban air or from high stacks]: 2.5916e-7 kg; lognormal variance with pedigree 0.1306, pedigree (2,5,5,5,4)
  (same comment as for Acetic acid)
- Fluorine [air, non-urban air or from high stacks]: 4.3194e-7 kg; lognormal variance with pedigree 0.1306, pedigree (2,5,5,5,4)
  (same comment as for Acetic acid)
- Formaldehyde [air, non-urban air or from high stacks]: 1.914e-5 kg; lognormal variance with pedigree 0.0486, pedigree (2,1,4,1,1)
  Calculated value. Calculation based on emission factors from the data provider.
- Hexachlorobenzene [air, non-urban air or from high stacks]: 6.2198e-14 kg; lognormal variance with pedigree 0.1306, pedigree (2,5,5,5,4)
  Calculated value. Calculation based on values from ecoinvent v3 heat production technologies, inputs of fuels and burned biomass generated on-site.
  Uncertainty: =
- Hydrocarbons, aliphatic, alkanes, unspecified [air, non-urban air or from high stacks]: 9.2151e-6 kg; lognormal variance with pedigree 0.1306, pedigree (2,5,5,5,4)
  (same comment as for Acetic acid)
- Hydrocarbons, aliphatic, unsaturated [air, non-urban air or from high stacks]: 2.6848e-5 kg; lognormal variance with pedigree 0.1306, pedigree (2,5,5,5,4)
  (same comment as for Acetic acid)
- Hydrocarbons, aromatic [air, non-urban air or from high stacks]: 3.3801e-7 kg; lognormal variance with pedigree 0.1306, pedigree (2,5,5,5,4)
  (same comment as for Acetic acid)
- Hydrochloric acid [air, non-urban air or from high stacks]: 1.1156e-5 kg; lognormal variance with pedigree 0.0486, pedigree (2,1,4,1,1)
  Calculated value. Calculation based on emission factors from the data provider.
- Hydrogen fluoride [air, non-urban air or from high stacks]: 1.0817e-7 kg; lognormal variance with pedigree 0.1306, pedigree (2,5,5,5,4)
  (same comment as for Acetic acid)
- Hydrogen sulfide [air, non-urban air or from high stacks]: 1.3326e-6 kg; lognormal variance with pedigree 0.0486, pedigree (2,1,4,1,1)
  Calculated value. Calculation based on emission factors from the data provider.
- Iron ion [air, non-urban air or from high stacks]: 1.8471e-6 kg; lognormal variance with pedigree 0.6586, pedigree (2,1,4,1,1)
  Calculated value. Calculation based on emission factors from the data provider.
- Isopropanol [air, non-urban air or from high stacks]: 7.8012e-6 kg; lognormal variance with pedigree 0.0486, pedigree (2,1,4,1,1)
  Calculated value. Calculation based on emission factors from the data provider.
- Lead II [air, non-urban air or from high stacks]: 1.0194e-7 kg; lognormal variance with pedigree 0.6586, pedigree (2,1,4,1,1)
  Calculated value. Calculation based on emission factors from the data provider.
- Magnesium [air, non-urban air or from high stacks]: 1.449e-6 kg; lognormal variance with pedigree 0.1306, pedigree (2,5,5,5,4)
  (same comment as for Acetic acid)
- Manganese II [air, non-urban air or from high stacks]: 1.4686e-6 kg; lognormal variance with pedigree 0.1306, pedigree (2,5,5,5,4)
  (same comment as for Acetic acid)
- Mercury II [air, non-urban air or from high stacks]: 2.255e-9 kg; lognormal variance with pedigree 0.6586, pedigree (2,1,4,1,1)
  Calculated value. Calculation based on emission factors from the data provider.
- Methane, fossil [air, non-urban air or from high stacks]: 7.9954e-6 kg; lognormal variance with pedigree 0.0486, pedigree (2,1,4,1,1)
  Calculated value. Calculation based on emission factors from the data provider.
- Methane, non-fossil [air, non-urban air or from high stacks]: 0.00051052 kg; lognormal variance with pedigree 0.0486, pedigree (2,1,4,1,1)
  Calculated value. Calculation based on emission factors from the data provider.
- Methanol [air, non-urban air or from high stacks]: 0.00022014 kg; lognormal variance with pedigree 0.0486, pedigree (2,1,4,1,1)
  Calculated value. Calculation based on emission factors from the data provider.
- Methyl ethyl ketone [air, non-urban air or from high stacks]: 2.0431e-6 kg; lognormal variance with pedigree 0.0486, pedigree (2,1,4,1,1)
  Calculated value. Calculation based on emission factors from the data provider.
- Molybdenum VI [air, non-urban air or from high stacks]: 1.8021e-8 kg; lognormal variance with pedigree 0.6586, pedigree (2,1,4,1,1)
  Calculated value. Calculation based on emission factors from the data provider.
- NMVOC, non-methane volatile organic compounds [air, non-urban air or from high stacks]: 9.2717e-5 kg; lognormal variance with pedigree 0.0486, pedigree (2,1,4,1,1)
  Calculated value. Calculation based on emission factors from the data provider.
- Nickel II [air, non-urban air or from high stacks]: 1.2389e-7 kg; lognormal variance with pedigree 0.6586, pedigree (2,1,4,1,1)
  Calculated value. Calculation based on emission factors from the data provider.
- Nitrogen oxides [air, non-urban air or from high stacks]: 0.0025889 kg; lognormal variance with pedigree 0.0486, pedigree (2,1,4,1,1)
  Calculated value. Calculation based on emission factors from the data provider.
- PAH, polycyclic aromatic hydrocarbons [air, non-urban air or from high stacks]: 7.0523e-7 kg; lognormal variance with pedigree 0.3906, pedigree (2,5,5,5,4)
  (same comment as for Acetic acid)
- Particulate Matter, < 2.5 um [air, non-urban air or from high stacks]: 0.000944 kg; lognormal variance with pedigree 0.3086, pedigree (2,1,4,1,1)
  Calculated value. Calculation based on emission factors from the data provider.
- Particulate Matter, > 10 um [air, non-urban air or from high stacks]: 2.6632e-5 kg; lognormal variance with pedigree 0.0486, pedigree (2,1,4,1,1)
  Calculated value. Calculation based on emission factors from the data provider.
- Particulate Matter, > 2.5 um and < 10um [air, non-urban air or from high stacks]: 1.5007e-5 kg; lognormal variance with pedigree 0.1286, pedigree (2,1,4,1,1)
  Calculated value. Calculation based on emission factors from the data provider.
- Pentachlorophenol [air, non-urban air or from high stacks]: 6.9975e-11 kg; lognormal variance with pedigree 0.1306, pedigree (2,5,5,5,4)
  (same comment as for Acetic acid)
- Pentane [air, non-urban air or from high stacks]: 4.9777e-7 kg; lognormal variance with pedigree 0.1306, pedigree (2,5,5,5,4)
  (same comment as for Acetic acid)
- Phenol [air, non-urban air or from high stacks]: 3.2527e-6 kg; lognormal variance with pedigree 0.0486, pedigree (2,1,4,1,1)
  Calculated value. Calculation based on emission factors from the data provider.
- Phosphorus [air, non-urban air or from high stacks]: 1.581e-6 kg; lognormal variance with pedigree 0.1306, pedigree (2,5,5,5,4)
  (same comment as for Acetic acid)
- Potassium I [air, non-urban air or from high stacks]: 0.00020215 kg; lognormal variance with pedigree 0.1306, pedigree (2,5,5,5,4)
  (same comment as for Acetic acid)
- Propanal [air, non-urban air or from high stacks]: 2.0699e-6 kg; lognormal variance with pedigree 0.2086, pedigree (2,5,5,1,5)
  (same comment as for Acetic acid)
- Propane [air, non-urban air or from high stacks]: 1.5047e-7 kg; lognormal variance with pedigree 0.1306, pedigree (2,5,5,5,4)
  (same comment as for Acetic acid)
- Propanol [air, non-urban air or from high stacks]: 4.9231e-10 kg; lognormal variance with pedigree 0.0486, pedigree (2,1,4,1,1)
  Calculated value. Calculation based on emission factors from the data provider.
- Propionic acid [air, non-urban air or from high stacks]: 8.2792e-9 kg; lognormal variance with pedigree 0.1306, pedigree (2,5,5,5,4)
  (same comment as for Acetic acid)
- Selenium IV [air, non-urban air or from high stacks]: 1.1896e-8 kg; lognormal variance with pedigree 0.6586, pedigree (2,1,4,1,1)
  Calculated value. Calculation based on emission factors from the data provider.
- Sodium I [air, non-urban air or from high stacks]: 1.292e-5 kg; lognormal variance with pedigree 0.1306, pedigree (2,5,5,5,4)
  (same comment as for Acetic acid)
- Sulfur dioxide [air, non-urban air or from high stacks]: 0.00021245 kg; lognormal variance with pedigree 0.0092, pedigree (2,1,4,1,1)
  Calculated value. Calculation based on emission factors from the data provider.
- Sulfuric acid [air, non-urban air or from high stacks]: 1.8828e-5 kg; lognormal variance with pedigree 0.0486, pedigree (2,1,4,1,1)
  Calculated value. Calculation based on emission factors from the data provider.
- Toluene [air, non-urban air or from high stacks]: 1.686e-6 kg; lognormal variance with pedigree 0.1306, pedigree (2,5,5,5,4)
  (same comment as for Acetic acid)
- Vanadium V [air, non-urban air or from high stacks]: 2.2525e-6 kg; lognormal variance with pedigree 0.6586, pedigree (2,1,4,1,1)
  Calculated value. Calculation based on emission factors from the data provider.
- Water [air, non-urban air or from high stacks]: 0.00699 m3; lognormal variance with pedigree 0.0086, pedigree (1,1,4,1,1)
  Calculated value with water balance.
- Zinc II [air, non-urban air or from high stacks]: 3.5417e-7 kg; lognormal variance with pedigree 0.6586, pedigree (2,1,4,1,1)
  Calculated value. Calculation based on emission factors from the data provider.
- m-Xylene [air, non-urban air or from high stacks]: 2.294e-6 kg; lognormal variance with pedigree 0.1306, pedigree (2,5,5,5,4)
  (same comment as for Acetic acid)
- 4-Methyl-2-pentanol [water, surface water]: 2.3783e-11 kg; lognormal variance with pedigree 0.3086, pedigree (2,1,4,1,1)
  Calculated value. Calculation based on emission factors from the data provider.
- AOX, Adsorbable Organic Halides [water, surface water]: 0.00029542 kg; lognormal variance with pedigree 0.048, pedigree (1,1,4,1,1)
  Measured value. From mills.
- BOD5, Biological Oxygen Demand [water, surface water]: 0.002224 kg; lognormal variance with pedigree 0.048, pedigree (1,1,4,1,1)
  Measured value. From mills.
- Benzene [water, surface water]: 2.0216e-9 kg; lognormal variance with pedigree 0.3086, pedigree (2,1,4,1,1)
  Calculated value. Calculation based on emission factors from the data provider.
- COD, Chemical Oxygen Demand [water, surface water]: 0.04055 kg; name CODAmount; lognormal variance with pedigree 0.048, pedigree (1,1,4,1,1)
  Measured value. From mills.
- DOC, Dissolved Organic Carbon [water, surface water]: 0.0150185 kg; = TOCAmount; lognormal variance with pedigree 0.008, pedigree (1,1,4,1,1)
  Calculated as equal to TOC, according to Ecoinvent Data Quality Guidelines.
  Uncertainty: Calculated variable. Uncertainty will be determined from propagation of uncertainty factors of underlying variables.
- Formaldehyde [water, surface water]: 3.5122e-6 kg; lognormal variance with pedigree 0.3086, pedigree (2,1,4,1,1)
  Measured value. From mills.
- Hydrogen sulfide [water, surface water]: 1.666e-5 kg; lognormal variance with pedigree 0.0486, pedigree (2,1,4,1,1)
  Measured value. From mills.
- Lead II [water, surface water]: 4.5022e-8 kg; lognormal variance with pedigree 0.6586, pedigree (2,1,4,1,1)
  Measured value. From mills.
- Magnesium [water, surface water]: 3.152e-5 kg; lognormal variance with pedigree 0.6586, pedigree (2,1,4,1,1)
  Measured value. From mills.
- Methanol [water, surface water]: 1.0252e-5 kg; lognormal variance with pedigree 0.3086, pedigree (2,1,4,1,1)
  Calculated value. Calculation based on emission factors from the data provider.
- Nitrogen [water, surface water]: 3.608e-6 kg; lognormal variance with pedigree 0.048, pedigree (1,1,4,1,1)
  Measured value. From mills.
- Phosphorus [water, surface water]: 0.00012066 kg; lognormal variance with pedigree 0.048, pedigree (1,1,4,1,1)
  Measured value. From mills.
- Suspended solids, unspecified [water, surface water]: 0.0032659 kg; lognormal variance with pedigree 0.048, pedigree (1,1,4,1,1)
  Measured value. From mills.
- TOC, Total Organic Carbon [water, surface water]: 0.0150185 kg; name TOCAmount; = CODAmount/2.7; lognormal variance with pedigree 0.008, pedigree (1,1,4,1,1)
  Calculated by default as TOC (gC) = COD/2.7 (COD measured in g O2), according to Ecoinvent Data Quality Guidelines. Should more correctly be calculated from the carbon content of the specified emissions to water.
  Uncertainty: Calculated variable. Uncertainty will be determined from propagation of uncertainty factors of underlying variables.
- Toluene [water, surface water]: 1.1178e-9 kg; lognormal variance with pedigree 0.3086, pedigree (2,1,4,1,1)
  Measured value. From mills.
- Water [water, surface water]: 0.067962 m3; lognormal variance with pedigree 0.048, pedigree (1,1,4,1,1)
  Measured value. From mills.
- Zinc II [water, surface water]: 4.5028e-6 kg; lognormal variance with pedigree 0.6586, pedigree (2,1,4,1,1)
  Measured value. From mills.

## Sampling procedure
Data collected from internal reports of the pulp mills.
