# cabbage white production

Dataset: EcoSpold 2, unit process
Geography: IN-MH
Time period: 2015-01-01 to 2023-12-31
Technology level: current
Classification: ISIC rev.4 ecoinvent: 0113:Growing of vegetables and melons, roots and tubers
Scenario: Business-as-Usual
System model: Allocation, cut-off by classification
Generated by: Sanjeevan Bajaj
Database: ecoinvent
isCopyrightProtected: true
accessRestrictedTo: 1

## General comment
This dataset represents the production of 1 kg of fresh White Cabbage during November, 2016- March, 2017 at a farm located in village Makhmalabad, District Nashik of Maharashtra. In this area, fields are irrigated with ground water using micro irrigation for surface irrigation. The farm has a yield of 55,000 kg fresh matter per ha for this crop cycle. Sowing date for the crop is 04-January, 2017 and harvesting date is 03-March, 2017. Mineral NPK fertilizer input is 6.3-68.70-52.5 kg/ha. Micro/macro nutrients applied are Zinc 0.08 kg/ha, Borax 0.12 kg/ha, Manganese sulfate 0.08 kg/ha, and sulfite 0.08 kg/ha. Organic fertilizer applied amounts to 25,000 kg of homemade compost. Only insecticide used has active ingredient as Chlorantranilipore 149.6g/ha, Dimethoate 1530g/ha, Emamectin Benzoate 42.5g/ha. Machinery is used for plant cultivation with fuel consumption of 4.99 kg/ha for pesticide spray and for Soil cultivation with fuel consumption of 9.98 kg/ha for soil tillage, plough and rotary cultivator.

## Included activities start
This activity starts about four weeks after the harvest of the previous crop. The soil is prepared for cultivation in November and sowing of seeds started about five weeks after soil preparation. Thereafter the crop is mature for harvesting in about 2 months.

## Included activities end
The activity ends with the harvesting of the mature White Cabbage from the plant

## Technology
Cultivation of White Cabbage follows conventional production standards

## Time period
Soil cultivating date for the main crop: 30-November, 2016; Harvesting date main crop: 03-March, 2017. The soil cultivation, sowing and harvesting dates are taken as the middle date of the week or fortnight told to the data collector by the farmer. Total time from date of sowing to date of harvesting comes to 62 days. The data is collected for one crop cycle. The cycle of one year is considered for entry in ecoeditor.

## Parameters
- LUC_crop_specific: 1 dimensionless
  This parameter allows to switch between a "crop specific" and a "country specific" approach when calculating the LUC of a crop. By default, the chosen approach is "crop specific", so the value of the parameter is 1. If you want to apply a "country specific" approach, turn the parameter to 0.

## Reference product
- cabbage white: 1 kg; By-product classification allocatable product; CPC 01212: Cabbages; HS2017 070490: Vegetables, brassica; edible, n.e.c. in heading no. 0704, fresh or chilled
  production volume 1.7921e8 kg; = 179.21*1000*1000
    http://agriexchange.apeda.gov.in/India%20Production/India_Productions.aspx?hscode=1071 The value was given in thousand tonnes for the year 2015-16. Figure taken is for the State of Maharashtra which is representative of production in Southern and Western regions of the country.
  property price 0.719 EUR2005
    Calculated from the trade statistics for the year 2005 published by the UN (COMTRADE database, accessed 20151105) as an average of 5 biggest importers of cabbage in the world; UK, DE, CA, USA and JP. Comtrade cathegory: 704: Cabbage, cauliflower, kohlrabi & kale, fresh, chilled.
  properties: carbon allocation 0 kg, carbon content 0

## Inputs from technosphere
- [sulfonyl]urea-compound: 7.72727e-7 kg; lognormal variance with pedigree 0.0052, pedigree (2,4,3,1,1)
  The data was collected for a hectare area through interview
  properties: carbon content, fossil 0.540853, dry mass 1 kg, wet mass 1 kg
- application of plant protection product, by field sprayer: 5.15496e-5 ha; lognormal variance with pedigree 0.0052, pedigree (2,4,3,1,1)
  The data was collected for a hectare area through interview
- borax, anhydrous, powder: 2.18182e-6 kg; lognormal variance with pedigree 0.0052, pedigree (2,4,3,1,1)
  The data was collected for a hectare area through interview
  properties: dry mass 1 kg, wet mass 1 kg
- compost: 0.454545 kg; lognormal variance with pedigree 0.0052, pedigree (2,4,3,1,1)
  The data was collected for a hectare area through interview
  property cadmium content 3.6e-7; name Cd_content
  property chromium content 2.23e-5; name Cr_content
  property copper content 5.77e-5; name Cu_content
  property dry mass 0.5 kg; name DM
  property lead content 4.9e-5; name Pb_content
  property mercury content 1.2e-7; name Hg_content
  property nickel content 1.63e-5; name Ni_content
  property nitrogen content 0.014; name N_content
  property phosphorus content 0.0035; name P_content
  property potassium content 0.01; name K_content
  property zinc content 0.000184; name Zn_content
  properties: carbon content, non-fossil 0.183645, water content 1, wet mass 1 kg
- cyclic N-compound: 2.72e-6 kg; lognormal variance with pedigree 0.0052, pedigree (2,4,3,1,1)
  The data was collected for a hectare area through interview
  properties: carbon content, fossil 0.641962, dry mass 1 kg, wet mass 1 kg
- inorganic nitrogen fertiliser, as N: 0.000114545 kg; lognormal variance with pedigree 0.0052, pedigree (2,4,3,1,1)
  The data was collected for a hectare area through interview
  properties: dry mass 1 kg, wet mass 1 kg
- inorganic phosphorus fertiliser, as P2O5: 0.000662018 kg; lognormal variance with pedigree 0.0052, pedigree (2,4,3,1,1)
  This exchange is an aggregation of amounts:
  1.061727272727273E-4. Comment:
  5.558454545454546E-4. Comment:
  properties: dry mass 1 kg, wet mass 1 kg
- irrigation: 0.168955 m3; lognormal variance with pedigree 0.0052, pedigree (2,4,3,1,1)
  The data was collected for a hectare area through interview
  properties: dry mass 0.11 kg, water content 9089.91, wet mass 1000 kg
- land use change, annual crop: 2.89508e-6 ha; = (0.15922935592528334 * LUC_crop_specific + 0.025665138215835298 * (1-LUC_crop_specific))/55000
  Calculated Value. This value has been calculated by using the ecoinvent LCI calculation tool for crop production.
- manganese sulfate: 1.45455e-6 kg; lognormal variance with pedigree 0.0052, pedigree (2,4,3,1,1)
  The data was collected for a hectare area through interview
  property molecular weight 0 g/mol; name manganese_sulfate_output_MW
  properties: dry mass 1 kg, wet mass 1 kg
- organophosphorus-compound, unspecified: 2.78182e-5 kg; lognormal variance with pedigree 0.0052, pedigree (2,4,3,1,1)
  The data was collected for a hectare area through interview
  properties: carbon content, fossil 0.260898, dry mass 1 kg, wet mass 1 kg
- packaging, for fertilisers: 0.00463636 kg; lognormal variance with pedigree 0.0532, pedigree (4,3,3,5,4)
  Total amount of active substance/s of fertilisers needed for the production of 'cabbage white' is calculated to be circa 2.32E-03 kg. Fertiliser/s used in this dataset is/are: 'nitrogen fertiliser, as N', 'phosphate fertiliser, as P2O5', 'phosphate rock, as P2O5, beneficiated, dry', 'potassium chloride, as K2O', 'potassium sulfate, as K2O'. The total amount of active substance/s is doubled in order to account for the packaging of the dilluted product of fertiliser/s that is/are applied. Therefore, 4.64E-03 kg of packaging for fertilisers is justified with this exchange.
  properties: carbon content, fossil 0.825301, dry mass 1 kg, heating value, net 25.01 MJ, price 0.0642 EUR2005, wet mass 1 kg
  note on carbon content, fossil: Considering a chemical formula (C2H4)n for polyethylene, carbon content-fossil is calculated to be 0.856286 kg of Carbon per kg of dry mass.
- packaging, for pesticides: 8.04742e-5 kg; lognormal variance with pedigree 0.0532, pedigree (4,3,3,5,4)
  Total amount of active substance/s of pesticides needed for the production of cabbage white is calculated to be circa 4.02E-05 kg. Pesticide/s used in this dataset is/are: '[sulfonyl]urea-compound', 'borax, anhydrous, powder', 'cyclic N-compound', 'manganese sulfate', 'organophosphorus-compound, unspecified', 'sulfite', 'zinc monosulfate'. The total amount of active substance/s is doubled in order to account for the packaging of the dilluted product of pesticide/s that is/are applied. Therefore, 8.05E-05 kg of packaging for pesticides is justified with this exchange.
  properties: carbon content, fossil 0.85714, dry mass 1 kg, heating value, net 25.97 MJ, price 0.0642 EUR2005, wet mass 1 kg
- phosphate rock, beneficiated: 0.0018346 kg; lognormal variance with pedigree 0.0052, pedigree (2,4,3,1,1)
  The exchange has been updated from 'phosphate rock, as P2O5, beneficiated, dry' into 'phosphate rock, beneficiated' and therefore its amount has been scaled (multiplied) from 0.0006 kg by 3.125 kg of 'phosphate rock, beneficiated' per kg of 'phosphate rock, as P2O5, beneficiated, dry'. Original comment of the exchange is: The data was collected for a hectare area through interview
  properties: dry mass 1 kg, wet mass 1 kg
- polyethylene, high density, granulate: 0.00325 kg; lognormal variance with pedigree 0.0052, pedigree (2,4,3,1,1)
  The data was collected for a hectare area through interview
  properties: carbon content, fossil 0.857143, dry mass 1 kg, heating value, net 42.47 MJ, wet mass 1 kg
  note on carbon content, fossil: Polyethylene is formed out of a huge amount of ethylene monomers (C2H4) (ecoinvent v2.2 report 11_II). MW=28 g/mol
- potassium chloride: 0.000604379 kg; lognormal variance with pedigree 0.0052, pedigree (2,4,3,1,1)
  The exchange has been updated from 'potassium chloride, as K2O' into 'potassium chloride' and therefore its amount has been scaled (multiplied) from 0.0004 kg by 1.5829 kg of 'potassium chloride' per kg of 'potassium chloride, as K2O'. Original comment of the exchange is: The data was collected for a hectare area through interview
  properties: dry mass 1 kg, wet mass 1 kg
- potassium sulfate: 0.00105952 kg; lognormal variance with pedigree 0.0052, pedigree (2,4,3,1,1)
  The exchange has been updated from 'potassium sulfate, as K2O' into 'potassium sulfate' and therefore its amount has been scaled (multiplied) from 0.0006 kg by 1.85 kg of 'potassium sulfate' per kg of 'potassium sulfate, as K2O'. Original comment of the exchange is: The data was collected for a hectare area through interview
  properties: dry mass 1 kg, wet mass 1 kg
- sulfite: 1.45455e-6 kg; lognormal variance with pedigree 0.0052, pedigree (2,4,3,1,1)
  The data was collected for a hectare area through interview
  properties: dry mass 1 kg, wet mass 1 kg
- tillage, ploughing: 3.47962e-6 ha; lognormal variance with pedigree 0.0052, pedigree (2,4,3,1,1)
  The data was collected for a hectare area through interview
- tillage, rotary cultivator: 6.44101e-6 ha; lognormal variance with pedigree 0.0052, pedigree (2,4,3,1,1)
  The data was collected for a hectare area through interview
- zinc monosulfate: 3.83527e-6 kg; lognormal variance with pedigree 0.0052, pedigree (2,4,3,1,1)
  The data was collected for a hectare area through interview
  properties: dry mass 1 kg, wet mass 1 kg

## Inputs from nature
- Carbon dioxide, in air [natural resource, in air]: 0.234508 kg; lognormal variance with pedigree 0.0052, pedigree (2,4,3,1,1)
  (same comment as for land use change, annual crop)
- Energy, gross calorific value, in biomass [natural resource, biotic]: 2.717 MJ; lognormal variance with pedigree 0.0052, pedigree (2,4,3,1,1)
  (same comment as for land use change, annual crop)
- Occupation, annual crop, irrigated [natural resource, land]: 0.0606061 m2*year; lognormal variance with pedigree 0.0066, pedigree (2,4,3,1,1)
  (same comment as for land use change, annual crop)
- Transformation, from annual crop, irrigated [natural resource, land]: 0.181818 m2; lognormal variance with pedigree 0.0126, pedigree (2,4,3,1,1)
  (same comment as for land use change, annual crop)
- Transformation, to annual crop, irrigated [natural resource, land]: 0.181818 m2; lognormal variance with pedigree 0.0126, pedigree (2,4,3,1,1)
  (same comment as for land use change, annual crop)

## Emissions to nature
- Ammonia [air, non-urban air or from high stacks]: 0.000278309 kg; lognormal variance with pedigree 0.0126, pedigree (2,4,3,1,1)
  (same comment as for land use change, annual crop)
- Dinitrogen monoxide [air, non-urban air or from high stacks]: 0.000111788 kg; lognormal variance with pedigree 0.0346, pedigree (2,4,3,1,1)
  (same comment as for land use change, annual crop)
- Nitrogen oxides [air, non-urban air or from high stacks]: 0.00020216 kg; lognormal variance with pedigree 0.0446, pedigree (2,4,3,1,1)
  (same comment as for land use change, annual crop)
- Water [air, non-urban air or from high stacks]: 0.0861668 m3; lognormal variance with pedigree 0.0052, pedigree (2,4,3,1,1)
  (same comment as for land use change, annual crop)
- Cadmium II [soil, agricultural]: 1.93864e-7 kg; lognormal variance with pedigree 0.0446, pedigree (2,4,3,1,1)
  (same comment as for land use change, annual crop)
- Chromium III [soil, agricultural]: 5.38345e-6 kg; lognormal variance with pedigree 0.0446, pedigree (2,4,3,1,1)
  (same comment as for land use change, annual crop)
- Clothianidin [soil, agricultural]: 2.72e-6 kg; lognormal variance with pedigree 0.0376, pedigree (2,4,3,1,1)
  (same comment as for land use change, annual crop)
- Copper ion [soil, agricultural]: 1.63077e-5 kg; lognormal variance with pedigree 0.0446, pedigree (2,4,3,1,1)
  (same comment as for land use change, annual crop)
- Diflubenzuron [soil, agricultural]: 7.72727e-7 kg; lognormal variance with pedigree 0.0376, pedigree (2,4,3,1,1)
  (same comment as for land use change, annual crop)
- Dimethoate [soil, agricultural]: 2.78182e-5 kg; lognormal variance with pedigree 0.0376, pedigree (2,4,3,1,1)
  (same comment as for land use change, annual crop)
- Lead II [soil, agricultural]: 1.23658e-5 kg; lognormal variance with pedigree 0.0446, pedigree (2,4,3,1,1)
  (same comment as for land use change, annual crop)
- Mercury II [soil, agricultural]: 4.9866e-8 kg; lognormal variance with pedigree 0.0446, pedigree (2,4,3,1,1)
  (same comment as for land use change, annual crop)
- Nickel II [soil, agricultural]: 3.86752e-6 kg; lognormal variance with pedigree 0.0446, pedigree (2,4,3,1,1)
  (same comment as for land use change, annual crop)
- Zinc II [soil, agricultural]: 5.96575e-5 kg; lognormal variance with pedigree 0.0446, pedigree (2,4,3,1,1)
  (same comment as for land use change, annual crop)
- Cadmium II [water, ground-]: 2.97169e-10 kg; lognormal variance with pedigree 0.0946, pedigree (2,4,3,1,1)
  (same comment as for land use change, annual crop)
- Cadmium II [water, surface water]: 6.61189e-9 kg; lognormal variance with pedigree 0.0946, pedigree (2,4,3,1,1)
  (same comment as for land use change, annual crop)
- Chromium III [water, ground-]: 1.28026e-7 kg; lognormal variance with pedigree 0.0946, pedigree (2,4,3,1,1)
  (same comment as for land use change, annual crop)
- Chromium III [water, surface water]: 5.90856e-7 kg; lognormal variance with pedigree 0.0946, pedigree (2,4,3,1,1)
  (same comment as for land use change, annual crop)
- Copper ion [water, ground-]: 2.18004e-8 kg; lognormal variance with pedigree 0.0946, pedigree (2,4,3,1,1)
  (same comment as for land use change, annual crop)
- Copper ion [water, surface water]: 8.60207e-7 kg; lognormal variance with pedigree 0.0946, pedigree (2,4,3,1,1)
  (same comment as for land use change, annual crop)
- Lead II [water, ground-]: 3.60512e-9 kg; lognormal variance with pedigree 0.0946, pedigree (2,4,3,1,1)
  (same comment as for land use change, annual crop)
- Lead II [water, surface water]: 5.42153e-7 kg; lognormal variance with pedigree 0.0946, pedigree (2,4,3,1,1)
  (same comment as for land use change, annual crop)
- Mercury II [water, ground-]: 7.83632e-12 kg; lognormal variance with pedigree 0.0946, pedigree (2,4,3,1,1)
  (same comment as for land use change, annual crop)
- Mercury II [water, surface water]: 1.68195e-9 kg; lognormal variance with pedigree 0.0946, pedigree (2,4,3,1,1)
  (same comment as for land use change, annual crop)
- Nickel II [water, surface water]: 5.40709e-7 kg; lognormal variance with pedigree 0.0946, pedigree (2,4,3,1,1)
  (same comment as for land use change, annual crop)
- Nitrate [water, ground-]: 0.00150875 kg; lognormal variance with pedigree 0.0446, pedigree (2,4,3,1,1)
  (same comment as for land use change, annual crop)
- Phosphate [water, ground-]: 1.30081e-6 kg; lognormal variance with pedigree 0.0446, pedigree (2,4,3,1,1)
  (same comment as for land use change, annual crop)
- Phosphate [water, surface water]: 3.81055e-6 kg; lognormal variance with pedigree 0.0446, pedigree (2,4,3,1,1)
  (same comment as for land use change, annual crop)
- Phosphorus [water, surface water]: 4.51241e-5 kg; lognormal variance with pedigree 0.0446, pedigree (2,4,3,1,1)
  (same comment as for land use change, annual crop)
- Water [water, ground-]: 0.0658923 m3; lognormal variance with pedigree 0.0052, pedigree (2,4,3,1,1)
  (same comment as for land use change, annual crop)
- Water [water, surface water]: 0.0168955 m3; lognormal variance with pedigree 0.0052, pedigree (2,4,3,1,1)
  (same comment as for land use change, annual crop)
- Zinc II [water, ground-]: 1.98332e-7 kg; lognormal variance with pedigree 0.0946, pedigree (2,4,3,1,1)
  (same comment as for land use change, annual crop)
- Zinc II [water, surface water]: 1.52669e-6 kg; lognormal variance with pedigree 0.0946, pedigree (2,4,3,1,1)
  (same comment as for land use change, annual crop)

## Sampling procedure
The farmer was identified and contacted by agriculture science faculty through agriculture consultant familiar with the local farmers in the region. Data was collected directly from the farmer through semi-structured interview using a questionnaire based on the input requirements of the ecoinvent LCI calculation tool for crop production. The farmer has provided the data from recent memory and the same is supplemented with information collected from farming community of the area.

## Extrapolations
Ecoinvent LCI calculation tool for crop production was used to calculate field emissions from the cultivation process
