# sulfate pulp production, from eucalyptus, bleached

Dataset: EcoSpold 2, unit process
Geography: RER
Time period: 2020-01-01 to 2023-12-31
Technology level: current
Classification: ISIC rev.4 ecoinvent: 1701:Manufacture of pulp, paper and paperboard
Synonyms: kraft pulp; Kraftzellstoff
Scenario: Business-as-Usual
System model: Allocation, cut-off by classification
Share of production covered: 100 %
Generated by: AISBL
Database: ecoinvent
isCopyrightProtected: true
accessRestrictedTo: 1

## General comment
This dataset represents an aggregation of the European production of Elemental Chlorine Free (ECF) and Totally Chlorine Free (TCF) kraft pulp, obtained eucalyptus wood in 2020. Industry data was used which was provided by the European Pulp Industry Sector (EPIS). The used values are a weighted average of all corresponding pulp mills. The represented technology is considered state of the art for a European average.
PULP is a wood-based raw material to make different paper, board and other products. The pulp, or fibers from the wood are separated in a kraft cooking process in a so-called fiber line. In a recovery line, the chemicals used in the cooking process are recovered to be used again and energy is produced. The third process is effluent treatment where gaseous and liquid discharges to the environment are continuously minimized and monitored.
MAIN END USES FOR MARKET PULP • Tissue (toilet paper) • Graphic papers • Specialty products • Packaging • Fluff pulp • Viscose • CMC etc.
PRODUCTS GENERATED IN THE PULPING PROCESS include electricity
CAPACITIES World’s total market capacities for softwood kraft pulp, hardwood kraft pulp, and eucalyptus kraft pulp were 28.9 million tons, 15 million tons, and 26.2 million tons, respectively.
SPECIES Softwood pulp is made from coniferous trees, most typically from different species of pine and spruce. Hardwood pulp is made from non-coniferous trees, in Nordic countries primarily of birch. Eucalyptus hardwood pulp is made exclusively of eucalyptus species.
CHARACTERISTICS Softwood fibers are long and slender and are used to give the paper and board products their strength properties. Hardwood fibers are short and can be rounder and their number per gram of pulp is much larger; they give the end product its smoothness, softness and optical properties like opacity (that you cannot see through the paper).

## Included activities start
This activity starts with the transport of pulpwood to the pulp factory. The pulpwood input has an activity links to the supplying activity and is therefore not supplied via market dataset

## Included activities end
The process includes transports to the pulp mill, wood handling, chemical pulping and bleaching, drying process, energy production on-site, recovery cycles of chemicals and internal waste water treatment. The following air emissions were reported in the study: CO2 (fossil and biogenic), CO, SOx (as SO2), NOx, TRS (as S), SO2 (reported as S), and Dust (unspecified). Next to these key emissions, additional emissions from on-site energy production from external and internal fuels were calculated, using emission profiles from ecoinvent combustion processes. Internal biogenic fuels are represented by the calculated emissions but do not have the corresponding fuel input from technosphere, because they are supplied from within the system boundaries. The amounts of internal fuels used in the process are: Bark (8.85E+02 MJ/t), -Black liquor (1.33E+04 MJ/t), Sludge (2.70E+01 MJ/t), and Methanol (2.25E+02 MJ/t). Black liquor and sludge were not included in the emissions calculations because no specific emission profiles, e.g. for the black liquor recovery process, were available. Emissions from these internal energy generation processes are therefore only reflected in the key emission factors provided by the industry, other emissions constitute a data gap. The activity ends when the kraft pulp is ready to be sold.

## Geography
Representing Europe (Portugal and Spain)

## Technology
Average European technology in 2020 of kraft pulp production of ECF and TCF pulp

## Time period
Data gathered in 2021 and represents data of 2020 values. Recent technology valid for the upcoming years.

## Reference product
- electricity, high voltage: 1 kWh; name a_electricity; By-product classification allocatable product; CPC 17100: Electrical energy; HS2017 271600: Electrical energy
  Data provided by industry (EPIS) 2020
  production volume 1.27397e9 kWh; = a_electricity*APV_RP
    Calculated from production volume of reference product using the relative outputs.
  property price 0.0977 EUR2005
    Temporary price data. Calculated as 90% of purchasers price based on: 94% of the average price (to account for a 6% loss in transformation and transmission) for electricity for industrial consumersin 2005 (excluded taxes). From IEA.
  property true value relation 3.6; name a_electricity_true_value_relation
    property to calculate "true value" from
  properties: allocation factor 0.120047, carbon allocation 0 kg, carbon content 0, exergy 3.6 MJ, true value 0.403431

## Inputs from technosphere
- aluminium scrap, post-consumer: -1.5998e-5 kg; name a_al_scrap; lognormal variance with pedigree 0.0007, pedigree (1,2,1,1,1)
  Data provided by industry (EPIS) 2020. Represents 9.5 % of the total metal waste.
  production volume; = a_al_scrap*APV_RP
    Calculated from production volume of reference product using the relative outputs.
  properties: dry mass 1 kg, price 0.685 EUR2005, wet mass 1 kg
- aluminium sulfate, powder: 3.63324e-5 kg; lognormal variance with pedigree 0.0009, pedigree (1,2,2,1,1)
  Data provided by industry (EPIS) 2020
  properties: dry mass 1 kg, wet mass 1 kg
- bark chips, wet, measured as dry mass: 0.0263271, 0.000361167 kg (2 suppliers, which the file names only by identifier); sum of these 0.0266883 kg; lognormal variance with pedigree 0.0095, pedigree (2,2,2,1,3)
  Data provided by industry (EPIS) 2020, indicated in energy content and given as 1.4988 MJ/kg. Calculation into mass/volume was done by using the following conversion factor: Bark: MJ/kg 13.6
  properties: carbon content, non-fossil 0.494, dry mass 1 kg, heating value, net 4.81 MJ, water content 1.4, wet mass 2.4 kg
- calcium carbonate, precipitated: 0.00108749 kg; lognormal variance with pedigree 0.0009, pedigree (1,2,2,1,1)
  Data provided by industry (EPIS) 2020
  properties: carbon content, fossil 0.120005, dry mass 1 kg, wet mass 1 kg
- chemical, organic: 9.57916e-5 kg; lognormal variance with pedigree 0.002, pedigree (2,3,2,1,1)
  Data provided by industry (EPIS) 2020. Represents Antifoam
  properties: carbon content, fossil 0.628, dry mass 1 kg, heating value, net 19.03 MJ, wet mass 1 kg
- chlorine dioxide: 0.00175921 kg; lognormal variance with pedigree 0.0009, pedigree (1,2,2,1,1)
  Data provided by industry (EPIS) 2020
  properties: dry mass 1 kg, wet mass 1 kg
- coke: 0.0171744 MJ; lognormal variance with pedigree 0.0095, pedigree (2,2,2,1,3)
  Data provided by industry (EPIS) 2020, indicated in energy content and given as 0.07092 MJ/kg.
  properties: carbon content, fossil 0.869149, dry mass 0.0328671 kg, heating value, net 28.6 MJ, water content 0.0638298, wet mass 0.034965 kg
- copper scrap, sorted, pressed: -1.684e-6 kg; name a_cu_scrap; lognormal variance with pedigree 0.0007, pedigree (1,2,1,1,1)
  Data provided by industry (EPIS) 2020. Represents 1 % of the total metal waste.
  production volume; = a_cu_scrap*APV_RP
    Calculated from production volume of reference product using the relative outputs.
  properties: dry mass 1 kg, price 2.84 EUR2005, wet mass 1 kg
- diesel: 3.30777e-7 kg; lognormal variance with pedigree 0.0095, pedigree (2,2,2,1,3)
  Data provided by industry (EPIS) 2020, indicated in energy content and given as 0.000058 MJ/kg. Calculation into mass/volume was done by using the following conversion factor: Diesel MJ/kg 42.8. Based on literature, page 16, Report6, part 4. Source: https://ecoinvent.org/wp-content/uploads/2021/09/LHV_fuels.xlsx
  properties: carbon content, fossil 0.865, dry mass 1 kg, heating value, net 42.8 MJ, wet mass 1 kg
- electricity, high voltage: 0.0719978 kWh; lognormal variance with pedigree 0.0009, pedigree (1,2,2,1,1)
  Data provided by industry (EPIS) 2020
- electronics scrap: -1.4438e-8 kg; name a_electronic_scrap; lognormal variance with pedigree 0.0007, pedigree (1,2,1,1,1)
  Data provided by industry (EPIS) 2020. Represents electric batteries
  production volume; = a_electronic_scrap*APV_RP
    Calculated from production volume of reference product using the relative outputs.
  properties: carbon content, fossil 0.317311, carbon content, non-fossil 0.004557, dry mass 1 kg, price 16.1 EUR2005, wet mass 1 kg
- green liquor dregs: -0.00670094 kg; name a_dregs; lognormal variance with pedigree 0.0007, pedigree (1,2,1,1,1)
  Data provided by industry (EPIS) 2020
  production volume; = a_dregs*APV_RP
    Calculated from production volume of reference product using the relative outputs.
  properties: carbon content, non-fossil 0.390667, dry mass 0.75 kg, water content 0.333333, wet mass 1 kg
- hazardous waste, for incineration: -4.9499e-5, -1.29387e-6 kg (2 suppliers, which the file names only by identifier); sum of these -5.07929e-5 kg; lognormal variance with pedigree 0.0007, pedigree (1,2,1,1,1)
  Data provided by industry (EPIS) 2020
  production volume; = a_hazardous_waste*APV_RP
    Calculated from production volume of reference product using the relative outputs.
  properties: carbon content, fossil 0.554667, dry mass 0.75 kg, heating value, net 17 MJ, water content 0.333333, wet mass 1 kg
- heavy fuel oil: 0.000526157 kg; lognormal variance with pedigree 0.0095, pedigree (2,2,2,1,3)
  Data provided by industry (EPIS) 2020, indicated in energy content and given as 0.0895 MJ/kg. Calculation into mass/volume was done by using the following conversion factor: Heavy fuel oil: MJ/kg 41.2. Based on literature, page 21, Report6, part 4. Source: https://ecoinvent.org/wp-content/uploads/2021/09/LHV_fuels.xlsx
  properties: carbon content, fossil 0.849, dry mass 1 kg, heating value, net 41.2 MJ, wet mass 1 kg
- hydrogen peroxide, without water, in 50% solution state: 0.00371276 kg; lognormal variance with pedigree 0.0009, pedigree (1,2,2,1,1)
  Data provided by industry (EPIS) 2020
  properties: dry mass 1 kg, heating value, net 7.13 MJ, wet mass 1 kg
- iron scrap, unsorted: -0.000150718 kg; name a_iron_scrap; lognormal variance with pedigree 0.0007, pedigree (1,2,1,1,1)
  Data provided by industry (EPIS) 2020. Represents 89.5 % of the total metal waste.
  production volume; = a_iron_scrap*APV_RP
    Calculated from production volume of reference product using the relative outputs.
  properties: dry mass 1 kg, price 0.149 EUR2005, wet mass 1 kg
- light fuel oil: 0.00356594 kg; lognormal variance with pedigree 0.0095, pedigree (2,2,2,1,3)
  Data provided by industry (EPIS) 2020, indicated in energy content and given as 0.6273 MJ/kg. Calculation into mass/volume was done by using the following conversion factor: Light fuel oil: MJ/kg 42.6 Based on literature, page 18, Report6, part 4. Source: https://ecoinvent.org/wp-content/uploads/2021/09/LHV_fuels.xlsx
  properties: carbon content, fossil 0.862, dry mass 1 kg, heating value, net 42.6 MJ, wet mass 1 kg
- limestone residue: -0.00425415 kg; name a_limestone_residues; lognormal variance with pedigree 0.0007, pedigree (1,2,1,1,1)
  Data provided by industry (EPIS) 2020; including lime kiln ash and lime mud
  production volume; = a_limestone_residues*APV_RP
    Calculated from production volume of reference product using the relative outputs.
  properties: carbon content, fossil 0.0119726, dry mass 0.995 kg, water content 0.00502513, wet mass 1 kg
  note on carbon content, fossil: Calculated based on the carbon content of the input “calcium carbonate, precipitated”
- magnesium sulfate: 0.000251976 kg; lognormal variance with pedigree 0.0009, pedigree (1,2,2,1,1)
  Data provided by industry (EPIS) 2020
  properties: dry mass 1 kg, wet mass 1 kg
- malusil: 4.20273e-6 kg; lognormal variance with pedigree 0.0009, pedigree (1,2,2,1,1)
  Data provided by industry (EPIS) 2020. Represents Talc.
  properties: dry mass 1 kg, wet mass 1 kg
- municipal solid waste: -0.000234743 kg; name a_msw; lognormal variance with pedigree 0.0007, pedigree (1,2,1,1,1)
  Data provided by industry (EPIS) 2020. Represents domestic waste and waste classified as "other"
  production volume; = a_msw*APV_RP
    Calculated from production volume of reference product using the relative outputs.
  properties: carbon content, fossil 0.171549, carbon content, non-fossil 0.261655, dry mass 0.771 kg, heating value, net 11.74 MJ, water content 0.297017, wet mass 1 kg
- natural gas, high pressure: 4.60968e-5, 0.00661123 m3 (2 suppliers, which the file names only by identifier); sum of these 0.00665733 m3; lognormal variance with pedigree 0.0095, pedigree (2,2,2,1,3)
  Data provided by industry (EPIS) 2020, indicated in energy content and given as 1.072 MJ/kg. Calculation into mass/volume was done by using the following conversion factor: Natural gas: MJ/m3 39. Literature value, Source: United Nations Statistics Division (2018) International Recommendations for Energy Statistics (IRES). Available at: http://unstats.un.org/unsd/statcom/doc11/BG-IRES.pdf.
  properties: carbon content, fossil 0.75, dry mass 0.84 kg, heating value, net 36 MJ, wet mass 0.84 kg
  note on heating value, net: Literature value, Source: Christoph Meili;Niels Jungbluth;Maresa Bussa (2021) Life cycle inventories of crude oil and natural gas extraction. ESU-services Ltd. commissioned by BAFU & VSG, Schaffhausen, Switzerland, http://esu-services.ch/data/public-lci-reports/
- oxygen, liquid: 0.00529502 kg; lognormal variance with pedigree 0.0009, pedigree (1,2,2,1,1)
  Data provided by industry (EPIS) 2020
  properties: dry mass 1 kg, wet mass 1 kg
- propane: 5.68241e-6 kg; lognormal variance with pedigree 0.0095, pedigree (2,2,2,1,3)
  Data provided by industry (EPIS) 2020, indicated in energy content and given as 0.001089 MJ/kg. Calculation into mass/volume was done by using the following conversion factor: Light fuel oil: MJ/kg 46.4 . The LHV represents an indicative value. Reference: Fuels - Higher and Lower Calorific Values, available at: https://www.engineeringtoolbox.com/fuels-higher-calorific-values-d_169.html
  properties: carbon content, fossil 0.817139, dry mass 1 kg, heating value, net 46.4 MJ, wet mass 1 kg
- pulp factory: 1.16001e-11 unit; lognormal variance with pedigree 0.3023, pedigree (3,2,2,1,1)
  Own estimation with yearly production volume and a lifetime of a factory of 50 years
- quicklime, milled, loose: 0.00286951 kg; lognormal variance with pedigree 0.0009, pedigree (1,2,2,1,1)
  Data provided by industry (EPIS) 2020. Calcium oxide (CaO)
  properties: dry mass 0.99 kg, water content 0.010101, wet mass 1 kg
- sawlog and veneer log, eucalyptus ssp., measured as solid wood under bark: 0.000644074 m3; lognormal variance with pedigree 0.0029, pedigree (3,2,2,1,1)
  This value represents a calculated value, i.e., it is not based on EPIS (2020) data. There was found to be an imbalance in carbon and therefore this value had to be recalculated to close the balance. The original amounts reported by EPIS (2020) is given as 1.492 kg dry/kg. This input approximates eucalyptus from Europe.
  properties: carbon content, non-fossil 0.494, dry mass 645.246 kg, heating value, net 11336.5 MJ, water content 0.5, wet mass 967.869 kg
- sludge from pulp and paper production: -0.00364838, -2.69804e-6 kg (2 suppliers, which the file names only by identifier); sum of these -0.00365108 kg; lognormal variance with pedigree 0.0007, pedigree (1,2,1,1,1)
  Data provided by industry (EPIS) 2020. Represents fibre (primary sludge)
  production volume; = a_sludge*APV_RP
    Calculated from production volume of reference product using the relative outputs.
  properties: carbon content, non-fossil 0.21, dry mass 0.75 kg, heating value, net 2.65 MJ, water content 0.333333, wet mass 1 kg
- sodium chlorate, powder: 0.00304438 kg; lognormal variance with pedigree 0.0009, pedigree (1,2,2,1,1)
  Data provided by industry (EPIS) 2020
  properties: dry mass 1 kg, wet mass 1 kg
- sodium hydrogen sulfite: 6.37094e-5 kg; lognormal variance with pedigree 0.0009, pedigree (1,2,2,1,1)
  Data provided by industry (EPIS) 2020. Representing Sodium Bisulfite (NaHSO3).
  properties: dry mass 1 kg, wet mass 1 kg
- sodium hydroxide, without water, in 50% solution state: 0.00683464 kg; lognormal variance with pedigree 0.0009, pedigree (1,2,2,1,1)
  Data provided by industry (EPIS) 2020
  properties: dry mass 1 kg, heating value, net 3.03 MJ, wet mass 1 kg
- sodium hypochlorite, without water, in 15% solution state: 4.1046e-5 kg; lognormal variance with pedigree 0.0009, pedigree (1,2,2,1,1)
  Data provided by industry (EPIS) 2020
  properties: dry mass 1 kg, wet mass 1 kg
- sodium sulfate, anhydrite: 0.00150377 kg; lognormal variance with pedigree 0.0009, pedigree (1,2,2,1,1)
  Data provided by industry (EPIS) 2020
  properties: dry mass 1 kg, wet mass 1 kg
- sulfuric acid: 0.00656461 kg; lognormal variance with pedigree 0.0009, pedigree (1,2,2,1,1)
  Data provided by industry (EPIS) 2020
  properties: dry mass 1 kg, wet mass 1 kg
- tap water: 0.00385014 kg; lognormal variance with pedigree 0.0009, pedigree (1,2,2,1,1)
  Data provided by industry (EPIS) 2020. Represents Municipal water supply.
  properties: carbon content, fossil 0.00178991, dry mass 0.000337476 kg, water content 2962.17, wet mass 1 kg
- transport, freight, inland waterways, barge: 0.250152 metric ton*km; lognormal variance with pedigree 0.0009, pedigree (1,2,2,1,1)
  Data provided by industry (EPIS) 2020. Represents transport eucalyptus.
- transport, freight, lorry >32 metric ton, EURO5: 0.086038 metric ton*km; lognormal variance with pedigree 0.0009, pedigree (1,2,2,1,1)
  Data provided by industry (EPIS) 2020. Represents transport eucalyptus.
- waste mineral oil: -3.63489e-8, -1.46829e-6 kg (2 suppliers, which the file names only by identifier); sum of these -1.50463e-6 kg; lognormal variance with pedigree 0.0007, pedigree (1,2,1,1,1)
  Data provided by industry (EPIS) 2020. Represents lubricants residues and lubricant wastes.
  production volume; = a_waste_mineral_oil*APV_RP
    Calculated from production volume of reference product using the relative outputs.
  properties: carbon content, fossil 0.864444, dry mass 0.9 kg, heating value, net 34.7 MJ, water content 0.111111, wet mass 1 kg
- waste packaging paper: -9.33267e-6 kg; name a_packaging_paper; lognormal variance with pedigree 0.0007, pedigree (1,2,1,1,1)
  Data provided by industry (EPIS) 2020
  production volume; = a_packaging_paper*APV_RP
    Calculated from production volume of reference product using the relative outputs.
  properties: carbon content, fossil 0.3635, carbon content, non-fossil 0.1432, dry mass 1 kg, heating value, net 14.11 MJ, price 0.1 EUR2005, wet mass 1 kg
- waste plastic, mixture: -3.63324e-6 kg; name a_waste_plastic; lognormal variance with pedigree 0.0007, pedigree (1,2,1,1,1)
  Data provided by industry (EPIS) 2020
  production volume; = a_waste_plastic*APV_RP
    Calculated from production volume of reference product using the relative outputs.
  properties: carbon content, fossil 0.747344, dry mass 0.847 kg, heating value, net 30.79 MJ, water content 0.180638, wet mass 1 kg
- waste wood, untreated: -0.000696376 kg; name a_waste_wood; lognormal variance with pedigree 0.0007, pedigree (1,2,1,1,1)
  Data provided by industry (EPIS) 2020. Represents bark and wood wastes
  production volume; = a_waste_wood*APV_RP
    Calculated from production volume of reference product using the relative outputs.
  properties: carbon content, non-fossil 0.48632, dry mass 0.8 kg, heating value, net 13.99 MJ, water content 0.25, wet mass 1 kg

## Inputs from nature
- Oxygen [natural resource, in air]: 0.308846 kg; name O2; = (CO2_fossil+CO2_non_fossil)/(16*2+12) * (16*2) + (CO_fossil+CO_non_fossil)/(16+12) *16; lognormal variance with pedigree 0.0494, pedigree (2,5,2,1,4)
  Oxygen is required for the combustion process. Calculated value
- Water, unspecified natural origin [natural resource, in water]: 0.00551703 m3; lognormal variance with pedigree 0.0009, pedigree (1,2,2,1,1)
  Data provided by industry (EPIS) 2020. Represents surface water
- Water, well, in ground [natural resource, in water]: 0.000417267 m3; lognormal variance with pedigree 0.0009, pedigree (1,2,2,1,1)
  Data provided by industry (EPIS) 2020. Represents ground water

## Emissions to nature
- Acetaldehyde [air, urban air close to ground]: 3.87327e-8 kg; lognormal variance with pedigree 0.1388, pedigree (2,5,2,1,4)
  Estimation based on fuel input data and emission factors from corresponding ecoinvent fuel combustion (see "Extrapolations" comment). Apart from external fuel inputs, internal fuels such as bark, black liquor and sludge are generated during the process and supply considerable amounts of process energy. Internal fuels are represented by the calculated emissions but do not have the corresponding fuel input from technosphere, because they are supplied from within the system boundaries. The amounts of internal fuels used in the process are: Bark (8.85E+02 MJ/t), -Black liquor (1.33E+04 MJ/t), Sludge (2.70E+01 MJ/t), and Methanol (2.25E+02 MJ/t). Black liquor and sludge were not included in the emissions calculations because no specific emission profiles, e.g. for the black liquor recovery process, were available. Emissions from these internal energy generation processes are therefore only reflected in the key emission factors provided by the industry, other emissions constitute a data gap.
- Acetic acid [air, urban air close to ground]: 5.99722e-8 kg; lognormal variance with pedigree 0.1388, pedigree (2,5,2,1,4)
  (same comment as for Acetaldehyde)
- Acetone [air, urban air close to ground]: 3.20437e-9 kg; lognormal variance with pedigree 0.1388, pedigree (2,5,2,1,4)
  (same comment as for Acetaldehyde)
- Acetylene [air, urban air close to ground]: 8.58773e-9 kg; lognormal variance with pedigree 0.0888, pedigree (2,5,2,1,4)
  (same comment as for Acetaldehyde)
- Aluminium III [air, urban air close to ground]: 1.83777e-7 kg; lognormal variance with pedigree 0.6988, pedigree (2,5,2,1,4)
  (same comment as for Acetaldehyde)
- Ammonia [air, urban air close to ground]: 1.02164e-6 kg; lognormal variance with pedigree 0.1388, pedigree (2,5,2,1,4)
  (same comment as for Acetaldehyde)
- Antimony ion [air, urban air close to ground]: 2.71372e-11 kg; lognormal variance with pedigree 0.6988, pedigree (2,5,2,1,4)
  (same comment as for Acetaldehyde)
- Arsenic ion [air, urban air close to ground]: 1.28953e-9 kg; lognormal variance with pedigree 0.1388, pedigree (2,5,2,1,4)
  (same comment as for Acetaldehyde)
- Barium II [air, urban air close to ground]: 2.16411e-9 kg; lognormal variance with pedigree 0.6988, pedigree (2,5,2,1,4)
  (same comment as for Acetaldehyde)
- Benzene [air, urban air close to ground]: 6.6193e-7 kg; lognormal variance with pedigree 0.1388, pedigree (2,5,2,1,4)
  (same comment as for Acetaldehyde)
- Benzo(a)pyrene [air, urban air close to ground]: 2.96796e-10 kg; lognormal variance with pedigree 0.1388, pedigree (2,5,2,1,4)
  (same comment as for Acetaldehyde)
- Beryllium II [air, urban air close to ground]: 2.16411e-11 kg; lognormal variance with pedigree 0.6988, pedigree (2,5,2,1,4)
  (same comment as for Acetaldehyde)
- Boron [air, urban air close to ground]: 8.14117e-9 kg; lognormal variance with pedigree 0.6988, pedigree (2,5,2,1,4)
  (same comment as for Acetaldehyde)
- Bromine [air, urban air close to ground]: 3.47995e-8 kg; lognormal variance with pedigree 0.1388, pedigree (2,5,2,1,4)
  (same comment as for Acetaldehyde)
- Butane [air, urban air close to ground]: 2.67793e-7 kg; lognormal variance with pedigree 0.3988, pedigree (2,5,2,1,4)
  (same comment as for Acetaldehyde)
- Cadmium II [air, urban air close to ground]: 4.31232e-10 kg; lognormal variance with pedigree 0.6988, pedigree (2,5,2,1,4)
  (same comment as for Acetaldehyde)
- Calcium II [air, urban air close to ground]: 3.40107e-6 kg; lognormal variance with pedigree 0.3988, pedigree (2,5,2,1,4)
  (same comment as for Acetaldehyde)
- Carbon dioxide, fossil [air, urban air close to ground]: 0.0292726 kg; name CO2_fossil; lognormal variance with pedigree 0.0009, pedigree (1,2,2,1,1)
  Key emission provided by industry (EPIS) 2020
- Carbon dioxide, non-fossil [air, urban air close to ground]: 0.395367 kg; name CO2_non_fossil; lognormal variance with pedigree 0.0009, pedigree (1,2,2,1,1)
  Key emission provided by industry (EPIS) 2020
- Carbon monoxide, fossil [air, urban air close to ground]: 1.97891e-6 kg; name CO_fossil; lognormal variance with pedigree 0.6988, pedigree (2,5,2,1,4)
  Key emission provided by industry (EPIS) 2020. Reported as CO. same fraction of fossil and biogenic assumed as for CO2.
- Carbon monoxide, non-fossil [air, urban air close to ground]: 2.67279e-5 kg; name CO_non_fossil; lognormal variance with pedigree 0.6503, pedigree (1,2,2,1,1)
  (same comment as for Carbon monoxide, fossil)
- Chlorine [air, urban air close to ground]: 1.0391e-7 kg; lognormal variance with pedigree 0.3988, pedigree (2,5,2,1,4)
  (same comment as for Acetaldehyde)
- Chromium III [air, urban air close to ground]: 2.77821e-9 kg; lognormal variance with pedigree 0.6988, pedigree (2,5,2,1,4)
  (same comment as for Acetaldehyde)
- Chromium VI [air, urban air close to ground]: 7.1907e-11 kg; lognormal variance with pedigree 0.6988, pedigree (2,5,2,1,4)
  (same comment as for Acetaldehyde)
- Cobalt II [air, urban air close to ground]: 7.59235e-10 kg; lognormal variance with pedigree 0.6988, pedigree (2,5,2,1,4)
  (same comment as for Acetaldehyde)
- Copper ion [air, urban air close to ground]: 1.19411e-7 kg; lognormal variance with pedigree 0.6988, pedigree (2,5,2,1,4)
  (same comment as for Acetaldehyde)
- Dinitrogen monoxide [air, urban air close to ground]: 1.48437e-6 kg; lognormal variance with pedigree 0.1388, pedigree (2,5,2,1,4)
  (same comment as for Acetaldehyde)
- Dioxins, measured as 2,3,7,8-tetrachlorodibenzo-p-dioxin [air, urban air close to ground]: 1.83264e-14 kg; lognormal variance with pedigree 0.1388, pedigree (2,5,2,1,4)
  (same comment as for Acetaldehyde)
- Ethane [air, urban air close to ground]: 2.57632e-8 kg; lognormal variance with pedigree 0.0888, pedigree (2,5,2,1,4)
  (same comment as for Acetaldehyde)
- Ethanol [air, urban air close to ground]: 6.40873e-9 kg; lognormal variance with pedigree 0.1388, pedigree (2,5,2,1,4)
  (same comment as for Acetaldehyde)
- Ethyl benzene [air, urban air close to ground]: 1.73184e-8 kg; lognormal variance with pedigree 0.1388, pedigree (2,5,2,1,4)
  (same comment as for Acetaldehyde)
- Ethylene [air, urban air close to ground]: 5.15264e-8 kg; lognormal variance with pedigree 0.0888, pedigree (2,5,2,1,4)
  (same comment as for Acetaldehyde)
- Fluorine [air, urban air close to ground]: 2.88639e-8 kg; lognormal variance with pedigree 0.1388, pedigree (2,5,2,1,4)
  (same comment as for Acetaldehyde)
- Formaldehyde [air, urban air close to ground]: 2.53864e-7 kg; lognormal variance with pedigree 0.1388, pedigree (2,5,2,1,4)
  (same comment as for Acetaldehyde)
- Hexachlorobenzene [air, urban air close to ground]: 4.1564e-15 kg; lognormal variance with pedigree 0.1388, pedigree (2,5,2,1,4)
  (same comment as for Acetaldehyde)
- Hydrocarbons, aliphatic, alkanes, unspecified [air, urban air close to ground]: 6.19472e-7 kg; lognormal variance with pedigree 0.1388, pedigree (2,5,2,1,4)
  (same comment as for Acetaldehyde)
- Hydrocarbons, aliphatic, unsaturated [air, urban air close to ground]: 1.79879e-6 kg; lognormal variance with pedigree 0.1388, pedigree (2,5,2,1,4)
  (same comment as for Acetaldehyde)
- Hydrocarbons, aromatic [air, urban air close to ground]: 7.75083e-9 kg; lognormal variance with pedigree 0.1388, pedigree (2,5,2,1,4)
  (same comment as for Acetaldehyde)
- Hydrochloric acid [air, urban air close to ground]: 7.40613e-7 kg; lognormal variance with pedigree 0.1388, pedigree (2,5,2,1,4)
  (same comment as for Acetaldehyde)
- Hydrogen fluoride [air, urban air close to ground]: 2.40304e-8 kg; lognormal variance with pedigree 0.1388, pedigree (2,5,2,1,4)
  (same comment as for Acetaldehyde)
- Hydrogen sulfide [air, urban air close to ground]: 2.43018e-6 kg; lognormal variance with pedigree 0.0403, pedigree (1,2,2,1,1)
  Key emission provided by industry (EPIS) 2020. Hydrogen sulfide is expressing the total of the TRS (Total Reduced Sulphur Compounds), namely H2S, CS2, COS, C2H6S, CH4S, C2H6S2. Reported as TRS (as S)
- Iodine [air, urban air close to ground]: 1.958e-10 kg; lognormal variance with pedigree 0.6988, pedigree (2,5,2,1,4)
  (same comment as for Acetaldehyde)
- Iron ion [air, urban air close to ground]: 9.34327e-8 kg; lognormal variance with pedigree 0.6988, pedigree (2,5,2,1,4)
  (same comment as for Acetaldehyde)
- Lead II [air, urban air close to ground]: 1.88314e-8 kg; lognormal variance with pedigree 0.6988, pedigree (2,5,2,1,4)
  (same comment as for Acetaldehyde)
- Lead-210 [air, urban air close to ground]: 7.98659e-7 kBq; lognormal variance with pedigree 0.6988, pedigree (2,5,2,1,4)
  (same comment as for Acetaldehyde)
- Magnesium [air, urban air close to ground]: 2.72915e-7 kg; lognormal variance with pedigree 0.6988, pedigree (2,5,2,1,4)
  (same comment as for Acetaldehyde)
- Manganese II [air, urban air close to ground]: 9.85169e-8 kg; lognormal variance with pedigree 0.6988, pedigree (2,5,2,1,4)
  (same comment as for Acetaldehyde)
- Mercury II [air, urban air close to ground]: 3.10372e-10 kg; lognormal variance with pedigree 0.6988, pedigree (2,5,2,1,4)
  (same comment as for Acetaldehyde)
- Methane, fossil [air, urban air close to ground]: 9.0719e-7 kg; lognormal variance with pedigree 0.1388, pedigree (2,5,2,1,4)
  (same comment as for Acetaldehyde)
- Methane, non-fossil [air, urban air close to ground]: 1.84077e-6 kg; lognormal variance with pedigree 0.1388, pedigree (2,5,2,1,4)
  (same comment as for Acetaldehyde)
- Methanol [air, urban air close to ground]: 1.08948e-8 kg; lognormal variance with pedigree 0.1388, pedigree (2,5,2,1,4)
  (same comment as for Acetaldehyde)
- Molybdenum VI [air, urban air close to ground]: 2.52311e-10 kg; lognormal variance with pedigree 0.6988, pedigree (2,5,2,1,4)
  (same comment as for Acetaldehyde)
- NMVOC, non-methane volatile organic compounds [air, urban air close to ground]: 4.07049e-6 kg; lognormal variance with pedigree 0.1388, pedigree (2,5,2,1,4)
  (same comment as for Acetaldehyde)
- Nickel II [air, urban air close to ground]: 1.42576e-8 kg; lognormal variance with pedigree 0.6988, pedigree (2,5,2,1,4)
  (same comment as for Acetaldehyde)
- Nitrogen oxides [air, urban air close to ground]: 0.000369288 kg; lognormal variance with pedigree 0.0403, pedigree (1,2,2,1,1)
  Key emission provided by industry (EPIS) 2020
- PAH, polycyclic aromatic hydrocarbons [air, urban air close to ground]: 9.65173e-9 kg; lognormal variance with pedigree 0.1388, pedigree (2,5,2,1,4)
  (same comment as for Acetaldehyde)
- Particulate Matter, < 2.5 um [air, unspecified]: 4.28325e-5 kg; lognormal variance with pedigree 0.3003, pedigree (1,2,2,1,1)
  Key emission provided by industry (EPIS) 2020
- Particulate Matter, > 10 um [air, urban air close to ground]: 2.23024e-7 kg; lognormal variance with pedigree 0.0888, pedigree (2,5,2,1,4)
  (same comment as for Acetaldehyde)
- Particulate Matter, > 2.5 um and < 10um [air, unspecified]: 1.81234e-6 kg; lognormal variance with pedigree 0.1688, pedigree (2,5,2,1,4)
  (same comment as for Acetaldehyde)
- Pentachlorophenol [air, urban air close to ground]: 4.67596e-12 kg; lognormal variance with pedigree 0.1388, pedigree (2,5,2,1,4)
  (same comment as for Acetaldehyde)
- Pentane [air, urban air close to ground]: 4.09063e-7 kg; lognormal variance with pedigree 0.1388, pedigree (2,5,2,1,4)
  (same comment as for Acetaldehyde)
- Phosphorus [air, urban air close to ground]: 1.74269e-7 kg; lognormal variance with pedigree 0.1388, pedigree (2,5,2,1,4)
  (same comment as for Acetaldehyde)
- Polonium-210 [air, urban air close to ground]: 1.45991e-6 kBq; lognormal variance with pedigree 0.6988, pedigree (2,5,2,1,4)
  (same comment as for Acetaldehyde)
- Potassium I [air, urban air close to ground]: 1.353e-5 kg; lognormal variance with pedigree 0.6988, pedigree (2,5,2,1,4)
  (same comment as for Acetaldehyde)
- Potassium-40 [air, urban air close to ground]: 2.31869e-7 kBq; lognormal variance with pedigree 0.6988, pedigree (2,5,2,1,4)
  (same comment as for Acetaldehyde)
- Propane [air, urban air close to ground]: 8.37354e-8 kg; lognormal variance with pedigree 0.1388, pedigree (2,5,2,1,4)
  (same comment as for Acetaldehyde)
- Propionic acid [air, urban air close to ground]: 6.28729e-9 kg; lognormal variance with pedigree 0.1388, pedigree (2,5,2,1,4)
  (same comment as for Acetaldehyde)
- Propylene [air, urban air close to ground]: 8.58773e-9 kg; lognormal variance with pedigree 0.0888, pedigree (2,5,2,1,4)
  (same comment as for Acetaldehyde)
- Radium-226 [air, urban air close to ground]: 2.06105e-7 kBq; lognormal variance with pedigree 0.6988, pedigree (2,5,2,1,4)
  (same comment as for Acetaldehyde)
- Radium-228 [air, urban air close to ground]: 1.1164e-6 kBq; lognormal variance with pedigree 0.6988, pedigree (2,5,2,1,4)
  (same comment as for Acetaldehyde)
- Radon-220 [air, urban air close to ground]: 1.71755e-8 kBq; lognormal variance with pedigree 0.6988, pedigree (2,5,2,1,4)
  (same comment as for Acetaldehyde)
- Radon-222 [air, urban air close to ground]: 1.71755e-8 kBq; lognormal variance with pedigree 0.6988, pedigree (2,5,2,1,4)
  (same comment as for Acetaldehyde)
- Scandium [air, urban air close to ground]: 2.16411e-11 kg; lognormal variance with pedigree 0.6988, pedigree (2,5,2,1,4)
  (same comment as for Acetaldehyde)
- Selenium IV [air, urban air close to ground]: 4.19173e-10 kg; lognormal variance with pedigree 0.6988, pedigree (2,5,2,1,4)
  (same comment as for Acetaldehyde)
- Silicon [air, urban air close to ground]: 2.71372e-7 kg; lognormal variance with pedigree 0.6988, pedigree (2,5,2,1,4)
  (same comment as for Acetaldehyde)
- Sodium I [air, urban air close to ground]: 7.77339e-7 kg; lognormal variance with pedigree 0.6988, pedigree (2,5,2,1,4)
  (same comment as for Acetaldehyde)
- Strontium II [air, urban air close to ground]: 3.26334e-9 kg; lognormal variance with pedigree 0.6988, pedigree (2,5,2,1,4)
  (same comment as for Acetaldehyde)
- Sulfur dioxide [air, urban air close to ground]: 3.81316e-5 kg; lognormal variance with pedigree 0.0009, pedigree (1,2,2,1,1)
  Key emission provided by industry (EPIS) 2020. Reported as SO2 (reported as S).
- Sulfur oxides [air, unspecified]: 2.96548e-5 kg; lognormal variance with pedigree 0.0009, pedigree (1,2,2,1,1)
  Key emission provided by industry (EPIS) 2020. Reported as SOx (as SO2).
- Thallium I [air, urban air close to ground]: 2.71372e-11 kg; lognormal variance with pedigree 0.6988, pedigree (2,5,2,1,4)
  (same comment as for Acetaldehyde)
- Thorium [air, urban air close to ground]: 3.26334e-11 kg; lognormal variance with pedigree 0.6988, pedigree (2,5,2,1,4)
  (same comment as for Acetaldehyde)
- Thorium-228 [air, urban air close to ground]: 9.4465e-8 kBq; lognormal variance with pedigree 0.6988, pedigree (2,5,2,1,4)
  (same comment as for Acetaldehyde)
- Thorium-232 [air, urban air close to ground]: 6.01141e-8 kBq; lognormal variance with pedigree 0.6988, pedigree (2,5,2,1,4)
  (same comment as for Acetaldehyde)
- Tin ion [air, urban air close to ground]: 1.08549e-11 kg; lognormal variance with pedigree 0.6988, pedigree (2,5,2,1,4)
  (same comment as for Acetaldehyde)
- Titanium ion [air, urban air close to ground]: 6.5095e-9 kg; lognormal variance with pedigree 0.6988, pedigree (2,5,2,1,4)
  (same comment as for Acetaldehyde)
- Toluene [air, urban air close to ground]: 2.42961e-7 kg; lognormal variance with pedigree 0.1388, pedigree (2,5,2,1,4)
  (same comment as for Acetaldehyde)
- Uranium [air, urban air close to ground]: 4.34539e-11 kg; lognormal variance with pedigree 0.6988, pedigree (2,5,2,1,4)
  (same comment as for Acetaldehyde)
- Uranium-238 [air, urban air close to ground]: 1.71755e-7 kBq; lognormal variance with pedigree 0.6988, pedigree (2,5,2,1,4)
  (same comment as for Acetaldehyde)
- Vanadium V [air, urban air close to ground]: 2.20134e-8 kg; lognormal variance with pedigree 0.6988, pedigree (2,5,2,1,4)
  (same comment as for Acetaldehyde)
- Water [air, unspecified]: 0.000313046 m3; lognormal variance with pedigree 0.0428, pedigree (3,3,2,1,1)
  Calculated value. Represents evaporated water from the combustion process of wood. It is assumed that all hydrogen contained in the wood evaporates as water. The H content of wood is assumed to be 6 %.
- Xylenes, unspecified [air, urban air close to ground]: 1.71755e-9 kg; lognormal variance with pedigree 0.0988, pedigree (2,5,2,1,4)
  (same comment as for Acetaldehyde)
- Zinc II [air, urban air close to ground]: 2.80497e-7 kg; lognormal variance with pedigree 0.6988, pedigree (2,5,2,1,4)
  (same comment as for Acetaldehyde)
- m-Xylene [air, urban air close to ground]: 6.92734e-8 kg; lognormal variance with pedigree 0.1388, pedigree (2,5,2,1,4)
  (same comment as for Acetaldehyde)
- AOX, Adsorbable Organic Halides [water, surface water]: 9.10097e-6 kg; lognormal variance with pedigree 0.0403, pedigree (1,2,2,1,1)
  Data provided by industry (EPIS) 2020
- BOD5, Biological Oxygen Demand [water, surface water]: 0.000156158 kg; lognormal variance with pedigree 0.0403, pedigree (1,2,2,1,1)
  Data provided by industry (EPIS) 2020
- COD, Chemical Oxygen Demand [water, surface water]: 0.00115321 kg; lognormal variance with pedigree 0.0403, pedigree (1,2,2,1,1)
  Data provided by industry (EPIS) 2020
- DOC, Dissolved Organic Carbon [water, surface water]: 0.000427116 kg; lognormal variance with pedigree 0.0414, pedigree (2,3,2,1,1)
  Calculated as equal to TOC.
- Nitrogen [water, surface water]: 2.61949e-5 kg; lognormal variance with pedigree 0.0403, pedigree (1,2,2,1,1)
  Data provided by industry (EPIS) 2020
- Phosphorus [water, surface water]: 1.11774e-5 kg; lognormal variance with pedigree 0.0403, pedigree (1,2,2,1,1)
  Data provided by industry (EPIS) 2020
- Suspended solids, unspecified [water, surface water]: 0.00014261 kg; lognormal variance with pedigree 0.0403, pedigree (1,2,2,1,1)
  Data provided by industry (EPIS) 2020
- TOC, Total Organic Carbon [water, surface water]: 0.000427116 kg; lognormal variance with pedigree 0.0414, pedigree (2,3,2,1,1)
  calculated value: COD (g O2) = 2.7*TOC
- Water [water, unspecified]: 0.00595685 m3; lognormal variance with pedigree 0.0403, pedigree (1,2,2,1,1)
  Data provided by industry (EPIS) 2020. Represents process water (20.359 m3/t) plus the difference between water input and output (4.238 m3/t)

## Sampling procedure
Weighted average of several mills providing 100% of the European capacity of bleached kraft pulp from eucalyptus.

## Extrapolations
Industry data provided key emission factors for CO2 (fossil and biogenic), CO, SOx (as SO2), NOx, TRS (as S), SO2 (reported as S), Dust (unspecified). Additional air emissions resulting from on-site energy production, i.e. the combustion of fuels, were calculated based on industrial heating datasets from the ecoinvent database. The following ecoinvent combustion processes were used to estimate additional air emissions: Biofuel - Bark: heat production, wood chips from industry, at furnace 1000kW, CH; Methanol: heat production, natural gas, at industrial furnace >100kW, Europe without Switzerland; Natural gas: heat production, natural gas, at industrial furnace >100kW, Europe without Switzerland; Heavy fuel oil: heat production, heavy fuel oil, at industrial furnace 1MW, Europe without Switzerland; Light fuel oil: heat production, light fuel oil, at industrial furnace 1MW, Europe without Switzerland; Coke: heat production, at coal coke industrial furnace 1-10MW; propane: heat production, propane, at industrial furnace >100kW; CO2, CO and CH4 emissions from methanol were modelled as non-fossil.
