# scandium oxide to generic market for electrolyte, for solid oxide fuel cell

Dataset: EcoSpold 2, unit process
Geography: GLO
Time period: 2021-01-01 to 2023-12-31
Technology level: current
Classification: ISIC rev.4 ecoinvent: 2720:Manufacture of batteries and accumulators
Scenario: Business-as-Usual
System model: Allocation, cut-off by classification
Generated by: David FitzGerald
Database: ecoinvent
isCopyrightProtected: true
accessRestrictedTo: 1

## General comment
This activity links scandium oxide to the generic market for electrolyte used in solid oxide fuel cells. According to CM Group, the solid oxide fuel cell market, which uses scandium oxide (among others) as an electrolyte, represented around 76% of the consumption of scandium oxide in 2018.
The product "electrolyte, for solid oxide fuel cell" should be used only in cases where the specific electrolyte is not known. The two electrolytes that supply the market for electrolyte, for solid oxide fuel cell are scandium oxide and zirconium oxide.
Reference:
CM Group. Scandium. https://www.cmgroup.net/industries/scandium/ (last accessed: 2021-07-29).

## Included activities start
The activity starts with the reception of scandium oxide.

## Included activities end
The activity ends with the renaming of scandium oxide to a generic electrolyte, which supplies the market for electrolyte, for solid oxide fuel cell. As this is a renaming activity, no other inputs or outputs are included.

## Reference product
- electrolyte, for solid oxide fuel cell: 1 kg; By-product classification allocatable product; CPC 34290: Compounds of rare earth metals, of yttrium or of scandium; HS2017 2846: Compounds, inorganic or organic, of rare-earth metals; of yttrium or of scandium or of mixtures of these metals
  production volume 11970 kg; = 0.76*15750
    According to CM Group, the solid oxide fuel cell market, which uses scandium oxide (among others) as an electrolyte, represented around 76% of the consumption of scandium oxide in 2018. Therefore, as an approximation, 76% of the production volume of scandium oxide is used as production volume for the electrolyte.
    The global production volume of scandium oxide is between 15000 - 20000 kg according to USGS (2020).
    References:
    CM Group. Scandium. https://www.cmgroup.net/industries/scandium/ (last accessed: 2021-07-29).
    USGS (2020). Scandium. U.S. Geological Survey, Mineral Commodity Summaries, January 2020. https://pubs.usgs.gov/periodicals/mcs2020/mcs2020-scandium.pdf.
  properties: carbon allocation 0 kg, carbon content 0, carbon content, fossil 0, carbon content, non-fossil 0, dry mass 1 kg, price 30.3 EUR2005, water content 0, water in wet mass 0 kg, wet mass 1 kg

## Inputs from technosphere
- scandium oxide: 1 kg
  properties: dry mass 1 kg, oxygen content 0.347652, scandium content 0.651348, wet mass 1 kg
  note on oxygen content: The purity of Scandium oxide is greater than 99.9% but for the calculation of the oxygen content of Sc2O3 the purity is assumed to be 99.9%. The subtotal masses of Sc2O3 are: Sc:65.2%, O:34.8%. (Source: https://www.lenntech.com/calculators/molecular/molecular-weight-calculator.htm).
  note on scandium content: The purity of Scandium oxide is greater than 99.9% but for the calculation of the scandium content of Sc2O3 the purity is assumed to be 99.9%. The subtotal masses of Sc2O3 are: Sc:65.2%, O:34.8%. (Source: https://www.lenntech.com/calculators/molecular/molecular-weight-calculator.htm).
