# treatment of used laptop computer, manual dismantling

Dataset: EcoSpold 2, unit process
Geography: RoW
Time period: 2005-01-01 to 2023-12-31
Technology level: current
Classification: ISIC rev.4 ecoinvent: 3830:Materials recovery
Scenario: Business-as-Usual
System model: Allocation, cut-off by classification
Share of production covered: 100 %
Generated by: Roland Hischier
Published in: Hischier R. 2007
Database: ecoinvent
isCopyrightProtected: true
accessRestrictedTo: 1

## General comment
The process represents the treatment 'used laptop computer' by manual dismantling in various fractions.

## Included activities start
The activity starts with the waste being available at the gate of the treatment facility. Collection and transportation of the waste to the treatment plant is not included.

## Included activities end
This activity ends when the used laptop computer has been dismantled manually.

## Geography
Modelling parameters are not specific to this geography.

## Technology
Commonly performed manual dismantling activities

## Reference product
- used laptop computer: -1 kg; name RP_amount_1; By-product classification Waste; CPC 39990: Other wastes n.e.c.; HS2017 847010: Calculating machines; electronic calculators capable of operation without an external source of electric po[...]
  production volume 47.5612 kg; name RP_PV_1
    calculated from the swiss PV and scaled up based on swiss GDP (0.23/0.481%)
  property carbon content, fossil 0.260278
    Composition data from laptop computer divided by ist weight, 3.12 kg (Tab 4.12, ecoinvent v2.2 report 18_V)
  property carbon content, non-fossil 1.27837e-5
    (same comment as for used laptop computer)
  property price 0 EUR2005
    Waste products are assigned a price of zero as they are assumed to require further treatment.
  properties: carbon allocation 0.260291 kg, carbon content 0.260291, dry mass 1 kg, water content 0, water in wet mass 0 kg, wet mass 1 kg

## Inputs from technosphere
- manual treatment facility, waste electric and electronic equipment: 1.6e-8 unit; lognormal variance with pedigree 0.578, pedigree (4,5,5,5,5)
  Rough estimation of infrastructure
  Uncertainty: rough estimation of infrastructure
- shredder fraction after manual dismantling of used electronic product: -0.3113 kg; name W2; lognormal variance with pedigree 0.016, pedigree (3,4,1,5,1)
  Calculated - based on composition data
  Uncertainty: calculated - based on composition data
  production volume; = RP_PV_1 * abs(W2 / RP_amount_1)
    Calculated from the production volume of used laptop computer in proportion to the respective output amounts.
  properties: carbon content, fossil 0.287536, dry mass 1 kg, heating value, net 8.71 MJ, wet mass 1 kg
  note on carbon content, fossil: C content calculated out of (input) shredder fraction composition in Tab 4.47 (ecoinvent v2.2 report 18_V). Carbon content in plastic was calculated using data in Tab A.2, ecoinvent v2.2 report 13_I. Others was also considered plastic, and calculated the same way (from pg 70, ecoinvent v2.2 report 18_V). Ferro was assumed to have a C content of 0.012 kg C/ kg (C content of steel, calculated out of emission factors published in Commission Decision of 18 July 2007 establishing guidelines for the monitoring and reporting of greenhouse gas emissions pursuant to Directive 2003/87/EC of the European Parliament and of the Council (notified under document number C(2007) 3416)). The other component of the fraction were considered to content no C.
- used Li-ion battery: -0.1648 kg; name U1; lognormal variance with pedigree 0.2106, pedigree (5,5,5,5,5)
  Calculated - based on composition data
  production volume; = RP_PV_1 * abs(U1 / RP_amount_1)
    (same comment as for shredder fraction after manual dismantling of used electronic product)
  properties: carbon content, fossil 0.328011, dry mass 1 kg, wet mass 1 kg
- used liquid crystal display module: -0.2116 kg; name U2; lognormal variance with pedigree 0.016, pedigree (3,4,1,5,1)
  Calculated - based on composition data
  Uncertainty: calculated - based on composition data
  production volume; = RP_PV_1 * abs(U2 / RP_amount_1)
    (same comment as for shredder fraction after manual dismantling of used electronic product)
  properties: carbon content, fossil 0.327872, carbon content, non-fossil 4.20542e-5, dry mass 1 kg, wet mass 1 kg
- used printed wiring boards: -0.0831 kg; name U3; lognormal variance with pedigree 0.016, pedigree (3,4,1,5,1)
  Calculated - based on composition data
  Uncertainty: calculated - based on composition data
  production volume; = RP_PV_1 * abs(U3 / RP_amount_1)
    (same comment as for shredder fraction after manual dismantling of used electronic product)
  properties: carbon content, fossil 0.193742, carbon content, non-fossil 0.000960142, dry mass 1 kg, wet mass 1 kg
  note on carbon content, fossil: Composition of printed wiring boards used to calculate C content
- waste plastic, consumer electronics: -0.2292 kg; name W1; lognormal variance with pedigree 0.016, pedigree (3,4,1,5,1)
  Calculated - based on composition data
  Uncertainty: calculated - based on composition data
  production volume; = RP_PV_1 * abs(W1 / RP_amount_1)
    (same comment as for shredder fraction after manual dismantling of used electronic product)
  properties: carbon content, fossil 0.830215, dry mass 0.847 kg, heating value, net 34.78 MJ, water content 0.180638, wet mass 1 kg
  note on carbon content, fossil: C content in 1 kg DM was calculated using data in Tab A.2, ecoinvent v2.2 report 13_I
  note on heating value, net: Assumed equal to "waste plastic, consumer electronics, sorted".

## Sampling procedure
own experiences

## Extrapolations
This dataset has been copied from an original dataset covering the geography CH. The uncertainty and Production Volume (PV) has been adjusted accordingly.

## Review by Jürgen Sutter 2007-08-31
passed.

## Review by Emilia Moreno Ruiz 2012-12-19
correction of exchange "used cable"
