# hard coal, run-of-mine to market for hard coal

Dataset: EcoSpold 2, unit process
Geography: IN
Time period: 2006-01-01 to 2023-12-31
Technology level: current
Classification: EcoSpold01Categories: hard coal/production
Classification: ISIC rev.4 ecoinvent: 0510:Mining of hard coal
Scenario: Business-as-Usual
System model: Allocation, cut-off by classification
Generated by: Tereza Levova
Database: ecoinvent
isCopyrightProtected: true
accessRestrictedTo: 1

## General comment
This activity links hard coal, run-of-mine produced in hard coal mine operation/IN to market for hard coal /IN.

## Included activities start
This activity starts with input of hard coal, run-of-mine produced in the mine.

## Included activities end
This activity ends with the provision of a hard coal which is supplied to the Indian market for hard coal.

## Reference product
- hard coal: 1 kg; By-product classification allocatable product; CPC 11010: Hard coal; HS2017 270111: Coal; anthracite, whether or not pulverised, but not agglomerated
  production volume 6.10408e11 kg
    Calculated value.
    639234000000 kg is the amount of hard coal, run-of-mine produced in India in the year 2015-2016.
    Literature Data: The data has been collected from Provisional Coal Statistics - 2015-16. These are published jointly by the Goverment of India, Ministry of Coal and Coal Controller's Organisation - Kolkatta.
    28826000000 kg is the amount of hard coal, run-of-mine which was further processed in a hard coal preparation plants before supplied to the Indian market for hard coal.
    Literature Data: The data has been taken from Provisional Coal Statistics 2015 -16 , which is published jointly by Goverment of India, Ministry of coal, Coal Controller's Organisation Kolkata. The value is totol addition of washed coal (coking), washed coal (non coking) and middlings.
  property carbon content, fossil 0.845
    C content 75-94% (specified in Tab 1.1, report 6, part VI). A mean content of 0.845 kg C/ kg dry hard coal was considered
  property heating value, net 27.91 MJ
    Based on the Characterization factor of Hard coal in the CED method
  property price 0.036 EUR2005
    Steam coal import costs in EU in IEA key world energy statistics 2003-2004.
  properties: carbon allocation 0.7943 kg, carbon content 0.845, carbon content, non-fossil 0, dry mass 0.94 kg, water content 0.0638298, water in wet mass 0.06 kg, wet mass 1 kg

## Inputs from technosphere
- hard coal, run-of-mine: 1 kg; lognormal variance with pedigree 0.0008, pedigree (1,1,2,1,1)
  properties: carbon content, fossil 0.47, dry mass 1 kg, heating value, net 27.91 MJ, water content 0.002, wet mass 1.002 kg
  note on heating value, net: Based on the Characterization factor of Hard coal in the CED method
