# furnace production, logs, hardwood storage area, 6kW

Dataset: EcoSpold 2, unit process
Geography: CH
Time period: 2000-01-01 to 2023-12-31
Technology level: current
Classification: ISIC rev.4 ecoinvent: 2815:Manufacture of ovens, furnaces and furnace burners
Tags: ConvertedDataset
Scenario: Business-as-Usual
System model: Allocation, cut-off by classification
Generated by: Christian Bauer
Published in: Bauer, C. 2007
Database: ecoinvent
isCopyrightProtected: true
accessRestrictedTo: 1

## General comment
This dataset represents the individual components of a 6 kW furnace. This category includes wood-fueled cooking stoves, tile stoves and closed cheminées, which serve as additional heating or as heating of a living room. The furnace is refilled per hand.

## Included activities start
From unoccupied land forseen for the construction of a furnace.

## Included activities end
This activity ends with a constructed furnace, having a lifetime of 20 years (chimney 80 years). The dataset includes apart the materials necessary for the furnace also the construction efforts, land use for hardwood storage, transport as well as the disposal of all materials.

## Geography
Data for specific Swiss furnaces. Dataset could be used for similarly dimensioned furnaces in other regions.

## Technology
Boiler of average technology available on market.

## Time period
Some data used to calculate averages are from the second half of the 1990´s.

## Reference product
- furnace, logs, hardwood storage area, 6kW: 1 unit; name furnace_RP; source Hasler 2001; By-product classification allocatable product; CPC 43420: Industrial or laboratory furnaces and ovens, except non-electric bakery ovens; other industrial or laboratory […]; HS2017 841780: Furnaces and ovens; including incinerators, non-electric, for industrial or laboratory use, n.e.c. in headi[...]
  It is assumed that the boiler is produced in Switzerland, having a lifetime of 20 years. The boiler consists of a steel shell, a combustion chamber which is lined with concrete or ceramic tiles and insulation materials for thermal insulation. Modern boilers are equipped with one or two fans that regulate the supply air and exhaust gas flow. They have water pumps and the appropriate control technology to regulate the transport of water in the heating circuit. Based on the annual operating statistics of Tiba AG, the material consumption of the boiler is estimated. The data are based only on information provided by one manufacturer that produces boilers up to 100kW. The available operating statistics of 2000 records all boilers with different nominal capacities together. The combustion process of logs can be less controlled than the combustion process of wood chips and therefore has to be operated at full load. To use the released heat, a heat accumulator is necessary. The heat accumulator consists of a steel shell and an additional insulation. Apart from the boiler and heat accumulator a chimney and a heat distribution system is needed in the building. Therefore, the information of heating oil ist taken and adapted to the corresponding capacity. The chimney is constructed of three-layered chimney bricks. Therefore concrete and stone wool is needed. The lifetime of 80 years is estimated. The possible losses of heat distribution in a local district heating network are not included in the annual use efficiencies. The installation is assumed to be in a building or industrial site. For the distribution of heat circulation pumps, valves, control elements and cables are required. Lifetime is assumed to be 20 years.
  production volume 0.0336675 unit; name furnace_RP_PV
    This is a placeholder value that does not reflect real-world production volumes. This dataset does not currently require a real-world production volume to work in the database framework, and no actual data were collected yet. This has no negative effect on the results of the ecoinvent database. The placeholder value of this activity was scaled according to the nominal GDP of 2005 (source: United Nations, http://data.un.org/Glossary.aspx?q=GDP+%28current+US%24%29, accessed 20130726) to reflect an appropriate share of the global production volume, which is also a placeholder value.
  property price 724 EUR2005
    UNDATA "Industrial furnace, oven, incinerator non-electric ne" (http://data.un.org/Data.aspx?q=industrial+furnace&d=ComTrade&f=_l1Code%3a84%3bcmdCode%3a841780; EU I/E average price is 6.133EUR/kg). The prices are per kg and converted to per unit by summed weight of material concumption of the process in existing ecoinvent documentation from ecoinvent v.2.2 (about 108kg). For weight of concrete, it is separately added for from price per m3 used of each unit (0.059 m3; 'furnace production, logs, hardwood storage area, 30kW')and apply EU&DK input output database 2003 (0.08 Euro2003/kg DS; density 2380 kg/m3<#concrete production, normal' in ecoinvent).
  properties: carbon allocation 0 kg, carbon content 0

## Inputs from technosphere
- concrete, normal strength: 0.059 m3; source Hasler 2001; lognormal variance with pedigree 0.06, pedigree (1,1,5,1,1)
  Estimation. Concrete is a material used for the boiler and the chimney.
  properties: dry mass 2190 kg, water content 0.086758, wet mass 2380 kg
- drawing of pipe, steel: 52 kg; lognormal variance with pedigree 0.16, pedigree (1,1,5,1,1)
  Estimation.
- electricity, low voltage: 112 kWh; source Hasler 2001; lognormal variance with pedigree 0.06, pedigree (1,1,5,1,1)
  Calculated value. In order to produce the furnace, energy in the form of electricity is needed. From operation statistics of Tiba AG the annual consumption is taken and divided or extrapolated according to the capacity.
- heat, central or small-scale, other than natural gas: 500 MJ; source Hasler 2001; lognormal variance with pedigree 0.06, pedigree (1,1,5,1,1)
  Calculated value. In order to produce the furnace, energy in the form of heat is needed. From operation statistics of Tiba AG the annual consumption is taken and divided or extrapolated according to the capacity. It is assumed that the heat demand is covered by an oil-fired furnace.
  properties: heating value, net 1 MJ
- lubricating oil: 0.1 kg; source Hasler 2001; lognormal variance with pedigree 0.06, pedigree (1,1,5,1,1)
  Estimation. Used as auxiliary material for the production.
  properties: carbon content, fossil 0.75, dry mass 1 kg, heating value, net 40.2 MJ, wet mass 1 kg
  note on carbon content, fossil: Lubricating oil is produced from diesel. C-content/dry mass of fats and oils considered 75%, from: ecoinvent v2.2 report, n 15a, pg 40
  note on heating value, net: Literature value, Source: IPCC 2006, 2006 IPCC Guidelines for National Greenhouse Gas Inventories, Prepared by the National Greenhouse Gas Inventories Programme, Eggleston H.S., Buendia L., Miwa K., Ngara T. and Tanabe K. (eds). Published: IGES, Japan
- scrap steel: -104 kg; name scrap_steel_byP
  production volume; = furnace_RP_PV * (scrap_steel_byP / furnace_RP)
    Calculated from production volume of reference product using the relative outputs.
  properties: dry mass 1 kg, wet mass 1 kg
- sheet rolling, steel: 52 kg; lognormal variance with pedigree 0.16, pedigree (1,1,5,1,1)
  Estimation.
- steel, low-alloyed, hot rolled: 104 kg; source Hasler 2001; lognormal variance with pedigree 0.06, pedigree (1,1,5,1,1)
  Estimation. Low-allowed steel is a material used for the boiler.
  properties: carbon content, fossil 0.005, dry mass 1 kg, wet mass 1 kg
  note on carbon content, fossil: Low alloyed steel composition given in Tab. 3.2 ecoinvent v2.2 report 10_partII. Steel assumed to have a C content of 0.5%
- stone wool: 1.75 kg; source Hasler 2001; lognormal variance with pedigree 0.06, pedigree (1,1,5,1,1)
  Estimation. Rock wool is used as a material for the chimney.
  properties: carbon content, fossil 0.015401, dry mass 1 kg, wet mass 1 kg
  note on carbon content, fossil: The chemical composition of the glass fibres used in the rock wool production is similar to the composition of naturally cooled volcano basalt and has a composition listed in Tab. 3.1 and 3.2 in ecoinvent v2.2 report 16, part XIV. Rock wool contains: a minimum of 96% mineral fibres,between 0.5 and 3.0 weight percent of phenolic resin depending on the specific product characteristics, and about 0.2 percent mineral oil (ecoinvent v2.2 report 16, part XIV). An average composition of 1.8% phenolic resin, 0.2% mineral oil, and 98% mineral fibres has been assumed and used to calculate C content of the rock wool
- waste concrete: -130 kg; name waste_concrete_byP; lognormal variance with pedigree 0.02, pedigree (1,1,1,1,1)
  Estimation. 100% of that material is disposed in an inert material landfill.
  production volume; = waste_concrete_byP/ furnace_RP* furnace_RP_PV
    Calculated from the production volume of furnace, logs, hardwood storage area, 6kW in proportion to the respective output amounts.
  properties: dry mass 0.5 kg, water content 1, wet mass 1 kg
- waste mineral oil: -0.1 kg; name waste_oil_byP; lognormal variance with pedigree 0.02, pedigree (1,1,1,1,1)
  Estimation. 100% of the oil is disposed after use.
  production volume; = waste_oil_byP/ furnace_RP* furnace_RP_PV
    (same comment as for waste concrete)
  properties: carbon content, fossil 0.864444, dry mass 0.9 kg, heating value, net 34.7 MJ, water content 0.111111, wet mass 1 kg
  note on carbon content, fossil: Tab A.6, ecoinvent v2.2 report 13_I. C content has been calculated after data in the tables, and then referred to 1 kg DM
  note on heating value, net: Value taken from the general comment of the treatment dataset.
- waste mineral wool, for final disposal: -1.75 kg; name waste_wool_byP; lognormal variance with pedigree 0.02, pedigree (1,1,1,1,1)
  Estimation. 100% of that material is disposed in an inert material landfill.
  production volume; = waste_wool_byP/ furnace_RP* furnace_RP_PV
    (same comment as for waste concrete)
  properties: dry mass 1 kg, wet mass 1 kg

## Inputs from nature
- Occupation, industrial area [natural resource, land]: 34 m2*year; lognormal variance with pedigree 0.186, pedigree (4,5,5,1,1)
  Estimation. The consumer stores the logs at a dry place (silo is not necessary). The annual consumption of logs is stacked two meters high.
- Transformation, from unspecified [natural resource, land]: 1.7 m2; lognormal variance with pedigree 0.186, pedigree (4,5,5,1,1)
  (same comment as for Occupation, industrial area)
- Transformation, to industrial area [natural resource, land]: 1.7 m2; lognormal variance with pedigree 0.186, pedigree (4,5,5,1,1)
  (same comment as for Occupation, industrial area)

## Sampling procedure
Data are from literature and personal communication.

## Review by Christian Bauer 2003-07-25
self-validation

## Review by Roland Hischier 2011-11-22
Transfer of documentation done.

## Review by Emilia Moreno Ruiz 2014-06-05
PV adjusted
