# treatment of waste glass, unsanitary landfill, hyperarid infiltration class (-250mm)

Dataset: EcoSpold 2, unit process
Geography: GLO
Time period: 2006-01-01 to 2023-12-31
Technology level: current
Classification: ISIC rev.4 ecoinvent: 3821:Treatment and disposal of non-hazardous waste
Scenario: Business-as-Usual
System model: Allocation, cut-off by classification
Share of production covered: 1 %
Generated by: Nikolia Stoikou
Database: ecoinvent
isCopyrightProtected: true
accessRestrictedTo: 1

## General comment
This dataset represents the activity of waste disposal of 'waste glass' in an unsanitary landfill. Recommended use of this dataset: for waste material going to unsanitary landfill in a hyperarid water infiltration class location, as part of unsorted, unmanaged, unscavenged municipal waste mixture. Inventoried waste consists of fraction: 100% glass. Waste composition (wet, in ppmw): gross heating value 0.1423 MJ/kg; net heating value 0.04602 MJ/kg; H2O 20000; O 483070; H na; C na; S na; N na; P na; B na; Cl 195.89; Br na; F na; I na; Ag na; As na; Ba na; Cd na; Co na; Cr 303.63; Cu 7.8356; Hg na; Mn na; Mo na; Ni na; Pb 38.688; Sb na; Se na; Sn na; V na; Zn 3.9178; Be na; Sc na; Sr na; Ti na; Tl na; W na; Si 359090; Fe na; Ca 72818; Al na; K na; Mg na; Na 64472. Share of carbon in initial waste that is biogenic 60.4%. Share of metals in waste not oxidised and bulk-recyclable (exclude very small or thin parts) Iron: 0%; Alu: 0%; Copper: 0%. Overall degradability of waste during 100 years: 1%. 0.3484 kg waste mass remains in the landfill even after the long term period.

## Included activities start
The activity starts with the waste being available at the gate of the treatment facility. Collection and transportation of the waste to the treatment plant is not included.

## Included activities end
The activity ends with the waste being treated and waste-specific emissions from unsanitary landfill are released to air via landfill gas, air and soil via windblown evaporites, and to groundwater.

## Geography
This dataset represents a landfill of 'infiltration class 1 hyperarid'. Landfill site with mean annual temperature (MAT) of 8 degC, mean annual precipitation (MAP) of 350 mm/year, and net infiltration of -250 mm/year. Negative infiltration means that leachate flow in landfill is reversed and flows upward to the surface, where waste is evaporated and dissolved solids become solid evaporites. Temperature at site can result in permafrost conditions, which slows down water flow by a factor of (alpha t) 0.999. Total climate adjustments with alpha pt of 0.999. The leachate percolating through the landfill has an average residence time of 15 years.
Reference for climatic parameters: Doka, G., 2018, Inventory parameters for regionalised waste disposal mixes

## Technology
This is an inventory for an unsanitary, sub-controlled landfill for municipal solid waste. Ultimate average landfill height is 15 meters. Operation phase duration is 25 years. The total, waste-specific raw landfill gas mass produced in the landfill is 0.004685 kg. The total CH4 mass in the raw landfill gas is 0 kg. Percentage of landfill gas directly emitted is 100w%. Leachate of the landfill is not treated, but emitted untreated. Leachate flow is upward to the surface due to net negative infiltration. No leachate treatment can be performed. Based on average waste composition and chosen climate data the end of carbonate phase is estimated to be reached 6'681 years after waste deposition. Arid conditions at this location prompt formation of evaporites from landfill contents which are partially eroded by wind. It is assumed that 10% of these evaporites are eroded by wind and airborne. Initial decay in the first 100 years of this waste results in a wind erosion rate corresponding to 46.26 g/m2.year and long-term decay corresponds to wind erosion of 15.62 g/m2.year.

## Reference product
- waste glass: -1 kg; By-product classification Waste; CPC 37111: Glass in the mass, in balls (except microspheres), rods or tubes, unworked; waste and scrap of glass; HS2017 700100: Glass; cullet and other waste and scrap of glass, glass in the mass
  main reference product of this activity
  production volume 4.02e9 kg
    Estimated based on the total amount of this waste being treated in the database. The value is then adjusted to reflect the current treatment in the given geography
  property price 0 EUR2005
    Waste products are assigned a price of zero as they are assumed to require further treatment.
  properties: calcium content 0.0743039, carbon allocation 0 kg, carbon content 0, carbon content, fossil 0, carbon content, non-fossil 0, chlorine content 0.000199888, chromium content 0.000309826, copper content 7.99551e-6, dry mass 0.98 kg, heating value, gross 0.142256 MJ, heating value, net 0.046024 MJ, lead content 3.94778e-5, oxygen content 0.492929, silicon content 0.366418, sodium content 0.0657874, water content 0.0204082, water in wet mass 0.02 kg, wet mass 1 kg, zinc content 3.99776e-6

## Inputs from technosphere
- diesel, burned in building machine: 0.046738 MJ; lognormal variance with pedigree 0.32902, pedigree (1,1,4,1,1)
  waste distribution and compaction in unsanitary landfill;
  properties: heating value, net 1 MJ
- excavation, skid-steer loader: 0.00031708 m3; lognormal variance with pedigree 0.32902, pedigree (1,1,4,1,1)
  daily cover of waste in unsanitary landfill;

## Inputs from nature
- Waste mass, total, placed in landfill [inventory indicator, waste]: 1 kg; lognormal variance with pedigree 0.008, pedigree (1,1,4,1,1)
  waste mass placed in unsanitary landfill (for ecoscarcity LCIA only);
- Occupation, dump site [natural resource, land]: 0.0023333 m2*year; lognormal variance with pedigree 0.32902, pedigree (1,1,4,1,1)
  for operation phase of unsanitary landfill area;
- Transformation, from pasture, man made [natural resource, land]: 6.6667e-5 m2; lognormal variance with pedigree 0.32902, pedigree (1,1,4,1,1)
  for initial conversion of unsanitary landfill area;
- Transformation, to dump site [natural resource, land]: 6.6667e-5 m2; lognormal variance with pedigree 0.32902, pedigree (1,1,4,1,1)
  conversion to unsanitary landfill area;

## Emissions to nature
- Calcium II [air, low population density, long-term]: 0.0072723 kg; lognormal variance with pedigree 0.15856, pedigree (1,1,4,1,1)
  windblown leachate evaporites from unsanitary landfill in arid climate;
- Calcium II [air, non-urban air or from high stacks]: 9.4936e-6 kg; lognormal variance with pedigree 0.77288, pedigree (1,1,4,1,1)
  Contributions: landfill gas emission from unsanitary landfill (after 0% capture and utilization) and from windblown leachate evaporites in arid climate;
- Chromium III [air, low population density, long-term]: 1.9487e-7 kg; lognormal variance with pedigree 1.9298, pedigree (1,1,4,1,1)
  windblown leachate evaporites from unsanitary landfill in arid climate;
- Chromium III [air, non-urban air or from high stacks]: 3.4653e-9 kg; lognormal variance with pedigree 1.7538, pedigree (1,1,4,1,1)
  (same comment as for Calcium II)
- Copper ion [air, low population density, long-term]: 7.8352e-7 kg; lognormal variance with pedigree 1.3081, pedigree (1,1,4,1,1)
  windblown leachate evaporites from unsanitary landfill in arid climate;
- Copper ion [air, non-urban air or from high stacks]: 3.8432e-11 kg; lognormal variance with pedigree 1.9298, pedigree (1,1,4,1,1)
  (same comment as for Calcium II)
- Hydrochloric acid [air, low population density, long-term]: 1.9089e-5 kg; lognormal variance with pedigree 0.88067, pedigree (1,1,4,1,1)
  windblown leachate evaporites from unsanitary landfill in arid climate;
- Hydrochloric acid [air, non-urban air or from high stacks]: 5.6371e-7 kg; lognormal variance with pedigree 0.96143, pedigree (1,1,4,1,1)
  (same comment as for Calcium II)
- Lead II [air, low population density, long-term]: 3.8686e-6 kg; lognormal variance with pedigree 1.0964, pedigree (1,1,4,1,1)
  windblown leachate evaporites from unsanitary landfill in arid climate;
- Lead II [air, non-urban air or from high stacks]: 2.2844e-10 kg; lognormal variance with pedigree 1.9298, pedigree (1,1,4,1,1)
  (same comment as for Calcium II)
- Particulate Matter, < 2.5 um [air, low population density, long-term]: 0.012477 kg; lognormal variance with pedigree 0.60933, pedigree (1,1,4,1,1)
  windblown leachate evaporites from unsanitary landfill in arid climate;
- Particulate Matter, < 2.5 um [air, non-urban air or from high stacks]: 6.1684e-5 kg; lognormal variance with pedigree 0.76633, pedigree (1,1,4,1,1)
  landfill gas emission from unsanitary landfill (after 0% capture and utilization) and from windblown leachate evaporites in arid climate;
- Particulate Matter, > 10 um [air, low population density, long-term]: 0.031192 kg; lognormal variance with pedigree 0.34869, pedigree (1,1,4,1,1)
  windblown leachate evaporites from unsanitary landfill in arid climate;
- Particulate Matter, > 10 um [air, non-urban air or from high stacks]: 0.00015421 kg; lognormal variance with pedigree 0.50569, pedigree (1,1,4,1,1)
  (same comment as for Particulate Matter, < 2.5 um)
- Particulate Matter, > 2.5 um and < 10um [air, low population density, long-term]: 0.018715 kg; lognormal variance with pedigree 0.4277, pedigree (1,1,4,1,1)
  windblown leachate evaporites from unsanitary landfill in arid climate;
- Particulate Matter, > 2.5 um and < 10um [air, non-urban air or from high stacks]: 9.2527e-5 kg; lognormal variance with pedigree 0.58471, pedigree (1,1,4,1,1)
  (same comment as for Particulate Matter, < 2.5 um)
- Silicon [air, low population density, long-term]: 0.0010812 kg; lognormal variance with pedigree 1.9298, pedigree (1,1,4,1,1)
  windblown leachate evaporites from unsanitary landfill in arid climate;
- Silicon [air, non-urban air or from high stacks]: 1.7973e-5 kg; lognormal variance with pedigree 0.77579, pedigree (1,1,4,1,1)
  (same comment as for Calcium II)
- Sodium I [air, low population density, long-term]: 0.0061806 kg; lognormal variance with pedigree 0.17046, pedigree (1,1,4,1,1)
  windblown leachate evaporites from unsanitary landfill in arid climate;
- Sodium I [air, non-urban air or from high stacks]: 0.00026714 kg; lognormal variance with pedigree 0.37323, pedigree (1,1,4,1,1)
  (same comment as for Calcium II)
- Water [air, non-urban air or from high stacks]: 1.9975e-7 m3; lognormal variance with pedigree 0.65915, pedigree (1,1,4,1,1)
  from water contained in landfilled waste, released to air in arid sites;
- Zinc II [air, low population density, long-term]: 3.9159e-7 kg; lognormal variance with pedigree 1.3993, pedigree (1,1,4,1,1)
  windblown leachate evaporites from unsanitary landfill in arid climate;
- Zinc II [air, non-urban air or from high stacks]: 1.8578e-10 kg; lognormal variance with pedigree 1.9298, pedigree (1,1,4,1,1)
  (same comment as for Calcium II)
- Non-hazardous waste disposed [inventory indicator, waste]: 1 kg; lognormal variance with pedigree 0.008, pedigree (1,1,4,1,1)
  EN15804 waste mass in unsanitary landfill;
- Calcium II [soil, industrial]: 0.065536 kg; lognormal variance with pedigree 0.15807, pedigree (1,1,4,1,1)
  Contributions: from leachate evaporites in hyperarid climate in unsanitary landfill;
- Chloride [soil, industrial]: 0.00017624 kg; lognormal variance with pedigree 0.84811, pedigree (1,1,4,1,1)
  Contributions: from leachate evaporites in hyperarid climate in unsanitary landfill;
- Chromium III [soil, industrial]: 1.7849e-6 kg; lognormal variance with pedigree 1.9298, pedigree (1,1,4,1,1)
  Contributions: from leachate evaporites in hyperarid climate in unsanitary landfill;
- Copper ion [soil, industrial]: 7.052e-6 kg; lognormal variance with pedigree 1.308, pedigree (1,1,4,1,1)
  Contributions: from leachate evaporites in hyperarid climate in unsanitary landfill;
- Heat, waste [soil, industrial]: 0.0014208 MJ; lognormal variance with pedigree 0.17808, pedigree (1,1,4,1,1)
  from decomposed waste material in unsanitary landfill;
- Lead II [soil, industrial]: 3.4819e-5 kg; lognormal variance with pedigree 1.0963, pedigree (1,1,4,1,1)
  Contributions: from leachate evaporites in hyperarid climate in unsanitary landfill;
- Silicon [soil, industrial]: 0.009892 kg; lognormal variance with pedigree 1.9298, pedigree (1,1,4,1,1)
  Contributions: from leachate evaporites in hyperarid climate in unsanitary landfill;
- Sodium I [soil, industrial]: 0.058024 kg; lognormal variance with pedigree 0.1578, pedigree (1,1,4,1,1)
  Contributions: from leachate evaporites in hyperarid climate in unsanitary landfill;
- Zinc II [soil, industrial]: 3.526e-6 kg; lognormal variance with pedigree 1.3983, pedigree (1,1,4,1,1)
  Contributions: from leachate evaporites in hyperarid climate in unsanitary landfill;
- Heat, waste [water, ground-, long-term]: 0.14084 MJ; lognormal variance with pedigree 0.058605, pedigree (1,1,4,1,1)
  from decomposed waste material in unsanitary landfill;
