# cathode production, for aluminium electrolysis

Dataset: EcoSpold 2, unit process
Geography: RoW
Time period: 1995-01-01 to 2023-12-31
Technology level: current
Classification: ISIC rev.4 ecoinvent: 2790:Manufacture of other electrical equipment
Classification: EcoSpold01Categories: metals/extraction
Tags: ConvertedDataset
Scenario: Business-as-Usual
System model: Allocation, cut-off by classification
Share of production covered: 98 %
Generated by: Hans-Jörg Althaus
Published in: Althaus H.-J. 2000
Database: ecoinvent
isCopyrightProtected: true
accessRestrictedTo: 1

## General comment
[This dataset was already contained in the ecoinvent database version 2. It was not individually updated during the transfer to ecoinvent version 3. Life Cycle Impact Assessment results may still have changed, as they are affected by changes in the supply chain, i.e. in other datasets. This dataset was generated following the ecoinvent quality guidelines for version 2. It may have been subject to central changes described in the ecoinvent version 3 change report (http://www.ecoinvent.org/database/ecoinvent-version-3/reports-of-changes/), and the results of the central updates were reviewed extensively. The changes added e.g. consistent water flows and other information throughout the database. The documentation of this dataset can be found in the ecoinvent reports of version 2, which are still available via the ecoinvent website. The change report linked above covers all central changes that were made during the conversion process.]

## Included activities start
The activity starts with the reception of the raw materials at the plant gate.

## Included activities end
The activity ends with the produced cathode. It includes cathode production and removal, transports of materials to the plant and the disposal of the wastes. Because the cathode is produced in the electrolysis plant, no cathode production plant is balanced. No data have been found on air emissions from baking. It is assumed that these emissions are included in the electrolysis.

## Geography
Some Swiss datasets are used for European processes.

## Technology
Average technology for the aluminium consumed in Europe (85% pre baked, 15% Söderberg

## Reference product
- cathode, for aluminium electrolysis: 1 kg; By-product classification allocatable product; CPC 47140: Thermionic, cold cathode or photo-cathode valves and tubes (including cathode ray tubes); HS2017 3801: Artificial graphite; colloidal or semi-colloidal graphite; preparations based on graphite or other carbon in [...]
  EcoSpold01Location=RER
  production volume 2.67763 kg
    This is a placeholder value that does not reflect real-world production volumes. This dataset does not currently require a real-world production volume to work in the database framework, and no actual data were collected yet. This has no negative effect on the results of the ecoinvent database.
  property carbon content, fossil 0.163928
    The main components of the cathode are steel and carbon (from bitumen) (ecoinvent v2.2 report 10). Actual C content of the components of the cathode were taking into account to calculate the cathode final C content
  property price 3 EUR2005
    Calculated value based on data from United Nations Commodity Trade Statistics Database (comtrade.un.org). UN comtrade category: 740311 Copper cathodes and sections of cathodes unwrought. Year 2005. Using exchange rate of 1EURO = 1.209 USD. Average of price of import into 5 main markets (EU, US, JP, IN and CN).
  properties: carbon allocation 0.163928 kg, carbon content 0.163928, carbon content, non-fossil 0, dry mass 1 kg, water content 0, water in wet mass 0 kg, wet mass 1 kg

## Inputs from technosphere
- aluminium oxide, non-metallurgical: 0.0222 kg; lognormal variance with pedigree 0.042, pedigree (1,1,5,5,1)
  EcoSpold01Location=RER
  properties: dry mass 1 kg, wet mass 1 kg
- blasting: 0.0222 kg; lognormal variance with pedigree 0.042, pedigree (1,1,5,5,1)
  EcoSpold01Location=RER
- cast iron: 0.0444 kg; lognormal variance with pedigree 0.042, pedigree (1,1,5,5,1)
  EcoSpold01Location=RER
  properties: carbon content, fossil 0.04, dry mass 1 kg, wet mass 1 kg
  note on carbon content, fossil: Cast iron is made by remelting pig iron in small furnaces (e.g. cupola furnaces or electric arc furnaces) and poured into moulds to make castings. It usually contains 2% to 6% carbon (ecoinvent v2.2 report 10_partII). An average content of 4% was considered
- coke: 4.13186, 8.76814 MJ (2 suppliers, which the file names only by identifier); sum of these 12.9 MJ; lognormal variance with pedigree 0.042, pedigree (1,1,5,5,1)
  EcoSpold01Location=RER
  properties: carbon content, fossil 0.869149, dry mass 0.0328671 kg, heating value, net 28.6 MJ, water content 0.0638298, wet mass 0.034965 kg
  note on carbon content, fossil: 81.7% C and 6% water in wet mass (ecoinvent v2.1 report 6_VI Table 7.1)
- electricity, medium voltage: 0.00737768, 0.147168, 0.0494481, 0.0022593, 0.000452196, 9.70967e-5, 0.0151974 kWh (7 suppliers, which the file names only by identifier); sum of these 0.222 kWh; lognormal variance with pedigree 0.042, pedigree (1,1,5,5,1)
  EcoSpold01Location=UCTE
- heat, district or industrial, natural gas: 0.023442, 1.42656 MJ (2 suppliers, which the file names only by identifier); sum of these 1.45 MJ; lognormal variance with pedigree 0.042, pedigree (1,1,5,5,1)
  EcoSpold01Location=RER
  properties: heating value, net 1 MJ
- heat, district or industrial, other than natural gas: 0.277871, 0.000128733 MJ (2 suppliers, which the file names only by identifier); sum of these 0.278 MJ; lognormal variance with pedigree 0.042, pedigree (1,1,5,5,1)
  EcoSpold01Location=CH
  properties: heating value, net 1 MJ
- pitch: 0.0270508, 0.00121253, 0.000597678, 0.0104871, 0.001731, 0.152921 kg (6 suppliers, which the file names only by identifier); sum of these 0.194 kg; lognormal variance with pedigree 0.042, pedigree (1,1,5,5,1)
  EcoSpold01Location=RER
  properties: carbon content, fossil 0.83, dry mass 1 kg, heating value, net 28 MJ, wet mass 1 kg
- refractory spent pot liner from Al electrolysis: -1.07809, -0.0156434, -0.176269 kg (3 suppliers, which the file names only by identifier); sum of these -1.27 kg; lognormal variance with pedigree 0.0022, pedigree (1,1,2,5,1)
  EcoSpold01Location=CH
  production volume
    Calculated from the production volume of cathode, for aluminium electrolysis in proportion to the respective output amounts.
  properties: dry mass 1 kg, wet mass 1 kg
- refractory, fireclay, packed: 0.478 kg; lognormal variance with pedigree 0.042, pedigree (1,1,5,5,1)
  EcoSpold01Location=DE
  properties: dry mass 1 kg, wet mass 1 kg
- reinforcing steel: 0.283 kg; lognormal variance with pedigree 0.042, pedigree (1,1,5,5,1)
  EcoSpold01Location=RER
  properties: carbon content, fossil 0.004, dry mass 1 kg, wet mass 1 kg

## Sampling procedure
Literature / Survey

## Extrapolations
see Geography This dataset has been copied from an original dataset covering the geography RER. The uncertainty has been adjusted accordingly.

## Review by Roland Hischier 2003-06-10
Passed.
