# paper production, newsprint, virgin

Dataset: EcoSpold 2, unit process
Geography: RoW
Time period: 2000-01-01 to 2023-12-31
Technology level: current
Classification: EcoSpold01Categories: paper & cardboard/graphic paper
Classification: ISIC rev.4 ecoinvent: 1701:Manufacture of pulp, paper and paperboard
Scenario: Business-as-Usual
System model: Allocation, cut-off by classification
Generated by: Bo Weidema
Published in: Hischier R. 2007
Database: ecoinvent
isCopyrightProtected: true
accessRestrictedTo: 1

## General comment
This dataset represents the global production of newsprint paper without the use of deinked pulp (DIP) from waste paper.
This dataset was created as copy of the corresponding European dataset. The uncertainty has been adjusted accordingly. Data from the corresponding Quebec dataset were added to this GLO dataset (weighted by production volume) to reflect Quebec particularity of the technology and site location (non urban area). It represents the production of newsprint paper without the use of deinked pulp (DIP) from waste paper.
Principal sources for the dataset of Newsprint paper produced in Europe are the Finnish EcoData data-base from KCL (KCL (2002)), the report of the Swedish EPA about the Swedish pulp and paper in-dustry (Naturvardsverket (2001)) as well as several environmental reports from European paper mills (Hylte Mill (2000; Kvarnsveden Mill (2002; Sachsen Mill (2002; Summa Mill (2001)). Further sources are the German inventory study about graphical paper (Tiedemann et al. (2000)) of UBA, dis-tinguishing beteween a nordic and a German newsprint paper, a recently established study from EMPA comparing printed with electronic media (Reichart & Hischier (2001)) - including datasets from several newsprint paper mills - and the European IPPC documentation for the paper and pulp in-dustry (European Commission (2000)). In the latter one, besides BAT technology, the present situa-tion of the pulp and paper industry is described and quantified.
Further documentation about the background data to this dataset can be found in the report Hischier (2007), available through the ecoinvent online for v2.
Reference(s):
">> KCL (2002) KCL EcoData - life cycle inventory database. The Finnish Pulp and Paper Research Institute (KCL), Espoo (Finnland) <<
>> Naturvardsverket (2001) Skogsindustrins utsläpp - avfallsmängder och energiförbrukning 2000. Report 5154. Naturvardsverket (Swedish EPA), Stockholm <<
>> Hylte Mill (2000) Environmental Report 1999. StoraEnso Newsprint, Hyltebruk (Sweden) as pdf-File under: http://www.storaenso.com/CDAvgn/main/0,,1_-2395-2103-,00.html <<
>> Kvarnsveden Mill (2002) Environmental Report 2001. StoraEnso Kvarnsveden AB, Borlänge (Sweden) as pdf-File under: http://www.storaenso.com/CDAvgn/main/0,,1_-2395-2103-,00.html <<
>> Sachsen Mill (2002) Environmental Statement Sachsen Mill 2001. StoraEnso Sachsen GmbH, Eilenburg (Germany) as pdf-File under: http://www.storaenso.com/CDAvgn/main/0,,1_-2394-2102-,00.html <<
>> Summa Mill (2001) Environmental Statement Summa Mill 2000. Stora Enso Newsprint, Hamina (Finland) as pdf-File under: http://www.storaenso.com/CDAvgn/main/0,,1_-2393-2097-,00.html <<
>> Tiedemann A., Böttcher Tiedemann C., Buschardt A., Georgi B., Giersberg G., Goosmann G., Gregor H.-D., Mehlhorn B., Modi A., Neitzel H., Oels H.-J., Schmitz S. and Suhr M. (2000) Ökobilanzen für graphische Papiere. Texte 22/00. Umweltbundesamt, Berlin <<
>> Reichart I. and Hischier R. (2001) Vergleich der Umweltbelastungen bei Benut-zung elektronischer und gedruckter Medien. EMPA-Bericht Nr. 253. EMPA, St. Gallen <<
>> Hischier R. (2007) Life Cycle Inventories of Packagings and Graphical Papers. ecoinvent-Report No. 11, Swiss Centre for Life Cycle Inventories, Dübendorf, 2007. <<
"

## Included activities start
This activity starts with the reception of wood chips and other raw materials at the factory gate.

## Included activities end
This activity includes the European production of newsprint paper without the use of deinked pulp (waste paper) - including transports to paper mill, wood handling, mechanical pulping and bleaching, paper production, energy production on-site and internal waste water treatment.

## Geography
Data from a finnish database and from several European newsprint producers used as European average data.
Data from Quebec dataset have been added to this GLO dataset to reflect Quebec particularity of the technology and site location (non urban area).

## Technology
Average of present used technology

## Time period
Data represent the average technology in the late 1990ies and early 2000s. The production volume is valid for 2018.

## Parameters
- fraction, cooling water, cooling pond system, to air: 0.032 dimensionless; name fraction_CW_CP_to_air; lognormal variance with pedigree 0.0413, pedigree (2,3,1,3,1)
  Calculated based on literature value (Scown, C.D., 2011, Water Footprint of U.S. Transportation Fuels and supplying information of the article) (Vionnet, S., Quantis Water Database - Technical Report, 2012).
- fraction, cooling water, once-through system, to air: 0.004 dimensionless; name fraction_CW_OT_to_air; lognormal variance with pedigree 0.0413, pedigree (2,3,1,3,1)
  (same comment as for fraction, cooling water, cooling pond system, to air)
- fraction, cooling water, recirculating system, to air: 0.771 dimensionless; name fraction_CW_R_to_air; lognormal variance with pedigree 0.0413, pedigree (2,3,1,3,1)
  (same comment as for fraction, cooling water, cooling pond system, to air)
- fraction, cooling water, to air: 0.3875 dimensionless; name fraction_CW_to_air; = (0.5*fraction_CW_OT_to_air)+(0.5*fraction_CW_R_to_air); lognormal variance with pedigree 0.092025, pedigree (4,4,3,2,4)
  Calculated value based on literature value (see comments of the other parametres present in this dataset) and expert opinion. In the case when no industry/literature data are available about the type of cooling or directly fraction, cooling water, to air specific for the process a default assumption is applied. It is assumed that the once-through cooling system is used in 50% of all cases and recirculating system is used in another 50% of all cases.
- fraction, process water, to air: 0.15 dimensionless; name fraction_PW_to_air; lognormal variance with pedigree 0.092025, pedigree (4,4,3,2,4)
  Literature value. In case when no industry/process specific data are available, default evaporation fraction value is used. This value is 15% and is based on literature (Statistics Canada, 2007 & Shaffer, K.H., 2008, Consumptive water use in the Great Lakes Basin, USGS & Shiklomanov, 2003, World Water Resources at the Beginning of the 21st Century) and has been approved by an expert.
- quebec production volume: 2.494e6 kg; name PV_Quebec; lognormal variance with pedigree 0.21, pedigree (5,5,5,5,5)
  Newsprint paper production in quebec (2011). Value based on the Quebec dataset.

## Reference product
- paper, newsprint: 1 kg; name ref; By-product classification allocatable product; CPC 32121: Newsprint; HS2017 4802: Uncoated paper and paperboard, used for writing, printing or other graphics, non perforated punch-cards and p[...]
  EcoSpold01Location=RER
  production volume 1.05007e9 kg; name refPV_GLO; = 20289575000*0.07
    Production volume of total newsprint paper production worlwide for 2018 (20289575000 kg) retrieved from FAOSTAT (http://www.fao.org/faostat/en/#data/FO) for forestry products, category Newsprint, region World, year 2018. For a lack of data on a global level, it is assume that the share of recycled newsprint in total newsprint production is 93% and 7% for virigin newsprint as reported for Europe by CEPI (2018).
    Reference(s):
    CEPI, 2018, Key Statistics 2018 European pulp & paper industry, accessible at http://www.cepi.org/system/files/public/documents/publications/Final%20Key%20Statistics%202018.pdf, last accessed March 2020
  property carbon content, fossil 0.00397425
    Fossil C content was calculated after fossil C contents of chemicals used in the production of the paper (in Tab 8.6 ecoinvent v2.2 report 11_III, part 8).
  property carbon content, non-fossil 0.388876
    Biogenic C content was calculated after biogenic C contents of chemicals used in the production of the paper (in Tab 8.6 ecoinvent v2.2 report 11_III, part 8). The cellulose content in 1 kg of paper (on a wet mas basis) was estimated as (1-chemical content), C content of cellulose was considered 0.44 kgC/kg dry mass (ecoinvent v2.2 report, n 15a, pg 40)
  property price 0.433 EUR2005
    Export prices for the World+ according to: http://faostat.fao.org/site/626/DesktopDefault.aspx?PageID=626#ancor downloaded 27 April 2009; calculated as export value divided by export volume.
  properties: carbon allocation 0.371244 kg, carbon content 0.392851, dry mass 0.945 kg, heating value, net 14.11 MJ, water content 0.0582011, water in wet mass 0.055 kg, wet mass 1 kg

## Inputs from technosphere
- EDTA, ethylenediaminetetraacetic acid: 0.00203 kg; lognormal variance with pedigree 0.0546, pedigree (2,4,5,5,1)
  EcoSpold01Location=RER
  Average data from finnish database
  Uncertainty: average data from finnish database
  properties: carbon content, fossil 0.410959, dry mass 1 kg, heating value, net 19.09 MJ, wet mass 1 kg
  note on carbon content, fossil: Fossil C content was calculated after fossil C contents of chemicals used in the production of the paper (in Tab 8.6 ecoinvent v2.2 report 11_III, part 8). C10H16N2O8
- acetic acid, without water, in 98% solution state: 2.27402e-8 kg; = 0.01295/1000*PV_Quebec/refPV_GLO; lognormal variance with pedigree 0.0438, pedigree (2,3,5,5,1)
  Adaptation of GLO dataset to reflect Quebec particularity. Calculated value = value of Quebec dataset * production volume of Quebec / production volume of GLO.
  properties: carbon content, fossil 0.400016, dry mass 1 kg, heating value, net 14.6 MJ, wet mass 1 kg
  note on heating value, net: Based on literature, page 10, Althaus H.-J., Chudacoff M., Hischier R., Jungbluth N., Osses M. and Primas A. (2007) Life Cycle Inventories of Chemicals. Final report ecoinvent data v2.0 No. 8. EMPA, Swiss Centre for Life Cycle Inventories, Dübendorf, CH, Online-Version under: www.ecoinvent.org.
- aluminium sulfate, powder: 0.0092 kg; lognormal variance with pedigree 0.0426, pedigree (1,3,5,5,1)
  EcoSpold01Location=RER
  Average from several different paper mills
  Uncertainty: average from several different paper mills
  properties: dry mass 1 kg, wet mass 1 kg
- bark chips, wet, measured as dry mass: 0.000317766 kg; = 180.96/1000*PV_Quebec/refPV_GLO; lognormal variance with pedigree 0.0438, pedigree (2,3,5,5,1)
  (same comment as for acetic acid, without water, in 98% solution state)
  properties: carbon content, non-fossil 0.494, dry mass 1 kg, heating value, net 4.81 MJ, water content 1.4, wet mass 2.4 kg
- chemical, inorganic: 1.83186e-6 kg; = 1.0432/1000*PV_Quebec/refPV_GLO; lognormal variance with pedigree 0.0438, pedigree (2,3,5,5,1)
  (same comment as for acetic acid, without water, in 98% solution state)
  properties: carbon content, fossil 0.003, dry mass 1 kg, wet mass 1 kg
  note on carbon content, fossil: This dataset is an unweighted average of 20 inorganic substances (listed in Tab 88.1, ecoinvent v2.2 report 8, part II), being part of the top100 chemicals included in this database. The C-content has also been calculated as an unweighted average of the C content of the substances composing this dataset.
- chemical, organic: 0.005 kg; lognormal variance with pedigree 0.0546, pedigree (2,4,5,5,1)
  Average data from finnish database
  EcoSpold01Location=GLO
  Uncertainty: average data from finnish database
  properties: carbon content, fossil 0.628, dry mass 1 kg, heating value, net 19.03 MJ, wet mass 1 kg
  note on carbon content, fossil: Fossil C content was calculated after fossil C contents of chemicals used in the production of the paper (in Tab 8.6 ecoinvent v2.2 report 11_III, part 8). This dataset is an unweighted average of 20 organic substances (listed in Tab 88.1, ecoinvent v2.2 report 8, part II), being part of the top100 chemicals included in this database. The C-content has also been calculated as an unweighted average of the C content of the substances composing this dataset.
- deinked pulp, wet lap: 1.81852e-6 kg; = 1.0356/1000*PV_Quebec/refPV_GLO; lognormal variance with pedigree 0.0438, pedigree (2,3,5,5,1)
  (same comment as for acetic acid, without water, in 98% solution state)
  properties: heating value, net 8 MJ
- diesel: 2.02982e-9, 8.41456e-7, 8.62744e-9, 8.52151e-8, 5.96897e-9, 4.22227e-8 kg (6 suppliers, which the file names only by identifier); sum of these 9.8552e-7 kg; = 0.561229/1000*PV_Quebec/refPV_GLO; lognormal variance with pedigree 0.0438, pedigree (2,3,5,5,1)
  (same comment as for acetic acid, without water, in 98% solution state)
  properties: carbon content, fossil 0.865, dry mass 1 kg, heating value, net 42.8 MJ, wet mass 1 kg
  note on carbon content, fossil: C-content of diesel is 86.5% (ecoinvent v2.2 report 6_IV, Tab 3.14)
- electricity, medium voltage: 0.0947388, 1.88983, 0.0473093, 0.0290123, 0.00580678, 0.00124685, 0.195154, 0.560905 kWh (8 suppliers, which the file names only by identifier); sum of these 2.824 kWh; lognormal variance with pedigree 0.0432, pedigree (2,3,5,5,1)
  Average from finnish database and several paper mills
  EcoSpold01Location=NORDEL
  Uncertainty: average from finnish database and several paper mills
- hard coal: 0.000916661, 0.000217517, 0.00648743, 0.00152357, 0.000935431, 0.00202159, 0.000397802 kg (7 suppliers, which the file names only by identifier); sum of these 0.0125 kg; lognormal variance with pedigree 0.0432, pedigree (2,3,5,5,1)
  Average from finnish database and several paper mills
  EcoSpold01Location=WEU
  Uncertainty: average from finnish database and several paper mills
  properties: carbon content, fossil 0.845, dry mass 0.94 kg, heating value, net 27.91 MJ, water content 0.0638298, wet mass 1 kg
  note on carbon content, fossil: Fossil C content was calculated after fossil C contents of chemicals used in the production of the paper (in Tab 8.6 ecoinvent v2.2 report 11_III, part 8). C content 75-94% (specified in Tab 1.1, report 6, part VI). A mean content of 0.845 kg C/ kg dry hard coal was considered
  note on heating value, net: Based on the Characterization factor of Hard coal in the CED method
- hazardous waste, for underground deposit: -0.00028 kg; name haz; lognormal variance with pedigree 0.0026, pedigree (1,3,1,5,1)
  Average from several different paper mills
  EcoSpold01Location=DE
  Uncertainty: average from several different paper mills
  production volume; = refPV_GLO*haz/ ref
    Calculated from the production volume of paper, newsprint in proportion to the respective output amounts.
  properties: carbon content, fossil 0.554667, dry mass 1 kg, wet mass 1 kg
  note on carbon content, fossil: Fossil C content was calculated after fossil C contents of chemicals used in the production of the paper (in Tab 8.6 ecoinvent v2.2 report 11_III, part 8). Tab A.6, ecoinvent v2.2 report 13_I, average hazardous waste composition was used, and referred to 0% water mass. No waste-specific emission are currently inventoried for underground deposits. Accordingly, no waste composition must be specified. For generic, average waste to underground deposit deposition in a 200 liter steel drum without cement solidification is assumed (ecoinvent v2.2 report 13_I).
- heavy fuel oil: 1.71068e-5, 9.96153e-6, 5.06425e-5, 0.00118384, 1.27792e-5, 6.56658e-5 kg (6 suppliers, which the file names only by identifier); sum of these 0.00134 kg; lognormal variance with pedigree 0.0432, pedigree (2,3,5,5,1)
  Average from finnish database and several paper mills
  EcoSpold01Location=RER
  Uncertainty: average from finnish database and several paper mills
  properties: carbon content, fossil 0.849, dry mass 1 kg, heating value, net 41.2 MJ, wet mass 1 kg
  note on carbon content, fossil: Fossil C content was calculated after fossil C contents of chemicals used in the production of the paper (in Tab 8.6 ecoinvent v2.2 report 11_III, part 8). C-content is 84.9% (ecoinvent v2.2 report 6_IV, Tab 3.18)
- hydrogen peroxide, without water, in 50% solution state: 0.00483 kg; lognormal variance with pedigree 0.0546, pedigree (2,4,5,5,1)
  Average data from finnish database
  EcoSpold01Location=RER
  Uncertainty: average data from finnish database
  properties: dry mass 1 kg, heating value, net 7.13 MJ, wet mass 1 kg
- inert waste: -7.16924e-7 kg; name inert; = 0.40827/1000*PV_Quebec/refPV_GLO; lognormal variance with pedigree 0.0038, pedigree (2,3,1,5,1)
  (same comment as for acetic acid, without water, in 98% solution state)
  production volume; = refPV_GLO *inert / ref
    Calculated from production volume of reference product using the relative outputs.
  properties: dry mass 1 kg, wet mass 1 kg
- kaolin: 0.0563 kg; lognormal variance with pedigree 0.0426, pedigree (1,3,5,5,1)
  Average from several different paper mills
  EcoSpold01Location=RER
  Uncertainty: average from several different paper mills
  properties: dry mass 1 kg, wet mass 1 kg
- light fuel oil: 2.95682e-5, 0.00309816, 0.000152369, 0.000307517, 2.19741e-5, 2.04065e-5 kg (6 suppliers, which the file names only by identifier); sum of these 0.00363 kg; lognormal variance with pedigree 0.0432, pedigree (2,3,5,5,1)
  (same comment as for heavy fuel oil)
  properties: carbon content, fossil 0.862, dry mass 1 kg, heating value, net 42.6 MJ, wet mass 1 kg
  note on carbon content, fossil: Fossil C content was calculated after fossil C contents of chemicals used in the production of the paper (in Tab 8.6 ecoinvent v2.2 report 11_III, part 8). C-content is 86.2% (ecoinvent v2.2 report 6_IV Tab 3.16)
- liquefied petroleum gas: 9.36089e-10, 8.98975e-9, 2.8221e-9, 6.28133e-10, 3.19301e-8, 1.33631e-7 kg (6 suppliers, which the file names only by identifier); sum of these 1.78937e-7 kg; = 0.1019/1000*PV_Quebec/refPV_GLO; lognormal variance with pedigree 0.0438, pedigree (2,3,5,5,1)
  (same comment as for acetic acid, without water, in 98% solution state)
  properties: carbon content, fossil 0.821863, dry mass 1 kg, heating value, net 45.5 MJ, wet mass 1 kg
  note on heating value, net: Indicative value. Reference: Fuels - Higher and Lower Calorific Values, available at: https://www.engineeringtoolbox.com/fuels-higher-calorific-values-d_169.html
- malusil: 0.0086 kg; lognormal variance with pedigree 0.0426, pedigree (1,3,5,5,1)
  (same comment as for aluminium sulfate, powder)
  properties: dry mass 1 kg, wet mass 1 kg
- municipal solid waste: -2.64086e-6, -3.1359e-7, -0.00148997, -2.19438e-7, -7.04357e-8, -1.59204e-7, -6.62771e-6 kg (7 suppliers, which the file names only by identifier); sum of these -0.0015 kg; lognormal variance with pedigree 0.0146, pedigree (2,4,1,5,1)
  EcoSpold01Location=CH
  Average data from finnish database
  Uncertainty: average data from finnish database
  production volume; = refPV_GLO*waste/ ref
    (same comment as for hazardous waste, for underground deposit)
  properties: carbon content, fossil 0.171549, carbon content, non-fossil 0.261655, dry mass 0.771 kg, heating value, net 11.74 MJ, water content 0.297017, wet mass 1 kg
  note on carbon content, fossil: Fossil C content was calculated after fossil C contents of chemicals used in the production of the paper (in Tab 8.6 ecoinvent v2.2 report 11_III, part 8). MSW composition in tab 4.1, ecoinvent v2.2 report 13_I. C content referred to 1 kg DM
  note on carbon content, non-fossil: Biogenic C content was calculated after biogenic C contents of chemicals used in the production of the paper (in Tab 8.6 ecoinvent v2.2 report 11_III, part 8). The cellulose content in 1 kg of paper (on a wet mas basis) was estimated as (1-chemical content), C content of cellulose was considered 0.44 kgC/kg dry mass (ecoinvent v2.2 report, n 15a, pg 40) MSW composition in tab 4.1, ecoinvent v2.2 report 13_I. C content referred to 1 kg DM
  note on heating value, net: Value taken from the general comment of the treatment dataset.
- natural gas, high pressure: 8.84775e-8, 1.49251e-7, 3.25561e-7, 1.08952e-7, 2.54616e-8, 1.51542e-7, 1.45416e-7, 3.82375e-7, 1.47622e-7, 2.2833e-7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 m3 (36 suppliers, which the file names only by identifier); sum of these 1.10187e-5 m3; = 6.2749/1000*PV_Quebec/refPV_GLO; lognormal variance with pedigree 0.0438, pedigree (2,3,5,5,1)
  (same comment as for acetic acid, without water, in 98% solution state)
  properties: carbon content, fossil 0.602381, dry mass 0.84 kg, heating value, gross 40 MJ, heating value, net 36 MJ, wet mass 0.84 kg
  note on carbon content, fossil: An average C content of 0.506 kg C/ m3 has been assumed (this average has been calculated using data in Tab 3.5, ecoinvent v2.2 report 6_V
  note on heating value, net: Literature value, Source: Christoph Meili;Niels Jungbluth;Maresa Bussa (2021) Life cycle inventories of crude oil and natural gas extraction. ESU-services Ltd. commissioned by BAFU & VSG, Schaffhausen, Switzerland, http://esu-services.ch/data/public-lci-reports/
- nitrogen, liquid: 0.00023 kg; lognormal variance with pedigree 0.0546, pedigree (2,4,5,5,1)
  (same comment as for EDTA, ethylenediaminetetraacetic acid)
  properties: dry mass 1 kg, wet mass 1 kg
- paper mill, integrated: 5.44e-11 unit; lognormal variance with pedigree 0.448, pedigree (4,5,5,5,5)
  EcoSpold01Location=RER
  Own assumption
  Uncertainty: own assumption
- petrol, low-sulfur: 5.86628e-8 kg; = 0.033407/1000*PV_Quebec/refPV_GLO; lognormal variance with pedigree 0.0438, pedigree (2,3,5,5,1)
  (same comment as for acetic acid, without water, in 98% solution state)
  properties: carbon content, fossil 0.865, dry mass 1 kg, heating value, net 42.5 MJ, wet mass 1 kg
  note on heating value, net: Based on literature, page 611, Report 17: Jungbluth, N., Chudacoff, M., Dauriat, A., Dinkel, F., Doka, G., Faist Emmenegger, M., Gnansounou, E., Kljun, N., Schleiss, K., Spielmann, M., Stettler, C., Sutter, J. 2007: Life Cycle Inventories of Bioenergy. ecoinvent report No. 17, Swiss Centre for Life Cycle Inventories, Dübendorf, CH.
- phosphoric acid, industrial grade, without water, in 85% solution state: 6.13495e-7 kg; = 0.34937/1000*PV_Quebec/refPV_GLO; lognormal variance with pedigree 0.0438, pedigree (2,3,5,5,1)
  (same comment as for acetic acid, without water, in 98% solution state)
  properties: dry mass 1 kg, wet mass 1 kg
- phosphorus, white, liquid: 3e-5 kg; lognormal variance with pedigree 0.0546, pedigree (2,4,5,5,1)
  (same comment as for hydrogen peroxide, without water, in 50% solution state)
  properties: dry mass 1 kg, wet mass 1 kg
- pulpwood, softwood, measured as solid wood under bark: 0.00268854 m3; = 0.002693-(1/pulpwood_drymass)*(982.78/1000*PV_Quebec/refPV_GLO); lognormal variance with pedigree 0.0432, pedigree (2,3,5,5,1)
  Adaptation of GLO dataset to reflect Quebec particularity (wood chips used as raw materials instead of pulpwood). Calculated value = volume of plulpwood in original GLO dataset - (mass of wood chips in Quebec dataset * production volume of Quebec / production volume of GLO)*)1/density of pulpwood).
  Original comment : average from finnish database and several paper mills; includes also residual wood from regular softwood forestry
  EcoSpold01Location=RER
  Uncertainty: average from finnish database and several paper mills
  property dry mass 387.2 kg; name pulpwood_drymass
  properties: carbon content, non-fossil 0.494, heating value, net 4483.78 MJ, water content 1.4, wet mass 929.28 kg
  note on carbon content, non-fossil: Biogenic C content was calculated after biogenic C contents of chemicals used in the production of the paper (in Tab 8.6 ecoinvent v2.2 report 11_III, part 8). The cellulose content in 1 kg of paper (on a wet mas basis) was estimated as (1-chemical content), C content of cellulose was considered 0.44 kgC/kg dry mass (ecoinvent v2.2 report, n 15a, pg 40) C content of dry mass is 0.494 kgC/kg dry wood (ecoinvent v2.2 report 9)
  note on heating value, net: Value based on "softwood forestry, mixed species, sustainable forest management"The property is based on a value of 11.58MJ/kg
- quicklime, milled, loose: 0.0009 kg; lognormal variance with pedigree 0.0426, pedigree (1,3,5,5,1)
  Average from several different paper mills
  EcoSpold01Location=CH
  Uncertainty: average from several different paper mills
  properties: dry mass 0.99 kg, water content 0.010101, wet mass 1 kg
- retention aid, for paper production: 1.655e-6 kg; = 0.94248/1000*PV_Quebec/refPV_GLO; lognormal variance with pedigree 0.0438, pedigree (2,3,5,5,1)
  (same comment as for acetic acid, without water, in 98% solution state)
  properties: carbon content, fossil 0.5, dry mass 1 kg, heating value, net 15.15 MJ, wet mass 1 kg
- sludge from pulp and paper production: -6.26841e-5 kg; name sludge; = 35.697/1000*PV_Quebec/refPV_GLO; lognormal variance with pedigree 0.0038, pedigree (2,3,1,5,1)
  (same comment as for acetic acid, without water, in 98% solution state)
  production volume; = refPV_GLO * sludge / ref
    Calculated from production volume of reference product using the relative outputs.
  properties: carbon content, non-fossil 0.21, dry mass 0.75 kg, heating value, net 2.65 MJ, water content 0.333333, wet mass 1 kg
- sodium chloride, powder: 3.88569e-9 kg; = 0.0022128/1000*PV_Quebec/refPV_GLO; lognormal variance with pedigree 0.0438, pedigree (2,3,5,5,1)
  (same comment as for acetic acid, without water, in 98% solution state)
  properties: dry mass 1 kg, wet mass 1 kg
- sodium dithionite, anhydrous: 0.001 kg; lognormal variance with pedigree 0.0546, pedigree (2,4,5,5,1)
  (same comment as for hydrogen peroxide, without water, in 50% solution state)
  properties: dry mass 1 kg, wet mass 1 kg
- sodium hydroxide, without water, in 50% solution state: 0.00407 kg; lognormal variance with pedigree 0.0546, pedigree (2,4,5,5,1)
  (same comment as for EDTA, ethylenediaminetetraacetic acid)
  properties: dry mass 1 kg, heating value, net 3.03 MJ, wet mass 1 kg
- sodium hypochlorite, without water, in 15% solution state: 2.72005e-7 kg; = 0.1549/1000*PV_Quebec/refPV_GLO; lognormal variance with pedigree 0.0438, pedigree (2,3,5,5,1)
  (same comment as for acetic acid, without water, in 98% solution state)
  properties: dry mass 1 kg, wet mass 1 kg
- sodium silicate, spray powder, 80%: 0.0133 kg; lognormal variance with pedigree 0.0546, pedigree (2,4,5,5,1)
  (same comment as for hydrogen peroxide, without water, in 50% solution state)
  properties: dry mass 1 kg, wet mass 1 kg
- sulfate pulp, bleached: 0.024415 kg; = 0.0257*0.95; lognormal variance with pedigree 0.0432, pedigree (2,3,5,5,1)
  Average from finnish database and several paper mills. 95% of pulp input is bleached pulp, 5% unbleached pulp.
  Uncertainty: average from finnish database and several paper mills
  properties: carbon content, non-fossil 0.494, dry mass 0.9 kg, heating value, net 13.23 MJ, water content 0.111111, wet mass 1 kg
  note on carbon content, non-fossil: C content of dry mass of sulfate pulp is 0.494 kgC/kg dry wood (ecoinvent v2.2 report 6_IX & ecoinvent v2.2 report 9). No other C containing products in the formulation of the pulp.
- sulfate pulp, unbleached: 0.001285 kg; = 0.0257*0.05; lognormal variance with pedigree 0.0432, pedigree (2,3,5,5,1)
  (same comment as for sulfate pulp, bleached)
  properties: carbon content, non-fossil 0.494, dry mass 0.9 kg, heating value, net 13.23 MJ, price 0.355 EUR2005, water content 0.111111, wet mass 1 kg
- sulfur dioxide, liquid: 0.0107 kg; lognormal variance with pedigree 0.0546, pedigree (2,4,5,5,1)
  (same comment as for hydrogen peroxide, without water, in 50% solution state)
  properties: dry mass 1 kg, wet mass 1 kg
- sulfuric acid: 3.99122e-7 kg; = 0.22729/1000*PV_Quebec/refPV_GLO; lognormal variance with pedigree 0.0438, pedigree (2,3,5,5,1)
  (same comment as for acetic acid, without water, in 98% solution state)
  properties: dry mass 1 kg, wet mass 1 kg
- urea: 1.69396e-6, 1.44652e-6 kg (2 suppliers, which the file names only by identifier); sum of these 3.14047e-6 kg; = (0.83423/1000*PV_Quebec/refPV_GLO)*2.14379903903132; lognormal variance with pedigree 0.0438, pedigree (2,3,5,5,1)
  The exchange has been updated from 'urea, as N' into 'urea' and therefore its amount has been scaled (multiplied) from 0 kg by 2.1438 kg of 'urea' per kg of 'urea, as N'. Original comment of the exchange is: Adaptation of GLO dataset to reflect Quebec particularity. Calculated value = value of Quebec dataset * production volume of Quebec / production volume of GLO.
  properties: carbon content, fossil 0.2, dry mass 1 kg, wet mass 1 kg
- waste wood, untreated: -1.4355e-7, -3.73666e-9, -2.78454e-6, -5.11092e-8, -2.1687e-8, -3.42853e-8, -4.11623e-7 kg (7 suppliers, which the file names only by identifier); sum of these -3.45053e-6 kg; = 1.96499/1000*PV_Quebec/refPV_GLO; lognormal variance with pedigree 0.0038, pedigree (2,3,1,5,1)
  (same comment as for acetic acid, without water, in 98% solution state)
  production volume; = refPV_GLO * wood / ref
    Calculated from production volume of reference product using the relative outputs.
  properties: carbon content, non-fossil 0.48632, dry mass 0.8 kg, heating value, net 13.99 MJ, water content 0.25, wet mass 1 kg
- water, deionised: 5.83538e-6 kg; = 3.3231/1000*PV_Quebec/refPV_GLO; lognormal variance with pedigree 0.0438, pedigree (2,3,5,5,1)
  (same comment as for acetic acid, without water, in 98% solution state)
  properties: wet mass 1 kg
- wood ash mixture, pure: -0.00848 kg; name ash; lognormal variance with pedigree 0.0146, pedigree (2,4,1,5,1)
  Average data from finnish database
  EcoSpold01Location=CH
  Uncertainty: average data from finnish database
  production volume; = refPV_GLO*ash/ ref
    (same comment as for hazardous waste, for underground deposit)
  properties: carbon content, non-fossil 0.012, dry mass 1 kg, wet mass 1 kg
  note on carbon content, non-fossil: Biogenic C content was calculated after biogenic C contents of chemicals used in the production of the paper (in Tab 8.6 ecoinvent v2.2 report 11_III, part 8). The cellulose content in 1 kg of paper (on a wet mas basis) was estimated as (1-chemical content), C content of cellulose was considered 0.44 kgC/kg dry mass (ecoinvent v2.2 report, n 15a, pg 40) Tab A.9, ecoinvent v2.2 report 13_I.
- wood chips, wet, measured as dry mass: 0.00172577 kg; = 982.78/1000*PV_Quebec/refPV_GLO; lognormal variance with pedigree 0.0438, pedigree (2,3,5,5,1)
  (same comment as for acetic acid, without water, in 98% solution state)
  properties: carbon content, non-fossil 0.494, dry mass 1 kg, heating value, net 10.84 MJ, water content 1.1, wet mass 2.1 kg
  note on heating value, net: Value based on the dataset 'softwood forestry, mixed species, sustainable forest management'

## Inputs from nature
- Water, cooling, unspecified natural origin [natural resource, in water]: 0.0523 m3; name water_cooling_UNO_input; lognormal variance with pedigree 0.0426, pedigree (1,3,5,5,1)
  Average from several different paper mills
  Uncertainty: average from several different paper mills
- Water, unspecified natural origin [natural resource, in water]: 0.013 m3; name water_UNO_input; lognormal variance with pedigree 0.0426, pedigree (1,3,5,5,1)
  (same comment as for Water, cooling, unspecified natural origin)

## Emissions to nature
- Acetaldehyde [air, non-urban air or from high stacks]: 4.52153e-10 kg; = 0.00025749/1000*PV_Quebec/refPV_GLO; lognormal variance with pedigree 0.132, pedigree (3,5,5,5,4)
  Adaptation of GLO dataset to reflect Quebec particularity (emissions from non urban air and high stacks in Quebec). Calculated value = value of Quebec dataset * production volume of Quebec / production volume of GLO.
- Acetaldehyde [air, urban air close to ground]: 3.03e-7 kg; lognormal variance with pedigree 0.1806, pedigree (2,5,5,5,4)
  Estimation - based on respective heating modules
  Uncertainty: estimation - based on respective heating modules
- Acetic acid [air, non-urban air or from high stacks]: 4.19457e-10 kg; = 0.00023887/1000*PV_Quebec/refPV_GLO; lognormal variance with pedigree 0.132, pedigree (3,5,5,5,4)
  (same comment as for Acetaldehyde)
- Acetic acid [air, urban air close to ground]: 3.31e-8 kg; lognormal variance with pedigree 0.1806, pedigree (2,5,5,5,4)
  (same comment as for Acetaldehyde)
- Acetone [air, non-urban air or from high stacks]: 8.87484e-11 kg; = 5.054E-05/1000*PV_Quebec/refPV_GLO; lognormal variance with pedigree 0.132, pedigree (3,5,5,5,4)
  (same comment as for Acetaldehyde)
- Acetone [air, urban air close to ground]: 8.28e-9 kg; lognormal variance with pedigree 0.1806, pedigree (2,5,5,5,4)
  (same comment as for Acetaldehyde)
- Acetylene [air, urban air close to ground]: 1.81e-7 kg; lognormal variance with pedigree 0.1806, pedigree (2,5,5,5,4)
  (same comment as for Acetaldehyde)
- Aluminium III [air, urban air close to ground]: 3.87e-6 kg; lognormal variance with pedigree 0.1806, pedigree (2,5,5,5,4)
  (same comment as for Acetaldehyde)
- Ammonia [air, non-urban air or from high stacks]: 1.03005e-8 kg; = 0.0058659/1000*PV_Quebec/refPV_GLO; lognormal variance with pedigree 0.132, pedigree (3,5,5,5,4)
  (same comment as for Acetaldehyde)
- Ammonia [air, urban air close to ground]: 8.38e-6 kg; lognormal variance with pedigree 0.1806, pedigree (2,5,5,5,4)
  (same comment as for Acetaldehyde)
- Antimony ion [air, urban air close to ground]: 5.72e-10 kg; lognormal variance with pedigree 0.1806, pedigree (2,5,5,5,4)
  (same comment as for Acetaldehyde)
- Arsenic ion [air, non-urban air or from high stacks]: 1.36422e-11 kg; = 7.7689E-06/1000*PV_Quebec/refPV_GLO; lognormal variance with pedigree 0.7346, pedigree (3,3,5,5,4)
  (same comment as for Acetaldehyde)
- Arsenic ion [air, urban air close to ground]: 1.47e-8 kg; lognormal variance with pedigree 0.1806, pedigree (2,5,5,5,4)
  (same comment as for Acetaldehyde)
- Barium II [air, urban air close to ground]: 4.56e-8 kg; lognormal variance with pedigree 0.7806, pedigree (2,5,5,5,4)
  (same comment as for Acetaldehyde)
- Benzene [air, non-urban air or from high stacks]: 5.58673e-9 kg; = 0.0031815/1000*PV_Quebec/refPV_GLO; lognormal variance with pedigree 0.132, pedigree (3,5,5,5,4)
  (same comment as for Acetaldehyde)
- Benzene [air, urban air close to ground]: 4.58e-6 kg; lognormal variance with pedigree 0.1806, pedigree (2,5,5,5,4)
  (same comment as for Acetaldehyde)
- Benzo(a)pyrene [air, non-urban air or from high stacks]: 2.99609e-12 kg; = 1.7062E-06/1000*PV_Quebec/refPV_GLO; lognormal variance with pedigree 0.132, pedigree (3,5,5,5,4)
  (same comment as for Acetaldehyde)
- Benzo(a)pyrene [air, urban air close to ground]: 2.42e-9 kg; lognormal variance with pedigree 0.1806, pedigree (2,5,5,5,4)
  (same comment as for Acetaldehyde)
- Beryllium II [air, urban air close to ground]: 4.56e-10 kg; lognormal variance with pedigree 0.7806, pedigree (2,5,5,5,4)
  (same comment as for Acetaldehyde)
- Boron [air, urban air close to ground]: 1.72e-7 kg; lognormal variance with pedigree 0.7806, pedigree (2,5,5,5,4)
  (same comment as for Acetaldehyde)
- Bromine [air, non-urban air or from high stacks]: 3.57013e-10 kg; = 0.00020331/1000*PV_Quebec/refPV_GLO; lognormal variance with pedigree 0.742, pedigree (3,5,5,5,4)
  (same comment as for Acetaldehyde)
- Bromine [air, urban air close to ground]: 2.93e-7 kg; lognormal variance with pedigree 0.1806, pedigree (2,5,5,5,4)
  (same comment as for Acetaldehyde)
- Butane [air, non-urban air or from high stacks]: 3.02015e-10 kg; = 0.00017199/1000*PV_Quebec/refPV_GLO; lognormal variance with pedigree 0.132, pedigree (3,5,5,5,4)
  (same comment as for Acetaldehyde)
- Butane [air, urban air close to ground]: 4.87e-8 kg; lognormal variance with pedigree 0.4406, pedigree (2,5,5,5,4)
  (same comment as for Acetaldehyde)
- Cadmium II [air, non-urban air or from high stacks]: 4.16524e-12 kg; = 2.372E-06/1000*PV_Quebec/refPV_GLO; lognormal variance with pedigree 0.742, pedigree (3,5,5,5,4)
  (same comment as for Acetaldehyde)
- Cadmium II [air, urban air close to ground]: 5.77e-9 kg; lognormal variance with pedigree 0.7806, pedigree (2,5,5,5,4)
  (same comment as for Acetaldehyde)
- Calcium II [air, urban air close to ground]: 2.87e-5 kg; lognormal variance with pedigree 0.4406, pedigree (2,5,5,5,4)
  (same comment as for Acetaldehyde)
- Carbon dioxide, fossil [air, non-urban air or from high stacks]: 6.77062e-5 kg; = 38.557/1000*PV_Quebec/refPV_GLO; lognormal variance with pedigree 0.0438, pedigree (2,3,5,5,1)
  (same comment as for Acetaldehyde)
- Carbon dioxide, fossil [air, urban air close to ground]: 0.0489 kg; lognormal variance with pedigree 0.1406, pedigree (2,5,5,5,4)
  (same comment as for Acetaldehyde)
- Carbon dioxide, non-fossil [air, non-urban air or from high stacks]: 0.000571983 kg; = 325.73/1000*PV_Quebec/refPV_GLO; lognormal variance with pedigree 0.0438, pedigree (2,3,5,5,1)
  (same comment as for Acetaldehyde)
- Carbon dioxide, non-fossil [air, urban air close to ground]: 0.458 kg; lognormal variance with pedigree 0.1406, pedigree (2,5,5,5,4)
  (same comment as for Acetaldehyde)
- Carbon monoxide, fossil [air, non-urban air or from high stacks]: 4.32679e-6 kg; = 2.464/1000*PV_Quebec/refPV_GLO; lognormal variance with pedigree 0.6932, pedigree (2,3,5,5,1)
  (same comment as for Acetaldehyde)
- Carbon monoxide, fossil [air, urban air close to ground]: 3.72e-5 kg; lognormal variance with pedigree 0.7806, pedigree (2,5,5,5,4)
  (same comment as for Acetaldehyde)
- Carbon monoxide, non-fossil [air, non-urban air or from high stacks]: 2.43962e-7 kg; = 0.13893/1000*PV_Quebec/refPV_GLO; lognormal variance with pedigree 0.132, pedigree (3,5,5,5,4)
  (same comment as for Acetaldehyde)
- Carbon monoxide, non-fossil [air, urban air close to ground]: 0.000232 kg; lognormal variance with pedigree 0.7806, pedigree (2,5,5,5,4)
  (same comment as for Acetaldehyde)
- Chlorine [air, non-urban air or from high stacks]: 1.07104e-9 kg; = 0.00060993/1000*PV_Quebec/refPV_GLO; lognormal variance with pedigree 0.132, pedigree (3,5,5,5,4)
  (same comment as for Acetaldehyde)
- Chlorine [air, urban air close to ground]: 8.69e-7 kg; lognormal variance with pedigree 0.4406, pedigree (2,5,5,5,4)
  (same comment as for Acetaldehyde)
- Chromium III [air, non-urban air or from high stacks]: 2.64928e-11 kg; = 1.5087E-05/1000*PV_Quebec/refPV_GLO; lognormal variance with pedigree 0.742, pedigree (3,5,5,5,4)
  (same comment as for Acetaldehyde)
- Chromium III [air, urban air close to ground]: 2.81e-8 kg; lognormal variance with pedigree 0.7806, pedigree (2,5,5,5,4)
  (same comment as for Acetaldehyde)
- Chromium VI [air, non-urban air or from high stacks]: 2.67597e-13 kg; = 1.5239E-07/1000*PV_Quebec/refPV_GLO; lognormal variance with pedigree 0.742, pedigree (3,5,5,5,4)
  (same comment as for Acetaldehyde)
- Chromium VI [air, urban air close to ground]: 1.21e-9 kg; lognormal variance with pedigree 0.7806, pedigree (2,5,5,5,4)
  (same comment as for Acetaldehyde)
- Cobalt II [air, non-urban air or from high stacks]: 1.9525e-11 kg; = 1.1119E-05/1000*PV_Quebec/refPV_GLO; lognormal variance with pedigree 0.742, pedigree (3,5,5,5,4)
  (same comment as for Acetaldehyde)
- Cobalt II [air, urban air close to ground]: 2.97e-9 kg; lognormal variance with pedigree 0.7806, pedigree (2,5,5,5,4)
  (same comment as for Acetaldehyde)
- Copper ion [air, non-urban air or from high stacks]: 1.43079e-10 kg; = 8.148E-05/1000*PV_Quebec/refPV_GLO; lognormal variance with pedigree 0.742, pedigree (3,5,5,5,4)
  (same comment as for Acetaldehyde)
- Copper ion [air, urban air close to ground]: 2.23e-7 kg; lognormal variance with pedigree 0.7806, pedigree (2,5,5,5,4)
  (same comment as for Acetaldehyde)
- Dinitrogen monoxide [air, non-urban air or from high stacks]: 2.35866e-8 kg; = 0.013432/1000*PV_Quebec/refPV_GLO; lognormal variance with pedigree 0.0832, pedigree (2,3,5,5,1)
  (same comment as for Acetaldehyde)
- Dinitrogen monoxide [air, urban air close to ground]: 1.26e-5 kg; lognormal variance with pedigree 0.1806, pedigree (2,5,5,5,4)
  (same comment as for Acetaldehyde)
- Dioxins, measured as 2,3,7,8-tetrachlorodibenzo-p-dioxin [air, non-urban air or from high stacks]: 1.84749e-16 kg; = 1.0521E-10/1000*PV_Quebec/refPV_GLO; lognormal variance with pedigree 0.132, pedigree (3,5,5,5,4)
  (same comment as for Acetaldehyde)
- Dioxins, measured as 2,3,7,8-tetrachlorodibenzo-p-dioxin [air, urban air close to ground]: 7.39e-12 kg; lognormal variance with pedigree 0.1806, pedigree (2,5,5,5,4)
  (same comment as for Acetaldehyde)
- Ethane [air, urban air close to ground]: 5.43e-7 kg; lognormal variance with pedigree 0.1806, pedigree (2,5,5,5,4)
  (same comment as for Acetaldehyde)
- Ethanol [air, non-urban air or from high stacks]: 1.77497e-10 kg; = 0.00010108/1000*PV_Quebec/refPV_GLO; lognormal variance with pedigree 0.132, pedigree (3,5,5,5,4)
  (same comment as for Acetaldehyde)
- Ethanol [air, urban air close to ground]: 1.66e-8 kg; lognormal variance with pedigree 0.1806, pedigree (2,5,5,5,4)
  (same comment as for Acetaldehyde)
- Ethyl benzene [air, non-urban air or from high stacks]: 1.78515e-10 kg; = 0.00010166/1000*PV_Quebec/refPV_GLO; lognormal variance with pedigree 0.132, pedigree (3,5,5,5,4)
  (same comment as for Acetaldehyde)
- Ethyl benzene [air, urban air close to ground]: 1.45e-7 kg; lognormal variance with pedigree 0.1806, pedigree (2,5,5,5,4)
  (same comment as for Acetaldehyde)
- Ethylene [air, urban air close to ground]: 1.09e-6 kg; lognormal variance with pedigree 0.7806, pedigree (2,5,5,5,4)
  (same comment as for Acetaldehyde)
- Fluorine [air, non-urban air or from high stacks]: 2.9752e-10 kg; = 0.00016943/1000*PV_Quebec/refPV_GLO; lognormal variance with pedigree 0.132, pedigree (3,5,5,5,4)
  (same comment as for Acetaldehyde)
- Fluorine [air, urban air close to ground]: 2.41e-7 kg; lognormal variance with pedigree 0.1806, pedigree (2,5,5,5,4)
  (same comment as for Acetaldehyde)
- Formaldehyde [air, non-urban air or from high stacks]: 1.08625e-9 kg; = 0.00061859/1000*PV_Quebec/refPV_GLO; lognormal variance with pedigree 0.132, pedigree (3,5,5,5,4)
  (same comment as for Acetaldehyde)
- Formaldehyde [air, urban air close to ground]: 8.21e-7 kg; lognormal variance with pedigree 0.1806, pedigree (2,5,5,5,4)
  (same comment as for Acetaldehyde)
- Hexachlorobenzene [air, non-urban air or from high stacks]: 4.2843e-17 kg; = 2.4398E-11/1000*PV_Quebec/refPV_GLO; lognormal variance with pedigree 0.132, pedigree (3,5,5,5,4)
  (same comment as for Acetaldehyde)
- Hexachlorobenzene [air, urban air close to ground]: 3.48e-14 kg; lognormal variance with pedigree 0.1806, pedigree (2,5,5,5,4)
  (same comment as for Acetaldehyde)
- Hydrocarbons, aliphatic, alkanes, unspecified [air, non-urban air or from high stacks]: 5.77181e-9 kg; = 0.0032869/1000*PV_Quebec/refPV_GLO; lognormal variance with pedigree 0.132, pedigree (3,5,5,5,4)
  (same comment as for Acetaldehyde)
- Hydrocarbons, aliphatic, alkanes, unspecified [air, urban air close to ground]: 4.68e-6 kg; lognormal variance with pedigree 0.1806, pedigree (2,5,5,5,4)
  (same comment as for Acetaldehyde)
- Hydrocarbons, aliphatic, unsaturated [air, non-urban air or from high stacks]: 1.84644e-8 kg; = 0.010515/1000*PV_Quebec/refPV_GLO; lognormal variance with pedigree 0.132, pedigree (3,5,5,5,4)
  (same comment as for Acetaldehyde)
- Hydrocarbons, aliphatic, unsaturated [air, urban air close to ground]: 1.51e-5 kg; lognormal variance with pedigree 0.1806, pedigree (2,5,5,5,4)
  (same comment as for Acetaldehyde)
- Hydrocarbons, aromatic [air, non-urban air or from high stacks]: 8.88661e-11 kg; = 5.0607E-05/1000*PV_Quebec/refPV_GLO; lognormal variance with pedigree 0.132, pedigree (3,5,5,5,4)
  (same comment as for Acetaldehyde)
- Hydrocarbons, aromatic [air, urban air close to ground]: 1.29e-8 kg; lognormal variance with pedigree 0.1806, pedigree (2,5,5,5,4)
  (same comment as for Acetaldehyde)
- Hydrochloric acid [air, non-urban air or from high stacks]: 8.52382e-10 kg; = 0.00048541/1000*PV_Quebec/refPV_GLO; lognormal variance with pedigree 0.132, pedigree (3,5,5,5,4)
  (same comment as for Acetaldehyde)
- Hydrochloric acid [air, urban air close to ground]: 1.48e-5 kg; lognormal variance with pedigree 0.1806, pedigree (2,5,5,5,4)
  (same comment as for Acetaldehyde)
- Hydrogen fluoride [air, non-urban air or from high stacks]: 2.8435e-11 kg; = 1.6193E-05/1000*PV_Quebec/refPV_GLO; lognormal variance with pedigree 0.132, pedigree (3,5,5,5,4)
  (same comment as for Acetaldehyde)
- Hydrogen fluoride [air, urban air close to ground]: 4.66e-7 kg; lognormal variance with pedigree 0.1806, pedigree (2,5,5,5,4)
  (same comment as for Acetaldehyde)
- Iodine [air, urban air close to ground]: 4.13e-9 kg; lognormal variance with pedigree 0.1806, pedigree (2,5,5,5,4)
  (same comment as for Acetaldehyde)
- Iron ion [air, non-urban air or from high stacks]: 4.85184e-10 kg; = 0.0002763/1000*PV_Quebec/refPV_GLO; lognormal variance with pedigree 0.742, pedigree (3,5,5,5,4)
  (same comment as for Acetaldehyde)
- Iron ion [air, urban air close to ground]: 1.61e-6 kg; lognormal variance with pedigree 0.7806, pedigree (2,5,5,5,4)
  (same comment as for Acetaldehyde)
- Lead II [air, non-urban air or from high stacks]: 2.34549e-10 kg; = 0.00013357/1000*PV_Quebec/refPV_GLO; lognormal variance with pedigree 0.742, pedigree (3,5,5,5,4)
  (same comment as for Acetaldehyde)
- Lead II [air, urban air close to ground]: 1.51e-7 kg; lognormal variance with pedigree 0.7806, pedigree (2,5,5,5,4)
  (same comment as for Acetaldehyde)
- Lead-210 [air, urban air close to ground]: 1.68e-5 kBq; lognormal variance with pedigree 0.4406, pedigree (2,5,5,5,4)
  (same comment as for Acetaldehyde)
- Magnesium [air, non-urban air or from high stacks]: 2.14215e-9 kg; = 0.0012199/1000*PV_Quebec/refPV_GLO; lognormal variance with pedigree 0.742, pedigree (3,5,5,5,4)
  (same comment as for Acetaldehyde)
- Magnesium [air, urban air close to ground]: 3.11e-6 kg; lognormal variance with pedigree 0.7806, pedigree (2,5,5,5,4)
  (same comment as for Acetaldehyde)
- Manganese II [air, non-urban air or from high stacks]: 1.01155e-9 kg; = 0.00057605/1000*PV_Quebec/refPV_GLO; lognormal variance with pedigree 0.742, pedigree (3,5,5,5,4)
  (same comment as for Acetaldehyde)
- Manganese II [air, urban air close to ground]: 8.29e-7 kg; lognormal variance with pedigree 0.7806, pedigree (2,5,5,5,4)
  (same comment as for Acetaldehyde)
- Mercury II [air, non-urban air or from high stacks]: 1.88858e-12 kg; = 1.0755E-06/1000*PV_Quebec/refPV_GLO; lognormal variance with pedigree 0.742, pedigree (3,5,5,5,4)
  (same comment as for Acetaldehyde)
- Mercury II [air, urban air close to ground]: 2.56e-9 kg; lognormal variance with pedigree 0.7806, pedigree (2,5,5,5,4)
  (same comment as for Acetaldehyde)
- Methane, fossil [air, non-urban air or from high stacks]: 1.69282e-7 kg; = 0.096402/1000*PV_Quebec/refPV_GLO; lognormal variance with pedigree 0.0832, pedigree (2,3,5,5,1)
  (same comment as for Acetaldehyde)
- Methane, fossil [air, urban air close to ground]: 3.94e-6 kg; lognormal variance with pedigree 0.1806, pedigree (2,5,5,5,4)
  (same comment as for Acetaldehyde)
- Methane, non-fossil [air, non-urban air or from high stacks]: 2.38009e-9 kg; = 0.0013554/1000*PV_Quebec/refPV_GLO; lognormal variance with pedigree 0.132, pedigree (3,5,5,5,4)
  (same comment as for Acetaldehyde)
- Methane, non-fossil [air, urban air close to ground]: 1.93e-6 kg; lognormal variance with pedigree 0.1806, pedigree (2,5,5,5,4)
  (same comment as for Acetaldehyde)
- Methanol [air, non-urban air or from high stacks]: 3.01752e-10 kg; = 0.00017184/1000*PV_Quebec/refPV_GLO; lognormal variance with pedigree 0.132, pedigree (3,5,5,5,4)
  (same comment as for Acetaldehyde)
- Methanol [air, urban air close to ground]: 2.82e-8 kg; lognormal variance with pedigree 0.1806, pedigree (2,5,5,5,4)
  (same comment as for Acetaldehyde)
- Molybdenum VI [air, non-urban air or from high stacks]: 4.73348e-12 kg; = 2.6956E-06/1000*PV_Quebec/refPV_GLO; lognormal variance with pedigree 0.742, pedigree (3,5,5,5,4)
  (same comment as for Acetaldehyde)
- Molybdenum VI [air, urban air close to ground]: 2.6e-9 kg; lognormal variance with pedigree 0.7806, pedigree (2,5,5,5,4)
  (same comment as for Acetaldehyde)
- NMVOC, non-methane volatile organic compounds [air, non-urban air or from high stacks]: 6.39591e-7 kg; = 0.364231/1000*PV_Quebec/refPV_GLO; lognormal variance with pedigree 0.0832, pedigree (2,3,5,5,1)
  (same comment as for Acetaldehyde)
- NMVOC, non-methane volatile organic compounds [air, urban air close to ground]: 3.52e-6 kg; lognormal variance with pedigree 0.1806, pedigree (2,5,5,5,4)
  (same comment as for Acetaldehyde)
- Nickel II [air, non-urban air or from high stacks]: 3.25633e-10 kg; = 0.00018544/1000*PV_Quebec/refPV_GLO; lognormal variance with pedigree 0.742, pedigree (3,5,5,5,4)
  (same comment as for Acetaldehyde)
- Nickel II [air, urban air close to ground]: 7.17e-8 kg; lognormal variance with pedigree 0.7806, pedigree (2,5,5,5,4)
  (same comment as for Acetaldehyde)
- Nitrogen oxides [air, non-urban air or from high stacks]: 1.13074e-6 kg; = 0.64393/1000*PV_Quebec/refPV_GLO; lognormal variance with pedigree 0.0832, pedigree (2,3,5,5,1)
  (same comment as for Acetaldehyde)
- Nitrogen oxides [air, urban air close to ground]: 0.00055 kg; lognormal variance with pedigree 0.0832, pedigree (2,3,5,5,1)
  Average from finnish database and several paper mills
  Uncertainty: average from finnish database and several paper mills
- PAH, polycyclic aromatic hydrocarbons [air, non-urban air or from high stacks]: 7.06914e-11 kg; = 4.0257E-05/1000*PV_Quebec/refPV_GLO; lognormal variance with pedigree 0.392, pedigree (3,5,5,5,4)
  (same comment as for Acetaldehyde)
- PAH, polycyclic aromatic hydrocarbons [air, urban air close to ground]: 5.37e-8 kg; lognormal variance with pedigree 0.1806, pedigree (2,5,5,5,4)
  (same comment as for Acetaldehyde)
- Particulate Matter, < 2.5 um [air, non-urban air or from high stacks]: 6.12793e-8 kg; = 0.034897/1000*PV_Quebec/refPV_GLO; lognormal variance with pedigree 0.3432, pedigree (2,3,5,5,1)
  (same comment as for Acetaldehyde)
- Particulate Matter, < 2.5 um [air, urban air close to ground]: 2.2e-5 kg; lognormal variance with pedigree 0.3432, pedigree (2,3,5,5,1)
  (same comment as for Nitrogen oxides)
- Particulate Matter, > 10 um [air, non-urban air or from high stacks]: 1.07945e-8 kg; = 0.0061472/1000*PV_Quebec/refPV_GLO; lognormal variance with pedigree 0.0832, pedigree (2,3,5,5,1)
  (same comment as for Acetaldehyde)
- Particulate Matter, > 10 um [air, urban air close to ground]: 2.1e-5 kg; lognormal variance with pedigree 0.0832, pedigree (2,3,5,5,1)
  (same comment as for Nitrogen oxides)
- Particulate Matter, > 2.5 um and < 10um [air, non-urban air or from high stacks]: 9.17108e-8 kg; = 0.052227/1000*PV_Quebec/refPV_GLO; lognormal variance with pedigree 0.1632, pedigree (2,3,5,5,1)
  (same comment as for Acetaldehyde)
- Particulate Matter, > 2.5 um and < 10um [air, urban air close to ground]: 2.7e-5 kg; lognormal variance with pedigree 0.1632, pedigree (2,3,5,5,1)
  (same comment as for Nitrogen oxides)
- Pentachlorophenol [air, non-urban air or from high stacks]: 4.8197e-14 kg; = 2.7447E-08/1000*PV_Quebec/refPV_GLO; lognormal variance with pedigree 0.132, pedigree (3,5,5,5,4)
  (same comment as for Acetaldehyde)
- Pentachlorophenol [air, urban air close to ground]: 3.91e-11 kg; lognormal variance with pedigree 0.1806, pedigree (2,5,5,5,4)
  (same comment as for Acetaldehyde)
- Pentane [air, non-urban air or from high stacks]: 5.16493e-10 kg; = 0.00029413/1000*PV_Quebec/refPV_GLO; lognormal variance with pedigree 0.132, pedigree (3,5,5,5,4)
  (same comment as for Acetaldehyde)
- Pentane [air, urban air close to ground]: 3.25e-8 kg; lognormal variance with pedigree 0.1806, pedigree (2,5,5,5,4)
  (same comment as for Acetaldehyde)
- Phosphorus [air, non-urban air or from high stacks]: 1.78515e-9 kg; = 0.0010166/1000*PV_Quebec/refPV_GLO; lognormal variance with pedigree 0.132, pedigree (3,5,5,5,4)
  (same comment as for Acetaldehyde)
- Phosphorus [air, urban air close to ground]: 1.47e-6 kg; lognormal variance with pedigree 0.1806, pedigree (2,5,5,5,4)
  (same comment as for Acetaldehyde)
- Polonium-210 [air, urban air close to ground]: 3.08e-5 kBq; lognormal variance with pedigree 0.4406, pedigree (2,5,5,5,4)
  (same comment as for Acetaldehyde)
- Potassium I [air, non-urban air or from high stacks]: 1.39235e-7 kg; = 0.079291/1000*PV_Quebec/refPV_GLO; lognormal variance with pedigree 0.132, pedigree (3,5,5,5,4)
  (same comment as for Acetaldehyde)
- Potassium I [air, urban air close to ground]: 0.000113 kg; lognormal variance with pedigree 0.7806, pedigree (2,5,5,5,4)
  (same comment as for Acetaldehyde)
- Potassium-40 [air, urban air close to ground]: 4.89e-6 kBq; lognormal variance with pedigree 0.4406, pedigree (2,5,5,5,4)
  (same comment as for Acetaldehyde)
- Propane [air, non-urban air or from high stacks]: 1.03775e-10 kg; = 5.9097E-05/1000*PV_Quebec/refPV_GLO; lognormal variance with pedigree 0.132, pedigree (3,5,5,5,4)
  (same comment as for Acetaldehyde)
- Propane [air, urban air close to ground]: 3.67e-7 kg; lognormal variance with pedigree 0.1806, pedigree (2,5,5,5,4)
  (same comment as for Acetaldehyde)
- Propionic acid [air, non-urban air or from high stacks]: 8.59459e-12 kg; = 4.8944E-06/1000*PV_Quebec/refPV_GLO; lognormal variance with pedigree 0.132, pedigree (3,5,5,5,4)
  (same comment as for Acetaldehyde)
- Propylene [air, urban air close to ground]: 1.81e-7 kg; lognormal variance with pedigree 0.1806, pedigree (2,5,5,5,4)
  (same comment as for Acetaldehyde)
- Radium-226 [air, urban air close to ground]: 4.35e-6 kBq; lognormal variance with pedigree 0.4406, pedigree (2,5,5,5,4)
  (same comment as for Acetaldehyde)
- Radium-228 [air, urban air close to ground]: 2.35e-5 kBq; lognormal variance with pedigree 0.4406, pedigree (2,5,5,5,4)
  (same comment as for Acetaldehyde)
- Radon-220 [air, urban air close to ground]: 3.62e-7 kBq; lognormal variance with pedigree 0.4406, pedigree (2,5,5,5,4)
  (same comment as for Acetaldehyde)
- Radon-222 [air, urban air close to ground]: 3.62e-7 kBq; lognormal variance with pedigree 0.4406, pedigree (2,5,5,5,4)
  (same comment as for Acetaldehyde)
- Scandium [air, urban air close to ground]: 4.56e-10 kg; lognormal variance with pedigree 0.7806, pedigree (2,5,5,5,4)
  (same comment as for Acetaldehyde)
- Selenium IV [air, non-urban air or from high stacks]: 7.1004e-12 kg; = 4.0435E-06/1000*PV_Quebec/refPV_GLO; lognormal variance with pedigree 0.742, pedigree (3,5,5,5,4)
  (same comment as for Acetaldehyde)
- Selenium IV [air, urban air close to ground]: 4.1e-9 kg; lognormal variance with pedigree 0.7806, pedigree (2,5,5,5,4)
  (same comment as for Acetaldehyde)
- Silicon [air, urban air close to ground]: 5.72e-6 kg; lognormal variance with pedigree 0.7806, pedigree (2,5,5,5,4)
  (same comment as for Acetaldehyde)
- Sodium I [air, non-urban air or from high stacks]: 8.17911e-9 kg; = 0.0046578/1000*PV_Quebec/refPV_GLO; lognormal variance with pedigree 0.742, pedigree (3,5,5,5,4)
  (same comment as for Acetaldehyde)
- Sodium I [air, urban air close to ground]: 6.55e-6 kg; lognormal variance with pedigree 0.7806, pedigree (2,5,5,5,4)
  (same comment as for Acetaldehyde)
- Strontium II [air, urban air close to ground]: 6.88e-8 kg; lognormal variance with pedigree 0.7806, pedigree (2,5,5,5,4)
  (same comment as for Acetaldehyde)
- Sulfur dioxide [air, non-urban air or from high stacks]: 3.80807e-7 kg; = 0.21686/1000*PV_Quebec/refPV_GLO; lognormal variance with pedigree 0.0438, pedigree (2,3,5,5,1)
  (same comment as for Acetaldehyde)
- Sulfur dioxide [air, urban air close to ground]: 0.000347 kg; lognormal variance with pedigree 0.0432, pedigree (2,3,5,5,1)
  (same comment as for Nitrogen oxides)
- Thallium I [air, urban air close to ground]: 5.72e-10 kg; lognormal variance with pedigree 0.7806, pedigree (2,5,5,5,4)
  (same comment as for Acetaldehyde)
- Thorium [air, urban air close to ground]: 6.88e-10 kg; lognormal variance with pedigree 0.7806, pedigree (2,5,5,5,4)
  (same comment as for Acetaldehyde)
- Thorium-228 [air, urban air close to ground]: 1.99e-6 kBq; lognormal variance with pedigree 0.4406, pedigree (2,5,5,5,4)
  (same comment as for Acetaldehyde)
- Thorium-232 [air, urban air close to ground]: 1.27e-6 kBq; lognormal variance with pedigree 0.4406, pedigree (2,5,5,5,4)
  (same comment as for Acetaldehyde)
- Tin ion [air, urban air close to ground]: 2.29e-10 kg; lognormal variance with pedigree 0.7806, pedigree (2,5,5,5,4)
  (same comment as for Acetaldehyde)
- Titanium ion [air, urban air close to ground]: 1.37e-7 kg; lognormal variance with pedigree 0.7806, pedigree (2,5,5,5,4)
  (same comment as for Acetaldehyde)
- Toluene [air, non-urban air or from high stacks]: 1.88893e-9 kg; = 0.0010757/1000*PV_Quebec/refPV_GLO; lognormal variance with pedigree 0.132, pedigree (3,5,5,5,4)
  (same comment as for Acetaldehyde)
- Toluene [air, urban air close to ground]: 1.49e-6 kg; lognormal variance with pedigree 0.1806, pedigree (2,5,5,5,4)
  (same comment as for Acetaldehyde)
- Uranium [air, urban air close to ground]: 9.16e-10 kg; lognormal variance with pedigree 0.7806, pedigree (2,5,5,5,4)
  (same comment as for Acetaldehyde)
- Uranium-238 [air, urban air close to ground]: 3.62e-6 kBq; lognormal variance with pedigree 0.4406, pedigree (2,5,5,5,4)
  (same comment as for Acetaldehyde)
- Vanadium V [air, non-urban air or from high stacks]: 5.91668e-10 kg; = 0.00033694/1000*PV_Quebec/refPV_GLO; lognormal variance with pedigree 0.742, pedigree (3,5,5,5,4)
  (same comment as for Acetaldehyde)
- Vanadium V [air, urban air close to ground]: 1.57e-7 kg; lognormal variance with pedigree 0.7806, pedigree (2,5,5,5,4)
  (same comment as for Acetaldehyde)
- Water [air, unspecified]: 0.00125 m3; = 1.25/1000; lognormal variance with pedigree 0.138, pedigree (4,5,5,5,4)
  Estimation. Based on personal communication from Angeline de Beaufort.
- Xylenes, unspecified [air, urban air close to ground]: 3.62e-8 kg; lognormal variance with pedigree 0.1806, pedigree (2,5,5,5,4)
  (same comment as for Acetaldehyde)
- Zinc II [air, non-urban air or from high stacks]: 1.82027e-9 kg; = 0.0010366/1000*PV_Quebec/refPV_GLO; lognormal variance with pedigree 0.742, pedigree (3,5,5,5,4)
  (same comment as for Acetaldehyde)
- Zinc II [air, urban air close to ground]: 1.56e-6 kg; lognormal variance with pedigree 0.7806, pedigree (2,5,5,5,4)
  (same comment as for Acetaldehyde)
- m-Xylene [air, non-urban air or from high stacks]: 7.14061e-10 kg; = 0.00040664/1000*PV_Quebec/refPV_GLO; lognormal variance with pedigree 0.132, pedigree (3,5,5,5,4)
  (same comment as for Acetaldehyde)
- m-Xylene [air, urban air close to ground]: 5.79e-7 kg; lognormal variance with pedigree 0.1806, pedigree (2,5,5,5,4)
  (same comment as for Acetaldehyde)
- AOX, Adsorbable Organic Halides [water, surface water]: 1.1e-7 kg; lognormal variance with pedigree 0.0832, pedigree (2,3,5,5,1)
  (same comment as for Nitrogen oxides)
- BOD5, Biological Oxygen Demand [water, surface water]: 0.00026 kg; lognormal variance with pedigree 0.0832, pedigree (2,3,5,5,1)
  (same comment as for Nitrogen oxides)
- COD, Chemical Oxygen Demand [water, surface water]: 0.0045 kg; lognormal variance with pedigree 0.0832, pedigree (2,3,5,5,1)
  (same comment as for Nitrogen oxides)
- DOC, Dissolved Organic Carbon [water, surface water]: 0.0002 kg; lognormal variance with pedigree 0.0826, pedigree (1,3,5,5,1)
  (same comment as for Water, cooling, unspecified natural origin)
- Nitrogen [water, surface water]: 9e-5 kg; lognormal variance with pedigree 0.0832, pedigree (2,3,5,5,1)
  (same comment as for Nitrogen oxides)
- Phosphorus [water, surface water]: 1e-5 kg; lognormal variance with pedigree 0.0832, pedigree (2,3,5,5,1)
  (same comment as for Nitrogen oxides)
- Suspended solids, unspecified [water, surface water]: 0.00065 kg; lognormal variance with pedigree 0.0832, pedigree (2,3,5,5,1)
  (same comment as for Nitrogen oxides)
- TOC, Total Organic Carbon [water, surface water]: 0.00043 kg; lognormal variance with pedigree 0.0826, pedigree (1,3,5,5,1)
  (same comment as for Water, cooling, unspecified natural origin)
- Water [water, unspecified]: 0.0430837 m3; name water_to_water_unspecified; = water_cooling_UNO_input*(1-fraction_CW_to_air)+water_UNO_input*(1-fraction_PW_to_air); lognormal variance with pedigree 0.0827, pedigree (2,2,5,5,1)
  Calculated value based on literature values and expert opinion. See comments in the parametres' comment field.
  property carbon content, fossil 0; name C_content_fossil
  property carbon content, non-fossil 0; name C_content_non_fossil
  property dry mass 0 kg; name DM
  property water in wet mass 1000 kg; name WWM
  property wet mass 1000 kg; name WM

## Extrapolations
This dataset has been copied from an original dataset covering the geography RER. The uncertainty has been adjusted accordingly.
Data from Quebec dataset were added to this GLO dataset to reflect Quebec particularity of the technology and site location (non urban area).

## Review by Emilia Moreno Ruiz 2015-09-17
broken formula fixed
