# cement production, ART

Dataset: EcoSpold 2, unit process
Geography: CO
Time period: 2014-01-01 to 2023-12-31
Technology level: current
Classification: ISIC rev.4 ecoinvent: 2394:Manufacture of cement, lime and plaster
Synonyms: ART; Alta resistencia temprana
Tags: combined production
Scenario: Business-as-Usual
System model: Allocation, cut-off by classification
Share of production covered: 81 %
Generated by: Simon Gmünder
Published in: Silva, F. B. 2017
Database: ecoinvent
isCopyrightProtected: true
accessRestrictedTo: 1

## General comment
The dataset describes the production of cement type ART (Alto Resistencia Temprano) according to technical norm NTC 121 (Icontec, 2014), which is based on the standard specification for hydraulic cement (ASTM standard n° C1157).
The weight composition of the cement is: 75% clinker, 3% gypsum, 7.3% blast funrace slag, 7.3% fly ash and 7.3% limestone (rounded numbers).
The cement density is 3g/ml and the resitance is 38-44MPa according to the NTC 220 (Cemex and Argos).

## Included activities start
This activity starts with the reception of raw materials.

## Included activities end
This activity ends with the cement produced in the cement mill. Packaging is not included and no production waste is assumed.

## Geography
Representative production of cement type ART in Colombia. Data based from main cement producers and personal comunications with local experts.

## Technology
Represent the current technology for cement production in Colombia.

## Time period
The production volume of 2016 is considered. Data from sustainability reports of 2014 to 2017 is used.

## Reference product
- hard coal ash: -1 kg; name ash; By-product classification Waste; CPC 39320: Ash and residue (except from the manufacture of iron or steel), containing metals or metallic compounds, excep[…]; HS2017 262099: Slag, ash and residues; (not from the manufacture of iron or steel), containing mainly metals or their comp[...]
  Calculated Value. An equal repartition by mass of principal supplementary cementitious used in Colombia (clay, slag and fly ash). (Dir. Lascarro, 2017; Ing. Pimentel, 2017). The mathematical relation used to calculate the value is: -(1-clinker-gypsum)/3
  production volume 2.2703e8 kg; = cement_PV/cement*ABS(ash)
    Calculated from production volume of reference product using the relative outputs.
  property price 0 EUR2005
    Waste products are assigned a price of zero as they are assumed to require further treatment.
  properties: carbon allocation 0 kg, carbon content 0, carbon content, fossil 0, carbon content, non-fossil 0, dry mass 1 kg, water content 0, water in wet mass 0 kg, wet mass 1 kg

## Sampling procedure
The data is compiled based on different data sources, including sustainability reports, literature values and expert judgements. Most data is derived from sustainability reports of the three principal concrete producers of Colombia (Argos, Cemex and Holcim). The data is checked, completed and validated by local experts. In total, it is estimated that the data considered is representative for 81% of cement production in all the country (market share of the three main cement producers). Unit flows were calculated by dividing the amounts of inputs and outputs by the total clinker production in mass. The amount of the exchanges were calculated considering the arithmetic [weighted] average of the sample. No conversion to the geometric mean of the lognormal distribution was done, for consistency reasons with other Ecoinvent datasets.

## Extrapolations
The life cycle inventory model is based on the PCR for cement and concrete (Environdec, 2010), as well as on the LCA core model of the WBCSD-CSI EPD tool (Dauriat et al., 2014). Dauriat, A., Porté, C., Delerce, C., Guignard, C., & Adams, A. (2014). WBCSD CSI tool for EPDs of concrete and cement: LCA core model and database report. Environdec. (2010). Product category rules of UN CPC 3744 Cement.
