# heat transport fluid system construction, solar thermal parabolic trough, 50 MW

Dataset: EcoSpold 2, unit process
Geography: RoW
Time period: 2010-01-01 to 2023-01-01
Technology level: current
Classification: ISIC rev.4 ecoinvent: 4220:Construction of utility projects
Tags: CSP; Concentrated Solar Power
Scenario: Business-as-Usual
System model: Allocation, cut-off by classification
Generated by: Karin Treyer
Published in: Telsnig, Thomas 2015
Database: ecoinvent
isCopyrightProtected: true
accessRestrictedTo: 1

## General comment
This activity represents the construction of the heat transport system for a 50 MW solar thermal parabolic trough power plant in Upington, South Africa. The used fluid is a synthetic oil as an eutectic mixture of 73.5% diphenyl oxide and 26.5% biphenyl. This mixture is used since it has a high temperature withstanding capacity. The pressure vessels and heat exchangers are designed to suit the criteria of "Therminol VP-1", one of the products representing this mixture. Apart from that the main components are pumps, compressor, insulation and electrical and concrete and paint.
This dataset is entirely based on the detailed life cycle inventory as presented in the dissertation report by
Telsnig, Thomas. 2015. Standortabhängige Analyse und Bewertung solarthermischer Kraftwerke am Beispiel Südafrikas. Forschungsbericht. Band 123. ISSN 0938-1228. Institut für Energiewirtschaft und Rationelle Energieanwendung, Universität Stuttgart, Germany.

## Included activities start
This activity begins when the thermal heat storage systems become operational. The heat transport fluid functions between the hot and cold storage tanks with a precise amount of temperature difference being regulated by tap water.

## Included activities end
The activity concludes with the decomissioning of the heat transport fluid system construction setup. The inert materials used as heat transfer fluid are then sent for landfill as a final disposal measure.

## Geography
This dataset has been extrapolated from a dataset modelled for the location Upington, South Africa. Uncertainty has not been adjusted as it is assumed that the modelled 50 MW parabolic trough power plant would be very similar in other parts of the world.

## Technology
Heat Transport Fluid Expansion Vessels Horizontal, Nitrogen storage vessels - cylindrical, 12 ft.diameter, 59 ft.long; 0.52 in.shell and head thickness, 68,000 lb, carbon steel
Expansion Vessel Nitrogen Ullage Gas Compressor; 1300 lb m/hr, 43000ft total developed head, 40 bhp; 75 psia inlet /175 psia outlet pressures, 28 actual ft3/ min discharge flow; 2 stage with intercooler, variable speed drive
Heat Transport Fluid; Solutia Therminol VP - 1, 0.614 gal/m2 collector field area
Basic data of Therminal VP-1:
Melting point: 12°C
Density (300°C): 815 kg/m3
Viscosity (300°C): 0.22 mPa.s
Specific heat capacity (300°C): 2319 J/kg.K
Composition in weight%: 73.5% Diphenyl oxide + 26.5% biphenyl

## Reference product
- heat transport fluid system, solar thermal parabolic trough, 50 MW: 1 unit; name RP_amount_1; By-product classification allocatable product; CPC 54262: General construction services of power plants
  Reference product unit of a heat transport fluid system for 50 MW solar thermal parabolic trough plant.
  production volume 7 unit; name RP_PV_1
    Data about concentrating solar power plants in operation, construction and development globally are available from SolarPACES (https://solarpaces.nrel.gov/, accessed April 2019). On average 8 parabolic through concentrating solar power plants per year went in operation worldwide between 2010 and 2019. This includes plants with an installed capacity other than 50MW and is used as approximate annual production volume for this dataset.
  property lifetime 30 year
    The economic lifetime of the plant is assumed to be 30 years.
  property price 1.63819e7 EUR2005
    Calculated based on inputs: The price of the product has been calculated as a sum of the values of the material and energy inputs for this product. This value is therefore a rough estimation. It may underestimate the real price since there are additional expenses when producing any product. These expences can include for example labour costs, treatment of waste materials and profit for the producer. Please consider carefully whether this level of data quality is acceptable for your application.
  properties: carbon allocation 0 kg, carbon content 0

## Inputs from technosphere
- alkyd paint, white, without solvent, in 60% solution state: 173.46, 36.54 kg (2 suppliers, which the file names only by identifier); sum of these 210 kg; lognormal variance with pedigree 0.0197, pedigree (4,4,4,3,2)
  Painting to prevent rust of steel and iron rods
  properties: carbon content, fossil 0.140367, carbon content, non-fossil 0.199629, dry mass 1 kg, heating value, net 10.3 MJ, wet mass 1 kg
  note on carbon content, fossil: C content was calculated as an addition of C content in the raw materials.
- aluminium, cast alloy: 18 kg; name aluminiumcast; lognormal variance with pedigree 0.0197, pedigree (4,4,4,3,2)
  Used for coating on tubes
  properties: dry mass 1 kg, wet mass 1 kg
- benzene: 73647.7, 548042 kg (2 suppliers, which the file names only by identifier); sum of these 621690 kg; lognormal variance with pedigree 0.0197, pedigree (4,4,4,3,2)
  Approximation of the material composition of the used heat transfer fluid. The synthetic oil is an eutectic mixture of 73.5% diphenyl oxide (approximated with "diphenylether-compounds" and 26.5% biphenyl (approximated with "benzene").
  properties: carbon content, fossil 0.923077, dry mass 1 kg, heating value, net 42.5 MJ, wet mass 1 kg
- cast iron: 43020 kg; name castiron; lognormal variance with pedigree 0.0197, pedigree (4,4,4,3,2)
  Used in valves, compressors etc
  properties: carbon content, fossil 0.04, dry mass 1 kg, wet mass 1 kg
  note on carbon content, fossil: Cast iron is made by remelting pig iron in small furnaces (e.g. cupola furnaces or electric arc furnaces) and poured into moulds to make castings. It usually contains 2% to 6% carbon (ecoinvent v2.2 report 10_partII). An average content of 4% was considered
- concrete, normal strength: 2.50969, 0.551116, 0.871089, 0.478674, 10.6278, 4.46167, 5.28909, 189.211 m3 (8 suppliers, which the file names only by identifier); sum of these 214 m3; lognormal variance with pedigree 0.0197, pedigree (4,4,4,3,2)
  Used in embedding metals in heat exchangers, steam generators, HTF pumps etc
  properties: dry mass 2190 kg, water content 0.086758, wet mass 2380 kg
- control cabinet, heat and power co-generation unit, 160kW electrical: 2 unit; lognormal variance with pedigree 0.0197, pedigree (4,4,4,3,2)
  Used in gears, motors and auxillary parts of equipment
- copper, cathode: 789 kg; name copper; lognormal variance with pedigree 0.0197, pedigree (4,4,4,3,2)
  Copper available for field wiring etc.
  properties: dry mass 1 kg, wet mass 1 kg
- diphenylether-compound: 1.72431e6 kg; name syntheticoil; lognormal variance with pedigree 0.0197, pedigree (4,4,4,3,2)
  (same comment as for benzene)
  properties: carbon content, fossil 0.560061, dry mass 1 kg, wet mass 1 kg
- drawing of pipe, steel: 93856 kg; lognormal variance with pedigree 0.0197, pedigree (4,4,4,3,2)
  Process done to draw pipes made of steel.
- excavation, hydraulic digger: 172 m3; lognormal variance with pedigree 0.0197, pedigree (4,4,4,3,2)
  Excavation and backfill in site work
- expanded perlite: 167847 kg; name expandedperilite; lognormal variance with pedigree 0.0197, pedigree (4,4,4,3,2)
  Used primarily for insulation purposes in pipes etc
  properties: dry mass 1 kg, wet mass 1 kg
- hazardous waste, for incineration: -42.1837, -20.286, -0.530264 kg (3 suppliers, which the file names only by identifier); sum of these -63 kg; = silicone_product; lognormal variance with pedigree 0.0137, pedigree (4,4,3,3,2)
  Disposal of the oil used for the initial filling and during operation of the pumps and transformers. Calculated based on the environmental product declarations for pumps as provided by Sulzer and for transformers as provided by ABB.
  Sulzer EPDs: https://www.sulzer.com/en/shared/about-us/2017/08/10/13/22/environmental-product-declarations (accessed May 2019)
  ABB library: https://library.abb.com/en/ (accessed May 2019)
  production volume; = RP_PV_1 * (BP_amount_10 / RP_amount_1)
    Calculated from production volume of reference product using the relative outputs.
  properties: carbon content, fossil 0.554667, dry mass 0.75 kg, heating value, net 17 MJ, water content 0.333333, wet mass 1 kg
  note on carbon content, fossil: Tab A.6, ecoinvent v2.2 report 13_I. C content has been calculated after data in the tables, and then referred to 1 kg DM
  note on heating value, net: Value taken from the general comment of the treatment dataset.
- injection moulding: 4 kg; = polystyrene; lognormal variance with pedigree 0.0197, pedigree (4,4,4,3,2)
  Process for processing polystyrene
- polyethylene, high density, granulate: 300971 kg; name polyethylene; lognormal variance with pedigree 0.0197, pedigree (4,4,4,3,2)
  Used in plastic pipes, pneumatic piping
  properties: carbon content, fossil 0.857143, dry mass 1 kg, heating value, net 42.47 MJ, wet mass 1 kg
  note on carbon content, fossil: Polyethylene is formed out of a huge amount of ethylene monomers (C2H4) (ecoinvent v2.2 report 11_II). MW=28 g/mol
- polystyrene, high impact: 4 kg; name polystyrene; lognormal variance with pedigree 0.0197, pedigree (4,4,4,3,2)
  Used as adsorbers for high temperature variations
  properties: carbon content, fossil 0.923077, dry mass 1 kg, heating value, net 38.67 MJ, wet mass 1 kg
- reinforcing steel: 773642 kg; name steel; lognormal variance with pedigree 0.0197, pedigree (4,4,4,3,2)
  Used in the construction of heat exchangers, heat transfer pumps, valves, structural steel and electrotechnique equipment material composition
  properties: carbon content, fossil 0.004, dry mass 1 kg, wet mass 1 kg
- scrap aluminium: -12.0224, -5.70974, -0.267888 kg (3 suppliers, which the file names only by identifier); sum of these -18 kg; = aluminiumcast; lognormal variance with pedigree 0.0137, pedigree (4,4,3,3,2)
  Scrap aluminium at end of life not usable in reproduction of aluminium sent to municipal incineration
  production volume; = RP_PV_1 * (BP_amount_4 / RP_amount_1)
    Calculated from production volume of reference product using the relative outputs.
  properties: dry mass 1 kg, wet mass 1 kg
- scrap copper: -526.981, -250.277, -11.7424 kg (3 suppliers, which the file names only by identifier); sum of these -789 kg; = copper; lognormal variance with pedigree 0.0137, pedigree (4,4,3,3,2)
  Scrap copper at end of life not usable in reproduction of copper sent to municipal incineration
  production volume; = RP_PV_1 * (BP_amount_7 / RP_amount_1)
    Calculated from production volume of reference product using the relative outputs.
  properties: dry mass 1 kg, wet mass 1 kg
- sheet rolling, aluminium: 18 kg; lognormal variance with pedigree 0.0197, pedigree (4,4,4,3,2)
  Process done to coat tubes with aluminium
- sheet rolling, chromium steel: 17 kg; lognormal variance with pedigree 0.0197, pedigree (4,4,4,3,2)
  Process done for coating using chromium
- sheet rolling, steel: 76 kg; lognormal variance with pedigree 0.0197, pedigree (4,4,4,3,2)
  Process done for coating using steel
- silicone product: 20.7562, 42.2438 kg (2 suppliers, which the file names only by identifier); sum of these 63 kg; lognormal variance with pedigree 0.0197, pedigree (4,4,4,3,2)
  Used for sealing leaks in Heat transfer fluid pumps. End of life is neglected
  properties: carbon content, fossil 0.324324, dry mass 1 kg, heating value, net 9.83 MJ, wet mass 1 kg
- steel, chromium steel 18/8, hot rolled: 9760 kg; name chromesteel; lognormal variance with pedigree 0.0197, pedigree (4,4,4,3,2)
  Used in HTF pumps, boiler feed and in expansion nitrogen vessel compressors
  properties: carbon content, fossil 0.0008, dry mass 1 kg, wet mass 1 kg
  note on carbon content, fossil: Stainless steel model is the grade 304 steel (18/8 stainless, 18% chromium 8% nickel; max. 0.08% C)
- steel, low-alloyed: 7855 kg; name lowsteel; lognormal variance with pedigree 0.0197, pedigree (4,4,4,3,2)
  Material composition in pumps, compressors and structural steel
  properties: carbon content, fossil 0.005, dry mass 1 kg, wet mass 1 kg
- synthetic rubber: 2 kg; name rubber; lognormal variance with pedigree 0.0197, pedigree (4,4,4,3,2)
  Material composition in compressors for heat adsorption
  properties: carbon content, fossil 0.871949, dry mass 1 kg, heating value, net 26.42 MJ, wet mass 1 kg
  note on carbon content, fossil: EPDM (Ethylene-propene-diene terpolymer) rubber is a terpolymer of ethylene, propene, and a diene with the residual unsaturated portion of the diene in the side chain (ecoinvent v2.2 report 7-part XX & Ullmann). Chemical formula (deduced from Evidences of Solvent-Induced Miscibility in Polychloroprene-co-Ethylene-Propene Diene Terpolymer Blends, Dubey et al., Journal of Applied Polymer Science, 2009, 111:1884-1891): C20H35
- tap water: 117.329, 178.858, 899.069, 108.224, 4510.08, 51611.1, 38539.3 kg (7 suppliers, which the file names only by identifier); sum of these 95964 kg; lognormal variance with pedigree 0.0197, pedigree (4,4,4,3,2)
  Used in the manufacturing process of pumps
  properties: carbon content, fossil 0.00178991, dry mass 0.000337476 kg, water content 2962.17, wet mass 1 kg
  note on carbon content, fossil: Bicarbonate content is 2.93 mol/m3. CO2 content is 0.1 mol/m3 (ecoinvent v2.2 report 8, Tab 93.1).
- tin plated chromium steel sheet, 2 mm: 96 m2; lognormal variance with pedigree 0.0197, pedigree (4,4,4,3,2)
  Used in deck plate for structural steel components
  properties: dry mass 15.6365 kg, wet mass 15.6365 kg
- transformer, high voltage use: 452 kg; lognormal variance with pedigree 0.0197, pedigree (4,4,4,3,2)
  Transformer setup including substations and primary power distribution sources. Since the transformer data are already accounted for in ecoinvent. The end of life is neglected.
  properties: carbon content, fossil 0.262798, dry mass 1 kg, wet mass 1 kg
- waste concrete: -43637.2, -594856, -154.284 kg (3 suppliers, which the file names only by identifier); sum of these -638647 kg; = (concrete*2200)+expandedperilite; lognormal variance with pedigree 0.0137, pedigree (4,4,3,3,2)
  Disposal of concrete. The density is assumed to be 2200kg/m3.
  production volume; = RP_PV_1 * (BP_amount_5 / RP_amount_1)
    Calculated from production volume of reference product using the relative outputs.
  properties: dry mass 0.5 kg, water content 1, wet mass 1 kg
- waste mineral oil: -15941.8, -1.6861e6, -643956 kg (3 suppliers, which the file names only by identifier); sum of these -2.346e6 kg; = syntheticoil+syntheticoil_1
  Approximation for the disposal of the synthetic oil. The waste synthetic oil usually meets the criteria for non-petroleum used oil. No dataset for the treatment of non-mineral oil exists in ecoinvent.
  https://www.therminol.com/resources/technical-support-faqs#environmentally-friendly
  production volume; = RP_PV_1 * (BP_amount_11 / RP_amount_1)
    Calculated from production volume of reference product using the relative outputs.
  properties: carbon content, fossil 0.864444, dry mass 0.9 kg, heating value, net 34.7 MJ, water content 0.111111, wet mass 1 kg
- waste paint: -22.724, -187.19, -0.0863337 kg (3 suppliers, which the file names only by identifier); sum of these -210 kg; = paint; lognormal variance with pedigree 0.0137, pedigree (4,4,3,3,2)
  Inert materials in alkyd solvent 60% are disposed in landfill
  production volume; = RP_PV_1 * (BP_amount_2 / RP_amount_1)
    Calculated from production volume of reference product using the relative outputs.
  properties: carbon content, fossil 0.65, dry mass 1 kg, heating value, net 19.7 MJ, wet mass 1 kg
- waste polyethylene/polypropylene product: -84420.4, -2533.24, -214017 kg (3 suppliers, which the file names only by identifier); sum of these -300971 kg; = polyethylene; lognormal variance with pedigree 0.0137, pedigree (4,4,3,3,2)
  Polymer material non reusable sent for incineration
  production volume; = RP_PV_1 * (BP_amount_3 / RP_amount_1)
    Calculated from production volume of reference product using the relative outputs.
  properties: carbon content, fossil 0.748045, dry mass 0.847 kg, heating value, net 42.47 MJ, water content 0.180638, wet mass 1 kg
  note on carbon content, fossil: Mixed various plastics was used to estimate the C content of this waste (Tab A.2, ecoinvent v2.2 report 13_I)
- waste polystyrene: -0.00849664, -9.47295e-5, -0.000567712, -0.000234486, -4.29352e-5, -3.97994, -0.0106212 kg (7 suppliers, which the file names only by identifier); sum of these -4 kg; = polystyrene; lognormal variance with pedigree 0.0137, pedigree (4,4,3,3,2)
  Waste polystyrene for municipal incineration
  production volume; = RP_PV_1 * (BP_amount_9 / RP_amount_1)
    Calculated from production volume of reference product using the relative outputs.
  properties: carbon content, fossil 0.922579, dry mass 0.998 kg, heating value, net 38.67 MJ, water content 0.00200401, wet mass 1 kg
- waste reinforcement steel: -833698, -578.883 kg (2 suppliers, which the file names only by identifier); sum of these -834277 kg; = (steel+castiron+chromesteel+lowsteel); lognormal variance with pedigree 0.0137, pedigree (4,4,3,3,2)
  All steel masses combined. Treatment of reinforced steel is used as a proxy for all steel types.
  production volume; = RP_PV_1 * (BP_amount_6 / RP_amount_1)
    Calculated from production volume of reference product using the relative outputs.
  properties: dry mass 1 kg, wet mass 1 kg
- waste rubber, unspecified: -0.0319207, -1.2077, -0.760382 kg (3 suppliers, which the file names only by identifier); sum of these -2 kg; = rubber; lognormal variance with pedigree 0.0137, pedigree (4,4,3,3,2)
  Waste rubber sent for incineration
  production volume; = RP_PV_1 * (BP_amount_8 / RP_amount_1)
    Calculated from production volume of reference product using the relative outputs.
  properties: carbon content, fossil 0.853, dry mass 1 kg, heating value, net 27.19 MJ, wet mass 1 kg
- wastewater, unpolluted: -0.461837, -95.5022 m3 (2 suppliers, which the file names only by identifier); sum of these -95.964 m3; = water/1000; lognormal variance with pedigree 0.0137, pedigree (4,4,3,3,2)
  The amount of tap water input stems from the water consumption reported in the EPDs of the modelled pumps (Sulzer EPDs). It is stated in the EPDs that the water is used for testing purposes. Therefore, it is assumed to be discharged to the sewer system without pollution. Sulzer EPDs: https://www.sulzer.com/en/shared/about-us/2017/08/10/13/22/environmental-product-declarations (accessed May 2019)
  production volume; = RP_PV_1 * (BP_amount_1 / RP_amount_1)
    Calculated from production volume of reference product using the relative outputs.
  properties: carbon content, fossil 0.00178991, carbon content, non-fossil 0.00178991, dry mass 0.337476 kg, water content 2962.17, wet mass 1000 kg
  note on carbon content, fossil: Assumed to be like in tap water. Bicarbonate content is 2.93 mol/m3. CO2 content is 0.1 mol/m3 (ecoinvent v2.2 report 8, Tab 93.1).
- welding, arc, steel: 558 m; lognormal variance with pedigree 0.0197, pedigree (4,4,4,3,2)
  Processs of arc welding of the steel
- wire drawing, copper: 789 kg; = copper; lognormal variance with pedigree 0.0197, pedigree (4,4,4,3,2)
  Process done to draw wires made from copper

## Sampling procedure
This dataset is entirely based on the detailed life cycle inventory as presented in the dissertation report by
Telsnig, Thomas. 2015. Standortabhängige Analyse und Bewertung solarthermischer Kraftwerke am Beispiel Südafrikas. Forschungsbericht. Band 123. ISSN 0938-1228. Institut für Energiewirtschaft und Rationelle Energieanwendung, Universität Stuttgart, Germany.

Further, data in Telsnig 2015 are not shown explicitely for the downscaled 50 MW parabolic trough power plant. This gap is filled in the ecoinvent report.

## Extrapolations
This dataset has been extrapolated from a dataset modelled for the location Upington, South Africa.
The original data modelling a 250 MW power plant have been scaled down with parameter specific linear and non-linear equations to represent a 50 MW plant design.
Uncertainty has not been adjusted as it is assumed that the modelled 50 MW parabolic trough plant would be very similar in other parts of the world.

## Review by Christopher Oberschelp 2017-03-06
Very detailed and well-structured dataset with in-depth documentation. Key exchanges have been found reasonable. Comparison of impacts with other technologies might now help to spot any unusual or unexpected exchanges.
