# transport, freight train, diesel

Dataset: EcoSpold 2, unit process
Geography: Europe without Switzerland
Time period: 2000-01-01 to 2023-12-31
Technology level: current
Classification: ISIC rev.4 ecoinvent: 4912:Freight rail transport
Scenario: Business-as-Usual
System model: Allocation, cut-off by classification
Generated by: Frédéric Gindroz
Published in: Spielmann M. 2007
Database: ecoinvent
isCopyrightProtected: true
accessRestrictedTo: 1

## General comment
The dataset represents the entire transport life cycle of a diesel freight train in Europe-15 (Belgium, Denmark, Germany, Greece, Spain, France, Ireland, Italy, Luxembourg, Netherlands, Austria, Portugal, Finalnd, Sweden and UK). The data of the energy use and operation emissions represents a diesel goods train with a weight of 1000 Gt. Variation in the geography of different countries have been taken into account by classifying 15 European countries into 3 regions (flat, hilly, mountain).
[This dataset is meant to replace the following datasets: - transport, freight train, RER w/o AT+BE+CH+DE+FR+IT, 2000 - 2000]

## Included activities start
The dataset starts with the production of a locomotive.

## Included activities end
The dataset ends with the service of transporting 1 ton over a distance of 1 km by a freight train. The dataset includes the production and the maintenance of the locomotive and the goods wagon, the construction of the railway track and the energy use and operation emission of a freight train using diesel. The inventory includes as well the diesel consumption and diesel engine emissions for an average European diesel traction goods train (1000 Gt). In addition diesel consumption and emissions of shunting processes are accounted for.

## Geography
Data refers to average transport conditions in Europe (EU 15: Austria, Belgium, Denmark, Finland, France, Germany, Greece, Ireland, Italy, Luxembourg, Netherlands, Portugal, Spain, Sweden and the UK).The data for rail infrastructure reflect Swiss conditions. Data for vehicle manufacturing and maintenance represents generic European data. Data of the energy use and operation emissions refers to average goods transport conditions in Europe (EU 15). Borken (2003), stated that the available energy data for diesel traction ranges between 2.6 and 9.7 g/Gtkm. For a train of 1000 Gt in a hilly country they proposed a specific energy consumption of approximately 5 g/Gtkm or 10g/tkm. The later value is used in this study. Data for the share of electricity and diesel traction in goods transportation, however, is available for the German rail company (DB), which is responsible for 30% of the total European goods transportation. Primary energy consumption is treated as a key indicator of the DB and accounts for the generation of electricity and fuels besides the utilizable final energy, which is required for this project. Thus, the share of final energy on the primary energy for both diesel and electricity has to be determined. As stated in DB (2000), the primary energy is derived using the TREMOD computer model Knörr et al. (2000). In the absence of further information for the remaining European countries we employ the German values for the representation of goods transportation conditions in Europe. However, it should be bear in mind that the share of diesel and electricity may vary significantly in the various European countries.
References:
Borken J., Helms H., Jungk N. and W. K. (2003) Energy consumptions and emissions of goods transports in Europe. Ifeu, Heidelberg
DB (2000) Die Bahn, Environmental Report. Deutsche Bahn AG, Berlin
Knörr W., Höpfner U., Lambrecht U. and Patyk A. (2000) Fortschreibung Daten- und Rechenmodell: Energieverbrauch und Schadstoffemissionen aus dem motorisierten Verkehr. Endbericht. Nr. 298 45 105. Institut für Energie- und Umweltforschung (ifeu), Heidelberg.

## Technology
Demand factors of various transport components required to fulfill the functional unit of one tkm fright transport are presented. In order to account for the fact that the same rail tracks are used for both passenger and goods transportation are applied allocation factors. Diesel traction

## Time period
Data for the determination of European average is based on statistical data from 1998

## Reference product
- transport, freight train: 1 metric ton*km; By-product classification allocatable product; CPC 6512: Railway transport services of freight
  production volume 2.00109e11 metric ton*km; = 500273000000*0.40
    Literature data. Total production volume for the country is taken from 2019 Railway Statistics Synopsis (https://uic.org/IMG/pdf/uic-statistics-synopsis-2019.pdf). The production volume for Europe without Switzerland is calculated subtracting Switzerland ,Turkey and Russia from the category Europe (including Turkey) Europa. For more information regarding geographies in ecoinvent, please see the relevant file on the ecoinvent website (https://www.ecoinvent.org/support/documents-and-files/documents-and-files.html).
    The technology share is calculated based on the assumption that 60% of the lines in Europe are electrified (-> assume 40% is diesel). The data is taken from the EU Expert Group Report: Electrification of the Transport System 2017 (https://ec.europa.eu/programmes/horizon2020/en/news/electrification-transport-system-expert-group-report)
  properties: carbon allocation 0 kg, carbon content 0, price 0.026 EUR2005

## Inputs from technosphere
- diesel: 0.0107 kg; source Borken J. 2003; lognormal variance with pedigree 0.04, pedigree (1,1,5,1,1)
  Literature value. Borken (2003), stated that the available energy data for diesel traction ranges between 2.6 and 9.7 g/Gtkm. For a train of 1000 Gt in a hilly country they proposed a specific energy consumption of approximately 5 g/Gtkm or 10g/tkm. The later value is used in this study. Data for the share of electricity and diesel traction in goods transportation, however, is available for the German rail company (DB), which is responsible for 30% of the total European goods transportation. Primary energy consumption is treated as a key indicator of the DB and accounts for the generation of electricity and fuels besides the utilizable final energy, which is required for this project. Thus, the share of final energy on the primary energy for both diesel and electricity has to be determined. As stated in DB (2000), the primary energy is derived using the TREMOD computer model Knörr et al. (2000). In a recent publication, the final energy consumption share of the primary energy is published J. Borken et al. (2003). In the absence of further information for the remaining European countries is employed the German values for the representation of goods transportation conditions in Europe. However, it should be bear in mind that the share of diesel and electricity may vary significantly in the various European countries. Further references: DB (2000) Die Bahn, Environmental Report. Deutsche Bahn AG, Berlin
  properties: carbon content, fossil 0.865, dry mass 1 kg, heating value, net 42.8 MJ, wet mass 1 kg
  note on carbon content, fossil: C-content of diesel is 86.5% (ecoinvent v2.2 report 6_IV, Tab 3.14)
- goods wagon: 4.59e-8 unit; lognormal variance with pedigree 0.06, pedigree (1,1,5,1,1)
  Calculated value, required to fulfill the functional unit of one tkm fright transport.
- locomotive: 7.11e-10 unit; lognormal variance with pedigree 0.06, pedigree (1,1,5,1,1)
  Calculated value, required to fulfill the functional unit of one tkm fright transport.
- maintenance, goods wagon: 4.59e-8 unit; lognormal variance with pedigree 0.06, pedigree (1,1,5,1,1)
  Calculated value, required to fulfill the functional unit of one tkm fright transport.
- maintenance, locomotive: 7.11e-10 unit; lognormal variance with pedigree 0.06, pedigree (1,1,5,1,1)
  Calculated value, required to fulfill the functional unit of one tkm fright transport.
- railway track: 9.3e-5 m*year; lognormal variance with pedigree 0.0621, pedigree (3,1,5,3,1)
  Calculated value, required to fulfill the functional unit of one tkm fright transport.
  Uncertainty: own estimation taken into account uncertainties in the infrastructure legth -transport performance ratio and further geographical uncertainties due to extrapolation

## Emissions to nature
All rows: lognormal variance with pedigree 0.04, pedigree (1,1,5,1,1)
- Ammonia [air, unspecified]: 2.14e-7 kg; source INFRAS 1999
  Literature value. Average emission factors for Swiss heavy good vehicles (HGV) for urban traffic conditions in 2000 derived from INFRAS (1999). Energy use and operation emissions
- Benzene [air, unspecified]: 1.07e-6 kg; source INFRAS 1999
  (same comment as for Ammonia)
- Cadmium II [air, unspecified]: 1.07e-10 kg; source EEA 2000
  Literature value provided by Expert Panel on Heavy Metals and POPs of the UNECE Task Force on Emission Inventories EEA (2000). However, these emission factors have to be considered as preliminary estimates only. More measurements are needed in order to confirm these values. Energy use and operation emissions
- Carbon dioxide, fossil [air, unspecified]: 0.0336 kg
  Estimated value. In this project CO2 indice is estimated assuming that all carbon in the fuel is transformed completely into CO2. For CO2 is employed an emission index of 73.5 g/MJ or 3146 g/kg.Energy use and operation emissions
- Carbon monoxide, fossil [air, unspecified]: 0.000169 kg; source Knörr W. 2000
  Literature value. Figures represent shunting specific emission indices from Knörr et al. (2000). Energy use and operation emissions
- Chromium III [air, unspecified]: 5.34e-10 kg; source EEA 2000
  (same comment as for Cadmium II)
- Copper ion [air, unspecified]: 1.82e-8 kg; source EEA 2000
  (same comment as for Cadmium II)
- Dinitrogen monoxide [air, unspecified]: 1.07e-6 kg; source INFRAS 1999
  (same comment as for Ammonia)
- Lead II [air, unspecified]: 1.17e-12 kg; source Jungbluth N. 2003
  Literature value from Jungbluth (2003). Energy use and operation emissions
- Mercury II [air, unspecified]: 2.14e-13 kg; source Jungbluth N. 2003
  Literature value from Jungbluth (2003). Energy use and operation emissions
- Methane, fossil [air, unspecified]: 1.39e-6 kg; source INFRAS 1999
  (same comment as for Ammonia)
- NMVOC, non-methane volatile organic compounds [air, unspecified]: 5.41e-5 kg; source INFRAS 1999
  Literature value. Average emission factors for Swiss heavy good vehicles (HGV) for urban traffic conditions in 2000 derived from INFRAS (1999). the presented figures of NMVOC emissions still contain emissions of Benzene, Toulol and Xylol. Energy use and operation emissions
- Nickel II [air, unspecified]: 7.47e-10 kg; source EEA 2000
  (same comment as for Cadmium II)
- Nitrogen oxides [air, unspecified]: 0.000587 kg; source Knörr W. 2000
  Literature value. Figures represent shunting specific emission indices Knörr et al. (2000) and average emission indices for diesel traction J. Borken et al. (2003) Energy use and operation emissions Further references: Borken J., Patyk A. and Reinhardt G. A. (1999) Basisdaten für ökologische Bilanzierungen: Einsatz von Nutzfahrzeugen in Transport, Landwirtschaft und Bergbau. Vieweg, Braunschweig/Wiesbaden
- Particulate Matter, < 2.5 um [air, unspecified]: 1.3728e-5 kg
  Literature value. Particle size distributions of exhaust emissions and exhaust emission factors [g/kg] for diesel locomotives without particle filters from EU-Norm IIIa. Energy use and operation emissions
- Particulate Matter, > 10 um [air, unspecified]: 1.6345e-5 kg
  (same comment as for Particulate Matter, < 2.5 um)
- Particulate Matter, > 2.5 um and < 10um [air, unspecified]: 7.437e-6 kg
  (same comment as for Particulate Matter, < 2.5 um)
- Selenium IV [air, unspecified]: 1.07e-10 kg; source EEA 2000
  (same comment as for Cadmium II)
- Sulfur dioxide [air, unspecified]: 6.41e-6 kg
  Estimated value.In this project SO2 indice is estimated assuming that all sulphur in the fuel is transformed completely into SO2. In line with assumptions made for road transport is assumed a sulphur content of 300 ppm resulting in a emission index of 0.6 g/kg. Energy use and operation emissions
- Toluene [air, unspecified]: 4.27e-7 kg; source INFRAS 1999
  (same comment as for Ammonia)
- Xylenes, unspecified [air, unspecified]: 4.27e-7 kg; source INFRAS 1999
  (same comment as for Ammonia)
- Zinc II [air, unspecified]: 1.07e-8 kg; source EEA 2000
  (same comment as for Cadmium II)
- Iron ion [soil, unspecified]: 6.02e-5 kg
  Estimated value. Abrasion (from braking lining, rail and wheel) is predominately composed of iron and mineral components BUWAL (2002). In this study is assumed that all non-airborne emissions are emitted as iron to soil. In consequence, is assumed a yearly load of 191.8 t/a iron emitted to soil. Emission of lubricates due to traction are not accounted for, since measures are in operation to avoid such emissions. Energy use and operation emissions Further references: BUWAL (2002) PM10-Emissionen des Verkehrs. Statusbericht; Teil Schienenverkehr. 144. Bundesamt fuer Umwelt, Wald und Landschaft, Bern

## Sampling procedure
National statistics, literature studies

## Extrapolations
see Technology and Geography
