# coke production

Dataset: EcoSpold 2, unit process
Geography: RoW
Time period: 1980-01-01 to 2024-12-31
Technology level: current
Classification: ISIC rev.4 ecoinvent: 1910:Manufacture of coke oven products
Scenario: Business-as-Usual
System model: Allocation, cut-off by classification
Generated by: Johannes Müller
Published in: Xin Liu 2016
Database: ecoinvent
isCopyrightProtected: true
accessRestrictedTo: 1

## General comment
The multioutput-process represents the supply of coke, producing coal gas, coal tar, sulfur and benzene as a byproduct.
This dataset was built as a weighted average of regional datasets of the same activityName.
This dataset was built as a weighted average of regional datasets of the same activityName. Weights are based on production volumes.
CN, wet quenching: weight = 73.92 %
CN, dry quenching: weight = 22.08 %
US: weight = 2.277 %
DE: weight = 1.717 %
For more details please see the regional datasets

## Included activities start
Activity starts with the reception of coal at plant-site.

## Included activities end
The activity ends with the supply of 1 kg of coke, considering the by-product recovery, to global market. Transport is not included.

## Geography
This dataset is a weighted average built from the following geographies: CN (dry and wet quenching), US, DE.

## Reference product
- coke: 1 MJ; name RP_coke; By-product classification allocatable product; CPC 33100: Coke and semi-coke of coal, of lignite or of peat; retort carbon; HS2017 270400: Coke and semi-coke; of coal, lignite or peat, whether or not agglomerated; retort carbon
  production volume 1.96188e13 MJ; name PV_coke; = 7.05934E+11*LHV_coke
    Production volume taken from US energy information administration (EIA) for 2021 https://www.eia.gov/international/data/world/coal-and-coke/coal-and-coke-production?pd=1&p=02&u=1&f=A&v=mapbubble&a=-&i=none&vo=value&t=C&g=none&l=249-00000000000g00000000000000000000000000000000000001&s=315532800000&e=1609459200000&ev=false&
  property heating value, net 28.6 MJ; name LHV_coke
  property price 0.00791364 EUR2005
    Calculated as price based on: 2018 to 2022 prices calculated from Import/Export data (total trades (USD) divided by total weight (kg) in Germany and China) from UN Trade data statistics (http://data.un.org/Explorer.aspx, Accessed 13 September 2023). Data from UN trade are in mass unit. Calorific value (lower) of 28.6 MJ/kg has been used to convert to MJ.
  properties: allocation factor 0.78936, carbon allocation 0.0285664 kg, carbon content 0.869149, carbon content, fossil 0.869149, carbon content, non-fossil 0, dry mass 0.0328671 kg, true value 0.22633, water content 0.0638298, water in wet mass 0.0020979 kg, wet mass 0.034965 kg

## Inputs from technosphere
- aluminium chloride: 3.13502e-6 kg; lognormal variance with pedigree 0.0053, pedigree (2,2,3,5,1)
- chemical, inorganic: 6.6254e-7 kg; lognormal variance with pedigree 0.0053, pedigree (2,2,3,5,1)
  properties: carbon content, fossil 0.003, dry mass 1 kg, wet mass 1 kg
  note on carbon content, fossil: This dataset is an unweighted average of 20 inorganic substances (listed in Tab 88.1, ecoinvent v2.2 report 8, part II), being part of the top100 chemicals included in this database. The C-content has also been calculated as an unweighted average of the C content of the substances composing this dataset.
- coal gas: 0.113801 MJ; lognormal variance with pedigree 0.0053, pedigree (2,2,3,5,1)
  properties: carbon content, fossil 0.288181, dry mass 0.0294737 kg, wet mass 0.0294737 kg
- electricity, medium voltage: 4.44549e-7, 6.65443e-7, 2.1022e-7, 3.91299e-6, 2.29664e-6, 2.72288e-6, 3.30739e-5, 7.88814e-8, 0.000659749, 3.67662e-7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 kWh (47 suppliers, which the file names only by identifier); sum of these 0.000967149 kWh; lognormal variance with pedigree 0.3047, pedigree (2,2,3,5,1)
- glucose: 2.1271e-6 kg; lognormal variance with pedigree 0.0053, pedigree (2,2,3,5,1)
  properties: heating value, net 20.19 MJ
- hard coal: 0.00270584, 0.000642077, 0.00210673, 0.0191499, 0.00449733, 0.00276125, 0.00596744, 0.00117425 kg (8 suppliers, which the file names only by identifier); sum of these 0.0390048 kg; lognormal variance with pedigree 0.0053, pedigree (2,2,3,5,1)
  properties: carbon content, fossil 0.845, dry mass 0.94 kg, heating value, net 27.91 MJ, water content 0.0638298, wet mass 1 kg
  note on carbon content, fossil: C content 75-94% (specified in Tab 1.1, report 6, part VI). A mean content of 0.845 kg C/ kg dry hard coal was considered
  note on heating value, net: Based on the Characterization factor of Hard coal in the CED method
- hard coal coke factory: 1.87392e-14 unit; lognormal variance with pedigree 0.042, pedigree (1,1,1,5,1)
- iron sulfate: 8.04682e-8 kg; lognormal variance with pedigree 0.302, pedigree (1,1,1,5,1)
  properties: dry mass 1 kg, wet mass 1 kg
- nitrogen, liquid: 6.62786e-5 kg; lognormal variance with pedigree 0.0053, pedigree (2,2,3,5,1)
  properties: dry mass 1 kg, wet mass 1 kg
- petroleum: 2.7708e-5, 1.24129e-6, 3.08389e-6, 2.87822e-8, 1.25772e-7, 2.86078e-7, 1.18332e-7 kg (7 suppliers, which the file names only by identifier); sum of these 3.25922e-5 kg; lognormal variance with pedigree 0.0053, pedigree (2,2,3,5,1)
  properties: carbon content, fossil 0.84, dry mass 1 kg, heating value, net 43.4 MJ, wet mass 1 kg
- phosphoric acid, fertiliser grade, without water, in 70% solution state: 3.5119e-7 kg; lognormal variance with pedigree 0.3047, pedigree (2,2,3,5,1)
  properties: dry mass 1 kg, wet mass 1 kg
- polyacrylamide: 2.28887e-8 kg; lognormal variance with pedigree 0.0053, pedigree (2,2,3,5,1)
  properties: carbon content, fossil 0.51, dry mass 1 kg, heating value, net 23.88 MJ, wet mass 1 kg
- potassium carbonate: 3.4712e-8 kg; lognormal variance with pedigree 0.0053, pedigree (2,2,3,5,1)
  properties: carbon content, fossil 0.0869565, dry mass 1 kg, heating value, net 2.63 MJ, wet mass 1 kg
- sodium hydroxide, without water, in 50% solution state: 7.8562e-5 kg; lognormal variance with pedigree 0.3047, pedigree (2,2,3,5,1)
  properties: dry mass 1 kg, heating value, net 3.03 MJ, wet mass 1 kg
- sodium tripolyphosphate: 5.67581e-7 kg; lognormal variance with pedigree 0.0053, pedigree (2,2,3,5,1)
  properties: dry mass 1 kg, wet mass 1 kg
- steam, in chemical industry: 0.00715438 kg; lognormal variance with pedigree 0.0053, pedigree (2,2,3,5,1)
  properties: dry mass 1 kg, wet mass 1 kg
- water, decarbonised: 2.92867e-6, 0.00240518, 0.00179979, 0.0298325, 0.00305741, 0.0188878, 0.00468304, 0.000168787, 0.000229907, 0.000929816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 kg (11 suppliers, which the file names only by identifier); sum of these 0.0675998 kg; lognormal variance with pedigree 0.3047, pedigree (2,2,3,5,1)
  properties: wet mass 1 kg

## Emissions to nature
- Acenaphthene [air, non-urban air or from high stacks]: 8.56141e-9 kg; lognormal variance with pedigree 0.3047, pedigree (2,2,3,5,1)
- Acenaphthylene [air, non-urban air or from high stacks]: 3.59786e-8 kg; lognormal variance with pedigree 0.3047, pedigree (2,2,3,5,1)
- Acetone [air, non-urban air or from high stacks]: 2.65848e-8 kg; lognormal variance with pedigree 0.302, pedigree (1,1,1,5,1)
- Acetylene [air, non-urban air or from high stacks]: 8.62354e-10 kg; lognormal variance with pedigree 0.652, pedigree (1,1,1,5,1)
- Acrolein [air, non-urban air or from high stacks]: 3.28068e-11 kg; lognormal variance with pedigree 0.302, pedigree (1,1,1,5,1)
- Aluminium III [air, non-urban air or from high stacks]: 9.66595e-9 kg; lognormal variance with pedigree 0.652, pedigree (1,1,1,5,1)
- Ammonia [air, non-urban air or from high stacks]: 1.90031e-6 kg; lognormal variance with pedigree 1.3347, pedigree (2,2,3,5,1)
- Anthracene [air, non-urban air or from high stacks]: 3.44498e-8 kg; lognormal variance with pedigree 0.0447, pedigree (2,2,3,5,1)
- Antimony ion [air, non-urban air or from high stacks]: 1.07258e-12 kg; lognormal variance with pedigree 0.652, pedigree (1,1,1,5,1)
- Arsenic ion [air, non-urban air or from high stacks]: 1.23148e-9 kg; lognormal variance with pedigree 0.6547, pedigree (2,2,3,5,1)
- Barium II [air, non-urban air or from high stacks]: 1.28269e-10 kg; lognormal variance with pedigree 0.652, pedigree (1,1,1,5,1)
- Benz(a)anthracene [air, non-urban air or from high stacks]: 1.4004e-8 kg; lognormal variance with pedigree 0.3047, pedigree (2,2,3,5,1)
- Benzene [air, non-urban air or from high stacks]: 6.83083e-7 kg; lognormal variance with pedigree 1.332, pedigree (1,1,1,5,1)
- Benzo(a)pyrene [air, non-urban air or from high stacks]: 3.55347e-8 kg; lognormal variance with pedigree 0.3047, pedigree (2,2,3,5,1)
- Benzo(b)fluoranthene [air, non-urban air or from high stacks]: 1.11502e-8 kg; lognormal variance with pedigree 0.3047, pedigree (2,2,3,5,1)
- Benzo(ghi)perylene [air, non-urban air or from high stacks]: 1.4738e-8 kg; lognormal variance with pedigree 0.3047, pedigree (2,2,3,5,1)
- Benzo(k)fluoranthene [air, non-urban air or from high stacks]: 5.44264e-9 kg; lognormal variance with pedigree 0.3047, pedigree (2,2,3,5,1)
- Beryllium II [air, non-urban air or from high stacks]: 1.48599e-12 kg; lognormal variance with pedigree 0.652, pedigree (1,1,1,5,1)
- Boron [air, non-urban air or from high stacks]: 3.113e-11 kg; lognormal variance with pedigree 0.652, pedigree (1,1,1,5,1)
- Bromine [air, non-urban air or from high stacks]: 6.20705e-12 kg; lognormal variance with pedigree 0.652, pedigree (1,1,1,5,1)
- Cadmium II [air, non-urban air or from high stacks]: 1.01081e-11 kg; lognormal variance with pedigree 0.6547, pedigree (2,2,3,5,1)
- Calcium II [air, non-urban air or from high stacks]: 1.14191e-9 kg; lognormal variance with pedigree 0.652, pedigree (1,1,1,5,1)
- Carbon dioxide, fossil [air, non-urban air or from high stacks]: 0.0141034 kg; lognormal variance with pedigree 0.0147, pedigree (2,2,3,5,1)
- Carbon disulfide [air, non-urban air or from high stacks]: 5.87003e-10 kg; lognormal variance with pedigree 0.012, pedigree (1,1,1,5,1)
- Carbon monoxide, fossil [air, non-urban air or from high stacks]: 2.65468e-5 kg; lognormal variance with pedigree 0.6547, pedigree (2,2,3,5,1)
- Chlorodifluoromethane [air, non-urban air or from high stacks]: 2.05514e-9 kg; lognormal variance with pedigree 0.302, pedigree (1,1,1,5,1)
- Chromium III [air, non-urban air or from high stacks]: 4.26072e-9 kg; lognormal variance with pedigree 0.6547, pedigree (2,2,3,5,1)
- Chrysene [air, non-urban air or from high stacks]: 9.82535e-9 kg; lognormal variance with pedigree 0.3047, pedigree (2,2,3,5,1)
- Cobalt II [air, non-urban air or from high stacks]: 1.00991e-9 kg; lognormal variance with pedigree 0.6547, pedigree (2,2,3,5,1)
- Copper ion [air, non-urban air or from high stacks]: 4.16327e-9 kg; lognormal variance with pedigree 0.6547, pedigree (2,2,3,5,1)
- Cyanide [air, non-urban air or from high stacks]: 3.08659e-7 kg; lognormal variance with pedigree 0.6547, pedigree (2,2,3,5,1)
- Dibenz(a,h)anthracene [air, non-urban air or from high stacks]: 3.11878e-9 kg; lognormal variance with pedigree 0.3047, pedigree (2,2,3,5,1)
- Dioxins, measured as 2,3,7,8-tetrachlorodibenzo-p-dioxin [air, non-urban air or from high stacks]: 5.81095e-15 kg; lognormal variance with pedigree 0.3047, pedigree (2,2,3,5,1)
- Ethane [air, non-urban air or from high stacks]: 1.8837e-7 kg; lognormal variance with pedigree 0.652, pedigree (1,1,1,5,1)
- Ethanol [air, non-urban air or from high stacks]: 2.68362e-11 kg; lognormal variance with pedigree 0.652, pedigree (1,1,1,5,1)
- Ethylene [air, non-urban air or from high stacks]: 2.66287e-8 kg; lognormal variance with pedigree 0.652, pedigree (1,1,1,5,1)
- Fluoranthene [air, non-urban air or from high stacks]: 5.07775e-8 kg; lognormal variance with pedigree 0.0447, pedigree (2,2,3,5,1)
- Fluorene [air, non-urban air or from high stacks]: 2.23005e-8 kg; lognormal variance with pedigree 0.3047, pedigree (2,2,3,5,1)
- Hexachlorobenzene [air, non-urban air or from high stacks]: 1.06415e-14 kg; lognormal variance with pedigree 0.3047, pedigree (2,2,3,5,1)
- Hydrocarbons, aliphatic, unsaturated [air, non-urban air or from high stacks]: 8.62354e-10 kg; lognormal variance with pedigree 0.652, pedigree (1,1,1,5,1)
- Hydrogen sulfide [air, non-urban air or from high stacks]: 1.65952e-6 kg; lognormal variance with pedigree 0.6547, pedigree (2,2,3,5,1)
- Indeno(1,2,3-cd)pyrene [air, non-urban air or from high stacks]: 1.4738e-8 kg; lognormal variance with pedigree 0.3047, pedigree (2,2,3,5,1)
- Iodine [air, non-urban air or from high stacks]: 1.14191e-12 kg; lognormal variance with pedigree 0.652, pedigree (1,1,1,5,1)
- Iron ion [air, non-urban air or from high stacks]: 3.99069e-9 kg; lognormal variance with pedigree 0.6547, pedigree (2,2,3,5,1)
- Lead II [air, non-urban air or from high stacks]: 1.62332e-9 kg; lognormal variance with pedigree 0.6547, pedigree (2,2,3,5,1)
- Magnesium [air, non-urban air or from high stacks]: 3.45889e-9 kg; lognormal variance with pedigree 0.652, pedigree (1,1,1,5,1)
- Manganese II [air, non-urban air or from high stacks]: 5.01709e-11 kg; lognormal variance with pedigree 0.652, pedigree (1,1,1,5,1)
- Mercury II [air, non-urban air or from high stacks]: 7.94839e-13 kg; lognormal variance with pedigree 0.302, pedigree (1,1,1,5,1)
- Methane, fossil [air, non-urban air or from high stacks]: 6.72829e-6 kg; lognormal variance with pedigree 1.3347, pedigree (2,2,3,5,1)
- Methanol [air, non-urban air or from high stacks]: 2.68362e-9 kg; lognormal variance with pedigree 0.652, pedigree (1,1,1,5,1)
- Molybdenum VI [air, non-urban air or from high stacks]: 1.69628e-12 kg; lognormal variance with pedigree 0.652, pedigree (1,1,1,5,1)
- NMVOC, non-methane volatile organic compounds [air, non-urban air or from high stacks]: 6.6474e-6 kg; lognormal variance with pedigree 0.652, pedigree (1,1,1,5,1)
- Naphthalene [air, non-urban air or from high stacks]: 1.64593e-7 kg; lognormal variance with pedigree 0.3047, pedigree (2,2,3,5,1)
- Nickel II [air, non-urban air or from high stacks]: 3.30567e-10 kg; lognormal variance with pedigree 0.6547, pedigree (2,2,3,5,1)
- Nitrogen oxides [air, non-urban air or from high stacks]: 1.14255e-5 kg; lognormal variance with pedigree 0.3047, pedigree (2,2,3,5,1)
- PAH, polycyclic aromatic hydrocarbons [air, non-urban air or from high stacks]: 1.43923e-9 kg; lognormal variance with pedigree 0.652, pedigree (1,1,1,5,1)
- Particulate Matter, < 2.5 um [air, non-urban air or from high stacks]: 7.25331e-6 kg; lognormal variance with pedigree 0.3047, pedigree (2,2,3,5,1)
- Particulate Matter, > 10 um [air, non-urban air or from high stacks]: 1.22097e-5 kg; lognormal variance with pedigree 0.3047, pedigree (2,2,3,5,1)
- Particulate Matter, > 2.5 um and < 10um [air, non-urban air or from high stacks]: 3.32136e-6 kg; lognormal variance with pedigree 0.3047, pedigree (2,2,3,5,1)
- Pentachlorobenzene [air, non-urban air or from high stacks]: 1.17146e-14 kg; lognormal variance with pedigree 0.3047, pedigree (2,2,3,5,1)
- Pentachlorophenol [air, non-urban air or from high stacks]: 2.16198e-9 kg; lognormal variance with pedigree 0.302, pedigree (1,1,1,5,1)
- Phenanthrene [air, non-urban air or from high stacks]: 1.4689e-7 kg; lognormal variance with pedigree 0.0447, pedigree (2,2,3,5,1)
- Phenol [air, non-urban air or from high stacks]: 2.45302e-6 kg; lognormal variance with pedigree 0.3047, pedigree (2,2,3,5,1)
- Phosphorus [air, non-urban air or from high stacks]: 8.57687e-11 kg; lognormal variance with pedigree 0.652, pedigree (1,1,1,5,1)
- Polychlorinated biphenyls [air, non-urban air or from high stacks]: 3.72238e-14 kg; lognormal variance with pedigree 0.3047, pedigree (2,2,3,5,1)
- Potassium I [air, non-urban air or from high stacks]: 1.14191e-9 kg; lognormal variance with pedigree 0.652, pedigree (1,1,1,5,1)
- Propane [air, non-urban air or from high stacks]: 6.11871e-9 kg; lognormal variance with pedigree 0.652, pedigree (1,1,1,5,1)
- Propylene [air, non-urban air or from high stacks]: 1.72945e-9 kg; lognormal variance with pedigree 0.652, pedigree (1,1,1,5,1)
- Pyrene [air, non-urban air or from high stacks]: 3.10659e-8 kg; lognormal variance with pedigree 0.3047, pedigree (2,2,3,5,1)
- Scandium [air, non-urban air or from high stacks]: 2.24591e-12 kg; lognormal variance with pedigree 0.652, pedigree (1,1,1,5,1)
- Selenium IV [air, non-urban air or from high stacks]: 4.69772e-12 kg; lognormal variance with pedigree 0.652, pedigree (1,1,1,5,1)
- Silicon [air, non-urban air or from high stacks]: 1.41672e-8 kg; lognormal variance with pedigree 0.652, pedigree (1,1,1,5,1)
- Silver I [air, non-urban air or from high stacks]: 8.17027e-14 kg; lognormal variance with pedigree 0.652, pedigree (1,1,1,5,1)
- Sodium I [air, non-urban air or from high stacks]: 5.68585e-10 kg; lognormal variance with pedigree 0.652, pedigree (1,1,1,5,1)
- Strontium II [air, non-urban air or from high stacks]: 1.14191e-10 kg; lognormal variance with pedigree 0.652, pedigree (1,1,1,5,1)
- Styrene [air, non-urban air or from high stacks]: 2.75275e-11 kg; lognormal variance with pedigree 0.652, pedigree (1,1,1,5,1)
- Sulfur dioxide [air, non-urban air or from high stacks]: 3.10467e-5 kg; lognormal variance with pedigree 0.3047, pedigree (2,2,3,5,1)
- Thallium I [air, non-urban air or from high stacks]: 1.52388e-12 kg; lognormal variance with pedigree 0.652, pedigree (1,1,1,5,1)
- Thorium [air, non-urban air or from high stacks]: 2.24591e-12 kg; lognormal variance with pedigree 0.652, pedigree (1,1,1,5,1)
- Tin ion [air, non-urban air or from high stacks]: 1.14191e-12 kg; lognormal variance with pedigree 0.652, pedigree (1,1,1,5,1)
- Titanium ion [air, non-urban air or from high stacks]: 3.45889e-10 kg; lognormal variance with pedigree 0.652, pedigree (1,1,1,5,1)
- Toluene [air, non-urban air or from high stacks]: 2.99291e-9 kg; lognormal variance with pedigree 0.652, pedigree (1,1,1,5,1)
- Uranium [air, non-urban air or from high stacks]: 1.14191e-12 kg; lognormal variance with pedigree 0.652, pedigree (1,1,1,5,1)
- Vanadium V [air, non-urban air or from high stacks]: 1.04846e-10 kg; lognormal variance with pedigree 0.6547, pedigree (2,2,3,5,1)
- Water [air, unspecified]: 6.83428e-7 m3; lognormal variance with pedigree 0.0427, pedigree (2,2,1,5,1)
- Zinc II [air, non-urban air or from high stacks]: 3.29254e-9 kg; lognormal variance with pedigree 0.6547, pedigree (2,2,3,5,1)
- Zirconium [air, non-urban air or from high stacks]: 2.76711e-11 kg; lognormal variance with pedigree 0.652, pedigree (1,1,1,5,1)
- Ammonium [water, surface water]: 4.52448e-7 kg; lognormal variance with pedigree 0.3047, pedigree (2,2,3,5,1)
- BOD5, Biological Oxygen Demand [water, surface water]: 2.13948e-6 kg; lognormal variance with pedigree 0.0447, pedigree (2,2,3,5,1)
- Benzo(a)pyrene [water, surface water]: 5.13737e-14 kg; lognormal variance with pedigree 0.3047, pedigree (2,2,3,5,1)
- COD, Chemical Oxygen Demand [water, surface water]: 4.27896e-6 kg; lognormal variance with pedigree 0.0447, pedigree (2,2,3,5,1)
- Chloride [water, surface water]: 1.56527e-6 kg; lognormal variance with pedigree 0.302, pedigree (1,1,1,5,1)
- Cyanide [water, surface water]: 1.44889e-8 kg; lognormal variance with pedigree 0.3047, pedigree (2,2,3,5,1)
- DOC, Dissolved Organic Carbon [water, surface water]: 4.27896e-6 kg; lognormal variance with pedigree 0.0447, pedigree (2,2,3,5,1)
- Hydrogen sulfide [water, surface water]: 8.02806e-9 kg; lognormal variance with pedigree 0.3047, pedigree (2,2,3,5,1)
- Oils, unspecified [water, surface water]: 1.63801e-7 kg; lognormal variance with pedigree 0.3047, pedigree (2,2,3,5,1)
- PAH, polycyclic aromatic hydrocarbons [water, surface water]: 2.41404e-11 kg; lognormal variance with pedigree 0.302, pedigree (1,1,1,5,1)
- Phenol [water, surface water]: 9.61866e-9 kg; lognormal variance with pedigree 0.3047, pedigree (2,2,3,5,1)
- Sodium I [water, surface water]: 1.00593e-6 kg; lognormal variance with pedigree 0.302, pedigree (1,1,1,5,1)
- Solids, inorganic [water, surface water]: 8.8515e-7 kg; lognormal variance with pedigree 0.302, pedigree (1,1,1,5,1)
- Suspended solids, unspecified [water, surface water]: 2.77084e-7 kg; lognormal variance with pedigree 0.0447, pedigree (2,2,3,5,1)
- TOC, Total Organic Carbon [water, surface water]: 1.5848e-6 kg; lognormal variance with pedigree 0.0447, pedigree (2,2,3,5,1)
- Water [water, unspecified]: 1.08026e-6 m3; lognormal variance with pedigree 0.0427, pedigree (2,2,1,5,1)

## Sampling procedure
Literature

## Extrapolations
This dataset was built as a weighted average of regional datasets of the same activityName. Weights are based on production volumes.
CN-AH: production volume = 1.06e+13 MJ/year, weight = 0.7392
CN: production volume = 3.16e+12 MJ/year, weight = 0.2208
US: production volume = 3.25e+11 MJ/year, weight = 0.02277
DE: production volume = 2.45e+11 MJ/year, weight = 0.01717
