# casting, bronze

Dataset: EcoSpold 2, unit process
Geography: CH
Time period: 1996-01-01 to 2023-12-31
Technology level: current
Classification: ISIC rev.4 ecoinvent: 2432:Casting of non-ferrous metals
Classification: EcoSpold01Categories: metals/processing
Tags: ConvertedDataset
Scenario: Business-as-Usual
System model: Allocation, cut-off by classification
Generated by: Hans-Jörg Althaus
Published in: Althaus H.-J. 2000
Database: ecoinvent
isCopyrightProtected: true
accessRestrictedTo: 1

## General comment
This dataset describes the casting of 1 kg of bronze, for CH in 2003.
[This dataset was already contained in the ecoinvent database version 2. It was not individually updated during the transfer to ecoinvent version 3. Life Cycle Impact Assessment results may still have changed, as they are affected by changes in the supply chain, i.e. in other datasets. This dataset was generated following the ecoinvent quality guidelines for version 2. It may have been subject to central changes described in the ecoinvent version 3 change report (http://www.ecoinvent.org/database/ecoinvent-version-3/reports-of-changes/), and the results of the central updates were reviewed extensively. The changes added e.g. consistent water flows and other information throughout the database. The documentation of this dataset can be found in the ecoinvent reports of version 2, which are still available via the ecoinvent website. The change report linked above covers all central changes that were made during the conversion process.]
All data are calculated based on assumptions and theoretical models. The overall quality of the dataset is poor, making it of insufficient quality for LCA where these metals play an important role.

## Included activities start
Casting process starting from melted bronze.

## Included activities end
This activity ends with the casting of bronze ingots.

The dataset includes the consumption of infrastructure for the process.

The dataset doesn't include the metal inputs for the process.

## Technology
Production is basically done by the casting of ingots. Due to the high vapour pressure of zinc and tin, parts of these inputs arise as air emissions. Filters are commonly used to abate these emissions.
The casting needs the moulds and energy for melting the alloy. Moulds are either made of metal (steel) or of sand.

## Reference product
- casting, bronze: 1 kg; name RP_amount_1; By-product classification allocatable product; CPC 89320: Non-ferrous metal casting services
  EcoSpold01Location=CH
  Estimation from dataset author
  production volume 663158 kg; name RP_PV_1
    Estimated at 0.5% of global production
  property price 0.011599 EUR2005
    Calculated based on inputs: The price of the product has been calculated as a sum of the values of the material and energy inputs for this product. This value is therefore a rough estimation. It may underestimate the real price since there are additional expenses when producing any product. These expences can include for example labour costs, treatment of waste materials and profit for the producer. Please consider carefully whether this level of data quality is acceptable for your application.
  properties: carbon allocation 0 kg, carbon content 0

## Inputs from technosphere
- aluminium casting facility: 4.9e-11 unit; lognormal variance with pedigree 0.458, pedigree (4,5,5,5,4)
  EcoSpold01Location=RER
  Proxy: "aluminium casting facility" is used as a proxy for brazing solder production facility.
  Estimation from dataset author: The amount of infrastructure corresponds to the volume of material throughput and thus is recalculated according to the different densities of aluminium and copper alloys. Then, Correction by density: From 2700 kg/m3 for infrastructure for aluminum casting, to 8470 kg/m3 for infrastructure for brass casting.
- electricity, medium voltage: 0.02 kWh; lognormal variance with pedigree 0.148, pedigree (4,5,5,5,4)
  Modelled, based on "ISIC 2420" - pdf-document on the dedicated talk page of ecoinvent (www.ecoinvent.org/documentation). See section: "Copper alloys in ecoinvent".
  EcoSpold01Location=UCTE
- filter dust from Al electrolysis: -0.00995 kg; name BP_amount_1
  Proxy: "filter dust from electrolysis, 0% water" is used as a proxy for dust from filters (to recycling).
  Estimation from dataset author: Dust filters are commonly used to abate metal emissions.
  production volume; = RP_PV_1 * (BP_amount_1 / RP_amount_1)
    Calculated from production volume of reference product using the relative outputs.
  properties: carbon content, fossil 0.11586, dry mass 1 kg, wet mass 1 kg
- heat, district or industrial, natural gas: 0.36 MJ; lognormal variance with pedigree 0.148, pedigree (4,5,5,5,4)
  EcoSpold01Location=RER
  Modelled, based on "ISIC 2420" - pdf-document on the dedicated talk page of ecoinvent (www.ecoinvent.org/documentation). See section: "Copper alloys in ecoinvent".
  properties: heating value, net 1 MJ
- heat, district or industrial, other than natural gas: 0.288 MJ; lognormal variance with pedigree 0.148, pedigree (4,5,5,5,4)
  (same comment as for heat, district or industrial, natural gas)
  properties: heating value, net 1 MJ

## Emissions to nature
- Tin ion [air, unspecified]: 5.05e-5 kg; lognormal variance with pedigree 0.198, pedigree (4,5,5,5,4)
  Estimation from dataset author: Due to the high vapour pressure of tin, parts of these inputs end up as air emissions (0.1% of Sn input to air).

## Sampling procedure
based on literature and internet

## Extrapolations
Data relate to the European average.

## Review by Roland Hischier 2003-06-12
Passed.

## Review by Roland Hischier 2011-12-09
Transfer of documentation done.
