# palm fruit bunch production

Dataset: EcoSpold 2, unit process
Geography: RoW
Time period: 2002-01-01 to 2023-12-31
Technology level: current
Classification: EcoSpold01Categories: agricultural production/plant production
Classification: ISIC rev.4 ecoinvent: 0126:Growing of oleaginous fruits
Scenario: Business-as-Usual
System model: Allocation, cut-off by classification
Share of production covered: 100 %
Generated by: Jürgen Sutter
Published in: Jungbluth N. 2007
Database: ecoinvent
isCopyrightProtected: true
accessRestrictedTo: 1

## General comment
The inventory for the cultivation of oil palms in Malyaysia is modelled with data from literature. Machine usage is modelled with Malaysian processings and Swiss diesel consumptions. Transports are calculated with standard distances. The functional unit is 1 kg palm fruit bunches (fresh mass with a water content of 47 %). Carbon content: 0.313 kg/kg fresh mass. Biomass energy content: 16 MJ/kg fresh mass. Yield: 24978 kg/ha. The emissions of N2O and NH3 to air are calculated with standard emission factors for mineral fertilizers from Nemecek et al. 2004. The emission of nitrate to water is calculated with an estimated nitrogen loss factor of 20%.
[This dataset was already contained in the ecoinvent database version 2. It was not individually updated during the transfer to ecoinvent version 3. Life Cycle Impact Assessment results may still have changed, as they are affected by changes in the supply chain, i.e. in other datasets. This dataset was generated following the ecoinvent quality guidelines for version 2. It may have been subject to central changes described in the ecoinvent version 3 change report (http://www.ecoinvent.org/database/ecoinvent-version-3/reports-of-changes/), and the results of the central updates were reviewed extensively. The changes added e.g. consistent water flows and other information throughout the database. The documentation of this dataset can be found in the ecoinvent reports of version 2, which are still available via the ecoinvent website. The change report linked above covers all central changes that were made during the conversion process.]
This activity was adapted to include the global average land use change (LUC) emissions according 2nd edition of the Quantis-modified tool developed by Blonk Consultants 'WFLDB-adapted-Blonk 2014 direct-land-use-change-assessment-tool_2015-05-18a.xlsx', tab. 'Country & land use unknown'. The size of the emission depends on (i) the relative crop expansion in all countries of the crop during the last 20 years and (ii) the corresponding, country specific land transformations. The current results are based on the average FAOSTAT data (harvested area) of 2009-2011 and 1989-1991. The weighted average is used which takes into account relative difference in crop expansion into primary forest, secondary forest, grassland, perennial and annual land.

## Included activities end
Extrapolated from the cultivation of oil palms in Malyaysia including use of diesel, machines, fertilizers, and pesticides.

## Geography
The inventory is modelled for Malaysia

## Technology
Cultivation of oil palms.

## Time period
Time of publications

## Parameters
- Annualization time: 20 year; name t
- annual yield, agriculture: 24.978 metric ton/(ha*year); name yield_agriculture
- fraction, irrigation water to surface water: 0.2 dimensionless; name fraction_IW_to_surface_water; lognormal variance with pedigree 0.0886, pedigree (4,3,1,1,4)
- fraction, irrigation water, to air: 0.586986 dimensionless; name fraction_IW_to_air; lognormal variance with pedigree 0.0409, pedigree (2,2,2,1,1)
- fraction, irrigation water, to ground water: 0.8 dimensionless; name fraction_IW_to_ground_water; lognormal variance with pedigree 0.0886, pedigree (4,3,1,1,4)
- land transformation to: 0.400352 m2/kg; name T_t; = UnitConversion(1, 'ha', 'm2')/(yield_agriculture*UnitConversion(1, 'metric ton', 'kg'))
  Calculated value:
- productivity mobile chipper: 120 m3/PMH; name productivity_mobile_chipper
  as m3 bulked/ productive machine hour

## Reference product
- palm fruit bunch: 1 kg; name REF_PRODUCT; By-product classification allocatable product; CPC 01491: Palm nuts and kernels; HS2017 080410: Fruit, edible; dates, fresh or dried
  EcoSpold01Location=MY
  production volume 8.51507e10 kg; name RP_PV_1; = 1.8187E+11
    Production volumes for 2005 from FAOSTAT (Production) (Oil palm fruit). In a 20 year perspective roughly half of the palm fruit bunches produced today comes at the expense of land recently transformed (e.g. plantations or primary forest).
  property carbon content, fossil 0; name REF_PRODUCT_C_content_fossil
    fossil carbon content on a dry matter basis
  property carbon content, non-fossil 0.590566; name REF_PRODUCT_C_content_non_fossil
    biogene carbon content on a dry matter basis
  property dry mass 0.53 kg; name REF_PRODUCT_DM
  property energy content 16 MJ; name REF_PRODUCT_energy_content
    as gross calorific value (when relevant)
  property price 0.15 EUR2005
    Bunch price: Calculated based in information: Kernel = 45% Bunch (in mass) [http://www.fao.org/docrep/005/y4355e/y4355e03.htm]. Kernel price: Calculated value based on data from United Nations Commodity Trade Statistics Database (comtrade.un.org). UN comtrade category: 120710 Palm nuts and kernels. Year 2005. Using exchange rate of 1EURO = 1.209 USD. Average of price of import into 3 main markets (EU, US and CN).
  property water content 0.886792; name REF_PRODUCT_water_content; = (1-REF_PRODUCT_DM)/REF_PRODUCT_DM
  property water in wet mass 0.47 kg; name REF_PRODUCT_WWM; = 1-REF_PRODUCT_DM
  property wet mass 1 kg; name REF_PRODUCT_WM
  properties: carbon allocation 0.313 kg, carbon content 0.590566

## Inputs from technosphere
- [thio]carbamate-compound: 2.0412e-5 kg; source Tenananita 2002; lognormal variance with pedigree 0.0427, pedigree (2,2,5,5,1)
  Amount of active ingredient from Tenaganita (2002). Substnaces that are not availabe in the ecoinvent database are approximated by inventories of superordinate chemical classes. The inventories were assigned according to Sutter (2010, Tab. 2.25). If no inventory for the active ingredient or the corresponding chemical class was available, the pesticide was approximated with the product "pesticide, unspecified". --- Sources: Sutter J. (2010) Life Cycle Inventories of Pesticides. Swiss Centre for Life Cycle Inventories, St. Gallen, Switzerland.
  EcoSpold01Location=RER
  Uncertainty: Tenaganita 2002
  properties: carbon content, fossil 0.62635, dry mass 1 kg, wet mass 1 kg
- ammonium sulfate: 0.00481955, 0.00147895 kg (2 suppliers, which the file names only by identifier); sum of these 0.0062985 kg; source IFA 2006; lognormal variance with pedigree 0.1041, pedigree (3,2,5,5,1)
  EcoSpold01Location=RER
  Amount of nutrient is an average based on IFA (2006), Corley & Tinker (2003), Ng et al. (1999) and Hofstetter (2006); type of fertiliser product from IFA (2006). --- Sources: IFA (2006): World Fertilizer Use Manual. Retrieved 16 May 2006 from http://www.fertilzer.org/ifa. --- Corley R. & Tinker P. (Ed) (2003) The Oil Palm. World Agricultural Series. Blackwell Science, Oxford. --- Ng P.H.C., Chew P.S., Goh K.J. & Kee K.K. (1999) Nutrient requirements and sustainability in mature oil palms - an assessment. Planter, Kuala Lumpur 75, 331-345. --- Hofstetter P. (WWF Switzerland) personal communication, June 2006.
  Uncertainty: Average of several references
  properties: dry mass 1 kg, wet mass 1 kg
- application of plant protection product, by field sprayer: 3.363e-5 ha; source Corley R. 2003; lognormal variance with pedigree 0.0432, pedigree (2,3,5,5,1)
  EcoSpold01Location=CH
  Extrapolation based on diesel consumption of oil palm growing (Corley & Tinker 2003) and of respective machine operation dataset in ecoinvent (Nemecek et al. 2004).
  Uncertainty: Corley 2003
- benzimidazole-compound: 3.7232e-8 kg; source Tenananita 2002; lognormal variance with pedigree 0.0427, pedigree (2,2,5,5,1)
  (same comment as for [thio]carbamate-compound)
  properties: carbon content, fossil 0.52967, dry mass 1 kg, wet mass 1 kg
- dolomite: 0.00211863, 0.00112227 kg (2 suppliers, which the file names only by identifier); sum of these 0.0032409 kg; source IFA 2006; lognormal variance with pedigree 0.1041, pedigree (3,2,5,5,1)
  Amount of nutrient is an average based on IFA (2006), Corley & Tinker (2003), Ng et al. (1999) and Hofstetter (2006); type of fertiliser product from IFA (2006). --- Sources: IFA (2006): World Fertilizer Use Manual. Retrieved 16 May 2006 from http://www.fertilzer.org/ifa. --- Corley R. & Tinker P. (Ed) (2003) The Oil Palm. World Agricultural Series. Blackwell Science, Oxford. --- Ng P.H.C., Chew P.S., Goh K.J. & Kee K.K. (1999) Nutrient requirements and sustainability in mature oil palms - an assessment. Planter, Kuala Lumpur 75, 331-345. --- Hofstetter P. (WWF Switzerland) personal communication, June 2006.
  EcoSpold01Location=RER
  Uncertainty: Average of several references
  properties: carbon content, fossil 0.13043, dry mass 1 kg, heating value, net 3.95 MJ, wet mass 1 kg
- fertilising, by broadcaster: 3.363e-5 ha; source Corley R. 2003; lognormal variance with pedigree 0.0432, pedigree (2,3,5,5,1)
  Extrapolation based on diesel consumption of oil palm growing (Corley & Tinker 2003) and of respective machine operation dataset in ecoinvent (Nemecek et al. 2004).
  EcoSpold01Location=CH
  Uncertainty: Corley 2003
- inorganic phosphorus fertiliser, as P2O5: 9.23496e-6, 0.000177345, 5.7233e-6, 1.40554e-6, 1.99033e-6, 4.96557e-6, 6.52207e-7, 7.6213e-8, 4.88687e-5, 1.71919e-6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 kg (27 suppliers, which the file names only by identifier); sum of these 0.0012801 kg; source IFA 2006; lognormal variance with pedigree 0.1041, pedigree (3,2,5,5,1)
  (same comment as for ammonium sulfate)
  properties: dry mass 1 kg, wet mass 1 kg
- irrigation: 1.97551e-6, 0.00463283, 0.00241082, 8.16066e-5, 0.000112175, 0.0086967, 1.78041e-5, 4.57896e-7, 0.00106995, 0.000269687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 m3 (15 suppliers, which the file names only by identifier); sum of these 0.017927 m3; lognormal variance with pedigree 1.21, pedigree (5,5,5,5,5)
  Calculated based on literature values (Döll, 2010) and partially modelled at ETH (Pfister, S.).
  properties: dry mass 0.11 kg, water content 9089.91, wet mass 1000 kg
- lime: 0.00158464, 0.000136863 kg (2 suppliers, which the file names only by identifier); sum of these 0.0017215 kg; source IFA 2006; lognormal variance with pedigree 0.1041, pedigree (3,2,5,5,1)
  EcoSpold01Location=CH
  Amount of nutrient is an average based on IFA (2006), Corley & Tinker (2003), Ng et al. (1999) and Hofstetter (2006); type of fertiliser product from IFA (2006). --- Sources: IFA (2006): World Fertilizer Use Manual. Retrieved 16 May 2006 from http://www.fertilzer.org/ifa. --- Corley R. & Tinker P. (Ed) (2003) The Oil Palm. World Agricultural Series. Blackwell Science, Oxford. --- Ng P.H.C., Chew P.S., Goh K.J. & Kee K.K. (1999) Nutrient requirements and sustainability in mature oil palms - an assessment. Planter, Kuala Lumpur 75, 331-345. --- Hofstetter P. (WWF Switzerland) personal communication, June 2006.
  Uncertainty: Average of several references
  properties: carbon content, fossil 0.12, dry mass 1 kg, wet mass 1 kg
- organophosphorus-compound, unspecified: 4.0473e-5 kg; source Tenananita 2002; lognormal variance with pedigree 0.0427, pedigree (2,2,5,5,1)
  EcoSpold01Location=RER
  Amount of active ingredient from Tenaganita (2002). Substnaces that are not availabe in the ecoinvent database are approximated by inventories of superordinate chemical classes. The inventories were assigned according to Sutter (2010, Tab. 2.25). If no inventory for the active ingredient or the corresponding chemical class was available, the pesticide was approximated with the product "pesticide, unspecified". --- Sources: Sutter J. (2010) Life Cycle Inventories of Pesticides. Swiss Centre for Life Cycle Inventories, St. Gallen, Switzerland.
  Uncertainty: Tenaganita 2002
  properties: carbon content, fossil 0.2609, dry mass 1 kg, wet mass 1 kg
- packaging, for fertilisers: 0.0440046 kg; lognormal variance with pedigree 0.0912, pedigree (4,3,5,5,4)
  Total amount of active substance/s of fertilisers needed for the production of 'palm fruit bunch' is calculated to be circa 2.20E-02 kg. Fertiliser/s used in this dataset is/are: 'ammonium sulfate, as N', 'dolomite', 'lime', 'phosphate fertiliser, as P2O5', 'potassium chloride, as K2O'. The total amount of active substance/s is doubled in order to account for the packaging of the dilluted product of fertiliser/s that is/are applied. Therefore, 4.40E-02 kg of packaging for fertilisers is justified with this exchange.
  properties: carbon content, fossil 0.825301, dry mass 1 kg, heating value, net 25.01 MJ, price 0.0642 EUR2005, wet mass 1 kg
  note on carbon content, fossil: Considering a chemical formula (C2H4)n for polyethylene, carbon content-fossil is calculated to be 0.856286 kg of Carbon per kg of dry mass.
- packaging, for pesticides: 0.000139518 kg; lognormal variance with pedigree 0.0912, pedigree (4,3,5,5,4)
  Total amount of active substance/s of pesticides needed for the production of palm fruit bunch is calculated to be circa 6.98E-05 kg. Pesticide/s used in this dataset is/are: '[thio]carbamate-compound', 'benzimidazole-compound', 'organophosphorus-compound, unspecified', 'pesticide, unspecified', 'phenoxy-compound', 'pyrethroid-compound'. The total amount of active substance/s is doubled in order to account for the packaging of the dilluted product of pesticide/s that is/are applied. Therefore, 1.40E-04 kg of packaging for pesticides is justified with this exchange.
  properties: carbon content, fossil 0.85714, dry mass 1 kg, heating value, net 25.97 MJ, price 0.0642 EUR2005, wet mass 1 kg
- pesticide, unspecified: 1.1424e-7 kg; source Tenananita 2002; lognormal variance with pedigree 0.0427, pedigree (2,2,5,5,1)
  (same comment as for [thio]carbamate-compound)
  properties: carbon content, fossil 0.48698, dry mass 1 kg, wet mass 1 kg
- phenoxy-compound: 5.8403e-6 kg; source Tenananita 2002; lognormal variance with pedigree 0.0427, pedigree (2,2,5,5,1)
  (same comment as for [thio]carbamate-compound)
  properties: carbon content, fossil 0.53256, dry mass 1 kg, wet mass 1 kg
- potassium chloride: 0.0011469, 0.0138294 kg (2 suppliers, which the file names only by identifier); sum of these 0.0149763 kg; source IFA 2006; lognormal variance with pedigree 0.1041, pedigree (3,2,5,5,1)
  The exchange has been updated from 'potassium chloride, as K2O' into 'potassium chloride' and therefore its amount has been scaled (multiplied) from 0.0095 kg by 1.5829 kg of 'potassium chloride' per kg of 'potassium chloride, as K2O'. Original comment of the exchange is: Amount of nutrient is an average based on IFA (2006), Corley & Tinker (2003), Ng et al. (1999) and Hofstetter (2006); type of fertiliser product from IFA (2006). --- Sources: IFA (2006): World Fertilizer Use Manual. Retrieved 16 May 2006 from http://www.fertilzer.org/ifa. --- Corley R. & Tinker P. (Ed) (2003) The Oil Palm. World Agricultural Series. Blackwell Science, Oxford. --- Ng P.H.C., Chew P.S., Goh K.J. & Kee K.K. (1999) Nutrient requirements and sustainability in mature oil palms - an assessment. Planter, Kuala Lumpur 75, 331-345. --- Hofstetter P. (WWF Switzerland) personal communication, June 2006.
  EcoSpold01Location=RER
  Uncertainty: Average of several references
  properties: dry mass 1 kg, wet mass 1 kg
- pyrethroid-compound: 2.8822e-6 kg; source Tenananita 2002; lognormal variance with pedigree 0.0427, pedigree (2,2,5,5,1)
  Amount of active ingredient from Tenaganita (2002). Substnaces that are not availabe in the ecoinvent database are approximated by inventories of superordinate chemical classes. The inventories were assigned according to Sutter (2010, Tab. 2.25). If no inventory for the active ingredient or the corresponding chemical class was available, the pesticide was approximated with the product "pesticide, unspecified". --- Sources: Sutter J. (2010) Life Cycle Inventories of Pesticides. Swiss Centre for Life Cycle Inventories, St. Gallen, Switzerland.
  EcoSpold01Location=CH
  Uncertainty: Tenaganita 2002
  properties: carbon content, fossil 0.623, dry mass 1 kg, wet mass 1 kg
- transport, tractor and trailer, agricultural: 0.00126386, 5.13945e-6 metric ton*km (2 suppliers, which the file names only by identifier); sum of these 0.001269 metric ton*km; source Corley R. 2003; lognormal variance with pedigree 0.268, pedigree (4,5,5,5,5)
  EcoSpold01Location=CH
  Field-to-farm transport of harvested fresh fruit bunches and farm-to-field transport of seedlings (36 t per 25 years); distance 25 km (Corley 2003).
  Uncertainty: Corley 2003
- waste wood, untreated: -0.000157396, -4.09706e-6, -0.00305311, -2.37787e-5, -0.00096465, -3.75922e-5, -0.000451324 kg (7 suppliers, which the file names only by identifier); sum of these -0.00469195 kg
  Calculated as weigther average from local data.
  production volume; = RP_PV_1 * (BP_amount_1 / REF_PRODUCT)
    Calculated from production volume of reference product using the relative outputs.
  properties: carbon content, non-fossil 0.48632, dry mass 0.8 kg, heating value, net 13.99 MJ, water content 0.25, wet mass 1 kg
  note on heating value, net: Value taken from the general comment of the treatment dataset.
- wood chipping, chipper, mobile, diesel, at forest road: 1.39205e-5 hour; = 1.0858/650/productivity_mobile_chipper; lognormal variance with pedigree 0.1132, pedigree (2,3,5,5,4)
  Calculated.
  650 kg/m3 is density of wood chips being chipped
  1.0858 kg is the amount of wood chips needed to be chipped while producing 1kg of palm fruit bunch
  Approximation for shredding at clearing of the plantation. Extrapolation based on diesel consumption of oil palm growing (Corley & Tinker 2003) and of respective machine operation dataset in ecoinvent (Nemecek et al. 2004).
  Uncertainty: Corley 2003

## Inputs from nature
- Carbon dioxide, in air [natural resource, in air]: 1.14767 kg; = 44/12 * (REF_PRODUCT_C_content_non_fossil * REF_PRODUCT * REF_PRODUCT_DM ); lognormal variance with pedigree 0.0606, pedigree (4,3,5,5,1)
  Modelled,see chapter 'CO2 binding' in "01_crop production_direct field emissions and natural resources_v1.0.pdf" - pdf-document on the dedicated talk page of ecoinvent (www.ecoinvent.org/documentation)
  Uncertainty: calculated from the carbon balance
- Energy, gross calorific value, in biomass [natural resource, biotic]: 16.006 MJ
- Occupation, permanent crop [natural resource, land]: 0.400352 m2*year; = T_t; lognormal variance with pedigree 0.082, pedigree (1,1,5,5,1)
  Modelled, see chapter 'Land use' in "01_crop production_direct field emissions and natural resources_v1.0.pdf" - pdf-document on the dedicated talk page of ecoinvent (www.ecoinvent.org/documentation)
  Uncertainty: FAOSTAT 2006
- Transformation, from permanent crop [natural resource, land]: 0.0200176 m2; = T_t/t; lognormal variance with pedigree 0.162, pedigree (1,1,5,5,1)
  (same comment as for Occupation, permanent crop)
- Transformation, to permanent crop [natural resource, land]: 0.0200176 m2; = T_t/t; lognormal variance with pedigree 0.162, pedigree (1,1,5,5,1)
  (same comment as for Occupation, permanent crop)

## Emissions to nature
- Ammonia [air, non-urban air or from high stacks]: 0.00050388 kg; lognormal variance with pedigree 0.0706, pedigree (4,3,5,5,1)
  Modelled with the 'AGRAMMON model' described in "01_crop production_direct field emissions and natural resources_v1.0.pdf" - pdf-document on the dedicated talk page of ecoinvent (www.ecoinvent.org/documentation)
  Uncertainty: Calculated with standard method
- Carbon dioxide, from soil or biomass stock [air, non-urban air or from high stacks]: 0.225703 kg; normal variance with pedigree 0.5, pedigree (3,3,5,5,2)
  Global average LUC emissions according 2nd edition of the Quantis-modified tool developed by Blonk Consultants 'WFLDB-adapted-Blonk 2014 direct-land-use-change-assessment-tool_2015-05-18a.xlsx', tab. 'Country & land use unknown'. The emission are based on the relative change in production areas in all countries for a given crop. The weighted average is used which takes into acount relative difference in crop expansion into primary forest, secondary forest, grassland, perennial and annual land.
  Uncertainty: Uncertainty estimated based on IPCC 2006
- Dinitrogen monoxide [air, non-urban air or from high stacks]: 0.000183086 kg; name N2O; lognormal variance with pedigree 0.08, pedigree (1,1,5,1,1)
  Where soil C is lost through oxidation as a result of land-use or management change, this loss will be accompanied by a simultaneous mineralisation of N. Where a loss of soil C occurs, this mineralised N is regarded as an additional source of N available for conversion to N2O. Modelled, based on "Guidlines_LUC_Calcs" -pdf- document on the dedicated talk page of ecoinvent (www.ecoinvent.org/documentation). See Equation 11 for details. Note: the opposite process to mineralisation, whereby inorganic N is sequestered into newly formed SOM, is not taken account of in the calculation of the mineralisation N source. This is because of the different dynamics of SOM decomposition and formation, and also because reduced tillage in some circumstances can increase both SOM and N2O emission. The constant term in the mathematical relation represents the N2O emissions from agriculture regardless of the land use changes; it was calculated according to IPCC 2006, see chapter 'Emissions of N2O to the air' in "01_crop production_direct field emissions and natural resources_v1.0.pdf" - pdf-document on the dedicated talk page of ecoinvent (www.ecoinvent.org/documentation).
  property carbon content, fossil 0; name N2O_C_content_fossil
  property carbon content, non-fossil 0; name N2O_C_content_non_fossil
  property dry mass 1 kg; name N2O_DM
  property water content 0; name N2O_water_content
  property water in wet mass 0 kg; name N2O_WWM
  property wet mass 1 kg; name N2O_WM
- Nitrogen oxides [air, non-urban air or from high stacks]: 3.84481e-5 kg; = 0.21* N2O; lognormal variance with pedigree 0.08, pedigree (1,1,5,1,1)
  Modelled, see chapter 'Emissions of NOx to the air' in "01_crop production_direct field emissions and natural resources_v1.0.pdf" - pdf-document on the dedicated talk page of ecoinvent (www.ecoinvent.org/documentation)
- Water [air, unspecified]: 0.0105229 m3; name water_to_air_unspecified; = (water_irrigation_input*fraction_IW_to_air); lognormal variance with pedigree 1.21, pedigree (5,5,5,5,5)
  Calculated value based on literature values and expert opinion. See comments in the parametres' comment field.
  property fraction, origin: fresh water 1; name fraction_origin_fresh_water
  property fraction, origin: salt water 0; name fraction_origin_salt_water
  property fraction, origin: unspecified 0; name fraction_origin_unspecified
- 2,4-D [soil, agricultural]: 5.8403e-6 kg; lognormal variance with pedigree 0.0706, pedigree (4,3,5,5,1)
  Modelled, see chapter 'Emissions of pesticides to agricultural soil' in "01_crop production_direct field emissions and natural resources_v1.0.pdf" - pdf-document on the dedicated talk page of ecoinvent (www.ecoinvent.org/documentation)
  Uncertainty: Calculated from the pesticide application
- Benomyl [soil, agricultural]: 3.7232e-8 kg; lognormal variance with pedigree 0.0706, pedigree (4,3,5,5,1)
  (same comment as for 2,4-D)
- Cadmium II [soil, agricultural]: 1.4474e-9 kg; lognormal variance with pedigree 0.1006, pedigree (4,3,5,5,1)
  Calculated as the difference between heavy metal input through fertilisers and output through the harvested product. Heavy metal contents of fresh palm fruit bunch for copper (Cu) and zinc (Zn) according to Corley & Tinker (2003). Heavy metal contents of mineral fertilisers according to Nemecek et al. (2004). Negative values represent a net export of heavy metals. For heavy metals other than Cu and Zn no data were available; uptake of heavy metals by palm fruit bunches was assumed to be 50% of the input through fertilisers. --- Sources: Nemecek T., Heil A., Huguenin O., Meier S., Erzinger S., Blaser S., Dux D. & Zimmerman A. (2004) Life Cycle Inventories of Agricultural Production Systems. Ecoinvent report no. 15. Swiss Centre for Life Cycle Inventories, Duebendorf, Switzerland.
  Uncertainty: Calculated from the fertilizer input
- Carbofuran [soil, agricultural]: 2.0412e-5 kg; lognormal variance with pedigree 0.0706, pedigree (4,3,5,5,1)
  (same comment as for 2,4-D)
- Chromium III [soil, agricultural]: 5.8458e-8 kg; lognormal variance with pedigree 0.1006, pedigree (4,3,5,5,1)
  (same comment as for Cadmium II)
- Copper ion [soil, agricultural]: -3.8334e-6 kg
  Calculated as the difference between heavy metal input through fertilisers and output through the harvested product. Heavy metal contents of fresh palm fruit bunch for copper (Cu) and zinc (Zn) according to Corley & Tinker (2003). Heavy metal contents of mineral fertilisers according to Nemecek et al. (2004). Negative values represent a net export of heavy metals. For heavy metals other than Cu and Zn no data were available; uptake of heavy metals by palm fruit bunches was assumed to be 50% of the input through fertilisers. --- Sources: Nemecek T., Heil A., Huguenin O., Meier S., Erzinger S., Blaser S., Dux D. & Zimmerman A. (2004) Life Cycle Inventories of Agricultural Production Systems. Ecoinvent report no. 15. Swiss Centre for Life Cycle Inventories, Duebendorf, Switzerland.
- Cypermethrin [soil, agricultural]: 2.8822e-6 kg; lognormal variance with pedigree 0.0706, pedigree (4,3,5,5,1)
  (same comment as for 2,4-D)
- Glyphosate [soil, agricultural]: 4.0473e-5 kg; lognormal variance with pedigree 0.0706, pedigree (4,3,5,5,1)
  (same comment as for 2,4-D)
- Lead II [soil, agricultural]: 7.4806e-8 kg; lognormal variance with pedigree 0.1006, pedigree (4,3,5,5,1)
  (same comment as for Cadmium II)
- Nickel II [soil, agricultural]: 7.692e-8 kg; lognormal variance with pedigree 0.1006, pedigree (4,3,5,5,1)
  (same comment as for Cadmium II)
- Thiram [soil, agricultural]: 6.6054e-8 kg; lognormal variance with pedigree 0.0706, pedigree (4,3,5,5,1)
  (same comment as for 2,4-D)
- Zinc II [soil, agricultural]: -4.2174e-6 kg
  (same comment as for Copper ion)
- Nitrate [water, ground-]: 0.0055787 kg; lognormal variance with pedigree 0.1006, pedigree (4,3,5,5,1)
  Modelled with the 'SQCB-NO3 model' described in "01_crop production_direct field emissions and natural resources_v1.0.pdf" - pdf-document on the dedicated talk page of ecoinvent (www.ecoinvent.org/documentation)
  Uncertainty: Estimation
- Phosphorus [water, ground-]: 2.8025e-6 kg; lognormal variance with pedigree 0.1006, pedigree (4,3,5,5,1)
  Modelled, see chapter 'Emissions of phosphorous to the water' in "01_crop production_direct field emissions and natural resources_v1.0.pdf" - pdf-document on the dedicated talk page of ecoinvent (www.ecoinvent.org/documentation)
  Uncertainty: Calculated with standard method
- Phosphorus [water, surface water]: 7.7885e-6 kg; lognormal variance with pedigree 0.1006, pedigree (4,3,5,5,1)
  (same comment as for Phosphorus)
- Water [water, ground-]: 0.00592328 m3; name water_to_water_ground; = water_irrigation_input*(1-fraction_IW_to_air)*fraction_IW_to_ground_water; lognormal variance with pedigree 1.21, pedigree (5,5,5,5,5)
  Calculated value. See the parameters and their comments to understand the calculation.
  property fraction, origin: fresh water 1; name fraction_origin_fresh_water_Wgw
  property fraction, origin: salt water 0; name fraction_origin_salt_water_Wgw
  property fraction, origin: unspecified 0; name fraction_origin_unspecified_Wgw
- Water [water, surface water]: 0.00148082 m3; name water_to_water_surface; = water_irrigation_input*(1-fraction_IW_to_air)*fraction_IW_to_surface_water; lognormal variance with pedigree 1.21, pedigree (5,5,5,5,5)
  Calculated value. See the parameters and their comments to understand the calculation.
  property fraction, origin: fresh water 1; name fraction_origin_fresh_water_Wsw
  property fraction, origin: salt water 0; name fraction_origin_salt_water_Wsw

## Sampling procedure
Literature data

## Extrapolations
Transports are modelled with standard distances. Machine usage is modelled with Malaysian processings and Swiss diesel consumptions and equipments. Emissions are calculated with standard methods. This dataset has been copied from an original dataset covering the geography MY.

## Review by Niels Jungbluth 2006-10-17
Passed.
none

## Review by Emilia Moreno Ruiz 2014-06-18
chipping input updated to fit the new data structure of chipping activities
