# transport, passenger train, urban

Dataset: EcoSpold 2, unit process
Geography: CH
Time period: 2000-01-01 to 2023-12-31
Technology level: current
Classification: ISIC rev.4 ecoinvent: 4921:Urban and suburban passenger land transport
Classification: EcoSpold01Categories: transport systems/train
Scenario: Business-as-Usual
System model: Allocation, cut-off by classification
Generated by: Michael Spielmann (obsolete)
Published in: Spielmann M. 2004
Database: ecoinvent
isCopyrightProtected: true
accessRestrictedTo: 1

## General comment
The dataset represents the entire transport life cycle of an urban passenger train in Switzerland. The data of energy use and operation emissions are average data for the operation of Swiss metropolitan trains (S-Trains) from Zurich. The data has been determined top down and bottom up: The average train usage has been derived from top-down, where the energy-consumption is defined by several measurements. Particulate emissions due to abrasion of rail tracks, wheels, brakes and overhead contact line is included. Emission of sulphur hexafluoride (SF6) occurring during conversion at traction substations are accounted for. For a first estimate of other european metropolitan trains, the user may change the electricity mix.

## Included activities start
The dataset starts with the production of an urban train.

## Included activities end
The dataset ends with the service of transporting 1 passenger over a distance of 1 km by an urban train. The dataset includes the production, the maintenance and the energy use and operation emission of an urban train, the construction of a railway track. The inventory of energy use and operation emissions includes the actual energy consumption due to traction.

## Geography
Data of energy use and operation emissions refers to average transport conditions on the SBB tracks

## Technology
Demand factors of various transport components required to fulfill the functional unit of one pkm. In order to account for the fact that the same rail tracks are used for both passenger and goods transportation are applied allocation factors. For the energy use and operation emissions, all technologies are included.

## Time period
For the energy use and operation emissions data, all data is based on situation in the year 2008, except the energy consumption per train (year 2005)

## Reference product
- transport, passenger train: 1 person*km; By-product classification allocatable product; CPC 641: Local transport and sightseeing transportation services of passengers
  EcoSpold01Location=CH
  production volume 1.49908e9 person*km
    UIC statistical synopsis 2005 http://www.uic.org/IMG/xls/synth2005-2.xls; share for urban trains 10.5%
  property price 0.0208844 EUR2005
    Calculated based on inputs: The price of the product has been calculated as a sum of the values of the material and energy inputs for this product. This value is therefore a rough estimation. It may underestimate the real price since there are additional expenses when producing any product. These expences can include for example labour costs, treatment of waste materials and profit for the producer. Please consider carefully whether this level of data quality is acceptable for your application.
  properties: carbon allocation 0 kg, carbon content 0

## Inputs from technosphere
- electricity, high voltage, for Swiss Federal Railways: 0.082664 kWh; lognormal variance with pedigree 0.04, pedigree (1,1,5,1,1)
  Energy use and operation emissions
  Uncertainty: SBB calculations, top down approach
- maintenance, train, passenger, long distance: 1.0762e-9 unit; lognormal variance with pedigree 0.05, pedigree (1,1,5,1,1)
  Calculated value, required to fulfill the functional unit of one pkm.
- railway track: 8.9832e-5 m*year; lognormal variance with pedigree 0.05, pedigree (1,1,5,1,1)
  EcoSpold01Location=CH
  Calculated value, required to fulfill the functional unit of one pkm.
- train, passenger, long-distance: 1.0762e-9 unit; lognormal variance with pedigree 0.05, pedigree (1,1,5,1,1)
  (same comment as for railway track)

## Emissions to nature
- Particulate Matter, > 10 um [air, unspecified]: 8.4392e-6 kg; lognormal variance with pedigree 0.0981, pedigree (4,2,5,1,1)
  Energy use and operation emissions
  Uncertainty: own estimates based on PM10 studies
- Particulate Matter, > 2.5 um and < 10um [air, unspecified]: 7.7053e-6 kg; lognormal variance with pedigree 0.1781, pedigree (4,2,5,1,1)
  Energy use and operation emissions
  Uncertainty: own estimates based on PM10 studies
- Sulfur hexafluoride [air, unspecified]: 3.6372e-9 kg; lognormal variance with pedigree 0.118025, pedigree (3,5,5,2,3)
  Energy use and operation emissions
  Uncertainty: literature
- Iron ion [soil, unspecified]: 2.0548e-5 kg; lognormal variance with pedigree 0.0981, pedigree (4,2,5,1,1)
  Energy use and operation emissions
  Uncertainty: own estimates based on PM10 studies

## Sampling procedure
National statistics, literature studies

## Extrapolations
see Technology and Geography

## Review by Christian Bauer 2010-02-07
passed

## Review by Roland Hischier 2011-09-28
Transfer of documentation done.
-> CHECK "comments" of the exchanges ...

## Review by Carl Vadenbo 2012-06-29
In preparation for the release of ecoinvent v3.0, the datasets 'operation, metropolitan train, SBB mix CH' and 'transport,metropolitan train, SBB mix CH' in ecoinvent v2.2 were merged into the dataset 'transport, passenger train, urban, CH 2008'. The amounts and the uncertainty information of the exchanges were reviewed and were found to correspond to the disaggregated datasets, and the dataset was accepted for inclusion into the ecoinvent database on 2012.07.04.

## Review by Bo Weidema 2012-09-21
input of electricity updated to most recent mix for the Swiss Federal Railways
