# stalk shredding

Dataset: EcoSpold 2, unit process
Geography: US
Time period: 2021-01-01 to 2023-12-31
Technology level: current
Classification: ISIC rev.4 ecoinvent: 0161:Support activities for crop production
Scenario: Business-as-Usual
System model: Allocation, cut-off by classification
Generated by: Juanita Barrera
Database: ecoinvent
isCopyrightProtected: true
accessRestrictedTo: 1

## General comment
This dataset models the service of stalk shredding in relation to an agricultural field with an extension of one hectare (1 ha)

## Included activities start
The activity starts from the agricultural field foreseen to be processed.

## Included activities end
This activity ends with the production of stalk shredding. The inventory factors in diesel consumption, the allocation of agricultural machinery and shed resources specifically for the shredding process. It also considers emissions to the air from combustion and emissions to the soil from tire abrasion during the shredding operation. The work process in the dataset includes various activities: transportation to the field (assuming a 1 km distance), field work on a 1 ha land parcel, transportation back to the farm, and concluding work. Overlapping during field operations is considered. The database does not account for the quantity of harvested material, dust unrelated to combustion, or noise production.

## Geography
The inventory is extrapolated from the Global geography. Data quality indicators from adjusted accordingly.

## Technology
Fuel consumption and emissions per kg diesel have been extrapolated to the US, while others inputs were taken from the original values.

## Reference product
- stalk shredding: 1 ha; By-product classification allocatable product; CPC 86119: Other support services to crop production
  production volume 2.45374e8 ha
    FAOSTAT data year 2020: Permanent meadows and pastures area, 1 cut per year assumed (considering grazing)
  property price 30.5984 EUR2005
    The price is from the year 2020. Price information has been directly provided by the data provider based on the following reference: University of Minnesota, Machinery cost estimates, W.F. Lazarus, 2020. The prices were adjusted for inflation relative to 2005 using the producer price index (PPI) of the euro area, published by eurostat (https://ec.europa.eu/eurostat/databrowser/view/STS_INPP_A__custom_6416181/default/table?lang=en, last accessed on 2023-06-01).
  properties: carbon allocation 0 kg, carbon content 0

## Inputs from technosphere
- petrol, two-stroke blend: 5.1502 kg; lognormal variance with pedigree 0.0082, pedigree (1,4,2,1,1)
  cropwatch - University of Nebraska-Lincoln Available at: https://cropwatch.unl.edu/tillage/fuel
  properties: carbon content, fossil 0.865, dry mass 1 kg, heating value, net 43.2 MJ, wet mass 1 kg
- shed: 0.00446 m2; lognormal variance with pedigree 0.3042, pedigree (1,4,2,5,1)
  proxy based on "mowing, by motor mower, GLO"
- tractor, 4-wheel, agricultural: 0.881 kg; lognormal variance with pedigree 0.3042, pedigree (1,4,2,5,1)
  proxy based on "mowing, by motor mower, GLO"

## Emissions to nature
- Ammonia [air, non-urban air or from high stacks]: 0.000206008 kg; lognormal variance with pedigree 0.058325, pedigree (1,2,2,2,3)
  adapted from "mowing, by motor mower, GLO" to match the diesel consumption
- Benzene [air, non-urban air or from high stacks]: 0.0487552 kg; lognormal variance with pedigree 0.058325, pedigree (1,2,2,2,3)
  adapted from "mowing, by motor mower, GLO" to match the diesel consumption
- Benzo(a)pyrene [air, non-urban air or from high stacks]: 2.06008e-7 kg; lognormal variance with pedigree 0.658325, pedigree (1,2,2,2,3)
  adapted from "mowing, by motor mower, GLO" to match the diesel consumption
- Cadmium II [air, non-urban air or from high stacks]: 5.1502e-8 kg; lognormal variance with pedigree 0.658325, pedigree (1,2,2,2,3)
  adapted from "mowing, by motor mower, GLO" to match the diesel consumption
- Carbon dioxide, fossil [air, non-urban air or from high stacks]: 12.1888 kg; lognormal variance with pedigree 0.008925, pedigree (1,2,2,2,3)
  adapted from "mowing, by motor mower, GLO" to match the diesel consumption
- Carbon monoxide, fossil [air, non-urban air or from high stacks]: 3.26179 kg; lognormal variance with pedigree 0.652225, pedigree (1,4,2,2,1)
  adapted from "mowing, by motor mower, GLO" to match the diesel consumption
- Chromium III [air, non-urban air or from high stacks]: 2.5751e-7 kg; lognormal variance with pedigree 0.658325, pedigree (1,2,2,2,3)
  adapted from "mowing, by motor mower, GLO" to match the diesel consumption
- Copper ion [air, non-urban air or from high stacks]: 8.75534e-6 kg; lognormal variance with pedigree 0.658325, pedigree (1,2,2,2,3)
  adapted from "mowing, by motor mower, GLO" to match the diesel consumption
- Dinitrogen monoxide [air, non-urban air or from high stacks]: 0.000669526 kg; lognormal variance with pedigree 0.058325, pedigree (1,2,2,2,3)
  adapted from "mowing, by motor mower, GLO" to match the diesel consumption
- Lead II [air, non-urban air or from high stacks]: 0.000751929 kg; lognormal variance with pedigree 0.658325, pedigree (1,2,2,2,3)
  adapted from "mowing, by motor mower, GLO" to match the diesel consumption
- Methane, fossil [air, non-urban air or from high stacks]: 0.0150386 kg; lognormal variance with pedigree 0.058325, pedigree (1,2,2,2,3)
  adapted from "mowing, by motor mower, GLO" to match the diesel consumption
- NMVOC, non-methane volatile organic compounds [air, non-urban air or from high stacks]: 0.0563089 kg; lognormal variance with pedigree 0.042225, pedigree (1,4,2,2,1)
  adapted from "mowing, by motor mower, GLO" to match the diesel consumption
- Nickel II [air, non-urban air or from high stacks]: 3.60514e-7 kg; lognormal variance with pedigree 0.658325, pedigree (1,2,2,2,3)
  adapted from "mowing, by motor mower, GLO" to match the diesel consumption
- Nitrogen oxides [air, non-urban air or from high stacks]: 0.103004 kg; lognormal variance with pedigree 0.042225, pedigree (1,4,2,2,1)
  adapted from "mowing, by motor mower, GLO" to match the diesel consumption
- PAH, polycyclic aromatic hydrocarbons [air, non-urban air or from high stacks]: 9.90555e-6 kg; lognormal variance with pedigree 0.318325, pedigree (1,2,2,2,3)
  adapted from "mowing, by motor mower, GLO" to match the diesel consumption
- Particulate Matter, < 2.5 um [air, non-urban air or from high stacks]: 0.0136824 kg; lognormal variance with pedigree 0.318325, pedigree (1,2,2,2,3)
  adapted from "mowing, by motor mower, GLO" to match the diesel consumption
- Selenium IV [air, non-urban air or from high stacks]: 5.1502e-8 kg; lognormal variance with pedigree 0.058325, pedigree (1,2,2,2,3)
  adapted from "mowing, by motor mower, GLO" to match the diesel consumption
- Sulfur dioxide [air, non-urban air or from high stacks]: 0.000370814 kg; lognormal variance with pedigree 0.014325, pedigree (1,2,2,2,3)
  adapted from "mowing, by motor mower, GLO" to match the diesel consumption
- Zinc II [air, non-urban air or from high stacks]: 5.1502e-6 kg; lognormal variance with pedigree 0.658325, pedigree (1,2,2,2,3)
  adapted from "mowing, by motor mower, GLO" to match the diesel consumption
- Cadmium II [soil, agricultural]: 4.23e-7 kg; lognormal variance with pedigree 0.0442, pedigree (1,4,2,5,1)
  proxy based on "mowing, by motor mower, GLO"
- Lead II [soil, agricultural]: 1.85e-6 kg; lognormal variance with pedigree 0.0442, pedigree (1,4,2,5,1)
  proxy based on "mowing, by motor mower, GLO"
- Zinc II [soil, agricultural]: 0.00112 kg; lognormal variance with pedigree 0.0442, pedigree (1,4,2,5,1)
  proxy based on "mowing, by motor mower, GLO"
