# tilapia production, extensive aquaculture, in pond

Dataset: EcoSpold 2, unit process
Geography: RoW
Time period: 2014-01-01 to 2023-12-31
Technology level: current
Classification: ISIC rev.4 ecoinvent: 0322:Freshwater aquaculture
Scenario: Business-as-Usual
System model: Allocation, cut-off by classification
Generated by: Angel Avadí
Published in: Avadí, A. 2018
Database: ecoinvent
isCopyrightProtected: true
accessRestrictedTo: 1

## General comment
This activity represents the extensive production of tilapia in ponds. Aquaculture is widespread in South America, yet in global terms, its output is minor. The most prevalent seafood culturing systems are freshwater ones (if the important Ecuadorian shrimp and Chilean salmon aquaculture industries are excluded), either land-based (ponds) or large water bodies-based (cages). One specific aquaculture systems was modelled: pond-based semi-extensive tilapia. These tilapia systems are common in tropical areas of Brazil, Colombia, Peru and Ecuador. Technologically speaking, these systems are simple and well established. The pond systems usually consist of earthen ponds without aeration, and featuring manual feeding and fertilisation. This type of systems uses predominantly commercial aquafeed.
System boundaries and relation between activities

## Included activities start
The system boundaries include the partial life cycle of production means, from construction, through maintenance and the use phase, but excluding plant EOL, as no data was available :
· Production of 1000 kg of commercial fish feed.
· Use of an aquaculture system featuring either cage or pond infrastructure required to produce 1000 kg of fish, and consuming as much feed as determined by the system’s FCR. The construction and maintenance of ponds is integrated in the system’s use phase.

## Included activities end
Covers the nursery, rearing and production ponds until the tilapia is ready for processing. Transport of fertilized eggs is not included, since it considered to be produced locally. Ponds were integrated into the main pond-based aquaculture dataset, due to low construction and maintenance input requirements.
The provision of fingerlings was not modelled explicitly, for instance as a separate hatchery/nursery activity, but its material and energy requirements included in the main fish production dataset.

## Geography
This production system is common worldwide under tropical conditions and ample availability of water and water bodies

## Technology
Common pond-based tilapia production technology

## Reference product
- tilapia: 1 kg; name RP_amount_1; source Avadí, A. 2018; By-product classification allocatable product; CPC 04212: Farmed freshwater fish, live, fresh or chilled; HS2017 030271: Fish; fresh or chilled, tilapias (Oreochromis spp.), excluding fillets, fish meat of 0304, and edible fish [...]
  Tilapia production, intensive
  production volume 2.83323e9 kg; name RP_PV_1
    Global tilapia production (2012-2014)
  property price 4.5423 EUR2005
    Calculated value based on data from United Nations Commodity Trade Statistics Database (comtrade.un.org). UN comtrade category: 30271 Fish; fresh or chilled, tilapias (Oreochromis spp.), excluding fillets, livers, roes, and other fish meat of heading 0304. Year 2015. Using exchange rate of 1EURO = 1.209 USD. Average of price of import into 4 main markets (EU, US, JPN and IN).
  properties: carbon allocation 0 kg, carbon content 0

## Inputs from technosphere
- ammonium sulfate: 0.0024884, 0.000763604 kg (2 suppliers, which the file names only by identifier); sum of these 0.003252 kg; source Watanabe, W. O. 2010; lognormal variance with pedigree 0.0532, pedigree (4,4,5,5,2)
  Fertilization used in ponds.
  properties: dry mass 1 kg, wet mass 1 kg
- concrete, normal strength: 1.46895e-7, 6.04502e-8, 8.07206e-8, 1.79221e-6, 7.52389e-7, 3.19073e-5 m3 (6 suppliers, which the file names only by identifier); sum of these 3.474e-5 m3; source Avadí, A. 2018; lognormal variance with pedigree 0.0532, pedigree (4,4,5,5,2)
  Concrete used in the infrastructure of ponds.
  properties: dry mass 2190 kg, water content 0.086758, wet mass 2380 kg
- electricity, medium voltage: 0.136863, 2.73012, 0.917311, 0.0419122, 0.590972, 0.00838869, 0.00180124, 0.190636 kWh (8 suppliers, which the file names only by identifier); sum of these 4.618 kWh; source Avadí, A. 2018; lognormal variance with pedigree 0.0458, pedigree (3,3,5,5,2)
  Energy used to power water pumping.
- inorganic potassium fertiliser, as K2O: 9.64222e-6, 3.1297e-6, 4.63609e-5, 1.39456e-6, 5.37111e-6, 6.39678e-5, 8.74474e-8, 1.08941e-5, 3.56003e-6, 1.22196e-6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 kg (22 suppliers, which the file names only by identifier); sum of these 0.0015177 kg; source Avadí, A. 2018; lognormal variance with pedigree 0.0532, pedigree (4,4,5,5,2)
  Considers a 30% content of K2O
  properties: dry mass 1 kg, wet mass 1 kg
- poultry manure, dried: 0.19967 kg; source Avadí, A. 2018; lognormal variance with pedigree 0.0532, pedigree (4,4,5,5,2)
  Use of fertilizers in the ponds
  properties: cadmium content 2.92e-7, carbon content, non-fossil 0.33389, copper content 4.38e-5, dry mass 0.865 kg, lead content 2.92e-6, mercury content 2e-7, nickel content 4e-5, nitrogen content 0.532, phosphorus content 0.0167, potassium content 0.024, water content 0.156069, wet mass 1 kg, zinc content 0.000349
  note on cadmium content: pg 36 Tab 7. Original values are given in kg/m3, but this is an error and it is mg/kg DM
- quicklime, milled, packed: 0.0188401, 0.000159921 kg (2 suppliers, which the file names only by identifier); sum of these 0.019 kg; source Avadí, A. 2018; lognormal variance with pedigree 0.0532, pedigree (4,4,5,5,2)
  Liming increases the pH of bottom mud and thereby increases the availability of phosphorus added in fertilizer. Liming increases benthic production in fertilized ponds, apparently through increased nutrient availability and also liming increases microbial activity in mud through a favorable increase in pH.
  properties: dry mass 0.99 kg, water content 0.010101, wet mass 1 kg
- tilapia feed, 24-28% protein: 1.329 kg; source Costa 2016; lognormal variance with pedigree 0.0064, pedigree (2,3,3,5,2)
  Tilapia feed, 24-28% protein
- waste concrete: -1.18685e-7, -1.6179e-6, -4.19624e-10 kg (3 suppliers, which the file names only by identifier); sum of these -1.737e-6 kg; = concrete*0.05; source Avadí, A. 2018; lognormal variance with pedigree 0.0587, pedigree (5,5,3,3,3)
  It was assumed that 5% of the concrete used is disposed of as waste.
  production volume; = RP_PV_1 * (BP_amount_1 / RP_amount_1)
    Calculated from production volume of reference product using the relative outputs.
  properties: dry mass 0.5 kg, water content 1, wet mass 1 kg

## Inputs from nature
- Water, unspecified natural origin [natural resource, in water]: 6.8222 m3; name water; source Avadí, A. 2018; lognormal variance with pedigree 0.0532, pedigree (4,4,5,5,2)
  Water used in the ponds.

## Emissions to nature
- Water [air, unspecified]: 3.47932 m3; = water*0.51; source Avadí, A. 2018; lognormal variance with pedigree 0.0926, pedigree (4,4,5,5,4)
  51% of total water used is evaporated
- Nitrogen [water, unspecified]: 0.0763 kg; source Cho, CY 1990; lognormal variance with pedigree 0.0926, pedigree (4,4,5,5,2)
  Nitrogen emissions to the environment
- Phosphorus [water, unspecified]: 0.0091 kg; source Cho, CY 1990; lognormal variance with pedigree 0.0926, pedigree (4,4,5,5,2)
  Phosphorus emissions to the environment
- Water [water, surface water]: 3.34288 m3; = water*0.49; source Avadí, A. 2018; lognormal variance with pedigree 0.0926, pedigree (4,4,5,5,4)
  Water that eventually reaches surface watr (49%)

## Extrapolations
Pond-based semi-extensive aquaculture in Brazil and Peru were asumed to represent similar practices in all South American tilapia-producing countries
