# cement, all types to generic market for cement, unspecified

Dataset: EcoSpold 2, unit process
Geography: Europe without Switzerland
Time period: 2013-01-01 to 2023-12-31
Technology level: current
Classification: ISIC rev.4 ecoinvent: 2394:Manufacture of cement, lime and plaster
Scenario: Business-as-Usual
System model: Allocation, cut-off by classification
Generated by: Lucia Valsasina
Database: ecoinvent
isCopyrightProtected: true
accessRestrictedTo: 1

## General comment
This is a linking (transfering) activity which links the specific cement to the generic market for cement, unspecified.

## Included activities start
The activity starts with the reception of a specific cement.

## Included activities end
The activity ends with cement, unspecified which is supplied to the generic market for cement, unspecified.

## Reference product
- cement, unspecified: 1 kg; By-product classification allocatable product; CPC 37440: Portland cement, aluminous cement, slag cement and similar hydraulic cements, except in the form of clinkers; HS2017 2523: Portland cement, aluminous cement (ciment fondu), slag cement, supersulphate cement and similar hydraulic cem[...]
  production volume 4.09552e10 kg; = 204776*10^6*100%*20%
    Calculated based on regional PV, assuming 20% of cement is redirected to the generic market for cement unspecified
  property price 0.0615 EUR2005
    2005 import and export prices (total trades (USD) divided by total weight (kg) in China, India, USA, Japan, Russia and Europe, major producers and consumers (http://www.cementchina.net/freport/showfre.asp?id=749) from UN Commodity Trade Statistics Database (http://data.un.org/Explorer.aspxDatabase [Accessed 2 July 2010]). Commodity: Cement (portland, aluminious, slag or hydraulic)
  properties: carbon allocation 0 kg, carbon content 0, carbon content, fossil 0, carbon content, non-fossil 0, dry mass 1 kg, water content 0, water in wet mass 0 kg, wet mass 1 kg

## Inputs from technosphere
- cement, CEM II/A: 0.433751 kg; lognormal variance with pedigree 0.0008, pedigree (1,1,2,1,1)
  Shares calculated based on the regional production volumes.
  properties: dry mass 1 kg, wet mass 1 kg
- cement, CEM II/B: 0.0459449 kg; lognormal variance with pedigree 0.0008, pedigree (1,1,2,1,1)
  Shares calculated based on the regional production volumes.
  properties: dry mass 1 kg, wet mass 1 kg
- cement, CEM III/A: 0.137017 kg; lognormal variance with pedigree 0.0008, pedigree (1,1,2,1,1)
  Shares calculated based on the regional production volumes.
  properties: dry mass 1 kg, wet mass 1 kg
- cement, CEM III/B: 0.0141742 kg
  Shares calculated based on the regional production volumes.
  properties: dry mass 1 kg, wet mass 1 kg
- cement, CEM III/C: 0.0023624 kg
  Shares calculated based on the regional production volumes.
  properties: dry mass 1 kg, wet mass 1 kg
- cement, CEM IV/A: 0.017132 kg; name cem
  Shares calculated based on the regional production volumes.
  property carbon content, fossil 0; name cem_C_content_fossil
  property carbon content, non-fossil 0; name cem_C_content_non_fossil
  property dry mass 1 kg; name cem_DM
  property water content 0; name cem_water_content
  property water in wet mass 0 kg; name cem_WWM
  property wet mass 1 kg; name cem_WM
- cement, CEM IV/B: 0.0019036 kg
  Shares calculated based on the regional production volumes.
  properties: dry mass 1 kg, wet mass 1 kg
- cement, CEM V/A: 0.0277602 kg; lognormal variance with pedigree 0.0008, pedigree (1,1,2,1,1)
  Shares calculated based on the regional production volumes.
  properties: dry mass 1 kg, wet mass 1 kg
- cement, CEM V/B: 0.0039657 kg; lognormal variance with pedigree 0.0008, pedigree (1,1,2,1,1)
  Shares calculated based on the regional production volumes.
  properties: dry mass 1 kg, wet mass 1 kg
- cement, Portland: 0.31599 kg; lognormal variance with pedigree 0.0008, pedigree (1,1,2,1,1)
  Shares calculated based on the regional production volumes.
  properties: dry mass 1 kg, wet mass 1 kg
