# photovoltaic panel production, a-Si

Dataset: EcoSpold 2, unit process
Geography: US
Time period: 1997-01-01 to 2023-12-31
Technology level: current
Classification: EcoSpold01Categories: photovoltaic/production of components
Classification: ISIC rev.4 ecoinvent: 2610:Manufacture of electronic components and boards
Synonyms: amorphous silicon; PV-module; Solarmodul
Tags: ConvertedDataset
Scenario: Business-as-Usual
System model: Allocation, cut-off by classification
Share of production covered: 100 %
Generated by: Niels Jungbluth
Published in: Jungbluth, N. 2007
Database: ecoinvent
isCopyrightProtected: true
accessRestrictedTo: 1

## General comment
Production of photovoltaic thin film modules. Deposition of nine thin-film layers on the triple-junction cell. The modules produced at United Solar have a size of 2.3 m2. The weight is 8.2 kg per m2. The efficiency is 6.45% at the beginning of the life time. Degradation has to be taken into account with achieved yields. The rated nominal power is about 128Wp per module.
[This dataset was already contained in the ecoinvent database version 2. It was not individually updated during the transfer to ecoinvent version 3. Life Cycle Impact Assessment results may still have changed, as they are affected by changes in the supply chain, i.e. in other datasets. This dataset was generated following the ecoinvent quality guidelines for version 2. It may have been subject to central changes described in the ecoinvent version 3 change report (http://www.ecoinvent.org/database/ecoinvent-version-3/reports-of-changes/), and the results of the central updates were reviewed extensively. The changes added e.g. consistent water flows and other information throughout the database. The documentation of this dataset can be found in the ecoinvent reports of version 2, which are still available via the ecoinvent website. The change report linked above covers all central changes that were made during the conversion process.]

## Included activities end
Electricity and heat use, materials, transport of materials, disposal of wastes and the product. Data for direct air and water emissions were not available. It can be expected that small amount of NMVOC will be emitted from the lamination process.

## Geography
Data for United Solar in the United States.

## Technology
Production technology of thin film a-Si cells. The modules contain triple junction cells, which are made in a continuous roll-to-roll deposition on stainless steel. The cell is deposited using a vapour-deposition process at low temperatures.

## Time period
Data refer to 2005. Some are extrapolated from older information.

## Reference product
- photovoltaic panel, a-Si: 1 m2; By-product classification allocatable product; CPC 47150: Diodes, transistors and similar semi-conductor devices; photosensitive semi-conductor devices; light emitting […]; HS2017 854140: Electrical apparatus; photosensitive, including photovoltaic cells, whether or not assembled in modules or [...]
  EcoSpold01Location=US
  production volume 145547 m2
    8.1 MW in 2005
    128 W/2.3 m2. Production is 8.1 MW in 2005 (from Tab 9.10, ecoinvent v2 report 6_XII)
  property price 285.464 EUR2005
    Calculated based on inputs: The price of the product has been calculated as a sum of the values of the material and energy inputs for this product. This value is therefore a rough estimation. It may underestimate the real price since there are additional expenses when producing any product. These expences can include for example labour costs, treatment of waste materials and profit for the producer. Please consider carefully whether this level of data quality is acceptable for your application.
  properties: carbon allocation 0 kg, carbon content 0

## Inputs from technosphere
- aluminium alloy, AlMg3: 3.3403 kg; lognormal variance with pedigree 0.0426, pedigree (3,3,5,1,1)
  Pacca 2006
  EcoSpold01Location=RER
  Uncertainty: Pacca 2006
  properties: dry mass 1 kg, wet mass 1 kg
- photovoltaic laminate, a-Si: 1 m2; name laminate; lognormal variance with pedigree 0.0586, pedigree (4,3,5,1,1)
  EcoSpold01Location=US
  Assumption.
  This product is assumed to be supplied exclusively by the production in the US, therefore a direct activity link to the activity "photovoltaic laminate production, a-Si" in the US is used.
  Uncertainty: Assumption
- steel, low-alloyed, hot rolled: 2.18 kg; lognormal variance with pedigree 0.0426, pedigree (3,3,5,1,1)
  Pacca 2006
  Uncertainty: Pacca 2006
  properties: carbon content, fossil 0.005, dry mass 1 kg, wet mass 1 kg
  note on carbon content, fossil: Low alloyed steel composition given in Tab. 3.2 ecoinvent v2.2 report 10_partII. Steel assumed to have a C content of 0.5%
- transport, freight train: 0.54 metric ton*km; = laminate * 2.7 * 200/1000
  The photovoltaic laminate, a-Si is assumed to be transported 200 km by rail. This is the standard rail transport distance for the US (see table 4.2, p. 635/926 in Classen et al., 2009).
  Additionally, the laminate has an estimated mass of 2.7 kg per m2 (p. 86 in Jungbluth et al., 2009).
  References:
  Classen M., Althaus H.-J., Blaser S., Tuchschmid M., Jungbluth N., Doka G., Faist Emmenegger M. and Scharnhorst W. (2009) Life Cycle Inventories of Metals. Final report ecoinvent data v2.1, No 10. EMPA Dübendorf, Swiss Centre for Life Cycle Inventories, Dübendorf, CH, Online-Version under: www.ecoinvent.ch
  Jungbluth N., Stucki M, and Frischknecht R. (2009) Photovoltaics. In Dones, R. (Ed.) et al., Sachbilanzen von Energiesystemen: Grundlagen für den ökologischen Vergleich von Energiesystemen und den Einbezug von Energiesystemen in Ökobilanzen für die Schweiz. ecoinvent report No. 6-XII, Swiss Centre for Life Cycle Inventories, Dübendorf, CH, 2009.
- transport, freight, lorry, unspecified: 0.27 metric ton*km; = laminate * 2.7 * 100/1000
  The photovoltaic laminate, a-Si is assumed to be transported 100 km by lorry. This is the standard road transport distance for the US (see table 4.2, p. 635/926 in Classen et al., 2009).
  Additionally, the laminate has an estimated mass of 2.7 kg per m2 (p. 86 in Jungbluth et al., 2009).
  References:
  Classen M., Althaus H.-J., Blaser S., Tuchschmid M., Jungbluth N., Doka G., Faist Emmenegger M. and Scharnhorst W. (2009) Life Cycle Inventories of Metals. Final report ecoinvent data v2.1, No 10. EMPA Dübendorf, Swiss Centre for Life Cycle Inventories, Dübendorf, CH, Online-Version under: www.ecoinvent.ch
  Jungbluth N., Stucki M, and Frischknecht R. (2009) Photovoltaics. In Dones, R. (Ed.) et al., Sachbilanzen von Energiesystemen: Grundlagen für den ökologischen Vergleich von Energiesystemen und den Einbezug von Energiesystemen in Ökobilanzen für die Schweiz. ecoinvent report No. 6-XII, Swiss Centre for Life Cycle Inventories, Dübendorf, CH, 2009.

## Sampling procedure
Literature data based on producer information.

## Extrapolations
Packaging estimated with data for crystalline modules.

## Review by Roberto Dones 2007-08-23
Passed.
none
