# maintenance, electric bicycle

Dataset: EcoSpold 2, unit process
Geography: CH
Time period: 2007-01-01 to 2023-12-31
Technology level: current
Classification: ISIC rev.4 ecoinvent: 4540:Sale, maintenance and repair of motorcycles and related parts and accessori
Classification: EcoSpold01Categories: transport systems/road
Tags: ConvertedDataset
Scenario: Business-as-Usual
System model: Allocation, cut-off by classification
Generated by: Marianne Leuenberger
Published in: M. Leuenberger 2010
Database: ecoinvent
isCopyrightProtected: true
accessRestrictedTo: 1

## General comment
The data set reflects the replacement of parts for the maintenance of an e-bike of 24kg with a LiIo battery. Battery replacemnet: 2.75 times. Life expectancy battery: 4'000 km.
[This dataset was already contained in the ecoinvent database version 2. It was not individually updated during the transfer to ecoinvent version 3. Life Cycle Impact Assessment results may still have changed, as they are affected by changes in the supply chain, i.e. in other datasets. This dataset was generated following the ecoinvent quality guidelines for version 2. It may have been subject to central changes described in the ecoinvent version 3 change report (http://www.ecoinvent.org/database/ecoinvent-version-3/reports-of-changes/), and the results of the central updates were reviewed extensively. The changes added e.g. consistent water flows and other information throughout the database. The documentation of this dataset can be found in the ecoinvent reports of version 2, which are still available via the ecoinvent website. The change report linked above covers all central changes that were made during the conversion process.]

## Included activities end
This data sets includes the maintenance of an electric bicycle throughout its life cycle.

## Geography
Data cover maintenance in Switzerland

## Technology
Maintenance of an electric bicycle

## Parameters
- fraction, process water, to air: 0.15 dimensionless; name fraction_PW_to_air; lognormal variance with pedigree 0.092025, pedigree (4,4,3,2,4)
  Literature value. In case when no industry/process specific data are available, default evaporation fraction value is used. This value is 15% and is based on literature (Statistics Canada, 2007 & Shaffer, K.H., 2008, Consumptive water use in the Great Lakes Basin, USGS & Shiklomanov, 2003, World Water Resources at the Beginning of the 21st Century) and has been approved by an expert.
- fraction, tap water, to air: 0.15 dimensionless; name fraction_TW_to_air; = fraction_PW_to_air; lognormal variance with pedigree 0.092025, pedigree (4,4,3,2,4)
  Calculated value. See comment in the other parametres present in this dataset. Tap water is considered to be always used as process water, thus process water fractions to air are applied to all tap water input flows to calculate the amount of water consumed in the processes.

## Reference product
- maintenance, electric bicycle: 1 unit; By-product classification allocatable product; CPC 87141: Maintenance and repair services of motor vehicles
  EcoSpold01Location=CH
  production volume 0.0336675 unit
    This is a placeholder value that does not reflect real-world production volumes. This dataset does not currently require a real-world production volume to work in the database framework, and no actual data were collected yet. This has no negative effect on the results of the ecoinvent database. The placeholder value of this activity was scaled according to the nominal GDP of 2005 (source: United Nations, http://data.un.org/Glossary.aspx?q=GDP+%28current+US%24%29, accessed 20130726) to reflect an appropriate share of the global production volume, which is also a placeholder value.
  property price 233.639 EUR2005
    Calculated based on inputs: The price of the product has been calculated as a sum of the values of the material and energy inputs for this product. This value is therefore a rough estimation. It may underestimate the real price since there are additional expenses when producing any product. These expences can include for example labour costs, treatment of waste materials and profit for the producer. Please consider carefully whether this level of data quality is acceptable for your application.
  properties: carbon allocation 0 kg, carbon content 0

## Inputs from technosphere
- aluminium alloy, AlMg3: 0.37662 kg; lognormal variance with pedigree 0.0587, pedigree (2,2,5,1,3)
  Estimation:5% of aluminium parts replaced
  EcoSpold01Location=RER
  Uncertainty: Estimation:5% of aluminium parts replaced
  properties: dry mass 1 kg, wet mass 1 kg
- battery, Li-ion, LiMn2O4, rechargeable, prismatic: 7.15 kg; lognormal variance with pedigree 0.0587, pedigree (2,2,5,1,3)
  EcoSpold01Location=GLO
  Personal communication: 2.75 batteries per 15000km bicycles, 2 batteries 50000 scooter
  Uncertainty: Personal communication: 2.75 batteries per 15000km bicycles, 2 batteries 50000 scooter
  properties: carbon content, fossil 0.328011, dry mass 1 kg, wet mass 1 kg
  note on carbon content, fossil: Calculated as the addition of C contents in the product composition
- chromium steel removed by turning, average, conventional: 0.22825 kg; lognormal variance with pedigree 0.1281, pedigree (4,2,5,1,4)
  Assumption
  EcoSpold01Location=RER
  Uncertainty: Assumption
  properties: carbon content, fossil 0.0008, dry mass 1 kg, wet mass 1 kg
- injection moulding: 0.97875 kg; lognormal variance with pedigree 0.1281, pedigree (4,2,5,1,4)
  Assumption
  EcoSpold01Location=RER
  Uncertainty: Assumption
- polyethylene, high density, granulate: 0.97875 kg; lognormal variance with pedigree 0.0587, pedigree (2,2,5,1,3)
  Estimation: Bicycle: 50% of plastic parts once replaced, Scooter 15% replaced
  EcoSpold01Location=RER
  Uncertainty: Estimation: Bicycle: 50% of plastic parts once replaced, Scooter 15% replaced
  properties: carbon content, fossil 0.857143, dry mass 1 kg, heating value, net 42.47 MJ, wet mass 1 kg
  note on carbon content, fossil: Polyethylene is formed out of a huge amount of ethylene monomers (C2H4) (ecoinvent v2.2 report 11_II). MW=28 g/mol
- polyurethane, flexible foam: 0.03 kg; lognormal variance with pedigree 0.0587, pedigree (2,2,5,1,3)
  EcoSpold01Location=RER
  Estimation: saddle once replaced, Scooter: no replacement
  Uncertainty: Estimation: saddle once replaced, Scooter: no replacement
  properties: carbon content, fossil 0.633827, dry mass 1 kg, heating value, net 30.67 MJ, wet mass 1 kg
  note on carbon content, fossil: Polyurethanes (PUR) is the collective name for an extensive group of polymers with very different compositions and correspondingly varied property profiles, though their molecule chain contains all a urethane group (-NH-CO-O-). All PURs are built on a common principle : they are produced by the diisocyanate polyaddition process, that links polyols and (di)isocyanates. In this dataset, an example of typical polyurethane mixture is described (Ullmann, Polyurethanes, Dieterich et al. & ecoinvent v2 report 11_II). C content was calculated as an addition of C contents in its components.
- section bar extrusion, aluminium: 0.37662 kg; lognormal variance with pedigree 0.1281, pedigree (4,2,5,1,4)
  EcoSpold01Location=RER
  Assumption for pipe drawing
  Uncertainty: Assumption for pipe drawing
- steel, low-alloyed, hot rolled: 0.22825 kg; lognormal variance with pedigree 0.0587, pedigree (2,2,5,1,3)
  EcoSpold01Location=RER
  Estimation: 5% of steel parts replaced, Scooter: 10%
  Uncertainty: Estimation: 5% of steel parts replaced, Scooter: 10%
  properties: carbon content, fossil 0.005, dry mass 1 kg, wet mass 1 kg
  note on carbon content, fossil: Low alloyed steel composition given in Tab. 3.2 ecoinvent v2.2 report 10_partII. Steel assumed to have a C content of 0.5%
- synthetic rubber: 1.6875 kg; lognormal variance with pedigree 0.0587, pedigree (2,2,5,1,3)
  Estimation: 3.75 (bike)/3 (scooter) tyre-sets use in life-time
  EcoSpold01Location=RER
  Uncertainty: Estimation: 3.75 (bike)/3 (scooter) tyre-sets use in life-time
  properties: carbon content, fossil 0.871949, dry mass 1 kg, heating value, net 26.42 MJ, wet mass 1 kg
  note on carbon content, fossil: EPDM (Ethylene-propene-diene terpolymer) rubber is a terpolymer of ethylene, propene, and a diene with the residual unsaturated portion of the diene in the side chain (ecoinvent v2.2 report 7-part XX & Ullmann). Chemical formula (deduced from Evidences of Solvent-Induced Miscibility in Polychloroprene-co-Ethylene-Propene Diene Terpolymer Blends, Dubey et al., Journal of Applied Polymer Science, 2009, 111:1884–1891): C20H35
- tap water: 0.0744 kg; name tap_water_input; lognormal variance with pedigree 0.0412, pedigree (2,3,5,1,1)
  EcoSpold01Location=RER
  Assumption based on: Cherry, C.R. 2007, 1488 liters waste water for all production phases (incl. Battery manufacturing --> 50%)
  Uncertainty: Assumption based on: Cherry, C.R. 2007, 1488 liters waste water for all production phases (incl. Battery manufacturing --> 50%)
  properties: carbon content, fossil 0.00178991, dry mass 0.000337476 kg, water content 2962.17, wet mass 1 kg
  note on carbon content, fossil: Bicarbonate content is 2.93 mol/m3. CO2 content is 0.1 mol/m3 (ecoinvent v2.2 report 8, Tab 93.1).
- used Li-ion battery: -7.15 kg; lognormal variance with pedigree 0.0261, pedigree (4,2,1,1,3)
  EcoSpold01Location=GLO
  All LiIo batteries into battery recycling
  Uncertainty: all LiIo batteries into battery recycling
  production volume
    Calculated from the production volume of maintenance, electric bicycle in proportion to the respective output amounts.
  properties: carbon content, fossil 0.328011, dry mass 1 kg, wet mass 1 kg
- waste plastic, mixture: -1.0088 kg; lognormal variance with pedigree 0.0261, pedigree (4,2,1,1,3)
  Plastics to municipal incineration
  EcoSpold01Location=CH
  Uncertainty: plastics to municipal incineration
  production volume
    (same comment as for used Li-ion battery)
  properties: carbon content, fossil 0.747344, dry mass 0.847 kg, heating value, net 30.79 MJ, water content 0.180638, wet mass 1 kg
  note on carbon content, fossil: C content in 1 kg DM was calculated using data in Tab A.2, ecoinvent v2.2 report 13_I
  note on heating value, net: Value taken from the general comment of the treatment dataset.
- waste rubber, unspecified: -0.84375 kg; lognormal variance with pedigree 0.0261, pedigree (4,2,1,1,3)
  50% of tyres to municipal incineration
  EcoSpold01Location=CH
  Uncertainty: 50% of tyres to municipal incineration
  production volume
    (same comment as for used Li-ion battery)
  properties: carbon content, fossil 0.853, dry mass 1 kg, heating value, net 27.19 MJ, wet mass 1 kg

## Emissions to nature
- Water [air, unspecified]: 1.116e-5 m3; name water_to_air_unspecified; = (tap_water_input/1000*fraction_TW_to_air); lognormal variance with pedigree 0.0807, pedigree (2,2,5,1,1)
  Calculated value based on literature values and expert opinion. See comments in the parametres' comment field.
  property fraction, origin: fresh water 1; name fraction_origin_fresh_water
  property fraction, origin: salt water 0; name fraction_origin_salt_water
  property fraction, origin: unspecified 0; name fraction_origin_unspecified
- Water [water, unspecified]: 6.324e-5 m3; name water_to_water_unspecified; = (tap_water_input/1000)*(1-fraction_TW_to_air); lognormal variance with pedigree 0.0807, pedigree (2,2,5,1,1)
  (same comment as for Water)
  property carbon content, fossil 0; name C_content_fossil
  property carbon content, non-fossil 0; name C_content_non_fossil
  property dry mass 0 kg; name DM
  property fraction, origin: fresh water 1; name fraction_origin_fresh_water_Ww
  property fraction, origin: salt water 0; name fraction_origin_salt_water_Ww
  property fraction, origin: unspecified 0; name fraction_origin_unspecified_Ww
  property water in wet mass 1000 kg; name WWM
  property wet mass 1000 kg; name WM

## Sampling procedure
Literature

## Review by Christian Bauer 2010-03-25
passed
C:\Dokumente und Einstellungen\Marianne\Eigene Dateien\Projekte\277_Mobitool\Ecoinvent\Review\Upload 1\corrections\[Ecospold_Maintenance_ebikes-v1.2.xls]X-Process
