# clinker production

Dataset: EcoSpold 2, unit process
Geography: RoW
Time period: 1998-01-01 to 2023-12-31
Technology level: current
Classification: ISIC rev.4 ecoinvent: 2394:Manufacture of cement, lime and plaster
Synonyms: rotary kiln; cement; Klinker; clinker; Zement; Drehrohrofen
Tags: combined production
Scenario: Business-as-Usual
System model: Allocation, cut-off by classification
Generated by: Lucia Valsasina
Published in: Kellenberger D. 2007
Database: ecoinvent
isCopyrightProtected: true
accessRestrictedTo: 1

## General comment
The dataset describes the production of portland cement clinker; in the production different types of alternative fuels and raw materials are used. As the use of a alternative fuel/material can vary considerably between different years.
This dataset was created as a weighted average (by production volumes) of the regional clinker production activities.

## Included activities start
From the reception of traditional and alternative fuels and raw materials at the factory gate.

## Included activities end
This activity ends with the cooling of the produced clinker. It includes the whole manufacturing process to produce clinker (raw material provision, grinding and mixing; rotary kiln process), internal processes (transport, etc.) and for the infrastructure only the rotary kiln (material consumption) is taken into account. No administration is included. Waste (as secondary fuel and raw material) enter the system without environmental burdens from upstream processes.

## Geography
Activity created as a weighted average (by production volume) of the regional clinker production activities.

## Time period
The dataset represents a weighted average of the regional activities. The time period is set according to the time period of the regional activities.

## Parameters
- fraction, cooling water, once-through system, to air: 0.004 dimensionless; name fraction_CW_OT_to_air
  Calculated based on literature value (Scown, C.D., 2011, Water Footprint of U.S. Transportation Fuels and supplying information of the article) (Vionnet, S., Quantis Water Database - Technical Report, 2012).
- fraction, cooling water, recirculating system, to air: 0.771 dimensionless; name fraction_CW_R_to_air
  (same comment as for fraction, cooling water, once-through system, to air)
- fraction, cooling water, to air: 0.3875 dimensionless; name fraction_CW_to_air; = (0.5*fraction_CW_OT_to_air)+(0.5*fraction_CW_R_to_air)
  Calculated value based on literature value (see comments of the other parametres present in this dataset) and expert opinion. In the case when no industry/literature data are available about the type of cooling or directly fraction, cooling water, to air specific for the process a default assumption is applied. It is assumed that the once-through cooling system is used in 50% of all cases and recirculating system is used in another 50% of all cases.
- fraction, process water, to air: 0.15 dimensionless; name fraction_PW_to_air; lognormal variance with pedigree 0.092025, pedigree (4,4,3,2,4)
  Literature value. In case when no industry/process specific data are available, default evaporation fraction value is used. This value is 15% and is based on literature (Statistics Canada, 2007 & Shaffer, K.H., 2008, Consumptive water use in the Great Lakes Basin, USGS & Shiklomanov, 2003, World Water Resources at the Beginning of the 21st Century) and has been approved by an expert.
- fraction, tap water, to air: 0.15 dimensionless; name fraction_TW_to_air; = fraction_PW_to_air; lognormal variance with pedigree 0.092025, pedigree (4,4,3,2,4)
  Calculated value. See comment in the other parametres present in this dataset. Tap water is considered to be always used as process water, thus process water fractions to air are applied to all tap water input flows to calculate the amount of water consumed in the processes.

## Reference product
- clinker: 1 kg; By-product classification allocatable product; CPC 37430: Cement clinkers; HS2017 252310: Cement clinkers (whether or not coloured)
  Calculated as a weighted average (by production volume) of the regional activities.
  production volume 1.50267e12 kg; name clinker_PV
    Calculated from the annunal cement production volume between 2005 and 2009 and an estimated global clinker/cement ratio of 0.78
  property price 0.047 EUR2005
    Calculated value based on data from United Nations Commodity Trade Statistics Database (comtrade.un.org). UN comtrade category: 252310 Cement Clinkers. Using exchange rate of 1EURO = 1.209 USD. Average of price of import into 5 main markets (EU, US, JP, IN and CN).
  properties: carbon allocation 0 kg, carbon content 0, carbon content, fossil 0, carbon content, non-fossil 0, dry mass 1 kg, water content 0, water in wet mass 0 kg, wet mass 1 kg

## Inputs from technosphere
- ammonia, anhydrous, liquid: 0.000359187, 1.51831e-5, 3.39638e-6, 0.000124823 kg (4 suppliers, which the file names only by identifier); sum of these 0.000502589 kg; = 0.000502589394533732*clinker; lognormal variance with pedigree 0.0146, pedigree (2,1,3,5,1)
  Calculated as a weighted average (by production volume) of the regional activities.
  properties: dry mass 1 kg, wet mass 1 kg
- bauxite: 0.00449909 kg; = 0.00449909374107036*clinker; lognormal variance with pedigree 0.0146, pedigree (2,1,3,5,1)
  Calculated as a weighted average (by production volume) of the regional activities.
  properties: dry mass 1 kg, wet mass 1 kg
- calcareous marl: 0.246691 kg; = 0.246691390061778*clinker; lognormal variance with pedigree 0.0146, pedigree (2,1,3,5,1)
  Calculated as a weighted average (by production volume) of the regional activities.
  properties: carbon content, fossil 0.087767, dry mass 1 kg, wet mass 1 kg
  note on carbon content, fossil: composed from 3/4 pure limestone and 1/4 clay, ecoinvent v2.2 report 7 part II pg 14. C content of limestone is 0.117 kg/kg WM
- cement factory: 5.72253e-12 unit; = 5.72253299131462E-12*clinker; lognormal variance with pedigree 0.3146, pedigree (2,1,3,5,1)
  Calculated as a weighted average (by production volume) of the regional activities.
- charcoal: 0.000634193 kg; = 0.000634193153043405*clinker; lognormal variance with pedigree 0.0146, pedigree (2,1,3,5,1)
  Calculated as a weighted average (by production volume) of the regional activities.
  properties: heating value, net 28.4 MJ
  note on heating value, net: Indicative value. Reference: Fuels - Higher and Lower Calorific Values, available at: https://www.engineeringtoolbox.com/fuels-higher-calorific-values-d_169.html
- clay: 0.193568 kg; = 0.193568273608092*clinker; lognormal variance with pedigree 0.0146, pedigree (2,1,3,5,1)
  Calculated as a weighted average (by production volume) of the regional activities.
  properties: dry mass 0.965 kg, water content 0.0362694, wet mass 1 kg
- diesel: 7.48797e-6 kg; = 7.48797043947464E-06*clinker; lognormal variance with pedigree 0.0146, pedigree (2,1,3,5,1)
  Calculated as a weighted average (by production volume) of the regional activities.
  properties: heating value, net 42.8 MJ
- diesel, burned in building machine: 0.00723675 MJ; = 0.00723674965249075*clinker; lognormal variance with pedigree 0.0146, pedigree (2,1,3,5,1)
  Calculated as a weighted average (by production volume) of the regional activities.
  properties: heating value, net 1 MJ
- diesel, low-sulfur: 7.84413e-5 kg; = 7.84413149663273E-05*clinker; lognormal variance with pedigree 0.0146, pedigree (2,1,3,5,1)
  Calculated as a weighted average (by production volume) of the regional activities.
  Uncertainty: C
  properties: carbon content, fossil 0.865, dry mass 1 kg, heating value, net 42.8 MJ, wet mass 1 kg
- electricity, medium voltage: 6.34038e-6, 7.1836e-5, 0.000722163, 9.16033e-5, 3.20516e-6, 8.14736e-6, 7.46884e-5, 0.000710361, 3.15545e-6, 0.000930859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 kWh (90 suppliers, which the file names only by identifier); sum of these 0.0609235 kWh; = 0.0609234882721229*clinker; lognormal variance with pedigree 0.0146, pedigree (2,1,3,5,1)
  Calculated as a weighted average (by production volume) of the regional activities.
- fatty acid methyl ester: 1.65711e-6 kg; = 1.65711031442355E-06*clinker; lognormal variance with pedigree 0.0146, pedigree (2,1,3,5,1)
  Calculated as a weighted average (by production volume) of the regional activities.
- granulated blast furnace slag: 0.000113055 kg; = 0.000113055189675625*clinker; lognormal variance with pedigree 0.0146, pedigree (2,1,3,5,1)
  Calculated as a weighted average (by production volume) of the regional activities.
  Activity-link to 'market for granulated blast furnace slag, BR' since this market activity for GLO is non-existent.
- gravel, crushed: 0.000573019 kg; = 0.000573019454520293*clinker; lognormal variance with pedigree 0.0146, pedigree (2,1,3,5,1)
  Calculated as a weighted average (by production volume) of the regional activities.
- hard coal: 0.00468825, 0.0331798, 0.00478425, 0.0103394 kg (4 suppliers, which the file names only by identifier); sum of these 0.0529918 kg; = 0.0529917563867494*clinker+inert_waste*0+CCS_organics*0+wasteplastic*0+clinker*0+usedtyre*0+ironsludge*0+wastewood*0+wasteoil*0+wastesolvent*0+sewage_sludge*0+pyrite_ash*0+other_biogenic_fuels*0+biowaste*0+dust*0+coal_ash*0+steel_scrap*0+lime_res*0+soil*0+spent_converter*0+waste_sand*0+waste_rubber*0+waste_textile*0+wastewater*0+MSW*0; lognormal variance with pedigree 0.0146, pedigree (2,1,3,5,1)
  Calculated as a weighted average (by production volume) of the regional activities.
  properties: carbon content, fossil 0.845, dry mass 0.94 kg, heating value, net 27.91 MJ, water content 0.0638298, wet mass 1 kg
  note on carbon content, fossil: C content 75-94% (specified in Tab 1.1, report 6, part VI). A mean content of 0.845 kg C/ kg dry hard coal was considered
  note on heating value, net: Based on the Characterization factor of Hard coal in the CED method
- heavy fuel oil: 0.0130691 kg; = 0.0130691477466645*clinker; lognormal variance with pedigree 0.0146, pedigree (2,1,3,5,1)
  Calculated as a weighted average (by production volume) of the regional activities.
  properties: carbon content, fossil 0.849, dry mass 1 kg, heating value, net 41.2 MJ, wet mass 1 kg
- industrial machine, heavy, unspecified: 3.76e-5 kg; = 0.0000376*clinker; lognormal variance with pedigree 0.334, pedigree (4,4,3,5,1)
  Calculated as a weighted average (by production volume) of the regional activities.
- inert waste, for final disposal: -9.93393e-5 kg; name inert_waste_disposal; = 9.93393143982939E-05*clinker; lognormal variance with pedigree 0.0126, pedigree (2,1,1,5,1)
  Calculated as a weighted average (by production volume) of the regional activities.
  production volume; = ABS(inert_waste_disposal/ clinker)* clinker_PV
    Calculated from the production volume of clinker in proportion to the respective output amounts.
  properties: dry mass 0.995 kg, water content 0.00502513, wet mass 1 kg
- iron ore, crude ore, 46% Fe: 0.00378005 kg; = 0.00378004505019427*clinker; lognormal variance with pedigree 0.012625, pedigree (2,1,3,2,1)
  Calculated as a weighted average (by production volume) of the regional activities.
  properties: dry mass 1 kg, wet mass 1 kg
- laterite, mineral: 0.00948266 kg; = 0.00948265591579286*clinker; lognormal variance with pedigree 0.0146, pedigree (2,1,3,5,1)
  Calculated as a weighted average (by production volume) of the regional activities.
- light fuel oil: 0.000200963 kg; = 0.00020096269049552*clinker; lognormal variance with pedigree 0.0146, pedigree (2,1,3,5,1)
  Calculated as a weighted average (by production volume) of the regional activities.
  properties: carbon content, fossil 0.862, dry mass 1 kg, heating value, net 42.6 MJ, wet mass 1 kg
- lignite: 5.35851e-5 kg; = 5.35850625037895E-05*clinker; lognormal variance with pedigree 0.0146, pedigree (2,1,3,5,1)
  Calculated as a weighted average (by production volume) of the regional activities.
  properties: heating value, net 8.8 MJ
  note on heating value, net: Based on literature, page 52, Dones R., Bauer C., Bolliger R., Burger B., Faist Emmenegger M., Frischknecht R., Heck T., Jungbluth N., Röder A., Tuchschmid M. (2007) Life Cycle Inventories of Energy Systems: Results for Current Systems in Switzerland and other UCTE Countries. ecoinvent report No. 5. Paul Scherrer Institut Villigen, Swiss Centre for Life Cycle Inventories, Dübendorf, CH.
- lime: 0.430362 kg; = 0.430362472690731*clinker; lognormal variance with pedigree 0.0146, pedigree (2,1,3,5,1)
  Calculated as a weighted average (by production volume) of the regional activities.
  properties: carbon content, fossil 0.120005, dry mass 1 kg, wet mass 1 kg
- lime, hydrated, loose weight: 0.00212227 kg; = 0.00212227332365729*clinker; lognormal variance with pedigree 0.0146, pedigree (2,1,3,5,1)
  Calculated as a weighted average (by production volume) of the regional activities.
  properties: dry mass 0.997 kg, water content 0.00300903, wet mass 1 kg
- limestone, crushed, for mill: 0.685528 kg; = 0.685528270468881*clinker; lognormal variance with pedigree 0.012625, pedigree (2,1,3,2,1)
  Calculated as a weighted average (by production volume) of the regional activities.
  properties: carbon content, fossil 0.117492, dry mass 0.998 kg, water content 0.00200401, wet mass 1 kg
- liquefied petroleum gas: 3.5013e-7 kg; = 3.50129874673502E-07*clinker; lognormal variance with pedigree 0.0146, pedigree (2,1,3,5,1)
  (same comment as for diesel, low-sulfur)
  properties: carbon content, fossil 0.821863, dry mass 1 kg, heating value, net 45.5 MJ, wet mass 1 kg
- lubricating oil: 3.93201e-5 kg; = 3.93201481329454E-05*clinker; lognormal variance with pedigree 0.0146, pedigree (2,1,3,5,1)
  Calculated as a weighted average (by production volume) of the regional activities.
  properties: carbon content, fossil 0.75, dry mass 1 kg, heating value, net 40.2 MJ, wet mass 1 kg
  note on carbon content, fossil: Lubricating oil is produced from diesel. C-content/dry mass of fats and oils considered 75%, from: ecoinvent v2.2 report, n 15a, pg 40
  note on heating value, net: Literature value, Source: IPCC 2006, 2006 IPCC Guidelines for National Greenhouse Gas Inventories, Prepared by the National Greenhouse Gas Inventories Programme, Eggleston H.S., Buendia L., Miwa K., Ngara T. and Tanabe K. (eds). Published: IGES, Japan
- magnetite: 0.000230258 kg; = 0.000230257926895327*clinker; lognormal variance with pedigree 0.0146, pedigree (2,1,3,5,1)
  Calculated as a weighted average (by production volume) of the regional activities.
- meat and bone meal: 0.00497157 kg; name meat_and_bone_meal; = 0.00497156789233822*clinker; lognormal variance with pedigree 0.0146, pedigree (2,1,3,5,1)
  Calculated as a weighted average (by production volume) of the regional activities.
  properties: carbon content, non-fossil 0.521, dry mass 0.96 kg, heating value, net 21.45 MJ, water content 0.0416667, wet mass 1 kg
  note on carbon content, non-fossil: Boesch & Hellweg 2010, 2010, Boesch, M.E., Hellweg, S., Identifying Improvement Potentials in Cement Production with Life Cycle Assessment, Environmental Science & Technology, 44, 23, 9143-9149, 1 - Article, Supporting information is available via http://pubs.acs.org
- municipal solid waste: -6.72611e-6, -5.58896e-7, -1.79396e-7, -4.05483e-7, -1.68804e-5 kg (5 suppliers, which the file names only by identifier); sum of these -2.47503e-5 kg; = 2.47502823809093E-05*clinker; lognormal variance with pedigree 0.0126, pedigree (2,1,1,5,1)
  Calculated as a weighted average (by production volume) of the regional activities.
  production volume; = ABS(MSW_bp/ clinker)* clinker_PV
    (same comment as for inert waste, for final disposal)
  properties: carbon content, fossil 0.171549, carbon content, non-fossil 0.261655, dry mass 0.771 kg, heating value, net 11.74 MJ, water content 0.297017, wet mass 1 kg
  note on carbon content, fossil: MSW composition in tab 4.1, ecoinvent v2.2 report 13_I. C content referred to 1 kg DM
  note on heating value, net: Value taken from the general comment of the treatment dataset.
- natural gas, high pressure: 1.00437e-5, 3.69568e-5, 1.23679e-5, 2.89033e-6, 1.72026e-5, 1.65072e-5, 4.34062e-5, 1.67577e-5, 2.59194e-5, 2.90756e-5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 m3 (30 suppliers, which the file names only by identifier); sum of these 0.000852652 m3; = 0.000852652015889591*clinker; lognormal variance with pedigree 0.0146, pedigree (2,1,3,5,1)
  Calculated as a weighted average (by production volume) of the regional activities.
  properties: heating value, gross 40 MJ, heating value, net 36 MJ
  note on heating value, net: Literature value, Source: Christoph Meili;Niels Jungbluth;Maresa Bussa (2021) Life cycle inventories of crude oil and natural gas extraction. ESU-services Ltd. commissioned by BAFU & VSG, Schaffhausen, Switzerland, http://esu-services.ch/data/public-lci-reports/
- natural gas, low pressure: 6.85876e-8, 9.67456e-8, 1.13629e-7, 6.54133e-8, 4.15263e-7 m3 (5 suppliers, which the file names only by identifier); sum of these 7.59638e-7 m3; = 7.59637952546496E-07*clinker; lognormal variance with pedigree 0.0146, pedigree (2,1,3,5,1)
  Calculated as a weighted average (by production volume) of the regional activities.
  properties: heating value, net 36 MJ
- petrol, unleaded: 1.33314e-7 kg; = 1.33313913320194E-07*clinker; lognormal variance with pedigree 0.0146, pedigree (2,1,3,5,1)
  (same comment as for diesel, low-sulfur)
  properties: carbon content, fossil 0.865, dry mass 1 kg, heating value, net 43.2 MJ, wet mass 1 kg
  note on heating value, net: Assumed equal to "petroleum". LHV for petroleum: Based on literature, page 7, Report6, part 4
- petroleum coke: 0.0218949 kg; = 0.0218949469294258*clinker; lognormal variance with pedigree 0.0146, pedigree (2,1,3,5,1)
  Calculated as a weighted average (by production volume) of the regional activities.
  properties: carbon content, fossil 0.885, dry mass 1 kg, heating value, net 35 MJ, wet mass 1 kg
- pulverised lignite: 0.0178055 MJ; = 0.0178054777707932*clinker; lognormal variance with pedigree 0.0046, pedigree (1,1,3,5,1)
  Calculated as a weighted average (by production volume) of the regional activities.
  Uncertainty: V
  properties: carbon content, fossil 0.660674, dry mass 0.0410138 kg, heating value, net 1 MJ, water content 0.123596, wet mass 0.0460829 kg
- refractory, basic, packed: 0.00015902 kg; = 0.000159019696486424*clinker; lognormal variance with pedigree 0.0146, pedigree (2,1,3,5,1)
  Calculated as a weighted average (by production volume) of the regional activities.
  properties: dry mass 1 kg, wet mass 1 kg
- refractory, fireclay, packed: 9.05841e-5 kg; = 9.05841273232686E-05*clinker; lognormal variance with pedigree 0.0146, pedigree (2,1,3,5,1)
  Calculated as a weighted average (by production volume) of the regional activities.
  properties: dry mass 1 kg, wet mass 1 kg
- refractory, high aluminium oxide, packed: 0.000125414 kg; = 0.000125413900880416*clinker; lognormal variance with pedigree 0.0146, pedigree (2,1,3,5,1)
  Calculated as a weighted average (by production volume) of the regional activities.
  properties: dry mass 1 kg, wet mass 1 kg
- sand: 0.00720949 kg; = 0.007209494444955*clinker; lognormal variance with pedigree 0.0146, pedigree (2,1,3,5,1)
  Calculated as a weighted average (by production volume) of the regional activities.
  properties: dry mass 1 kg, wet mass 1 kg
- shale: 0.000828555 kg; = 0.000828555157211774*clinker; lognormal variance with pedigree 0.0146, pedigree (2,1,3,5,1)
  Calculated as a weighted average (by production volume) of the regional activities.
- steel, chromium steel 18/8, hot rolled: 6.20735e-5 kg; = 6.20735205860006E-05*clinker; lognormal variance with pedigree 0.0146, pedigree (2,1,3,5,1)
  Calculated as a weighted average (by production volume) of the regional activities.
  properties: carbon content, fossil 0.0008, dry mass 1 kg, wet mass 1 kg
  note on carbon content, fossil: Stainless steel model is the grade 304 steel (18/8 stainless, 18% chromium 8% nickel; max. 0.08% C)
- synthetic rubber: 1.59516e-6 kg; = 1.59516226528622E-06*clinker; lognormal variance with pedigree 0.0146, pedigree (2,1,3,5,1)
  Calculated as a weighted average (by production volume) of the regional activities.
  properties: heating value, net 26.42 MJ
- tap water: 0.183769 kg; name tap_water_input; = 0.183769350632794*clinker; lognormal variance with pedigree 0.0146, pedigree (2,1,3,5,1)
  Calculated as a weighted average (by production volume) of the regional activities.
- urea: 3.46254e-5 kg; = (0.000016151409803803*clinker)*2.14379903903132; lognormal variance with pedigree 0.0046, pedigree (1,1,3,5,1)
  The exchange has been updated from "urea, as N" into "urea" and therefore its amount has been scaled (multiplied) from 0 kg by 2.1438 kg of "urea" per kg of "urea, as N". Original comment of the exchange is: Calculated as a weighted average (by production volume) of the regional activities.
  Uncertainty: V
  properties: carbon content, fossil 0.2, dry mass 1 kg, wet mass 1 kg
- wastewater, average: -1.48675e-7 m3; name wastewater_avg_bp; = 1.48675317929589E-07*clinker; lognormal variance with pedigree 0.0126, pedigree (2,1,1,5,1)
  Calculated as a weighted average (by production volume) of the regional activities.
  production volume; = ABS(wastewater_avg_bp/ clinker)* clinker_PV
    (same comment as for inert waste, for final disposal)
- water, harvested from rainwater: 0.000416601 kg; = 0.000416600630448537*clinker; lognormal variance with pedigree 0.0146, pedigree (2,1,3,5,1)
  Calculated as a weighted average (by production volume) of the regional activities.
- wood chips, wet, measured as dry mass: 2.12172e-5 kg; = 2.12172068295352E-05*clinker; lognormal variance with pedigree 0.0146, pedigree (2,1,3,5,1)
  Calculated as a weighted average (by production volume) of the regional activities.
  properties: heating value, net 10.84 MJ
  note on heating value, net: Value based on the dataset 'softwood forestry, mixed species, sustainable forest management'

## Inputs from nature
All rows: lognormal variance with pedigree 0.0146, pedigree (2,1,3,5,1)
- Water, cooling, unspecified natural origin [natural resource, in water]: 3.40962e-5 m3; name water_cooling_UNO_input; = 3.40961958795016E-05*clinker
  (same comment as for diesel, low-sulfur)
- Water, in air [natural resource, in air]: 1.10285e-6 m3; = 1.10285434447788E-06*clinker
  Calculated as a weighted average (by production volume) of the regional activities.
- Water, river [natural resource, in water]: 1.53088e-5 m3; = 1.53088400675068E-05*clinker
  Calculated as a weighted average (by production volume) of the regional activities.
- Water, unspecified natural origin [natural resource, in water]: 0.000876774 m3; name water_UNO_input; = 0.000876774494963856*clinker
  Calculated as a weighted average (by production volume) of the regional activities.
- Water, well, in ground [natural resource, in water]: 1.98227e-5 m3; = 1.98227433885988E-05*clinker
  Calculated as a weighted average (by production volume) of the regional activities.

## Emissions to nature
- Acenaphthylene [air, unspecified]: 2.32662e-10 kg; = 2.3266246744758E-10*clinker; lognormal variance with pedigree 0.3046, pedigree (2,1,3,5,1)
  Calculated as a weighted average (by production volume) of the regional activities.
- Acetaldehyde [air, non-urban air or from high stacks]: 1.26334e-7 kg; = 1.26334278817252E-07*clinker; lognormal variance with pedigree 0.6646, pedigree (2,1,3,5,1)
  Calculated as a weighted average (by production volume) of the regional activities.
- Ammonia [air, unspecified]: 2.22547e-5 kg; = 2.22546768473399E-05*clinker; lognormal variance with pedigree 0.0546, pedigree (2,1,3,5,1)
  Calculated as a weighted average (by production volume) of the regional activities.
- Antimony ion [air, unspecified]: 1.24572e-8 kg; = 1.2457181257441E-08*clinker; lognormal variance with pedigree 0.6646, pedigree (2,1,3,5,1)
  Calculated as a weighted average (by production volume) of the regional activities.
- Arsenic ion [air, unspecified]: 1.47877e-8 kg; = 1.47876592938525E-08*clinker; lognormal variance with pedigree 0.0546, pedigree (2,1,3,5,1)
  Calculated as a weighted average (by production volume) of the regional activities.
- Benz(a)anthracene [air, unspecified]: 4.49358e-12 kg; = 4.49357902815424E-12*clinker; lognormal variance with pedigree 0.3046, pedigree (2,1,3,5,1)
  Calculated as a weighted average (by production volume) of the regional activities.
- Benzene [air, non-urban air or from high stacks]: 1.27287e-7 kg; = 1.27286547250548E-07*clinker; lognormal variance with pedigree 0.6646, pedigree (2,1,3,5,1)
  Calculated as a weighted average (by production volume) of the regional activities.
- Benzo(a)pyrene [air, unspecified]: 7.23904e-9 kg; = 7.23904208666902E-09*clinker; lognormal variance with pedigree 0.3046, pedigree (2,1,3,5,1)
  Calculated as a weighted average (by production volume) of the regional activities.
- Benzo(b)fluoranthene [air, unspecified]: 5.31474e-12 kg; = 5.31474067796923E-12*clinker; lognormal variance with pedigree 0.3046, pedigree (2,1,3,5,1)
  Calculated as a weighted average (by production volume) of the regional activities.
- Benzo(ghi)perylene [air, unspecified]: 3.27324e-13 kg; = 3.27324157634585E-13*clinker; lognormal variance with pedigree 0.3046, pedigree (2,1,3,5,1)
  Calculated as a weighted average (by production volume) of the regional activities.
- Benzo(k)fluoranthene [air, unspecified]: 3.84349e-12 kg; = 3.84349272205071E-12*clinker; lognormal variance with pedigree 0.3046, pedigree (2,1,3,5,1)
  Calculated as a weighted average (by production volume) of the regional activities.
- Beryllium II [air, unspecified]: 3.39633e-9 kg; = 3.39632856837709E-09*clinker; lognormal variance with pedigree 0.0546, pedigree (2,1,3,5,1)
  Calculated as a weighted average (by production volume) of the regional activities.
- Cadmium II [air, unspecified]: 7.07886e-9 kg; = 7.07886450545333E-09*clinker; lognormal variance with pedigree 0.0546, pedigree (2,1,3,5,1)
  Calculated as a weighted average (by production volume) of the regional activities.
- Carbon dioxide, fossil [air, unspecified]: 0.808588 kg; = 0.808588349888225*clinker; lognormal variance with pedigree 0.0146, pedigree (2,1,3,5,1)
  Calculated as a weighted average (by production volume) of the regional activities.
- Carbon dioxide, non-fossil [air, unspecified]: 0.0112826 kg; = 0.0112826208855528*clinker; lognormal variance with pedigree 0.0146, pedigree (2,1,3,5,1)
  Calculated as a weighted average (by production volume) of the regional activities.
- Carbon monoxide, fossil [air, unspecified]: 0.000530631 kg; = 0.000530631105398975*clinker; lognormal variance with pedigree 0.1346, pedigree (2,1,3,5,1)
  Calculated as a weighted average (by production volume) of the regional activities.
- Carbon monoxide, non-fossil [air, non-urban air or from high stacks]: 5.42434e-7 kg; = 5.4243372878399E-07*clinker; lognormal variance with pedigree 0.6646, pedigree (2,1,3,5,1)
  Calculated as a weighted average (by production volume) of the regional activities.
- Chromium III [air, unspecified]: 3.51223e-8 kg; = 3.51223342228807E-08*clinker; lognormal variance with pedigree 0.0546, pedigree (2,1,3,5,1)
  Calculated as a weighted average (by production volume) of the regional activities.
- Chromium VI [air, unspecified]: 5.01981e-10 kg; = 5.01981033242491E-10*clinker; lognormal variance with pedigree 0.0546, pedigree (2,1,3,5,1)
  Calculated as a weighted average (by production volume) of the regional activities.
- Chrysene [air, unspecified]: 5.0835e-13 kg; = 5.08350374133245E-13*clinker; lognormal variance with pedigree 0.3046, pedigree (2,1,3,5,1)
  Calculated as a weighted average (by production volume) of the regional activities.
- Cobalt II [air, unspecified]: 5.10852e-9 kg; = 5.10852340765944E-09*clinker; lognormal variance with pedigree 0.0546, pedigree (2,1,3,5,1)
  Calculated as a weighted average (by production volume) of the regional activities.
- Copper ion [air, unspecified]: 2.16638e-8 kg; = 2.16637956387195E-08*clinker; lognormal variance with pedigree 0.0546, pedigree (2,1,3,5,1)
  Calculated as a weighted average (by production volume) of the regional activities.
- Dibenz(a,h)anthracene [air, unspecified]: 2.58912e-12 kg; = 2.58911778778366E-12*clinker; lognormal variance with pedigree 0.3046, pedigree (2,1,3,5,1)
  Calculated as a weighted average (by production volume) of the regional activities.
- Dichloromethane [air, unspecified]: 4.658e-8 kg; = 4.65800404430332E-08*clinker; lognormal variance with pedigree 0.3046, pedigree (2,1,3,5,1)
  Calculated as a weighted average (by production volume) of the regional activities.
- Dioxins, measured as 2,3,7,8-tetrachlorodibenzo-p-dioxin [air, unspecified]: 8.47258e-13 kg; = 8.47258148962088E-13*clinker; lognormal variance with pedigree 0.1346, pedigree (2,1,3,5,1)
  Calculated as a weighted average (by production volume) of the regional activities.
- Ethane [air, non-urban air or from high stacks]: 3.17423e-7 kg; = 3.17422811098623E-07*clinker; lognormal variance with pedigree 0.6646, pedigree (2,1,3,5,1)
  Calculated as a weighted average (by production volume) of the regional activities.
- Ethylene [air, urban air close to ground]: 4.18998e-7 kg; = 4.18998110650182E-07*clinker; lognormal variance with pedigree 0.6646, pedigree (2,1,3,5,1)
  Calculated as a weighted average (by production volume) of the regional activities.
- Fluoranthene [air, unspecified]: 4.24423e-11 kg; = 4.24422679299939E-11*clinker; lognormal variance with pedigree 0.3046, pedigree (2,1,3,5,1)
  Calculated as a weighted average (by production volume) of the regional activities.
- Fluorene [air, unspecified]: 3.85389e-11 kg; = 3.85389443314585E-11*clinker; lognormal variance with pedigree 0.3046, pedigree (2,1,3,5,1)
  Calculated as a weighted average (by production volume) of the regional activities.
- Formaldehyde [air, urban air close to ground]: 2.43781e-7 kg; = 2.43780718923742E-07*clinker; lognormal variance with pedigree 0.6646, pedigree (2,1,3,5,1)
  Calculated as a weighted average (by production volume) of the regional activities.
- Hexachlorobenzene [air, unspecified]: 2.24679e-12 kg; = 2.24678951407712E-12*clinker; lognormal variance with pedigree 0.3046, pedigree (2,1,3,5,1)
  Calculated as a weighted average (by production volume) of the regional activities.
- Hydrocarbons, aliphatic, alkanes, unspecified [air, urban air close to ground]: 1.65377e-9 kg; = 1.65377284582382E-09*clinker; lognormal variance with pedigree 0.6646, pedigree (2,1,3,5,1)
  Calculated as a weighted average (by production volume) of the regional activities.
- Hydrocarbons, unspecified [air, non-urban air or from high stacks]: 1.43255e-6 kg; = 1.43254863630073E-06*clinker; lognormal variance with pedigree 0.6646, pedigree (2,1,3,5,1)
  Calculated as a weighted average (by production volume) of the regional activities.
- Hydrochloric acid [air, unspecified]: 6.9145e-6 kg; = 6.91450020832631E-06*clinker; lognormal variance with pedigree 0.0546, pedigree (2,1,3,5,1)
  Calculated as a weighted average (by production volume) of the regional activities.
- Hydrogen fluoride [air, unspecified]: 6.17157e-8 kg; = 6.17157439530639E-08*clinker; lognormal variance with pedigree 0.6646, pedigree (2,1,3,5,1)
  Calculated as a weighted average (by production volume) of the regional activities.
- Hydrogen fluoride [air, urban air close to ground]: 7.33247e-8 kg; = 7.33246693637818E-08*clinker; lognormal variance with pedigree 0.6646, pedigree (2,1,3,5,1)
  Calculated as a weighted average (by production volume) of the regional activities.
- Hydrogen sulfide [air, urban air close to ground]: 1.94263e-8 kg; = 1.94262760392357E-08*clinker; lognormal variance with pedigree 0.6646, pedigree (2,1,3,5,1)
  Calculated as a weighted average (by production volume) of the regional activities.
- Indeno(1,2,3-cd)pyrene [air, unspecified]: 1.01784e-12 kg; = 1.0178412505579E-12*clinker; lognormal variance with pedigree 0.3046, pedigree (2,1,3,5,1)
  Calculated as a weighted average (by production volume) of the regional activities.
- Lead II [air, unspecified]: 8.69161e-8 kg; = 8.69160957941474E-08*clinker; lognormal variance with pedigree 0.6646, pedigree (2,1,3,5,1)
  Calculated as a weighted average (by production volume) of the regional activities.
- Manganese II [air, unspecified]: 6.55498e-8 kg; = 6.55497954451713E-08*clinker; lognormal variance with pedigree 0.3046, pedigree (2,1,3,5,1)
  Calculated as a weighted average (by production volume) of the regional activities.
- Mercury II [air, unspecified]: 3.09505e-8 kg; = 3.0950531174002E-08*clinker; lognormal variance with pedigree 0.0546, pedigree (2,1,3,5,1)
  Calculated as a weighted average (by production volume) of the regional activities.
- Methane, fossil [air, unspecified]: 8.38692e-6 kg; = 8.38691773914974E-06*clinker; lognormal variance with pedigree 0.1346, pedigree (2,1,3,5,1)
  Calculated as a weighted average (by production volume) of the regional activities.
- Methane, non-fossil [air, urban air close to ground]: 8.44185e-9 kg; = 8.44184942147269E-09*clinker; lognormal variance with pedigree 0.6646, pedigree (2,1,3,5,1)
  Calculated as a weighted average (by production volume) of the regional activities.
- NMVOC, non-methane volatile organic compounds [air, unspecified]: 4.97851e-5 kg; = 4.97850500799783E-05*clinker; lognormal variance with pedigree 0.1346, pedigree (2,1,3,5,1)
  Calculated as a weighted average (by production volume) of the regional activities.
- Nickel II [air, unspecified]: 3.04785e-8 kg; = 3.04784745494172E-08*clinker; lognormal variance with pedigree 0.0546, pedigree (2,1,3,5,1)
  Calculated as a weighted average (by production volume) of the regional activities.
- Nitrogen oxides [air, unspecified]: 0.00140514 kg; = 0.00140514434977499*clinker; lognormal variance with pedigree 0.0546, pedigree (2,1,3,5,1)
  Calculated as a weighted average (by production volume) of the regional activities.
- PAH, polycyclic aromatic hydrocarbons [air, unspecified]: 1.10401e-12 kg; = 1.10400621808459E-12*clinker; lognormal variance with pedigree 0.3046, pedigree (2,1,3,5,1)
  Calculated as a weighted average (by production volume) of the regional activities.
- Particulate Matter, < 2.5 um [air, non-urban air or from high stacks]: 3.14198e-5 kg; = 3.14198240927365E-05*clinker; lognormal variance with pedigree 0.3146, pedigree (2,1,3,5,1)
  Calculated as a weighted average (by production volume) of the regional activities.
- Particulate Matter, > 10 um [air, non-urban air or from high stacks]: 1.00756e-5 kg; = 1.00755902823104E-05*clinker; lognormal variance with pedigree 0.0546, pedigree (2,1,3,5,1)
  Calculated as a weighted average (by production volume) of the regional activities.
- Particulate Matter, > 2.5 um and < 10um [air, non-urban air or from high stacks]: 1.32243e-5 kg; = 1.32243207976369E-05*clinker; lognormal variance with pedigree 0.1346, pedigree (2,1,3,5,1)
  Calculated as a weighted average (by production volume) of the regional activities.
- Phenanthrene [air, unspecified]: 5.93482e-10 kg; = 5.93482055820181E-10*clinker; lognormal variance with pedigree 0.6546, pedigree (2,1,3,5,1)
  Calculated as a weighted average (by production volume) of the regional activities.
- Phosphorus [air, unspecified]: 3.13279e-13 kg; = 3.13279421049804E-13*clinker; lognormal variance with pedigree 0.0446, pedigree (2,1,3,5,1)
  Calculated as a weighted average (by production volume) of the regional activities.
- Propane [air, urban air close to ground]: 2.65365e-7 kg; = 2.65365470078449E-07*clinker; lognormal variance with pedigree 0.6646, pedigree (2,1,3,5,1)
  Calculated as a weighted average (by production volume) of the regional activities.
- Pyrene [air, unspecified]: 3.09731e-11 kg; = 3.09730945051135E-11*clinker; lognormal variance with pedigree 0.3046, pedigree (2,1,3,5,1)
  Calculated as a weighted average (by production volume) of the regional activities.
- Selenium IV [air, unspecified]: 4.45351e-9 kg; = 4.45351091072538E-09*clinker; lognormal variance with pedigree 0.6646, pedigree (2,1,3,5,1)
  Calculated as a weighted average (by production volume) of the regional activities.
- Sulfur dioxide [air, unspecified]: 0.000360291 kg; = 0.000360290905069644*clinker; lognormal variance with pedigree 0.0546, pedigree (2,1,3,5,1)
  Calculated as a weighted average (by production volume) of the regional activities.
- Sulfur oxides [air, unspecified]: 7.09305e-5 kg; = 7.09305162622416E-05*clinker; lognormal variance with pedigree 0.6646, pedigree (2,1,3,5,1)
  Calculated as a weighted average (by production volume) of the regional activities.
- Thallium I [air, unspecified]: 1.32807e-8 kg; = 1.3280727867584E-08*clinker; lognormal variance with pedigree 0.0546, pedigree (2,1,3,5,1)
  Calculated as a weighted average (by production volume) of the regional activities.
- Tin ion [air, unspecified]: 6.04608e-8 kg; = 6.04607857228477E-08*clinker; lognormal variance with pedigree 0.6646, pedigree (2,1,3,5,1)
  Calculated as a weighted average (by production volume) of the regional activities.
- Toluene [air, urban air close to ground]: 6.34846e-8 kg; = 6.34845622197245E-08*clinker; lognormal variance with pedigree 0.6646, pedigree (2,1,3,5,1)
  Calculated as a weighted average (by production volume) of the regional activities.
- Vanadium V [air, unspecified]: 6.12857e-9 kg; = 6.12857202920918E-09*clinker; lognormal variance with pedigree 0.0546, pedigree (2,1,3,5,1)
  Calculated as a weighted average (by production volume) of the regional activities.
- Water [air, unspecified]: 0.000198926 m3; name water_to_air_unspecified; = 0.000198925619459735*clinker; lognormal variance with pedigree 0.0427, pedigree (2,2,3,1,1)
  Calculated value. Calculated using following formula; ((((tap_water_input/1000)+ water_UNO_input)* fraction_PW_to_air)+( water_cooling_UNO_input* fraction_CW_to_air))
  property fraction, origin: fresh water 0.173469; name fraction_origin_fresh_water
  property fraction, origin: salt water 0; name fraction_origin_salt_water
  property fraction, origin: unspecified 0.826531; name fraction_origin_unspecified
- Xylenes, unspecified [air, urban air close to ground]: 6.34846e-8 kg; = 6.34845622197245E-08*clinker; lognormal variance with pedigree 0.6646, pedigree (2,1,3,5,1)
  Calculated as a weighted average (by production volume) of the regional activities.
- Zinc II [air, unspecified]: 2.4206e-7 kg; = 2.42060474613952E-07*clinker; lognormal variance with pedigree 0.0546, pedigree (2,1,3,5,1)
  Calculated as a weighted average (by production volume) of the regional activities.
- Arsenic ion [water, unspecified]: 1.15203e-10 kg; = 1.15203163240316E-10*clinker; lognormal variance with pedigree 0.0452, pedigree (2,3,3,5,1)
  Calculated as a weighted average (by production volume) of the regional activities.
- Cadmium II [water, unspecified]: 2.3064e-11 kg; = 2.30640479251445E-11*clinker; lognormal variance with pedigree 0.6552, pedigree (2,3,3,5,1)
  Calculated as a weighted average (by production volume) of the regional activities.
- Chromium III [water, unspecified]: 4.61281e-11 kg; = 4.6128095850289E-11*clinker; lognormal variance with pedigree 0.6552, pedigree (2,3,3,5,1)
  Calculated as a weighted average (by production volume) of the regional activities.
- Copper ion [water, unspecified]: 2.3064e-11 kg; = 2.30640479251445E-11*clinker; lognormal variance with pedigree 0.6552, pedigree (2,3,3,5,1)
  Calculated as a weighted average (by production volume) of the regional activities.
- Lead II [water, unspecified]: 2.42348e-11 kg; = 2.42348117792128E-11*clinker; lognormal variance with pedigree 0.6552, pedigree (2,3,3,5,1)
  Calculated as a weighted average (by production volume) of the regional activities.
- Mercury II [water, unspecified]: 2.42348e-13 kg; = 2.42348117792128E-13*clinker; lognormal variance with pedigree 0.6552, pedigree (2,3,3,5,1)
  Calculated as a weighted average (by production volume) of the regional activities.
- Nickel II [water, unspecified]: 2.3064e-11 kg; = 2.30640479251445E-11*clinker; lognormal variance with pedigree 0.6552, pedigree (2,3,3,5,1)
  Calculated as a weighted average (by production volume) of the regional activities.
- Phosphorus [water, unspecified]: 6.74037e-11 kg; = 6.74036854223136E-11*clinker; lognormal variance with pedigree 0.0452, pedigree (2,3,3,5,1)
  Calculated as a weighted average (by production volume) of the regional activities.
- Water [water, unspecified]: 0.00093014 m3; name water_to_water_unspecified; = 0.00093014041893046*clinker; lognormal variance with pedigree 0.0427, pedigree (2,2,3,1,1)
  Calculated value. Calculated using following formula; ((((tap_water_input/1000)+ water_UNO_input)*(1-fraction_PW_to_air))+( water_cooling_UNO_input*(1-fraction_CW_to_air)))
  property fraction, origin: fresh water 0.173469; name fraction_origin_fresh_water_Ww
  property fraction, origin: salt water 0; name fraction_origin_salt_water_Ww
  property fraction, origin: unspecified 0.826531; name fraction_origin_unspecified_Ww
- Zinc II [water, unspecified]: 4.61281e-11 kg; = 4.6128095850289E-11*clinker; lognormal variance with pedigree 0.6552, pedigree (2,3,3,5,1)
  Calculated as a weighted average (by production volume) of the regional activities.

## Sampling procedure
This activity was updated for the ecoinvent v3.6. database as a weighted average (by production volume) of all the available regional activities.
