# tillage, disking, with amendment

Dataset: EcoSpold 2, unit process
Geography: US
Time period: 2021-01-01 to 2023-12-31
Technology level: current
Classification: ISIC rev.4 ecoinvent: 0161:Support activities for crop production
Scenario: Business-as-Usual
System model: Allocation, cut-off by classification
Generated by: Juanita Barrera
Database: ecoinvent
isCopyrightProtected: true
accessRestrictedTo: 1

## General comment
This dataset models the service of tillage, disking with amendment. The functional unit (FU) is one ha and the operation time is 1.2 h/FU.

## Included activities start
The activity starts from the agricultural field foreseen to be processed.

## Included activities end
This activity ends with disking. The dataset includes the diesel fuel consumption and the amount of agricultural machinery and of the shed, which has to be attributed to the process. Also taken into consideration is the amount of emissions to the air from combustion and the emission to the soil from tyre abrasion during the work process. The following activities were considered part of the work process: preliminary work at the farm, like attaching the adequate machine to the tractor; transfer to field (with an assumed distance of 1 km); field work (for a parcel of land of 1 ha surface); transfer to farm and concluding work, like uncoupling the machine. The overlapping during the field work is considered. The dataset doesn't include the dust other than from combustion and noise.

## Geography
The inventory is extrapolated from the geography of Canada. Data quality indicators are adjusted accordingly.

## Technology
Fuel consumption and emissions per kg diesel have been extrapolated to the US, but others inputs were taken from the original values.

## Reference product
- tillage, disking, with amendment: 1 ha; By-product classification allocatable product; CPC 86119: Other support services to crop production
  production volume 7.88684e7 ha
    FAOSTAT data year 2020: area of arable land, 0.5 passes/year assumed (own estimation)
  property price 44.3645 EUR2005
    The price is from the year 2017. The price is estimated as a proxy based on the source: https://farmdoc.illinois.edu/assets/management/machinery-costs/field_operations_2017.pdf. The prices were adjusted for inflation relative to 2005 using the producer price index (PPI) of the euro area, published by eurostat (https://ec.europa.eu/eurostat/databrowser/view/STS_INPP_A__custom_6416181/default/table?lang=en, last accessed on 2023-06-01).
  properties: carbon allocation 0 kg, carbon content 0

## Inputs from technosphere
- agricultural machinery, tillage: 3.29 kg; lognormal variance with pedigree 0.3042, pedigree (1,4,2,5,1)
  proxy from "tillage, harrowing, by rotary harrow, CA"
- diesel: 3.63389 kg; lognormal variance with pedigree 0.0028, pedigree (1,4,2,1,1)
  disking used as a proxy - 2022 Nebraska Crop budget projections, Robert Klein and Glennis McClure, UNL Extension
  properties: carbon content, fossil 0.865, dry mass 1 kg, heating value, net 42.8 MJ, wet mass 1 kg
- shed: 0.0053 m2; lognormal variance with pedigree 0.3042, pedigree (1,4,2,5,1)
  proxy from "tillage, harrowing, by rotary harrow, CA"
- tractor, 4-wheel, agricultural: 0.617 kg; lognormal variance with pedigree 0.302225, pedigree (1,4,2,2,1)
  proxy from "tillage, harrowing, by rotary harrow, CA"

## Emissions to nature
- Ammonia [air, non-urban air or from high stacks]: 7.26778e-5 kg; lognormal variance with pedigree 0.058325, pedigree (1,2,2,2,3)
  adapted from "tillage, harrowing, by rotary harrow, CA" to match the diesel consumption
- Benzene [air, non-urban air or from high stacks]: 2.65116e-5 kg; lognormal variance with pedigree 0.058325, pedigree (1,2,2,2,3)
  adapted from "tillage, harrowing, by rotary harrow, CA" to match the diesel consumption
- Benzo(a)pyrene [air, non-urban air or from high stacks]: 1.09017e-7 kg; lognormal variance with pedigree 0.658325, pedigree (1,2,2,2,3)
  adapted from "tillage, harrowing, by rotary harrow, CA" to match the diesel consumption
- Cadmium II [air, non-urban air or from high stacks]: 3.63389e-8 kg; lognormal variance with pedigree 0.658325, pedigree (1,2,2,2,3)
  adapted from "tillage, harrowing, by rotary harrow, CA" to match the diesel consumption
- Carbon dioxide, fossil [air, non-urban air or from high stacks]: 11.2809 kg; lognormal variance with pedigree 0.018325, pedigree (1,2,2,2,3)
  adapted from "tillage, harrowing, by rotary harrow, CA" to match the diesel consumption
- Carbon monoxide, fossil [air, non-urban air or from high stacks]: 0.0291975 kg; lognormal variance with pedigree 0.652225, pedigree (1,4,2,2,1)
  adapted from "tillage, harrowing, by rotary harrow, CA" to match the diesel consumption
- Chromium III [air, non-urban air or from high stacks]: 1.81695e-7 kg; lognormal variance with pedigree 0.658325, pedigree (1,2,2,2,3)
  adapted from "tillage, harrowing, by rotary harrow, CA" to match the diesel consumption
- Copper ion [air, non-urban air or from high stacks]: 6.16182e-6 kg; lognormal variance with pedigree 0.658325, pedigree (1,2,2,2,3)
  adapted from "tillage, harrowing, by rotary harrow, CA" to match the diesel consumption
- Dinitrogen monoxide [air, non-urban air or from high stacks]: 0.000436067 kg; lognormal variance with pedigree 0.058325, pedigree (1,2,2,2,3)
  adapted from "tillage, harrowing, by rotary harrow, CA" to match the diesel consumption
- Methane, fossil [air, non-urban air or from high stacks]: 0.000467666 kg; lognormal variance with pedigree 0.058325, pedigree (1,2,2,2,3)
  adapted from "tillage, harrowing, by rotary harrow, CA" to match the diesel consumption
- NMVOC, non-methane volatile organic compounds [air, non-urban air or from high stacks]: 0.00594062 kg; lognormal variance with pedigree 0.042225, pedigree (1,4,2,2,1)
  adapted from "tillage, harrowing, by rotary harrow, CA" to match the diesel consumption
- Nickel II [air, non-urban air or from high stacks]: 2.54056e-7 kg; lognormal variance with pedigree 0.658325, pedigree (1,2,2,2,3)
  adapted from "tillage, harrowing, by rotary harrow, CA" to match the diesel consumption
- Nitrogen oxides [air, non-urban air or from high stacks]: 0.147568 kg; lognormal variance with pedigree 0.042225, pedigree (1,4,2,2,1)
  adapted from "tillage, harrowing, by rotary harrow, CA" to match the diesel consumption
- PAH, polycyclic aromatic hydrocarbons [air, non-urban air or from high stacks]: 1.19444e-5 kg; lognormal variance with pedigree 0.318325, pedigree (1,2,2,2,3)
  adapted from "tillage, harrowing, by rotary harrow, CA" to match the diesel consumption
- Particulate Matter, < 2.5 um [air, non-urban air or from high stacks]: 0.0198126 kg; lognormal variance with pedigree 0.318325, pedigree (1,2,2,2,3)
  adapted from "tillage, harrowing, by rotary harrow, CA" to match the diesel consumption
- Selenium IV [air, non-urban air or from high stacks]: 3.63389e-8 kg; lognormal variance with pedigree 0.058325, pedigree (1,2,2,2,3)
  adapted from "tillage, harrowing, by rotary harrow, CA" to match the diesel consumption
- Sulfur dioxide [air, non-urban air or from high stacks]: 0.00366549 kg; lognormal variance with pedigree 0.018325, pedigree (1,2,2,2,3)
  adapted from "tillage, harrowing, by rotary harrow, CA" to match the diesel consumption
- Zinc II [air, non-urban air or from high stacks]: 3.63389e-6 kg; lognormal variance with pedigree 0.658325, pedigree (1,2,2,2,3)
  adapted from "tillage, harrowing, by rotary harrow, CA" to match the diesel consumption
- Cadmium II [soil, agricultural]: 2.96e-7 kg; lognormal variance with pedigree 0.0442, pedigree (1,4,2,5,1)
  proxy from "tillage, harrowing, by rotary harrow, CA"
- Lead II [soil, agricultural]: 1.29e-6 kg; lognormal variance with pedigree 0.0442, pedigree (1,4,2,5,1)
  proxy from "tillage, harrowing, by rotary harrow, CA"
- Zinc II [soil, agricultural]: 0.000784 kg; lognormal variance with pedigree 0.0442, pedigree (1,4,2,5,1)
  proxy from "tillage, harrowing, by rotary harrow, CA"

## Extrapolations
The dataset is modeled for agricultural production system in US. Data Quality indicators are adjusted accordingly.
