# greenhouse construction, glass walls and roof, metal tubes

Dataset: EcoSpold 2, unit process
Geography: RoW
Time period: 2005-01-01 to 2023-12-31
Technology level: current
Classification: ISIC rev.4 ecoinvent: 4100:Construction of buildings
Tags: WFLDB
Scenario: Business-as-Usual
System model: Allocation, cut-off by classification
Generated by: [System]
Database: ecoinvent
isCopyrightProtected: true
accessRestrictedTo: 1

## General comment
This global dataset is a copy of the regional FR dataset, except for the following modifications.
The production volume represents the global annual production.
The geographicalCorrelation score of every pedigree matrix of was changed to '5'.
The comments below were part of the FR regional dataset.
This dataset represents the production and dismantling of 1 m2 of greenhouse with glass walls and roof and metal tubes.
This greenhouse is made of a structure of galvanized steel and aluminum, covered with glass plates. Its lifetime is minimally 25 years. It comprises of a heating system and fume condenser. Such greenhouses represent recent technology (after 2002) and typically cover large surfaces (7 ha in average). A network of steel pipes is used to deliver heat (hot water at 50-80°C), on the ground (thermo-siphon) and at the height of the plants (growth pipes). A boiler is used to store hot water. CO2 from combustion is recovered and injected again into the greenhouse as to increase photosynthesis. The greenhouse also includes a fertigation system made of a network of polyethylene pipes. Other auxiliary facilities are also considered.

## Included activities start
This activity starts with the production of materials used to build the greenhouse and permanent technical infrastructure.

## Included activities end
This dataset includes the production of the greenhouse as well as the permanent technical infrastructure. For the greenhouse are included its bearing structure (steel tubes) and covering materials (glass). Technical infrastrctucture includes heating and cooling systems, fertigation system, CO2 injection system, storage facilities and permanent working equipments such as trolley systems.
The activity ends with the disposal and recycling of all the materials.

## Time period
Time period referring to the data source: 2005-2009. Based on expert opinion data is considered to be valid at least up to 2012.

## Reference product
- greenhouse, glass walls and roof: 1 m2*year; name RP; By-product classification allocatable product; CPC 3870: Prefabricated buildings; HS2017 940690: Buildings; prefabricated, not of wood
  production volume 3.81304 m2*year; name RP_PV
    This is a placeholder value that does not reflect real-world production volumes. This dataset does not currently require a real-world production volume to work in the database framework, and no actual data were collected yet. This has no negative effect on the results of the ecoinvent database.
  property price 2.67873 EUR2005
    Calculated based on inputs: The price of the product has been calculated as a sum of the values of the material and energy inputs for this product. This value is therefore a rough estimation. It may underestimate the real price since there are additional expenses when producing any product. These expences can include for example labour costs, treatment of waste materials and profit for the producer. Please consider carefully whether this level of data quality is acceptable for your application.
  properties: carbon allocation 0 kg, carbon content 0, lifetime 25 year

## Inputs from technosphere
- agricultural machinery, unspecified: 0.0006 kg; lognormal variance with pedigree 0.374402, pedigree (5,5,5,5,5)
  Literature data and primary data from French manufacturers (Boulard et al, 2011). Ramp and cable drum for the soil preparation system.
- aluminium alloy, AlMg3: 0.228 kg; lognormal variance with pedigree 0.374402, pedigree (5,5,5,5,5)
  Literature data and primary data from French manufacturers (Boulard et al, 2011). Roof structure.
  properties: dry mass 1 kg, wet mass 1 kg
- aluminium scrap, post-consumer: -0.228 kg; name ByP_06
  Aluminum components sent to treatment
  production volume; = ABS( ByP_06/ RP* RP_PV)
    Calculated from reference product production volume, reference product amount and byproduct amount.
  properties: dry mass 1 kg, price 0.685 EUR2005, wet mass 1 kg
- blow moulding: 0.00316667 kg; lognormal variance with pedigree 0.374402, pedigree (5,5,5,5,5)
  Literature data and primary data from French manufacturers (Boulard et al, 2011). Tanks for the fertigation system.
- concrete block: 0.00181883, 0.000171184, 0.104176, 0.000823823 kg (4 suppliers, which the file names only by identifier); sum of these 0.10699 kg; lognormal variance with pedigree 0.374402, pedigree (5,5,5,5,5)
  Literature data and primary data from French manufacturers (Boulard et al, 2011). Mechanical room part of for the storage system.
  properties: dry mass 1 kg, wet mass 1 kg
- concrete, normal strength: 0.000428961 m3; lognormal variance with pedigree 0.374402, pedigree (5,5,5,5,5)
  Literature data and primary data from French manufacturers (Boulard et al, 2011). Walls and mechanical room.
  properties: dry mass 2190 kg, water content 0.086758, wet mass 2380 kg
- copper, cathode: 0.0001008 kg; lognormal variance with pedigree 0.374402, pedigree (5,5,5,5,5)
  Literature data and primary data from French manufacturers (Boulard et al, 2011). Cables and wires for the greenhouse structure.
  properties: dry mass 1 kg, wet mass 1 kg
- diesel, burned in building machine: 0.450005 MJ; lognormal variance with pedigree 0.374402, pedigree (5,5,5,5,5)
  Literature data and primary data from French manufacturers (Boulard et al, 2011). Energy for building the greenhouse and retention pond.
  properties: heating value, net 1 MJ
- drawing of pipe, steel: 0.32 kg; lognormal variance with pedigree 0.374402, pedigree (5,5,5,5,5)
  Literature data and primary data from French manufacturers (Boulard et al, 2011). Tubes and siphons for the heating system.
- electricity, low voltage: 0.00230922, 2.31845e-5, 0.000698816, 5.14005e-7, 8.10254e-5, 0.000166368, 7.80814e-5, 1.92752e-5, 0.00010308, 6.08073e-6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 kWh (47 suppliers, which the file names only by identifier); sum of these 0.05972 kWh; lognormal variance with pedigree 0.374402, pedigree (5,5,5,5,5)
  Literature data and primary data from French manufacturers (Boulard et al, 2011). Electricity for manufacturing of the greenhouse structure.
- electronics, for control units: 0.003 kg; lognormal variance with pedigree 0.374402, pedigree (5,5,5,5,5)
  Literature data and primary data from French manufacturers (Boulard et al, 2011). Control unit for the greenhouse structure.
  properties: carbon content, fossil 0.337146, carbon content, non-fossil 0.00013442, dry mass 1 kg, wet mass 1 kg
- extrusion, plastic film: 0.0533 kg; lognormal variance with pedigree 0.374402, pedigree (5,5,5,5,5)
  Literature data and primary data from French manufacturers (Boulard et al, 2011). Thermal screen for the cooling system and mulch film.
- extrusion, plastic pipes: 0.0432 kg; lognormal variance with pedigree 0.374402, pedigree (5,5,5,5,5)
  Literature data and primary data from French manufacturers (Boulard et al, 2011). Pipes for the fertigation system, cooling system and CO2 injection system.
- flat glass, uncoated: 0.48 kg; lognormal variance with pedigree 0.374402, pedigree (5,5,5,5,5)
  Literature data and primary data from French manufacturers (Boulard et al, 2011). 4 mm simple glass for the greenhouse structure.
  properties: dry mass 1 kg, wet mass 1 kg
- gas motor, 206kW: 6.2e-10 unit; lognormal variance with pedigree 0.374402, pedigree (5,5,5,5,5)
  Literature data and primary data from French manufacturers (Boulard et al, 2011). Generating set for the heating system.
- heat and power co-generation unit, 200kW electrical, diesel SCR, components for electricity only: 6.2e-10 unit; lognormal variance with pedigree 0.374402, pedigree (5,5,5,5,5)
  (same comment as for gas motor, 206kW)
- injection moulding: 0.00223333 kg; lognormal variance with pedigree 0.374402, pedigree (5,5,5,5,5)
  Literature data and primary data from French manufacturers (Boulard et al, 2011). Taps, gutters and stoppers for the fertigation system.
- iron scrap, unsorted: -0.554 kg; name ByP_07
  Steel and chromium steel components sent to treatment
  production volume; = ABS( ByP_07/ RP* RP_PV)
    (same comment as for aluminium scrap, post-consumer)
  properties: dry mass 1 kg, price 0.149 EUR2005, wet mass 1 kg
- oil boiler, 100kW: 1.8612e-6 unit; lognormal variance with pedigree 0.374402, pedigree (5,5,5,5,5)
  Literature data and primary data from French manufacturers (Boulard et al, 2011). Boiler for the heating system.
- polyethylene, high density, granulate: 0.0475 kg; lognormal variance with pedigree 0.374402, pedigree (5,5,5,5,5)
  Literature data and primary data from French manufacturers (Boulard et al, 2011). Tanks, pipes, gutters and taps for the fertigation system.
  properties: carbon content, fossil 0.857143, dry mass 1 kg, heating value, net 42.47 MJ, wet mass 1 kg
- polyethylene, linear low density, granulate: 0.0533 kg; lognormal variance with pedigree 0.374402, pedigree (5,5,5,5,5)
  (same comment as for extrusion, plastic film)
  properties: carbon content, fossil 0.857143, dry mass 1 kg, heating value, net 42.47 MJ, wet mass 1 kg
- polymer foaming: 0.0049 kg; lognormal variance with pedigree 0.374402, pedigree (5,5,5,5,5)
  Literature data and primary data from French manufacturers (Boulard et al, 2011). Plastic bags part of for the support system.
- polystyrene, expandable: 0.0049 kg; lognormal variance with pedigree 0.374402, pedigree (5,5,5,5,5)
  (same comment as for polymer foaming)
  properties: carbon content, fossil 0.923077, dry mass 1 kg, heating value, net 38.67 MJ, wet mass 1 kg
- polyvinylfluoride: 0.0009792 kg; lognormal variance with pedigree 0.374402, pedigree (5,5,5,5,5)
  Literature data and primary data from French manufacturers (Boulard et al, 2011). Cables and wires for the greenhouse structure and the CO2 injection system.
  properties: carbon content, fossil 0.521739, dry mass 1 kg, heating value, net 23.7 MJ, wet mass 1 kg
- section bar extrusion, aluminium: 0.228 kg; lognormal variance with pedigree 0.374402, pedigree (5,5,5,5,5)
  (same comment as for aluminium alloy, AlMg3)
- section bar rolling, steel: 0.17847 kg; lognormal variance with pedigree 0.374402, pedigree (5,5,5,5,5)
  Literature data and primary data from French manufacturers (Boulard et al, 2011). Poles and trellis for the greenhouse structure.
- sheet rolling, steel: 0.03552 kg; lognormal variance with pedigree 0.374402, pedigree (5,5,5,5,5)
  Literature data and primary data from French manufacturers (Boulard et al, 2011). Roofing.
- steel, chromium steel 18/8: 0.0328 kg; lognormal variance with pedigree 0.374402, pedigree (5,5,5,5,5)
  Literature data and primary data from French manufacturers (Boulard et al, 2011). Bolting for the greenhouse structure.
  properties: carbon content, fossil 0.0008, dry mass 1 kg, wet mass 1 kg
- steel, low-alloyed: 0.521187 kg; lognormal variance with pedigree 0.374402, pedigree (5,5,5,5,5)
  (same comment as for section bar rolling, steel)
  properties: carbon content, fossil 0.005, dry mass 1 kg, wet mass 1 kg
- synthetic rubber: 0.0003 kg; lognormal variance with pedigree 0.374402, pedigree (5,5,5,5,5)
  Literature data and primary data from French manufacturers (Boulard et al, 2011). Tubes for the soil preparation system.
  properties: carbon content, fossil 0.871949, dry mass 1 kg, heating value, net 26.42 MJ, wet mass 1 kg
- tractor, 4-wheel, agricultural: 0.0152 kg
  Literature data and primary data from French manufacturers (Boulard et al, 2011). Tractor.
- waste concrete: -1.05258, -0.000273 kg (2 suppliers, which the file names only by identifier); sum of these -1.05285 kg
  Concrete components sent to treatment
  production volume; = ABS( ByP_01/ RP* RP_PV)
    Calculated from production volume of reference product using the relative outputs.
  properties: dry mass 0.5 kg, water content 1, wet mass 1 kg
- waste electric and electronic equipment: -0.003101 kg; name ByP_04
  Electric and electronic components sent to treatment
  production volume; = ABS( ByP_04/ RP* RP_PV)
    Calculated from production volume of reference product using the relative outputs.
  properties: carbon content, fossil 0.0877555, carbon content, non-fossil 0.000485011, dry mass 1 kg, wet mass 1 kg
- waste glass: -0.000911721, -4.34775e-5, -0.000158108, -7.17035e-6, -3.40017e-6, -4.50743e-6, -4.75362e-6, -7.24936e-6, -0.478648, -5.53965e-6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 kg (42 suppliers, which the file names only by identifier); sum of these -0.48 kg
  Flat glass sent to treatment
  production volume; = ABS( ByP_03/ RP* RP_PV)
    Calculated from production volume of reference product using the relative outputs.
  properties: dry mass 1 kg, heating value, net 0.05 MJ, wet mass 1 kg
  note on heating value, net: Value extracted from "treatment of waste glass, open dump, very wet infiltration class (1000mm)"
- waste plastic, mixture: -2.79933e-5, -4.93561e-6, -2.91143e-6, -1.93169e-5, -1.74118e-6, -1.79796e-6, -4.65991e-6, -1.66552e-6, -2.01066e-6, -1.94462e-5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 kg (42 suppliers, which the file names only by identifier); sum of these -0.1067 kg
  Plastic components sent to treatment
  production volume; = ABS( ByP_05/ RP* RP_PV)
    Calculated from production volume of reference product using the relative outputs.
  properties: carbon content, fossil 0.747344, dry mass 0.847 kg, heating value, net 30.79 MJ, water content 0.180638, wet mass 1 kg
  note on heating value, net: Value taken from the general comment of the treatment dataset.
- waste rubber, unspecified: -7.72513e-6, -0.000292275 kg (2 suppliers, which the file names only by identifier); sum of these -0.0003 kg
  Synthetic rubber sent to treatment
  production volume; = ABS( ByP_02/ RP* RP_PV)
    Calculated from production volume of reference product using the relative outputs.
  properties: carbon content, fossil 0.853, dry mass 1 kg, heating value, net 27.19 MJ, wet mass 1 kg
- wire drawing, copper: 0.00028 kg; lognormal variance with pedigree 0.374402, pedigree (5,5,5,5,5)
  (same comment as for copper, cathode)
- zinc coat, coils: 0.0185194 m2; lognormal variance with pedigree 0.374402, pedigree (5,5,5,5,5)
  (same comment as for section bar rolling, steel)

## Sampling procedure
Dataset is adapted from AGRIBALYSE 1.2 database, with land occupation and transformation flows removed (these are accounted for in the crop datasets). Data was collected from French manufacturers and reported in Boulard et al. (2011).
Translated name: Serre verre, Nord.

## Extrapolations
The amount of the exchanges are copy from a regional dataset.
