# treatment of LDPE/Alu in waste UHT milk carton (ambient), post-industrial, municipal incineration

Dataset: EcoSpold 2, unit process
Geography: RER
Time period: 2006-01-01 to 2023-12-31
Technology level: current
Classification: ISIC rev.4 ecoinvent: 3821:Treatment and disposal of non-hazardous waste
Scenario: Business-as-Usual
System model: Allocation, cut-off by classification
Generated by: Nikolia Stoikou
Database: ecoinvent
isCopyrightProtected: true
accessRestrictedTo: 1

## General comment
This dataset represents the activity of waste disposal of 'LDPE/Alu in waste UHT milk carton (ambient), post-industrial' in a municipal solid waste incinerator (MSWI). Recommended use of this dataset: post industrial waste from beverage carton production. Inventoried waste contains several fractions: 20.6% Alu in MSW; 79.4% waste polyethylene, low density. Waste composition (wet, in ppmw): gross heating value 30.8 MJ/kg; net heating value 28.36 MJ/kg; H2O 109380; O na; H 98822; C 546100; S 576.05; N 5325.9; P 408.78; B na; Cl 6573.6; Br 7.0542; F 36.689; I na; Ag 3.262; As 1.6393; Ba 66.796; Cd 2.0958; Co 0.49323; Cr 13.092; Cu 24.195; Hg 5.9961; Mn 29.491; Mo 5.7891; Ni 6.4221; Pb 10.413; Sb 3.0164; Se na; Sn 10.818; V 1.3618; Zn 81.248; Be 0.29748; Sc 0.8865; Sr 17.801; Ti 5312.7; Tl 0.17657; W 6.207; Si 8181.7; Fe 763.97; Ca 8343.1; Al 207090; K 750.84; Mg 528.74; Na 1513.7. Share of carbon in initial waste input that is biogenic 0%. Share of metals in waste not oxidised and bulk-recyclable (exclude very small or thin parts) Iron: 0%; Alu: 0%; Copper: 0%. Recovery of metal scrap from bottom ash to recycling: 0g iron scrap, 0g aluminium scrap, 0g copper scrap. Net energy production: 3.59MJ/kg electric energy and 6.99MJ/kg thermal energy.

## Included activities start
The activity starts with the waste being available at the gate of the treatment facility. Collection and transportation of the waste to the treatment plant is not included.

## Included activities end
The activity ends with the waste being treated and waste-specific emissions from the incineration process and auxiliary material consumption for flue gas cleaning are released to the environment (air and water). Infrastructure and waste-specific energy demands for Municipal Solid Waste Incineration (MSWI) and net energy generation are included.

## Geography
Modelling parameters affecting the tretment technology are not specific to this geography.

## Technology
The waste is treated in the incineration plant with flue gas cleaning. Incineration is the controlled combustion of a waste.Auxiliary material consumption for this step of air pollution control (APC) are included in the process. Infrastructure is also included in the process. Air polution control includes, electrostatic precipitator for fly ash (ESP), wet flue gas scrubber and 25% SNCR , 42.77% SCR-high dust , 32.68% SCR-low dust -DeNOx facilities and 0% without DeNOx (weighted according to mass of burnt waste). Efficiency of iron scrap separation from slag : 58%. Efficiency of aluminium scrap separation from slag : 31%. Efficiency of copper scrap separation from slag : 31%. Gross electric efficiency technology mix 15.84% and Gross thermal efficiency technology mix 28.51%

## Reference product
- heat, for reuse in municipal waste incineration only: 1 MJ; By-product classification allocatable product; CPC 17300: Steam and hot water
  net useful heat generated from this waste and used in internal MSWI plant energy redistribution.
  production volume 5.61404e7 MJ
    calculated in proportion to incinerated waste input
  property price 0.0106 EUR2005
    Average European district heat price from Ecoheatcool and Euroheat 2005-2006, Ecoheat Work package 1: The European heat market. Final report. 10.6 EUR/GJ i s the price of district heat. http://www.solarthermalworld.org/files/Ecoheatcool%20WP1%20Web.pdf?download
  properties: carbon allocation 0 kg, carbon content 0, exergy 0.1842 MJ, true value relation 0.1842
