# fibre, flax, short, scutched to generic market for silky fibres

Dataset: EcoSpold 2, unit process
Geography: GLO
Time period: 2020-01-01 to 2023-12-31
Technology level: current
Classification: ISIC rev.4 ecoinvent: 2030:Manufacture of man-made fibres
Scenario: Business-as-Usual
System model: Allocation, cut-off by classification
Generated by: Francesco Cirone
Database: ecoinvent
isCopyrightProtected: true
accessRestrictedTo: 1

## General comment
This is a renaming activity. It's purpose is to link 'fibre, flax, short, scutched' to the generic 'market for silky fibres'. This dataset should not be used if it's contribution to the overall result is important.

## Included activities start
Activity starts with the reception of 'fibre, flax, short, scutched'.

## Included activities end
Activity ends with the 'silky fibres'.

## Reference product
- silky fibre: 1 kg; By-product classification allocatable product; CPC 26220: Artificial staple fibres, carded, combed or otherwise processed for spinning; HS2017 55: Man-made staple fibres
  production volume 2.19e7 kg; = 73000000*0.3
    On average between 20214 and 2018, in France + Belgium + Netherlands 73 000 tons of fibre, short, scutched were produced per year. Source : statistic data for production of retted straw and of long and short fibres. The data was gathered by the Flax-Linen Economic Observatory of the Alliance for Linen-Flax and Hemp, from national organisations for flax cultivation and scutching in France, Belgium and the Netherlands. Assumed 30% of the global production volume is used for fibre, silk. Expert judgement.
  property heating value, net 12.12 MJ
    LHV is calculated based on the Carbon content of the product. More details can be found on the respective documentation.
  properties: carbon allocation 0.4 kg, carbon content 0.4, carbon content, fossil 0.23, carbon content, non-fossil 0.17, dry mass 1 kg, price 11.7644 EUR2005, water content 0, water in wet mass 0 kg, wet mass 1 kg

## Inputs from technosphere
- fibre, flax, short, scutched: 1 kg
  properties: carbon content, non-fossil 0.4526, dry mass 0.88 kg, heating value, net 13.23 MJ, price 0.75 EUR2005, water content 0.136364, wet mass 1 kg
