# concrete production, 40MPa, for civil engineering, with cement, Portland

Dataset: EcoSpold 2, unit process
Geography: RoW
Time period: 2014-01-01 to 2023-12-31
Technology level: current
Classification: ISIC rev.4 ecoinvent: 2395:Manufacture of articles of concrete, cement and plaster
Synonyms: concreto premezclado; ready-mix concrete; ready mixed concrete
Scenario: Business-as-Usual
System model: Allocation, cut-off by classification
Generated by: [System]
Published in: Gmünder S. 2017
Database: ecoinvent
isCopyrightProtected: true
accessRestrictedTo: 1

## General comment
This dataset represents the production of 40MPa ready-mix concrete in Peru. Density: 2'453 kg/m³ - w/c: 0.55. Ingredients (for 1 m³): cement type ICo 380 kg, Water 195 kg, Gravel 1116 kg, Sand 744kg, Admixtures (retarder 0.3%cem and superplastisizers 0.7%cem) in total 3.8kg/m3.
This dataset is a copy of the corresponding PE dataset.

## Included activities start
From reception of raw materials at the ready-mix plant gate.

## Included activities end
This activity ends before the delivery of concrete at the construction site. The dataset includes the whole manufacturing processes to produce ready-mixed concrete, internal processes (material handling and mixing) and infrastructure. The dataset does not include: - the transport of concrete in a mixing truck.

## Geography
Representative production of ready-mix concrete 40 MPa with Portland cement in Peru. Data based from main cement producers and personal comunications with local experts.
The uncertainy has been adjusted accordingly.

## Technology
Represent the current technology for ready-mix concrete production in Peru.

## Time period
The production volume of 2016 is considered. The data from sustainability reports goes from 2014 to 2016. Data have been reported with the production volume of corresponding year.

## Parameters
- losses: 0.03 dimensionless; lognormal variance with pedigree 0.018, pedigree (4,5,1,5,1)
  Estimated value. Losses due to returned concrete from construction sites.
- total aggregates: 1860 kg/m3; name aggregates_tot; lognormal variance with pedigree 0.0046, pedigree (3,4,1,1,1)
  Estimated value. The mix design contains 1860 kg /m3 of aggregates (Pimentel, 2017).
- water to cement ratio: 0.55 dimensionless; name w_c_ratio; lognormal variance with pedigree 0.0046, pedigree (3,4,1,1,1)
- water withdrawal, per cubic meter of concrete: 269 kg/m3; name water_withdrawal; lognormal variance with pedigree 0.0046, pedigree (3,4,1,1,1)
  Calculated value. The water cement ratio (w/c) is 0.55. In addition, 60kg is assumed for other water uses such as washing, dust treatment, irrigation, etc.

## Reference product
- concrete, 40MPa: 1 m3; name concrete; By-product classification allocatable product; CPC 37510: Non-refractory mortars and concretes; HS2017 6810: Cement, concrete or artificial stone; whether or not reinforced, articles thereof
  production volume 1.60101e6 m3; name concrete_PV
    The global production volume was calculated as follows: 1) The total production volume of each country was calculated 2) The production volume was scaled based on construction output (*) 3) The average of the results was assumed to be the GLO PV 4) The share of each different technology was calculated 5) The weighted average of the shares for each country was used to split the GLO PV into different technologies (*) Construction output assumed per country Country Share ZA 0.50% BR 2.01% CH 0.36% CO 0.58% IN 9.67% PE 0.31% CA-QC 0.37% RNA without CA-QC 9.03% AT 0.40% Source: OECD. 2018. Input-Output Tables. http://www.oecd.org/trade/input-outputtables.htm. United Nations Statistics Division. 2019. UN data. A world of information. http://data.un.org/. Timmer, M.P., E. Dietzenbacher, B. Los, R. Stehrer, and G.J. de Vries. 2015. An Illustrated User Guide to the World Input-Output Database: the Case of Global Automotive Production. Review of International Economics 23(3): 575-605. http://doi.wiley.com/10.1111/roie.12178. The data was adjusted based on PPP, data from: The World Bank. 2019. World Bank Open Data. https://data.worldbank.org/
  property dry mass 2243.91 kg; name dry_mass; = (cement+additives)/(1+losses)+ aggregates_tot
  property price 185 EUR2005
    Calculated value based on data from United Nations Commodity Trade Statistics Database (comtrade.un.org). UN comtrade category: 681019 Tiles & flagstones of cement, concrete, artificial ston. Year 2005. Using exchange rate of 1EURO = 1.209 USD. Average of price of import into 5 main markets (EU, US, JP, IN and CN).
  property water in wet mass 209 kg; name water_in_wet_mass
  property wet mass 2452.91 kg; name wet_mass; = dry_mass+ (w_c_ratio*cement)/(1+losses)
  properties: carbon allocation 0 kg, carbon content 0, cement content 0 kg, gravel content 0 kg, sand content 0 kg, water content 0.0931456

## Inputs from technosphere
- cement, Portland: 339.818, 12.8773, 17.1799, 18.8336, 0.779785, 0.0473803, 0.710947, 0.692911, 0.460094 kg (9 suppliers, which the file names only by identifier); sum of these 391.4 kg; = 380*(1+losses); lognormal variance with pedigree 0.0108, pedigree (4,3,2,5,1)
  Estimated value. SUPERMIX value as the most produced concrete for 20MPa (Ing. Guerra, 2017)
  Uncertainty: Calculated variable. Uncertainty will be determined from propagation of uncertainty factors of underlying variables.
  properties: dry mass 1 kg, wet mass 1 kg
- chemical, organic: 4.03142 kg; name additives; lognormal variance with pedigree 0.0188, pedigree (4,5,2,5,1)
  Calculated value. Local experts estimate as an average that aditives concentrations are: 1%cem additives are added to the recipe as :0.3%cem retarder and 0.7%cem superplasticizer (Ing. Guerra, 2017)
  properties: carbon content, fossil 0.628, dry mass 1 kg, heating value, net 19.03 MJ, wet mass 1 kg
  note on carbon content, fossil: This dataset is an unweighted average of 20 organic substances (listed in Tab 88.1, ecoinvent v2.2 report 8, part II), being part of the top100 chemicals included in this database. The C-content has also been calculated as an unweighted average of the C content of the substances composing this dataset.
- concrete mixing factory: 4.57e-7 unit; source Kellenberger D. 2007; lognormal variance with pedigree 0.3326, pedigree (2,5,3,5,1)
  Approximation. The average value of concrete production, 35 MPa (GLO) are used.
- electricity, medium voltage: 0.00208714, 9.31233e-5, 0.00217001, 0.00110019, 0.0013472, 0.000779649, 0.0861883, 1.71926, 0.000193341, 0.577667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 kWh (31 suppliers, which the file names only by identifier); sum of these 3.0797 kWh; lognormal variance with pedigree 0.0208, pedigree (2,5,2,5,1)
  Calculated value. The sustainability reports of the cement manufacturers reports the electricity demand for concrete (Cementos Argos S.A, 2017; Cemex, 2017; Holcim, 2015). The data is exprapolated from Colombia. Argos 2.38E+00 Colombia value, sustainability report 2016. Holcim 3.25E+00 Colombia value, sustainability report 2015. Cemex 3.70E+00 Colombia value, sustainability report 2015. Values in kWh/m3 The value presented is calculated considering a weighted average with production volumes. Cementos Argos S.A. (2017). Energy and Co-Processing, 1-8. Cemex. (2015). Sustainability Report 2015. Holcim. (2015). Informe de Desarrollo Sostenible 2015.
  Uncertainty: There is an important variability of energy consumption between plants
- gravel, crushed: 49.4453, 868.85, 0.298865, 226.359, 4.52671 kg (5 suppliers, which the file names only by identifier); sum of these 1149.48 kg; lognormal variance with pedigree 0.0188, pedigree (4,5,2,5,1)
  Estimated value. The mix design contains 1860 kg /m3 of aggregates. The aggregates are composed by a mix of 40% of sand and 60% of gravels (Ing. Pimentel, 2017).
  Uncertainty: Calculated variable. Uncertainty will be determined from propagation of uncertainty factors of underlying variables.
  properties: dry mass 1 kg, wet mass 1 kg
- lubricating oil: 0.0086826, 0.0412174 kg (2 suppliers, which the file names only by identifier); sum of these 0.0499 kg; source Kellenberger D. 2007; lognormal variance with pedigree 0.3068, pedigree (2,5,2,5,1)
  Calculated value. Weighted average amount from 34 concrete plants in Brazil is used (Silva 2018). Silva, F. B., Oliveira, L. A., Passuello, A. C. B., Moraga, G. L., Silva, V. G., Silva, M. G., Saade, M. R. M., Gmünder, S., Myers, N. , Life Cycle Inventories of cement and concrete production in Latin America, 3 - SeparatePublication
  Uncertainty: Variance of logtransformed data calculated based on the sample's coefficient of variation.
  properties: carbon content, fossil 0.75, dry mass 1 kg, heating value, net 40.2 MJ, wet mass 1 kg
  note on carbon content, fossil: Lubricating oil is produced from diesel. C-content/dry mass of fats and oils considered 75%, from: ecoinvent v2.2 report, n 15a, pg 40
  note on heating value, net: Literature value, Source: IPCC 2006, 2006 IPCC Guidelines for National Greenhouse Gas Inventories, Prepared by the National Greenhouse Gas Inventories Programme, Eggleston H.S., Buendia L., Miwa K., Ngara T. and Tanabe K. (eds). Published: IGES, Japan
- sand: 11.5946, 0.138824, 754.526, 0.0601936 kg (4 suppliers, which the file names only by identifier); sum of these 766.32 kg; source Manuel Lascarro 2017; lognormal variance with pedigree 0.0188, pedigree (4,5,2,5,1)
  (same comment as for gravel, crushed)
  properties: dry mass 1 kg, wet mass 1 kg
- scrap steel: -0.0160969, -0.00769335, -9.74723e-6 kg (3 suppliers, which the file names only by identifier); sum of these -0.0238 kg; = steel; lognormal variance with pedigree 0.0206, pedigree (2,5,1,5,1)
  Calculated value.
  production volume; = concrete_PV * steel / concrete
    Calculated from production volume of reference product using the relative outputs.
  properties: dry mass 1 kg, wet mass 1 kg
- steel, low-alloyed, hot rolled: 0.0238 kg; name steel; source Kellenberger D. 2007; lognormal variance with pedigree 0.0146, pedigree (2,1,3,5,1)
  Literature value. From ecoinvent dataset "concrete production, normal" (Accessed October 15th 2017)
  properties: carbon content, fossil 0.005, dry mass 1 kg, wet mass 1 kg
  note on carbon content, fossil: Low alloyed steel composition given in Tab. 3.2 ecoinvent v2.2 report 10_partII. Steel assumed to have a C content of 0.5%
- synthetic rubber: 0.0636 kg; name rub; source Kellenberger D. 2007; lognormal variance with pedigree 0.7308, pedigree (2,5,2,5,1)
  (same comment as for lubricating oil)
  properties: carbon content, fossil 0.871949, dry mass 1 kg, heating value, net 26.42 MJ, wet mass 1 kg
  note on carbon content, fossil: EPDM (Ethylene-propene-diene terpolymer) rubber is a terpolymer of ethylene, propene, and a diene with the residual unsaturated portion of the diene in the side chain (ecoinvent v2.2 report 7-part XX & Ullmann). Chemical formula (deduced from Evidences of Solvent-Induced Miscibility in Polychloroprene-co-Ethylene-Propene Diene Terpolymer Blends, Dubey et al., Journal of Applied Polymer Science, 2009, 111:1884–1891): C20H35
- tap water: 0.515241, 0.961413, 2.58998, 0.311764, 12.9923, 148.678, 111.021 kg (7 suppliers, which the file names only by identifier); sum of these 277.07 kg; lognormal variance with pedigree 0.0268, pedigree (4,5,2,5,3)
  Calculated value.
  Uncertainty: Calculated variable. Uncertainty will be determined from propagation of uncertainty factors of underlying variables.
  properties: carbon content, fossil 0.00178991, dry mass 0.000337476 kg, water content 2962.17, wet mass 1 kg
  note on carbon content, fossil: Bicarbonate content is 2.93 mol/m3. CO2 content is 0.1 mol/m3 (ecoinvent v2.2 report 8, Tab 93.1).
- waste concrete: -5.02805, -68.5416, -0.0177772 kg (3 suppliers, which the file names only by identifier); sum of these -73.5874 kg; lognormal variance with pedigree 0.0206, pedigree (2,5,1,5,1)
  Calculated value.
  production volume; = concrete_PV * waste_concrete / concrete
    Calculated from production volume of reference product using the relative outputs.
  properties: dry mass 0.5 kg, water content 1, wet mass 1 kg
- waste mineral oil: -0.000339086, -0.0358638, -0.0136971 kg (3 suppliers, which the file names only by identifier); sum of these -0.0499 kg; = lub_oil; lognormal variance with pedigree 0.0206, pedigree (2,5,1,5,1)
  Calculated value.
  production volume; = concrete_PV * lub_oil/concrete
    Calculated from production volume of reference product using the relative outputs.
  properties: carbon content, fossil 0.864444, dry mass 0.9 kg, heating value, net 34.7 MJ, water content 0.111111, wet mass 1 kg
  note on carbon content, fossil: Tab A.6, ecoinvent v2.2 report 13_I. C content has been calculated after data in the tables, and then referred to 1 kg DM
  note on heating value, net: Value taken from the general comment of the treatment dataset.
- waste rubber, unspecified: -0.00101508, -0.0384048, -0.0241801 kg (3 suppliers, which the file names only by identifier); sum of these -0.0636 kg; = rub; lognormal variance with pedigree 0.0206, pedigree (2,5,1,5,1)
  Calculated value.
  production volume; = concrete_PV * rub / concrete
    Calculated from production volume of reference product using the relative outputs.
  properties: carbon content, fossil 0.853, dry mass 1 kg, heating value, net 27.19 MJ, wet mass 1 kg
- wastewater from concrete production: -0.000118968, -0.024601 m3 (2 suppliers, which the file names only by identifier); sum of these -0.02472 m3; lognormal variance with pedigree 0.0206, pedigree (2,5,1,5,1)
  Calculated value. The water balance is established taking into account the total water input (withdrawal) minus the outputs, which include the water contained in the concrete, the water evaporated and the water infiltrated. In general, no waste water is produced. The water incorporated in the concrete correspond to the cement amount multiplied by w/c ratio. The share of the water evaporated to air and the water infiltrated is calculated based on the sustainability reports from Argos (60% evaporated).
  production volume; name waste_water; = concrete_PV*water_to_water/concrete
    This dataset is a copy of the corresponding PE dataset.
  properties: carbon content, fossil 0.027074, dry mass 0.449139 kg, water content 2225.48, wet mass 1000 kg
  note on carbon content, fossil: TOC =0.01216 kg/m3 (Tab A.20, ecoinvent v2.2 report 13_I). TOC was considered as Total Carbon.

## Emissions to nature
- Water [air, unspecified]: 0.03708 m3; name Water_to_air; lognormal variance with pedigree 0.0114, pedigree (2,5,2,5,1)
  Calculated value. The water balance is established taking into account the total water input (withdrawal) minus the outputs, which include the water contained in the concrete, the water evaporated and the water infiltrated. In general, no waste water is produced. The water incorporated in the concrete correspond to the cement amount multiplied by w/c ratio. The share of the water evaporated to air and the water infiltrated is calculated based on the sustainability reports from Argos (60% evaporated).
  Uncertainty: Calculated variable. Uncertainty will be determined from propagation of uncertainty factors of underlying variables.

## Sampling procedure
Production data provides mostly from personal comunication with local experts and sustainability reports and general information of 2 principle cement and concrete producers of Peru (Paquasmayo and UNACEM). Data has been checked, completed and confirmed by personal communication with local experts. Unit flows were calculated by dividing the amounts of inputs and outputs by the total concrete production in mass.

## Extrapolations
The main values are considered representative for a typical production of ready mix concrete for building construction in Peru. The infrastrucutre is included and the main emissions to water and some inputs are taken from the global dataset for ready-mix concrete production. Extrapolated from the corresponding PE dataset. The auxiliary material (rubber, lube oil) are based on a sampling of 34 concrete plants in Brazil.
