# petrol, unleaded, import from RoW

Dataset: EcoSpold 2, unit process
Geography: ZA
Time period: 2014-01-01 to 2023-12-31
Technology level: current
Classification: ISIC rev.4 ecoinvent: 1920:Manufacture of refined petroleum products
Scenario: Business-as-Usual
System model: Allocation, cut-off by classification
Generated by: Axel Liebich
Published in: Fehrenbach, H. 2018
Database: ecoinvent
isCopyrightProtected: true
accessRestrictedTo: 1

## General comment
This dataset represents the import of a refined petroleum products of unspecified geographical origin of supply to the domestic/regional market for this product. The transport requirements (expressed in tkm) with tanker ship was assumed to 10'000 km by sea by default. No product losses or other aspects, besides transport requirements have been included. The dataset is only a rough proxy with large uncertainties, and it should hence be revised accordingly if its contribution is expected to be important.

## Included activities start
Activity starts with transport by sea of a refined petroleum product of unspecified geographical origin.

## Included activities end
Activity ends with the refined petroleum product entering the domestic/regional market.

## Reference product
- petrol, unleaded: 1 kg; By-product classification allocatable product; CPC 33311: Motor gasoline; HS2017 2710: Petroleum oils and oils from bituminous minerals, not crude; preparations n.e.c, containing by weight 70% or [...]; CAS 86290-81-5
  production volume 2.48e8 kg
    Calculated based on the import share in the JODI-oil database for 2015 (jodidata.org)
  property heating value, net 43.2 MJ
    Assumed equal to "petroleum". LHV for petroleum: Based on literature, page 7, Report6, part 4
  property price 0.71 EUR2005
    Average calculated from All Grades, Areas and Formulations in USA for 2005. Source: http://www.eia.gov/oil_gas/petroleum/data_publications/wrgp/mogas_history.html
  properties: carbon allocation 0.865 kg, carbon content 0.865, carbon content, fossil 0.865, carbon content, non-fossil 0, dry mass 1 kg, water content 0, water in wet mass 0 kg, wet mass 1 kg

## Inputs from technosphere
- petrol, unleaded: 1 kg
  Unspecified geographical origin of supply assumed due to lack of information on actual origin or missing corresponding supplying activity.
  properties: carbon content, fossil 0.865, dry mass 1 kg, heating value, net 43.2 MJ, wet mass 1 kg
  note on heating value, net: Assumed equal to "petroleum". LHV for petroleum: Based on literature, page 7, Report6, part 4
- transport, freight, sea, tanker for petroleum: 10 metric ton*km; lognormal variance with pedigree 0.33, pedigree (5,5,5,5,5)
  A transport distance of 10'000 km by sea assumed by default.
