# electricity production, natural gas, conventional power plant

Dataset: EcoSpold 2, unit process
Geography: US-WECC
Time period: 1990-01-01 to 2023-12-31
Technology level: current
Classification: ISIC rev.4 ecoinvent: 3510:Electric power generation, transmission and distribution
Classification: EcoSpold01Categories: natural gas/power plants
Tags: fossil fuels; United States; natural gas power
Scenario: Business-as-Usual
System model: Allocation, cut-off by classification
Generated by: Karin Treyer
Published in: Faist Emmenegger, M. 2007
Database: ecoinvent
isCopyrightProtected: true
accessRestrictedTo: 1

## General comment
This dataset represents the production of high voltage electricity in a conventional steam boiler natural gas power plant without CHP (combined heat and power) in US - Western Electricity Coordinating Council in 2012.
For electricity production with natural gas, four different datasets relying to different power plant types exist:
- conventional power plant with / without CHP
- combined cycle power plant with / without CHP
The total amount of electricity produced with natural gas has therefore been allocated to these four types and is modelled in four different datasets (see parameter gross electricity production for information). The resulting shares in the US amount to 48% (conventional w/o CHP), 11% (conventional with CHP), 34% (combined cycle w/o CHP), 7% (combined cycle with CHP) and are used for split in the individual NERC regions.
At the moment, these different types are mainly modelled based on different electrical and thermal efficiency values.
The efficiency calculations are based on IEA/OECD statistics (fuel input vs. electricity/heat produced) and own calculation assumptions. Reducing factors such as contaminations of important plant parts, cooling conditions or part load have been taken into account. Even if efficiencies vary with different surrounding temperatures, temperature adjustments would be related to high uncertainties.
Water is used for wet cooling and as feed water in the steam circuit. In this dataset, 100% wet cooling and no once-through cooling is assumed.
EMISSIONS:
Different sources served as basis for assumption of average emissions. Where possible, the most recent sources were taken into account, whereas older sources were taken in order to determine the remaining data gaps. The emissions have been calculated for the former UCTE region* and have been taken over as such for all countries (uncertainty adjusted accordingly). See ecoinvent report "Erdgas" given as main source for details (Tab. 11.15). In the following a short overview:
- Emissions of NOx, CO, CO2, SO2, particles, N2O and CH4 are mainly taken from CORINAIR 2001, EPA, and a variety of other data sources
- NOx emissions are a major challenge in natural gas power plants. With rising temperature, emissions also rise; band widths of NOx emissions in literature are correspondingly large. There are several methods to diminish these emissions.
- CO is a result of incomplete burning. For economic and technical reasons, plant combustion is optimized and CO emissions are low.
- CO2 and SO2 emissions are dependent on the composition of the used fuel. Due to the low sulfur content of the used natural gas, no desulfurization has to take place.
- Organic compound emissions are estimated on the basis of EPA 1998.
- Particles are assumed to be smaller than 2.5 micro-m
*former UCTE: Union for the Coordination of the Transmission of Electricity, since 2009 replaced by ENTSO-E European Network of Transmission System Operators for Electricity.
Sources:
- CORINAIR 2001. EMEP/CORINAIR 2001: Joint EMEP/CORINAIR Atmospheric Emission Inventory Guidebook, Third Edition. Copenhagen: European Environment Agency, 2001. http://reports.eea.eu.int/technical_report_2001_3/en.
- EPA 1998. US Environmental Protection Agency (1998). Compilation of Air Pollutant Emission Factors, AP-42, Fifth Edition, Volume I: Chapter 1: External Combustion Sources, Natural Gas Combustion - Final Section - Supplement D , July 1998. CHIEF (Clearinghouse for Inventories and Emission Factors). Research Triangle Park, North Carolina. http://www.epa.gov/ttn/chief/ap42/.
- Rentz O., Karl U., Peter H. (2002). Ermittlung und Evaluierung von Emissionsfaktoren für Feuerungsanlagen in Deutschland für die Jahre 1995, 2000 und 2010. Deutsch- Französisches Institut für Umweltforschung, Uni Karsruhe. Endbericht. Im Auftrag des Umweltbundesamtes. Forschungsbericht 299 43 142. Umweltbundesamt. Berlin.
[This dataset is meant to replace the following datasets:]

## Included activities start
From the constructed natural gas power plant ready to produce electricity.

From reception of natural gas and operating materials at power plant/factory gate

## Included activities end
This activity ends with 1kWh of high voltage electricity produced at the power plant and arrived at the busbar.

This dataset includes:
- all operation and maintenance activities and materials of the power plants.
- Cooling: It is a assumed that all plants use wet cooling with a cooling tower.No cooling tower is included in this dataset (will be implemented in future versions)
- decarbonised water use for reduction of NOx emissions

This dataset doesn"t include
- raw materials extraction, decommissioning and waste treatment as these activities are already included in the infrastructure datasets.
- transformation of the electricity produced.

## Technology
Average of installed power plants. Only power plants with 100% natural gas firing have been considered for NOx, SO2, and CO2 emissions (eGRID 2006).

## Time period
The Annual Production Volume is valid for the year 2012.

## Parameters
- efficiency: 0.38 dimensionless; lognormal variance with pedigree 0.017225, pedigree (4,3,1,2,3)
  Literature value/calculated value. Data from the US Energy Information Administration for net electricity production and fuel consumption for electricity generation.
  EIA. 2013. Statistics on electricity - Electricity data browser. Generation and thermal output. Net generation for electric power, annual // Consumption for electricity generation (Btu) for electric power. U.S. Energy Information Administration; Independent Statistics&Analysis.
  Together with the information on own use (see parameter "losses"), the net electrical efficiency based on the NCV in natural gas electricity only and CHP plants is calculated. Based on the estimated shares of the four natural gas types (see general comment) and assumed average and maximum values for efficiency in each of these types, the resulting estimated electrical efficiency per country and type was calculated.
  Estimated average and maximum efficiencies for the four power plant types (based on expert judgment and literature values):
  - conventional power plant, w/o CHP: 0.33 / 0.45
  - conventional power plant, with CHP: 0.28 / 0.38
  - combined cycle power plant, w/o CHP: 0.53 / 0.6
  - combined cycle power plant, with CHP: 0.37 / 0.5
  output relative to input (requires additional specification)
- factor: input of MJ for the production of 1 kWh: 9.47368 MJ/kWh; name factor_MJ_kWh; = 1*3.6/efficiency; lognormal variance with pedigree 0.0532, pedigree (4,4,3,4,4)
  Calculated value. 3.6 MJ = 1kWh.
  nan
- fraction, cooling water, to air: 0.0216287 dimensionless; name fraction_CW_to_air; lognormal variance with pedigree 0.092025, pedigree (4,4,3,2,4)
  Calculated value based on literature value (Scown, 2011 & Floerke, 2009, Future changes of freshwater needs in the electricity production sector & Stiegel, 2008, Estimating Freshwater Needs to Meet Future Thermoelectric Generation Requirements) (Vionnet, S., Quantis Water Database - Technical Report, 2012).
  nan
- fraction, process water, to air: 0.15 dimensionless; name fraction_PW_to_air; lognormal variance with pedigree 0.092025, pedigree (4,4,3,2,4)
  Literature value. In case when no industry/process specific data are available, default evaporation fraction value is used. This value is 15% and is based on literature (Statistics Canada, 2007 & Shaffer, K.H., 2008, Consumptive water use in the Great Lakes Basin, USGS & Shiklomanov, 2003, World Water Resources at the Beginning of the 21st Century) and has been approved by an expert.
  nan
- fraction, water, completely softened, to air: 0.15 dimensionless; name fraction_WCS_to_air; = fraction_PW_to_air; lognormal variance with pedigree 0.092025, pedigree (4,4,3,2,4)
  Calculated value. See comment in the other parametres present in this dataset. Water, completely softened is considered to be always used as process water, thus process water fractions to air are applied to all water, completely softened input flows to calculate the amount of water consumed in the processes.
  nan
- fraction, water, decarbonised, to air: 0.0216287 dimensionless; name fraction_WDC_to_air; = fraction_CW_to_air; lognormal variance with pedigree 0.25, pedigree (5,5,5,5,5)
  Calculated value. See comments in the other parametres present in this dataset. Decarbonised water is considered to be always used as cooling water, thus cooling water fractions to air are applied to all carbonised water input flows to calculate the amount of water consumed in the processes.
  nan
- gross electricity production: 0 kWh; name gross_electricity
  Parameter present due to parent child relationship but not used in this dataset
  nan
- losses from gross electricity production: 0.06 dimensionless; name losses_gross_net; lognormal variance with pedigree 0.003525, pedigree (3,2,2,2,2)
  Calculated value. Own use of electricity plants in this country in 2012. For the OECD countries, the OECD iLibrary provides gross and net electricity values for the specific sector "Total Fuel Combustion", from which the loss value is being calculated. This value is then applied to all fossil fuel datasets, as no data on a more detailed level were available.
  OECD. 2014. IEA Electricity Information Statistics: OECD - Electricity and heat generation. OECD iLibrary. Online database. DOI : 10.1787/elect-data-en
  nan
  Uncertainty: g
- once-through and cooling pond cooling systems as a fraction of all cooling syste: 0.52 dimensionless; name once_through_andCP_CS_fractio_from_allCS; lognormal variance with pedigree 0.092025, pedigree (4,4,3,2,4)
  Calculated as an average of data available for Europe (Floerke, 2008, Future changes of freshwater needs in the electricity production sector) and USA (NERL, 2011, Estimating freshwater needs to meet future thermoelectric generation requirements).
  nan
- recirculating cooling system as a fraction of all cooling systems: 0.48 dimensionless; name recirculating_CS_fraction_from_allCS; lognormal variance with pedigree 0.092025, pedigree (4,4,3,2,4)
  (same comment as for once-through and cooling pond cooling systems as a fraction of all coo)
- water consumption, electricity production from NG, once-T and coolingP CS: 0.0005 m3/kWh; name WConsumption_EP_NG_onceT_andCP_CS; lognormal variance with pedigree 0.092025, pedigree (4,4,3,2,4)
  Estimated based on literature (Scown, 2011, Water Footprint of U.S. Transportation Fuels, SI).
  nan
- water consumption, electricity production from NG, recirculating CS: 0.0018 m3/kWh; name WConsumption_EP_NG_recirculatingCS; lognormal variance with pedigree 0.092025, pedigree (4,4,3,2,4)
  (same comment as for water consumption, electricity production from NG, once-T and coolingP)
- water withdrawal, electricity production from NG, once-T and coolingP CS: 0.098 m3/kWh; name WWithdrawal_EP_NG_onceT_andCP_CS; lognormal variance with pedigree 0.092025, pedigree (4,4,3,2,4)
  (same comment as for water consumption, electricity production from NG, once-T and coolingP)
- water withdrawal, electricity production from NG, recirculating CS: 0.0021 m3/kWh; name WWithdrawal_EP_NG_recirculating_CS; lognormal variance with pedigree 0.092025, pedigree (4,4,3,2,4)
  (same comment as for water consumption, electricity production from NG, once-T and coolingP)

## Reference product
- electricity, high voltage: 1 kWh; name electricity; By-product classification allocatable product; CPC 17100: Electrical energy; HS2017 271600: Electrical energy
  production volume 2.2735e10 kWh; name electricity_apv
    Literature value. Data from the US Energy Information Administration for 2012, which provides data on net electricity production in each US State with various energy sources. Data from the States were aggregated on the level of US NERC regions. Data were given for the electricity production with total natural gas. This total production is split to production in electricity/CHP plants with a simple or combined cycle. This split is made based on information for total US (not specific to this NERC region) in the IEA electricity information (amount of electricity produced in electricity only and CHP plants) and information on installed electrical capacity with natural gas in the WEPP database.
    EIA. 2014. Statistics on electricity - Electricity data browser. Generation and thermal output. Net generation for electric power, annual. U.S. Energy Information Administration; Independent Statistics&Analysis.
    IEA. 2014. Electricity Information 2014. ISBN 978-92-64-21692-1. International Energy Agency (IEA), Paris Cedex (FR).
    WEPP 2014. World Electric Power Plants Database. PLATTS McGraw Hill Financial. http://www.platts.com/products/world-electric-power-plants-database
  property price 0.0977 EUR2005
    Temporary price data. Calculated as 90% of purchasers price based on: 94% of the average price (to account for a 6% loss in transformation and transmission) for electricity for industrial consumersin 2005 (excluded taxes). From IEA.
  properties: Corresponding fuel use 10.4 MJ, carbon allocation 0 kg, carbon content 0

## Inputs from technosphere
- gas power plant, 100MW electrical: 5.26737e-10 unit; name gas_power_plant; = factor_MJ_kWh*0.0000000000556; lognormal variance with pedigree 0.1707, pedigree (3,3,5,3,3)
  Literature value/calculated value. Amount of power plant needed for producing 1kWh of electricity, based on the burning of 1MJ of natural gas. Tab. 11.25, p. 143
- gas power plant, 300MW electrical: 2.11263e-11 unit; = 2.23E-12 * factor_MJ_kWh; lognormal variance with pedigree 0.128, pedigree (1,1,4,1,1)
  uncertainty of life time
  Amount was scaled to the amount of reference product.
- natural gas, high pressure: 0.242915 m3; name natural_gas; = 0.0256410256410256 * factor_MJ_kWh; lognormal variance with pedigree 0.008, pedigree (1,1,4,1,1)
  0
  Amount was scaled to the amount of reference product.
  property heating value, net 36 MJ; name natural_gas_Net_Heat_Value
  properties: carbon content, fossil 0.602381, dry mass 0.84 kg, heating value, gross 40 MJ, wet mass 0.84 kg
  note on carbon content, fossil: An average C content of 0.506 kg C/ m3 has been assumed (this average has been calculated using data in Tab 3.5, ecoinvent v2.2 report 6_V
  note on heating value, net: Literature value, Source: Christoph Meili;Niels Jungbluth;Maresa Bussa (2021) Life cycle inventories of crude oil and natural gas extraction. ESU-services Ltd. commissioned by BAFU & VSG, Schaffhausen, Switzerland, http://esu-services.ch/data/public-lci-reports/
- residue from cooling tower: -9.47368e-6 kg; name cooling_tower_residue; = factor_MJ_kWh*0.000001
  Exchange present due to parent child relationship
  production volume; = cooling_tower_residue/electricity* electricity_apv
    Calculated from the production volume of electricity produced.
  properties: carbon content, fossil 0.0544233, dry mass 0.7 kg, water content 0.428571, wet mass 1 kg
- water, completely softened: 0.0568421 kg; name water_completely_softened; = factor_MJ_kWh*0.006; lognormal variance with pedigree 0.2586, pedigree (4,3,5,1,1)
  Literature value/calculated value. Feed water for the steam circuit lost when producing 1kWh of electricity, based on the burning of 1MJ of natural gas. Röder et al. 2007, Tab. 9.65 and Tab. 9.66, p. 160f.
  properties: wet mass 1 kg
- water, decarbonised: 1.89474 kg; name water_decarbonised_user; = factor_MJ_kWh*0.2; lognormal variance with pedigree 0.2586, pedigree (4,3,5,1,1)
  Literature value/calculated value. Cooling water, decarbonised, for the cooling water circuit lost when producing 1kWh of electricity, based on the burning of 1MJ of natural gas. Röder et al. 2007, Tab. 9.65 and Tab. 9.66, p. 160f.
  properties: wet mass 1 kg

## Inputs from nature
- Water, cooling, unspecified natural origin [natural resource, in water]: 0.0514731 m3; name water_cooling_UNO_input; source Scown, C.D., et al. 2011; lognormal variance with pedigree 0.130025, pedigree (4,4,5,2,4)
  Calculated based on literature (Scown, C.D., et al., 2011, Water Footprint of U.S. Trasportation Fuels;Scown, C.D., et al., 2011, Water Footprint of U.S. Trasportation Fuels (SI); Stiegel, 2008, Estimating Freshwater Needs to Meet Future Thermoelectric Generation Requirements; Floerke, M., 2009, Future changes of freshwater needs in the electricity production sector), (Vionnet, S., Quantis Water Database - Technical Report, 2012). Water use in this process is modelled based on literature (see references). The process boundaries are given by the boundaries of the power plant. The process ends when the energy (MJ) is produced and ready to be used for electricity production (kWh).
  Calculated based on literature data.
  property carbon content, fossil 0.0104329; name C_content_fossil
  property carbon content, non-fossil 0; name C_content_non_fossil
  property dry mass 0.1101 kg; name DM
  property water content 9081.65; name water_content
  property water in wet mass 999.89 kg; name WWM
  property wet mass 1000 kg; name WM

## Emissions to nature
- Acenaphthene [air, non-urban air or from high stacks]: 7.51263e-12 kg; name acenaphthene; = 7.93E-13 * factor_MJ_kWh; lognormal variance with pedigree 0.658, pedigree (1,1,4,1,1)
  US EPA 1998, high uncertainty reported qulitatively therein
  Amount was scaled to the amount of reference product.
- Acetaldehyde [air, non-urban air or from high stacks]: 7.57895e-9 kg; name acetaldehyde; = 8E-10 * factor_MJ_kWh; lognormal variance with pedigree 1.088, pedigree (1,1,4,1,1)
  rough estimate, high uncertainty
  Amount was scaled to the amount of reference product.
- Acetic acid [air, non-urban air or from high stacks]: 1.14632e-6 kg; name acetic_acid; = 1.21E-07 * factor_MJ_kWh; lognormal variance with pedigree 1.088, pedigree (1,1,4,1,1)
  rough estimate, high uncertainty
  Amount was scaled to the amount of reference product.
- Arsenic ion [air, non-urban air or from high stacks]: 7.92e-10 kg; name arsenic; = 8.36E-11 * factor_MJ_kWh; lognormal variance with pedigree 0.658, pedigree (1,1,4,1,1)
  NREL 2007
  Amount was scaled to the amount of reference product.
- Benzene [air, non-urban air or from high stacks]: 8.77263e-9 kg; name benzene; = 9.26E-10 * factor_MJ_kWh; lognormal variance with pedigree 0.658, pedigree (1,1,4,1,1)
  NREL 2007
  Amount was scaled to the amount of reference product.
- Benzo(a)pyrene [air, non-urban air or from high stacks]: 5.01158e-12 kg; name benzo_a_pyrene; = 5.29E-13 * factor_MJ_kWh; lognormal variance with pedigree 0.658, pedigree (1,1,4,1,1)
  (same comment as for Acenaphthene)
- Beryllium II [air, non-urban air or from high stacks]: 4.75579e-11 kg; name beryllium; = 5.02E-12 * factor_MJ_kWh; lognormal variance with pedigree 0.658, pedigree (1,1,4,1,1)
  NREL 2007
  Amount was scaled to the amount of reference product.
- Butane [air, non-urban air or from high stacks]: 8.77263e-6 kg; name butane; = 9.26E-07 * factor_MJ_kWh; lognormal variance with pedigree 0.658, pedigree (1,1,4,1,1)
  (same comment as for Acenaphthene)
- Cadmium II [air, non-urban air or from high stacks]: 4.35789e-9 kg; name cadmium; = 4.6E-10 * factor_MJ_kWh; lognormal variance with pedigree 0.658, pedigree (1,1,4,1,1)
  NREL 2007
  Amount was scaled to the amount of reference product.
- Carbon dioxide, fossil [air, non-urban air or from high stacks]: 0.480316 kg; name carbon_dioxide_fossil; = 0.0507 * factor_MJ_kWh; lognormal variance with pedigree 0.008, pedigree (1,1,4,1,1)
  eGRID 2006
  Amount was scaled to the amount of reference product.
- Carbon monoxide, fossil [air, non-urban air or from high stacks]: 9.47368e-5 kg; name carbon_monoxide_fossil; = 1E-05 * factor_MJ_kWh; lognormal variance with pedigree 0.308, pedigree (1,1,4,1,1)
  NREL 2007
  Amount was scaled to the amount of reference product.
- Chromium III [air, non-urban air or from high stacks]: 5.54211e-9 kg; name chromium; = 5.85E-10 * factor_MJ_kWh; lognormal variance with pedigree 0.658, pedigree (1,1,4,1,1)
  NREL 2007
  Amount was scaled to the amount of reference product.
- Cobalt II [air, non-urban air or from high stacks]: 3.32526e-10 kg; name cobalt; = 3.51E-11 * factor_MJ_kWh; lognormal variance with pedigree 0.658, pedigree (1,1,4,1,1)
  NREL 2007
  Amount was scaled to the amount of reference product.
- Dinitrogen monoxide [air, non-urban air or from high stacks]: 9.47368e-6 kg; name dinitrogen_monoxide; = 1E-06 * factor_MJ_kWh; lognormal variance with pedigree 0.308, pedigree (1,1,4,1,1)
  estimate from range of values from different references
  Amount was scaled to the amount of reference product.
- Dioxins, measured as 2,3,7,8-tetrachlorodibenzo-p-dioxin [air, non-urban air or from high stacks]: 2.74737e-16 kg; name dioxins; = 2.9E-17 * factor_MJ_kWh; lognormal variance with pedigree 1.088, pedigree (1,1,4,1,1)
  rough estimate, high uncertainty
  Amount was scaled to the amount of reference product.
- Ethane [air, non-urban air or from high stacks]: 1.29789e-5 kg; name ethane; = 1.37E-06 * factor_MJ_kWh; lognormal variance with pedigree 0.658, pedigree (1,1,4,1,1)
  (same comment as for Acenaphthene)
- Formaldehyde [air, non-urban air or from high stacks]: 3.13579e-7 kg; name formaldehyde; = 3.31E-08 * factor_MJ_kWh; lognormal variance with pedigree 0.658, pedigree (1,1,4,1,1)
  NREL 2007
  Amount was scaled to the amount of reference product.
- Hexane [air, non-urban air or from high stacks]: 7.51263e-6 kg; name hexane; = 7.93E-07 * factor_MJ_kWh; lognormal variance with pedigree 0.658, pedigree (1,1,4,1,1)
  (same comment as for Acenaphthene)
- Lead II [air, non-urban air or from high stacks]: 1.98e-9 kg; name lead; = 2.09E-10 * factor_MJ_kWh; lognormal variance with pedigree 0.658, pedigree (1,1,4,1,1)
  NREL 2007
  Amount was scaled to the amount of reference product.
- Manganese II [air, non-urban air or from high stacks]: 1.50632e-9 kg; name manganese; = 1.59E-10 * factor_MJ_kWh; lognormal variance with pedigree 0.658, pedigree (1,1,4,1,1)
  NREL 2007
  Amount was scaled to the amount of reference product.
- Mercury II [air, non-urban air or from high stacks]: 2.84211e-10 kg; name mercury; = 3E-11 * factor_MJ_kWh; lognormal variance with pedigree 0.658, pedigree (1,1,4,1,1)
  NREL 2007
  Amount was scaled to the amount of reference product.
- Methane, fossil [air, non-urban air or from high stacks]: 9.47368e-6 kg; name methane_fossil; = 1E-06 * factor_MJ_kWh; lognormal variance with pedigree 0.658, pedigree (1,1,4,1,1)
  NREL 2007
  Amount was scaled to the amount of reference product.
- Nickel II [air, non-urban air or from high stacks]: 8.31789e-9 kg; name nickel; = 8.78E-10 * factor_MJ_kWh; lognormal variance with pedigree 0.658, pedigree (1,1,4,1,1)
  NREL 2007
  Amount was scaled to the amount of reference product.
- Nitrogen oxides [air, non-urban air or from high stacks]: 0.000226421 kg; name nitrogen_oxides; = 2.39E-05 * factor_MJ_kWh; lognormal variance with pedigree 0.308, pedigree (1,1,4,1,1)
  eGRID 2006
  Amount was scaled to the amount of reference product.
- PAH, polycyclic aromatic hydrocarbons [air, non-urban air or from high stacks]: 7.57895e-8 kg; name pah; = 8E-09 * factor_MJ_kWh; lognormal variance with pedigree 1.088, pedigree (1,1,4,1,1)
  rough estimate, high uncertainty
  Amount was scaled to the amount of reference product.
- Particulate Matter, < 2.5 um [air, non-urban air or from high stacks]: 4.73684e-6 kg; name particulates_lt2_5; = 5E-07 * factor_MJ_kWh; lognormal variance with pedigree 0.308, pedigree (1,1,4,1,1)
  (same comment as for Dinitrogen monoxide)
- Pentane [air, non-urban air or from high stacks]: 1.08947e-5 kg; name pentane; = 1.15E-06 * factor_MJ_kWh; lognormal variance with pedigree 0.658, pedigree (1,1,4,1,1)
  (same comment as for Acenaphthene)
- Propane [air, non-urban air or from high stacks]: 6.67895e-6 kg; name propane; = 7.05E-07 * factor_MJ_kWh; lognormal variance with pedigree 0.658, pedigree (1,1,4,1,1)
  (same comment as for Acenaphthene)
- Propionic acid [air, non-urban air or from high stacks]: 1.51579e-7 kg; name propionic_acid; = 1.6E-08 * factor_MJ_kWh; lognormal variance with pedigree 1.088, pedigree (1,1,4,1,1)
  rough estimate, high uncertainty
  Amount was scaled to the amount of reference product.
- Selenium IV [air, non-urban air or from high stacks]: 9.47368e-11 kg; name selenium; = 1E-11 * factor_MJ_kWh; lognormal variance with pedigree 0.658, pedigree (1,1,4,1,1)
  NREL 2007
  Amount was scaled to the amount of reference product.
- Sulfur dioxide [air, non-urban air or from high stacks]: 6.92526e-6 kg; name sulfur_dioxide; = 7.31E-07 * factor_MJ_kWh; lognormal variance with pedigree 0.008, pedigree (1,1,4,1,1)
  eGRID 2006
  Amount was scaled to the amount of reference product.
- Toluene [air, non-urban air or from high stacks]: 1.42105e-8 kg; name toluene; = 1.5E-09 * factor_MJ_kWh; lognormal variance with pedigree 0.658, pedigree (1,1,4,1,1)
  (same comment as for Acenaphthene)
- Water [air, unspecified]: 0.0011133 m3; name water_to_air_unspecified; = water_cooling_UNO_input*fraction_CW_to_air; lognormal variance with pedigree 0.130025, pedigree (4,4,5,2,4)
  Calculated value based on literature values and expert opinion. See comments in the parametres" comment field.
  property fraction, origin: fresh water 0; name fraction_origin_fresh_water
  property fraction, origin: salt water 0; name fraction_origin_salt_water
  property fraction, origin: unspecified 1; name fraction_origin_unspecified
- Water [water, unspecified]: 0.0503598 m3; name water_to_water_unspecified; = water_cooling_UNO_input*(1-fraction_CW_to_air); lognormal variance with pedigree 0.130025, pedigree (4,4,5,2,4)
  (same comment as for Water)
  property fraction, origin: fresh water 0; name fraction_origin_fresh_water_Ww
  property fraction, origin: salt water 0; name fraction_origin_salt_water_Ww
  property fraction, origin: unspecified 1; name fraction_origin_unspecified_Ww

## Sampling procedure
Literature

## Extrapolations
All exchange data were extrapolated from datasets of the following 11 countries: AT, BE, DE, ES, FR, GB, IT, JP, LU, NL, US. The data of those countries basically rely on data of the former UCTE (see general comment).

The efficiency is based on IEA/OECD statistics and calculated with own assumptions.

The cooling and feed water use has been taken over from datasets for electricity production with hard coal or lignite.
