# white lined chipboard carton production

Dataset: EcoSpold 2, unit process
Geography: RoW
Time period: 2018-01-01 to 2023-12-31
Technology level: current
Classification: ISIC rev.4 ecoinvent: 1701:Manufacture of pulp, paper and paperboard
Synonyms: GT; GD; UD; WLC
Scenario: Business-as-Usual
System model: Allocation, cut-off by classification
Share of production covered: 52 %
Generated by: Michael Sturges
Database: ecoinvent
isCopyrightProtected: true
accessRestrictedTo: 1

## General comment
This dataset is a copy of the respective European process. It is an aggregated process which includes the production of White Lined Chipboard, transport of the board to converting sites and converting of the board (printing, cutting, creasing) into blank boxes ready for delivery. White Lined Chipboard WLC (also known as GT /GD /UD) is a packaging grade of board used to manufacture cartons. It is typically made using predominantly recovered paper or recovered fibres, but may incoroprate some virgin fibres. It is manufactured in a number of layers, each of which use selected grades of raw materials. It may have up to three layers of coating on the top or printing surface and one layer on the reverse. It is used in a range of applications such as frozen and chilled foods, cereals, shoes, tissues, toys. The board is converted into a carton at a converting site which typically includes a printing process and cutting/creasing of the board into carton blanks, ready for delivery to and erection by the packer/filler.
Data for the production of WLC and conversion of the WLC into cartons were provided by the European industry associations for cartonboard producers (Pro Carton) and convertors (ECMA European Carton Makers Association).
BOARD PRODUCTION: The data for the production of WLC were collected from eight European mills, together producing about 52% of the total annual production of WLC in Europe in 2017 (which is estimated at approximately 3 800 000 tonnes net saleable product. The mills contributing with data are located in Austria, Germany, Italy and Slovenia. The mills have a production volume of between 80 000 - 520 000 tonnes net saleable paper product . The data is collated by Pro Carton in their internal report "European Environmental Database for Cartonboard and Carton Production", which is not made publicly available.
CARTON CONVERTING: The carton converting data were collected from 33 European factories together representing the production of over 380 000 tonnes cartons. hese convertors were located in Austria, Belgium, France, Germany, Poland, Romania, Spain, Turkey, Ukraine, and the United Kingdom. They varied in size producing between 1 000 and 50 000 tonnes of finished cartons ready for shipment.

## Included activities start
The process starts with the reception of wood, wood chips, recovered paper and/or market pulp at the papermill.

## Included activities end
This module includes the European production of white lined chipboard (WLC) in a papermill and conversion of the board into printed, cut and creased cartons ready for delivery to the packer/filler. transport of the board between the mill and the converting operation is included. For the board production, wood handling, pulping and bleaching, the deinking process, board production, energy production on-site and internal waste water treatment are included. Not included is the transport of the waste paper to the mill as this in already integrated into the respective collection modules. Sorting of the incoming paper and the by-products connected to this has been excluded, since sorting of unsorted paper takes place in a separate activity. For the converting process, printing, cutting and creasing is included.

## Geography
European average data (wieghted according to production volumes), provided by Pro Carton from the data survey that underpins their 2018 European Environmental Database for Cartonboard and Carton Production. Data covers the main producers in Europe

## Technology
Average of present technology used, weighted according to the production volumes of the mills participating in the original data survey

## Time period
Inventory data represent the year 2018. The production volume is valid for the year 2018.

## Reference product
- white lined chipboard carton: 1 kg; By-product classification allocatable product; CPC 32153: Cartons, boxes, cases, record sleeves and other packing containers (except bags) of paper, paperboard, cellulo[…]; HS2017 481920: Paper and paperboard; folding cartons, boxes and cases, of non-corrugated paper or paperboard
  production volume 2.15468e10 kg; name PV_board
    Valid for 2018.Global production volume of folding boxboard derived from global production volume of all cartonboard grades as reported in FAOSTAT (data for Forestry Production and Trade for category Cartonboard, Production Quantity in World (Total) in 2028). Total cartonboard production was split over the different grades (FBB, WLC, SUB/SBB) by applying the same shares as reported for Europe: FBB: 34%, WLC: 49%, SBB/SUB; 17% (CEPI, 2015).
    Reference(s):
    FAOSTAT, 2020, http://www.fao.org/faostat/en/#data/FO
    CEPI, 2015, European Environmental Database for Cartonboard and Carton Production, 2015 Final Report.
  property carbon content, fossil 0.0227142
    taken over from previous ecoinvent dataset "chipboard production, white lined, 2000": fossil carbon content on a dry matter basis
  property carbon content, non-fossil 0.462
    biogenic carbon content on a dry matter basis; based on calculations using a methodology developed by CITPA - Guidelines for calculating Carbon footprints for paper-based packaging, CITPA, March 2018
  property price 0.88 EUR2005
    Export prices for the World+ according to: http://faostat.fao.org/site/626/DesktopDefault.aspx?PageID=626#ancor downloaded 28 April 2009; calculated as export value divided by export volume.
  properties: carbon allocation 0.447391 kg, carbon content 0.484714, dry mass 0.923 kg, heating value, net 11.59 MJ, water content 0.0834236, water in wet mass 0.077 kg, wet mass 1 kg

## Inputs from technosphere
- acrylic varnish, with water, in 53% solution state: 0.0119613 kg; lognormal variance with pedigree 0.0044, pedigree (2,3,3,4,1)
  Average data from thirty three carton converting facilities, weighted according to production volumes - varnish
  properties: carbon content, fossil 0.2066, dry mass 0.53 kg, heating value, net 20.44 MJ, water content 0.883983, wet mass 1 kg
- aluminium scrap, post-consumer, prepared for melting: -0.00146083 kg; name a_BP9; lognormal variance with pedigree 0.0038, pedigree (3,3,1,4,1)
  Average data from thirty three carton converting facilities, weighted according to production volumes - aluminium printing plates from the process will all be sent for recycling after use
  production volume; = a_BP9*PV_board
    Calculated from production volume of reference product using the relative outputs.
  properties: dry mass 1 kg, price 0.806 EUR2005, wet mass 1 kg
- aluminium sulfate, powder: 0.000279953 kg; lognormal variance with pedigree 0.0039, pedigree (2,2,3,4,1)
  Average data from eight European producers of whitelined chip, weighted according to production volumes - Al2(SO4)3, Alum, recorded in the caterogy of inputs for Functional additives
  properties: dry mass 1 kg, wet mass 1 kg
- aluminium, primary, ingot: 0.00013933, 0.0013215 kg (2 suppliers, which the file names only by identifier); sum of these 0.00146083 kg; lognormal variance with pedigree 0.0058, pedigree (3,3,3,4,1)
  Average data from thirty three carton converting facilities, weighted according to production volumes - aluminium printing plates
  properties: dry mass 1 kg, wet mass 1 kg
- ash from paper production sludge: -0.000400642 kg; name a_BP1
  Average data from eight European producers of whitelined chip, weighted according to production volumes. Represents 7% of the ash generated, the remaining quantity is described as being used by other industries in the production of other products.
  production volume; = a_BP1*PV_board
    Calculated from the production volume of the reference product in proportion to the respective output amounts.
  properties: carbon content, non-fossil 0.0092, dry mass 1 kg, wet mass 1 kg
- biowaste: -0.00783114 kg; name a_BP6
  Average data from eight European producers of whitelined chip, weighted according to production volumes. Consists of 0.00715954292753353kg of fibre (primary sludge) and 0.00067159220790091kg of biological treatment sludge
  production volume; = a_BP6*PV_board
    (same comment as for ash from paper production sludge)
  properties: carbon content, non-fossil 0.1624, dry mass 0.4 kg, heating value, net 4.29 MJ, water content 1.5, wet mass 1 kg
  note on heating value, net: Value taken from the general comment of the treatment dataset.
- biowaste: -0.00113476 kg; name a_BP7
  Average data from eight European producers of whitelined chip, weighted according to production volumes, recorded as biological treatment sludge
  production volume; = a_BP7*PV_board
    (same comment as for ash from paper production sludge)
- calcium carbonate, precipitated: 0.103238 kg; lognormal variance with pedigree 0.0039, pedigree (2,2,3,4,1)
  Average data from eight European producers of whitelined chip, weighted according to production volumes
- chemi-thermomechanical pulp: 0.0194692 kg; lognormal variance with pedigree 0.0039, pedigree (2,2,3,4,1)
  (same comment as for calcium carbonate, precipitated)
  properties: carbon content, non-fossil 0.494, dry mass 0.9 kg, heating value, net 13.23 MJ, water content 0.111111, wet mass 1 kg
- chemical, organic: 0.000288471 kg; lognormal variance with pedigree 0.0039, pedigree (2,2,3,4,1)
  Average data from eight European producers of whitelined chip, weighted according to production volumes - Polyacrylates, recorded in the caterogy of inputs for coatings, pigments and binders
  properties: carbon content, fossil 0.628, dry mass 1 kg, heating value, net 19.03 MJ, wet mass 1 kg
- clay: 0.0205365 kg; lognormal variance with pedigree 0.0039, pedigree (2,2,3,4,1)
  Average data from eight European producers of whitelined chip and thirty three carton converting facilities, weighted according to production volumes - 0.0192636364 kg clay recorded in the caterogy of inputs for coatings, pigments and binders; 0.00127288589kg clay (filler) recorded in the caterogy of functional additives
  properties: dry mass 0.965 kg, water content 0.0362694, wet mass 1 kg
- diesel, low-sulfur: 1.29571e-6, 5.7745e-6, 6.89508e-5, 2.88821e-6, 1.91555e-7, 2.86097e-6 kg (6 suppliers, which the file names only by identifier); sum of these 8.19617e-5 kg; lognormal variance with pedigree 0.0039, pedigree (2,2,3,4,1)
  (same comment as for calcium carbonate, precipitated)
  properties: carbon content, fossil 0.865, dry mass 1 kg, heating value, net 42.8 MJ, wet mass 1 kg
- electricity, medium voltage: 0.0190424, 0.379853, 0.12763, 0.00583144, 0.00116716, 0.000250615, 0.0392257 kWh (7 suppliers, which the file names only by identifier); sum of these 0.573 kWh; lognormal variance with pedigree 0.0033, pedigree (1,2,3,4,1)
  Average data from eight European producers of whitelined chip and thirty three carton converting facilities. Among these facilities, electricity inputs are distributed over the following countries with the respective shares: AT: 0.157; BE: 0.019; DE: 0.274; ES: 0.007; FR: 0.103; IT: 0.067; PL: 0.062; RO: 0.012; SI: 0.133; TR: 0.063; GB: 0.086; UA: 0.017. Since these facilities do not cover all European WLC production, the average European grid mix is applied here.
- ethylene vinyl acetate copolymer: 0.00125095 kg; lognormal variance with pedigree 0.0039, pedigree (2,2,3,4,1)
  Average data from eight European producers of whitelined chip, weighted according to production volumes: 0.000502kg of Polyvinyl acetate recorded in the caterogy of inputs for coatings, pigments and binders.
  Plus average data from thirty three carton converting facilities, weighted according to production volumes: Proxy for cold glue for box making (0.672729570509267 kg cold glue) and proxy for hot melt glue for box making (0.0761820098111169 kg hot melt glue)
  properties: carbon content, fossil 0.79734, dry mass 1 kg, heating value, net 35.99 MJ, wet mass 1 kg
- hard coal: 0.00334405, 0.000793519, 0.0236667, 0.00555809, 0.00341253, 0.00498559, 0.00737494, 0.00145121 kg (8 suppliers, which the file names only by identifier); sum of these 0.0505866 kg; lognormal variance with pedigree 0.0039, pedigree (2,2,3,4,1)
  (same comment as for calcium carbonate, precipitated)
  properties: carbon content, fossil 0.845, dry mass 0.94 kg, heating value, net 27.91 MJ, water content 0.0638298, wet mass 1 kg
  note on heating value, net: Based on the Characterization factor of Hard coal in the CED method
- hazardous waste, for incineration: -0.000136492 kg; name a_BP3
  Average data from eight European producers of whitelined chip, weighted according to production volumes. Reported as "disposed as hazardous" - not specified if landfill or incineration, so assumed all sent to incineration
  production volume; = a_BP3*PV_board
    (same comment as for ash from paper production sludge)
  properties: carbon content, fossil 0.554667, dry mass 0.75 kg, heating value, net 17 MJ, water content 0.333333, wet mass 1 kg
- hydrogen peroxide, without water, in 50% solution state: 0.00105994 kg; lognormal variance with pedigree 0.0039, pedigree (2,2,3,4,1)
  Average data from eight European producers of whitelined chip, weighted according to production volumes - H2O2, hydrogen peroxide recorded in the caterogy of inputs for Functional additives
  properties: dry mass 1 kg, heating value, net 7.13 MJ, wet mass 1 kg
- latex: 0.0146479 kg; lognormal variance with pedigree 0.0039, pedigree (2,2,3,4,1)
  (same comment as for calcium carbonate, precipitated)
  properties: carbon content, fossil 0.872983, dry mass 1 kg, heating value, net 26.45 MJ, wet mass 1 kg
- light fuel oil: 1.62302e-7, 1.7006e-5, 8.36365e-7, 1.68798e-6, 1.20617e-7, 1.12013e-7 kg (6 suppliers, which the file names only by identifier); sum of these 1.99253e-5 kg; lognormal variance with pedigree 0.0039, pedigree (2,2,3,4,1)
  (same comment as for calcium carbonate, precipitated)
  properties: carbon content, fossil 0.862, dry mass 1 kg, heating value, net 42.6 MJ, wet mass 1 kg
- maize starch: 0.00724343 kg; lognormal variance with pedigree 0.0039, pedigree (2,2,3,4,1)
  Average data from eight European producers of whitelined chip, weighted according to production volumes - 0.00603587926785819kg equates to input of corn starch; 0.00109218538kg equates to 50% of the input recorded as wheat starch; 0.00011536488kg equates to 50% of the input recorded as Modified starch (sizing agents)
  properties: carbon content, non-fossil 0.46, dry mass 0.86 kg, heating value, net 11.64 MJ, water content 0.162791, wet mass 1 kg
- municipal solid waste: -7.25214e-5, -8.6116e-6, -5.35964e-5, -0.0409165, -6.02606e-6, -1.93426e-6, -4.37195e-6, -0.000182006 kg (8 suppliers, which the file names only by identifier); sum of these -0.0412456 kg; lognormal variance with pedigree 0.0033, pedigree (3,2,1,4,1)
  Average data from eight European producers of whitelined chip, weighted according to production volumes. Reported as "rejects from recovered paper processing", which will be a mixture of items such as grit, glass, small plastics, staples, etc.
  production volume; = a_BP8*PV_board
    (same comment as for ash from paper production sludge)
  properties: carbon content, fossil 0.171549, carbon content, non-fossil 0.261655, dry mass 0.771 kg, heating value, net 11.74 MJ, water content 0.297017, wet mass 1 kg
- natural gas, high pressure: 0.00131465, 0.00221765, 0.00483737, 0.00161886, 0.000378322, 0.00225169, 0.00216067, 0.00568154, 0.00219345, 0.00339265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 m3 (37 suppliers, which the file names only by identifier); sum of these 0.170256 m3; lognormal variance with pedigree 0.0033, pedigree (1,2,3,4,1)
  Average data from eight European producers of whitelined chip and thirty three carton converting facilities, weighted according to production volumes
  properties: carbon content, fossil 0.602381, dry mass 0.84 kg, heating value, gross 40 MJ, heating value, net 36 MJ, wet mass 0.84 kg
  note on heating value, net: Literature value, Source: Christoph Meili;Niels Jungbluth;Maresa Bussa (2021) Life cycle inventories of crude oil and natural gas extraction. ESU-services Ltd. commissioned by BAFU & VSG, Schaffhausen, Switzerland, http://esu-services.ch/data/public-lci-reports/
- packaging film, low density polyethylene: 0.0011685 kg; lognormal variance with pedigree 0.0044, pedigree (2,3,3,4,1)
  Average data from thirty three carton converting facilities, weighted according to production volumes - plastic stretch/shrink film
  properties: carbon content, fossil 0.857143, dry mass 1 kg, heating value, net 42.47 MJ, wet mass 1 kg
- paper mill, integrated: 5.44e-11 unit; lognormal variance with pedigree 0.3966, pedigree (4,5,5,4,4)
  Own assumption
  Uncertainty: o
- potato starch: 0.0025097 kg; lognormal variance with pedigree 0.0039, pedigree (2,2,3,4,1)
  Average data from eight European producers of whitelined chip, weighted according to production volumes - 0.00130215222125654kg recorded as potato starch; 0.00109218538kg equates to 50% of the input recorded as wheat starch; 0.00011536488kg equates to 50% of the input recorded as Modified starch (sizing agents)
  properties: carbon content, non-fossil 0.46, dry mass 0.8 kg, heating value, net 10.66 MJ, water content 0.25, wet mass 1 kg
- printing ink, offset, without solvent, in 47.5% solution state: 0.00424714 kg; = 0.000799844721804066+0.00344729857465508; lognormal variance with pedigree 0.0044, pedigree (2,3,3,4,1)
  Average data from thirty three carton converting facilities, weighted according to production volumes - Flexo ink for printing (0.000799844721804066), plus off set ink for printing (0.00344729857465508)
  properties: carbon content, fossil 0.455266, carbon content, non-fossil 0.221773, dry mass 1 kg, heating value, net 20.51 MJ, wet mass 1 kg
- pulpwood, softwood, measured as solid wood under bark: 1.8e-5 m3; lognormal variance with pedigree 0.0039, pedigree (2,2,3,4,1)
  (same comment as for natural gas, high pressure)
  properties: carbon content, non-fossil 0.494, dry mass 511.364 kg, heating value, net 4483.78 MJ, water content 1.4, wet mass 1227.27 kg
  note on heating value, net: Value based on "softwood forestry, mixed species, sustainable forest management"The property is based on a value of 11.58MJ/kg
- rosin size, for paper production: 0.000935829 kg; lognormal variance with pedigree 0.0039, pedigree (2,2,3,4,1)
  Average data from eight European producers of whitelined chip, weighted according to production volumes - Rosin size (sizing agents) recorded in the caterogy of inputs for Functional additives
  properties: carbon content, non-fossil 0.515474, dry mass 1 kg, heating value, net 15.62 MJ, wet mass 1 kg
- sheet rolling, aluminium: 0.00146083 kg; lognormal variance with pedigree 0.0058, pedigree (3,3,3,4,1)
  Combined with the input of aluminium, primary, ingot, this is a proxy for aluminium printing plates for the litho printing process. A litho printing plate is a thin sheet of anodised fine grain hardened aluminium used in the printing industry. The photographically prepared (etched picture on to the aluminium) printing plate is treated chemically so the image will accept ink. This processing of the sheet usually occurs at the converting site, which will have its own prepress facility. The energy used in the prepress activity is captured in the energy data collected from the sites, but data on chemicals used etc., is not captured. However, it is anticipated that these will fall below the cur-off criteria defined in the data collection exercise.
- sludge from pulp and paper production: -0.0102391 kg; name a_BP4
  Average data from eight European producers of whitelined chip, weighted according to production volumes. . Consists of 0.00972963526049428kg of fibre (primary sludge) and 0.0102391190044191kg of biological treatment sludge
  production volume; = a_BP4*PV_board
    (same comment as for ash from paper production sludge)
  properties: carbon content, non-fossil 0.21, dry mass 0.75 kg, heating value, net 2.65 MJ, water content 0.333333, wet mass 1 kg
- sludge from pulp and paper production: -0.00146862 kg; name a_BP5
  Average data from eight European producers of whitelined chip, weighted according to production volumes, recorded as fibre (primary sludge)
  production volume; = a_BP5*PV_board
    (same comment as for ash from paper production sludge)
- sodium chlorate, powder: 1.7913e-6 kg; lognormal variance with pedigree 0.0039, pedigree (2,2,3,4,1)
  Average data from eight European producers of whitelined chip, weighted according to production volumes - NaClO3 recorded in the caterogy of inputs for Functional additives
  properties: dry mass 1 kg, wet mass 1 kg
- sodium hydroxide, without water, in 50% solution state: 0.000391023 kg; lognormal variance with pedigree 0.0039, pedigree (2,2,3,4,1)
  Average data from eight European producers of whitelined chip, weighted according to production volumes - NaOH recorded in the caterogy of inputs for Functional additives
  properties: dry mass 1 kg, heating value, net 3.03 MJ, wet mass 1 kg
- sodium sulfate, anhydrite: 0.000414278 kg; lognormal variance with pedigree 0.0039, pedigree (2,2,3,4,1)
  Average data from eight European producers of whitelined chip, weighted according to production volumes - Na2SO4 recorded in the caterogy of inputs for Functional additives
  properties: dry mass 1 kg, wet mass 1 kg
- sulfate pulp, bleached: 0.00149758 kg; lognormal variance with pedigree 0.0039, pedigree (2,2,3,4,1)
  (same comment as for calcium carbonate, precipitated)
  properties: carbon content, non-fossil 0.494, dry mass 0.9 kg, heating value, net 13.23 MJ, water content 0.111111, wet mass 1 kg
- sulfate pulp, unbleached: 1.82193e-5 kg; lognormal variance with pedigree 0.0039, pedigree (2,2,3,4,1)
  (same comment as for calcium carbonate, precipitated)
  properties: carbon content, non-fossil 0.494, dry mass 0.9 kg, heating value, net 13.23 MJ, water content 0.111111, wet mass 1 kg
- sulfur: 9.14376e-5 kg; lognormal variance with pedigree 0.0039, pedigree (2,2,3,4,1)
  Average data from eight European producers of whitelined chip, weighted according to production volumes - Sulfur recorded in the caterogy of inputs for Functional additives
  properties: dry mass 1 kg, wet mass 1 kg
- sulfuric acid: 2.06526e-6 kg; lognormal variance with pedigree 0.0039, pedigree (2,2,3,4,1)
  Average data from eight European producers of whitelined chip, weighted according to production volumes - H2SO4 recorded in the caterogy of inputs for Functional additives
  properties: dry mass 1 kg, wet mass 1 kg
- tap water: 0.000164459, 0.000250704, 0.000467802, 0.00126022, 0.000151697, 0.00632178, 0.0723433 kg (7 suppliers, which the file names only by identifier); sum of these 0.0809599 kg; lognormal variance with pedigree 0.0053, pedigree (3,2,3,4,1)
  (same comment as for calcium carbonate, precipitated)
  properties: carbon content, fossil 0.00178991, dry mass 0.000337476 kg, water content 2962.17, wet mass 1 kg
- thermo-mechanical pulp: 0.0290964 kg; lognormal variance with pedigree 0.0039, pedigree (2,2,3,4,1)
  Average data from eight European producers of whitelined chip, weighted according to production volumes
  Uncertainty: d
  properties: carbon content, non-fossil 0.494, dry mass 1 kg, heating value, net 14.97 MJ, wet mass 1 kg
- transport, freight train: 0.0567764, 0.0144005, 0.0519769, 0.0036465, 0.0717081 metric ton*km (5 suppliers, which the file names only by identifier); sum of these 0.198508 metric ton*km; lognormal variance with pedigree 0.2106, pedigree (5,5,3,4,4)
  Average transport from cartonboard mill to converting facility: Transport distance based on eurostat transport statistics for railway transport of goods. The transport data was extracted from the database leaf "Railway transport - goods transported, by group of goods - from 2008 onwards based on NST 2007 (1 000 t, million tkm) (rail_go_grpgood)" (http://ec.europa.eu/eurostat/data/database) on the 2018-06-01. The transport distance was calculated based on the total mass of goods transported and total payload-distance for the NST 2007 category "GT06 - Wood and products of wood and cork (except furniture); articles of straw and plaiting materials; pulp, paper and paper products; printed matter and recorded media" in the year 2016 for all countries for which data was available. The average distance of railway transport for goods in this category in 2016 was 328 km. The fraction of goods transported by rail (in terms of mass) relative to the total mass of goods transported by road, rail and inland waterways was 7.7% in 2016. Therefore, the average distance that goods travelled by rail in 2016 was 25 km. This value is assumed to be representative for Europe.
- transport, freight, inland waterways, barge: 0.0263818 metric ton*km; lognormal variance with pedigree 0.2106, pedigree (5,5,3,4,4)
  Average transport from cartonboard mill to converting facility: Transport distance based on eurostat transport statistics for transport of goods by inland waterways. The transport data was extracted from the database leaf "Transport by type of good (from 2007 onwards with NST2007) (iww_go_atygo)" (http://ec.europa.eu/eurostat/data/database) on the 2018-06-01. The transport distance was calculated based on the total mass of goods transported and total payload-distance for the NST 2007 category "GT06 - Wood and products of wood and cork (except furniture); articles of straw and plaiting materials; pulp, paper and paper products; printed matter and recorded media" in the year 2016 for the European Union (current composition). The average distance of transport by inland waterways for goods in this category in 2016 was 322 km. The fraction of goods transported by inland waterways (in terms of mass) relative to the total mass of goods transported by road, rail and inland waterways was 0.6% in 2016. Therefore, the average distance that goods travelled by inland waterways in 2016 was 2 km. This value is assumed to be representative for Europe.
- transport, freight, lorry, unspecified: 0.0504295, 0.00665158, 0.00104139 metric ton*km (3 suppliers, which the file names only by identifier); sum of these 0.0581224 metric ton*km; lognormal variance with pedigree 0.2106, pedigree (5,5,3,4,4)
  Average transport from cartonboard mill to converting facility: Transport distance based on eurostat transport statistics for road freight transport. The transport data was extracted from the database leaf "Annual road freight transport, by type of goods and type of transport [1 000 t, Mio Tkm], from 2008 onwards (road_go_ta_tg)" (http://ec.europa.eu/eurostat/data/database) on the 2018-06-01. The transport distance was calculated based on the total mass of goods transported and total payload-distance for the NST 2007 category "GT06 - Wood and products of wood and cork (except furniture); articles of straw and plaiting materials; pulp, paper and paper products; printed matter and recorded media" in the year 2016 for all countries for which data was available. The average distance of road transport for goods in this category in 2016 was 203 km. The fraction of goods transported by road (in terms of mass) relative to the total mass of goods transported by road, rail and inland waterways was 91.8% in 2016. Therefore, the average distance that goods travelled by road in 2016 was 187 km. This value is assumed to be representative for Europe.")
- waste mineral oil: -3.38805e-5 kg; name a_BP2
  Average data from eight European producers of whitelined chip, weighted according to production volumes. Represents 51% of the lubricant wastes generated, the remaining qunaitity is described as being used by other industries in the production of other products.
  production volume; = a_BP2*PV_board
    (same comment as for ash from paper production sludge)
  properties: carbon content, fossil 0.864444, dry mass 0.9 kg, heating value, net 34.7 MJ, water content 0.111111, wet mass 1 kg
- waste paper, sorted: 0.219485 kg; lognormal variance with pedigree 0.0039, pedigree (2,2,3,4,1)
  (same comment as for calcium carbonate, precipitated)
  properties: carbon content, non-fossil 0.448889, dry mass 0.9 kg, heating value, net 14.11 MJ, water content 0.111111, wet mass 1 kg
- waste paperboard, sorted: 0.778175 kg; lognormal variance with pedigree 0.0039, pedigree (2,2,3,4,1)
  (same comment as for calcium carbonate, precipitated)
  properties: carbon content, non-fossil 0.483259, dry mass 0.804 kg, heating value, net 15.92 MJ, water content 0.243781, wet mass 1 kg
- wood chips, wet, measured as dry mass: 8.22653e-5, 0.0363079 kg (2 suppliers, which the file names only by identifier); sum of these 0.0363902 kg; lognormal variance with pedigree 0.0039, pedigree (2,2,3,4,1)
  (same comment as for calcium carbonate, precipitated)
  properties: carbon content, non-fossil 0.494, dry mass 1 kg, heating value, net 10.84 MJ, water content 1.1, wet mass 2.1 kg
  note on heating value, net: Value based on the dataset 'softwood forestry, mixed species, sustainable forest management'

## Inputs from nature
- Water, lake [natural resource, in water]: 0.0110458 m3; lognormal variance with pedigree 0.0053, pedigree (3,2,3,4,1)
  (same comment as for calcium carbonate, precipitated)
- Water, well, in ground [natural resource, in water]: 0.00697287 m3; lognormal variance with pedigree 0.0053, pedigree (3,2,3,4,1)
  Average data from eight European producers of whitelined chip, weighted according to production volumes, includes Ground water fossil/non-renewable and Groundwater non fossil

## Emissions to nature
- Acetaldehyde [air, urban air close to ground]: 6.64e-9 kg; lognormal variance with pedigree 0.0986, pedigree (4,5,3,4,4)
  Calculated from fossil fuels consumed
- Acetic acid [air, urban air close to ground]: 9.96e-7 kg; lognormal variance with pedigree 0.0986, pedigree (4,5,3,4,4)
  Calculated from fossil fuels consumed
- Acetylene [air, urban air close to ground]: 8.16341e-7 kg; lognormal variance with pedigree 0.0986, pedigree (4,5,3,4,4)
  Calculated from fossil fuels consumed
- Aluminium III [air, urban air close to ground]: 1.74697e-5 kg; lognormal variance with pedigree 0.7086, pedigree (4,5,3,4,4)
  Calculated from fossil fuels consumed
- Ammonia [air, urban air close to ground]: 6.52564e-10 kg; lognormal variance with pedigree 0.0986, pedigree (4,5,3,4,4)
  Calculated from fossil fuels consumed
- Antimony ion [air, urban air close to ground]: 2.57964e-9 kg; lognormal variance with pedigree 0.0986, pedigree (4,5,3,4,4)
  Calculated from fossil fuels consumed
- Arsenic ion [air, urban air close to ground]: 4.13068e-8 kg; lognormal variance with pedigree 0.0986, pedigree (4,5,3,4,4)
  Calculated from fossil fuels consumed
- Barium II [air, urban air close to ground]: 2.05718e-7 kg; lognormal variance with pedigree 0.7086, pedigree (4,5,3,4,4)
  Calculated from fossil fuels consumed
- Benzene [air, urban air close to ground]: 3.47241e-6 kg; lognormal variance with pedigree 0.0986, pedigree (4,5,3,4,4)
  Calculated from fossil fuels consumed
- Benzo(a)pyrene [air, urban air close to ground]: 8.28486e-11 kg; lognormal variance with pedigree 0.0986, pedigree (4,5,3,4,4)
  Calculated from fossil fuels consumed
- Beryllium II [air, urban air close to ground]: 2.05718e-9 kg; lognormal variance with pedigree 0.7086, pedigree (4,5,3,4,4)
  Calculated from fossil fuels consumed
- Boron [air, urban air close to ground]: 7.73891e-7 kg; lognormal variance with pedigree 0.7086, pedigree (4,5,3,4,4)
  Calculated from fossil fuels consumed
- Bromine [air, urban air close to ground]: 1.54778e-8 kg; lognormal variance with pedigree 0.0986, pedigree (4,5,3,4,4)
  Calculated from fossil fuels consumed
- Butane [air, urban air close to ground]: 4.64937e-6 kg; lognormal variance with pedigree 0.3586, pedigree (4,5,3,4,4)
  Calculated from fossil fuels consumed
- Cadmium II [air, urban air close to ground]: 2.57964e-9 kg; lognormal variance with pedigree 0.7086, pedigree (4,5,3,4,4)
  Calculated from fossil fuels consumed
- Calcium II [air, urban air close to ground]: 2.05718e-6 kg; lognormal variance with pedigree 0.3586, pedigree (4,5,3,4,4)
  Calculated from fossil fuels consumed
- Carbon dioxide, fossil [air, urban air close to ground]: 0.50381 kg; lognormal variance with pedigree 0.0033, pedigree (1,2,3,4,1)
  (same comment as for calcium carbonate, precipitated)
- Carbon dioxide, non-fossil [air, urban air close to ground]: 0.00725716 kg; lognormal variance with pedigree 0.0053, pedigree (3,2,3,4,1)
  (same comment as for calcium carbonate, precipitated)
- Carbon monoxide, fossil [air, urban air close to ground]: 0.00017723 kg; lognormal variance with pedigree 0.7086, pedigree (4,5,3,4,4)
  Calculated from fossil fuels consumed
- Chromium III [air, urban air close to ground]: 3.67353e-8 kg; lognormal variance with pedigree 0.7086, pedigree (4,5,3,4,4)
  Calculated from fossil fuels consumed
- Chromium VI [air, urban air close to ground]: 4.53886e-9 kg; lognormal variance with pedigree 0.7086, pedigree (4,5,3,4,4)
  Calculated from fossil fuels consumed
- Cobalt II [air, urban air close to ground]: 5.15927e-9 kg; lognormal variance with pedigree 0.7086, pedigree (4,5,3,4,4)
  Calculated from fossil fuels consumed
- Copper ion [air, urban air close to ground]: 3.01478e-8 kg; lognormal variance with pedigree 0.7086, pedigree (4,5,3,4,4)
  Calculated from fossil fuels consumed
- Dinitrogen monoxide [air, urban air close to ground]: 2.29929e-6 kg; lognormal variance with pedigree 0.0986, pedigree (4,5,3,4,4)
  Calculated from fossil fuels consumed
- Dioxins, measured as 2,3,7,8-tetrachlorodibenzo-p-dioxin [air, urban air close to ground]: 3.28548e-14 kg; lognormal variance with pedigree 0.0986, pedigree (4,5,3,4,4)
  Calculated from fossil fuels consumed
- Ethane [air, urban air close to ground]: 2.44902e-6 kg; lognormal variance with pedigree 0.0986, pedigree (4,5,3,4,4)
  Calculated from fossil fuels consumed
- Ethylene [air, urban air close to ground]: 4.89805e-6 kg; lognormal variance with pedigree 0.7086, pedigree (4,5,3,4,4)
  Calculated from fossil fuels consumed
- Formaldehyde [air, urban air close to ground]: 7.9853e-7 kg; lognormal variance with pedigree 0.0986, pedigree (4,5,3,4,4)
  Calculated from fossil fuels consumed
- Hydrocarbons, aliphatic, alkanes, unspecified [air, urban air close to ground]: 8.18429e-7 kg; lognormal variance with pedigree 0.0986, pedigree (4,5,3,4,4)
  Calculated from fossil fuels consumed
- Hydrocarbons, aliphatic, unsaturated [air, urban air close to ground]: 8.16341e-7 kg; lognormal variance with pedigree 0.0986, pedigree (4,5,3,4,4)
  Calculated from fossil fuels consumed
- Hydrocarbons, aromatic [air, urban air close to ground]: 1.30513e-10 kg; lognormal variance with pedigree 0.0986, pedigree (4,5,3,4,4)
  Calculated from fossil fuels consumed
- Hydrochloric acid [air, urban air close to ground]: 6.6124e-5 kg; lognormal variance with pedigree 0.0986, pedigree (4,5,3,4,4)
  Calculated from fossil fuels consumed
- Hydrogen fluoride [air, urban air close to ground]: 2.05722e-6 kg; lognormal variance with pedigree 0.0986, pedigree (4,5,3,4,4)
  Calculated from fossil fuels consumed
- Iodine [air, urban air close to ground]: 1.86126e-8 kg; lognormal variance with pedigree 0.0986, pedigree (4,5,3,4,4)
  Calculated from fossil fuels consumed
- Iron ion [air, urban air close to ground]: 7.21645e-6 kg; lognormal variance with pedigree 0.7086, pedigree (4,5,3,4,4)
  Calculated from fossil fuels consumed
- Lead II [air, urban air close to ground]: 1.23757e-7 kg; lognormal variance with pedigree 0.7086, pedigree (4,5,3,4,4)
  Calculated from fossil fuels consumed
- Lead-210 [air, urban air close to ground]: 7.59197e-5 kBq; lognormal variance with pedigree 0.3586, pedigree (4,5,3,4,4)
  Calculated from fossil fuels consumed
- Magnesium [air, urban air close to ground]: 6.18786e-6 kg; lognormal variance with pedigree 0.7086, pedigree (4,5,3,4,4)
  Calculated from fossil fuels consumed
- Manganese II [air, urban air close to ground]: 3.60823e-8 kg; lognormal variance with pedigree 0.7086, pedigree (4,5,3,4,4)
  Calculated from fossil fuels consumed
- Mercury II [air, urban air close to ground]: 4.83819e-9 kg; lognormal variance with pedigree 0.7086, pedigree (4,5,3,4,4)
  Calculated from fossil fuels consumed
- Methane, fossil [air, urban air close to ground]: 2.96112e-5 kg; lognormal variance with pedigree 0.0986, pedigree (4,5,3,4,4)
  Calculated from fossil fuels consumed
- Molybdenum VI [air, urban air close to ground]: 7.73891e-9 kg; lognormal variance with pedigree 0.7086, pedigree (4,5,3,4,4)
  Calculated from fossil fuels consumed
- NMVOC, non-methane volatile organic compounds [air, urban air close to ground]: 2.80821e-6 kg; lognormal variance with pedigree 0.0986, pedigree (4,5,3,4,4)
  Calculated from fossil fuels consumed
- Nickel II [air, urban air close to ground]: 3.1021e-8 kg; lognormal variance with pedigree 0.7086, pedigree (4,5,3,4,4)
  Calculated from fossil fuels consumed
- Nitrogen oxides [air, urban air close to ground]: 0.000291749 kg; lognormal variance with pedigree 0.0433, pedigree (2,2,3,4,1)
  Average data from eight European producers of whitelined chip and calculated data (from fuel consumption) for thirty three carton converting facilities, weighted according to production volumes, NOx
- PAH, polycyclic aromatic hydrocarbons [air, urban air close to ground]: 6.64025e-8 kg; lognormal variance with pedigree 0.3586, pedigree (4,5,3,4,4)
  Calculated from fossil fuels consumed
- Particulate Matter, < 2.5 um [air, urban air close to ground]: 3.39821e-5 kg; lognormal variance with pedigree 0.1786, pedigree (4,5,3,4,4)
  Calculated from fossil fuels consumed
- Particulate Matter, > 10 um [air, urban air close to ground]: 1.63268e-5 kg; lognormal variance with pedigree 0.0986, pedigree (4,5,3,4,4)
  Calculated from fossil fuels consumed
- Particulate Matter, > 2.5 um and < 10um [air, urban air close to ground]: 1.70211e-5 kg; lognormal variance with pedigree 0.0433, pedigree (2,2,3,4,1)
  Average data from eight European producers of whitelined chip, weighted according to production volumes, recorded as Dust (unspecified)
- Pentane [air, urban air close to ground]: 7.96891e-6 kg; lognormal variance with pedigree 0.0986, pedigree (4,5,3,4,4)
  Calculated from fossil fuels consumed
- Phosphorus [air, urban air close to ground]: 1.03185e-7 kg; lognormal variance with pedigree 0.0986, pedigree (4,5,3,4,4)
  Calculated from fossil fuels consumed
- Polonium-210 [air, urban air close to ground]: 0.000138778 kBq; lognormal variance with pedigree 0.3586, pedigree (4,5,3,4,4)
  Calculated from fossil fuels consumed
- Potassium I [air, urban air close to ground]: 2.05718e-6 kg; lognormal variance with pedigree 0.7086, pedigree (4,5,3,4,4)
  Calculated from fossil fuels consumed
- Potassium-40 [air, urban air close to ground]: 2.20412e-5 kBq; lognormal variance with pedigree 0.3586, pedigree (4,5,3,4,4)
  Calculated from fossil fuels consumed
- Propane [air, urban air close to ground]: 2.96077e-6 kg; lognormal variance with pedigree 0.0986, pedigree (4,5,3,4,4)
  Calculated from fossil fuels consumed
- Propionic acid [air, urban air close to ground]: 1.328e-7 kg; lognormal variance with pedigree 0.0986, pedigree (4,5,3,4,4)
  Calculated from fossil fuels consumed
- Propylene [air, urban air close to ground]: 8.16341e-7 kg; lognormal variance with pedigree 0.0986, pedigree (4,5,3,4,4)
  Calculated from fossil fuels consumed
- Radium-226 [air, urban air close to ground]: 1.95922e-5 kBq; lognormal variance with pedigree 0.3586, pedigree (4,5,3,4,4)
  Calculated from fossil fuels consumed
- Radium-228 [air, urban air close to ground]: 0.000106124 kBq; lognormal variance with pedigree 0.3586, pedigree (4,5,3,4,4)
  Calculated from fossil fuels consumed
- Radon-220 [air, urban air close to ground]: 1.63268e-6 kBq; lognormal variance with pedigree 0.3586, pedigree (4,5,3,4,4)
  Calculated from fossil fuels consumed
- Radon-222 [air, urban air close to ground]: 1.63268e-6 kBq; lognormal variance with pedigree 0.3586, pedigree (4,5,3,4,4)
  Calculated from fossil fuels consumed
- Scandium [air, urban air close to ground]: 2.05718e-9 kg; lognormal variance with pedigree 0.7086, pedigree (4,5,3,4,4)
  Calculated from fossil fuels consumed
- Selenium IV [air, urban air close to ground]: 1.54778e-8 kg; lognormal variance with pedigree 0.7086, pedigree (4,5,3,4,4)
  Calculated from fossil fuels consumed
- Silicon [air, urban air close to ground]: 2.57964e-5 kg; lognormal variance with pedigree 0.7086, pedigree (4,5,3,4,4)
  Calculated from fossil fuels consumed
- Sodium I [air, urban air close to ground]: 1.03185e-6 kg; lognormal variance with pedigree 0.7086, pedigree (4,5,3,4,4)
  Calculated from fossil fuels consumed
- Strontium II [air, urban air close to ground]: 3.1021e-7 kg; lognormal variance with pedigree 0.7086, pedigree (4,5,3,4,4)
  Calculated from fossil fuels consumed
- Sulfur dioxide [air, urban air close to ground]: 0.000141252 kg; lognormal variance with pedigree 0.0039, pedigree (2,2,3,4,1)
  Average data from eight European producers of whitelined chip and calculated data (from fuel consumption) for thirty three carton converting facilities, weighted according to production volumes, SOx (as SO2)
- Thallium I [air, urban air close to ground]: 2.57964e-9 kg; lognormal variance with pedigree 0.7086, pedigree (4,5,3,4,4)
  Calculated from fossil fuels consumed
- Thorium [air, urban air close to ground]: 3.1021e-9 kg; lognormal variance with pedigree 0.7086, pedigree (4,5,3,4,4)
  Calculated from fossil fuels consumed
- Thorium-228 [air, urban air close to ground]: 8.97975e-6 kBq; lognormal variance with pedigree 0.3586, pedigree (4,5,3,4,4)
  Calculated from fossil fuels consumed
- Thorium-232 [air, urban air close to ground]: 5.71439e-6 kBq; lognormal variance with pedigree 0.3586, pedigree (4,5,3,4,4)
  Calculated from fossil fuels consumed
- Tin ion [air, urban air close to ground]: 1.03185e-9 kg; lognormal variance with pedigree 0.7086, pedigree (4,5,3,4,4)
  Calculated from fossil fuels consumed
- Titanium ion [air, urban air close to ground]: 6.18786e-7 kg; lognormal variance with pedigree 0.7086, pedigree (4,5,3,4,4)
  Calculated from fossil fuels consumed
- Toluene [air, urban air close to ground]: 1.4914e-6 kg; lognormal variance with pedigree 0.0986, pedigree (4,5,3,4,4)
  Calculated from fossil fuels consumed
- Uranium [air, urban air close to ground]: 4.13068e-9 kg; lognormal variance with pedigree 0.7086, pedigree (4,5,3,4,4)
  Calculated from fossil fuels consumed
- Uranium-238 [air, urban air close to ground]: 1.63268e-5 kBq; lognormal variance with pedigree 0.3586, pedigree (4,5,3,4,4)
  Calculated from fossil fuels consumed
- Vanadium V [air, urban air close to ground]: 6.18786e-8 kg; lognormal variance with pedigree 0.7086, pedigree (4,5,3,4,4)
  Calculated from fossil fuels consumed
- Water [air, urban air close to ground]: 0.00275 m3; lognormal variance with pedigree 0.0641, pedigree (4,5,4,3,1)
- Xylenes, unspecified [air, urban air close to ground]: 1.63268e-7 kg; lognormal variance with pedigree 0.0986, pedigree (4,5,3,4,4)
  Calculated from fossil fuels consumed
- Zinc II [air, urban air close to ground]: 8.20458e-9 kg; lognormal variance with pedigree 0.7086, pedigree (4,5,3,4,4)
  Calculated from fossil fuels consumed
- AOX, Adsorbable Organic Halides [water, surface water]: 5.02202e-7 kg; lognormal variance with pedigree 0.0447, pedigree (3,2,3,4,1)
  Average data from eight European producers of whitelined chip, weighted according to production volumes, AOX as Cl-
- BOD5, Biological Oxygen Demand [water, surface water]: 0.000116765 kg; lognormal variance with pedigree 0.0447, pedigree (3,2,3,4,1)
  Average data from eight European producers of whitelined chip, weighted according to production volumes, Biological Oxygen Demand (BOD 5)
- COD, Chemical Oxygen Demand [water, surface water]: 0.00078257 kg; lognormal variance with pedigree 0.0447, pedigree (3,2,3,4,1)
  Average data from eight European producers of whitelined chip, weighted according to production volumes, Chemical Oxygen Demand (CODCr)
- DOC, Dissolved Organic Carbon [water, surface water]: 0.000304232 kg; = a_TOC; lognormal variance with pedigree 0.0447, pedigree (3,2,3,4,1)
  Assumed equal to TOC.
- Nitrogen [water, surface water]: 2.95169e-5 kg; lognormal variance with pedigree 0.0447, pedigree (3,2,3,4,1)
  Average data from eight European producers of whitelined chip, weighted according to production volumes. Total nitrogen
- Phosphorus [water, surface water]: 3.67586e-6 kg; lognormal variance with pedigree 0.0447, pedigree (3,2,3,4,1)
  Average data from eight European producers of whitelined chip, weighted according to production volumes, Total Phosphorus
- Suspended solids, unspecified [water, surface water]: 6.03708e-5 kg; lognormal variance with pedigree 0.0447, pedigree (3,2,3,4,1)
  Average data from eight European producers of whitelined chip, weighted according to production volumes, Total suspended solids
- TOC, Total Organic Carbon [water, surface water]: 0.000304232 kg; name a_TOC; lognormal variance with pedigree 0.0447, pedigree (3,2,3,4,1)
  (same comment as for calcium carbonate, precipitated)
- Water [water, surface water]: 0.0159 m3; lognormal variance with pedigree 0.0053, pedigree (3,2,3,4,1)
  Average data from eight European producers of whitelined chip, weighted according to production volumes, recorded as thermally polluted only

## Sampling procedure
Data were collected from the producers by Pro Carton and ECMA for their European Environmental Database for Cartonboard and Carton Manufacturing and reviewed by the Institut für Energie- und Umweltforschung Heidelberg (ifeu). The data for the production of WLC were collected from mills, which together represent about 52% of the total yearly production of WLC in Europe. Annual productoin of WLC in Europe for 2017 was apprxoimately 2 010 000 tonnes. Data were provided by mills in Austria, Italy, Germany and Slovenia. Each mill produces between 80 000 - 320 000 tonnes of net saleable paper. Carton converting data were provided by factories in Austria, Belgium, France, Germany, Poland, Romania, Spain, Turkey, Ukraine, and the United Kingdom representing over 380 000 tonnes of production of converted cartons, or about 5% of European converting oprations by volume. They varied in size producing between 1 000 and 50 000 tonnes of finished cartons ready for shipment.

## Extrapolations
Additional air emissions from the combustion of fossil fuels estimated based on industrial heating datasets from the ecoinvent database and matched as follows: light fuel oil: heat production, light fuel oil, at industrial furnace 1MW, Europe without Switzerland heavy fuel oil: heat production, heavy fuel oil, at industrial furnace 1MW, Europe without Switzerland hard coal: heat production, at hard coal industrial furnace 1-10MW, Europe without Switzerland natural gas: heat production, natural gas, at industrial furnace >100kW, Europe without Switzerland lignite briquettes and peat: heat production, lignite briquette, at stove 5-15kW, Europe without Switzerland wood chips: heat production, wood chips from industry, at furnace 1000kW, CH
