# polyvinylchloride production, emulsion polymerisation

Dataset: EcoSpold 2, unit process
Geography: RoW
Time period: 2013-01-01 to 2023-12-31
Technology level: current
Classification: ISIC rev.4 ecoinvent: 2013:Manufacture of plastics and synthetic rubber in primary forms
Synonyms: E-PVC
Scenario: Business-as-Usual
System model: Allocation, cut-off by classification
Generated by: Thomas Fröhlich
Published in: PlasticsEurope 2016
Database: ecoinvent
isCopyrightProtected: true
accessRestrictedTo: 1

## General comment
The dataset represents the production mix of commercial E-PVC production technologies
Polyvinyl chloride (PVC) is manufactured by polymerisation of vinyl chloride monomer (VCM). Polymerisation of PVC is an exothermic reaction. The pressure in the reactor is usually in the range of 0.4 - 1.2 MPa and the reaction temperature is between 35 - 70°C. During the polymerisation reaction 85 - 97% of the VCM is converted into PVC. Residual VCM is removed by stripping the polymer suspension or latex. The unreacted monomer is recovered, liquefied, and returned to polymerisation
For the polymerisation process certain process chemicals are required. Surfactants, emulsifiers and protective colloids are used to prepare and stabilize the dispersion of monomer and PVC in process water (typically around 1 kg/t VCM in suspension and around 10-20 kg/t in emulsion). Organic peroxides or peresters are used as initiators (typically < 1 kg/t VCM) for the production of suspension and microsuspension PVC, while e.g. hindered phenols are used to stop the reaction (typically < 1 kg/t VCM). For the production of emulsion PVC inorganic peroxides are common.
The mean particle size of E-PVC, polyvinyl chloride polymerised in emulsion process, is about 0.1 - 3 μm. E-PVC is mainly manufactured via one of three polymerisation processes: batch emulsion, continuous emulsion and microsuspension. Depending on the process used, the mean particle size of the E-PVC can be adjusted, affecting the product properties and application possibilities. Regarding paste or plastisol polymer properties, e.g., the PVC particle size distribution achieved during the polymerisation process will largely determine the rheology of the plastisol, when the polymer is redispersed in plasticiser. In the batch emulsion process, the emulsifier used is usually a sodium alkyl, aryl sulphonate, or alkyl sulphate. The polymerisation takes place in the VCM-water boundary layer, supported by a water-soluble initiator such as alkali metal persulphate. A redox system involving traces of copper and a reduction agent is often used. This reaction system produces small and narrow width unimodal PVC particles (approximately 0.2 mu m). Using seed particles allows them to grow while new particles are forming simultaneously, resulting in a bimodal particle size distribution.

## Included activities start
Acitivity starts with monomers entering the polymerisation plant. Energy supply is included in terms of heat production inside the battery limits of the plant. Steam and electricity supply is outside the activity.

## Included activities end
Activity ends with polymer granulate leaving the factory.

## Allocation
The PVC production itself is regarded as a single-output process since only one polymer type is produced by one installation. All other products of this installation, e.g. monomers being recycled internally, or hydrocarbons being used thermally, are treated as internal flows replacing the respective input materials (i.e. monomers or energy carriers). Hence, no allocation is needed for the PVC production process.

## Geography
Extrapolated from dataset with data for EU27 including Norway and Switzerland. The production volume and uncertainty have been adjusted accordingly.

## Time period
Data was collected for the year 2013, processed in 2014 and published in 2015

## Reference product
- polyvinylchloride, emulsion polymerised: 1 kg; By-product classification allocatable product; CPC 34730: Polymers of vinyl chloride or other halogenated olefins, in primary forms; HS2017 3920: Plastics; plates, sheets, film, foil and strip (not self-adhesive); non-cellular and not reinforced, laminate[...]; CAS 9002-86-2
  Reference Product
  production volume 3.35404e9 kg; name RP_PV
    According to Plastics Europe, Global production volume of plastics in 2013 was 299 Mt. It is assumed that the global production share (of the total plastic production) of polyvinylchloride trhough emulsion polymerisation is equal to the respective European production share, which is 2 % of the total plastics production in Europe.
    Source: PlasticsEurope, 2013, Plastics - The Facts 2013, accessed online at: https://www.plasticseurope.org/en/resources/market-data on 11th of July 2018
  properties: carbon allocation 0.387097 kg, carbon content 0.387097, carbon content, fossil 0.387097, carbon content, non-fossil 0, dry mass 1 kg, heating value, net 21.5 MJ, price 1.29 EUR2005, water content 0, water in wet mass 0 kg, wet mass 1 kg

## Inputs from technosphere
- ammonia, anhydrous, liquid: 1.76864e-5, 3.43329e-5, 0.000380558, 1.60864e-5, 3.59846e-6, 0.00013225, 1.13685e-5, 3.5043e-5 kg (8 suppliers, which the file names only by identifier); sum of these 0.000630924 kg; lognormal variance with pedigree 0.0212, pedigree (3,3,4,5,3)
  Weighted average of reported input
  properties: dry mass 1 kg, wet mass 1 kg
- chemical factory, organics: 4e-10 unit; lognormal variance with pedigree 0.3118, pedigree (2,3,3,4,3)
  Calculated based on literature data published by the industry. For this activity, no information was readily available concerning infrastructure and land-use. Therefore, the infrastructure is estimated based on data from two chemical factories, the BASF site of Ludwigshafen and the chemical factory in Gendorf (which are both located in Germany), which produce a wide range of chemical substances. Based on this data, the following assumptions are made: the built area amounts to about 4.2 ha, the plant has an average output of 50"000 t/a and a lifespan of fifty years. The estimated infrastructure amount is therefore 4.00 E-10 units per kg of produced chemical.
  References:
  Althaus H.-J., Chudacoff M., Hischier R., Jungbluth N., Osses M. and Primas A. (2007) Life Cycle Inventories of Chemicals. ecoinvent report No. 8, v2.0. EMPA Dübendorf, Swiss Centre for Life Cycle Inventories, Dübendorf, CH.
  Gendorf (2000) Umwelterklärung 2000, Werk Gendorf. Werk Gendorf, Burgkirchen.
- chemical, inorganic: 0.000976958 kg; lognormal variance with pedigree 0.0212, pedigree (3,3,4,5,3)
  Sum input parameter covering partly confidential information on additives, solvents, catalysts. Weighted average of reported input materials.
  properties: carbon content, fossil 0.003, dry mass 1 kg, wet mass 1 kg
  note on carbon content, fossil: This dataset is an unweighted average of 20 inorganic substances (listed in Tab 88.1, ecoinvent v2.2 report 8, part II), being part of the top100 chemicals included in this database. The C-content has also been calculated as an unweighted average of the C content of the substances composing this dataset.
- chemical, organic: 0.021862 kg; lognormal variance with pedigree 0.0212, pedigree (3,3,4,5,3)
  (same comment as for chemical, inorganic)
  properties: carbon content, fossil 0.628, dry mass 1 kg, heating value, net 19.03 MJ, wet mass 1 kg
  note on carbon content, fossil: This dataset is an unweighted average of 20 organic substances (listed in Tab 88.1, ecoinvent v2.2 report 8, part II), being part of the top100 chemicals included in this database. The C-content has also been calculated as an unweighted average of the C content of the substances composing this dataset.
- compressed air, 600 kPa gauge: 0.924836 m3; lognormal variance with pedigree 0.0212, pedigree (3,3,4,5,3)
  Weighted average of reported input
- electricity, medium voltage: 0.00992934, 0.198068, 0.0665503, 0.0030407, 0.000608594, 0.000130679, 0.0204536 kWh (7 suppliers, which the file names only by identifier); sum of these 0.298781 kWh; lognormal variance with pedigree 0.0212, pedigree (3,3,4,5,3)
  Weighted average of reported input
- hazardous waste, for incineration: -0.000207084 kg; name BP_amount3; lognormal variance with pedigree 0.0134, pedigree (3,3,2,5,3)
  Weighted average of reported waste
  production volume; = BP_amount3*RP_PV
    calculated with production volume of reference product
  properties: carbon content, fossil 0.554667, dry mass 0.75 kg, heating value, net 17 MJ, water content 0.333333, wet mass 1 kg
  note on carbon content, fossil: Tab A.6, ecoinvent v2.2 report 13_I. C content has been calculated after data in the tables, and then referred to 1 kg DM
  note on heating value, net: Value taken from the general comment of the treatment dataset.
- heat, from steam, in chemical industry: 3.98134 MJ; lognormal variance with pedigree 0.0212, pedigree (3,3,4,5,3)
  Weighted average of reported input
  properties: heating value, net 1 MJ
- inert waste: -1.02592e-5 kg; name BP_amount1; lognormal variance with pedigree 0.0134, pedigree (3,3,2,5,3)
  Weighted average of reported waste
  production volume; = BP_amount1*RP_PV
    calculated with production volume of reference product
  properties: dry mass 1 kg, wet mass 1 kg
- municipal solid waste: -3.25908e-6, -3.87001e-7, -2.4086e-6, -0.00183877, -2.70808e-7, -8.69246e-8, -1.96473e-7, -8.17924e-6 kg (8 suppliers, which the file names only by identifier); sum of these -0.00185356 kg; lognormal variance with pedigree 0.0134, pedigree (3,3,2,5,3)
  Weighted average of reported waste
  production volume; = BP_amount5*RP_PV
    calculated with production volume of reference product
  properties: carbon content, fossil 0.171549, carbon content, non-fossil 0.261655, dry mass 0.771 kg, heating value, net 11.74 MJ, water content 0.297017, wet mass 1 kg
  note on carbon content, fossil: MSW composition in tab 4.1, ecoinvent v2.2 report 13_I. C content referred to 1 kg DM
- natural gas, high pressure: 0.000270952, 0.000457063, 0.000996994, 0.000333652, 7.79731e-5, 0.00046408, 0.00044532, 0.00117098, 0.000452076, 0.000699234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 m3 (37 suppliers, which the file names only by identifier); sum of these 0.0350903 m3; lognormal variance with pedigree 0.0212, pedigree (3,3,4,5,3)
  Weighted average of reported input
  properties: carbon content, fossil 0.695187, dry mass 1 kg, heating value, net 36 MJ, wet mass 1 kg
  note on heating value, net: Literature value, Source: Christoph Meili;Niels Jungbluth;Maresa Bussa (2021) Life cycle inventories of crude oil and natural gas extraction. ESU-services Ltd. commissioned by BAFU & VSG, Schaffhausen, Switzerland, http://esu-services.ch/data/public-lci-reports/
- nitrogen, liquid: 0.00520833 kg; lognormal variance with pedigree 0.0212, pedigree (3,3,4,5,3)
  Weighted average of reported input
  properties: dry mass 1 kg, wet mass 1 kg
- sodium hydroxide, without water, in 50% solution state: 0.000421536 kg; lognormal variance with pedigree 0.0212, pedigree (3,3,4,5,3)
  Weighted average of reported input
  properties: dry mass 1 kg, heating value, net 3.03 MJ, wet mass 1 kg
- spent solvent mixture: -5.74576e-5 kg; name BP_amount2; lognormal variance with pedigree 0.0134, pedigree (3,3,2,5,3)
  Weighted average of reported waste
  production volume; = BP_amount2*RP_PV
    calculated with production volume of reference product
  properties: carbon content, fossil 0.571257, dry mass 0.835 kg, heating value, net 21.7 MJ, water content 0.197605, wet mass 1 kg
  note on carbon content, fossil: Tab A.7, ecoinvent v2.2 report 13_I. C content has been calculated after data in the tables, and then referred to 1 kg DM
- vinyl chloride: 1.0017 kg; lognormal variance with pedigree 0.0212, pedigree (3,3,4,5,3)
  Weighted average of reported input
  properties: carbon content, fossil 0.387097, dry mass 1 kg, heating value, net 17.46 MJ, wet mass 1 kg
- waste plastic, mixture: -2.65906e-7, -2.52503e-7, -0.000992307, -9.63516e-6, -6.43784e-7, -1.07423e-7, -4.86884e-8 kg (7 suppliers, which the file names only by identifier); sum of these -0.00100326 kg; lognormal variance with pedigree 0.0134, pedigree (3,3,2,5,3)
  Weighted average of reported waste
  production volume; = BP_amount4*RP_PV
    calculated with production volume of reference product
  properties: carbon content, fossil 0.747344, dry mass 0.847 kg, heating value, net 30.79 MJ, water content 0.180638, wet mass 1 kg
- wastewater, average: -0.00264097, -9.40285e-6 m3 (2 suppliers, which the file names only by identifier); sum of these -0.00265037 m3; lognormal variance with pedigree 0.0134, pedigree (3,3,2,5,3)
  Weighted average of reported waste
  production volume; = BP_amount6*RP_PV
    calculated with production volume of reference product
  properties: carbon content, non-fossil 0.194039, dry mass 0.346837 kg, water content 2882.2, wet mass 1000 kg
  note on carbon content, non-fossil: 0.0673 kg TOC/m3 (Tab A.17, ecoinvent v2.2 report 13_I). TOC was considered as Total Carbon.
- wastewater, unpolluted: -0.0210706 m3; name BP_amount7; lognormal variance with pedigree 0.0134, pedigree (3,3,2,5,3)
  Weighted average of reported waste
  production volume; = BP_amount7*RP_PV
    calculated with production volume of reference product
  properties: carbon content, fossil 0.00178991, carbon content, non-fossil 0.00178991, dry mass 0.337476 kg, water content 2962.17, wet mass 1000 kg
  note on carbon content, fossil: Assumed to be like in tap water. Bicarbonate content is 2.93 mol/m3. CO2 content is 0.1 mol/m3 (ecoinvent v2.2 report 8, Tab 93.1).

## Inputs from nature
- Water, cooling, unspecified natural origin [natural resource, in water]: 0.0260682 m3; lognormal variance with pedigree 0.0212, pedigree (3,3,4,5,3)
  Weighted average of reported input
- Water, lake [natural resource, in water]: 0.000454711 m3; lognormal variance with pedigree 0.0212, pedigree (3,3,4,5,3)
  Weighted average of reported input
- Water, river [natural resource, in water]: 0.00014884 m3; lognormal variance with pedigree 0.0212, pedigree (3,3,4,5,3)
  Weighted average of reported input
- Water, well, in ground [natural resource, in water]: 0.00196248 m3; lognormal variance with pedigree 0.0212, pedigree (3,3,4,5,3)
  Weighted average of reported input

## Emissions to nature
- Ammonia [air, unspecified]: 0.000360878 kg; lognormal variance with pedigree 0.0606, pedigree (3,3,4,5,3)
  Weighted average of reported emissions
- Carbon dioxide, fossil [air, unspecified]: 0.0983466 kg; lognormal variance with pedigree 0.0212, pedigree (3,3,4,5,3)
  Weighted average of reported emissions
- Carbon monoxide, fossil [air, unspecified]: 0.000115635 kg; lognormal variance with pedigree 0.6706, pedigree (3,3,4,5,3)
  Weighted average of reported emissions
- Methane, fossil [air, unspecified]: 2.05425e-6 kg; lognormal variance with pedigree 0.0606, pedigree (3,3,4,5,3)
  Weighted average of reported emissions
- NMVOC, non-methane volatile organic compounds [air, unspecified]: 0.000106572 kg; lognormal variance with pedigree 0.0606, pedigree (3,3,4,5,3)
  Weighted average of reported emissions
- Nitrogen oxides [air, unspecified]: 0.000158827 kg; lognormal variance with pedigree 0.0606, pedigree (3,3,4,5,3)
  Weighted average of reported emissions
- Particulate Matter, < 2.5 um [air, unspecified]: 6.00351e-6 kg; lognormal variance with pedigree 0.3206, pedigree (3,3,4,5,3)
  Weighted average of reported emissions
- Particulate Matter, > 10 um [air, unspecified]: 0.000108481 kg; lognormal variance with pedigree 0.0606, pedigree (3,3,4,5,3)
  Weighted average of reported emissions
- Particulate Matter, > 2.5 um and < 10um [air, unspecified]: 2.09311e-5 kg; lognormal variance with pedigree 0.1406, pedigree (3,3,4,5,3)
  Weighted average of reported emissions
- Sulfur dioxide [air, unspecified]: 9.02842e-6 kg; lognormal variance with pedigree 0.0212, pedigree (3,3,4,5,3)
  Weighted average of reported emissions
- Vinyl chloride [air, unspecified]: 0.000291422 kg; lognormal variance with pedigree 0.1406, pedigree (3,3,4,5,3)
  Weighted average of reported emissions
- Water [air, unspecified]: 0.00491319 m3; lognormal variance with pedigree 0.0212, pedigree (3,3,4,5,3)
  Calculated to close water balance
- AOX, Adsorbable Organic Halides [water, unspecified]: 4.36281e-6 kg; lognormal variance with pedigree 0.0606, pedigree (3,3,4,5,3)
  Weighted average of reported emissions
- Chloride [water, unspecified]: 0.000133606 kg; lognormal variance with pedigree 0.0606, pedigree (3,3,4,5,3)
  Weighted average of reported emissions
- Nitrogen, organic bound [water, unspecified]: 6.62177e-6 kg; lognormal variance with pedigree 0.0606, pedigree (3,3,4,5,3)
  Weighted average of reported emissions
- Phosphorus [water, unspecified]: 6.93844e-8 kg; lognormal variance with pedigree 0.0606, pedigree (3,3,4,5,3)
  Weighted average of reported emissions
- Sulfate [water, unspecified]: 2.42014e-5 kg; lognormal variance with pedigree 0.0606, pedigree (3,3,4,5,3)
  Weighted average of reported emissions
- Suspended solids, unspecified [water, unspecified]: 2.16742e-5 kg; lognormal variance with pedigree 0.0606, pedigree (3,3,4,5,3)
  Weighted average of reported emissions
- Vinyl chloride [water, unspecified]: 1.69365e-7 kg; lognormal variance with pedigree 0.3206, pedigree (3,3,4,5,3)
  Weighted average of reported emissions

## Sampling procedure
Extrapolated from European data. Questionnaires sent out to all production units in Europe operated by PlasticEurope/ECVM member companies.

## Extrapolations
This dataset has been created as a copy of the original dataset covering the geography RER, i.e., Europe. Annual production volume(s) and uncertainty have been adjusted accordingly. It is important to note that original RER dataset represents the average production mix, composed of several different processes/technologies, in Europe in the year of reference. It might not reflect the actual global production mix and should hence only be used as a proxy.
