# folding boxboard carton production

Dataset: EcoSpold 2, unit process
Geography: RoW
Time period: 2017-01-01 to 2023-12-31
Technology level: current
Classification: ISIC rev.4 ecoinvent: 1701:Manufacture of pulp, paper and paperboard
Synonyms: FBB, cartonboard
Scenario: Business-as-Usual
System model: Allocation, cut-off by classification
Share of production covered: 71 %
Generated by: Johannes Müller
Database: ecoinvent
isCopyrightProtected: true
accessRestrictedTo: 1

## General comment
This dataset is a copy of the respective European dataset. It is an aggregated process which includes the production of Folding Box Board, transport of the board to converting sites and converting of the board (printing, cutting, creasing) into blank boxes ready for delivery. Folding Box Board FBB (also known as GC and UC) is a packaging grade of board used to manufacture cartons. It is typically made using predominantly virgin fibres, but may incoroprate some recovered fibres. This grade is typically made of mechanical pulp sandwiched between two layers of chemical pulp with up to three layers of coating on the top or printing surface and one layer of coating or sizing on the reverse. The manufacture of Folding Box Board, FBB, is to a large degree integrated but usually the required chemical pulp is purchased. Typical uses include pharmaceuticals, confectionery, frozen and chilled foods. The board is converted into a carton at a converting site which typically includes a printing process and cutting/creasing of the board into carton blanks, ready for delivery to and erection by the packer/filler.
Data for the production of FBB and conversion of the FBB into cartons were provided by the European industry associations for cartonboard producers (Pro Carton) and convertors (ECMA European Carton Makers Association).
BOARD PRODUCTION: The data for the production of FBB were collected from ten European mills, together producing about 71% of the total annual production of FBB in Europe in 2017 (which is estimated at approximately 2 900 000 tonnes net saleable product. The mills contributing with data are located in Finland, Germany, Netherlands, Sweden, Slovenia and United Kingdom. The mills have a production volume of between 90 000 – 375 000 tonnes net saleable paper product . The data is collated by Pro Carton in their internal report "European Environmental Database for Cartonboard and Carton Production", which is not made publicly available.
CARTON CONVERTING: The carton converting data were collected from 33 European factories together representing the production of over 380 000 tonnes cartons. hese convertors were located in Austria, Belgium, France, Germany, Poland, Romania, Spain, Turkey, Ukraine, and the United Kingdom. They varied in size producing between 1 000 and 50 000 tonnes of finished cartons ready for shipment.
[This dataset is meant to replace the following datasets:
- folding boxboard carton production, GLO, 2018 - 2018]

## Included activities start
The process starts with the reception of wood, wood chips, recovered paper and/or market pulp at the papermill.

## Included activities end
This module includes the European production of folding box board (FBB) in a papermill and conversion of the board into printed, cut and creased cartons ready for delivery to the packer/filler. Transport of the board between the mill and the converting operation is included. For the board production, wood handling, pulping and bleaching, the deinking process, board production, energy production on-site and internal waste water treatment are included. Not included is the transport of the waste paper to the mill as this in already integrated into the respective collection modules. Sorting of the incoming paper and the by-products connected to this has been excluded, since sorting of unsorted paper takes place in a separate activity. For the converting process, printing, cutting and creasing is included.

## Geography
European average data (weighted according to production volumes), provided by Pro Carton from the data survey that underpins their 2018 European Environmental Database for Cartonboard and Carton Production. Data covers the main producers in Europe

## Technology
Average of present technology used, weighted according to the production volumes of the mills participating in the original data survey

## Time period
Inventory data represent the year 2018. The production volume is valid for the year 2017.

## Reference product
- folding boxboard carton: 1 kg; By-product classification allocatable product; CPC 32153: Cartons, boxes, cases, record sleeves and other packing containers (except bags) of paper, paperboard, cellulo[…]; HS2017 481920: Paper and paperboard; folding cartons, boxes and cases, of non-corrugated paper or paperboard
  production volume 1.47361e10 kg; name PV_board
    Valid for 2018.Global production volume of folding boxboard derived from global production volume of all cartonboard grades as reported in FAOSTAT (data for Forestry Production and Trade for category Cartonboard, Production Quantity in World (Total) in 2028). Total cartonboard production was split over the different grades (FBB, WLC, SUB/SBB) by applying the same shares as reported for Europe: FBB: 34%, WLC: 49%, SBB/SUB; 17% (CEPI, 2015).
    Reference(s):
    FAOSTAT, 2020, http://www.fao.org/faostat/en/#data/FO
    CEPI, 2015, European Environmental Database for Cartonboard and Carton Production, 2015 Final Report.
  property carbon content, fossil 0.0227142
    taken over from previous ecoinvent dataset "folding boxboard production, 2000": fossil carbon content on a dry matter basis
  property carbon content, non-fossil 0.4
    biogene carbon content on a dry matter basis; based on calculations using a methodology developed by CITPA - Guidelines for calculating Carbon footprints for paper-based packaging, CITPA, March 2018
  property heating value, net 11.59 MJ
    LHV is calculated based on the Carbon content of the product. More details can be found on the respective documentation.
  property price 0.88 EUR2005
    Export prices for the World+ according to: http://faostat.fao.org/site/626/DesktopDefault.aspx?PageID=626#ancor downloaded 28 April 2009; calculated as export value divided by export volume.
  properties: allocation factor 0.988123, carbon allocation 0.388897 kg, carbon content 0.422714, dry mass 0.92 kg, true value 0.88, water content 0.0869565, water in wet mass 0.08 kg, wet mass 1 kg

## Inputs from technosphere
- acrylic varnish, with water, in 53% solution state: 0.0118193 kg; lognormal variance with pedigree 0.0044, pedigree (2,3,3,4,1)
  Average data from thirty three carton converting facilities, weighted according to production volumes - varnish
  properties: carbon content, fossil 0.2066, dry mass 0.53 kg, heating value, net 20.44 MJ, water content 0.883983, wet mass 1 kg
- aluminium scrap, post-consumer, prepared for melting: -0.00144348 kg; name a_BP8; lognormal variance with pedigree 0.0112, pedigree (3,5,1,4,1)
  Average data from thirty three carton converting facilities, weighted according to production volumes - aluminium printing plates from the process will all be sent for recycling after use
  production volume; = a_BP8*PV_board
    Calculated from production volume of reference product using the relative outputs.
  properties: dry mass 1 kg, price 0.806 EUR2005, wet mass 1 kg
- aluminium sulfate, powder: 0.00808875 kg; lognormal variance with pedigree 0.0039, pedigree (2,2,3,4,1)
  Average data from ten European producers of folding box board, weighted according to production volumes - Al2(SO4)3, Alum, recorded in the caterogy of inputs for Functional additives
  properties: dry mass 1 kg, wet mass 1 kg
- aluminium, primary, ingot: 0.000137675, 0.00130581 kg (2 suppliers, which the file names only by identifier); sum of these 0.00144348 kg; lognormal variance with pedigree 0.0058, pedigree (3,3,3,4,1)
  Average data from thirty three carton converting facilities, weighted according to production volumes - aluminium printing plates
  properties: dry mass 1 kg, wet mass 1 kg
- bark chips, wet, measured as dry mass: 0.00351673, 0.169457 kg (2 suppliers, which the file names only by identifier); sum of these 0.172974 kg; lognormal variance with pedigree 0.0053, pedigree (3,2,3,4,1)
  Average data from ten European producers of folding box board, as fuel, assumes calorific value of 13.6MJ/kg
  properties: carbon content, non-fossil 0.494, dry mass 1 kg, heating value, net 4.81 MJ, water content 1.4, wet mass 2.4 kg
- biowaste: -0.00507934 kg; name a_BP2; lognormal variance with pedigree 0.0112, pedigree (3,5,1,4,1)
  Average data from ten European producers of folding box board, weighted according to production volumes. Consists of 0.0085kg of fibre (primary sludge) and 0.00429kg of biological treatment sludge
  production volume; = a_BP2*PV_board
    Calculated from the production volume of the reference product in proportion to the respective output amounts.
  properties: carbon content, non-fossil 0.1624, dry mass 0.4 kg, heating value, net 4.29 MJ, water content 1.5, wet mass 1 kg
  note on heating value, net: Value taken from the general comment of the treatment dataset.
- calcium carbonate, precipitated: 0.0987457 kg; lognormal variance with pedigree 0.0039, pedigree (2,2,3,4,1)
  Average data from ten European producers of folding box board, weighted according to production volumes
- chemi-thermomechanical pulp: 0.221123 kg; lognormal variance with pedigree 0.0039, pedigree (2,2,3,4,1)
  (same comment as for calcium carbonate, precipitated)
  properties: carbon content, non-fossil 0.494, dry mass 0.9 kg, heating value, net 13.23 MJ, water content 0.111111, wet mass 1 kg
- chemical, organic: 0.0014971 kg; lognormal variance with pedigree 0.0039, pedigree (2,2,3,4,1)
  Average data from ten European producers of folding box board, weighted according to production volumes - Polyacrylates, recorded in the caterogy of inputs for coatings, pigments and binders
  properties: carbon content, fossil 0.628, dry mass 1 kg, heating value, net 19.03 MJ, wet mass 1 kg
- clay: 0.0166675 kg; lognormal variance with pedigree 0.0039, pedigree (2,2,3,4,1)
  Average data from ten European producers of folding box board and thirty three carton converting facilities, weighted according to production volumes - 0.0168582340577921 kg clay recorded in the caterogy of inputs for coatings, pigments and binders; 0.00000957888685876384kg clay (filler) recorded in the caterogy of functional additives
  properties: dry mass 0.965 kg, water content 0.0362694, wet mass 1 kg
- diesel, low-sulfur: 9.63872e-7, 4.29562e-6, 5.12921e-5, 2.14852e-6, 1.42496e-7, 2.12826e-6 kg (6 suppliers, which the file names only by identifier); sum of these 6.09708e-5 kg; lognormal variance with pedigree 0.0039, pedigree (2,2,3,4,1)
  (same comment as for calcium carbonate, precipitated)
  properties: carbon content, fossil 0.865, dry mass 1 kg, heating value, net 42.8 MJ, wet mass 1 kg
- electricity, medium voltage: 0.0462361, 0.922306, 0.309892, 0.0141591, 0.00283392, 0.000608507, 0.0952423 kWh (7 suppliers, which the file names only by identifier); sum of these 1.39128 kWh; lognormal variance with pedigree 0.0033, pedigree (1,2,3,4,1)
  Average data from ten European producers of folding box board and thirty three carton converting facilities. Among these facilities, electricity inputs are distributed over the following countries with the respective shares: AT: 0.02; BE: 0.01; DE: 0.10; ES: 0.01; FI: 0.38; FR: 0.04; IT: 0.01; NE: 0.03; PL: 0.03; RO: 0.01; SE: 0.27; SI: 0.04; TR: 0.03; GB: 0.04; UA: 0.01. Since these facilities do not cover all European FBB production, the average European grid mix is applied here.
- ethylene vinyl acetate copolymer: 0.00111886 kg; lognormal variance with pedigree 0.0039, pedigree (2,2,3,4,1)
  Average data from ten European producers of folding box board, weighted according to production volumes: 0.000383397365432845kg of Polyvinyl acetate recorded in the caterogy of inputs for coatings, pigments and binders.
  Plus average data from thirty three carton converting facilities, weighted according to production volumes: Proxy for cold glue for box making (0.000672729570509267 kg cold glue) and proxy for hot melt glue for box making (0.0000761820098111169 kg hot melt glue)
  properties: carbon content, fossil 0.79734, dry mass 1 kg, heating value, net 35.99 MJ, wet mass 1 kg
- heavy fuel oil: 2.02583e-5, 1.17967e-5, 5.99721e-5, 0.00140194, 1.51334e-5, 7.7763e-5 kg (6 suppliers, which the file names only by identifier); sum of these 0.00158686 kg; lognormal variance with pedigree 0.0053, pedigree (3,2,3,4,1)
  Average data from ten European producers of folding box board
  properties: carbon content, fossil 0.849, dry mass 1 kg, heating value, net 41.2 MJ, wet mass 1 kg
- hydrogen peroxide, without water, in 50% solution state: 0.00320667 kg; lognormal variance with pedigree 0.0039, pedigree (2,2,3,4,1)
  Average data from ten European producers of folding box board, weighted according to production volumes - H2O2, hydrogen peroxide recorded in the caterogy of inputs for Functional additives
  properties: dry mass 1 kg, heating value, net 7.13 MJ, wet mass 1 kg
- latex: 0.0148031 kg; lognormal variance with pedigree 0.0039, pedigree (2,2,3,4,1)
  (same comment as for calcium carbonate, precipitated)
  properties: carbon content, fossil 0.872983, dry mass 1 kg, heating value, net 26.45 MJ, wet mass 1 kg
- light fuel oil: 4.6006e-6, 0.000482051, 2.37075e-5, 4.78474e-5, 3.41901e-6, 3.1751e-6 kg (6 suppliers, which the file names only by identifier); sum of these 0.000564801 kg; lognormal variance with pedigree 0.0039, pedigree (2,2,3,4,1)
  (same comment as for calcium carbonate, precipitated)
  properties: carbon content, fossil 0.862, dry mass 1 kg, heating value, net 42.6 MJ, wet mass 1 kg
- lignite ash: -0.00150765 kg; name a_BP3; lognormal variance with pedigree 0.0112, pedigree (3,5,1,4,1)
  Calculated from fossil fuels consumed
  production volume; = a_BP3*PV_board
    (same comment as for biowaste)
  properties: dry mass 1 kg, heating value, net 21.7 MJ, wet mass 1 kg
  note on heating value, net: Based on literature, page 52, Report 5: Dones, R., Bauer, C., Bolliger, R., Burger, B., faist Emmenegger, M., Frischknecht, R., Heck, T., Jungbluth, N., Röder, A., Tuchschmid, M. (2007) Life Cycle Inventories of Energy Systems: Resulst for current Systems in Switzerland and other UCTE Countries. ecoinvent report No. 5. Paul Scherrer Institut Villigen, Swiss Centre for Life Cycle Inventories, Dübendorf, CH
- maize starch: 0.0136366 kg; lognormal variance with pedigree 0.0039, pedigree (2,2,3,4,1)
  Average data from ten European producers of folding box board, weighted according to production volumes - 0.00596695553397997kg equates to input of corn starch; 0.0002024kg equates to 50% of the input recorded as wheat starch; 0.00581kg equates to 50% of the input recorded as Modified starch (sizing agents)
  properties: carbon content, non-fossil 0.46, dry mass 0.86 kg, heating value, net 11.64 MJ, water content 0.162791, wet mass 1 kg
- municipal solid waste: -1.50243e-7, -1.78408e-8, -1.11036e-7, -8.47673e-5, -1.24843e-8, -4.00722e-9, -9.05743e-9, -3.77063e-7 kg (8 suppliers, which the file names only by identifier); sum of these -8.5449e-5 kg; lognormal variance with pedigree 0.0112, pedigree (3,5,1,4,1)
  Average data from ten European producers of folding box board, weighted according to production volumes. Reported as "rejects from recovered paper processing", which will be a mixture of items such as grit, glass, small plastics, staples, etc.
  production volume; = a_BP4*PV_board
    (same comment as for biowaste)
  properties: carbon content, fossil 0.171549, carbon content, non-fossil 0.261655, dry mass 0.771 kg, heating value, net 11.74 MJ, water content 0.297017, wet mass 1 kg
- natural gas, high pressure: 0.000657342, 0.00110885, 0.00241875, 0.000809454, 0.000189166, 0.00112588, 0.00108037, 0.00284085, 0.00109676, 0.00169637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 m3 (37 suppliers, which the file names only by identifier); sum of these 0.0851306 m3; lognormal variance with pedigree 0.0033, pedigree (1,2,3,4,1)
  Average data from ten European producers of folding box board and thirty three carton converting facilities, weighted according to production volumes
  properties: carbon content, fossil 0.602381, dry mass 0.84 kg, heating value, gross 40 MJ, heating value, net 36 MJ, wet mass 0.84 kg
  note on heating value, net: Literature value, Source: Christoph Meili;Niels Jungbluth;Maresa Bussa (2021) Life cycle inventories of crude oil and natural gas extraction. ESU-services Ltd. commissioned by BAFU & VSG, Schaffhausen, Switzerland, http://esu-services.ch/data/public-lci-reports/
- packaging film, low density polyethylene: 0.00115463 kg; lognormal variance with pedigree 0.0044, pedigree (2,3,3,4,1)
  Average data from thirty three carton converting facilities, weighted according to production volumes - plastic stretch/shrink film
  properties: carbon content, fossil 0.857143, dry mass 1 kg, heating value, net 42.47 MJ, wet mass 1 kg
- paper mill, integrated: 5.37539e-11 unit; lognormal variance with pedigree 0.396, pedigree (4,5,5,1,4)
  Own assumption
  Uncertainty: own assumption
- peat: 0.0418793 kg; lognormal variance with pedigree 0.0053, pedigree (3,2,3,4,1)
  Average data from ten European producers of folding box board, assumes calorific value of 15MJ/kg
  properties: carbon content, fossil 0.59, dry mass 0.42 kg, heating value, net 10 MJ, water content 1.38095, wet mass 1 kg
  note on heating value, net: Indicative value. Reference: Nature and Management of Tropical Peat Soils, FAO Soils Bulletin 59, available at: http://www.fao.org/3/x5872e/x5872e00.htm#Contents
- potato starch: 0.013217 kg; lognormal variance with pedigree 0.0039, pedigree (2,2,3,4,1)
  Average data from ten European producers of folding box board, weighted according to production volumes - 0.00554230523390759kg recorded as potato starch; 0.0002024kg equates to 50% of the input recorded as wheat starch; 0.00581kg equates to 50% of the input recorded as Modified starch (sizing agents)
  properties: carbon content, non-fossil 0.46, dry mass 0.8 kg, heating value, net 10.66 MJ, water content 0.25, wet mass 1 kg
- printing ink, offset, without solvent, in 47.5% solution state: 0.0041967 kg; = 0.000799844721804066+0.00344729857465508; lognormal variance with pedigree 0.0044, pedigree (2,3,3,4,1)
  Average data from thirty three carton converting facilities, weighted according to production volumes - Flexo ink for printing (0.000799844721804066), plus off set ink for printing (0.00344729857465508)
  properties: carbon content, fossil 0.455266, carbon content, non-fossil 0.221773, dry mass 1 kg, heating value, net 20.51 MJ, wet mass 1 kg
- pulpwood, hardwood, measured as solid wood under bark: 1.48218e-5 m3; lognormal variance with pedigree 0.0053, pedigree (3,2,3,4,1)
  Average data from ten European producers of folding box board
  properties: carbon content, non-fossil 0.494, dry mass 688.356 kg, heating value, net 6071.3 MJ, water content 0.8, wet mass 1239.04 kg
  note on heating value, net: Value based on "hardwood forestry, mixed species, sustainable forest management"The property is based on a value of 11.58MJ/kg
- pulpwood, softwood, measured as solid wood under bark: 3.85072e-5 m3; lognormal variance with pedigree 0.0053, pedigree (3,2,3,4,1)
  Average data from ten European producers of folding box board
  properties: carbon content, non-fossil 0.494, dry mass 484 kg, heating value, net 4483.78 MJ, water content 1.4, wet mass 1161.6 kg
  note on heating value, net: Value based on "softwood forestry, mixed species, sustainable forest management"The property is based on a value of 11.58MJ/kg
- pulpwood, softwood, measured as solid wood under bark: 0.000828047 m3; lognormal variance with pedigree 0.0033, pedigree (2,2,3,1,1)
  (same comment as for natural gas, high pressure)
- rosin size, for paper production: 0.000101848 kg; lognormal variance with pedigree 0.0039, pedigree (2,2,3,4,1)
  Average data from ten European producers of folding box board, weighted according to production volumes - Rosin size (sizing agents) recorded in the caterogy of inputs for Functional additives
  properties: carbon content, non-fossil 0.515474, dry mass 1 kg, heating value, net 15.62 MJ, wet mass 1 kg
- sheet rolling, aluminium: 0.00144348 kg; lognormal variance with pedigree 0.0058, pedigree (3,3,3,4,1)
  Combined with the input of aluminium, primary, ingot, this is a proxy for aluminium printing plates for the litho printing process. A litho printing plate is a thin sheet of anodised fine grain hardened aluminium used in the printing industry. The photographically prepared (etched picture on to the aluminium) printing plate is treated chemically so the image will accept ink. This processing of the sheet usually occurs at the converting site, which will have its own prepress facility. The energy used in the prepress activity is captured in the energy data collected from the sites, but data on chemicals used etc., is not captured. However, it is anticipated that these will fall below the cur-off criteria defined in the data collection exercise.
- sludge from pulp and paper production: -0.00140017 kg; name a_BP6; lognormal variance with pedigree 0.0112, pedigree (3,5,1,4,1)
  Average data from ten European producers of folding box board, weighted according to production volumes, recorded as fibre (primary sludge)
  production volume; = a_BP6*PV_board
    (same comment as for biowaste)
  properties: carbon content, non-fossil 0.21, dry mass 0.75 kg, heating value, net 2.65 MJ, water content 0.333333, wet mass 1 kg
- sludge from pulp and paper production: -0.00149351 kg; name a_BP5; lognormal variance with pedigree 0.0112, pedigree (3,5,1,4,1)
  (same comment as for sludge from pulp and paper production)
  production volume; = a_BP5*PV_board
    (same comment as for biowaste)
- sodium chlorate, powder: 0.000454063 kg; lognormal variance with pedigree 0.0039, pedigree (2,2,3,4,1)
  Average data from ten European producers of folding box board, weighted according to production volumes - NaClO3 recorded in the caterogy of inputs for Functional additives
  properties: dry mass 1 kg, wet mass 1 kg
- sodium hydroxide, without water, in 50% solution state: 0.00273069 kg; lognormal variance with pedigree 0.0039, pedigree (2,2,3,4,1)
  Average data from ten European producers of folding box board, weighted according to production volumes - NaOH recorded in the caterogy of inputs for Functional additives
  properties: dry mass 1 kg, heating value, net 3.03 MJ, wet mass 1 kg
- sulfate pulp, bleached: 0.247083 kg; lognormal variance with pedigree 0.0039, pedigree (2,2,3,4,1)
  (same comment as for calcium carbonate, precipitated)
  properties: carbon content, non-fossil 0.494, dry mass 0.9 kg, heating value, net 13.23 MJ, water content 0.111111, wet mass 1 kg
- sulfite pulp, bleached: 0.0427835 kg; lognormal variance with pedigree 0.0053, pedigree (3,2,3,4,1)
  Average data from ten European producers of folding box board
  properties: carbon content, non-fossil 0.494, dry mass 0.9 kg, heating value, net 13.23 MJ, water content 0.111111, wet mass 1 kg
- sulfur: 3.88405e-6 kg; lognormal variance with pedigree 0.0039, pedigree (2,2,3,4,1)
  Average data from ten European producers of folding box board, weighted according to production volumes - Sulfur recorded in the caterogy of inputs for Functional additives
  properties: dry mass 1 kg, wet mass 1 kg
- sulfuric acid: 0.00175968 kg; lognormal variance with pedigree 0.0039, pedigree (2,2,3,4,1)
  Average data from ten European producers of folding box board, weighted according to production volumes - H2SO4 recorded in the caterogy of inputs for Functional additives
  properties: dry mass 1 kg, wet mass 1 kg
- tap water: 7.53536e-5, 0.00011487, 0.000214342, 0.000577421, 6.9506e-5, 0.00289657, 0.0331469 kg (7 suppliers, which the file names only by identifier); sum of these 0.037095 kg; lognormal variance with pedigree 0.0053, pedigree (3,2,3,4,1)
  (same comment as for calcium carbonate, precipitated)
  properties: carbon content, fossil 0.00178991, dry mass 0.000337476 kg, water content 2962.17, wet mass 1 kg
- thermo-mechanical pulp: 0.00445624 kg; lognormal variance with pedigree 0.0053, pedigree (3,2,3,4,1)
  Average data from ten European producers of folding box board
  properties: carbon content, non-fossil 0.494, dry mass 1 kg, heating value, net 14.97 MJ, wet mass 1 kg
- transport, freight train: 0.0561021, 0.0142294, 0.0513595, 0.00360319, 0.0708565 metric ton*km (5 suppliers, which the file names only by identifier); sum of these 0.196151 metric ton*km; lognormal variance with pedigree 0.2106, pedigree (5,5,3,4,4)
  Transport distance based on eurostat transport statistics for railway transport of goods. The transport data was extracted from the database leaf "Railway transport - goods transported, by group of goods - from 2008 onwards based on NST 2007 (1 000 t, million tkm) (rail_go_grpgood)" (http://ec.europa.eu/eurostat/data/database) on the 2018-06-01. The transport distance was calculated based on the total mass of goods transported and total payload-distance for the NST 2007 category "GT06 - Wood and products of wood and cork (except furniture); articles of straw and plaiting materials; pulp, paper and paper products; printed matter and recorded media" in the year 2016 for all countries for which data was available. The average distance of railway transport for goods in this category in 2016 was 328 km. The fraction of goods transported by rail (in terms of mass) relative to the total mass of goods transported by road, rail and inland waterways was 7.7% in 2016. Therefore, the average distance that goods travelled by rail in 2016 was 25 km. This value is assumed to be representative for Europe.
- transport, freight, inland waterways, barge: 0.0260684 metric ton*km; lognormal variance with pedigree 0.2106, pedigree (5,5,3,4,4)
  Transport distance based on eurostat transport statistics for transport of goods by inland waterways. The transport data was extracted from the database leaf "Transport by type of good (from 2007 onwards with NST2007) (iww_go_atygo)" (http://ec.europa.eu/eurostat/data/database) on the 2018-06-01. The transport distance was calculated based on the total mass of goods transported and total payload-distance for the NST 2007 category "GT06 - Wood and products of wood and cork (except furniture); articles of straw and plaiting materials; pulp, paper and paper products; printed matter and recorded media" in the year 2016 for the European Union (current composition). The average distance of transport by inland waterways for goods in this category in 2016 was 322 km. The fraction of goods transported by inland waterways (in terms of mass) relative to the total mass of goods transported by road, rail and inland waterways was 0.6% in 2016. Therefore, the average distance that goods travelled by inland waterways in 2016 was 2 km. This value is assumed to be representative for Europe.
- transport, freight, lorry, unspecified: 0.0498305, 0.00657258, 0.00102902 metric ton*km (3 suppliers, which the file names only by identifier); sum of these 0.0574321 metric ton*km; lognormal variance with pedigree 0.2106, pedigree (5,5,3,4,4)
  Transport distance based on eurostat transport statistics for road freight transport. The transport data was extracted from the database leaf 'Annual road freight transport, by type of goods and type of transport [1 000 t, Mio Tkm], from 2008 onwards (road_go_ta_tg)' (http://ec.europa.eu/eurostat/data/database) on the 2018-06-01. The transport distance was calculated based on the total mass of goods transported and total payload-distance for the NST 2007 category "GT06 - Wood and products of wood and cork (except furniture); articles of straw and plaiting materials; pulp, paper and paper products; printed matter and recorded media" in the year 2016 for all countries for which data was available. The average distance of road transport for goods in this category in 2016 was 203 km. The fraction of goods transported by road (in terms of mass) relative to the total mass of goods transported by road, rail and inland waterways was 91.8% in 2016. Therefore, the average distance that goods travelled by road in 2016 was 187 km. This value is assumed to be representative for Europe.")
- waste paper, sorted: 0.0112586 kg; lognormal variance with pedigree 0.0039, pedigree (2,2,3,4,1)
  (same comment as for calcium carbonate, precipitated)
  properties: carbon content, non-fossil 0.448889, dry mass 0.9 kg, heating value, net 14.11 MJ, water content 0.111111, wet mass 1 kg
- waste paperboard, sorted: 0.0450345 kg; lognormal variance with pedigree 0.0039, pedigree (2,2,3,4,1)
  (same comment as for calcium carbonate, precipitated)
  properties: carbon content, non-fossil 0.448889, dry mass 0.9 kg, heating value, net 15.92 MJ, water content 0.111111, wet mass 1 kg
- wood ash mixture, pure: -0.00479271 kg; name a_BP9; lognormal variance with pedigree 0.0112, pedigree (3,5,1,4,1)
  Calculated from fossil fuels consumed
  production volume; = a_BP9*PV_board
    (same comment as for biowaste)
  properties: carbon content, non-fossil 0.012, dry mass 1 kg, wet mass 1 kg
- wood chips, from post-consumer wood, measured as dry mass: 0.0195692 kg; lognormal variance with pedigree 0.0053, pedigree (3,2,3,4,1)
  Average data from ten European producers of folding box board, assumes calorific value of 13.6MJ/kg
  properties: carbon content, non-fossil 0.494, dry mass 1 kg, heating value, net 9.99 MJ, water content 0.4, wet mass 1.4 kg
- wood chips, wet, measured as dry mass: 4.33818e-5, 0.0191466 kg (2 suppliers, which the file names only by identifier); sum of these 0.01919 kg; lognormal variance with pedigree 0.0039, pedigree (2,2,3,4,1)
  (same comment as for calcium carbonate, precipitated)
  properties: carbon content, non-fossil 0.494, dry mass 1 kg, heating value, net 10.84 MJ, water content 1.1, wet mass 2.1 kg
  note on heating value, net: Value based on the dataset 'softwood forestry, mixed species, sustainable forest management'

## Inputs from nature
- Water, lake [natural resource, in water]: 0.0330112 m3; lognormal variance with pedigree 0.0053, pedigree (3,2,3,4,1)
  (same comment as for calcium carbonate, precipitated)
- Water, well, in ground [natural resource, in water]: 0.00737615 m3; lognormal variance with pedigree 0.0053, pedigree (3,2,3,4,1)
  Average data from ten European producers of folding box board, weighted according to production volumes, includes Ground water fossil/non-renewable and Groundwater non fossil

## Emissions to nature
- Acetaldehyde [air, urban air close to ground]: 6.15601e-7 kg; lognormal variance with pedigree 0.0986, pedigree (4,5,3,4,4)
  Calculated from fossil fuels consumed
- Acetic acid [air, urban air close to ground]: 5.36671e-7 kg; lognormal variance with pedigree 0.0986, pedigree (4,5,3,4,4)
  Calculated from fossil fuels consumed
- Acetone [air, urban air close to ground]: 9.66419e-9 kg; lognormal variance with pedigree 0.0986, pedigree (4,5,3,4,4)
  Calculated from fossil fuels consumed
- Acetylene [air, urban air close to ground]: 3.14094e-6 kg; lognormal variance with pedigree 0.0986, pedigree (4,5,3,4,4)
  Calculated from fossil fuels consumed
- Aluminium III [air, urban air close to ground]: 7.47545e-6 kg; lognormal variance with pedigree 0.7086, pedigree (4,5,3,4,4)
  Calculated from fossil fuels consumed
- Ammonia [air, urban air close to ground]: 1.70952e-5 kg; lognormal variance with pedigree 0.0986, pedigree (4,5,3,4,4)
  Calculated from fossil fuels consumed
- Antimony ion [air, urban air close to ground]: 1.58932e-8 kg; lognormal variance with pedigree 0.0986, pedigree (4,5,3,4,4)
  Calculated from fossil fuels consumed
- Arsenic ion [air, urban air close to ground]: 4.24401e-8 kg; lognormal variance with pedigree 0.0986, pedigree (4,5,3,4,4)
  Calculated from fossil fuels consumed
- Barium II [air, urban air close to ground]: 1.58932e-7 kg; lognormal variance with pedigree 0.7086, pedigree (4,5,3,4,4)
  Calculated from fossil fuels consumed
- Benzene [air, urban air close to ground]: 1.34592e-5 kg; lognormal variance with pedigree 0.0986, pedigree (4,5,3,4,4)
  Calculated from fossil fuels consumed
- Benzo(a)pyrene [air, urban air close to ground]: 1.7539e-8 kg; lognormal variance with pedigree 0.0986, pedigree (4,5,3,4,4)
  Calculated from fossil fuels consumed
- Beryllium II [air, urban air close to ground]: 1.58932e-9 kg; lognormal variance with pedigree 0.7086, pedigree (4,5,3,4,4)
  Calculated from fossil fuels consumed
- Boron [air, urban air close to ground]: 7.16135e-6 kg; lognormal variance with pedigree 0.7086, pedigree (4,5,3,4,4)
  Calculated from fossil fuels consumed
- Bromine [air, urban air close to ground]: 6.02286e-7 kg; lognormal variance with pedigree 0.0986, pedigree (4,5,3,4,4)
  Calculated from fossil fuels consumed
- Butane [air, urban air close to ground]: 2.33227e-6 kg; lognormal variance with pedigree 0.3586, pedigree (4,5,3,4,4)
  Calculated from fossil fuels consumed
- Cadmium II [air, urban air close to ground]: 1.17586e-8 kg; lognormal variance with pedigree 0.7086, pedigree (4,5,3,4,4)
  Calculated from fossil fuels consumed
- Calcium II [air, urban air close to ground]: 8.95226e-5 kg; lognormal variance with pedigree 0.3586, pedigree (4,5,3,4,4)
  Calculated from fossil fuels consumed
- Carbon dioxide, fossil [air, urban air close to ground]: 0.267802 kg; lognormal variance with pedigree 0.0033, pedigree (1,2,3,4,1)
  (same comment as for calcium carbonate, precipitated)
- Carbon dioxide, non-fossil [air, urban air close to ground]: 0.933132 kg; lognormal variance with pedigree 0.0132, pedigree (3,5,3,4,1)
  (same comment as for calcium carbonate, precipitated)
- Carbon monoxide, fossil [air, urban air close to ground]: 0.00252028 kg; lognormal variance with pedigree 0.7086, pedigree (4,5,3,4,4)
  Calculated from fossil fuels consumed
- Carbon monoxide, non-fossil [air, urban air close to ground]: 0.00106701 kg; lognormal variance with pedigree 0.7086, pedigree (4,5,3,4,4)
  Calculated from fossil fuels consumed
- Chlorine [air, urban air close to ground]: 1.77821e-6 kg; lognormal variance with pedigree 0.0986, pedigree (4,5,3,4,4)
  Calculated from fossil fuels consumed
- Chromium III [air, urban air close to ground]: 8.34757e-8 kg; lognormal variance with pedigree 0.7086, pedigree (4,5,3,4,4)
  Calculated from fossil fuels consumed
- Chromium VI [air, urban air close to ground]: 8.43138e-10 kg; lognormal variance with pedigree 0.7086, pedigree (4,5,3,4,4)
  Calculated from fossil fuels consumed
- Cobalt II [air, urban air close to ground]: 2.59345e-8 kg; lognormal variance with pedigree 0.7086, pedigree (4,5,3,4,4)
  Calculated from fossil fuels consumed
- Copper ion [air, urban air close to ground]: 2.53245e-7 kg; lognormal variance with pedigree 0.7086, pedigree (4,5,3,4,4)
  Calculated from fossil fuels consumed
- Dinitrogen monoxide [air, urban air close to ground]: 2.49402e-5 kg; lognormal variance with pedigree 0.0986, pedigree (4,5,3,4,4)
  Calculated from fossil fuels consumed
- Dioxins, measured as 2,3,7,8-tetrachlorodibenzo-p-dioxin [air, urban air close to ground]: 3.07645e-13 kg; lognormal variance with pedigree 0.0986, pedigree (4,5,3,4,4)
  Calculated from fossil fuels consumed
- Ethane [air, urban air close to ground]: 9.42283e-6 kg; lognormal variance with pedigree 0.0986, pedigree (4,5,3,4,4)
  Calculated from fossil fuels consumed
- Ethanol [air, urban air close to ground]: 1.93284e-8 kg; lognormal variance with pedigree 0.0986, pedigree (4,5,3,4,4)
  Calculated from fossil fuels consumed
- Ethyl benzene [air, urban air close to ground]: 2.96369e-7 kg; lognormal variance with pedigree 0.0986, pedigree (4,5,3,4,4)
  Calculated from fossil fuels consumed
- Ethylene [air, urban air close to ground]: 1.88457e-5 kg; lognormal variance with pedigree 0.7086, pedigree (4,5,3,4,4)
  Calculated from fossil fuels consumed
- Fluorine [air, urban air close to ground]: 4.93948e-7 kg; lognormal variance with pedigree 0.0986, pedigree (4,5,3,4,4)
  Calculated from fossil fuels consumed
- Formaldehyde [air, urban air close to ground]: 1.73153e-6 kg; lognormal variance with pedigree 0.0986, pedigree (4,5,3,4,4)
  Calculated from fossil fuels consumed
- Hexachlorobenzene [air, urban air close to ground]: 7.11285e-14 kg; lognormal variance with pedigree 0.0986, pedigree (4,5,3,4,4)
  Calculated from fossil fuels consumed
- Hydrocarbons, aliphatic, alkanes, unspecified [air, urban air close to ground]: 1.2182e-5 kg; lognormal variance with pedigree 0.0986, pedigree (4,5,3,4,4)
  Calculated from fossil fuels consumed
- Hydrocarbons, aliphatic, unsaturated [air, urban air close to ground]: 3.37677e-5 kg; lognormal variance with pedigree 0.0986, pedigree (4,5,3,4,4)
  Calculated from fossil fuels consumed
- Hydrocarbons, aromatic [air, urban air close to ground]: 1.04455e-8 kg; lognormal variance with pedigree 0.0986, pedigree (4,5,3,4,4)
  Calculated from fossil fuels consumed
- Hydrochloric acid [air, urban air close to ground]: 2.17453e-6 kg; lognormal variance with pedigree 0.0986, pedigree (4,5,3,4,4)
  Calculated from fossil fuels consumed
- Hydrogen fluoride [air, urban air close to ground]: 8.12223e-8 kg; lognormal variance with pedigree 0.0986, pedigree (4,5,3,4,4)
  Calculated from fossil fuels consumed
- Hydrogen sulfide [air, urban air close to ground]: 6.28189e-8 kg; lognormal variance with pedigree 0.0986, pedigree (4,5,3,4,4)
  Calculated from fossil fuels consumed
- Iodine [air, urban air close to ground]: 2.85826e-8 kg; lognormal variance with pedigree 0.0986, pedigree (4,5,3,4,4)
  Calculated from fossil fuels consumed
- Iron ion [air, urban air close to ground]: 8.5962e-6 kg; lognormal variance with pedigree 0.7086, pedigree (4,5,3,4,4)
  Calculated from fossil fuels consumed
- Lead II [air, urban air close to ground]: 2.80125e-7 kg; lognormal variance with pedigree 0.7086, pedigree (4,5,3,4,4)
  Calculated from fossil fuels consumed
- Lead-210 [air, urban air close to ground]: 3.89477e-5 kBq; lognormal variance with pedigree 0.3586, pedigree (4,5,3,4,4)
  Calculated from fossil fuels consumed
- Magnesium [air, urban air close to ground]: 8.3181e-6 kg; lognormal variance with pedigree 0.7086, pedigree (4,5,3,4,4)
  Calculated from fossil fuels consumed
- Manganese II [air, urban air close to ground]: 1.69532e-6 kg; lognormal variance with pedigree 0.7086, pedigree (4,5,3,4,4)
  Calculated from fossil fuels consumed
- Mercury II [air, urban air close to ground]: 1.02473e-8 kg; lognormal variance with pedigree 0.7086, pedigree (4,5,3,4,4)
  Calculated from fossil fuels consumed
- Methane, fossil [air, urban air close to ground]: 0.000195316 kg; lognormal variance with pedigree 0.0986, pedigree (4,5,3,4,4)
  Calculated from fossil fuels consumed
- Methane, non-fossil [air, urban air close to ground]: 1.00679e-5 kg; lognormal variance with pedigree 0.0986, pedigree (4,5,3,4,4)
  Calculated from fossil fuels consumed
- Methanol [air, urban air close to ground]: 3.28583e-8 kg; lognormal variance with pedigree 0.0986, pedigree (4,5,3,4,4)
  Calculated from fossil fuels consumed
- Molybdenum VI [air, urban air close to ground]: 2.82814e-8 kg; lognormal variance with pedigree 0.7086, pedigree (4,5,3,4,4)
  Calculated from fossil fuels consumed
- NMVOC, non-methane volatile organic compounds [air, urban air close to ground]: 3.19135e-5 kg; lognormal variance with pedigree 0.0986, pedigree (4,5,3,4,4)
  Calculated from fossil fuels consumed
- Nickel II [air, urban air close to ground]: 1.26587e-7 kg; lognormal variance with pedigree 0.7086, pedigree (4,5,3,4,4)
  Calculated from fossil fuels consumed
- Nitrogen oxides [air, urban air close to ground]: 0.00040812 kg; lognormal variance with pedigree 0.0433, pedigree (2,2,3,4,1)
  Average data from ten European producers of folding box board and calculated data (from fuel consumption) for thirty three carton converting facilities, weighted according to production volumes, NOx
- PAH, polycyclic aromatic hydrocarbons [air, urban air close to ground]: 1.4291e-7 kg; lognormal variance with pedigree 0.3586, pedigree (4,5,3,4,4)
  Calculated from fossil fuels consumed
- Particulate Matter, < 2.5 um [air, urban air close to ground]: 0.000465852 kg; lognormal variance with pedigree 0.1786, pedigree (4,5,3,4,4)
  Calculated from fossil fuels consumed
- Particulate Matter, > 10 um [air, urban air close to ground]: 8.81011e-5 kg; lognormal variance with pedigree 0.0986, pedigree (4,5,3,4,4)
  Calculated from fossil fuels consumed
- Particulate Matter, > 2.5 um and < 10um [air, urban air close to ground]: 1.44289e-5 kg; lognormal variance with pedigree 0.0433, pedigree (2,2,3,4,1)
  Average data from ten European producers of folding box board, weighted according to production volumes, recorded as Dust (unspecified)
- Pentachlorophenol [air, urban air close to ground]: 8.00196e-11 kg; lognormal variance with pedigree 0.0986, pedigree (4,5,3,4,4)
  Calculated from fossil fuels consumed
- Pentane [air, urban air close to ground]: 3.98958e-6 kg; lognormal variance with pedigree 0.0986, pedigree (4,5,3,4,4)
  Calculated from fossil fuels consumed
- Phenol [air, urban air close to ground]: 3.14094e-7 kg; lognormal variance with pedigree 0.0986, pedigree (4,5,3,4,4)
  Calculated from fossil fuels consumed
- Phosphorus [air, urban air close to ground]: 3.02714e-6 kg; lognormal variance with pedigree 0.0986, pedigree (4,5,3,4,4)
  Calculated from fossil fuels consumed
- Polonium-210 [air, urban air close to ground]: 7.16135e-5 kBq; lognormal variance with pedigree 0.3586, pedigree (4,5,3,4,4)
  Calculated from fossil fuels consumed
- Potassium I [air, urban air close to ground]: 0.000232123 kg; lognormal variance with pedigree 0.7086, pedigree (4,5,3,4,4)
  Calculated from fossil fuels consumed
- Potassium-40 [air, urban air close to ground]: 1.04908e-5 kBq; lognormal variance with pedigree 0.3586, pedigree (4,5,3,4,4)
  Calculated from fossil fuels consumed
- Propane [air, urban air close to ground]: 6.94836e-6 kg; lognormal variance with pedigree 0.0986, pedigree (4,5,3,4,4)
  Calculated from fossil fuels consumed
- Propionic acid [air, urban air close to ground]: 6.64019e-8 kg; lognormal variance with pedigree 0.0986, pedigree (4,5,3,4,4)
  Calculated from fossil fuels consumed
- Propylene [air, urban air close to ground]: 3.14094e-6 kg; lognormal variance with pedigree 0.0986, pedigree (4,5,3,4,4)
  Calculated from fossil fuels consumed
- Radium-226 [air, urban air close to ground]: 1.0051e-5 kBq; lognormal variance with pedigree 0.3586, pedigree (4,5,3,4,4)
  Calculated from fossil fuels consumed
- Radium-228 [air, urban air close to ground]: 5.40242e-6 kBq; lognormal variance with pedigree 0.3586, pedigree (4,5,3,4,4)
  Calculated from fossil fuels consumed
- Radon-220 [air, urban air close to ground]: 2.51276e-6 kBq; lognormal variance with pedigree 0.3586, pedigree (4,5,3,4,4)
  Calculated from fossil fuels consumed
- Radon-222 [air, urban air close to ground]: 2.51276e-6 kBq; lognormal variance with pedigree 0.3586, pedigree (4,5,3,4,4)
  Calculated from fossil fuels consumed
- Scandium [air, urban air close to ground]: 3.97015e-10 kg; lognormal variance with pedigree 0.7086, pedigree (4,5,3,4,4)
  Calculated from fossil fuels consumed
- Selenium IV [air, urban air close to ground]: 4.83898e-8 kg; lognormal variance with pedigree 0.7086, pedigree (4,5,3,4,4)
  Calculated from fossil fuels consumed
- Silicon [air, urban air close to ground]: 7.60108e-5 kg; lognormal variance with pedigree 0.7086, pedigree (4,5,3,4,4)
  Calculated from fossil fuels consumed
- Sodium I [air, urban air close to ground]: 1.4317e-5 kg; lognormal variance with pedigree 0.7086, pedigree (4,5,3,4,4)
  Calculated from fossil fuels consumed
- Strontium II [air, urban air close to ground]: 1.6647e-7 kg; lognormal variance with pedigree 0.7086, pedigree (4,5,3,4,4)
  Calculated from fossil fuels consumed
- Sulfur dioxide [air, urban air close to ground]: 0.000112372 kg; lognormal variance with pedigree 0.0118, pedigree (2,5,3,4,1)
  Average data from ten European producers of folding box board and calculated data (from fuel consumption) for thirty three carton converting facilities, weighted according to production volumes, SOx (as SO2)
- Thallium I [air, urban air close to ground]: 7.91518e-11 kg; lognormal variance with pedigree 0.7086, pedigree (4,5,3,4,4)
  Calculated from fossil fuels consumed
- Thorium [air, urban air close to ground]: 1.90341e-9 kg; lognormal variance with pedigree 0.7086, pedigree (4,5,3,4,4)
  Calculated from fossil fuels consumed
- Thorium-228 [air, urban air close to ground]: 4.6486e-6 kBq; lognormal variance with pedigree 0.3586, pedigree (4,5,3,4,4)
  Calculated from fossil fuels consumed
- Thorium-232 [air, urban air close to ground]: 2.88967e-6 kBq; lognormal variance with pedigree 0.3586, pedigree (4,5,3,4,4)
  Calculated from fossil fuels consumed
- Tin ion [air, urban air close to ground]: 1.26894e-9 kg; lognormal variance with pedigree 0.7086, pedigree (4,5,3,4,4)
  Calculated from fossil fuels consumed
- Titanium ion [air, urban air close to ground]: 1.58932e-7 kg; lognormal variance with pedigree 0.7086, pedigree (4,5,3,4,4)
  Calculated from fossil fuels consumed
- Toluene [air, urban air close to ground]: 4.25861e-6 kg; lognormal variance with pedigree 0.0986, pedigree (4,5,3,4,4)
  Calculated from fossil fuels consumed
- Uranium [air, urban air close to ground]: 3.17235e-9 kg; lognormal variance with pedigree 0.7086, pedigree (4,5,3,4,4)
  Calculated from fossil fuels consumed
- Uranium-238 [air, urban air close to ground]: 8.41773e-6 kBq; lognormal variance with pedigree 0.3586, pedigree (4,5,3,4,4)
  Calculated from fossil fuels consumed
- Vanadium V [air, urban air close to ground]: 1.47977e-7 kg; lognormal variance with pedigree 0.7086, pedigree (4,5,3,4,4)
  Calculated from fossil fuels consumed
- Water [air, urban air close to ground]: 0.000671924 m3; lognormal variance with pedigree 0.0592, pedigree (4,5,3,4,4)
  Calculated from fossil fuels consumed
- Xylenes, unspecified [air, urban air close to ground]: 2.07302e-6 kg; lognormal variance with pedigree 0.0986, pedigree (4,5,3,4,4)
  Calculated from fossil fuels consumed
- Zinc II [air, urban air close to ground]: 2.99181e-6 kg; lognormal variance with pedigree 0.7086, pedigree (4,5,3,4,4)
  Calculated from fossil fuels consumed
- m-Xylene [air, urban air close to ground]: 1.18548e-6 kg; lognormal variance with pedigree 0.0986, pedigree (4,5,3,4,4)
  Calculated from fossil fuels consumed
- AOX, Adsorbable Organic Halides [water, surface water]: 7.25166e-7 kg; lognormal variance with pedigree 0.0526, pedigree (3,5,3,4,1)
  Average data from ten European producers of folding box board, weighted according to production volumes, AOX as Cl-
- BOD5, Biological Oxygen Demand [water, surface water]: 0.00284806 kg; lognormal variance with pedigree 0.0526, pedigree (3,5,3,4,1)
  Average data from ten European producers of folding box board, weighted according to production volumes, Biological Oxygen Demand (BOD 5)
- COD, Chemical Oxygen Demand [water, surface water]: 0.00874008 kg; lognormal variance with pedigree 0.0447, pedigree (3,2,3,4,1)
  Average data from ten European producers of folding box board, weighted according to production volumes, Chemical Oxygen Demand (CODCr)
- DOC, Dissolved Organic Carbon [water, surface water]: 0.00368851 kg; = a_TOC; lognormal variance with pedigree 0.0526, pedigree (3,5,3,4,1)
  Assumed equal to TOC.
- Nitrogen [water, surface water]: 8.23497e-5 kg; lognormal variance with pedigree 0.0526, pedigree (3,5,3,4,1)
  Average data from ten European producers of folding box board, weighted according to production volumes. Total nitrogen
- Phosphorus [water, surface water]: 6.00027e-6 kg; lognormal variance with pedigree 0.0526, pedigree (3,5,3,4,1)
  Average data from ten European producers of folding box board, weighted according to production volumes, Total Phosphorus
- Suspended solids, unspecified [water, surface water]: 0.00129812 kg; lognormal variance with pedigree 0.0447, pedigree (3,2,3,4,1)
  Average data from ten European producers of folding box board, weighted according to production volumes, Total suspended solids
- TOC, Total Organic Carbon [water, surface water]: 0.00368851 kg; name a_TOC; lognormal variance with pedigree 0.0526, pedigree (3,5,3,4,1)
  (same comment as for calcium carbonate, precipitated)
- Water [water, surface water]: 0.0402166 m3; lognormal variance with pedigree 0.0053, pedigree (3,2,3,4,1)
  Average data from ten European producers of folding box board, weighted according to production volumes, recorded as thermally polluted only

## Sampling procedure
Data were collected from the producers by Pro Carton and ECMA for their European Environmental Database for Cartonboard and Carton Manufacturing and reviewed by the Institut für Energie- und Umweltforschung Heidelberg (ifeu). The data for the production of FBB were collected from mills, which together represent about 71% of the total yearly production of FBB in Europe. Annual production of FBB in Europe for 2017 was approximatly 2 930 000 tonnes. Data were provided by mills in Finland, Germany, Netherlands, Sweden, Slovenia and United Kingdom. Each mill produces between 90 000 - 375 000 tonnes of net saleable paper. Carton converting data were provided by factories in Austria, Belgium, France, Germany, Poland, Romania, Spain, Turkey, Ukraine, and the United Kingdom representing over 380 000 tonnes of production of converted cartons, or around 5% of European converting operations by volume. They varied in size producing between 1 000 and 50 000 tonnes of finished cartons ready for shipment.

## Extrapolations
Additional air emissions from the combustion of fossil fuels estimated based on industrial heating datasets from the ecoinvent database and matched as follows: light fuel oil: heat production, light fuel oil, at industrial furnace 1MW, Europe without Switzerland heavy fuel oil: heat production, heavy fuel oil, at industrial furnace 1MW, Europe without Switzerland hard coal: heat production, at hard coal industrial furnace 1-10MW, Europe without Switzerland natural gas: heat production, natural gas, at industrial furnace >100kW, Europe without Switzerland lignite briquettes and peat: heat production, lignite briquette, at stove 5-15kW, Europe without Switzerland wood chips: heat production, wood chips from industry, at furnace 1000kW, CH
