# pipeline construction, petroleum, offshore

Dataset: EcoSpold 2, unit process
Geography: GLO
Time period: 1981-01-01 to 2023-12-31
Technology level: current
Classification: ISIC rev.4 ecoinvent: 4220:Construction of utility projects
Classification: EcoSpold01Categories: oil/production
Tags: ConvertedDataset
Scenario: Business-as-Usual
System model: Allocation, cut-off by classification
Generated by: Niels Jungbluth
Published in: Jungbluth, N. 2007
Database: ecoinvent
isCopyrightProtected: true
accessRestrictedTo: 1

## General comment
Rough estimation based on use of materials and information for construction works by one company. Life time 30 years.
[This dataset was already contained in the ecoinvent database version 2. It was not individually updated during the transfer to ecoinvent version 3. Life Cycle Impact Assessment results may still have changed, as they are affected by changes in the supply chain, i.e. in other datasets. This dataset was generated following the ecoinvent quality guidelines for version 2. It may have been subject to central changes described in the ecoinvent version 3 change report (http://www.ecoinvent.org/database/ecoinvent-version-3/reports-of-changes/), and the results of the central updates were reviewed extensively. The changes added e.g. consistent water flows and other information throughout the database. The documentation of this dataset can be found in the ecoinvent reports of version 2, which are still available via the ecoinvent website. The change report linked above covers all central changes that were made during the conversion process.]

## Included activities end
Materials, land use, energy use of construction company and dismantling of pipelines.

## Geography
Globally operating company.

## Technology
Construction of pipelines.

## Time period
Data for materials published in 1980. Environmental data for construction of pipelines in 2000.

## Parameters
- fraction, process water, to air: 0.15 dimensionless; name fraction_PW_to_air; lognormal variance with pedigree 0.092025, pedigree (4,4,3,2,4)
  Literature value. In case when no industry/process specific data are available, default evaporation fraction value is used. This value is 15% and is based on literature (Statistics Canada, 2007 & Shaffer, K.H., 2008, Consumptive water use in the Great Lakes Basin, USGS & Shiklomanov, 2003, World Water Resources at the Beginning of the 21st Century) and has been approved by an expert.

## Reference product
- pipeline, petroleum, offshore: 1 km; By-product classification allocatable product; CPC 53251: Local pipelines
  production volume 1 km
    There are 30780km of oil pipelines (on- and offshore) used in Europe.
    Dummy value to be replaced by measured, estimated or calculated value
  property price 759930 EUR2005
    Average 2005 prices for EU27, USA, China, Japan and India from Import/Export data (US$ and tonnes) in UN Commodity Trade Statistics Database; Commodity: Pipe-line submerged arc welded steel diameter >406mm. Unit in EUR/kg is converted to EUR/km based on dataset for pipeline production in Ecoinvent database. - For weight of concrete, it is separately added for from price per m3 used of each unit and apply EU&DK input output database 2003 (0.08 Euro2003/kg DS of concrete => 176 Euro2003/m3 concrete). For weight of pitch, the price used in ecoinvent for this product is used, namely 4 EUR/kg. For diesel burned in building machine used in the construction, only the costs of diesel are taken into account, namely 0.37 EUR/kg. The lower heating value of diesel is 42.8 MJ/kg (Ecoinvent report I, pg 15). The price of sand is calculated in the Ecoinvent database as 0,004 EUR/kg
  properties: carbon allocation 0 kg, carbon content 0

## Inputs from technosphere
- aluminium, cast alloy: 3315.3 kg; lognormal variance with pedigree 1.448, pedigree (5,5,5,1,1)
  Estimation for aluminium anode, basic uncertainity estimated = 10
  Uncertainty: E
  properties: dry mass 1 kg, wet mass 1 kg
- cast iron: 4.2 kg; lognormal variance with pedigree 1.448, pedigree (5,5,5,1,1)
  Estimation for aluminium anode, basic uncertainity estimated = 10
  Uncertainty: E
  properties: carbon content, fossil 0.04, dry mass 1 kg, wet mass 1 kg
  note on carbon content, fossil: Cast iron is made by remelting pig iron in small furnaces (e.g. cupola furnaces or electric arc furnaces) and poured into moulds to make castings. It usually contains 2% to 6% carbon (ecoinvent v2.2 report 10_partII). An average content of 4% was considered
- concrete, normal strength: 49.091 m3; lognormal variance with pedigree 0.0527, pedigree (3,3,5,3,1)
  Literature
  Uncertainty: L
  properties: dry mass 2190 kg, water content 0.086758, wet mass 2380 kg
- copper, cathode: 0.21 kg; lognormal variance with pedigree 1.448, pedigree (5,5,5,1,1)
  Estimation for aluminium anode, basic uncertainity estimated = 10
  Uncertainty: E
  properties: dry mass 1 kg, wet mass 1 kg
- diesel, burned in building machine: 3.3084e6 MJ; lognormal variance with pedigree 0.0412, pedigree (2,3,5,1,1)
  Environmental report
  Uncertainty: E
  properties: heating value, net 1 MJ
- drawing of pipe, steel: 400000 kg; lognormal variance with pedigree 0.0527, pedigree (3,3,5,3,1)
  Estimation
  Uncertainty: E
- hazardous waste, for incineration: -2362.29, -1136.02, -29.6948 kg (3 suppliers, which the file names only by identifier); sum of these -3528 kg; lognormal variance with pedigree 0.0012, pedigree (2,3,1,1,1)
  Environmental report
  Uncertainty: E
  production volume
    Calculated from the production volume of pipeline, petroleum, offshore in proportion to the respective output amounts.
  properties: carbon content, fossil 0.554667, dry mass 0.75 kg, heating value, net 17 MJ, water content 0.333333, wet mass 1 kg
  note on carbon content, fossil: Tab A.6, ecoinvent v2.2 report 13_I. C content has been calculated after data in the tables, and then referred to 1 kg DM
  note on heating value, net: Value taken from the general comment of the treatment dataset.
- municipal solid waste: -160.031, -8.21781, -0.975828, -6.20014, -6.07331, -4636.48, -0.682847, -0.219182, -0.49541, -20.6241 kg (10 suppliers, which the file names only by identifier); sum of these -4840 kg; lognormal variance with pedigree 0.0012, pedigree (2,3,1,1,1)
  Environmental report
  Uncertainty: E
  production volume
    (same comment as for hazardous waste, for incineration)
  properties: carbon content, fossil 0.171549, carbon content, non-fossil 0.261655, dry mass 0.771 kg, heating value, net 11.74 MJ, water content 0.297017, wet mass 1 kg
  note on carbon content, fossil: MSW composition in tab 4.1, ecoinvent v2.2 report 13_I. C content referred to 1 kg DM
- pitch: 10632.2, 476.581, 234.916, 89.8073, 4121.92, 680.364, 60105.1, 13659.1 kg (8 suppliers, which the file names only by identifier); sum of these 90000 kg; lognormal variance with pedigree 0.0527, pedigree (3,3,5,3,1)
  Literature
  Uncertainty: L
  properties: carbon content, fossil 0.83, dry mass 1 kg, heating value, net 28 MJ, wet mass 1 kg
- reinforcing steel: 360000 kg; lognormal variance with pedigree 0.0527, pedigree (3,3,5,3,1)
  Literature
  Uncertainty: L
  properties: carbon content, fossil 0.004, dry mass 1 kg, wet mass 1 kg
- sand: 2650.81, 31.7388, 172504, 13.7618 kg (4 suppliers, which the file names only by identifier); sum of these 175200 kg; lognormal variance with pedigree 0.0527, pedigree (3,3,5,3,1)
  Literature
  Uncertainty: L
  properties: dry mass 1 kg, wet mass 1 kg
- silicon, metallurgical grade: 5.25 kg; lognormal variance with pedigree 1.448, pedigree (5,5,5,1,1)
  Estimation for aluminium anode, basic uncertainity estimated = 10
  Uncertainty: E
  properties: dry mass 1 kg, wet mass 1 kg
- steel, low-alloyed, hot rolled: 40000 kg; lognormal variance with pedigree 0.0527, pedigree (3,3,5,3,1)
  Literature
  Uncertainty: L
  properties: carbon content, fossil 0.005, dry mass 1 kg, wet mass 1 kg
  note on carbon content, fossil: Low alloyed steel composition given in Tab. 3.2 ecoinvent v2.2 report 10_partII. Steel assumed to have a C content of 0.5%
- waste bitumen: -12.8073, -172.347, -89814.8 kg (3 suppliers, which the file names only by identifier); sum of these -90000 kg; lognormal variance with pedigree 0.0207, pedigree (3,3,4,3,1)
  Literature
  Uncertainty: L
  production volume
    (same comment as for hazardous waste, for incineration)
  properties: carbon content, fossil 0.842657, dry mass 0.986 kg, heating value, net 40.2 MJ, water content 0.0141988, wet mass 1 kg
  note on heating value, net: Literature value, Source: IPCC 2006, 2006 IPCC Guidelines for National Greenhouse Gas Inventories, Prepared by the National Greenhouse Gas Inventories Programme, Eggleston H.S., Buendia L., Miwa K., Ngara T. and Tanabe K. (eds). Published: IGES, Japan
- waste concrete: -7379.37, -100595, -26.0906 kg (3 suppliers, which the file names only by identifier); sum of these -108000 kg; lognormal variance with pedigree 0.0207, pedigree (3,3,4,3,1)
  Literature
  Uncertainty: L
  production volume
    (same comment as for hazardous waste, for incineration)
  properties: dry mass 0.5 kg, water content 1, wet mass 1 kg
- zinc: 175 kg; lognormal variance with pedigree 1.448, pedigree (5,5,5,1,1)
  Estimation for aluminium anode, basic uncertainity estimated = 10
  Uncertainty: E
  properties: dry mass 1 kg, wet mass 1 kg

## Inputs from nature
- Occupation, seabed, infrastructure [natural resource, land]: 3300 m2*year; lognormal variance with pedigree 0.1006, pedigree (3,3,5,1,3)
  Calculation for 30a use
  Uncertainty: C
- Transformation, from seabed, unspecified [natural resource, land]: 110 m2; lognormal variance with pedigree 0.1806, pedigree (3,3,5,1,3)
  Calculation for gas pipeline
  Uncertainty: C
- Transformation, to seabed, infrastructure [natural resource, land]: 110 m2; lognormal variance with pedigree 0.1806, pedigree (3,3,5,1,3)
  Calculation for gas pipeline
  Uncertainty: C
- Water, unspecified natural origin [natural resource, in water]: 186.69 m3; name water_UNO_input; lognormal variance with pedigree 0.0412, pedigree (2,3,5,1,1)
  Environmental report
  Uncertainty: E

## Emissions to nature
- Water [air, unspecified]: 28.0035 m3; name water_to_air_unspecified; = (water_UNO_input*fraction_PW_to_air); lognormal variance with pedigree 0.0807, pedigree (2,2,5,1,1)
  Calculated value based on literature values and expert opinion. See comments in the parametres' comment field.
  property fraction, origin: fresh water 0; name fraction_origin_fresh_water
  property fraction, origin: salt water 0; name fraction_origin_salt_water
  property fraction, origin: unspecified 1; name fraction_origin_unspecified
- Aluminium III [water, ocean]: 2818 kg; lognormal variance with pedigree 1.448, pedigree (5,5,5,1,1)
  Estimation 85% utilisation of anode
  Uncertainty: E
- Copper ion [water, ocean]: 0.1785 kg; lognormal variance with pedigree 1.448, pedigree (5,5,5,1,1)
  Estimation 85% utilisation of anode
  Uncertainty: E
- Iron ion [water, ocean]: 3.57 kg; lognormal variance with pedigree 1.448, pedigree (5,5,5,1,1)
  Estimation 85% utilisation of anode
  Uncertainty: E
- Silicon [water, ocean]: 4.4625 kg; lognormal variance with pedigree 1.448, pedigree (5,5,5,1,1)
  Estimation 85% utilisation of anode
  Uncertainty: E
- Titanium ion [water, ocean]: 0.59883 kg; lognormal variance with pedigree 1.448, pedigree (5,5,5,1,1)
  Estimation 85% utilisation of anode
  Uncertainty: E
- Water [water, unspecified]: 158.686 m3; name water_to_water_unspecified; = water_UNO_input*(1-fraction_PW_to_air); lognormal variance with pedigree 0.0807, pedigree (2,2,5,1,1)
  (same comment as for Water)
  property carbon content, fossil 0; name C_content_fossil
  property carbon content, non-fossil 0; name C_content_non_fossil
  property dry mass 0 kg; name DM
  property fraction, origin: fresh water 0; name fraction_origin_fresh_water_Ww
  property fraction, origin: salt water 0; name fraction_origin_salt_water_Ww
  property fraction, origin: unspecified 1; name fraction_origin_unspecified_Ww
  property water in wet mass 1000 kg; name WWM
  property wet mass 1000 kg; name WM
- Zinc II [water, ocean]: 148.75 kg; lognormal variance with pedigree 1.448, pedigree (5,5,5,1,1)
  Estimation 85% utilisation of anode
  Uncertainty: E

## Sampling procedure
Literature and environmental report of a multinational company.

## Extrapolations
From single data to global situation.

## Review by Michael Spielmann (obsolete) 2005-07-19
Passed.
