# power saw production, with catalytic converter

Dataset: EcoSpold 2, unit process
Geography: GLO
Time period: 2011-01-01 to 2023-12-31
Technology level: current
Classification: ISIC rev.4 ecoinvent: 2818:Manufacture of power-driven hand tools
Synonyms: Kettensäge; chain; motor
Tags: Swiss Brushup completed
Scenario: Business-as-Usual
System model: Allocation, cut-off by classification
Generated by: Frank Werner
Published in: Kellenberger D. 2007
Database: ecoinvent
isCopyrightProtected: true
accessRestrictedTo: 1

## General comment
The composition is based on one type of power saw (produced in Stihl, Germany) and the transportation distances are partly estimated. This module should not be used if its relative importance would be high in a certain environmental inventory. Service life capacity, declared by producer: 2500 hours

## Included activities end
Based on the module for power saw without catalytic converter, adding some ceramics, platinum and rhodium to describe the catalytic converter.

## Geography
The power saw studied is produced in Germany and used as proxy for RER. For some elementary flows proxys (other geographical origin) have been used.

## Technology
An average chainsaw weights about 7 kg. It is assumed that about 5.4 kg are unalloyed steel. The remaining 1.6 kg consists of the chain (0.4 kg) and the running rail (blade). Chain and running rail are made of highly alloyed steel. Service life of a chainsaw is around 2'500 service hours. The chain is replaced every 65 service hours; the running rail is replaced every 200 hours.

## Reference product
- power saw, with catalytic converter: 1 unit; By-product classification allocatable product; CPC 88768: Power-driven hand tool manufacturing services; HS2017 846781: Tools; for working in the hand, chain saws with self-contained non-electric motor
  production volume 4 unit
    This is a placeholder value that does not reflect real-world production volumes. This dataset does not currently require a real-world production volume to work in the database framework, and no actual data were collected yet. This has no negative effect on the results of the ecoinvent database. The placeholder value of this activity was scaled according to the nominal GDP of 2005 (source: United Nations, http://data.un.org/Glossary.aspx?q=GDP+%28current+US%24%29, accessed 20130726) to reflect an appropriate share of the global production volume, which is also a placeholder value.
  property price 25.7521 EUR2005
    Calculated based on inputs: The price of the product has been calculated as a sum of the values of the material and energy inputs for this product. This value is therefore a rough estimation. It may underestimate the real price since there are additional expenses when producing any product. These expences can include for example labour costs, treatment of waste materials and profit for the producer. Please consider carefully whether this level of data quality is acceptable for your application.
  properties: carbon allocation 0 kg, carbon content 0

## Inputs from technosphere
- palladium: 3e-5 kg; lognormal variance with pedigree 0.29, pedigree (5,5,5,5,5)
  properties: UVEK_link_1 3342, UVEK_relative_amount_1 1, dry mass 1 kg, wet mass 1 kg
  note on UVEK_link_1: to be used only in special submissions in coordination with ecoinvent and the Swiss FOEN.
- platinum: 0.00016 kg; name m_platinum; lognormal variance with pedigree 0.29, pedigree (5,5,5,5,5)
  properties: UVEK_link_1 3342, UVEK_relative_amount_1 1, dry mass 1 kg, wet mass 1 kg
- power saw, without catalytic converter: 1 unit; lognormal variance with pedigree 0.235, pedigree (5,5,5,5,5)
  reflecting the reality of the supply chain

## Sampling procedure
Most data obtained by personal communication. Data for the catalytic converter were extrapolated from data for car equipment.

## Extrapolations
See geography
