# prohexadione calcium production

Dataset: EcoSpold 2, unit process
Geography: GLO
Time period: 2020-01-01 to 2023-12-31
Technology level: current
Classification: ISIC rev.4 ecoinvent: 2011:Manufacture of basic chemicals
Scenario: Business-as-Usual
System model: Allocation, cut-off by classification
Generated by: Daria Dellenbach
Database: ecoinvent
isCopyrightProtected: true
accessRestrictedTo: 1

## General comment
This dataset represents the production of 1 kg of prohexadione calcium. Emissions are estimated. Energy consumptions, infrastructure and transports are calculated with standard values. A yield of 95% per chemical step was assumed.
Prohexadione calcium is an organic substance with the CAS no.: 127277-53-6. It is called 'calcium 3,5-dioxo-4-(1-oxopropyl)-cyclohexanecarboxylate' under IUPAC naming and its molecular formula is: C10H10CaO5. It is solid under normal conditions of temperature and pressure as a white to yellowish fine powder. It is modelled as a pure substance. Prohexadione calcium is a plant growth regulator, which is applied foliar in cereals, turf grasses, rape and ornamental plants. There are no publicly available information about the consumption of this substance on industrial sites.
Reference(s):
Unger T., (1996). Pesticide Synthesis Handbook, Noyes Publication.
Sauter H., Zeeh B., (2009): Plant Growth Regulators, in Ullmanns Encyclopedia of Industrial Chemistry, Weinheim, Wiley-VCH.
US Patent Office (1986), US5074903A
Chemiepark GENDORF, Umwelterklärung 2016, https://www.gendorf.de/Nachbarn/Umweltschutz/Industrie%20und%20Nachhaltigkeit
Chemiepark GENDORF, Umwelterklärung 2017, https://www.gendorf.de/Nachbarn/Umweltschutz/Industrie%20und%20Nachhaltigkeit
Chemiepark GENDORF, Umwelterklärung 2020, https://www.gendorf.de/Nachbarn/Umweltschutz/Industrie%20und%20Nachhaltigkeit
European Patent Office (1989), EP0338986A2
European Patent Office (1984), EP0136702A2
Hischier, R. (2005) Establishing Life Cycle Inventories of Chemicals Based on Differing Data Availability (9 pp). The International Journal of Life Cycle Assessment, Volume 10, Issue 1, pp 59–67. 10.1065/lca2004.10.181.7

## Included activities start
Cradle to gate. The activity starts when the raw materials enter the process.

## Included activities end
Production of prohexadione calcium production including materials, energy uses, infrastructure and emissions.

## Technology
Prohexadione calcium is a plant growth regulator produced in nine steps from phosgene and ethanol.
COCl2 + 2 C2H6O --> C5H10O3 + 2 HCl
C5H10O3 + C4H8O --> C7H12O3 + C2H6O
C7H12O3 + C4H7O2Cl --> C11H18O5 + HCl
C11H18O5 + C2H5ONa --> C9H13O4Na + 2 C2H5O
C9H13O4Na + HCl --> C9H14O4 + NaCl
C9H14O4 + C3H5ClO --> C12H18O5 + HCl
C12H18O5 + C7H10N2+H2 --> C12H16O5 + 2 CH4 + C5H6N2
C12H16O5 + NaOH -->C10H12O5 + NaC2H5O
C10H12O5 + CaO --> C10H10O5Ca + H2O
Precurors needed for this synthesis are ethylchloroacetate, propionyl chloride and dimehtylaminopyridine.
ethylchloroacetate (C4H7O2Cl) is produced from chloroacetic acid and ethanol:
C2H3ClO2 + C2H6O --> C4H7O2Cl + H2O
Propionyl chloride (C3H5ClO) is produced from propionic acid and phosgene:
C3H6O2 + COCl2 --> C3H5ClO + CO2 + HCl
Dimehtylaminopyridine (C7H10N2) is produced from aminopyridine and dimethylamine:
C5H6N2 + C2H7N --> C7H10N2 + NH3
Sodium hydroxide is added to neutralize the formed hydrochloric acid.
Reference(s):
Unger T., (1996). Pesticide Synthesis Handbook, Noyes Publication.
Sauter H., Zeeh B., (2009): Plant Growth Regulators, in Ullmanns Encyclopedia of Industrial Chemistry, Weinheim, Wiley-VCH.

## Reference product
- prohexadione calcium: 1 kg; name RP; By-product classification allocatable product; CPC 34663: Herbicides, anti-sprouting products and plant-growth regulators; HS2017 380893: Herbicides, anti-sprouting products and plant-growth regulators; other than containing goods of Subheading [...]; CAS 127277-53-6
  production volume 460233 kg; name PV_RP; = (80000+10067.65)/(0.0357+0.1600)
    Calculated value. The global production volume is extrapolated from the German and US production volumes of prohexadione using the global average GDP (constant 2017 international USD from 2015-2019). The annual production value of Germany in the year 2017 is 80000 kg and the US production volume in 2017 is 10067.65 kg. This value is divided by the German share of global GDP, 3.57% (2015-2019), and the US share, 16.00% (2015-2019).
    References:
    Bundesamt für Verbraucherschutz und Lebensmittelsicherheit (2018): Absatz an Pflanzenschutzmitteln in der Bundesrepublik Deutschland 2017, available here: https://www.bvl.bund.de/SharedDocs/Downloads/04_Pflanzenschutzmittel/01_meldungen_par_64/meld_par_64_2017.pdf?__blob=publicationFile&v=2, accessed 07-06-2022.
    U.S. Geological Survey (2018): Estimated Annual Agricultural Pesticide Use, available here: https://water.usgs.gov/nawqa/pnsp/usage/maps/county-level/, accessed 07-06-2022.
    World bank (2022): GDP, available here: https://data.worldbank.org/indicator/NY.GDP.MKTP.PP.KD, accessed 17-05-2022.
  property price 6.76724 EUR2005
    The price is calculated based on price information from Alibaba (available here: https://www.alibaba.com/product-detail/Factory-direct-supply-Prohexadione-calcium-CAS_1600452572709.html?spm=a2700.7724857.0.0.7bf73937ulepHw, last accessed 2022-08-03).
    The prices were converted to EUR based on the annual exchange rates published by the European Central Bank (https://sdw.ecb.europa.eu/quickview.do?SERIES_KEY=120.EXR.A.USD.EUR.SP00.A, last accessed on 2022-02-15) and adjusted for inflation relative to 2005 using the producer price index (PPI) of the euro area, published by eurostat (https://appsso.eurostat.ec.europa.eu/nui/show.do?dataset=sts_inpp_a&lang=en, last accessed on 2022-05-04).
  properties: carbon allocation 0.0844869 kg, carbon content 0.0844869, carbon content, fossil 0.0844869, carbon content, non-fossil 0, dry mass 1 kg, water content 0, water in wet mass 0 kg, wet mass 1 kg

## Inputs from technosphere
- aminopyridine: 0.0720986, 0.016912 kg (2 suppliers, which the file names only by identifier); sum of these 0.0890106 kg; lognormal variance with pedigree 0.010025, pedigree (2,5,2,2,2)
  Calculated based on stoichiometry. See technology comment for the description of the reaction. It is assumed that the formed aminopyridine is recycled within the system.
  properties: carbon content, fossil 0.679054, dry mass 1 kg, heating value, net 27.06 MJ, wet mass 1 kg
  note on carbon content, fossil: Calculated based on molecular structure. See tab "chemicals".
- chemical factory, organics: 4.54e-9 unit; lognormal variance with pedigree 0.3494, pedigree (2,5,2,4,4)
  Calculated based on literature data published by the industry. For this activity, no information was readily available concerning infrastructure and land-use. Therefore, the infrastructure is estimated based on data from two chemical factories, the BASF site of Ludwigshafen and the chemical factory in Gendorf (which are both located in Germany), which produce a wide range of chemical substances. Based on this data, the following assumptions are made: the built area amounts to about 4.2 ha, the plant has an average output of 50'000 t/a and a lifespan of fifty years. The estimated infrastructure amount is therefore 4.00 E-10 units per kg of produced chemical.
  Since this process comprises 12 reactions to produce the final product, the default value was scaled up. To produce 1 kg of output, 10.35 kg of intermediate products are necessary. The value was therefore scaled up with the factor 11.35.
  References:
  Althaus H.-J., Chudacoff M., Hischier R., Jungbluth N., Osses M. and Primas A. (2007) Life Cycle Inventories of Chemicals. ecoinvent report No. 8, v2.0. EMPA Dübendorf, Swiss Centre for Life Cycle Inventories, Dübendorf, CH.
  Gendorf (2000) Umwelterklärung 2000, Werk Gendorf. Werk Gendorf, Burgkirchen.
- chloroacetic acid: 0.209524, 0.424261 kg (2 suppliers, which the file names only by identifier); sum of these 0.633785 kg; lognormal variance with pedigree 0.010025, pedigree (2,5,2,2,2)
  Calculated based on stoichiometry. See technology comment for the description of the reaction.
  properties: carbon content, fossil 0.255319, dry mass 1 kg, heating value, net 11.55 MJ, wet mass 1 kg
- compressed air, 1000 kPa gauge: 3.6477, 1.48432 m3 (2 suppliers, which the file names only by identifier); sum of these 5.13202 m3; lognormal variance with pedigree 0.05, pedigree (2,5,2,4,4)
  Calculated based on literature data published by the GENDORF Chemical Park. The factory produced an average of 2462760 tonnes of chemical substances (including intermediates) per year in the years 2015-2019. The average consumption of compressed air in the years 2015-2019 was 1113557454 m3 per year. This equals 0.45216 m3/kg chemical produced.
  Since this process comprises 12 reactions to produce the final product, the default value was scaled up. To produce 1 kg of output, 10.35 kg of intermediate products are necessary. The value was therefore scaled up with the factor 11.35.
  References:
  Chemiepark GENDORF, Umwelterklärung 2016, https://www.gendorf.de/Nachbarn/Umweltschutz/Industrie%20und%20Nachhaltigkeit
  Chemiepark GENDORF, Umwelterklärung 2017, https://www.gendorf.de/Nachbarn/Umweltschutz/Industrie%20und%20Nachhaltigkeit
  Chemiepark GENDORF, Umwelterklärung 2020, https://www.gendorf.de/Nachbarn/Umweltschutz/Industrie%20und%20Nachhaltigkeit
- dimethylamine: 0.180089, 0.0433096 kg (2 suppliers, which the file names only by identifier); sum of these 0.223399 kg; lognormal variance with pedigree 0.01, pedigree (2,5,2,1,2)
  (same comment as for chloroacetic acid)
  properties: carbon content, fossil 0.533333, dry mass 1 kg, heating value, net 13.47 MJ, wet mass 1 kg
- electricity, medium voltage: 4.52933 kWh; lognormal variance with pedigree 0.05, pedigree (2,5,2,4,4)
  Calculated based on literature data published by the GENDORF Chemical Park. The factory produced an average of 2462760 tonnes of chemical substances (including intermediates) per year in the years 2015-2019. The average consumption of electricity in the years 2015-2019 was 982796751 kWh per year. This equals 0.39906 kWh/kg chemical produced.
  Since this process comprises 12 reactions to produce the final product, the default value was scaled up. To produce 1 kg of output, 10.35 kg of intermediate products are necessary. The value was therefore scaled up with the factor 11.35.
  References:
  Chemiepark GENDORF, Umwelterklärung 2016, https://www.gendorf.de/Nachbarn/Umweltschutz/Industrie%20und%20Nachhaltigkeit
  Chemiepark GENDORF, Umwelterklärung 2017, https://www.gendorf.de/Nachbarn/Umweltschutz/Industrie%20und%20Nachhaltigkeit
  Chemiepark GENDORF, Umwelterklärung 2020, https://www.gendorf.de/Nachbarn/Umweltschutz/Industrie%20und%20Nachhaltigkeit
- ethanol, without water, in 99.7% solution state, from fermentation: 0.720454 kg; lognormal variance with pedigree 0.010025, pedigree (2,5,2,2,2)
  Calculated based on stoichiometry. See technology comment for the description of the reaction. It is assumed that the formed ethanol is recycled within the system.
  properties: carbon content, non-fossil 0.521739, dry mass 1 kg, heating value, net 31.58 MJ, wet mass 1 kg
- heat, district or industrial, natural gas: 21.4118 MJ; lognormal variance with pedigree 0.05, pedigree (2,5,2,4,4)
  Calculated based on literature data published by the GENDORF Chemical Park. The factory produced an average of 2462760 tonnes of chemical substances (including intermediates) per year in the years 2015-2019. The average consumption of natural gas in the years 2015-2019 was 4645920000 MJ per year. This equals 1.8865 MJ/kg chemical produced.
  Since this process comprises 12 reactions to produce the final product, the default value was scaled up. To produce 1 kg of output, 10.35 kg of intermediate products are necessary. The value was therefore scaled up with the factor 11.35.
  References:
  Chemiepark GENDORF, Umwelterklärung 2016, https://www.gendorf.de/Nachbarn/Umweltschutz/Industrie%20und%20Nachhaltigkeit
  Chemiepark GENDORF, Umwelterklärung 2017, https://www.gendorf.de/Nachbarn/Umweltschutz/Industrie%20und%20Nachhaltigkeit
  Chemiepark GENDORF, Umwelterklärung 2020, https://www.gendorf.de/Nachbarn/Umweltschutz/Industrie%20und%20Nachhaltigkeit
  properties: heating value, net 1 MJ
- heat, from steam, in chemical industry: 2.00502, 0.35351 MJ (2 suppliers, which the file names only by identifier); sum of these 2.35853 MJ; lognormal variance with pedigree 0.05, pedigree (2,5,2,4,4)
  Calculated based on literature data published by the GENDORF Chemical Park. The factory produced an average of 2462760 tonnes of chemical substances (including intermediates) per year in the years 2015-2019. The average consumption of steam (internal and external sources) in the years 2015-2019 was 511785800 MJ per year. This equals 0.2078 MJ/kg chemical produced.
  Since this process comprises 12 reactions to produce the final product, the default value was scaled up. To produce 1 kg of output, 10.35 kg of intermediate products are necessary. The value was therefore scaled up with the factor 11.35.
  References:
  Chemiepark GENDORF, Umwelterklärung 2016, https://www.gendorf.de/Nachbarn/Umweltschutz/Industrie%20und%20Nachhaltigkeit
  Chemiepark GENDORF, Umwelterklärung 2017, https://www.gendorf.de/Nachbarn/Umweltschutz/Industrie%20und%20Nachhaltigkeit
  Chemiepark GENDORF, Umwelterklärung 2020, https://www.gendorf.de/Nachbarn/Umweltschutz/Industrie%20und%20Nachhaltigkeit
  properties: heating value, net 1 MJ
- hydrochloric acid, without water, in 30% solution state: 0.00378005, 0.0172693 kg (2 suppliers, which the file names only by identifier); sum of these 0.0210494 kg; lognormal variance with pedigree 0.01, pedigree (2,5,2,1,2)
  (same comment as for chloroacetic acid)
  properties: dry mass 1 kg, heating value, net 3.32 MJ, wet mass 1 kg
- hydrogen, gaseous, medium pressure, merchant: 0.00108107, 0.00516511, 0.00324321 kg (3 suppliers, which the file names only by identifier); sum of these 0.00948939 kg; lognormal variance with pedigree 0.010025, pedigree (2,5,2,2,2)
  (same comment as for chloroacetic acid)
  properties: dry mass 1 kg, heating value, net 120.21 MJ, wet mass 1 kg
- methyl ethyl ketone: 0.139968, 0.370921 kg (2 suppliers, which the file names only by identifier); sum of these 0.510889 kg; lognormal variance with pedigree 0.010025, pedigree (2,5,2,2,2)
  (same comment as for chloroacetic acid)
  properties: carbon content, fossil 0.666667, dry mass 1 kg, heating value, net 33.63 MJ, wet mass 1 kg
- nitrogen, liquid: 0.131908, 0.0362079 kg (2 suppliers, which the file names only by identifier); sum of these 0.168116 kg; lognormal variance with pedigree 0.05, pedigree (2,5,2,4,4)
  Calculated based on literature data published by the GENDORF Chemical Park. The factory produced an average of 2462760 tonnes of chemical substances (including intermediates) per year in the years 2015-2019. The average consumption of nitrogen, liquid in the years 2015-2019 was 29168033 m3 per year. This equals 0.014812 kg/kg chemical produced. The density to convert to kg was assumed to be 1.2506 kg/m3.
  Since this process comprises 12 reactions to produce the final product, the default value was scaled up. To produce 1 kg of output, 10.35 kg of intermediate products are necessary. The value was therefore scaled up with the factor 11.35.
  References:
  Chemiepark GENDORF, Umwelterklärung 2016, https://www.gendorf.de/Nachbarn/Umweltschutz/Industrie%20und%20Nachhaltigkeit
  Chemiepark GENDORF, Umwelterklärung 2017, https://www.gendorf.de/Nachbarn/Umweltschutz/Industrie%20und%20Nachhaltigkeit
  Chemiepark GENDORF, Umwelterklärung 2020, https://www.gendorf.de/Nachbarn/Umweltschutz/Industrie%20und%20Nachhaltigkeit
  properties: dry mass 1 kg, wet mass 1 kg
- phosgene, liquid: 0.423777, 0.858094 kg (2 suppliers, which the file names only by identifier); sum of these 1.28187 kg; lognormal variance with pedigree 0.010025, pedigree (2,5,2,2,2)
  (same comment as for chloroacetic acid)
  properties: carbon content, fossil 0.122449, dry mass 1 kg, heating value, net 3.68 MJ, wet mass 1 kg
- propionic acid: 0.492082 kg; lognormal variance with pedigree 0.010025, pedigree (2,5,2,2,2)
  (same comment as for chloroacetic acid)
  properties: carbon content, fossil 0.48641, dry mass 1 kg, heating value, net 24.55 MJ, wet mass 1 kg
- quicklime, milled, loose: 0.235081, 0.0019646 kg (2 suppliers, which the file names only by identifier); sum of these 0.237045 kg; lognormal variance with pedigree 0.010025, pedigree (2,5,2,2,2)
  (same comment as for chloroacetic acid)
  properties: dry mass 0.99 kg, water content 0.010101, wet mass 1 kg
- sodium ethoxide: 0.154322 kg; lognormal variance with pedigree 0.010025, pedigree (2,5,2,2,2)
  Calculated based on stoichiometry. See technology comment for the description of the reaction. It is assumed that the formed sodium ethoxide is recycled within the system.
  properties: carbon content, fossil 0.353001, dry mass 1 kg, heating value, net 19.6 MJ, wet mass 1 kg
- sodium hydroxide, without water, in 50% solution state: 0.12103, 1.23945 kg (2 suppliers, which the file names only by identifier); sum of these 1.36048 kg; lognormal variance with pedigree 0.01, pedigree (2,5,2,1,2)
  (same comment as for chloroacetic acid)
  properties: dry mass 1 kg, heating value, net 3.03 MJ, wet mass 1 kg
- tap water: 0.255375 kg; lognormal variance with pedigree 0.05, pedigree (2,5,2,4,4)
  Calculated based on literature data published by the GENDORF Chemical Park. The factory produced an average of 2462760 tonnes of chemical substances (including intermediates) per year in the years 2015-2019. The average consumption of tap water in the years 2015-2019 was 55352 t per year. This equals 0.0225 kg/kg chemical produced.
  Since this process comprises 12 reactions to produce the final product, the default value was scaled up. To produce 1 kg of output, 10.35 kg of intermediate products are necessary. The value was therefore scaled up with the factor 11.35.
  References:
  Chemiepark GENDORF, Umwelterklärung 2016, https://www.gendorf.de/Nachbarn/Umweltschutz/Industrie%20und%20Nachhaltigkeit
  Chemiepark GENDORF, Umwelterklärung 2017, https://www.gendorf.de/Nachbarn/Umweltschutz/Industrie%20und%20Nachhaltigkeit
  Chemiepark GENDORF, Umwelterklärung 2020, https://www.gendorf.de/Nachbarn/Umweltschutz/Industrie%20und%20Nachhaltigkeit
  properties: carbon content, fossil 0.00178991, dry mass 0.000337476 kg, water content 2962.17, wet mass 1 kg
  note on carbon content, fossil: Bicarbonate content is 2.93 mol/m3. CO2 content is 0.1 mol/m3 (ecoinvent v2.2 report 8, Tab 93.1).
- wastewater, average: -1.24377e-7, -2.06968e-5, -4.94904e-6, -7.36887e-8 m3 (4 suppliers, which the file names only by identifier); sum of these -2.58439e-5 m3; lognormal variance with pedigree 0.0498, pedigree (2,5,1,4,4)
  Calculated based on literature data published by the GENDORF Chemical Park. The factory produced an average of 2462760 tonnes of chemical substances (including intermediates) per year in the years 2015-2019. The average ouput of wastewater going to an external wastewater treatment plant in the years 2015-2019 was 5608 m3 per year. This equals 0.000002277 m3/kg chemical produced.
  Since this process comprises 12 reactions to produce the final product, the default value was scaled up. To produce 1 kg of output, 10.35 kg of intermediate products are necessary. The value was therefore scaled up with the factor 11.35.
  References:
  Chemiepark GENDORF, Umwelterklärung 2016, https://www.gendorf.de/Nachbarn/Umweltschutz/Industrie%20und%20Nachhaltigkeit
  Chemiepark GENDORF, Umwelterklärung 2017, https://www.gendorf.de/Nachbarn/Umweltschutz/Industrie%20und%20Nachhaltigkeit
  Chemiepark GENDORF, Umwelterklärung 2020, https://www.gendorf.de/Nachbarn/Umweltschutz/Industrie%20und%20Nachhaltigkeit
  production volume; name PV_wastewater; = (BP_wastewater* PV_RP/RP)
    Calculated from the production volume of the reference product in proportion to the respective output amounts.
  properties: carbon content, non-fossil 0.194039, dry mass 0.346837 kg, water content 2882.2, wet mass 1000 kg
  note on carbon content, non-fossil: 0.0673 kg TOC/m3 (Tab A.17, ecoinvent v2.2 report 13_I). TOC was considered as Total Carbon.

## Inputs from nature
- Water, cooling, unspecified natural origin [natural resource, in water]: 0.166924 m3; lognormal variance with pedigree 0.05, pedigree (2,5,2,4,4)
  Calculated based on literature data published by the GENDORF Chemical Park. The factory produced an average of 2462760 tonnes of chemical substances (including intermediates) per year in the years 2015-2019. The average amount of cooling water released in the years 2015-2019 was 34408800 t per year. It was assumed that 5% of the cooling water was emitted to air during its use, therefore, to calculate the input of cooling water, the output value reported by GENDORF was scaled up by the factor 1/0.95. This equals 0.014707 m3/kg chemical produced.
  Since this process comprises 12 reactions to produce the final product, the default value was scaled up. To produce 1 kg of output, 10.35 kg of intermediate products are necessary. The value was therefore scaled up with the factor 11.35.
  References:
  Chemiepark GENDORF, Umwelterklärung 2016, https://www.gendorf.de/Nachbarn/Umweltschutz/Industrie%20und%20Nachhaltigkeit
  Chemiepark GENDORF, Umwelterklärung 2017, https://www.gendorf.de/Nachbarn/Umweltschutz/Industrie%20und%20Nachhaltigkeit
  Chemiepark GENDORF, Umwelterklärung 2020, https://www.gendorf.de/Nachbarn/Umweltschutz/Industrie%20und%20Nachhaltigkeit
- Water, river [natural resource, in water]: 0.0109576 m3; lognormal variance with pedigree 0.05, pedigree (2,5,2,4,4)
  Calculated based on literature data published by the GENDORF Chemical Park. The factory produced an average of 2462760 tonnes of chemical substances (including intermediates) per year in the years 2015-2019. The average consumption of river water in the years 2015-2019 was 22000820 t per year. However, since the cooling water is modelled as an input, the amount of river water was adjusted to avoid double counting. 55% of the input amount of cooling water was deducted from the amount of river water, as that is the share of river water versus well water. This equals 0.00096543 m3/kg chemical produced.
  Since this process comprises 12 reactions to produce the final product, the default value was scaled up. To produce 1 kg of output, 10.35 kg of intermediate products are necessary. The value was therefore scaled up with the factor 11.35.
  References:
  Chemiepark GENDORF, Umwelterklärung 2016, https://www.gendorf.de/Nachbarn/Umweltschutz/Industrie%20und%20Nachhaltigkeit
  Chemiepark GENDORF, Umwelterklärung 2017, https://www.gendorf.de/Nachbarn/Umweltschutz/Industrie%20und%20Nachhaltigkeit
  Chemiepark GENDORF, Umwelterklärung 2020, https://www.gendorf.de/Nachbarn/Umweltschutz/Industrie%20und%20Nachhaltigkeit
- Water, well, in ground [natural resource, in water]: 0.0092675 m3; lognormal variance with pedigree 0.05, pedigree (2,5,2,4,4)
  Calculated based on literature data published by the GENDORF Chemical Park. The factory produced an average of 2462760 tonnes of chemical substances (including intermediates) per year in the years 2015-2019. The average consumption of well water in the years 2015-2019 was 18607480 t per year. However, since the cooling water is modelled as an input, the amount of well water was adjusted to avoid double counting. 45% of the input amount of cooling water was deducted from the amount of well water, as that is the share of well water versus river water. This equals 0.00081652 m3/kg chemical produced.
  Since this process comprises 12 reactions to produce the final product, the default value was scaled up. To produce 1 kg of output, 10.35 kg of intermediate products are necessary. The value was therefore scaled up with the factor 11.35.
  References:
  Chemiepark GENDORF, Umwelterklärung 2016, https://www.gendorf.de/Nachbarn/Umweltschutz/Industrie%20und%20Nachhaltigkeit
  Chemiepark GENDORF, Umwelterklärung 2017, https://www.gendorf.de/Nachbarn/Umweltschutz/Industrie%20und%20Nachhaltigkeit
  Chemiepark GENDORF, Umwelterklärung 2020, https://www.gendorf.de/Nachbarn/Umweltschutz/Industrie%20und%20Nachhaltigkeit

## Emissions to nature
- Ammonia [air, unspecified]: 0.000398843 kg; lognormal variance with pedigree 0.049425, pedigree (2,5,2,2,2)
  Calculated losses, based on the boiling point of a chemical, to water or to air. In addition, unreacted chemicals are assumed to go to wastewater treatment, which has a conversion rate in biological treatment of 95% of carbon into carbon dioxide. The remaining 5% are released as emissions to water.
- Carbon dioxide, fossil [air, unspecified]: 1.65396 kg; lognormal variance with pedigree 0.010025, pedigree (2,5,2,2,2)
  Calculated based on the carbon content of unreacted chemical substances. The unreacted chemicals are assumed to go to wastewater treatment, which has a conversion rate in biological treatment of 95% of carbon into carbon dioxide. The remaining 5% are released as emissions to water, unspecified.
- Dimethylamine [air, unspecified]: 0.001117 kg; lognormal variance with pedigree 0.049425, pedigree (2,5,2,2,2)
  (same comment as for Ammonia)
- Ethanol [air, unspecified]: 0.00449965 kg; lognormal variance with pedigree 0.049425, pedigree (2,5,2,2,2)
  (same comment as for Ammonia)
- Hydrocarbons, aliphatic, alkanes, unspecified [air, unspecified]: 0.458685 kg; lognormal variance with pedigree 0.049425, pedigree (2,5,2,2,2)
  (same comment as for Ammonia)
- Hydrogen [air, unspecified]: 4.7447e-5 kg; lognormal variance with pedigree 0.049425, pedigree (2,5,2,2,2)
  (same comment as for Ammonia)
- Methane, fossil [air, unspecified]: 0.142768 kg; lognormal variance with pedigree 0.049425, pedigree (2,5,2,2,2)
  (same comment as for Ammonia)
- Methyl ethyl ketone [air, unspecified]: 0.00180964 kg; lognormal variance with pedigree 0.049425, pedigree (2,5,2,2,2)
  (same comment as for Ammonia)
- Nitrogen [air, unspecified]: 0.168116 kg; lognormal variance with pedigree 0.0894, pedigree (2,5,2,4,4)
  Calculated value. The amount of nitrogen released to air is equal to the amount of nitrogen entering the activity.
  Since this process comprises 12 reactions to produce the final product, the default value was scaled up. To produce 1 kg of output, 10.35 kg of intermediate products are necessary. The value was therefore scaled up with the factor 11.35.
- Phosgene [air, unspecified]: 0.00640936 kg; lognormal variance with pedigree 0.049425, pedigree (2,5,2,2,2)
  (same comment as for Ammonia)
- Water [air, unspecified]: 0.0176202 m3; lognormal variance with pedigree 0.0894, pedigree (2,5,2,4,4)
  Calculated based on literature data published by the GENDORF Chemical Park. The factory produced an average of 2462760 tonnes of chemical substances (including intermediates) per year in the years 2015-2019. To determine the emissions of water to air, the difference of all water inputs (from river, well, tap water and cooling) and outputs (wastewater, emissions to water) was calculated. The average ouput of water to air in the years 2015-2019 was 3620444 m3 per year. This equals 0.00147 m3/kg chemical produced. For more information on the other water exchanges please consult the respective exchange comment.
  Since this process comprises 12 reactions to produce the final product, the default value was scaled up. To produce 1 kg of output, 10.35 kg of intermediate products are necessary. The value was therefore scaled up with the factor 11.35.
  References:
  Chemiepark GENDORF, Umwelterklärung 2016, https://www.gendorf.de/Nachbarn/Umweltschutz/Industrie%20und%20Nachhaltigkeit
  Chemiepark GENDORF, Umwelterklärung 2017, https://www.gendorf.de/Nachbarn/Umweltschutz/Industrie%20und%20Nachhaltigkeit
  Chemiepark GENDORF, Umwelterklärung 2020, https://www.gendorf.de/Nachbarn/Umweltschutz/Industrie%20und%20Nachhaltigkeit
- Ammonium [water, unspecified]: 0.0840385 kg; lognormal variance with pedigree 0.049425, pedigree (2,5,2,2,2)
  (same comment as for Ammonia)
- BOD5, Biological Oxygen Demand [water, unspecified]: 0.0634267 kg; lognormal variance with pedigree 0.049425, pedigree (2,5,2,2,2)
  Calculated value. The BOD, COD, TOC and BOD5 are calculated based on the amount and type of emissions released to water in the same activity.
- COD, Chemical Oxygen Demand [water, unspecified]: 0.0634267 kg; lognormal variance with pedigree 0.049425, pedigree (2,5,2,2,2)
  (same comment as for BOD5, Biological Oxygen Demand)
- Chloride [water, surface water]: 1.23977 kg; lognormal variance with pedigree 0.049425, pedigree (2,5,2,2,2)
  (same comment as for Ammonia)
- DOC, Dissolved Organic Carbon [water, unspecified]: 0.0204745 kg; lognormal variance with pedigree 0.049425, pedigree (2,5,2,2,2)
  (same comment as for BOD5, Biological Oxygen Demand)
- Sodium I [water, surface water]: 0.86263 kg; lognormal variance with pedigree 0.049425, pedigree (2,5,2,2,2)
  (same comment as for Ammonia)
- TOC, Total Organic Carbon [water, unspecified]: 0.0204745 kg; lognormal variance with pedigree 0.049425, pedigree (2,5,2,2,2)
  (same comment as for BOD5, Biological Oxygen Demand)
- Water [water, unspecified]: 0.17089 m3; lognormal variance with pedigree 0.0894, pedigree (2,5,2,4,4)
  Calculated based on literature data published by the GENDORF Chemical Park. The factory produced an average of 2462760 tonnes of chemical substances (including intermediates) per year in the years 2015-2019. The amount of water released back to the environment consists of the sum of the amount of process water treated in the internal WWTP that is then released back to the environment and the amount of cooling water released back to the environment. The average ouput of the internal WWTP in the years 2015-2019 was 2628800 m3 and that of cooling water released back to the environment was 34408800 m3. This gives a yearly average of 37037600 m3 emissions of water to water. This equals 0.01504 m3/kg chemical produced.
  Since this process comprises 12 reactions to produce the final product, the default value was scaled up. To produce 1 kg of output, 10.35 kg of intermediate products are necessary. The value was therefore scaled up with the factor 11.35.
  References:
  Chemiepark GENDORF, Umwelterklärung 2016, https://www.gendorf.de/Nachbarn/Umweltschutz/Industrie%20und%20Nachhaltigkeit
  Chemiepark GENDORF, Umwelterklärung 2017, https://www.gendorf.de/Nachbarn/Umweltschutz/Industrie%20und%20Nachhaltigkeit
  Chemiepark GENDORF, Umwelterklärung 2020, https://www.gendorf.de/Nachbarn/Umweltschutz/Industrie%20und%20Nachhaltigkeit

## Sampling procedure
Literature data and stoichiometric calculation. This inventory is partially based on a generic model of the production of chemicals. The data generated by this model have been improved with compound-specific data when available.
The model of the production of chemicals is using specific industry or literature data wherever possible and more generic data on chemical production processes to fill compound-specific data gaps when necessary. The basic principles of the model have been published in literature (Hischier, 2005). The model has been updated and extended with newly available data from the chemical industry.
In the model, unreacted fractions are treated in a waste treatment process, and emissions reported are after a waste treatment process that is included in the scope of this dataset. For volatile reactants, a small level of evaporation is assumed. Solvents and catalysts are mostly recycled in closed-loop systems within the scope of the dataset and reported flows are for losses from this system.
The main source of information for the values for heat, electricity, water (process and cooling), nitrogen, chemical factory is industry data from the GENDORF Chemical Park. The values are a 5-year average of data from 2015 to 2019 published by the GENDORF Chemical Park, which is based in Germany and produced an average of 2462760 tonnes of chemical substances in the years 2015-2019.

Reference(s):
Hischier, R. (2005) Establishing Life Cycle Inventories of Chemicals Based on Differing Data Availability (9 pp). The International Journal of Life Cycle Assessment, Volume 10, Issue 1, pp 59–67. 10.1065/lca2004.10.181.7
Unger T., (1996). Pesticide Synthesis Handbook, Noyes Publication.
Sauter H., Zeeh B., (2009): Plant Growth Regulators, in Ullmanns Encyclopedia of Industrial Chemistry, Weinheim, Wiley-VCH.
US Patent Office (1986), US5074903A
Chemiepark GENDORF, Umwelterklärung 2016, https://www.gendorf.de/Nachbarn/Umweltschutz/Industrie%20und%20Nachhaltigkeit
Chemiepark GENDORF, Umwelterklärung 2017, https://www.gendorf.de/Nachbarn/Umweltschutz/Industrie%20und%20Nachhaltigkeit
Chemiepark GENDORF, Umwelterklärung 2020, https://www.gendorf.de/Nachbarn/Umweltschutz/Industrie%20und%20Nachhaltigkeit
European Patent Office (1989), EP0338986A2
European Patent Office (1984), EP0136702A2
