# rosin size production, for paper production

Dataset: EcoSpold 2, unit process
Geography: RoW
Time period: 2000-01-01 to 2023-12-31
Technology level: current
Classification: EcoSpold01Categories: chemicals/organics
Classification: ISIC rev.4 ecoinvent: 2029:Manufacture of other chemical products n.e.c.
Tags: ConvertedDataset
Scenario: Business-as-Usual
System model: Allocation, cut-off by classification
Generated by: Roland Hischier
Published in: Hischier R. 2007
Database: ecoinvent
isCopyrightProtected: true
accessRestrictedTo: 1

## General comment
The functional unit represent 1 kg of rosin size. Very large uncertainty of the process data, as only a mixture of different materials is included.
[This dataset was already contained in the ecoinvent database version 2. It was not individually updated during the transfer to ecoinvent version 3. Life Cycle Impact Assessment results may still have changed, as they are affected by changes in the supply chain, i.e. in other datasets. This dataset was generated following the ecoinvent quality guidelines for version 2. It may have been subject to central changes described in the ecoinvent version 3 change report (http://www.ecoinvent.org/database/ecoinvent-version-3/reports-of-changes/), and the results of the central updates were reviewed extensively. The changes added e.g. consistent water flows and other information throughout the database. The documentation of this dataset can be found in the ecoinvent reports of version 2, which are still available via the ecoinvent website. The change report linked above covers all central changes that were made during the conversion process.]

## Included activities end
Mixture of rosin size (approximated by soap) and alkali (shown as sodium hydroxide). Only input of mentioned substances is taken into account.

## Geography
Data used has no specific geographical origin (two examples included already into the database chosen). Data are used as European average data.

## Technology
split to soap (75%) and sodium hydroxide (25%) without any further inputs/outputs

## Reference product
- rosin size, for paper production: 1 kg; By-product classification allocatable product; CPC 35499: Other chemical products n.e.c.; HS2017 380620: Rosin and resin; salts of rosin, of resin acids or of derivatives of rosin or resin acids, other than salts[...]
  EcoSpold01Location=RER
  production volume 8.1e8 kg
    The global rosin production is estimated to be around 1.2 million tonnes in 2014 (Bazmassy & Oy, 2014).
    Baumassy & Oy (2014) The Talloil Industry: 100 years of Innovation. Retrieved online from <https://c.ymcdn.com/sites/www.pinechemicals.org/resource/collection/C9836B4C-DDF1-4725-82D5-AAA0E89C2311/Michel_Baumassy_-_The_Tall_Oil_Industry_-_100_Years_of_Innovation.pdf>, 8.6.2018
  property carbon content, fossil 0
    Mixture of rosin size (approximated by soap) (75%) and alkali (shown as sodium hydroxide) (25%). (ecoinvent v2.2 report 11-III, pg 299).
  property carbon content, non-fossil 0.451685
    (same comment as for rosin size, for paper production)
  property heating value, net 15.62 MJ
    LHV is calculated based on the Carbon content of the product. More details can be found on the respective documentation.
  property price 2.30598 EUR2005
    Calculated based on inputs: The price of the product has been calculated as a sum of the values of the material and energy inputs for this product. This value is therefore a rough estimation. It may underestimate the real price since there are additional expenses when producing any product. These expences can include for example labour costs, treatment of waste materials and profit for the producer. Please consider carefully whether this level of data quality is acceptable for your application.
  properties: carbon allocation 0.451685 kg, carbon content 0.451685, dry mass 1 kg, water content 0, water in wet mass 0 kg, wet mass 1 kg

## Inputs from technosphere
- soap: 0.75 kg; lognormal variance with pedigree 0.158, pedigree (5,5,5,5,3)
  Estimated, based on approximation by soap & alumna
  EcoSpold01Location=RER
  Uncertainty: estimated, based on approximation by soap & alumna
  properties: carbon content, non-fossil 0.692237, dry mass 0.87 kg, heating value, net 17.93 MJ, water content 0.149425, wet mass 1 kg
  note on carbon content, non-fossil: Soap (CnH2n+1 COO Na) is produced by a combined saponification and neutralisation process performed on a blend of oleochemical feedstocks comprised of short chain (C12-14, derived from coconut or palm kernel oil) and long chain (C16-18, from tallow or palm oil) esters.The ratio of short to long fatty acid chains is 20:80 (ecoinvent v2.2 report 12). Short fatty acid has been estimated as C12.5H(2*12.5+1); MW R=176 g/mol. Long fatty acid has been estimated as C16H(2*16+1); MW R=225 g/mol. MW of COONa=67 g/mol
- sodium hydroxide, without water, in 50% solution state: 0.25 kg; lognormal variance with pedigree 0.158, pedigree (5,5,5,5,3)
  EcoSpold01Location=RER
  Estimated, based on approximation by soap & alumna
  Uncertainty: estimated, based on approximation by soap & alumna
  properties: dry mass 1 kg, heating value, net 3.03 MJ, wet mass 1 kg

## Sampling procedure
see technology

## Extrapolations
This dataset has been copied from an original dataset covering the geography RER. The uncertainty has been adjusted accordingly.

## Review by Hans-Jörg Althaus 2003-07-02
passed
