# direct disposal of wastewater from textile production

Dataset: EcoSpold 2, unit process
Geography: GLO
Time period: 2017-01-01 to 2023-12-31
Technology level: current
Classification: ISIC rev.4 ecoinvent: 3700:Sewerage
Scenario: Business-as-Usual
System model: Allocation, cut-off by classification
Generated by: Avraam Symeonidis
Database: ecoinvent
isCopyrightProtected: true
accessRestrictedTo: 1

## General comment
This dataset models the direct disposal of wastewater from textile industry to a water body through a pipe. The wastewater receives no treatment prior to the disposal and the composition reflects this situation (composition prior to any type disposal). The dataset includes minor infrastructure (pipe grid) needed for the disposal.

## Included activities start
Activity starts with the reception of wastewater.

## Included activities end
The datasets includes, as of minimum, sewer infrastructure that drives the wastewater directly to a surface water body,

## Reference product
- wastewater from textile production: -1 m3; By-product classification Waste; CPC 39990: Other wastes n.e.c.
  Wastewater produced from textile mills and representing an average composition of various activities involved in the industry such as bleaching and dyeing.
  production volume 2.32729e10 m3; name pv_rp
    This value is calculated by summing all relevant wastewater produced in global scale from all relevant textile industries.
  property carbon content, non-fossil 0.216883
    COD is 7.79e-4 kg/kg (Tab 12.11, ecoinvent v2.2 report 18_III). COD was converted to TOC, using conversion factors in Tab 4.10 (ecoinvent v2.2 report 13_IV). TOC was considered as Total Carbon.
  property price 0 EUR2005
    Waste products are assigned a price of zero as they are assumed to require further treatment.
  properties: BOD5, mass per volume 0.495 kg/m3, COD, mass per volume 0.501 kg/m3, carbon allocation 0.0517208 kg, carbon content 0.216883, carbon content, fossil 0, dry mass 0.238473 kg, mass concentration, aluminium 0.0007758 kg/m3, mass concentration, arsenic 3.1e-6 kg/m3, mass concentration, barium 7.6e-6 kg/m3, mass concentration, boron 7.6e-5 kg/m3, mass concentration, cadmium 3e-7 kg/m3, mass concentration, chromium 1.5e-5 kg/m3, mass concentration, cobalt 5e-6 kg/m3, mass concentration, copper 0.0001091 kg/m3, mass concentration, iron 0.0005904 kg/m3, mass concentration, lead 6.43e-5 kg/m3, mass concentration, lithium 9.7e-6 kg/m3, mass concentration, magnesium 0.003219 kg/m3, mass concentration, manganese 4.4e-5 kg/m3, mass concentration, potassium 0.01647 kg/m3, mass concentration, silver 5.61e-5 kg/m3, mass concentration, strontium 3.99e-5 kg/m3, mass concentration, titanium 6.9e-6 kg/m3, mass concentration, zinc 0.0001075 kg/m3, water content 4192.34, water in wet mass 999.762 kg, wet mass 1000 kg

## Inputs from technosphere
- sewer grid, 5E9l/year, 110 km: 5.41839e-8 km
  It is assumed that the industry has circa 1 km of sewer grid and discharges 18455666.28 m3 of wastewater. Hence, it is calculated that 5.418E-8 km of sewer grid are needed for the direct disposal of 1 m3 of wastewater.

## Emissions to nature
- Water [air, unspecified]: 0.1 m3
  Calculated value based on water balance.
- Aluminium III [water, surface water]: 0.000776 kg
  Direct emission. The amount is reported in the composition of the wastewater.
- Arsenic ion [water, surface water]: 3.1e-6 kg
  Direct emission. The amount is reported in the composition of the wastewater.
- BOD5, Biological Oxygen Demand [water, surface water]: 0.495 kg
  Direct emission. The amount is reported in the composition of the wastewater.
- Barium II [water, surface water]: 7.6e-6 kg
  Direct emission. The amount is reported in the composition of the wastewater.
- Boron [water, surface water]: 7.6e-5 kg
  Direct emission. The amount is reported in the composition of the wastewater.
- COD, Chemical Oxygen Demand [water, surface water]: 0.501 kg; name cod
  Direct emission. The amount is reported in the composition of the wastewater.
- Cadmium II [water, surface water]: 3e-7 kg
  Direct emission. The amount is reported in the composition of the wastewater.
- Chromium III [water, surface water]: 1.5e-5 kg
  Direct emission. The amount is reported in the composition of the wastewater.
- Chromium VI [water, surface water]: 1.5e-5 kg
  Direct emission. The amount is reported in the composition of the wastewater.
- Cobalt II [water, surface water]: 5e-6 kg
  Direct emission. The amount is reported in the composition of the wastewater.
- Copper ion [water, surface water]: 0.000109 kg
  Direct emission. The amount is reported in the composition of the wastewater.
- DOC, Dissolved Organic Carbon [water, surface water]: 0.185556 kg; name doc; = cod/2.7
  Direct emission. The amount is calculated from the rule of thumb that COD=2.7*DOC.
  Reference: Data quality guidelines
- Iron ion [water, surface water]: 0.00059 kg
  Direct emission. The amount is reported in the composition of the wastewater.
- Lead II [water, surface water]: 6.43e-5 kg
  Direct emission. The amount is reported in the composition of the wastewater.
- Lithium I [water, surface water]: 9.7e-6 kg
  Direct emission. The amount is reported in the composition of the wastewater.
- Magnesium [water, surface water]: 0.00322 kg
  Direct emission. The amount is reported in the composition of the wastewater.
- Manganese II [water, surface water]: 4.4e-5 kg
  Direct emission. The amount is reported in the composition of the wastewater.
- Potassium I [water, surface water]: 0.0165 kg
  Direct emission. The amount is reported in the composition of the wastewater.
- Silver I [water, surface water]: 5.61e-5 kg
  Direct emission. The amount is reported in the composition of the wastewater.
- Strontium II [water, surface water]: 3.99e-5 kg
  Direct emission. The amount is reported in the composition of the wastewater.
- TOC, Total Organic Carbon [water, surface water]: 0.185556 kg; = doc
  Direct emission. The amount is calculated from the rule of thumb that COD=2.7*DOC and the later assumption that DOC=TOC.
  Reference: Data quality guidelines
- Titanium ion [water, surface water]: 6.9e-6 kg
  Direct emission. The amount is reported in the composition of the wastewater.
- Water [water, unspecified]: 0.9 m3
  Calculated value based on water balance.
- Zinc II [water, surface water]: 0.000108 kg
  Direct emission. The amount is reported in the composition of the wastewater.
