# treatment of waste newspaper, municipal incineration FAE

Dataset: EcoSpold 2, unit process
Geography: CH
Time period: 2006-01-01 to 2023-12-31
Technology level: current
Classification: ISIC rev.4 ecoinvent: 3821:Treatment and disposal of non-hazardous waste
Scenario: Business-as-Usual
System model: Allocation, cut-off by classification
Generated by: Nikolia Stoikou
Database: ecoinvent
isCopyrightProtected: true
accessRestrictedTo: 1

## General comment
The process represents the treatment of waste newspaper in a municipal solid waste incinerator (MSWI).This dataset represents the activity of waste disposal of 'waste newspaper' in a municipal solid waste incinerator (MSWI). Recommended use of this dataset: for newspaper, which goes to disposal as part of communal waste mixture. Inventoried waste consists of fraction: 100% newspaper; . Waste composition (wet, in ppmw): gross heating value 15.19 MJ/kg; net heating value 14.11 MJ/kg; H2O 109440; O 386620; H 53858; C 408310; S 1631.1; N 678.41; P 12.167; B na; Cl 1343.3; Br na; F na; I na; Ag 0.47733; As na; Ba 13.571; Cd 0.13891; Co 0.91253; Cr 10.31; Cu 29.989; Hg 0.081846; Mn 46.797; Mo na; Ni 2.319; Pb 90.284; Sb na; Se na; Sn na; V na; Zn 55.563; Be na; Sc na; Sr na; Ti na; Tl na; W na; Si 20871; Fe 139.03; Ca na; Al 12167; K 4679.7; Mg na; Na na. Share of carbon in initial waste input that is biogenic 100%.Share of metals in waste not oxidised and bulk-recyclable (exclude very small or thin parts) Iron: 0%; Alu: 0%; Copper: 0%.Recovery of metal scrap from bottom ash to recycling: 0g iron scrap, 0g aluminium scrap, 0g copper scrap. From this waste, the FLUWA process in the technology mix recovers 0.000416kg (DM) of a hydroxide sludge to be recycled in zinc furnaces. Net energy production: 1.74MJ/kg electric energy and 3.5MJ/kg thermal energy.

## Included activities start
The activity starts with the waste being available at the gate of the treatment facility. Collection and transportation of the waste to the treatment plant is not included.

## Included activities end
The activity ends with the waste being treated and waste-specific emissions from the incineration process and auxiliary material consumption for flue gas cleaning are released to the environment (air and water). Infrastructure and waste-specific energy demands for Municipal Solid Waste Incineration (MSWI) and net energy generation are included.

## Geography
Modelling parameters affecting the treatment technology are specific to this geography and to the technology mix encountered in Switzerland in 2012.

## Technology
The waste is treated in the incineration plant with flue gas cleaning. Incineration is the controlled combustion of a waste and it includes fly ash extraction (FAE) . Auxiliary material consumption for this step of air pollution control (APC) are included in the process. Air polution control includes electrostatic precipitator for fly ash (ESP), wet flue gas scrubber and 25% SNCR , 42.77% SCR-high dust , 32.68% SCR-low dust -DeNOx facilities and 0% without DeNOx (weighted according to mass of burnt waste). Efficiency of iron scrap separation from slag : 58%. Efficiency of aluminium scrap separation from slag : 31%. Efficiency of copper scrap separation from slag : 31%. The technology mix for this dataset includes a filter ash treatment (FLUWA) of a share of 46.22%. Gross electric efficiency technology mix 15.84% and Gross thermal efficiency technology mix 28.51%

## Reference product
- heat, for reuse in municipal waste incineration only: 1 MJ; By-product classification allocatable product; CPC 17300: Steam and hot water
  net useful heat generated from this waste and used in internal MSWI plant energy redistribution.
  production volume 4.85991e8 MJ
    calculated in proportion to incinerated waste input
  property exergy 0.1842 MJ
    This exergy property is based on the exergy content of the product.
  property price 0.0106 EUR2005
    Average European district heat price from Ecoheatcool and Euroheat 2005-2006, Ecoheat Work package 1: The European heat market. Final report. 10.6 EUR/GJ i s the price of district heat. http://www.solarthermalworld.org/files/Ecoheatcool%20WP1%20Web.pdf?download
  properties: allocation factor 0.270688, carbon allocation 0 kg, carbon content 0, true value 0.023114, true value relation 0.1842

## Inputs from technosphere
- ammonia, anhydrous, liquid: 3.47805e-5 kg; lognormal variance with pedigree 0.30046, pedigree (1,1,4,1,1)
  Input to DeNOx stage (100% NH3).
  Uncertainty: uncertainty calculated from uncertainty in average DeNOx input, uncertainty in the share of thermal NOx, uncertainty of nitrogen content in average municipal waste and the uncertainty in nitrogen content in *this* waste.
  properties: dry mass 1 kg, wet mass 1 kg
- bottom ash, MSWI[F], waste newspaper: -0.00693523 kg; lognormal variance with pedigree 0.05316, pedigree (1,1,1,1,1)
  waste-specific bottom ash from the incineration of this waste
  Uncertainty: uncertainty is calculated from uncertainties in waste composition and transfer coefficients in incinerator
  production volume
    calculated in proportion to incinerated waste input
  properties: aluminium content 0.145506, carbon content, non-fossil 0.0261448, dry mass 0.841668 kg, iron content 0.00181086, lead content 0.000840134, manganese content 0.000490302, oxygen content 0.511635, potassium content 0.034843, silicon content 0.262483, sulfur content 0.0147561, water content 0.188117, wet mass 1 kg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
- cationic resin: 3.20661e-8 kg; lognormal variance with pedigree 1.9284, pedigree (1,1,4,1,1)
  auxiliary input for mercury removal in filter ash treatment (FLUWA).
  Uncertainty: uncertainty calculated from uncertainty in of transfer coefficients in the incinerator, and the uncertainty of the waste composition of this waste
  properties: carbon content, fossil 0.521606, dry mass 0.5 kg, heating value, net 6.68 MJ, water content 1, wet mass 1 kg
- chemical, inorganic: 2.92926e-6 kg; lognormal variance with pedigree 0.21108, pedigree (1,1,4,1,1)
  auxiliary inputs for the wastewater treatment stage of the incinerator plant. Proxy for Polyelectrolyte.
  Uncertainty: uncertainty calculated from uncertainty in average Polyelectrolyte input, of transfer coefficients in the incinerator, and the uncertainty of the waste composition of this waste
  properties: carbon content, fossil 0.003, dry mass 1 kg, wet mass 1 kg
- chromium trioxide, flakes: 4.44711e-8 kg; lognormal variance with pedigree 0.60399, pedigree (1,1,4,1,1)
  Input to DeNOx stage. Active component in SCR catalyst (vanadium pentoxide, V2O5), here approximated with the available chromium trioxide.
  Uncertainty: uncertainty calculated from uncertainty in average DeNOx input, uncertainty in the share of thermal NOx, uncertainty of nitrogen content in average municipal waste and the uncertainty in nitrogen content in *this* waste.
  properties: dry mass 1 kg, wet mass 1 kg
- heat, district or industrial, natural gas: 0.00650393 MJ; lognormal variance with pedigree 0.30046, pedigree (1,1,4,1,1)
  Input to DeNOx stage, to heat up flue gas in low-dust SCR.
  Uncertainty: uncertainty calculated from uncertainty in average DeNOx input, uncertainty in the share of thermal NOx, uncertainty of nitrogen content in average municipal waste and the uncertainty in nitrogen content in *this* waste.
  properties: heating value, net 1 MJ
- hydrochloric acid, without water, in 30% solution state: 1.83132e-5 kg; lognormal variance with pedigree 0.042384, pedigree (1,1,4,1,1)
  auxiliary inputs for the wastewater treatment stage of the incinerator plant.
  Uncertainty: uncertainty calculated from uncertainty in average HCl input, of transfer coefficients in the incinerator, and the uncertainty of the waste composition of this waste
  properties: dry mass 1 kg, heating value, net 3.32 MJ, wet mass 1 kg
- hydrogen peroxide, without water, in 50% solution state: 4.46507e-5 kg; lognormal variance with pedigree 0.045185, pedigree (1,1,4,1,1)
  auxiliary oxidising agent for filter ash treatment (FLUWA).
  Uncertainty: uncertainty calculated from uncertainty in of transfer coefficients in the incinerator, and the uncertainty of the waste composition of this waste
  properties: dry mass 1 kg, heating value, net 7.13 MJ, wet mass 1 kg
- iron(III) chloride, without water, in 40% solution state: 1.96906e-7 kg; lognormal variance with pedigree 0.38041, pedigree (1,1,4,1,1)
  auxiliary inputs for the wastewater treatment stage of the incinerator plant.
  Uncertainty: uncertainty calculated from uncertainty in average FeCl3 input, of transfer coefficients in the incinerator, and the uncertainty of the waste composition of this waste
  properties: dry mass 1 kg, wet mass 1 kg
- metalliferous hydroxide sludge: -0.000128646 kg; lognormal variance with pedigree 0.044223, pedigree (1,1,1,1,1)
  Metalliferous hydroxide sludge/zinc concentrate from filter ash leaching (FLUWA).
  Uncertainty: uncertainty is calculated from uncertainties in waste composition and transfer coefficients to filter ash in incinerator and the uncertainty of the transfer coefficients of the FLUWA process.
  production volume
    calculated in proportion to incinerated waste input
  properties: calcium content 0.1045, carbon content, non-fossil 0.0510438, chlorine content 0.0778411, dry mass 0.25 kg, fluorine content 0.005, oxygen content 0.525269, potassium content 0.0715463, sodium content 0.0163, sulfur content 0.241094, water content 3, wet mass 1 kg, zinc content 0.0235541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
  note on calcium content: Calculated as a production volume weighted average of properties of all the metalliferous hydroxide sludge products produced in the database.
- municipal waste incineration facility: 1.93259e-11 unit
  Infrastructure demands per kilogram incinerated waste.
- quicklime, milled, packed: 3.04201e-5 kg; lognormal variance with pedigree 1.0903, pedigree (1,1,4,1,1)
  auxiliary inputs for the flue gas treatment stage of the incinerator plant.
  Uncertainty: uncertainty calculated from uncertainty in average CaO input, of transfer coefficients in the incinerator, and the uncertainty of the waste composition of this waste
  properties: dry mass 0.99 kg, water content 0.010101, wet mass 1 kg
- residues, MSWI[F], waste newspaper: -0.000652553 kg; lognormal variance with pedigree 0.029241, pedigree (1,1,1,1,1)
  waste-specific incineration residues (fly ash + scrubber sludge) from the incineration of this waste
  Uncertainty: uncertainty is calculated from uncertainties in waste composition and transfer coefficients in incinerator
  production volume
    calculated in proportion to incinerated waste input
  properties: aluminium content 0.139685, carbon content, non-fossil 0.0391799, chlorine content 0.0275986, dry mass 1 kg, lead content 0.00298568, manganese content 0.00115071, oxygen content 0.450775, potassium content 0.172352, silicon content 0.124275, sulfur content 0.0381296, wet mass 1 kg, zinc content 0.00249154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
- sodium hydroxide, without water, in 50% solution state: 6.68963e-5 kg; lognormal variance with pedigree 0.19795, pedigree (1,1,4,1,1)
  auxiliary inputs for the flue gas treatment stage of the incinerator plant, and partially in the filter ash treatment (FLUWA).
  Uncertainty: uncertainty calculated from uncertainty in average NaOH input, of transfer coefficients in the incinerator, and the uncertainty of the waste composition of this waste
  properties: dry mass 1 kg, heating value, net 3.03 MJ, wet mass 1 kg
- spent activated carbon with mercury: -3.37538e-8 kg; lognormal variance with pedigree 1.9204, pedigree (1,1,1,1,1)
  Spent ion exchanger charged with mercury, from FLUWA filter ash treatment, approximated here with Spent activated carbon with mercury, deposited undergound in a polyethylene Big Bag.
  Uncertainty: uncertainty calculated from uncertainty in of transfer coefficients in the incinerator, and the uncertainty of the waste composition of this waste.
  production volume
    calculated in proportion to incinerated waste input
  properties: carbon content, fossil 0.6, dry mass 1 kg, heating value, net 18.18 MJ, wet mass 1 kg
- titanium dioxide: 2.17908e-6 kg; lognormal variance with pedigree 0.60399, pedigree (1,1,4,1,1)
  Input to DeNOx stage (TiO2 catalyst carrier)
  Uncertainty: uncertainty calculated from uncertainty in average DeNOx input, uncertainty in the share of thermal NOx, uncertainty of nitrogen content in average municipal waste and the uncertainty in nitrogen content in *this* waste.
  properties: dry mass 1 kg, wet mass 1 kg
- triazine-compound: 5.78483e-8 kg; lognormal variance with pedigree 1.887, pedigree (1,1,4,1,1)
  auxiliary inputs for the wastewater treatment stage of the incinerator plant. Proxy for (pure) Trisodium-trimercapto-s-triazine (CAS 17766-26-6), used as 15% diluted solution, aka TMT15.
  Uncertainty: uncertainty calculated from uncertainty in average TMT15 input, of transfer coefficients in the incinerator, and the uncertainty of the waste composition of this waste
  properties: carbon content, fossil 0.475616, dry mass 1 kg, wet mass 1 kg
- waste newspaper: 0.0773036 kg
  main reference product of this activity (supply of disposal service).
  production volume
    based on corresponding global production volume of MSW fraction in conventional MSWI (wo fly ash extraction) and scaled down to annual Swiss incinerated MSW mass of 3.02 mio. tonnes.
  properties: aluminium content 0.0136623, carbon content, non-fossil 0.458482, dry mass 0.890558 kg, heating value, gross 17.0622 MJ, heating value, net 15.8474 MJ, hydrogen content 0.0604763, oxygen content 0.434135, potassium content 0.00525475, price 0.1 EUR2005, silicon content 0.0234362, water content 0.122891, wet mass 1 kg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
- water, decarbonised: 0.0347262 kg; lognormal variance with pedigree 0.38041, pedigree (1,1,4,1,1)
  Incinerator process water used in flue gas scrubber stage.
  Uncertainty: uncertainty calculated from uncertainty in average water input, and the uncertainty of the waste composition of this waste
  properties: wet mass 1 kg

## Inputs from nature
- Oxygen [natural resource, in air]: 0.180994 kg; lognormal variance with pedigree 0.035049, pedigree (1,1,4,1,1)
  oxygen from ambient air needed to combust and oxidise this waste. Net demand, i.e. without O2 leaving the plant in flue gas uncombusted.
  Uncertainty: uncertainty is calculated from uncertainties in waste composition and transfer coefficients to flue gas and solid residues in incinerator

## Emissions to nature
- Aluminium III [air, urban air close to ground]: 7.66855e-10 kg; lognormal variance with pedigree 0.42674, pedigree (1,1,4,1,1)
  Emission to air from waste composition and incinerator transfer coefficients.
  Uncertainty: uncertainty is calculated from uncertainties in waste composition and transfer coefficients in incinerator
- Ammonia [air, urban air close to ground]: 4.0893e-8 kg; lognormal variance with pedigree 0.34314, pedigree (1,1,4,1,1)
  Nitrogen species emitted to air after DeNOx stage.
  Uncertainty: uncertainty calculated from uncertainty in average N-emissions and uncertainty in the share of thermal NOx and the uncertainty in nitrogen content in *this* waste.
- Barium II [air, urban air close to ground]: 4.11773e-9 kg; lognormal variance with pedigree 1.2515, pedigree (1,1,4,1,1)
  (same comment as for Aluminium III)
- Benzene [air, urban air close to ground]: 2.55378e-9 kg; lognormal variance with pedigree 0.100914, pedigree (1,1,4,1,1)
  Incomplete combustion product emitted to air.
  Uncertainty: uncertainty calculated from uncertainty in average operation emissions, and the uncertainty of the flue gas volume from this waste.
- Benzo(a)pyrene [air, urban air close to ground]: 5.68296e-14 kg; lognormal variance with pedigree 0.43231, pedigree (1,1,4,1,1)
  (same comment as for Benzene)
- Cadmium II [air, urban air close to ground]: 5.47329e-12 kg; lognormal variance with pedigree 1.8533, pedigree (1,1,4,1,1)
  (same comment as for Aluminium III)
- Carbon dioxide, non-fossil [air, urban air close to ground]: 0.115029 kg; lognormal variance with pedigree 0.030566, pedigree (1,1,4,1,1)
  (same comment as for Aluminium III)
- Carbon monoxide, non-fossil [air, urban air close to ground]: 4.34112e-6 kg; lognormal variance with pedigree 0.83029, pedigree (1,1,4,1,1)
  (same comment as for Benzene)
- Chromium III [air, urban air close to ground]: 6.95961e-10 kg; lognormal variance with pedigree 1.2954, pedigree (1,1,4,1,1)
  (same comment as for Aluminium III)
- Cobalt II [air, urban air close to ground]: 1.28293e-10 kg; lognormal variance with pedigree 1.606, pedigree (1,1,4,1,1)
  (same comment as for Aluminium III)
- Copper ion [air, urban air close to ground]: 2.12333e-10 kg; lognormal variance with pedigree 1.1636, pedigree (1,1,4,1,1)
  (same comment as for Aluminium III)
- Cyanide [air, urban air close to ground]: 1.68044e-7 kg; lognormal variance with pedigree 1.4904, pedigree (1,1,4,1,1)
  (same comment as for Ammonia)
- Dinitrogen monoxide [air, urban air close to ground]: 7.82179e-7 kg; lognormal variance with pedigree 1.4904, pedigree (1,1,4,1,1)
  (same comment as for Ammonia)
- Dioxins, measured as 2,3,7,8-tetrachlorodibenzo-p-dioxin [air, urban air close to ground]: 5.1072e-15 kg; lognormal variance with pedigree 0.43231, pedigree (1,1,4,1,1)
  (same comment as for Benzene)
- Heat, waste [air, urban air close to ground]: 0.834465 MJ; lognormal variance with pedigree 0.063379, pedigree (1,1,4,1,1)
  Waste heat generated from heating value of this waste plus any electricity required to process it.
  Uncertainty: uncertainty is calculated from uncertainties in waste composition and uncertainties in energy efficiency and the uncertainty in internal energy demand
- Hexachlorobenzene [air, urban air close to ground]: 5.33981e-12 kg; lognormal variance with pedigree 0.100914, pedigree (1,1,4,1,1)
  (same comment as for Benzene)
- Hydrochloric acid [air, urban air close to ground]: 5.92579e-8 kg; lognormal variance with pedigree 0.65053, pedigree (1,1,4,1,1)
  (same comment as for Aluminium III)
- Iron ion [air, urban air close to ground]: 1.92616e-11 kg; lognormal variance with pedigree 0.99455, pedigree (1,1,4,1,1)
  (same comment as for Aluminium III)
- Lead II [air, urban air close to ground]: 5.74987e-10 kg; lognormal variance with pedigree 1.0166, pedigree (1,1,4,1,1)
  (same comment as for Aluminium III)
- Manganese II [air, urban air close to ground]: 6.90869e-10 kg; lognormal variance with pedigree 1.0975, pedigree (1,1,4,1,1)
  (same comment as for Aluminium III)
- Mercury II [air, urban air close to ground]: 1.79393e-10 kg; lognormal variance with pedigree 1.9367, pedigree (1,1,4,1,1)
  (same comment as for Aluminium III)
- Methane, non-fossil [air, urban air close to ground]: 3.83066e-8 kg; lognormal variance with pedigree 0.100914, pedigree (1,1,4,1,1)
  (same comment as for Benzene)
- NMVOC, non-methane volatile organic compounds [air, urban air close to ground]: 1.16222e-7 kg; lognormal variance with pedigree 0.100914, pedigree (1,1,4,1,1)
  (same comment as for Benzene)
- Nickel II [air, urban air close to ground]: 2.25202e-10 kg; lognormal variance with pedigree 1.484, pedigree (1,1,4,1,1)
  (same comment as for Aluminium III)
- Nitrogen oxides [air, urban air close to ground]: 1.29495e-5 kg; lognormal variance with pedigree 0.34314, pedigree (1,1,4,1,1)
  sum of fuel-NOx and thermal-NOx emitted to air after DeNOx stage.
  Uncertainty: uncertainty calculated from uncertainty in average N-emissions and uncertainty in the share of thermal NOx and the uncertainty in nitrogen content in *this* waste.
- Particulate Matter, < 2.5 um [air, urban air close to ground]: 3.049e-7 kg; lognormal variance with pedigree 0.43231, pedigree (1,1,4,1,1)
  (same comment as for Benzene)
- Particulate Matter, > 2.5 um and < 10um [air, urban air close to ground]: 1.53216e-9 kg; lognormal variance with pedigree 0.20929, pedigree (1,1,4,1,1)
  (same comment as for Benzene)
- Pentachlorobenzene [air, urban air close to ground]: 1.34925e-11 kg; lognormal variance with pedigree 0.100914, pedigree (1,1,4,1,1)
  (same comment as for Benzene)
- Pentachlorophenol [air, urban air close to ground]: 1.11213e-12 kg; lognormal variance with pedigree 0.100914, pedigree (1,1,4,1,1)
  (same comment as for Benzene)
- Phosphorus [air, urban air close to ground]: 9.55839e-10 kg; lognormal variance with pedigree 1.2735, pedigree (1,1,4,1,1)
  (same comment as for Aluminium III)
- Potassium I [air, urban air close to ground]: 1.78725e-6 kg; lognormal variance with pedigree 0.48153, pedigree (1,1,4,1,1)
  (same comment as for Aluminium III)
- Silicon [air, urban air close to ground]: 2.51294e-9 kg; lognormal variance with pedigree 0.35349, pedigree (1,1,4,1,1)
  (same comment as for Aluminium III)
- Sulfur dioxide [air, urban air close to ground]: 1.34091e-6 kg; lognormal variance with pedigree 0.614, pedigree (1,1,4,1,1)
  (same comment as for Aluminium III)
- Toluene [air, urban air close to ground]: 5.10755e-9 kg; lognormal variance with pedigree 0.100914, pedigree (1,1,4,1,1)
  (same comment as for Benzene)
- Water [air, urban air close to ground]: 6.41435e-5 m3; lognormal variance with pedigree 0.75392, pedigree (1,1,4,1,1)
  water vapour from waste humidity, hydrogen oxidation and part of the process water.
  Uncertainty: Uncertainty calculated from uncertainty in waste composition, process water input and the uncertainty of fraction to air.
- Zinc II [air, urban air close to ground]: 2.87895e-9 kg; lognormal variance with pedigree 1.0681, pedigree (1,1,4,1,1)
  (same comment as for Aluminium III)
- Non-hazardous waste disposed [inventory indicator, waste]: 0.0773036 kg
  Inventory indicator for waste mass disposed. To be used in EN15804 "other data" results.
- Aluminium III [water, surface water]: 4.77352e-9 kg; lognormal variance with pedigree 0.32611, pedigree (1,1,4,1,1)
  Emissions to water from waste composition and incinerator transfer coefficients.
  Uncertainty: uncertainty is calculated from uncertainties in waste composition and transfer coefficients in incinerator
- BOD5, Biological Oxygen Demand [water, surface water]: 2.32319e-5 kg; lognormal variance with pedigree 0.041528, pedigree (1,1,4,1,1)
  (same comment as for Aluminium III)
- Barium II [water, surface water]: 3.24122e-10 kg; lognormal variance with pedigree 0.80021, pedigree (1,1,4,1,1)
  (same comment as for Aluminium III)
- COD, Chemical Oxygen Demand [water, surface water]: 2.32319e-5 kg; lognormal variance with pedigree 0.041528, pedigree (1,1,4,1,1)
  (same comment as for Aluminium III)
- Cadmium II [water, surface water]: 9.8015e-13 kg; lognormal variance with pedigree 1.4164, pedigree (1,1,4,1,1)
  (same comment as for Aluminium III)
- Chloride [water, surface water]: 8.16436e-5 kg; lognormal variance with pedigree 0.29224, pedigree (1,1,4,1,1)
  (same comment as for Aluminium III)
- Chromium III [water, surface water]: 1.03472e-10 kg; lognormal variance with pedigree 0.84894, pedigree (1,1,4,1,1)
  (same comment as for Aluminium III)
- Cobalt II [water, surface water]: 8.25782e-13 kg; lognormal variance with pedigree 0.98693, pedigree (1,1,4,1,1)
  (same comment as for Aluminium III)
- Copper ion [water, surface water]: 1.16032e-10 kg; lognormal variance with pedigree 1.1434, pedigree (1,1,4,1,1)
  (same comment as for Aluminium III)
- DOC, Dissolved Organic Carbon [water, surface water]: 1.0164e-5 kg; lognormal variance with pedigree 0.041528, pedigree (1,1,4,1,1)
  (same comment as for Aluminium III)
- Heat, waste [water, surface water]: 0.205813 MJ; lognormal variance with pedigree 0.063379, pedigree (1,1,4,1,1)
  (same comment as for Heat, waste)
- Iron ion [water, surface water]: 1.15457e-10 kg; lognormal variance with pedigree 0.85446, pedigree (1,1,4,1,1)
  (same comment as for Aluminium III)
- Lead II [water, surface water]: 3.68863e-10 kg; lognormal variance with pedigree 0.83034, pedigree (1,1,4,1,1)
  (same comment as for Aluminium III)
- Manganese II [water, surface water]: 2.84994e-10 kg; lognormal variance with pedigree 0.88166, pedigree (1,1,4,1,1)
  (same comment as for Aluminium III)
- Mercury II [water, surface water]: 1.7799e-12 kg; lognormal variance with pedigree 1.899, pedigree (1,1,4,1,1)
  (same comment as for Aluminium III)
- Nickel II [water, surface water]: 5.84328e-12 kg; lognormal variance with pedigree 1.1676, pedigree (1,1,4,1,1)
  (same comment as for Aluminium III)
- Nitrate [water, surface water]: 2.35902e-7 kg; lognormal variance with pedigree 0.4215, pedigree (1,1,4,1,1)
  (same comment as for Aluminium III)
- Phosphate [water, surface water]: 1.25924e-9 kg; lognormal variance with pedigree 0.78183, pedigree (1,1,4,1,1)
  (same comment as for Aluminium III)
- Potassium I [water, surface water]: 4.18136e-5 kg; lognormal variance with pedigree 0.34999, pedigree (1,1,4,1,1)
  (same comment as for Aluminium III)
- Silicon [water, surface water]: 8.68237e-8 kg; lognormal variance with pedigree 0.19163, pedigree (1,1,4,1,1)
  (same comment as for Aluminium III)
- Silver I [water, surface water]: 7.28474e-11 kg; lognormal variance with pedigree 1.6842, pedigree (1,1,4,1,1)
  (same comment as for Aluminium III)
- Sulfate [water, surface water]: 1.99526e-5 kg; lognormal variance with pedigree 0.4624, pedigree (1,1,4,1,1)
  (same comment as for Aluminium III)
- TOC, Total Organic Carbon [water, surface water]: 1.0164e-5 kg; lognormal variance with pedigree 0.041528, pedigree (1,1,4,1,1)
  (same comment as for Aluminium III)
- Water [water, surface water]: 1.16745e-5 m3; lognormal variance with pedigree 1.595, pedigree (1,1,4,1,1)
  process water released to surface water.
  Uncertainty: uncertainty calculated from uncertainty in process water input and the uncertainty of fraction to surface water.
- Zinc II [water, surface water]: 1.72286e-10 kg; lognormal variance with pedigree 0.95721, pedigree (1,1,4,1,1)
  (same comment as for Aluminium III)
