# fodder beet production, Swiss integrated production, intensive

Dataset: EcoSpold 2, unit process
Geography: CH
Time period: 1996-01-01 to 2023-12-31
Technology level: current
Classification: ISIC rev.4 ecoinvent: 0119:Growing of other non-perennial crops
Synonyms: Beta vulgaris
Scenario: Business-as-Usual
System model: Allocation, cut-off by classification
Share of production covered: 69 %
Generated by: Thomas Nemecek
Published in: Nemecek, T. 2007
Database: ecoinvent
isCopyrightProtected: true
accessRestrictedTo: 1

## General comment
This dataset represents the production of 1 kg of fodder beet (fresh matter). The yield is 97002 kg/ha at a moisture content at storage of 85%.
[This dataset was already contained in the ecoinvent database version 2. It was not individually updated during the transfer to ecoinvent version 3. Life Cycle Impact Assessment results may still have changed, as they are affected by changes in the supply chain, i.e. in other datasets. This dataset was generated following the ecoinvent quality guidelines for version 2. It may have been subject to central changes described in the ecoinvent version 3 change report (http://www.ecoinvent.org/database/ecoinvent-version-3/reports-of-changes/), and the results of the central updates were reviewed extensively. The changes added e.g. consistent water flows and other information throughout the database. The documentation of this dataset can be found in the ecoinvent reports of version 2, which are still available via the ecoinvent website. The change report linked above covers all central changes that were made during the conversion process.]

## Included activities start
This activity starts after the harvest of the previous crop. The inputs of seeds, mineral fertilisers and pesticides are considered. Farm manure as an organic fertiliser is only accounted for in terms of direct field emissions; all pre-processes are included in the animal production systems.

## Included activities end
The dataset includes all machine operations and corresponding machine infrastructure and sheds. Machine operations are: soil cultivation, sowing, fertilisation, weed control, pest management, harvest and transport from field to farm (1 km). Further, direct field emissions are included. The cultivation of green manure during winter before sowing beets is also included. This activity ends after harvest at the farm gate.

## Geography
Refers to an average production in the Swiss lowlands.

## Technology
Integrated production

## Time period
The yield data have been collected for the years 1996-2003.

## Parameters
- LUC_crop_specific: 1 dimensionless
  This parameter allows to switch between a "crop specific" and a "country specific" approach when calculating the LUC of a crop. By default, the chosen approach is "crop specific", so the value of the parameter is 1. If you want to apply a "country specific" approach, turn the parameter to 0.
- fraction, irrigation water to surface water: 0.2 dimensionless; name fraction_IW_to_surface_water; lognormal variance with pedigree 0.0886, pedigree (4,3,1,1,4)
  Literature value (Döll, 2011) cross referenced with expert opinion.
- fraction, irrigation water, to air: 0.3353 dimensionless; name fraction_IW_to_air; lognormal variance with pedigree 0.0409, pedigree (2,2,2,1,1)
  Literature value (Siebert, 2010) (Vionnet, S., Quantis Water Database - Technical Report, 2012).
- fraction, irrigation water, to ground water: 0.8 dimensionless; name fraction_IW_to_ground_water; lognormal variance with pedigree 0.0886, pedigree (4,3,1,1,4)
  Literature value (Döll, 2011) cross referenced with expert opinion.
- yield, agriculture: 97.002 metric ton/ha; name yield_agriculture
  amount (ton) of harvested agricultural products per hectare land.

## Reference product
- fodder beet, Swiss integrated production: 1 kg; name REF_PRODUCT; By-product classification allocatable product; CPC 01919: Forage products, n.e.c.; HS2017 0706: Carrots, turnips, salad beetroot, salsify, celeriac, radishes and similar edible roots; fresh or chilled
  production volume 4 kg
    This is a placeholder value that does not reflect real-world production volumes. This dataset does not currently require a real-world production volume to work in the database framework, and no actual data were collected yet. This has no negative effect on the results of the ecoinvent database.
  property carbon content, fossil 0; name REF_PRODUCT_C_content_fossil
    fossil carbon content on a dry matter basis
  property carbon content, non-fossil 0.32; name REF_PRODUCT_C_content_non_fossil
    biogene carbon content on a dry matter basis
  property dry mass 0.15 kg; name REF_PRODUCT_DM
  property energy content 2.4765 MJ; name REF_PRODUCT_energy_content
    See chapter 'Product Properties' in '01_crop production - yields & inputs CH & Europe_v1.0.pdf', section 'AGRICULTURAL PRODUCTION IN SWITZERLAND' - pdf-document on the dedicated talk page of ecoinvent (www.ecoinvent.org/documentation)
  property price 0.035 EUR2005
    Calculated after Agriland. Source: https://www.agriland.ie/farming-news/record-fodder-beet-yields-prospect/
  property water content 5.66667; name REF_PRODUCT_water_content; = (1-REF_PRODUCT_DM)/REF_PRODUCT_DM
  property water in wet mass 0.85 kg; name REF_PRODUCT_WWM; = 1-REF_PRODUCT_DM
  property wet mass 1 kg; name REF_PRODUCT_WM
  properties: carbon allocation 0.048 kg, carbon content 0.32

## Inputs from technosphere
- [thio]carbamate-compound: 3.5051e-6 kg; lognormal variance with pedigree 0.0407, pedigree (2,2,5,1,1)
  See chapter 'Yields and Inputs of Arable Crop Production' in '01_crop production - yields & inputs CH & Europe_v1.0.pdf', section 'AGRICULTURAL PRODUCTION IN SWITZERLAND' - pdf-document on the dedicated talk page of ecoinvent (www.ecoinvent.org/documentation)
  See chapter 'Yields and Inputs of Arable Crop Production' in '01_crop production - yields & inputs CH & Europe_v1.0.pdf', section 'AGRICULTURAL PRODUCTION IN SWITZERLAND' - pdf-document on the dedicated talk page of ecoinvent (www.ecoinvent.org/documentation)
  properties: carbon content, fossil 0.626349, dry mass 1 kg, wet mass 1 kg
  note on carbon content, fossil: Approximated as an unweighted average of the C-content of the [thio]carbamate-compounds (Tab 2.25 Sutter, 2010) carbofuran,orbencarb, prosulfocarb
- ammonium nitrate: 0.000285258 kg; lognormal variance with pedigree 0.0406, pedigree (2,1,5,1,1)
  The exchange has been updated from 'ammonium nitrate, as N' into 'ammonium nitrate' and therefore its amount has been scaled (multiplied) from 0.0001 kg by 2.8573 kg of 'ammonium nitrate' per kg of 'ammonium nitrate, as N'. Original comment of the exchange is: See chapter 'Yields and Inputs of Arable Crop Production' in '01_crop production - yields & inputs CH & Europe_v1.0.pdf', section 'AGRICULTURAL PRODUCTION IN SWITZERLAND' - pdf-document on the dedicated talk page of ecoinvent (www.ecoinvent.org/documentation)
  See chapter 'Yields and Inputs of Arable Crop Production' in '01_crop production - yields & inputs CH & Europe_v1.0.pdf', section 'AGRICULTURAL PRODUCTION IN SWITZERLAND' - pdf-document on the dedicated talk page of ecoinvent (www.ecoinvent.org/documentation)
  properties: dry mass 1 kg, wet mass 1 kg
- ammonium sulfate: 7.5546e-6 kg; lognormal variance with pedigree 0.0406, pedigree (2,1,5,1,1)
  (same comment as for [thio]carbamate-compound)
  properties: dry mass 1 kg, wet mass 1 kg
- application of plant protection product, by field sprayer: 2.9896e-5 ha; lognormal variance with pedigree 0.0406, pedigree (2,1,5,1,1)
  See chapter 'Yields and Inputs of Arable Crop Production' in '01_crop production - yields & inputs CH & Europe_v1.0.pdf', section 'AGRICULTURAL PRODUCTION IN SWITZERLAND' - pdf-document on the dedicated talk page of ecoinvent (www.ecoinvent.org/documentation)
  This exchange has an activity link directly to the producing activity because the product is primarily consumed in the same geographical area where it is produced.
- benzimidazole-compound: 3.9174e-6 kg; lognormal variance with pedigree 0.0407, pedigree (2,2,5,1,1)
  (same comment as for [thio]carbamate-compound)
  properties: carbon content, fossil 0.529668, dry mass 1 kg, wet mass 1 kg
  note on carbon content, fossil: C content estimated as an average of that of the pesticides Carbendazim, prochloraz and ethofumesate (Sutter 2010)
- fertilising, by broadcaster: 4.1236e-5 ha; lognormal variance with pedigree 0.0406, pedigree (2,1,5,1,1)
  (same comment as for application of plant protection product, by field sprayer)
- fodder beet seed, for sowing: 2.1649e-5 kg; name SEED; lognormal variance with pedigree 0.0406, pedigree (2,1,5,1,1)
  See chapter 'Yields and Inputs of Arable Crop Production' in '01_crop production - yields & inputs CH & Europe_v1.0.pdf', section 'AGRICULTURAL PRODUCTION IN SWITZERLAND' - pdf-document on the dedicated talk page of ecoinvent (www.ecoinvent.org/documentation)
  property carbon content, non-fossil 0.447696; name SEED_C_content_non_fossil
  property dry mass 0.85 kg; name SEED_DM
  property energy content 15.3935 MJ; name SEED_energy_content
  note on energy content: See '01_crop production - seed production & processing_v1.0.pdf' - pdf-document on the dedicated talk page of ecoinvent (www.ecoinvent.org/documentation)
- green manure, Swiss integrated production, until February: 1.0309e-5 ha; lognormal variance with pedigree 0.0406, pedigree (2,1,5,1,1)
  (same comment as for [thio]carbamate-compound)
- harvesting, by complete harvester, beets: 1.0309e-5 ha; lognormal variance with pedigree 0.0406, pedigree (2,1,5,1,1)
  (same comment as for application of plant protection product, by field sprayer)
- hoeing: 2.0618e-5 ha; lognormal variance with pedigree 0.0406, pedigree (2,1,5,1,1)
  (same comment as for application of plant protection product, by field sprayer)
- inorganic nitrogen fertiliser, as N: 6.6764e-5 kg; lognormal variance with pedigree 0.0406, pedigree (2,1,5,1,1)
  (same comment as for [thio]carbamate-compound)
  properties: dry mass 1 kg, wet mass 1 kg
- inorganic phosphorus fertiliser, as P2O5: 0.000115742 kg; lognormal variance with pedigree 0.0406, pedigree (2,1,5,1,1)
  (same comment as for [thio]carbamate-compound)
  properties: dry mass 1 kg, wet mass 1 kg
- irrigation: 0.00577147 m3; name water_irrigation_input; source Siebert, S. 2010; lognormal variance with pedigree 0.0427, pedigree (2,2,5,1,1)
  Calculated based on literature values (Döll, 2010) and partially modelled at ETH (Pfister, S.).
  property carbon content, fossil 0; name C_content_fossil
  property carbon content, non-fossil 0; name C_content_non_fossil
  property dry mass 0.11 kg; name DM
  property water content 9089.91; name water_content
  property water in wet mass 999.89 kg; name WWM
  property wet mass 1000 kg; name WM
- liquid manure spreading, by vacuum tanker: 0.00020665 m3; lognormal variance with pedigree 0.0406, pedigree (2,1,5,1,1)
  (same comment as for application of plant protection product, by field sprayer)
- organophosphorus-compound, unspecified: 6.1854e-7 kg; lognormal variance with pedigree 0.0407, pedigree (2,2,5,1,1)
  (same comment as for [thio]carbamate-compound)
  properties: carbon content, fossil 0.260898, dry mass 1 kg, wet mass 1 kg
  note on carbon content, fossil: C content was calculated as an unweighted average of glyphosate, parathion, and fosetyl-Al. Those substances are classified as organo-phosphorous compounds in Tab 2.25, Sutter 2010
- packaging, for fertilisers: 0.0014074 kg; lognormal variance with pedigree 0.0912, pedigree (4,3,5,5,4)
  Total amount of active substance/s of fertilisers needed for the production of 'fodder beet, Swiss integrated production' is calculated to be circa 7.04E-04 kg. Fertiliser/s used in this dataset is/are: 'ammonium nitrate, as N', 'ammonium sulfate, as N', 'nitrogen fertiliser, as N', 'phosphate fertiliser, as P2O5', 'phosphate rock, as P2O5, beneficiated, dry', 'potassium chloride, as K2O', 'potassium sulfate, as K2O', 'urea, as N'. The total amount of active substance/s is doubled in order to account for the packaging of the dilluted product of fertiliser/s that is/are applied. Therefore, 1.41E-03 kg of packaging for fertilisers is justified with this exchange.
  properties: carbon content, fossil 0.825301, dry mass 1 kg, heating value, net 25.01 MJ, price 0.0642 EUR2005, wet mass 1 kg
  note on carbon content, fossil: Considering a chemical formula (C2H4)n for polyethylene, carbon content-fossil is calculated to be 0.856286 kg of Carbon per kg of dry mass.
- packaging, for pesticides: 4.73049e-5 kg; lognormal variance with pedigree 0.0912, pedigree (4,3,5,5,4)
  Total amount of active substance/s of pesticides needed for the production of fodder beet, Swiss integrated production is calculated to be circa 2.37E-05 kg. Pesticide/s used in this dataset is/are: '[thio]carbamate-compound', 'benzimidazole-compound', 'organophosphorus-compound, unspecified', 'pesticide, unspecified', 'triazine-compound, unspecified'. The total amount of active substance/s is doubled in order to account for the packaging of the dilluted product of pesticide/s that is/are applied. Therefore, 4.73E-05 kg of packaging for pesticides is justified with this exchange.
  properties: carbon content, fossil 0.85714, dry mass 1 kg, heating value, net 25.97 MJ, price 0.0642 EUR2005, wet mass 1 kg
- pesticide, unspecified: 1.2814e-6 kg; lognormal variance with pedigree 0.0407, pedigree (2,2,5,1,1)
  (same comment as for [thio]carbamate-compound)
  properties: carbon content, fossil 0.486978, dry mass 1 kg, wet mass 1 kg
  note on carbon content, fossil: Mean of C content in all pesticides whose formula has been documented in Sutter 2010
- phosphate rock, beneficiated: 0.000114559 kg; lognormal variance with pedigree 0.0406, pedigree (2,1,5,1,1)
  The exchange has been updated from 'phosphate rock, as P2O5, beneficiated, dry' into 'phosphate rock, beneficiated' and therefore its amount has been scaled (multiplied) from 0 kg by 3.125 kg of 'phosphate rock, beneficiated' per kg of 'phosphate rock, as P2O5, beneficiated, dry'. Original comment of the exchange is: See chapter 'Yields and Inputs of Arable Crop Production' in '01_crop production - yields & inputs CH & Europe_v1.0.pdf', section 'AGRICULTURAL PRODUCTION IN SWITZERLAND' - pdf-document on the dedicated talk page of ecoinvent (www.ecoinvent.org/documentation)
  See chapter 'Yields and Inputs of Arable Crop Production' in '01_crop production - yields & inputs CH & Europe_v1.0.pdf', section 'AGRICULTURAL PRODUCTION IN SWITZERLAND' - pdf-document on the dedicated talk page of ecoinvent (www.ecoinvent.org/documentation)
  properties: dry mass 1 kg, wet mass 1 kg
- potassium chloride: 0.000508158 kg; lognormal variance with pedigree 0.0406, pedigree (2,1,5,1,1)
  The exchange has been updated from 'potassium chloride, as K2O' into 'potassium chloride' and therefore its amount has been scaled (multiplied) from 0.0003 kg by 1.5829 kg of 'potassium chloride' per kg of 'potassium chloride, as K2O'. Original comment of the exchange is: See chapter 'Yields and Inputs of Arable Crop Production' in '01_crop production - yields & inputs CH & Europe_v1.0.pdf', section 'AGRICULTURAL PRODUCTION IN SWITZERLAND' - pdf-document on the dedicated talk page of ecoinvent (www.ecoinvent.org/documentation)
  See chapter 'Yields and Inputs of Arable Crop Production' in '01_crop production - yields & inputs CH & Europe_v1.0.pdf', section 'AGRICULTURAL PRODUCTION IN SWITZERLAND' - pdf-document on the dedicated talk page of ecoinvent (www.ecoinvent.org/documentation)
  properties: dry mass 1 kg, wet mass 1 kg
- potassium sulfate: 3.89547e-5 kg; lognormal variance with pedigree 0.0406, pedigree (2,1,5,1,1)
  The exchange has been updated from 'potassium sulfate, as K2O' into 'potassium sulfate' and therefore its amount has been scaled (multiplied) from 0 kg by 1.85 kg of 'potassium sulfate' per kg of 'potassium sulfate, as K2O'. Original comment of the exchange is: See chapter 'Yields and Inputs of Arable Crop Production' in '01_crop production - yields & inputs CH & Europe_v1.0.pdf', section 'AGRICULTURAL PRODUCTION IN SWITZERLAND' - pdf-document on the dedicated talk page of ecoinvent (www.ecoinvent.org/documentation)
  See chapter 'Yields and Inputs of Arable Crop Production' in '01_crop production - yields & inputs CH & Europe_v1.0.pdf', section 'AGRICULTURAL PRODUCTION IN SWITZERLAND' - pdf-document on the dedicated talk page of ecoinvent (www.ecoinvent.org/documentation)
  properties: dry mass 1 kg, wet mass 1 kg
- solid manure loading and spreading, by hydraulic loader and spreader: 0.13607 kg; lognormal variance with pedigree 0.0406, pedigree (2,1,5,1,1)
  (same comment as for application of plant protection product, by field sprayer)
- sowing: 1.0309e-5 ha; lognormal variance with pedigree 0.0406, pedigree (2,1,5,1,1)
  (same comment as for application of plant protection product, by field sprayer)
- tillage, harrowing, by spring tine harrow: 2.0618e-5 ha; lognormal variance with pedigree 0.0406, pedigree (2,1,5,1,1)
  (same comment as for application of plant protection product, by field sprayer)
- tillage, ploughing: 1.0309e-5 ha; lognormal variance with pedigree 0.0406, pedigree (2,1,5,1,1)
  (same comment as for application of plant protection product, by field sprayer)
- transport, tractor and trailer, agricultural: 0.001 metric ton*km; lognormal variance with pedigree 0.0406, pedigree (2,1,5,1,1)
  (same comment as for [thio]carbamate-compound)
- triazine-compound: 1.433e-5 kg; lognormal variance with pedigree 0.0407, pedigree (2,2,5,1,1)
  (same comment as for [thio]carbamate-compound)
  properties: carbon content, fossil 0.475616, dry mass 1 kg, wet mass 1 kg
  note on carbon content, fossil: An unweighted average of the C content in Atrazine, Cyanazine, metamitron, simazine, and terbuthylazine. Those substances are classified as triazine-compounds in Tab 2.25, Sutter 2010
- urea: 7.51616e-5 kg; lognormal variance with pedigree 0.0406, pedigree (2,1,5,1,1)
  The exchange has been updated from 'urea, as N' into 'urea' and therefore its amount has been scaled (multiplied) from 0 kg by 2.1438 kg of 'urea' per kg of 'urea, as N'. Original comment of the exchange is: See chapter 'Yields and Inputs of Arable Crop Production' in '01_crop production - yields & inputs CH & Europe_v1.0.pdf', section 'AGRICULTURAL PRODUCTION IN SWITZERLAND' - pdf-document on the dedicated talk page of ecoinvent (www.ecoinvent.org/documentation)
  See chapter 'Yields and Inputs of Arable Crop Production' in '01_crop production - yields & inputs CH & Europe_v1.0.pdf', section 'AGRICULTURAL PRODUCTION IN SWITZERLAND' - pdf-document on the dedicated talk page of ecoinvent (www.ecoinvent.org/documentation)
  properties: carbon content, fossil 0.2, dry mass 1 kg, wet mass 1 kg

## Inputs from nature
- Carbon dioxide, in air [natural resource, in air]: 0.17597 kg; = 44/12 * (REF_PRODUCT_C_content_non_fossil * REF_PRODUCT * REF_PRODUCT_DM - SEED_C_content_non_fossil * SEED * SEED_DM); lognormal variance with pedigree 0.0406, pedigree (2,1,5,1,1)
  Modelled,see chapter 'CO2 binding' in '01_crop production_direct field emissions and natural resources_v1.0.pdf' - pdf-document on the dedicated talk page of ecoinvent (www.ecoinvent.org/documentation)
- Energy, gross calorific value, in biomass [natural resource, biotic]: 2.4761 MJ; lognormal variance with pedigree 0.0411891, pedigree (2,1,5,1,1)
- Occupation, annual crop, non-irrigated, intensive [natural resource, land]: 0.063 m2*year; lognormal variance with pedigree 0.0406, pedigree (2,1,5,1,1)
  Modelled, see chapter 'Land use' in '01_crop production_direct field emissions and natural resources_v1.0.pdf' - pdf-document on the dedicated talk page of ecoinvent (www.ecoinvent.org/documentation)
- Transformation, from annual crop, non-irrigated, intensive [natural resource, land]: 0.10309 m2; lognormal variance with pedigree 0.0506, pedigree (2,1,5,1,1)
  (same comment as for Occupation, annual crop, non-irrigated, intensive)
- Transformation, to annual crop, non-irrigated, intensive [natural resource, land]: 0.10309 m2; lognormal variance with pedigree 0.0506, pedigree (2,1,5,1,1)
  (same comment as for Occupation, annual crop, non-irrigated, intensive)

## Emissions to nature
- Ammonia [air, non-urban air or from high stacks]: 0.000196395 kg; lognormal variance with pedigree 0.0507, pedigree (2,2,5,1,1)
  Modelled with the 'AGRAMMON model' described in '01_crop production_direct field emissions and natural resources_v1.0.pdf' - pdf-document on the dedicated talk page of ecoinvent (www.ecoinvent.org/documentation)
- Carbon dioxide, fossil [air, non-urban air or from high stacks]: 5.5045e-5 kg; lognormal variance with pedigree 0.0407, pedigree (2,2,5,1,1)
  Modelled, see chapter 'Release of fossil CO2 after urea applications' in '01_crop production_assessment methods of direct field emissions_v1.0.pdf' - pdf-document on the dedicated talk page of ecoinvent (www.ecoinvent.org/documentation)
- Dinitrogen monoxide [air, non-urban air or from high stacks]: 4.71e-5 kg; name N2O; lognormal variance with pedigree 0.0707, pedigree (2,2,5,1,1)
  Modelled, see chapter 'Emissions of N2O to the air' in '01_crop production_direct field emissions and natural resources_v1.0.pdf' - pdf-document on the dedicated talk page of ecoinvent (www.ecoinvent.org/documentation)
- Nitrogen oxides [air, non-urban air or from high stacks]: 9.891e-6 kg; = 0.21 * N2O; lognormal variance with pedigree 0.0707, pedigree (2,2,5,1,1)
  Modelled, see chapter 'Emissions of NOx to the air' in '01_crop production_direct field emissions and natural resources_v1.0.pdf' - pdf-document on the dedicated talk page of ecoinvent (www.ecoinvent.org/documentation)
- Water [air, unspecified]: 0.00193518 m3; name water_to_air_unspecified; = (water_irrigation_input*fraction_IW_to_air); lognormal variance with pedigree 0.0807, pedigree (2,2,5,1,1)
  Calculated value based on literature values and expert opinion. See comments in the parametres' comment field.
  property fraction, origin: fresh water 1; name fraction_origin_fresh_water
  property fraction, origin: salt water 0; name fraction_origin_salt_water
  property fraction, origin: unspecified 0; name fraction_origin_unspecified
- Cadmium II [soil, agricultural]: -4.83031e-8 kg; = -0.0046855/(yield_agriculture*1000)
  Modelled, see chapter 'Emissions of heavy metals to agricultural soil, surface water and ground water' in '01_crop production_direct field emissions and natural resources_v1.0.pdf' - pdf-document on the dedicated talk page of ecoinvent (www.ecoinvent.org/documentation)
- Chromium III [soil, agricultural]: -2.6785e-7 kg; = -0.025982/(yield_agriculture*1000)
  (same comment as for Cadmium II)
- Copper ion [soil, agricultural]: -1.83012e-6 kg; = -0.177525263/(yield_agriculture*1000)
  (same comment as for Cadmium II)
- Ethofumesate [soil, agricultural]: 3.9174e-6 kg; lognormal variance with pedigree 0.0507, pedigree (2,2,5,1,1)
  Modelled, see chapter 'Emissions of pesticides to agricultural soil' in '01_crop production_direct field emissions and natural resources_v1.0.pdf' - pdf-document on the dedicated talk page of ecoinvent (www.ecoinvent.org/documentation)
- Lead II [soil, agricultural]: 1.05699e-8 kg; = 0.0010253/(yield_agriculture*1000); lognormal variance with pedigree 0.0807, pedigree (2,2,5,1,1)
  (same comment as for Cadmium II)
- Mercury II [soil, agricultural]: -7.94004e-9 kg; = -0.0007702/(yield_agriculture*1000)
  (same comment as for Cadmium II)
- Metamitron [soil, agricultural]: 1.433e-5 kg; lognormal variance with pedigree 0.0507, pedigree (2,2,5,1,1)
  (same comment as for Ethofumesate)
- Nickel II [soil, agricultural]: -4.60063e-8 kg; = -0.0044627/(yield_agriculture*1000)
  (same comment as for Cadmium II)
- Phenmedipham [soil, agricultural]: 3.5051e-6 kg; lognormal variance with pedigree 0.0507, pedigree (2,2,5,1,1)
  (same comment as for Ethofumesate)
- Terbufos [soil, agricultural]: 6.1854e-7 kg; lognormal variance with pedigree 0.0507, pedigree (2,2,5,1,1)
  (same comment as for Ethofumesate)
- Zinc II [soil, agricultural]: -2.8319e-6 kg; = -0.2747/(yield_agriculture*1000)
  (same comment as for Cadmium II)
- Cadmium II [water, ground-]: 3.67621e-10 kg; = 3.566E-05/(yield_agriculture*1000); lognormal variance with pedigree 0.1307, pedigree (2,2,5,1,1)
  (same comment as for Cadmium II)
- Cadmium II [water, surface water]: 2.66603e-10 kg; = 2.5861E-05/(yield_agriculture*1000); lognormal variance with pedigree 0.1307, pedigree (2,2,5,1,1)
  (same comment as for Cadmium II)
- Chromium III [water, ground-]: 1.96068e-7 kg; = 0.019019/(yield_agriculture*1000); lognormal variance with pedigree 0.1307, pedigree (2,2,5,1,1)
  (same comment as for Cadmium II)
- Chromium III [water, surface water]: 3.36777e-8 kg; = 0.0032668/(yield_agriculture*1000); lognormal variance with pedigree 0.1307, pedigree (2,2,5,1,1)
  (same comment as for Cadmium II)
- Copper ion [water, ground-]: 3.61446e-8 kg; = 0.0035061/(yield_agriculture*1000); lognormal variance with pedigree 0.1307, pedigree (2,2,5,1,1)
  (same comment as for Cadmium II)
- Copper ion [water, surface water]: 3.04891e-8 kg; = 0.0029575/(yield_agriculture*1000); lognormal variance with pedigree 0.1307, pedigree (2,2,5,1,1)
  (same comment as for Cadmium II)
- Lead II [water, ground-]: 2.55984e-9 kg; = 0.00024831/(yield_agriculture*1000); lognormal variance with pedigree 0.1307, pedigree (2,2,5,1,1)
  (same comment as for Cadmium II)
- Lead II [water, surface water]: 1.25688e-8 kg; = 0.0012192/(yield_agriculture*1000); lognormal variance with pedigree 0.1307, pedigree (2,2,5,1,1)
  (same comment as for Cadmium II)
- Mercury II [water, ground-]: 1.13018e-10 kg; = 1.0963E-05/(yield_agriculture*1000); lognormal variance with pedigree 0.1307, pedigree (2,2,5,1,1)
  (same comment as for Cadmium II)
- Mercury II [water, surface water]: 1.09451e-10 kg; = 1.0617E-05/(yield_agriculture*1000); lognormal variance with pedigree 0.1307, pedigree (2,2,5,1,1)
  (same comment as for Cadmium II)
- Nickel II [water, ground-]: 5.3335e-13 kg; = 5.1736E-08/(yield_agriculture*1000); lognormal variance with pedigree 0.1307, pedigree (2,2,5,1,1)
  (same comment as for Cadmium II)
- Nickel II [water, surface water]: 2.67376e-8 kg; = 0.0025936/(yield_agriculture*1000); lognormal variance with pedigree 0.1307, pedigree (2,2,5,1,1)
  (same comment as for Cadmium II)
- Nitrate [water, ground-]: 0.00170921 kg; lognormal variance with pedigree 0.0807, pedigree (2,2,5,1,1)
  Modelled with the 'SALCA-NO3 model' described in '01_crop production_direct field emissions and natural resources_v1.0.pdf' - pdf-document on the dedicated talk page of ecoinvent (www.ecoinvent.org/documentation)
- Phosphate [water, ground-]: 1.5168e-6 kg; lognormal variance with pedigree 0.0807, pedigree (2,2,5,1,1)
  Modelled, see chapter 'Emissions of phosphorous to the water' in '01_crop production_direct field emissions and natural resources_v1.0.pdf' - pdf-document on the dedicated talk page of ecoinvent (www.ecoinvent.org/documentation)
- Phosphate [water, surface water]: 5.1371e-6 kg; lognormal variance with pedigree 0.0807, pedigree (2,2,5,1,1)
  (same comment as for Phosphate)
- Phosphorus [water, surface water]: 1.4796e-6 kg; lognormal variance with pedigree 0.0807, pedigree (2,2,5,1,1)
  (same comment as for Phosphate)
- Water [water, ground-]: 0.00306904 m3; name water_to_water_ground; = water_irrigation_input*(1-fraction_IW_to_air)*fraction_IW_to_ground_water; lognormal variance with pedigree 0.1286, pedigree (4,3,5,1,4)
  Calculated value. See the parameters and their comments to understand the calculation.
  property fraction, origin: fresh water 1; name fraction_origin_fresh_water_Wgw
  property fraction, origin: salt water 0; name fraction_origin_salt_water_Wgw
  property fraction, origin: unspecified 0; name fraction_origin_unspecified_Wgw
- Water [water, surface water]: 0.00076726 m3; name water_to_water_surface; = water_irrigation_input*(1-fraction_IW_to_air)*fraction_IW_to_surface_water; lognormal variance with pedigree 0.1286, pedigree (4,3,5,1,4)
  Calculated value. See the parameters and their comments to understand the calculation.
  property fraction, origin: fresh water 1; name fraction_origin_fresh_water_Wsw
  property fraction, origin: salt water 0; name fraction_origin_salt_water_Wsw
- Zinc II [water, ground-]: 2.81056e-7 kg; = 0.027263/(yield_agriculture*1000); lognormal variance with pedigree 0.1307, pedigree (2,2,5,1,1)
  (same comment as for Cadmium II)
- Zinc II [water, surface water]: 6.38317e-8 kg; = 0.0061918/(yield_agriculture*1000); lognormal variance with pedigree 0.1307, pedigree (2,2,5,1,1)
  (same comment as for Cadmium II)

## Sampling procedure
Data were compiled from statistics, pilot network, fertilising recommendations, documents from extension services, information provided by retailers and expert knowledge. The production data were verified and adjusted by a group of experts.

## Review by Hans-Jörg Althaus 2009-01-22
passed
none
