# drying of bread grain, seed and legumes

Dataset: EcoSpold 2, unit process
Geography: RoW
Time period: 1985-01-01 to 2023-12-31
Technology level: current
Classification: EcoSpold01Categories: agricultural means of production/work processes
Classification: ISIC rev.4 ecoinvent: 0163:Post-harvest crop activities
Tags: ConvertedDataset
Scenario: Business-as-Usual
System model: Allocation, cut-off by classification
Generated by: Silvio Blaser
Published in: Nemecek, T. 2007
Database: ecoinvent
isCopyrightProtected: true
accessRestrictedTo: 1

## General comment
The functional unit is kg water evaporated. This module should be used when evaluating drying of bread grains, seed and legumes.
[This dataset was already contained in the ecoinvent database version 2. It was not individually updated during the transfer to ecoinvent version 3. Life Cycle Impact Assessment results may still have changed, as they are affected by changes in the supply chain, i.e. in other datasets. This dataset was generated following the ecoinvent quality guidelines for version 2. It may have been subject to central changes described in the ecoinvent version 3 change report (http://www.ecoinvent.org/database/ecoinvent-version-3/reports-of-changes/), and the results of the central updates were reviewed extensively. The changes added e.g. consistent water flows and other information throughout the database. The documentation of this dataset can be found in the ecoinvent reports of version 2, which are still available via the ecoinvent website. The change report linked above covers all central changes that were made during the conversion process.]

## Included activities end
The inventory takes into account the energy demand (supplied by burning light fuel oil and consumption of electricity) for evaporating 1 kg of water, when drying grain at low temperature (80-90°C). Also included in the inventory is the infrastructure (building and machinery). Inventoried outputs are heat waste and air emissions from combustion. Not included are waste and other air emissions (like dust). Production of the wet educt and utilisation of the dried product, are not included.

## Geography
The inventories are based on indications made by drying plants in Switzerland and values given in international references (Western Europe).

## Technology
The inventories are based on common grain drying plants.

## Time period
Time of publication in literature and annual reports. Most publications between 2001 and 2002.

## Reference product
- drying of bread grain, seed and legumes: 1 l; By-product classification allocatable product; CPC 86111: Post-harvest crop services
  EcoSpold01Location=CH
  production volume 3.96633 l
    This is a placeholder value that does not reflect real-world production volumes. This dataset does not currently require a real-world production volume to work in the database framework, and no actual data were collected yet. This has no negative effect on the results of the ecoinvent database.
  property price 0.193105 EUR2005
    Calculated based on inputs: The price of the product has been calculated as a sum of the values of the material and energy inputs for this product. This value is therefore a rough estimation. It may underestimate the real price since there are additional expenses when producing any product. These expences can include for example labour costs, treatment of waste materials and profit for the producer. Please consider carefully whether this level of data quality is acceptable for your application.
  properties: carbon allocation 0 kg, carbon content 0

## Inputs from technosphere
- building, hall: 6.7e-5 m2; = LiveLink('C:\Users\pts293\Desktop\demanded_amount_.infrastructure_20120618xlsx.xlsx','agriculture','F5','', 'Automatic'); lognormal variance with pedigree 0.3441, pedigree (3,2,5,5,1)
  Estimation. A typical grain-drying plant consists of the dryer itself, built on a surface area of 150 square meters (about 12 m * 12 m), and up to four storeys in height (Häusermann 2002). Most plants do not have a storehouse. As with the drying plants for grass and maize, this surface is included as "building, hall", with a lifetime of 50 years as well. The total surface area of a plant, including building surface and surroundings, was also estimated to be 3000 square meters (Häusermann 2002). The total surface area of a plant was also included for the building and dismantling phases as "occupation, construction site". The area of the building, and of the land transformation, calculated for one kilogram evaporated water, is obtained by dividing the total surface area of the building or of the environs by the annual yield of dried product, the water evaporated per kilogram of dried product and by the lifetime of the infrastructure.
  The capacity utilization rate is 4/12 (4 months per year)
  EcoSpold01Location=CH
- cast iron: 0.00583 kg; lognormal variance with pedigree 0.058, pedigree (4,5,5,5,1)
  EcoSpold01Location=RER
  properties: carbon content, fossil 0.04, dry mass 1 kg, wet mass 1 kg
  note on carbon content, fossil: Cast iron is made by remelting pig iron in small furnaces (e.g. cupola furnaces or electric arc furnaces) and poured into moulds to make castings. It usually contains 2% to 6% carbon (ecoinvent v2.2 report 10_partII). An average content of 4% was considered
- electricity, low voltage: 0.037978, 0.00169528, 0.0266594, 0.55335, 0.0546184, 0.000340206, 0.125411, 0.19051, 0.00943801 kWh (9 suppliers, which the file names only by identifier); sum of these 1 kWh; lognormal variance with pedigree 0.0606, pedigree (2,5,5,5,1)
  EcoSpold01Location=CH
- heat, district or industrial, other than natural gas: 6.48205, 0.00300301, 0.164948 MJ (3 suppliers, which the file names only by identifier); sum of these 6.65 MJ; lognormal variance with pedigree 0.0512, pedigree (2,5,5,5,1)
  EcoSpold01Location=CH
  properties: heating value, net 1 MJ

## Inputs from nature
- Occupation, construction site [natural resource, land]: 0.0375 m2*year; lognormal variance with pedigree 0.0841, pedigree (3,2,5,5,1)
- Occupation, industrial area [natural resource, land]: 0.625 m2*year; lognormal variance with pedigree 0.0841, pedigree (3,2,5,5,1)
- Transformation, from pasture, man made [natural resource, land]: 0.00025 m2; lognormal variance with pedigree 0.1641, pedigree (3,2,5,5,1)
- Transformation, to industrial area [natural resource, land]: 0.00025 m2; lognormal variance with pedigree 0.1641, pedigree (3,2,5,5,1)

## Extrapolations
Values are based partially on non verified measurements, on expert estimations and on international references. This dataset has been copied from an original dataset covering the geography CH. The uncertainty has been adjusted accordingly.

## Review by Roland Hischier 2003-06-03
Passed.
