# treatment of residues, MSWI-WWT, WW from glass production, residual material landfill

Dataset: EcoSpold 2, unit process
Geography: GLO
Time period: 1994-01-01 to 2023-12-31
Technology level: current
Classification: ISIC rev.4 ecoinvent: 3822:Treatment and disposal of hazardous waste
Scenario: Business-as-Usual
System model: Allocation, cut-off by classification
Generated by: Nikolia Stoikou
Database: ecoinvent
isCopyrightProtected: true
accessRestrictedTo: 1

## General comment
The process represents the treatment of a waste (residues) that is exclusively produced from another waste treatment. Residues are generated in the municipal solid waste incineration (MSWI) of sewage sludge (with 70% water) that in turn is generated from wastewater treatment (WWT) of 'wastewater from glass production'. Recommended use of this dataset: to be used within the specific chain of treatments for 'wastewater from glass production'. Share of biogenic carbon in the sludge: 0%.

## Included activities start
The activity starts with the waste being available at the gate of the treatment facility. Collection and transportation of the waste to the treatment plant is not included.

## Included activities end
The activity ends with the waste being treated and waste-specific emissions from the landfill are released to water (short-term emissions to surface water and long-term emissions to ground water).

## Geography
Modelling parameters affecting the treatment technology are not specific to this geography.

## Technology
Residual material landfill for polluted, inorganic waste with base seal and leachate collection system. Recultivation after closure.

## Reference product
- residues, MSWI-WWT, WW from glass production: -1 kg; By-product classification Waste; CPC 39320: Ash and residue (except from the manufacture of iron or steel), containing metals or metallic compounds, excep[…]; HS2017 262110: Slag and ash; ash and residues from the incineration of municipal waste
  production volume 219294 kg
    Calculated in proportion to incinerated waste reference product. The production volume is accounting as well regional specific losses (wastewater not sewered) for this geography
  properties: antimony content 0.0080271, arsenic content 0.00875186, barium content 0.0793482, boron content 0.000317348, cadmium content 0.00282219, carbon allocation 0.0021101 kg, carbon content 0.0021101, carbon content, fossil 0.0021101, carbon content, non-fossil 0, chromium content 0.01424, copper content 0.00328674, dry mass 1 kg, lead content 0.0160952, nickel content 0.000991183, nitrogen content 1.42593e-5, oxygen content 0.50988, price 0 EUR2005, sulfur content 0.314526, tin content 0.0193601, water content 0, water in wet mass 0 kg, wet mass 1 kg, zinc content 0.0202298

## Inputs from technosphere
- cement, unspecified: 0.4 kg; lognormal variance with pedigree 0.049084, pedigree (1,1,5,1,1)
  cement required for solidification of landfilled residual material
  Uncertainty: Uncertainty calculated from uncertainty of composition of incinerated waste, and incinerator model uncertainty and residual material landfill transfer coefficient uncertainty.
  properties: dry mass 1 kg, wet mass 1 kg
- process-specific burdens, residual material landfill: 0.71109, 0.00841689, 0.280494 kg (3 suppliers, which the file names only by identifier); sum of these 1 kg
  mass-specific expenditures required for landfilling of residual material
- residual material landfill: 2.0833e-9 unit
  residual material landfill infrastructure required for landfilling of residual material
- waste cement, hydrated: -4.81263e-5, -0.998037, -0.00191494 kg (3 suppliers, which the file names only by identifier); sum of these -1 kg; lognormal variance with pedigree 0.5224, pedigree (5,5,5,5,5)
  hydrated cement output for solidification of landfilled residual material
  Uncertainty: Uncertainty calculated from uncertainty of composition of incinerated waste, and incinerator model uncertainty and residual material landfill transfer coefficient uncertainty.
  production volume
    Calculated from the production volume of the reference product in proportion to the respective output amounts.
  properties: dry mass 1 kg, wet mass 1 kg

## Inputs from nature
- Organic carbon, placed in landfill [inventory indicator, waste]: 0.0021101 kg; lognormal variance with pedigree 0.101412, pedigree (1,1,5,1,1)
  Mass of organic carbon in waste (without inorganic carbon), initially put in residual material landfill. The exchange represents a flow that is within the technosphere. This exchange should only be used to apply ecofactors for the Swiss LCIA method of Ecological Scarcity and not any other purpose.
  Uncertainty: Uncertainty calculated from uncertainty of composition of incinerated waste, and incinerator model uncertainty and residual material landfill transfer coefficient uncertainty.
- Waste mass, total, placed in landfill [inventory indicator, waste]: 1 kg
  Mass of waste initially put in a residual material landfill. The exchange represents a flow that is within the technosphere. This exchange should only be used to apply ecofactors for the Swiss LCIA method of Ecological Scarcity and not any other purpose.

## Emissions to nature
- Hazardous waste disposed [inventory indicator, waste]: 1 kg
  Inventory indicator for waste mass disposed. To be used in EN15804 "other data" results.
- Antimony ion [water, ground-, long-term]: 0.0051963 kg; lognormal variance with pedigree 0.17533, pedigree (1,1,5,1,1)
  complement of long-term emissions from residual material in residual material landfill
  Uncertainty: Uncertainty calculated from uncertainty of composition of incinerated waste, and incinerator model uncertainty and residual material landfill transfer coefficient uncertainty.
- Antimony ion [water, surface water]: 0.0028308 kg; lognormal variance with pedigree 0.19948, pedigree (1,1,5,1,1)
  short-term emissions from residual material in residual material landfill
  Uncertainty: Uncertainty calculated from uncertainty of composition of incinerated waste, and incinerator model uncertainty and residual material landfill transfer coefficient uncertainty.
- Arsenic ion [water, ground-, long-term]: 8.7519e-12 kg; lognormal variance with pedigree 0.18044, pedigree (1,1,5,1,1)
  (same comment as for Antimony ion)
- Arsenic ion [water, surface water]: 0.0087519 kg; lognormal variance with pedigree 0.1568, pedigree (1,1,5,1,1)
  (same comment as for Antimony ion)
- BOD5, Biological Oxygen Demand [water, ground-, long-term]: 0.0011272 kg; lognormal variance with pedigree 0.14901, pedigree (1,1,5,1,1)
  (same comment as for Antimony ion)
- BOD5, Biological Oxygen Demand [water, surface water]: 1.8819e-6 kg; lognormal variance with pedigree 0.74442, pedigree (1,1,5,1,1)
  (same comment as for Antimony ion)
- Barium II [water, ground-, long-term]: 0.00065544 kg; lognormal variance with pedigree 5.8425, pedigree (1,1,5,1,1)
  (same comment as for Antimony ion)
- Barium II [water, surface water]: 1.0942e-6 kg; lognormal variance with pedigree 1.309, pedigree (1,1,5,1,1)
  (same comment as for Antimony ion)
- Boron [water, ground-, long-term]: 0.00031203 kg; lognormal variance with pedigree 0.114975, pedigree (1,1,5,1,1)
  (same comment as for Antimony ion)
- Boron [water, surface water]: 2.4865e-6 kg; lognormal variance with pedigree 0.50863, pedigree (1,1,5,1,1)
  (same comment as for Antimony ion)
- COD, Chemical Oxygen Demand [water, ground-, long-term]: 0.0034462 kg; lognormal variance with pedigree 0.14901, pedigree (1,1,5,1,1)
  (same comment as for Antimony ion)
- COD, Chemical Oxygen Demand [water, surface water]: 5.7532e-6 kg; lognormal variance with pedigree 0.74442, pedigree (1,1,5,1,1)
  (same comment as for Antimony ion)
- Cadmium II [water, ground-, long-term]: 1.916e-5 kg; lognormal variance with pedigree 6.4647, pedigree (1,1,5,1,1)
  (same comment as for Antimony ion)
- Cadmium II [water, surface water]: 3.1986e-8 kg; lognormal variance with pedigree 1.4769, pedigree (1,1,5,1,1)
  (same comment as for Antimony ion)
- Chromium VI [water, ground-, long-term]: 0.002704 kg; lognormal variance with pedigree 0.15765, pedigree (1,1,5,1,1)
  (same comment as for Antimony ion)
- Chromium VI [water, surface water]: 0.000856 kg; lognormal variance with pedigree 0.31871, pedigree (1,1,5,1,1)
  (same comment as for Antimony ion)
- Copper ion [water, ground-, long-term]: 0.00012652 kg; lognormal variance with pedigree 2.8183, pedigree (1,1,5,1,1)
  (same comment as for Antimony ion)
- Copper ion [water, surface water]: 2.1122e-7 kg; lognormal variance with pedigree 1.1801, pedigree (1,1,5,1,1)
  (same comment as for Antimony ion)
- DOC, Dissolved Organic Carbon [water, ground-, long-term]: 0.0013637 kg; lognormal variance with pedigree 0.14901, pedigree (1,1,5,1,1)
  (same comment as for Antimony ion)
- DOC, Dissolved Organic Carbon [water, surface water]: 2.2766e-6 kg; lognormal variance with pedigree 0.74442, pedigree (1,1,5,1,1)
  (same comment as for Antimony ion)
- Lead II [water, ground-, long-term]: 8.3487e-5 kg; lognormal variance with pedigree 7.0871, pedigree (1,1,5,1,1)
  (same comment as for Antimony ion)
- Lead II [water, surface water]: 1.3938e-7 kg; lognormal variance with pedigree 1.4449, pedigree (1,1,5,1,1)
  (same comment as for Antimony ion)
- Nickel II [water, ground-, long-term]: 0.00035885 kg; lognormal variance with pedigree 0.36329, pedigree (1,1,5,1,1)
  (same comment as for Antimony ion)
- Nickel II [water, surface water]: 5.9907e-7 kg; lognormal variance with pedigree 0.82369, pedigree (1,1,5,1,1)
  (same comment as for Antimony ion)
- Nitrate [water, ground-, long-term]: 5.1224e-5 kg; lognormal variance with pedigree 0.18578, pedigree (1,1,5,1,1)
  (same comment as for Antimony ion)
- Nitrate [water, surface water]: 1.1924e-5 kg; lognormal variance with pedigree 0.25258, pedigree (1,1,5,1,1)
  (same comment as for Antimony ion)
- Sulfate [water, ground-, long-term]: 0.84234 kg; lognormal variance with pedigree 0.087671, pedigree (1,1,5,1,1)
  (same comment as for Antimony ion)
- Sulfate [water, surface water]: 0.10124 kg; lognormal variance with pedigree 0.20093, pedigree (1,1,5,1,1)
  (same comment as for Antimony ion)
- TOC, Total Organic Carbon [water, ground-, long-term]: 0.0013637 kg; lognormal variance with pedigree 0.14901, pedigree (1,1,5,1,1)
  (same comment as for Antimony ion)
- TOC, Total Organic Carbon [water, surface water]: 2.2766e-6 kg; lognormal variance with pedigree 0.74442, pedigree (1,1,5,1,1)
  (same comment as for Antimony ion)
- Tin ion [water, ground-, long-term]: 0.00036686 kg; lognormal variance with pedigree 4.0902, pedigree (1,1,5,1,1)
  (same comment as for Antimony ion)
- Tin ion [water, surface water]: 6.1245e-7 kg; lognormal variance with pedigree 1.2659, pedigree (1,1,5,1,1)
  (same comment as for Antimony ion)
- Zinc II [water, ground-, long-term]: 0.00024794 kg; lognormal variance with pedigree 5.0067, pedigree (1,1,5,1,1)
  (same comment as for Antimony ion)
- Zinc II [water, surface water]: 4.1392e-7 kg; lognormal variance with pedigree 1.3284, pedigree (1,1,5,1,1)
  (same comment as for Antimony ion)

## Extrapolations
Modelling parameters are based on an average residual material landfill in Switzerland.
