# asbestos production, chrysotile type

Dataset: EcoSpold 2, unit process
Geography: GLO
Time period: 2000-01-01 to 2023-12-31
Technology level: current
Classification: ISIC rev.4 ecoinvent: 0899:Other mining and quarrying n.e.c.
Classification: EcoSpold01Categories: construction materials/others
Tags: ConvertedDataset
Scenario: Business-as-Usual
System model: Allocation, cut-off by classification
Generated by: Roland Hischier
Published in: Althaus H.-J. 2007
Database: ecoinvent
isCopyrightProtected: true
accessRestrictedTo: 1

## General comment
The functional unit represent 1 kg of asbestos. Quite a large uncertainty of the process data due to weak data on the production process.
[This dataset was already contained in the ecoinvent database version 2. It was not individually updated during the transfer to ecoinvent version 3. Life Cycle Impact Assessment results may still have changed, as they are affected by changes in the supply chain, i.e. in other datasets. This dataset was generated following the ecoinvent quality guidelines for version 2. It may have been subject to central changes described in the ecoinvent version 3 change report (http://www.ecoinvent.org/database/ecoinvent-version-3/reports-of-changes/), and the results of the central updates were reviewed extensively. The changes added e.g. consistent water flows and other information throughout the database. The documentation of this dataset can be found in the ecoinvent reports of version 2, which are still available via the ecoinvent website. The change report linked above covers all central changes that were made during the conversion process.]

## Included activities end
Raw materials, machineries and energy consumption for production, estimated emissions to air from production and infrastructure of the site (approximation). No water emissions.

## Geography
Data are used here as European average.

## Technology
Data approximated with data from lime mining, crushing and milling.

## Time period
date of published literature

## Parameters
- fraction, process water, to air: 0.15 dimensionless; name fraction_PW_to_air; lognormal variance with pedigree 0.092025, pedigree (4,4,3,2,4)
  Literature value. In case when no industry/process specific data are available, default evaporation fraction value is used. This value is 15% and is based on literature (Statistics Canada, 2007 & Shaffer, K.H., 2008, Consumptive water use in the Great Lakes Basin, USGS & Shiklomanov, 2003, World Water Resources at the Beginning of the 21st Century) and has been approved by an expert.

## Reference product
- asbestos, chrysotile type: 1 kg; By-product classification allocatable product; CPC 16390: Other minerals n.e.c.; HS2017 252490: Asbestos; other than crocidolite (blue asbestos); CAS 12001-29-5
  EcoSpold01Location=GLO
  production volume 1 kg
    Dummy value to be replaced by measured, estimated or calculated value
  property price 0.18 EUR2005
    Calculated value based on data from United Nations Commodity Trade Statistics Database (comtrade.un.org). UN comtrade category: 252490 Asbestos other than crocidolite. Year 2007. Using exchange rate of 1EURO = 1.209 USD. Average of price of import into 3 main markets (EU, US and CN).
  properties: carbon allocation 0 kg, carbon content 0, carbon content, fossil 0, carbon content, non-fossil 0, dry mass 1 kg, water content 0, water in wet mass 0 kg, wet mass 1 kg

## Inputs from technosphere
- blasting: 7.73e-5 kg; lognormal variance with pedigree 0.0767, pedigree (4,3,5,3,3)
  Approximation with data from lime production
  EcoSpold01Location=RER
  Uncertainty: approximation with data from lime production
- conveyor belt: 2.78e-8 m; lognormal variance with pedigree 0.3667, pedigree (4,3,5,3,3)
  EcoSpold01Location=RER
  Approximation with data from lime production
  Uncertainty: approximation with data from lime production
- diesel, burned in building machine: 0.018 MJ; lognormal variance with pedigree 0.0767, pedigree (4,3,5,3,3)
  EcoSpold01Location=GLO
  Approximation with data from lime production
  Uncertainty: approximation with data from lime production
  properties: heating value, net 1 MJ
- electricity, medium voltage: 0.0325 kWh; lognormal variance with pedigree 0.0767, pedigree (4,3,5,3,3)
  EcoSpold01Location=UCTE
  Approximation with data from lime production
  Uncertainty: approximation with data from lime production
- heat, central or small-scale, other than natural gas: 0.0033746 MJ; lognormal variance with pedigree 0.0767, pedigree (4,3,5,3,3)
  Approximation with data from lime production
  EcoSpold01Location=CH
  Uncertainty: approximation with data from lime production
  properties: heating value, net 1 MJ
- heat, district or industrial, other than natural gas: 0.0898 MJ; lognormal variance with pedigree 0.0767, pedigree (4,3,5,3,3)
  (same comment as for blasting)
  properties: heating value, net 1 MJ
- industrial machine, heavy, unspecified: 7.63668e-5, 0.000154633 kg (2 suppliers, which the file names only by identifier); sum of these 0.000231 kg; lognormal variance with pedigree 0.3667, pedigree (4,3,5,3,3)
  (same comment as for conveyor belt)
- limestone quarry infrastructure: 5.25e-11 unit; lognormal variance with pedigree 0.3667, pedigree (4,3,5,3,3)
  (same comment as for heat, central or small-scale, other than natural gas)
- recultivation, limestone mine: 6.52e-6 m2; lognormal variance with pedigree 0.3667, pedigree (4,3,5,3,3)
  EcoSpold01Location=CH
  Approximation with data from lime production
  Uncertainty: approximation with data from lime production

## Inputs from nature
- Chrysotile [natural resource, in ground]: 1.11 kg; lognormal variance with pedigree 0.0767, pedigree (4,3,5,3,3)
  Overall yield of 90% assumed
  Uncertainty: overall yield of 90% assumed
- Occupation, mineral extraction site [natural resource, land]: 8.48e-5 m2*year; lognormal variance with pedigree 0.1267, pedigree (4,3,5,3,3)
  Approximation with data from lime production
  Uncertainty: approximation with data from lime production
- Transformation, from forest, unspecified [natural resource, land]: 6.52e-6 m2; lognormal variance with pedigree 0.2067, pedigree (4,3,5,3,3)
  (same comment as for Occupation, mineral extraction site)
- Transformation, to mineral extraction site [natural resource, land]: 6.52e-6 m2; lognormal variance with pedigree 0.2067, pedigree (4,3,5,3,3)
  (same comment as for Occupation, mineral extraction site)
- Water, well, in ground [natural resource, in water]: 2.93e-5 m3; name water_well_in_ground_input; lognormal variance with pedigree 0.0767, pedigree (4,3,5,3,3)
  (same comment as for Occupation, mineral extraction site)

## Emissions to nature
- Particulate Matter, < 2.5 um [air, urban air close to ground]: 8.87e-6 kg; lognormal variance with pedigree 0.3667, pedigree (4,3,5,3,3)
  (same comment as for Occupation, mineral extraction site)
- Particulate Matter, > 10 um [air, urban air close to ground]: 0.000112 kg; lognormal variance with pedigree 0.1267, pedigree (4,3,5,3,3)
  (same comment as for Occupation, mineral extraction site)
- Particulate Matter, > 2.5 um and < 10um [air, urban air close to ground]: 4.78e-5 kg; lognormal variance with pedigree 0.2067, pedigree (4,3,5,3,3)
  (same comment as for Occupation, mineral extraction site)
- Water [air, unspecified]: 4.395e-6 m3; name water_to_air_unspecified; = (water_well_in_ground_input*fraction_PW_to_air); lognormal variance with pedigree 0.0807, pedigree (2,2,5,1,1)
  Calculated value based on literature values and expert opinion. See comments in the parametres' comment field.
  property fraction, origin: fresh water 1; name fraction_origin_fresh_water
  property fraction, origin: salt water 0; name fraction_origin_salt_water
  property fraction, origin: unspecified 0; name fraction_origin_unspecified
- Water [water, unspecified]: 2.4905e-5 m3; name water_to_water_unspecified; = water_well_in_ground_input*(1-fraction_PW_to_air); lognormal variance with pedigree 0.0807, pedigree (2,2,5,1,1)
  (same comment as for Water)
  property carbon content, fossil 0; name C_content_fossil
  property carbon content, non-fossil 0; name C_content_non_fossil
  property dry mass 0 kg; name DM
  property fraction, origin: fresh water 1; name fraction_origin_fresh_water_Ww
  property fraction, origin: salt water 0; name fraction_origin_salt_water_Ww
  property fraction, origin: unspecified 0; name fraction_origin_unspecified_Ww
  property water in wet mass 1000 kg; name WWM
  property wet mass 1000 kg; name WM

## Extrapolations
see technology

## Review by Heiko Kunst 2007-11-09
Passed.
