# granulated blast furnace slag to generic market for supplementary cementitious materials

Dataset: EcoSpold 2, unit process
Geography: BR
Time period: 2019-01-01 to 2023-12-31
Technology level: current
Classification: ISIC rev.4 ecoinvent: 2394:Manufacture of cement, lime and plaster
Scenario: Business-as-Usual
System model: Allocation, cut-off by classification
Generated by: Lucia Valsasina
Database: ecoinvent
isCopyrightProtected: true
accessRestrictedTo: 1

## General comment
This activity is a renaming activity, linking granulated blast furnace slag to the generic market for supplementary cementitious materials (SCM).

## Included activities start
The activity starts with the input of GGBFS.

## Included activities end
With the provision of a generic kg of supplementary cementitious materials.

## Reference product
- supplementary cementitious materials: 1 kg; name SCM; By-product classification allocatable product; CPC 15200: Gypsum; anhydrite; limestone flux; limestone and other calcareous stone, of a kind used for the manufacture of[…]; HS2017 681099: Cement, concrete or artificial stone; articles (other than prefabricated structural components for building[...]
  production volume 2.172e9 kg; = 7240000000*0.30
    Granulated blast furnace slag main use is as a alternative constitutents for cement production. It is here assumed that 30% of GBFS goes to the generic market for supplementary cementitious materials (SCMs). GBFS is one of the main SCMs used today. The production volume of GBFS is taken from the PV of the regional production activity (accessed 17th June 2019).
  property dry mass 1 kg; name SCM_DM
  property price 0.075 EUR2005
    Price set equal to the price of clay as considered as the product that can answer in increase in demand of supplementary cementitious materials. Calculated value based on data from United Nations Commodity Trade Statistics Database (comtrade.un.org). UN comtrade category: 250810 Bentonite. Year 2005. Using exchange rate of 1EURO = 1.209 USD. Average of price of import into 5 main markets (EU, US, JP, IN and CN).
  property water content 0; name SCM_water_content
  property water in wet mass 0 kg; name SCM_WWM
  property wet mass 1 kg; name SCM_WM
  properties: carbon allocation 0 kg, carbon content 0

## Inputs from technosphere
- granulated blast furnace slag: 1 kg; name GBFS
  This activity is a renaming activity, linking granulated blast furnace slag to the generic market for supplementary cementitious materials (SCM).
  property carbon content, fossil 0; name GBFS_C_content_fossil
  property carbon content, non-fossil 0; name GBFS_C_content_non_fossil
  property dry mass 1 kg; name GBFS_DM
  property price 0 EUR2005; name GBFS_price_EUR2005
  property water content 0; name GBFS_water_content
  property water in wet mass 0 kg; name GBFS_WWM
  property wet mass 1 kg; name GBFS_WM
