# battery cell production, Li-ion, LiMn2O4

Dataset: EcoSpold 2, unit process
Geography: RoW
Time period: 2009-01-01 to 2023-12-31
Technology level: current
Classification: EcoSpold01Categories: electronics/component
Classification: ISIC rev.4 ecoinvent: 2720:Manufacture of batteries and accumulators
Tags: ConvertedDataset
Scenario: Business-as-Usual
System model: Allocation, cut-off by classification
Generated by: Dominic Notter
Published in: Hischier, R. 2009
Database: ecoinvent
isCopyrightProtected: true
accessRestrictedTo: 1

## General comment
The dataset can be used as a cathode for a lithium-ion battery. Data are based on patents. For infrastructure, the ecoinvent dataset "chemical plant, organics" is accounted. Transportation efforts are based on ecoinvent standard estimates.
[This dataset was already contained in the ecoinvent database version 2. It was not individually updated during the transfer to ecoinvent version 3. Life Cycle Impact Assessment results may still have changed, as they are affected by changes in the supply chain, i.e. in other datasets. This dataset was generated following the ecoinvent quality guidelines for version 2. It may have been subject to central changes described in the ecoinvent version 3 change report (http://www.ecoinvent.org/database/ecoinvent-version-3/reports-of-changes/), and the results of the central updates were reviewed extensively. The changes added e.g. consistent water flows and other information throughout the database. The documentation of this dataset can be found in the ecoinvent reports of version 2, which are still available via the ecoinvent website. The change report linked above covers all central changes that were made during the conversion process.]

## Included activities end
This dataset incudes the production of a single cell for a lithium ion battery. Cathode, anode and a seperator are calendared. An aluminium electrode tab is added. The singel cells are filled with electrolyte (LiPF6 in ethylencarbonate) in an inert atmosphere and packed up in a polyethylene envelope. For infrastructure, the ecoinvent dataset "chemical plant, organics" is accounted. Transportation efforts are based on ecoinvent standard estimates.

## Geography
Some European datasets are used for global processes.

## Technology
This dataset includes a method of producing a lithium ion single cell. Lithium ion move from the cathode (LiMn2O4) into the electrolyte (LiPF6 in ethylenecarbonate) through the micropores of the sepeartor into the anode (lithium ion intercalation). During the charging phase. During the discharge of the battery the Li+-ions move back into the cathode.

## Reference product
- battery cell, Li-ion, LiMn2O4: 1 kg; By-product classification allocatable product; CPC 46410: Primary cells and primary batteries; HS2017 850650: Cells and batteries; primary, lithium
  EcoSpold01Location=CN
  production volume 3.80251 kg
    This is a placeholder value that does not reflect real-world production volumes. This dataset does not currently require a real-world production volume to work in the database framework, and no actual data were collected yet. This has no negative effect on the results of the ecoinvent database.
  property carbon content, fossil 0.380721
    C content calculated as the addition of the C contents in the final product components
  property price 10 EUR2005
    Calculated value based on data from United Nations Commodity Trade Statistics Database (comtrade.un.org). UN comtrade category: 8506 Primary cells and primary bateries. Using exchange rate of 1EURO = 1.209 USD. Average of price of import into 4 main markets (EU, US, JP, and CH).
  properties: carbon allocation 0.380721 kg, carbon content 0.380721, carbon content, non-fossil 0, dry mass 1 kg, water content 0, water in wet mass 0 kg, wet mass 1 kg

## Inputs from technosphere
- aluminium, wrought alloy: 0.016485 kg; lognormal variance with pedigree 0.0546, pedigree (2,4,5,5,1)
  EcoSpold01Location=RER
  properties: dry mass 1 kg, wet mass 1 kg
- anode, graphite, for Li-ion battery: 0.4011 kg; lognormal variance with pedigree 0.0546, pedigree (2,4,5,5,1)
  properties: carbon content, non-fossil 0.0088164, dry mass 1 kg, wet mass 1 kg
- battery separator: 0.053655 kg; lognormal variance with pedigree 0.0546, pedigree (2,4,5,5,1)
  EcoSpold01Location=CN
  properties: carbon content, fossil 0.603377, dry mass 1 kg, wet mass 1 kg
  note on carbon content, fossil: C content calculated as the addition of the C contents in the final product components
- cathode, LiMn2O4, for Li-ion battery: 0.32686 kg; lognormal variance with pedigree 0.0546, pedigree (2,4,5,5,1)
  EcoSpold01Location=CN
  properties: carbon content, fossil 0.0310613, dry mass 1 kg, wet mass 1 kg
- chemical factory, organics: 4e-10 unit; lognormal variance with pedigree 0.448, pedigree (5,5,5,5,3)
  EcoSpold01Location=RER
- electricity, medium voltage: 0.000137438, 1.2224e-5, 0.0010658, 0.00139663, 0.00147904, 0.000753347, 0.000104049, 0.000658551, 2.77991e-5, 0.00445077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 kWh (47 suppliers, which the file names only by identifier); sum of these 0.1056 kWh; lognormal variance with pedigree 0.082, pedigree (1,1,5,5,1)
  EcoSpold01Location=CN
  composite
- ethylene carbonate: 0.15957 kg; lognormal variance with pedigree 0.0546, pedigree (2,4,5,5,1)
  EcoSpold01Location=CN
  properties: carbon content, fossil 0.409173, dry mass 1 kg, heating value, net 27.53 MJ, wet mass 1 kg
- extrusion, plastic film: 0.07329 kg; lognormal variance with pedigree 0.0546, pedigree (2,4,5,5,1)
  EcoSpold01Location=RER
- heat, district or industrial, natural gas: 0.065234 MJ; lognormal variance with pedigree 0.072, pedigree (4,4,5,5,1)
  EcoSpold01Location=RER
  properties: heating value, net 1 MJ
- lithium hexafluorophosphate: 0.019037 kg; lognormal variance with pedigree 0.0546, pedigree (2,4,5,5,1)
  EcoSpold01Location=CN
  properties: dry mass 1 kg, wet mass 1 kg
- nitrogen, liquid: 0.00784626, 0.00215374 kg (2 suppliers, which the file names only by identifier); sum of these 0.01 kg; lognormal variance with pedigree 0.072, pedigree (4,4,5,5,1)
  EcoSpold01Location=RER
  properties: dry mass 1 kg, wet mass 1 kg
- polyethylene, low density, granulate: 0.07329 kg; lognormal variance with pedigree 0.0546, pedigree (2,4,5,5,1)
  EcoSpold01Location=RER
  properties: carbon content, fossil 0.857143, dry mass 1 kg, heating value, net 42.47 MJ, wet mass 1 kg
  note on carbon content, fossil: Polyethylene is formed out of a huge amount of ethylene monomers (C2H4) (ecoinvent v2.2 report 11_II). MW=28 g/mol
- sheet rolling, aluminium: 0.016485 kg; lognormal variance with pedigree 0.3546, pedigree (2,4,5,5,1)
  EcoSpold01Location=RER
- used Li-ion battery: -0.0525 kg; lognormal variance with pedigree 0.084, pedigree (5,4,1,5,1)
  EcoSpold01Location=GLO
  production volume
    Calculated from the production volume of battery cell, Li-ion in proportion to the respective output amounts.
  properties: carbon content, fossil 0.328011, dry mass 1 kg, wet mass 1 kg

## Sampling procedure
measurements, patent, ecoinvent

## Extrapolations
see Geography This dataset has been copied from an original dataset covering the geography CN. The uncertainty has been adjusted accordingly.

## Review by Christian Bauer 2010-02-08
passed
