# treatment of residues, MSWI-WWT-SLF, refinery sludge, residual material landfill

Dataset: EcoSpold 2, unit process
Geography: RoW
Time period: 1994-01-01 to 2023-12-31
Technology level: current
Classification: ISIC rev.4 ecoinvent: 3822:Treatment and disposal of hazardous waste
Scenario: Business-as-Usual
System model: Allocation, cut-off by classification
Generated by: Nikolia Stoikou
Database: ecoinvent
isCopyrightProtected: true
accessRestrictedTo: 1

## General comment
The process represents the treatment of controlled landfilling in residual material landfill of a waste (residues) that is exclusively produced in another waste treatment. Residues are a by-product of municipal solid waste incineration (MSWI) of sewage sludge (with 70% water) that in turn is generated during wastewater treatment (WWT) of leachate from the sanitary landfilling (SLF) of 'refinery sludge'. Recommended use of this dataset: to be used within the specific chain of treatments for 'refinery sludge'. Share of biogenic carbon in the sludge: 0%.

## Included activities start
The activity starts with the waste being available at the gate of the treatment facility. Collection and transportation of the waste to the treatment plant is not included.

## Included activities end
The activity ends with the waste being treated and waste-specific emissions from the landfill are released to water (short-term emissions to river water and long-term emissions to ground water).

## Geography
Modelling parameters affecting the treatment technology are not specific to this geography.

## Technology
Residual material landfill for polluted, inorganic waste with base seal and leachate collection system (landfill type C). Recultivation after closure.

## Reference product
- residues, MSWI-WWT-SLF, refinery sludge: -1 kg; By-product classification Waste; CPC 39320: Ash and residue (except from the manufacture of iron or steel), containing metals or metallic compounds, excep[…]; HS2017 262110: Slag and ash; ash and residues from the incineration of municipal waste
  main reference product of this activity
  production volume 18407.7 kg
    calculated in proportion to incinerated waste reference product
  property price 0 EUR2005
    Waste products are assigned a price of zero as they are assumed to require further treatment.
  properties: cadmium content 0.0120633, calcium content 0.364819, carbon allocation 0.0178286 kg, carbon content 0.0178286, carbon content, fossil 0.0178286, carbon content, non-fossil 0, cobalt content 0.00925194, copper content 0.000390976, dry mass 1 kg, iron content 0.00246439, lead content 0.0103669, mercury content 0.000947832, nickel content 0.00209975, nitrogen content 0.000172608, oxygen content 0.304466, phosphorus content 0.0209636, sulfur content 0.0213613, water content 0, water in wet mass 0 kg, wet mass 1 kg, zinc content 0.232803

## Inputs from technosphere
- cement, unspecified: 0.000494757, 0.00906934, 0.000234332, 0.00552688, 0.0344431, 0.00108113, 0.000790256, 0.000428297, 0.000851241, 0.0013014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 kg (11 suppliers, which the file names only by identifier); sum of these 0.4 kg; lognormal variance with pedigree 0.049084, pedigree (1,1,5,1,1)
  cement required for solidification of landfilled residual material
  Uncertainty: Uncertainty calculated from uncertainty of composition of incinerated waste, and incinerator model uncertainty and residual material landfill transfer coefficient uncertainty.
  properties: dry mass 1 kg, wet mass 1 kg
- process-specific burdens, residual material landfill: 0.988302, 0.0116981 kg (2 suppliers, which the file names only by identifier); sum of these 1 kg
  mass-specific expenditures required for landfilling of residual material
- residual material landfill: 2.0833e-9 unit
  residual material landfill infrastructure required for landfilling of residual material
- waste cement, hydrated: -4.82186e-5, -0.999952 kg (2 suppliers, which the file names only by identifier); sum of these -1 kg
  hydrated cement output for solidification of landfilled residual material
  production volume
    calculated in proportion to incineration residues landfilled
  properties: dry mass 1 kg, wet mass 1 kg

## Inputs from nature
- Organic carbon, placed in landfill [inventory indicator, waste]: 0.017829 kg; lognormal variance with pedigree 0.16321, pedigree (1,1,5,1,1)
  Mass of organic carbon in waste (without inorganic carbon), initially put in residual material landfill. The exchange represents a flow that is within the technosphere. This exchange should only be used to apply ecofactors for the Swiss LCIA method of Ecological Scarcity and not any other purpose.
  Uncertainty: Uncertainty calculated from uncertainty of composition of incinerated waste, and incinerator model uncertainty and residual material landfill transfer coefficient uncertainty.
- Waste mass, total, placed in landfill [inventory indicator, waste]: 1 kg
  Mass of waste initially put in a residual material landfill. The exchange represents a flow that is within the technosphere. This exchange should only be used to apply ecofactors for the Swiss LCIA method of Ecological Scarcity and not any other purpose.

## Emissions to nature
- Hazardous waste disposed [inventory indicator, waste]: 1 kg
  Inventory indicator for waste mass disposed. To be used in EN15804 "other data" results.
- BOD5, Biological Oxygen Demand [water, ground-, long-term]: 0.0095242 kg; lognormal variance with pedigree 0.21081, pedigree (1,1,5,1,1)
  complement of long-term emissions from residual material in residual material landfill
  Uncertainty: Uncertainty calculated from uncertainty of composition of incinerated waste, and incinerator model uncertainty and residual material landfill transfer coefficient uncertainty.
- BOD5, Biological Oxygen Demand [water, surface water]: 1.59e-5 kg; lognormal variance with pedigree 0.80622, pedigree (1,1,5,1,1)
  short-term emissions from residual material in residual material landfill
  Uncertainty: Uncertainty calculated from uncertainty of composition of incinerated waste, and incinerator model uncertainty and residual material landfill transfer coefficient uncertainty.
- COD, Chemical Oxygen Demand [water, ground-, long-term]: 0.029117 kg; lognormal variance with pedigree 0.21081, pedigree (1,1,5,1,1)
  (same comment as for BOD5, Biological Oxygen Demand)
- COD, Chemical Oxygen Demand [water, surface water]: 4.861e-5 kg; lognormal variance with pedigree 0.80622, pedigree (1,1,5,1,1)
  (same comment as for BOD5, Biological Oxygen Demand)
- Cadmium II [water, ground-, long-term]: 8.1896e-5 kg; lognormal variance with pedigree 6.9762, pedigree (1,1,5,1,1)
  (same comment as for BOD5, Biological Oxygen Demand)
- Cadmium II [water, surface water]: 1.3672e-7 kg; lognormal variance with pedigree 1.9884, pedigree (1,1,5,1,1)
  (same comment as for BOD5, Biological Oxygen Demand)
- Calcium II [water, ground-, long-term]: 0.032964 kg; lognormal variance with pedigree 1.5963, pedigree (1,1,5,1,1)
  (same comment as for BOD5, Biological Oxygen Demand)
- Calcium II [water, surface water]: 5.5032e-5 kg; lognormal variance with pedigree 1.0527, pedigree (1,1,5,1,1)
  (same comment as for BOD5, Biological Oxygen Demand)
- Cobalt II [water, ground-, long-term]: 0.0015817 kg; lognormal variance with pedigree 1.2237, pedigree (1,1,5,1,1)
  (same comment as for BOD5, Biological Oxygen Demand)
- Cobalt II [water, surface water]: 2.6406e-6 kg; lognormal variance with pedigree 1.2607, pedigree (1,1,5,1,1)
  (same comment as for BOD5, Biological Oxygen Demand)
- Copper ion [water, ground-, long-term]: 1.505e-5 kg; lognormal variance with pedigree 3.4588, pedigree (1,1,5,1,1)
  (same comment as for BOD5, Biological Oxygen Demand)
- Copper ion [water, surface water]: 2.5126e-8 kg; lognormal variance with pedigree 1.8205, pedigree (1,1,5,1,1)
  (same comment as for BOD5, Biological Oxygen Demand)
- DOC, Dissolved Organic Carbon [water, ground-, long-term]: 0.011522 kg; lognormal variance with pedigree 0.21081, pedigree (1,1,5,1,1)
  (same comment as for BOD5, Biological Oxygen Demand)
- DOC, Dissolved Organic Carbon [water, surface water]: 1.9235e-5 kg; lognormal variance with pedigree 0.80622, pedigree (1,1,5,1,1)
  (same comment as for BOD5, Biological Oxygen Demand)
- Iron ion [water, ground-, long-term]: 1.2351e-5 kg; lognormal variance with pedigree 7.1137, pedigree (1,1,5,1,1)
  (same comment as for BOD5, Biological Oxygen Demand)
- Iron ion [water, surface water]: 2.062e-8 kg; lognormal variance with pedigree 1.3853, pedigree (1,1,5,1,1)
  (same comment as for BOD5, Biological Oxygen Demand)
- Lead II [water, ground-, long-term]: 5.3774e-5 kg; lognormal variance with pedigree 7.5769, pedigree (1,1,5,1,1)
  (same comment as for BOD5, Biological Oxygen Demand)
- Lead II [water, surface water]: 8.9773e-8 kg; lognormal variance with pedigree 1.9346, pedigree (1,1,5,1,1)
  (same comment as for BOD5, Biological Oxygen Demand)
- Mercury II [water, ground-, long-term]: 4.4739e-5 kg; lognormal variance with pedigree 2.9345, pedigree (1,1,5,1,1)
  (same comment as for BOD5, Biological Oxygen Demand)
- Mercury II [water, surface water]: 7.469e-8 kg; lognormal variance with pedigree 1.5909, pedigree (1,1,5,1,1)
  (same comment as for BOD5, Biological Oxygen Demand)
- Nickel II [water, ground-, long-term]: 0.00076019 kg; lognormal variance with pedigree 0.60537, pedigree (1,1,5,1,1)
  (same comment as for BOD5, Biological Oxygen Demand)
- Nickel II [water, surface water]: 1.2691e-6 kg; lognormal variance with pedigree 1.0658, pedigree (1,1,5,1,1)
  (same comment as for BOD5, Biological Oxygen Demand)
- Nitrate [water, ground-, long-term]: 0.00062006 kg; lognormal variance with pedigree 0.4392, pedigree (1,1,5,1,1)
  (same comment as for BOD5, Biological Oxygen Demand)
- Nitrate [water, surface water]: 0.00014435 kg; lognormal variance with pedigree 0.50599, pedigree (1,1,5,1,1)
  (same comment as for BOD5, Biological Oxygen Demand)
- Phosphate [water, ground-, long-term]: 0.01436 kg; lognormal variance with pedigree 0.92791, pedigree (1,1,5,1,1)
  (same comment as for BOD5, Biological Oxygen Demand)
- Phosphate [water, surface water]: 2.3974e-5 kg; lognormal variance with pedigree 1.1484, pedigree (1,1,5,1,1)
  (same comment as for BOD5, Biological Oxygen Demand)
- Sulfate [water, ground-, long-term]: 0.057208 kg; lognormal variance with pedigree 0.30425, pedigree (1,1,5,1,1)
  (same comment as for BOD5, Biological Oxygen Demand)
- Sulfate [water, surface water]: 0.0068755 kg; lognormal variance with pedigree 0.41751, pedigree (1,1,5,1,1)
  (same comment as for BOD5, Biological Oxygen Demand)
- TOC, Total Organic Carbon [water, ground-, long-term]: 0.011522 kg; lognormal variance with pedigree 0.21081, pedigree (1,1,5,1,1)
  (same comment as for BOD5, Biological Oxygen Demand)
- TOC, Total Organic Carbon [water, surface water]: 1.9235e-5 kg; lognormal variance with pedigree 0.80622, pedigree (1,1,5,1,1)
  (same comment as for BOD5, Biological Oxygen Demand)
- Zinc II [water, ground-, long-term]: 0.0028532 kg; lognormal variance with pedigree 5.2874, pedigree (1,1,5,1,1)
  (same comment as for BOD5, Biological Oxygen Demand)
- Zinc II [water, surface water]: 4.7633e-6 kg; lognormal variance with pedigree 1.6091, pedigree (1,1,5,1,1)
  (same comment as for BOD5, Biological Oxygen Demand)
