# cement production, CEM II/B

Dataset: EcoSpold 2, unit process
Geography: CH
Time period: 2017-01-01 to 2023-12-31
Technology level: current
Classification: ISIC rev.4 ecoinvent: 2394:Manufacture of cement, lime and plaster
Synonyms: Portland composite cement; CEM II/B
Tags: combined production
Scenario: Business-as-Usual
System model: Allocation, cut-off by classification
Share of production covered: 100 %
Generated by: Frank Werner
Published in: Werner F. 2022
Database: ecoinvent
isCopyrightProtected: true
accessRestrictedTo: 1

## General comment
The dataset describes the production of cement (CEM II/B) in Switzerland. It covers the representative production mix of CEM II/B-LL, CEM II/B-M (S-T), CEM II/B-M (T-LL), CEM II/B-M (V-LL) and CEM II/B-T according to SN EN 197-1 as well as ZN/D in conformity with SIA 2049.
In Switzerland, according to the Swiss standard SN EN 197-1:2011, cement CEM II, also known as Portland composite cement, has 65-94% of clinker and is mixed with different materials, such as limestone, ground granulated blast furnace slag, fly ash, pozzolan, burnt shale, silica fume, among others.

## Included activities start
The activity starts with the clinker in the silo to be used for cement production and with the additional ingredients of the cement at the gate of the cement plant. The dataset includes energy use, input of grinding aids and input of infrastructure.

## Included activities end
The activity ends with the cement produced in the cement mill. The dataset does not include particulate emission, packaging and administration.

## Geography
This dataset represents production of cement CEM II/B for Switzerland.

## Technology
In this dataset, the production of CEM II/B is described, where clinker (69.9%) is ground together with gypsum (3.89%) and mixed with limestone (15.3%), hard coal ash, burnt shale, waste mixed aggregates (from demolition), blast furnace slag and ground granulated blast furnace slag (GGBFS). The activity includes also the input of electricity used for the grinding of the clinker and grinding aids (ethylene glycol and iron sulfate).

## Time period
Time period corresponds to data collection (2017-2021).

## Reference product
- cement, CEM II/B: 1 kg; name cement; source Werner F. 2022; By-product classification allocatable product; CPC 37440: Portland cement, aluminous cement, slag cement and similar hydraulic cements, except in the form of clinkers; HS2017 252329: Cement; portland, other than white, whether or not artificially coloured
  Value provided by cemsuisse as an average from all cement producing plants in Switzerland.
  production volume 2.62316e9 kg; name APV_cement; = 4177*10^6*(0.579+0.049)
    Total production volume of cement in Switzerland in 2021: 4'177'000 metric ton. Market share of cement, CEM II/B is 57.9%. The category type "others" is to be considered similar to CEM II/B. Therefore, total market share of CEM II/B is 57.9% + 4.9% = 62.8% Source: cemsuisse (2022), Jahresbericht cemsuisse 2022, page 9. Available at: https://www.cemsuisse.ch/jahresberichte/, accessed on 20.06.2023.
  property price 0.0615 EUR2005
    2005 import and export prices (total trades (USD) divided by total weight (kg) in China, India, USA, Japan, Russia and Europe, major producers and consumers (http://www.cementchina.net/freport/showfre.asp?id=749) from UN Commodity Trade Statistics Database (http://data.un.org/Explorer.aspxDatabase [Accessed 2 July 2010]). Commodity: Cement (portland, aluminious, slag or hydraulic)
  properties: carbon allocation 0 kg, carbon content 0, carbon content, fossil 0, carbon content, non-fossil 0, dry mass 1 kg, water content 0, water in wet mass 0 kg, wet mass 1 kg

## Inputs from technosphere
All rows: source Werner F. 2022
- burnt shale: 0.0642 kg; = 0,0642*cement+0*flyash+0*GGBFS_RP+0*RC_M; lognormal variance with pedigree 0.0086, pedigree (1,1,4,1,1)
  Value provided by cemsuisse as an average from all cement producing plants in Switzerland. An activity-link was added to this exchange to "burnt shale production / DE".
  properties: dry mass 1 kg, wet mass 1 kg
- cement factory: 5.36e-11 unit; = 5.36E-11*cement+0*flyash+0*GGBFS_RP+0*RC_M; lognormal variance with pedigree 0.3086, pedigree (2,1,4,1,1)
  Value provided by cemsuisse as an average from all cement producing plants in Switzerland.
  This exchange has an activity link directly to the producing activity because the product is primarily consumed in the same geographical area where it is produced.
- clinker: 0.699 kg; = 0.699*cement+0*flyash+0*GGBFS_RP+0*RC_M; lognormal variance with pedigree 0.0086, pedigree (1,1,4,1,1)
  Value provided by cemsuisse as an average from all cement producing plants in Switzerland. An activity-link was added to this exchange to "clinker production / CH", since clinker is produced in the same factory as the cement is produced.
  properties: dry mass 1 kg, wet mass 1 kg
- electricity, medium voltage: 0.029 kWh; = 0.0290*cement+0*flyash+0*GGBFS_RP+0*RC_M; lognormal variance with pedigree 0.0086, pedigree (1,1,4,1,1)
  Value provided by cemsuisse as an average from all cement producing plants in Switzerland.
- ethylene glycol: 0.000212 kg; = 0.000212*cement+0*flyash+0*GGBFS_RP+0*RC_M; lognormal variance with pedigree 0.0086, pedigree (1,1,4,1,1)
  Ancillary product for grinding; value provided by cemsuisse as an average from all cement producing plants in Switzerland.
  properties: carbon content, fossil 0.387097, dry mass 1 kg, heating value, net 23.44 MJ, wet mass 1 kg
- ground granulated blast furnace slag: 0.00605 kg; name GGBFS; = 0,0121*0,5*cement+0*flyash+0*GGBFS_RP+0*RC_M; lognormal variance with pedigree 0.0086, pedigree (1,1,4,1,1)
  Value provided by cemsuisse as an average from all cement producing plants in Switzerland; assuming that 50% of the slag comes grinded and does not need further drying.
  property carbon content, fossil 0; name GGBFS_C_content_fossil
  property carbon content, non-fossil 0; name GGBFS_C_content_non_fossil
  property dry mass 1 kg; name GGBFS_DM
  property water content 0; name GGBFS_water_content
  property water in wet mass 0 kg; name GGBFS_WWM
  property wet mass 1 kg; name GGBFS_WM
  note on carbon content, fossil: Industry value; Arcelor Mittal, chemical composition of blast furnace slag (http://www.cst.com.br/english/products/co_products/catalog_products/blast_slag/blast_slag.asp, accessed: 20121003).
- gypsum, mineral: 0.0389 kg; = 0.0389*cement+0*flyash+0*GGBFS_RP+0*RC_M; lognormal variance with pedigree 0.0086, pedigree (1,1,4,1,1)
  Value provided by cemsuisse as an average from all cement producing plants in Switzerland.
  properties: dry mass 1 kg, wet mass 1 kg
- iron sulfate: 0.0034 kg; = 3.40E-3*cement+0*flyash+0*GGBFS_RP+0*RC_M; lognormal variance with pedigree 0.0086, pedigree (1,1,4,1,1)
  (same comment as for cement factory)
  properties: dry mass 1 kg, wet mass 1 kg
- limestone, crushed, for mill: 0.153 kg; name limestone; = 0.153*cement+0*flyash+0*GGBFS_RP+0*RC_M; lognormal variance with pedigree 0.0086, pedigree (1,1,4,1,1)
  Value provided by cemsuisse as an average from all cement producing plants in Switzerland.
  properties: carbon content, fossil 0.117492, dry mass 0.998 kg, water content 0.00200401, wet mass 1 kg
- steel, low-alloyed: 4e-5 kg; name steel; = 4E-05*cement+0*flyash+0*GGBFS_RP+0*RC_M; lognormal variance with pedigree 0.0086, pedigree (1,1,4,1,1)
  Value provided by cemsuisse as an average from all cement producing plants in Switzerland.
  properties: carbon content, fossil 0.005, dry mass 1 kg, wet mass 1 kg

## Sampling procedure
Data represents the average Swiss production of the 6 cement plants for the years 2017 to 2021 that were operational in 2021.
