# treatment of waste wood, untreated, open dump, hyperarid infiltration class (-250mm)

Dataset: EcoSpold 2, unit process
Geography: GLO
Time period: 2006-01-01 to 2023-12-31
Technology level: current
Classification: ISIC rev.4 ecoinvent: 3821:Treatment and disposal of non-hazardous waste
Scenario: Business-as-Usual
System model: Allocation, cut-off by classification
Generated by: Nikolia Stoikou
Database: ecoinvent
isCopyrightProtected: true
accessRestrictedTo: 1

## General comment
This dataset represents the activity of waste disposal of 'waste wood, untreated' in an open dump. Recommended use of this dataset: uncontrolled disposal of the waste through dumping. Inventoried waste consists of fraction: 100% natural wood. Waste composition (wet, in ppmw): gross heating value 15.36 MJ/kg; net heating value 13.99 MJ/kg; H2O 174080; O 372180; H 50163; C 401470; S 125.51; N 986.98; P 108.97; B 2.1107; Cl 330.95; Br na; F 21.106; I na; Ag na; As 0.42213; Ba na; Cd 0.20051; Co 0.086772; Cr 0.65782; Cu 4.1482; Hg 0.31976; Mn 53.118; Mo 0.8302; Ni 0.55581; Pb 27.868; Sb na; Se na; Sn na; V na; Zn 17.807; Be na; Sc na; Sr na; Ti na; Tl na; W na; Si na; Fe 15.479; Ca 130.89; Al 6.3322; K 65.412; Mg 197.56; Na 14.071. Share of carbon in initial waste that is biogenic 100%. Share of metals in waste not oxidised and bulk-recyclable (exclude very small or thin parts) Iron: 0%; Alu: 0%; Copper: 0%. Overall degradability of waste during 100 years: 1.5%. 0.0001031 kg waste mass remains in the landfill even after the long term period.

## Included activities start
The activity starts with the waste being available at the location (gate) of the uncontrolled disposal. Collection and transportation of the waste to the treatment plant is not included.

## Included activities end
The activity ends with the waste being disposed, in an uncontrolled manner and waste-specific emissions from open dump are released to air via gas, and air and soil via windblown evaporites.

## Geography
This dataset represents an open dump location of 'infiltration class 1 hyperarid'. Location site with mean annual temperature (MAT) of 8 degC, mean annual precipitation (MAP) of 350 mm/year, and net infiltration of -250 mm/year. Negative infiltration means that leachate flow is reversed and flows upward to the surface, where waste is evaporated and dissolved solids become solid evaporites. Temperature at site can result in permafrost conditions, which slows down water flow by a factor of (alpha t) 0.999. Total climate adjustments with alpha pt of 0.999. The leachate percolating through the open dump has an average residence time of 7.01 years.
Reference for climatic parameters: Doka, G., 2018, Inventory parameters for regionalised waste disposal mixes

## Technology
This is an inventory for an open, uncontrolled waste dump for municipal solid waste. Ultimate average height is 7 meters. Operation phase duration is 15 years. The total raw gas mass produced from this waste is 0.01199 kg. The total CH4 mass in the raw gas is 0.005839 kg. Percentage of gas directly emitted is 100w%. A Methane Correction Factor (MCF) for air emissions of 0.7057 is employed. Leachate is not treated, but emitted untreated. Leachate flow is upward to the surface due to net negative infiltration. No leachate treatment can be performed. Based on average waste composition and climate data the end of carbonate phase is estimated to be reached 3171 years after waste deposition. Arid conditions at this location prompt formation of evaporites contents which are partially eroded by wind. It is assumed that 10% of these evaporites are eroded by wind and airborne. Initial decay in the first 100 years of this waste results in a wind erosion rate corresponding to 3.724 g/m2.year and long-term decay corresponds to wind erosion of 9.547 g/m2.year.

## Reference product
- waste wood, untreated: -1 kg; By-product classification Waste; CPC 3928: Sawdust and wood waste and scrap; HS2017 440140: Wood; for fuel, sawdust and wood waste and scrap, not agglomerated
  main reference product of this activity
  production volume 1.83e10 kg
    Estimated based on the total amount of this waste being treated in the database. The value is then adjusted to reflect the current treatment in the given geography
  property price 0 EUR2005
    Waste products are assigned a price of zero as they are assumed to require further treatment.
  properties: aluminium content 7.66679e-6, arsenic content 5.11102e-7, boron content 2.5556e-6, cadmium content 2.42774e-7, calcium content 0.000158475, carbon allocation 0.401467 kg, carbon content 0.486084, carbon content, fossil 0, carbon content, non-fossil 0.486084, chlorine content 0.000400704, chromium content 7.9647e-7, cobalt content 1.05061e-7, copper content 5.02245e-6, dry mass 0.825921 kg, fluorine content 2.55551e-5, heating value, gross 15.3646 MJ, heating value, net 13.9884 MJ, hydrogen content 0.0607361, iron content 1.8741e-5, lead content 3.37412e-5, magnesium content 0.000239197, manganese content 6.43142e-5, mercury content 3.87159e-7, molybdenum content 1.00518e-6, nickel content 6.72952e-7, nitrogen content 0.00119501, oxygen content 0.450623, phosphorus content 0.000131933, potassium content 7.91989e-5, sodium content 1.70373e-5, sulfur content 0.000151968, water content 0.210769, water in wet mass 0.174079 kg, wet mass 1 kg, zinc content 2.15601e-5

## Inputs from nature
- Organic carbon, placed in landfill [inventory indicator, waste]: 0.40147 kg; lognormal variance with pedigree 0.031362, pedigree (1,1,4,1,1)
  organic carbon placed in open dump (for ecoscarcity LCIA only);
- Waste mass, total, placed in landfill [inventory indicator, waste]: 1 kg; lognormal variance with pedigree 0.008, pedigree (1,1,4,1,1)
  waste mass placed in open dump (for ecoscarcity LCIA only);
- Occupation, dump site [natural resource, land]: 0.0035714 m2*year; lognormal variance with pedigree 0.32902, pedigree (1,1,4,1,1)
  for operation phase of open dump area;
- Transformation, from pasture, man made [natural resource, land]: 0.00014286 m2; lognormal variance with pedigree 0.32902, pedigree (1,1,4,1,1)
  for initial conversion of open dump;
- Transformation, to dump site [natural resource, land]: 0.00014286 m2; lognormal variance with pedigree 0.32902, pedigree (1,1,4,1,1)
  conversion to open dump area;

## Emissions to nature
- Aluminium III [air, low population density, long-term]: 6.3274e-7 kg; lognormal variance with pedigree 1.3362, pedigree (1,1,4,1,1)
  windblown leachate evaporites from open dump in arid climate;
- Aluminium III [air, non-urban air or from high stacks]: 4.754e-10 kg; lognormal variance with pedigree 1.9298, pedigree (1,1,4,1,1)
  Contributions: landfill gas emission from open dump and from windblown leachate evaporites in arid climate;
- Arsenic ion [air, low population density, long-term]: 5.9247e-9 kg; lognormal variance with pedigree 1.9298, pedigree (1,1,4,1,1)
  windblown leachate evaporites from open dump in arid climate;
- Arsenic ion [air, non-urban air or from high stacks]: 1.2951e-10 kg; lognormal variance with pedigree 1.9298, pedigree (1,1,4,1,1)
  (same comment as for Aluminium III)
- Boron [air, low population density, long-term]: 1.8979e-7 kg; lognormal variance with pedigree 1.481, pedigree (1,1,4,1,1)
  windblown leachate evaporites from open dump in arid climate;
- Boron [air, non-urban air or from high stacks]: 2.1278e-8 kg; lognormal variance with pedigree 1.5998, pedigree (1,1,4,1,1)
  landfill gas emission from open dump and from windblown leachate evaporites in arid climate;
- Cadmium II [air, low population density, long-term]: 1.9998e-8 kg; lognormal variance with pedigree 1.7837, pedigree (1,1,4,1,1)
  windblown leachate evaporites from open dump in arid climate;
- Cadmium II [air, non-urban air or from high stacks]: 5.6382e-11 kg; lognormal variance with pedigree 1.9298, pedigree (1,1,4,1,1)
  (same comment as for Aluminium III)
- Calcium II [air, low population density, long-term]: 1.3063e-5 kg; lognormal variance with pedigree 0.9342, pedigree (1,1,4,1,1)
  windblown leachate evaporites from open dump in arid climate;
- Calcium II [air, non-urban air or from high stacks]: 2.5597e-8 kg; lognormal variance with pedigree 1.4944, pedigree (1,1,4,1,1)
  (same comment as for Aluminium III)
- Carbon dioxide, non-fossil [air, non-urban air or from high stacks]: 0.012958 kg; lognormal variance with pedigree 0.35546, pedigree (1,1,4,1,1)
  landfill gas emission from open dump;
- Chromium III [air, low population density, long-term]: 2.134e-10 kg; lognormal variance with pedigree 1.9298, pedigree (1,1,4,1,1)
  windblown leachate evaporites from open dump in arid climate;
- Chromium III [air, non-urban air or from high stacks]: 1.1262e-11 kg; lognormal variance with pedigree 1.9298, pedigree (1,1,4,1,1)
  (same comment as for Aluminium III)
- Cobalt II [air, low population density, long-term]: 8.6354e-9 kg; lognormal variance with pedigree 1.9298, pedigree (1,1,4,1,1)
  windblown leachate evaporites from open dump in arid climate;
- Cobalt II [air, non-urban air or from high stacks]: 4.1889e-11 kg; lognormal variance with pedigree 1.9298, pedigree (1,1,4,1,1)
  (same comment as for Aluminium III)
- Copper ion [air, low population density, long-term]: 4.1478e-7 kg; lognormal variance with pedigree 1.3918, pedigree (1,1,4,1,1)
  windblown leachate evaporites from open dump in arid climate;
- Copper ion [air, non-urban air or from high stacks]: 3.0519e-11 kg; lognormal variance with pedigree 1.9298, pedigree (1,1,4,1,1)
  (same comment as for Aluminium III)
- Hydrochloric acid [air, low population density, long-term]: 3.1829e-5 kg; lognormal variance with pedigree 0.81119, pedigree (1,1,4,1,1)
  windblown leachate evaporites from open dump in arid climate;
- Hydrochloric acid [air, non-urban air or from high stacks]: 1.4286e-6 kg; lognormal variance with pedigree 0.86049, pedigree (1,1,4,1,1)
  (same comment as for Aluminium III)
- Hydrogen fluoride [air, low population density, long-term]: 2.0964e-6 kg; lognormal variance with pedigree 1.177, pedigree (1,1,4,1,1)
  windblown leachate evaporites from open dump in arid climate;
- Hydrogen fluoride [air, non-urban air or from high stacks]: 1.2837e-7 kg; lognormal variance with pedigree 1.5782, pedigree (1,1,4,1,1)
  (same comment as for Aluminium III)
- Iron ion [air, low population density, long-term]: 1.5475e-6 kg; lognormal variance with pedigree 1.2181, pedigree (1,1,4,1,1)
  windblown leachate evaporites from open dump in arid climate;
- Iron ion [air, non-urban air or from high stacks]: 3.1931e-10 kg; lognormal variance with pedigree 1.9298, pedigree (1,1,4,1,1)
  (same comment as for Aluminium III)
- Lead II [air, low population density, long-term]: 2.7865e-6 kg; lognormal variance with pedigree 1.14, pedigree (1,1,4,1,1)
  windblown leachate evaporites from open dump in arid climate;
- Lead II [air, non-urban air or from high stacks]: 2.4682e-10 kg; lognormal variance with pedigree 1.9298, pedigree (1,1,4,1,1)
  (same comment as for Aluminium III)
- Magnesium [air, low population density, long-term]: 1.9573e-5 kg; lognormal variance with pedigree 0.87948, pedigree (1,1,4,1,1)
  windblown leachate evaporites from open dump in arid climate;
- Magnesium [air, non-urban air or from high stacks]: 1.831e-7 kg; lognormal variance with pedigree 1.2473, pedigree (1,1,4,1,1)
  (same comment as for Aluminium III)
- Manganese II [air, low population density, long-term]: 5.2207e-6 kg; lognormal variance with pedigree 1.0543, pedigree (1,1,4,1,1)
  windblown leachate evaporites from open dump in arid climate;
- Manganese II [air, non-urban air or from high stacks]: 9.137e-8 kg; lognormal variance with pedigree 1.3495, pedigree (1,1,4,1,1)
  (same comment as for Aluminium III)
- Mercury II [air, low population density, long-term]: 3.193e-8 kg; lognormal variance with pedigree 1.7242, pedigree (1,1,4,1,1)
  windblown leachate evaporites from open dump in arid climate;
- Mercury II [air, non-urban air or from high stacks]: 1.6408e-10 kg; lognormal variance with pedigree 1.9298, pedigree (1,1,4,1,1)
  (same comment as for Aluminium III)
- Methane, non-fossil [air, non-urban air or from high stacks]: 0.003074 kg; lognormal variance with pedigree 0.39599, pedigree (1,1,4,1,1)
  landfill gas emission from open dump;
- Molybdenum VI [air, low population density, long-term]: 2.5054e-8 kg; lognormal variance with pedigree 1.9298, pedigree (1,1,4,1,1)
  windblown leachate evaporites from open dump in arid climate;
- Molybdenum VI [air, non-urban air or from high stacks]: 1.3149e-10 kg; lognormal variance with pedigree 1.9298, pedigree (1,1,4,1,1)
  (same comment as for Aluminium III)
- Nickel II [air, low population density, long-term]: 5.5532e-8 kg; lognormal variance with pedigree 1.6533, pedigree (1,1,4,1,1)
  windblown leachate evaporites from open dump in arid climate;
- Nickel II [air, non-urban air or from high stacks]: 4.8531e-11 kg; lognormal variance with pedigree 1.9298, pedigree (1,1,4,1,1)
  (same comment as for Aluminium III)
- Nitrate [air, low population density, long-term]: 0.00042074 kg; lognormal variance with pedigree 0.66746, pedigree (1,1,4,1,1)
  windblown leachate evaporites from open dump in arid climate;
- Nitrate [air, non-urban air or from high stacks]: 1.5302e-5 kg; lognormal variance with pedigree 0.89021, pedigree (1,1,4,1,1)
  (same comment as for Boron)
- Nitrogen oxides [air, non-urban air or from high stacks]: 2.028e-8 kg; lognormal variance with pedigree 1.2514, pedigree (1,1,4,1,1)
  landfill gas emission from open dump;
- Particulate Matter, < 2.5 um [air, low population density, long-term]: 0.016339 kg; lognormal variance with pedigree 0.49866, pedigree (1,1,4,1,1)
  windblown leachate evaporites from open dump in arid climate;
- Particulate Matter, < 2.5 um [air, non-urban air or from high stacks]: 1.064e-5 kg; lognormal variance with pedigree 0.79179, pedigree (1,1,4,1,1)
  (same comment as for Boron)
- Particulate Matter, > 10 um [air, low population density, long-term]: 0.040846 kg; lognormal variance with pedigree 0.23803, pedigree (1,1,4,1,1)
  windblown leachate evaporites from open dump in arid climate;
- Particulate Matter, > 10 um [air, non-urban air or from high stacks]: 2.6601e-5 kg; lognormal variance with pedigree 0.53115, pedigree (1,1,4,1,1)
  (same comment as for Boron)
- Particulate Matter, > 2.5 um and < 10um [air, low population density, long-term]: 0.024508 kg; lognormal variance with pedigree 0.31704, pedigree (1,1,4,1,1)
  windblown leachate evaporites from open dump in arid climate;
- Particulate Matter, > 2.5 um and < 10um [air, non-urban air or from high stacks]: 1.5961e-5 kg; lognormal variance with pedigree 0.61017, pedigree (1,1,4,1,1)
  (same comment as for Boron)
- Phosphorus [air, low population density, long-term]: 7.3209e-7 kg; lognormal variance with pedigree 1.9298, pedigree (1,1,4,1,1)
  windblown leachate evaporites from open dump in arid climate;
- Phosphorus [air, non-urban air or from high stacks]: 9.1283e-9 kg; lognormal variance with pedigree 1.6344, pedigree (1,1,4,1,1)
  (same comment as for Boron)
- Potassium I [air, low population density, long-term]: 6.4695e-6 kg; lognormal variance with pedigree 1.0266, pedigree (1,1,4,1,1)
  windblown leachate evaporites from open dump in arid climate;
- Potassium I [air, non-urban air or from high stacks]: 7.1828e-8 kg; lognormal variance with pedigree 1.3739, pedigree (1,1,4,1,1)
  (same comment as for Aluminium III)
- Sodium I [air, low population density, long-term]: 1.3199e-6 kg; lognormal variance with pedigree 1.231, pedigree (1,1,4,1,1)
  windblown leachate evaporites from open dump in arid climate;
- Sodium I [air, non-urban air or from high stacks]: 8.7459e-8 kg; lognormal variance with pedigree 1.3892, pedigree (1,1,4,1,1)
  (same comment as for Aluminium III)
- Sulfate [air, low population density, long-term]: 3.7407e-5 kg; lognormal variance with pedigree 0.93979, pedigree (1,1,4,1,1)
  windblown leachate evaporites from open dump in arid climate;
- Sulfate [air, non-urban air or from high stacks]: 2.1008e-7 kg; lognormal variance with pedigree 1.3748, pedigree (1,1,4,1,1)
  (same comment as for Boron)
- Sulfur dioxide [air, non-urban air or from high stacks]: 2.454e-7 kg; lognormal variance with pedigree 1.5956, pedigree (1,1,4,1,1)
  landfill gas emission from open dump;
- Water [air, non-urban air or from high stacks]: 2.608e-6 m3; lognormal variance with pedigree 0.40067, pedigree (1,1,4,1,1)
  from water contained in landfilled waste, released to air in arid sites;
- Zinc II [air, low population density, long-term]: 1.7794e-6 kg; lognormal variance with pedigree 1.1995, pedigree (1,1,4,1,1)
  windblown leachate evaporites from open dump in arid climate;
- Zinc II [air, non-urban air or from high stacks]: 1.2666e-9 kg; lognormal variance with pedigree 1.8905, pedigree (1,1,4,1,1)
  (same comment as for Aluminium III)
- Non-hazardous waste disposed [inventory indicator, waste]: 1 kg; lognormal variance with pedigree 0.008, pedigree (1,1,4,1,1)
  EN15804 waste mass in sanitary landfill;
- Aluminium III [soil, industrial]: 5.6989e-6 kg; lognormal variance with pedigree 1.3346, pedigree (1,1,4,1,1)
  Contributions: from leachate evaporites in hyperarid climate in open dump;
- Arsenic ion [soil, industrial]: 5.4345e-8 kg; lognormal variance with pedigree 1.9298, pedigree (1,1,4,1,1)
  Contributions: from leachate evaporites in hyperarid climate in open dump;
- Boron [soil, industrial]: 1.8997e-6 kg; lognormal variance with pedigree 1.3243, pedigree (1,1,4,1,1)
  Contributions: from leachate evaporites in hyperarid climate in open dump;
- Cadmium II [soil, industrial]: 1.8046e-7 kg; lognormal variance with pedigree 1.7781, pedigree (1,1,4,1,1)
  Contributions: from leachate evaporites in hyperarid climate in open dump;
- Calcium II [soil, industrial]: 0.0001178 kg; lognormal variance with pedigree 0.93109, pedigree (1,1,4,1,1)
  Contributions: from leachate evaporites in hyperarid climate in open dump;
- Carbon [soil, industrial]: 0.35606 kg; lognormal variance with pedigree 0.031359, pedigree (1,1,4,1,1)
  Contributions: from leachate evaporites in hyperarid climate in open dump;
- Chloride [soil, industrial]: 0.0002977 kg; lognormal variance with pedigree 0.76634, pedigree (1,1,4,1,1)
  Contributions: from leachate evaporites in hyperarid climate in open dump;
- Chromium III [soil, industrial]: 2.0217e-9 kg; lognormal variance with pedigree 1.9298, pedigree (1,1,4,1,1)
  Contributions: from leachate evaporites in hyperarid climate in open dump;
- Cobalt II [soil, industrial]: 7.8095e-8 kg; lognormal variance with pedigree 1.9195, pedigree (1,1,4,1,1)
  Contributions: from leachate evaporites in hyperarid climate in open dump;
- Copper ion [soil, industrial]: 3.7333e-6 kg; lognormal variance with pedigree 1.3916, pedigree (1,1,4,1,1)
  Contributions: from leachate evaporites in hyperarid climate in open dump;
- Fluoride [soil, industrial]: 1.8888e-5 kg; lognormal variance with pedigree 1.1749, pedigree (1,1,4,1,1)
  Contributions: from leachate evaporites in hyperarid climate in open dump;
- Heat, waste [soil, industrial]: 0.18164 MJ; lognormal variance with pedigree 0.21809, pedigree (1,1,4,1,1)
  from decomposed waste material in open dump;
- Iron ion [soil, industrial]: 1.3931e-5 kg; lognormal variance with pedigree 1.2176, pedigree (1,1,4,1,1)
  Contributions: from leachate evaporites in hyperarid climate in open dump;
- Lead II [soil, industrial]: 2.5081e-5 kg; lognormal variance with pedigree 1.1399, pedigree (1,1,4,1,1)
  Contributions: from leachate evaporites in hyperarid climate in open dump;
- Magnesium [soil, industrial]: 0.0001778 kg; lognormal variance with pedigree 0.86666, pedigree (1,1,4,1,1)
  Contributions: from leachate evaporites in hyperarid climate in open dump;
- Manganese II [soil, industrial]: 4.7806e-5 kg; lognormal variance with pedigree 1.0288, pedigree (1,1,4,1,1)
  Contributions: from leachate evaporites in hyperarid climate in open dump;
- Mercury II [soil, industrial]: 2.8767e-7 kg; lognormal variance with pedigree 1.7219, pedigree (1,1,4,1,1)
  Contributions: from leachate evaporites in hyperarid climate in open dump;
- Molybdenum VI [soil, industrial]: 2.2667e-7 kg; lognormal variance with pedigree 1.9298, pedigree (1,1,4,1,1)
  Contributions: from leachate evaporites in hyperarid climate in open dump;
- Nickel II [soil, industrial]: 5.0023e-7 kg; lognormal variance with pedigree 1.6513, pedigree (1,1,4,1,1)
  Contributions: from leachate evaporites in hyperarid climate in open dump;
- Nitrogen [soil, industrial]: 0.00088615 kg; lognormal variance with pedigree 0.63093, pedigree (1,1,4,1,1)
  Contributions: from leachate evaporites in hyperarid climate in open dump;
- Phosphorus [soil, industrial]: 6.671e-6 kg; lognormal variance with pedigree 1.9298, pedigree (1,1,4,1,1)
  Contributions: from leachate evaporites in hyperarid climate in open dump;
- Potassium I [soil, industrial]: 5.8871e-5 kg; lognormal variance with pedigree 1.01, pedigree (1,1,4,1,1)
  Contributions: from leachate evaporites in hyperarid climate in open dump;
- Sodium I [soil, industrial]: 1.2664e-5 kg; lognormal variance with pedigree 1.1396, pedigree (1,1,4,1,1)
  Contributions: from leachate evaporites in hyperarid climate in open dump;
- Sulfur [soil, industrial]: 0.00011285 kg; lognormal variance with pedigree 0.93143, pedigree (1,1,4,1,1)
  Contributions: from leachate evaporites in hyperarid climate in open dump;
- Zinc II [soil, industrial]: 1.6026e-5 kg; lognormal variance with pedigree 1.1981, pedigree (1,1,4,1,1)
  Contributions: from leachate evaporites in hyperarid climate in open dump;
- Heat, waste [water, ground-, long-term]: 15.134 MJ; lognormal variance with pedigree 0.059019, pedigree (1,1,4,1,1)
  from decomposed waste material in open dump;
