# light fuel oil to generic market for residual hydrocarbon mix, from steam cracking operations

Dataset: EcoSpold 2, unit process
Geography: GLO
Time period: 2019-01-01 to 2023-12-31
Technology level: current
Classification: ISIC rev.4 ecoinvent: 1920:Manufacture of refined petroleum products
Scenario: Business-as-Usual
System model: Allocation, cut-off by classification
Generated by: Daria Dellenbach
Database: ecoinvent
isCopyrightProtected: true
accessRestrictedTo: 1

## General comment
This is a linking activity which links the product light fuel oil to the generic market for residual hydrocarbon mix, from steam cracking operations. All chemicals that enter this market provide the function of a fuels.

## Included activities start
The activity starts with the reception of raw materials at the factory gate.

## Included activities end
The activity ends with the production of residual hydrocarbon mix, from steam cracking operations for the generic market.

## Reference product
- residual hydrocarbon mix, from steam cracking operations: 1 kg; By-product classification allocatable product; CPC 3411: Hydrocarbons and their halogenated, sulphonated, nitrated or nitrosated derivatives
  production volume 4.72229e11 kg
    Calculated from production volume of reference product using the relative outputs in the production dataset.
  properties: carbon allocation 0.862 kg, carbon content 0.862, carbon content, fossil 0.862, carbon content, non-fossil 0, dry mass 1 kg, heating value, net 41.2 MJ, price 0.138 EUR2005, water content 0, water in wet mass 0 kg, wet mass 1 kg

## Inputs from technosphere
- light fuel oil: 0.00691947, 0.725024, 0.150518, 0.035657, 0.0719643, 0.00514231, 0.00477547 kg (7 suppliers, which the file names only by identifier); sum of these 1 kg; lognormal variance with pedigree 0.2106, pedigree (5,5,5,5,5)
  properties: carbon content, fossil 0.862, dry mass 1 kg, heating value, net 42.6 MJ, wet mass 1 kg
