# limestone quarry operation

Dataset: EcoSpold 2, unit process
Geography: RoW
Time period: 1992-01-01 to 2023-12-31
Technology level: current
Classification: EcoSpold01Categories: construction materials/additives
Classification: ISIC rev.4 ecoinvent: 0810:Quarrying of stone, sand and clay
Tags: ConvertedDataset
Scenario: Business-as-Usual
System model: Allocation, cut-off by classification
Generated by: Daniel Kellenberger (obsolete)
Published in: Kellenberger D. 2007
Database: ecoinvent
isCopyrightProtected: true
accessRestrictedTo: 1

## General comment
This dataset represents the extraction of unprocessed limestone from a quarry.
Land-use for recultivation has been included; size partition of dust emissions adapted from bauxite mining. A capacity of about 380'000 tons of product per year was used to normalize the exchanges.

## Included activities start
From the calcite, in ground

## Included activities end
This activity ends with the unprocessed limestone, at the quarry gate.

This dataset includes blasting, all transports within the quarry (for extraction and recultivation), a part of the heating energy for "administration" buildings and the infrastructure. The land-use of the quarry is included, the land-use of the paved roads and buildings within the quarry are included in the module "limestone quarry construction".

The dataset doesn't include output of overburden material: neglected as it is only about 0.26% of mined limestone.

## Geography
data are only from one company in Switzerland (KFN), for some exchanges GLO-modules have been used as proxy

## Technology
The company works on a technically high level; heavy machinery are operated electrically, building machines with diesel. Explosives used: Tovex at bottom and Amolith in shaft of drilled hole

## Parameters
- Quebec gross domestic product 2011: 3.11e11 USD(2011); name quebecGDP2011; lognormal variance with pedigree 0.0006, pedigree (1,1,1,1,1)
  Quebec Gross domestic product for 2011, expressed in 2011 USD. Source: Institut de la statistique du Québec. Converted from CAD to USD using a yearly average exchange rate of 0.989 CAD/USD (Source: bank of Canada).
- fraction, process water, to air: 1 dimensionless; name fraction_PW_to_air; lognormal variance with pedigree 0.092025, pedigree (4,4,3,2,4)
  Literature value (Statistics Canada, 2007 & Shaffer, K.H., 2008, Consumptive water use in the Great Lakes Basin, USGS) (Vionnet, S., Quantis Water Database - Technical Report, 2012).
- quebec production volume: 1.6e9 kg; name PV_Quebec; lognormal variance with pedigree 0.0006, pedigree (1,1,1,1,1)
  2012 limestone production in Quebec. Primary data from Association des Producteurs de Pierre à Chaux du Québec.
- world gross domestic product 2011: 7e13 USD(2011); name worldGDP2011; lognormal variance with pedigree 0.0006, pedigree (1,1,1,1,1)
  World Gross domestic product for 2011, expressed in 2011 USD. Source: World Bank.

## Reference product
- limestone, unprocessed: 1 kg; By-product classification allocatable product; CPC 15200: Gypsum; anhydrite; limestone flux; limestone and other calcareous stone, of a kind used for the manufacture of[…]; HS2017 252100: Limestone flux; limestone and other calcareous stone, of a kind used for the manufacture of lime or cement; CAS 1317-65-3
  EcoSpold01Location=CH
  production volume 7.4131e12 kg; name PV_world; = 2.93E+11/0.038
    The global production volume is calculated based on the relation between the production volume of limestone, unprocessed in IN (2.93E11kg) and the relation of limestone production and reserves between IN and Word as reported in the USGS 2019 report on Lime (USGS, 2019. Lime. Retrieved from: https://prd-wret.s3-us-west-2.amazonaws.com/assets/palladium/production/atoms/files/mcs-2019-lime.pdf, accessed 22 May 2019).
  property carbon content, fossil 0.117257
    Table 3.1, ecoinvent v2.2 report 7, part VII, pg 3. MW CaCO3=100, MW MgCO3=84. C content of limestone is 0.117257 kg/kg DM
  property price 0.014 EUR2005
    Calculated value based on data from United Nations Commodity Trade Statistics Database (comtrade.un.org). UN comtrade category: 252100 Limestone materials for manufacture of lime or cement. Year 2005. Using exchange rate of 1EURO = 1.209 USD. Average of price of import into 5 main markets (EU, US, JP, IN and CN).
  properties: carbon allocation 0.117023 kg, carbon content 0.117257, carbon content, non-fossil 0, dry mass 0.998 kg, heating value, net 0 MJ, water content 0.00200401, water in wet mass 0.002 kg, wet mass 1 kg

## Inputs from technosphere
- blasting: 7.73e-5 kg; lognormal variance with pedigree 0.0421, pedigree (1,2,5,5,1)
  EcoSpold01Location=RER
  Uncertainty: ;
- diesel, burned in building machine: 0.018 MJ; lognormal variance with pedigree 0.1621, pedigree (1,2,5,5,1)
  EcoSpold01Location=GLO
  Uncertainty: ;
  properties: heating value, net 1 MJ
- electricity, medium voltage: 2.5073e-8, 2.23004e-9, 1.94435e-7, 2.54788e-7, 2.69822e-7, 1.37434e-7, 1.89817e-8, 1.2014e-7, 5.07142e-9, 8.11959e-7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 kWh (48 suppliers, which the file names only by identifier); sum of these 2.73e-5 kWh; lognormal variance with pedigree 0.0438, pedigree (1,3,5,5,2)
  Energy for pumping water from the quarry. Extrapolated value from Quebec (Canada) limestone quarry operation dataset.
- heat, central or small-scale, other than natural gas: 7.56521e-6, 0.000550795 MJ (2 suppliers, which the file names only by identifier); sum of these 0.00055836 MJ; lognormal variance with pedigree 0.0421, pedigree (1,2,5,5,1)
  EcoSpold01Location=CH
  Uncertainty: ;
  properties: heating value, net 1 MJ
- limestone quarry infrastructure: 5.25e-11 unit; lognormal variance with pedigree 0.3421, pedigree (1,2,5,5,1)
  EcoSpold01Location=CH
  Uncertainty: ;
- recultivation, limestone mine: 6.52e-6 m2; lognormal variance with pedigree 0.1627, pedigree (2,2,5,5,1)
  EcoSpold01Location=CH
  Uncertainty: ;

## Inputs from nature
- Calcite [natural resource, in ground]: 1 kg; lognormal variance with pedigree 0.0726, pedigree (3,3,5,5,3)
  Uncertainty: ;
- Occupation, mineral extraction site [natural resource, land]: 8.48e-5 m2*year; lognormal variance with pedigree 0.0821, pedigree (1,2,5,5,1)
  Uncertainty: ;
- Transformation, from forest, unspecified [natural resource, land]: 6.52e-6 m2; lognormal variance with pedigree 0.1627, pedigree (2,2,5,5,1)
  Uncertainty: ;
- Transformation, to mineral extraction site [natural resource, land]: 6.52e-6 m2; lognormal variance with pedigree 0.1627, pedigree (2,2,5,5,1)
  Uncertainty: ;
- Water, unspecified natural origin [natural resource, in water]: 2.14425e-5 m3; name water_in; source Marceau 2006; lognormal variance with pedigree 0.0546, pedigree (3,3,5,5,1)
  Calculated based on literature, (Vionnet, S., Quantis Water Database - Technical Report, 2012). The water used for dust suppression is listed as process water. The evaporation rate is assumed to be 90%. It includes the process of water used for dust suppression in the mine; both off road and on road. The process boundaries are set by the boundaries of limestone mine. The process ends when the raw limestone leaves the mine for further processing. It is assumed that the evaporation rate of process water is 90%. Higher the temperatures are - more dust occurs, more water for suppression is needed, higher the evaporation rate is.
  property carbon content, fossil 0.0104329; name C_content_fossil
  property carbon content, non-fossil 0; name C_content_non_fossil
  property dry mass 0.1101 kg; name DM
  property water content 9081.65; name water_content
  property water in wet mass 999.89 kg; name WWM
  property wet mass 1000 kg; name WM

## Emissions to nature
- Particulate Matter, < 2.5 um [air, non-urban air or from high stacks]: 8e-6 kg; lognormal variance with pedigree 0.43, pedigree (1,5,5,5,4)
  Uncertainty: ;
- Particulate Matter, > 10 um [air, non-urban air or from high stacks]: 0.000112 kg; lognormal variance with pedigree 0.17, pedigree (1,5,5,5,4)
  Uncertainty: ;
- Particulate Matter, > 2.5 um and < 10um [air, non-urban air or from high stacks]: 4e-5 kg; lognormal variance with pedigree 0.25, pedigree (1,5,5,5,4)
  Uncertainty: ;
- Water [air, unspecified]: 2.14425e-5 m3; name water_to_air_unspecified; = (water_in*fraction_PW_to_air); lognormal variance with pedigree 0.0827, pedigree (2,2,5,5,1)
  Calculated value based on literature values and expert opinion. See comments in the parametres' comment field.
  Uncertainty: Calculated variable. Uncertainty will be determined from propagation of uncertainty factors of underlying variables. Uncertainty of actual relation between variables not accounted at this time.
  property fraction, origin: fresh water 0; name fraction_origin_fresh_water
  property fraction, origin: salt water 0; name fraction_origin_salt_water
  property fraction, origin: unspecified 1; name fraction_origin_unspecified

## Sampling procedure
survey

## Extrapolations
data which are only available for GLO have been used as proxy for CH This dataset has been copied from an original dataset covering the geography CH. The uncertainty has been adjusted accordingly.

## Review by Roberto Dones 2005-07-19
passed
