# synthetic gas production, from wood, at fluidized bed gasifier

Dataset: EcoSpold 2, unit process
Geography: RoW
Time period: 1995-01-01 to 2023-12-31
Technology level: current
Classification: EcoSpold01Categories: biomass/fuels
Classification: ISIC rev.4 ecoinvent: 3520:Manufacture of gas; distribution of gaseous fuels through mains
Synonyms: syngas; synthesis gas
Tags: ConvertedDataset
Scenario: Business-as-Usual
System model: Allocation, cut-off by classification
Share of production covered: 0 %
Generated by: Edgard Gnansounou
Published in: Jungbluth N. 2007
Database: ecoinvent
isCopyrightProtected: true
accessRestrictedTo: 1

## General comment
Composition (% mol.) of the resulting gas is 15.5% H2, 39.2% CO, 34.9% CO2, 8.7% CH4 and 1.7% CnHm on a nitrogen and water free basis. Nitrogen content is 50.4%. Density is 1.15 kg/Nm3. Lower heating value of the gas is 5.4 MJ/Nm3. Heat is supplied by syngas combustion. Inventory refers to the net production of 1 Nm3 syngas. Net gas yield is 1.984 Nm3/kg of wood (dry matter).
[This dataset was already contained in the ecoinvent database version 2. It was not individually updated during the transfer to ecoinvent version 3. Life Cycle Impact Assessment results may still have changed, as they are affected by changes in the supply chain, i.e. in other datasets. This dataset was generated following the ecoinvent quality guidelines for version 2. It may have been subject to central changes described in the ecoinvent version 3 change report (http://www.ecoinvent.org/database/ecoinvent-version-3/reports-of-changes/), and the results of the central updates were reviewed extensively. The changes added e.g. consistent water flows and other information throughout the database. The documentation of this dataset can be found in the ecoinvent reports of version 2, which are still available via the ecoinvent website. The change report linked above covers all central changes that were made during the conversion process.]

## Included activities end
This process refers to the conversion of wood chips into synthetic gas. It includes drying (down to 10-15% moisture) and further comminution of wood chips (down to a size of 30x30x30 mm), fluidized bed gasification of the wood chips and treatment of the resulting syngas to remove impurities and contaminants.

## Geography
Data from various literatures sources and gasification plants worldwide, and from one pilot plant in CH

## Technology
The technology corresponds to an average indirectly heated, atmospheric, circulating Fluidized bed gasification, followed by a low temperature wet gas treatment. No energy integration with the subsequent processing of the gas is considered. The Fluidized bed gasification plant is typically >10 MWth input capacity.

## Time period
Data from 1995 to 2004, first large scale facilities in the near future

## Parameters
- fraction, process water, to air: 0.15 dimensionless; name fraction_PW_to_air; lognormal variance with pedigree 0.092025, pedigree (4,4,3,2,4)
- fraction, tap water, to air: 0.15 dimensionless; name fraction_TW_to_air; lognormal variance with pedigree 0.092025, pedigree (4,4,3,2,4)

## Reference product
- synthetic gas: 1 m3; By-product classification allocatable product; CPC 17200: Coal gas, water gas, producer gas and similar gases, other than petroleum gases and other gaseous hydrocarbons; HS2017 271129: Petroleum gases and other gaseous hydrocarbons; in gaseous state, other than natural gas
  EcoSpold01Location=CH
  production volume 1.41308e6 m3
    Estimate based on: "At present, only a few commercial small-scale biomass power gasifiers are operating globally. The majority are about a hundred rice husk gasifiers, located primarily in China. A declining number of charcoal gasifiers continue operation in Latin America, primarily Brazil. A few wood-fueled power gasifiers are in commercial operation in Latin America as well. The largest unit, about 1 MWeI, is installed in Paraguay." Quote: World Bank technical paper 296 (http://www.woodgas.net/files/World%20bank%20tech%20paper%20296.pdf)
  property carbon content, non-fossil 0.161
    Density of the gas (1.15 kg/Nm3), and its dry mass were used to convert 0.140 kgC/kg in kg C/Nm3. All data from Tab 18.6, ecoinvent v2.2 report n 17.
  property heating value, net 5.2 MJ
    Based on literature, Report 17: Jungbluth, N., Chudacoff, M., Dauriat, A., Dinkel, F., Doka, G., Faist Emmenegger, M., Gnansounou, E., Kljun, N., Schleiss, K., Spielmann, M., Stettler, C., Sutter, J. 2007: Life Cycle Inventories of Bioenergy. ecoinvent report No. 17, Swiss Centre for Life Cycle Inventories, Dübendorf, CH.
  properties: carbon allocation 0.170338 kg, carbon content 0.161, carbon content, fossil 0, dry mass 1.058 kg, price 0.15 EUR2005, water content 0.0869565, water in wet mass 0.092 kg, wet mass 1.15 kg

## Inputs from technosphere
- dolomite: 0.010157 kg; lognormal variance with pedigree 0.08, pedigree (4,4,5,5,3)
  Average of several literature sources
  EcoSpold01Location=RER
  Uncertainty: Average of several literature sources
  properties: carbon content, fossil 0.130435, dry mass 1 kg, heating value, net 3.95 MJ, wet mass 1 kg
- electricity, medium voltage: 0.000743675, 0.0148347, 0.0049844, 0.000227739, 4.55817e-5, 9.78741e-6, 0.00103586, 0.00153191, 0.0032094 kWh (9 suppliers, which the file names only by identifier); sum of these 0.026623 kWh; lognormal variance with pedigree 0.0726, pedigree (3,3,5,5,3)
  Several literature sources
  EcoSpold01Location=CH
  Uncertainty: Several literature sources
- industrial furnace, natural gas: 1.8939e-9 unit; lognormal variance with pedigree 0.38, pedigree (3,5,5,5,3)
  Calculation based on energy demand of the process
  EcoSpold01Location=RER
  Uncertainty: Calculation based on energy demand of the process
- inert waste, for final disposal: -0.022755 kg; lognormal variance with pedigree 0.056, pedigree (4,5,1,5,3)
  Estimate for the disposal of gasifier bed material
  EcoSpold01Location=CH
  Uncertainty: Estimate for the disposal of gasifier bed material
  production volume
    Calculated from the production volume of synthetic gas in proportion to the respective output amounts.
  properties: dry mass 0.995 kg, water content 0.00502513, wet mass 1 kg
- silica sand: 0.012598 kg; lognormal variance with pedigree 0.08, pedigree (4,4,5,5,3)
  Average of several literature sources
  EcoSpold01Location=DE
  Uncertainty: Average of several literature sources
  properties: dry mass 0.99 kg, water content 0.010101, wet mass 1 kg
- sodium hydroxide, without water, in 50% solution state: 0.00082799 kg; lognormal variance with pedigree 0.0726, pedigree (3,3,5,5,3)
  Calculated from a typical quality of untreated syngas from wood
  EcoSpold01Location=RER
  Uncertainty: Calculated from a typical quality of untreated syngas from wood
  properties: dry mass 1 kg, heating value, net 3.03 MJ, wet mass 1 kg
- sulfuric acid: 0.0032898 kg; lognormal variance with pedigree 0.0726, pedigree (3,3,5,5,3)
  EcoSpold01Location=RER
  Calculated from a typical quality of untreated syngas from wood
  Uncertainty: Calculated from a typical quality of untreated syngas from wood
  properties: dry mass 1 kg, wet mass 1 kg
- synthetic gas factory: 9.3343e-10 unit; lognormal variance with pedigree 0.396, pedigree (4,5,5,5,3)
  Calculated from the production and input capacity of the reference plant
  EcoSpold01Location=CH
  Uncertainty: Calculated from the production and input capacity of the reference plant
- tap water: 0.000174693, 0.000266305, 0.000496911, 0.00133864, 0.000161137, 0.00671516, 0.0768449, 0.0572622 kg (8 suppliers, which the file names only by identifier); sum of these 0.14326 kg; lognormal variance with pedigree 0.08, pedigree (3,5,5,5,3)
  EcoSpold01Location=CH
  Weak data, one literature reference only (pilot plant)
  Uncertainty: Weak data, one literature reference only (pilot plant)
  properties: carbon content, fossil 0.00178991, dry mass 0.000337476 kg, water content 2962.17, wet mass 1 kg
  note on carbon content, fossil: Bicarbonate content is 2.93 mol/m3. CO2 content is 0.1 mol/m3 (ecoinvent v2.2 report 8, Tab 93.1).
- waste zeolite: -0.0020803 kg; lognormal variance with pedigree 0.056, pedigree (4,5,1,5,3)
  (same comment as for inert waste, for final disposal)
  production volume
    (same comment as for inert waste, for final disposal)
  properties: dry mass 0.95 kg, water content 0.0526316, wet mass 1 kg
- wastewater, average: -4.90432e-5, -1.17272e-5, -1.74612e-7 m3 (3 suppliers, which the file names only by identifier); sum of these -6.0945e-5 m3; lognormal variance with pedigree 0.056, pedigree (4,5,1,5,3)
  EcoSpold01Location=CH
  Weak data, specific quality of waste water was not considered
  Uncertainty: Weak data, specific quality of waste water was not considered
  production volume
    (same comment as for inert waste, for final disposal)
  properties: carbon content, non-fossil 0.194039, dry mass 0.346837 kg, mass concentration, TOC 0.1091 kg/m3, mass concentration, calcium 0.039453 kg/m3, mass concentration, chlorine 0.030031 kg/m3, mass concentration, hydrogen 0.013365 kg/m3, mass concentration, nitrogen 0.031015 kg/m3, mass concentration, oxygen 0.069824 kg/m3, mass concentration, sodium 0.06456 kg/m3, mass concentration, sulfur 0.015602 kg/m3, water content 2882.2, wet mass 1000 kg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
  note on carbon content, non-fossil: 0.0673 kg TOC/m3 (Tab A.17, ecoinvent v2.2 report 13_I). TOC was considered as Total Carbon.
- wood ash mixture, pure: -0.00243376, -0.00149474 kg (2 suppliers, which the file names only by identifier); sum of these -0.0039285 kg; lognormal variance with pedigree 0.0312, pedigree (2,3,1,5,3)
  EcoSpold01Location=CH
  Average of several literature sources
  Uncertainty: Average of several literature sources
  production volume
    (same comment as for inert waste, for final disposal)
  properties: carbon content, non-fossil 0.012, dry mass 1 kg, wet mass 1 kg
- wood chips, dry, measured as dry mass: 0.099345 kg; lognormal variance with pedigree 0.0712, pedigree (2,3,5,5,3)
  EcoSpold01Location=RER
  Yield from literature survey, distribution from IEA Task 33 CH report
  Uncertainty: Yield from literature survey, distribution from IEA Task 33 CH report
  properties: carbon content, non-fossil 0.494, dry mass 1 kg, heating value, net 9.99 MJ, water content 0.4, wet mass 1.4 kg
  note on carbon content, non-fossil: C content of dry mass is 0.494 kgC/kg dry wood (ecoinvent v2.2 report 9).
- wood chips, wet, measured as dry mass: 0.000796607, 0.00717817, 0.351584 kg (3 suppliers, which the file names only by identifier); sum of these 0.359558 kg; = 0.2890069+0.070551488; lognormal variance with pedigree 0.0712, pedigree (2,3,5,5,3)
  Yield from literature survey, distribution from IEA Task 33 CH report
  EcoSpold01Location=RER
  Uncertainty: Yield from literature survey, distribution from IEA Task 33 CH report
  properties: carbon content, non-fossil 0.494, dry mass 1 kg, heating value, net 10.84 MJ, water content 1.4, wet mass 2.4 kg
  note on heating value, net: Value based on the dataset 'softwood forestry, mixed species, sustainable forest management'
- zeolite, powder: 0.0020803 kg; lognormal variance with pedigree 0.08, pedigree (4,4,5,5,3)
  (same comment as for dolomite)
  properties: dry mass 1 kg, wet mass 1 kg

## Emissions to nature
- Acetaldehyde [air, urban air close to ground]: 3.8933e-10 kg; lognormal variance with pedigree 0.338, pedigree (4,5,5,5,5)
  Calculation, from syngas composition and natural gas combustion
  Uncertainty: Calculation, from syngas composition and natural gas combustion
- Acetic acid [air, urban air close to ground]: 5.8399e-8 kg; lognormal variance with pedigree 0.338, pedigree (4,5,5,5,5)
  (same comment as for Acetaldehyde)
- Benzene [air, urban air close to ground]: 1.5573e-7 kg; lognormal variance with pedigree 0.338, pedigree (4,5,5,5,5)
  (same comment as for Acetaldehyde)
- Benzo(a)pyrene [air, urban air close to ground]: 3.8933e-12 kg; lognormal variance with pedigree 0.598, pedigree (4,5,5,5,5)
  (same comment as for Acetaldehyde)
- Butane [air, urban air close to ground]: 2.7253e-7 kg; lognormal variance with pedigree 0.338, pedigree (4,5,5,5,5)
  (same comment as for Acetaldehyde)
- Carbon dioxide, non-fossil [air, urban air close to ground]: 0.32194 kg; lognormal variance with pedigree 0.06, pedigree (1,1,5,5,3)
  Calculation, to close carbon balance
  Uncertainty: Calculation, to close carbon balance
- Carbon monoxide, non-fossil [air, urban air close to ground]: 8.1759e-7 kg; lognormal variance with pedigree 0.938, pedigree (4,5,5,5,5)
  (same comment as for Acetaldehyde)
- Dinitrogen monoxide [air, urban air close to ground]: 3.8933e-8 kg; lognormal variance with pedigree 0.338, pedigree (4,5,5,5,5)
  (same comment as for Acetaldehyde)
- Dioxins, measured as 2,3,7,8-tetrachlorodibenzo-p-dioxin [air, urban air close to ground]: 1.168e-17 kg; lognormal variance with pedigree 0.598, pedigree (4,5,5,5,5)
  (same comment as for Acetaldehyde)
- Formaldehyde [air, urban air close to ground]: 3.8933e-8 kg; lognormal variance with pedigree 0.338, pedigree (4,5,5,5,5)
  (same comment as for Acetaldehyde)
- Mercury II [air, urban air close to ground]: 1.168e-11 kg; lognormal variance with pedigree 0.938, pedigree (4,5,5,5,5)
  (same comment as for Acetaldehyde)
- Methane, non-fossil [air, urban air close to ground]: 7.7865e-7 kg; lognormal variance with pedigree 0.338, pedigree (4,5,5,5,5)
  (same comment as for Acetaldehyde)
- Nitrogen oxides [air, urban air close to ground]: 6.9692e-6 kg; lognormal variance with pedigree 0.338, pedigree (4,5,5,5,5)
  (same comment as for Acetaldehyde)
- PAH, polycyclic aromatic hydrocarbons [air, urban air close to ground]: 3.8933e-9 kg; lognormal variance with pedigree 0.598, pedigree (4,5,5,5,5)
  (same comment as for Acetaldehyde)
- Particulate Matter, < 2.5 um [air, urban air close to ground]: 7.7865e-8 kg; lognormal variance with pedigree 0.598, pedigree (4,5,5,5,5)
  (same comment as for Acetaldehyde)
- Pentane [air, urban air close to ground]: 4.6719e-7 kg; lognormal variance with pedigree 0.338, pedigree (4,5,5,5,5)
  (same comment as for Acetaldehyde)
- Propane [air, urban air close to ground]: 7.7865e-8 kg; lognormal variance with pedigree 0.338, pedigree (4,5,5,5,5)
  (same comment as for Acetaldehyde)
- Propionic acid [air, urban air close to ground]: 7.7865e-9 kg; lognormal variance with pedigree 0.338, pedigree (4,5,5,5,5)
  (same comment as for Acetaldehyde)
- Sulfur dioxide [air, urban air close to ground]: 2.1413e-7 kg; lognormal variance with pedigree 0.298, pedigree (4,5,5,5,5)
  (same comment as for Acetaldehyde)
- Toluene [air, urban air close to ground]: 7.7865e-8 kg; lognormal variance with pedigree 0.338, pedigree (4,5,5,5,5)
  (same comment as for Acetaldehyde)
- Water [air, unspecified]: 2.1489e-5 m3; name water_to_air_unspecified; lognormal variance with pedigree 0.0827, pedigree (2,2,5,5,1)
  Calculated value based on literature values and expert opinion. See comments in the parametres' comment field.
  property fraction, origin: fresh water 1; name fraction_origin_fresh_water
  property fraction, origin: salt water 0; name fraction_origin_salt_water
  property fraction, origin: unspecified 0; name fraction_origin_unspecified
- Water [water, unspecified]: 2.0301e-5 m3; name water_to_water_unspecified; = (tap_water_input/1000)*(1-fraction_TW_to_air)-0.00010147; lognormal variance with pedigree 0.0827, pedigree (2,2,5,5,1)
  (same comment as for Water)
  property carbon content, fossil 0; name C_content_fossil
  property carbon content, non-fossil 0; name C_content_non_fossil
  property dry mass 0 kg; name DM
  property fraction, origin: fresh water 1; name fraction_origin_fresh_water_Ww
  property fraction, origin: salt water 0; name fraction_origin_salt_water_Ww
  property fraction, origin: unspecified 0; name fraction_origin_unspecified_Ww
  property water in wet mass 1000 kg; name WWM
  property wet mass 1000 kg; name WM

## Sampling procedure
Cross-checking of various literature sources and pilot-to-demonstration plant operation data, adapted to Swiss context

## Extrapolations
none This dataset has been copied from an original dataset covering the geography CH. The uncertainty has been adjusted accordingly.

## Review by Niels Jungbluth 2006-10-17
Passed.
none
