# methylcyclohexane production

Dataset: EcoSpold 2, unit process
Geography: RoW
Time period: 1989-01-01 to 2023-12-31
Technology level: current
Classification: ISIC rev.4 ecoinvent: 2011:Manufacture of basic chemicals
Synonyms: hexahydrotoluene, cyclohexyl methane
Scenario: Business-as-Usual
System model: Allocation, cut-off by classification
Generated by: Iasonas Ioannou
Published in: Sutter, J. 2007
Database: ecoinvent
isCopyrightProtected: true
accessRestrictedTo: 1

## General comment
This dataset represents the production of 1 kg of methylcyclohexane by hydrogenation of toluene in the presence of Raney nickel catalyst..
Methylcyclohexane (CAS-No. 108-87-2, C7H14, Synonyms: hexahydrotoluene, cyclohexyl methane) is a colorless transparent liquid with a faint, benzene-like odor. The primary use of methylcyclohexane is as a component in the feed to catalytic naphtha reformers where it is readily dehydrogenated to toluene, a high-octane motor gasoline component. Some methylcyclohexane is used for solvent applications in which it is one component of a narrow boiling range fraction of naphtha, but no current market exists for large-scale quantities.
In this dataset, the raw material inputs, and process-specific material exchanges, are modelled with a generic stoichiometry-based tool, using literature or estimated yields. The emissions are modelled with a default value, which is estimated based on losses, unreacted chemicals, among others. At the same time, the energy consumption is based on data from literature sources. Finally, the auxiliary (i.e., cooling water and infrastructure) exchanges are modelled with a default value based on industry data from literature sources. For more information on the calculations refer to the sampling procedure.
References:
Sutter, J. (2007) Life Cycle Inventories of Petrochemical Solvents. ecoinvent report No. 22. Swiss Centre for Life Cycle Inventories, Dübendorf, 2007.
Campbell, M. L. 2011. Cyclohexane. Ullmann's Encyclopedia of Industrial Chemistry.

## Included activities start
The activity starts when the raw materials enter the process.

## Included activities end
The activity ends with methylcyclohexane being ready for further transformation or transportation at the production site gate. Materials entering the process are included as well as energy uses, infrastructure and emissions.

## Geography
The inventory is modelled at the Global level. The main material inputs and outputs of this activity are generated with on a generic stoichiometry-based model, using literature or estimated yields. Furthermore, the source of information for the heat and electricity inputs is literature data for the specific technology. Finally, the main source of information for the values for water (process and cooling), nitrogen, chemical factory is industry data from the GENDORF Chemical Park, which is based in Germany and produced an average of 2462760 tonnes of chemical substances in the years 2015-2019. For more information on the calculations refer to the sampling procedure.
The dataset could also be considered as not geography-specific, and thus, valid for a broader geographical coverage.
References:
Hischier, R. (2005) Establishing Life Cycle Inventories of Chemicals Based on Differing Data Availability (9 pp). The International Journal of Life Cycle Assessment, Volume 10, Issue 1, pp 59-67. 10.1065/lca2004.10.181.7
Chemiepark GENDORF, Umwelterklärung 2016, https://www.gendorf.de/Nachbarn/Umweltschutz/Industrie%20und%20Nachhaltigkeit
Chemiepark GENDORF, Umwelterklärung 2017, https://www.gendorf.de/Nachbarn/Umweltschutz/Industrie%20und%20Nachhaltigkeit
Chemiepark GENDORF, Umwelterklärung 2020, https://www.gendorf.de/Nachbarn/Umweltschutz/Industrie%20und%20Nachhaltigkeit
Chauvel, Alain, Gilles Lefebvre, and L. Castex in "Petrochemical processes. Technical and economical characteristics Vol. 2." (1989)
Wurster, R., Zittel, W.: Hydrogen Energy in: "Energy technologies to reduce CO2 emissions in Europe: prospects, competition, synergy", Conference Proceeding of the Conference held at Petten, 11-12 April 1994, OECD/IEA, Paris 1994

## Technology
This dataset represents the hydrogentation of toluene. The hydrogentation of toluene is similar to the hydrogenation of benzene, with a yield of 95%. (Ullmann 2004). At the same time, the catalyst assumed is Raney nickel (50 % Ni, 50 % Al). As there was no data available for the heat requirments of the methylcyclohexane production, the values were estimated with data for the production of cyclohexane from the hydrogenation of benzene (Chauvel et al. 1989). At the same time, the electricity requirments of the toluene hydrogenations are based on the methylcyclohexane production of a plant in Germany (Wurster 1994).
Hydrogenation of toluene:
C7H8 + 3H2 --> C7H14
In this dataset, a yield of 95% was assumed.
References:
Ullmann's encyclopedia of industrial chemistry (2004).
Wurster, R., Zittel, W.: Hydrogen Energy in: "Energy technologies to reduce CO2 emissions in Europe: prospects, competition, synergy", Conference Proceeding of the Conference held at Petten, 11-12 April 1994, OECD/IEA, Paris 1994.
Chauvel, Alain, Gilles Lefebvre, and L. Castex in "Petrochemical processes. Technical and economical characteristics Vol. 2." (1989)

## Time period
The time period spans from the earliest year from which at least one of the input values was obtained until 2022, but overall form the most realistic picture of the production. Besides, the activity is partly generated, in terms of material inputs and outputs, based on a generic stoichiometry-based model, using literature or estimated yields, which does not expect to change over time.
The source of information for the heat and electricity inputs is literature data (from 1989 and 1994) for the specific technology. Finally, the main source of information for the values for water (process and cooling), nitrogen, chemical factory is industry data from the GENDORF Chemical Park. The values are a 5-year average of data from 2015 to 2019 published by the GENDORF Chemical Park, which is based in Germany and produced an average of 2462760 tonnes of chemical substances in the years 2015-2019. The end time period is therefore set based on the years from Gendorf reference.
For more information on the calculations refer to the sampling procedure and in the comments of the exchanges.
References:
Hischier, R. (2005) Establishing Life Cycle Inventories of Chemicals Based on Differing Data Availability (9 pp). The International Journal of Life Cycle Assessment, Volume 10, Issue 1, pp 59-67. 10.1065/lca2004.10.181.7
Chemiepark GENDORF, Umwelterklärung 2016, https://www.gendorf.de/Nachbarn/Umweltschutz/Industrie%20und%20Nachhaltigkeit
Chemiepark GENDORF, Umwelterklärung 2017, https://www.gendorf.de/Nachbarn/Umweltschutz/Industrie%20und%20Nachhaltigkeit
Chemiepark GENDORF, Umwelterklärung 2020, https://www.gendorf.de/Nachbarn/Umweltschutz/Industrie%20und%20Nachhaltigkeit
Chauvel, Alain, Gilles Lefebvre, and L. Castex in "Petrochemical processes. Technical and economical characteristics Vol. 2." (1989)
Wurster, R., Zittel, W.: Hydrogen Energy in: "Energy technologies to reduce CO2 emissions in Europe: prospects, competition, synergy", Conference Proceeding of the Conference held at Petten, 11-12 April 1994, OECD/IEA, Paris 1994

## Reference product
- methylcyclohexane: 1 kg; name RP; By-product classification allocatable product; CPC 34110: Hydrocarbons and their halogenated, sulphonated, nitrated or nitrosated derivatives; HS2017 290219: Cyclic hydrocarbons; cyclanes, cyclenes and cycloterpenes, excluding cyclohexane; CAS 108-87-2
  production volume 1.43816e9 kg; name RP_PV
    Demand for this production route is limited. Here estimated to use 10% of the toluene production volume.
  property heating value, net 43.22 MJ
    LHV is calculated based on the elemental composition of the substance. Based on the CAS number of the substance (000108-87-2), the chemical formula of the substance is found to be: C7H14, (PubChem 2020). Reference: Kim, S., Chen, J., Cheng, T., Gindulyte, A., He, J., He, S., Li, Q., Shoemaker, B. A., Thiessen, P. A., Yu, B., Zaslavsky, L., Zhang, J., & Bolton, E. E. (2019). PubChem 2019 update: improved access to chemical data. Nucleic acids research, 47(D1), D1102–D1109. https://doi.org/10.1093/nar/gky1033
  property price 0.522 EUR2005
    Temporary price data. Calculated as 90% of purchasers price based on: Source: 28 August 2006 issue of Chemical Market Reporter (ICIS) in USD/gal (conversion 3.7854 litre/gal; density 0.77 kg/litre). For comparison, UN Commodity Trade Statistics Database (http://data.un.org/Explorer.aspxDatabase [Accessed 2 July 2010]) has import and export prices (total trades (USD) divided by total weight (kg) in EU27, USA, China, Japan and India) for 'Cyclohexane' resulting in a price of 0.88 USD/kg.
  properties: carbon allocation 0.857143 kg, carbon content 0.857143, carbon content, fossil 0.857143, carbon content, non-fossil 0, dry mass 1 kg, water content 0, water in wet mass 0 kg, wet mass 1 kg

## Inputs from technosphere
- aluminium, cast alloy: 9.92e-6 kg; lognormal variance with pedigree 0.0721, pedigree (1,2,5,5,1)
  Estimated value. The catalysit assumed is a Raney nickel (50% Ni and 50% Al), Further references: Faith, W. L., Keyes, D. B., Clark, R. L.: Industrial chemicals. Ed.4 by F. A. Lowenheim, M. K. Moran. Wiley, New York 1975
  Uncertainty: Estimation
  properties: dry mass 1 kg, wet mass 1 kg
- aluminium, wrought alloy: 2.108e-5 kg; lognormal variance with pedigree 0.0721, pedigree (1,2,5,5,1)
  (same comment as for aluminium, cast alloy)
  properties: dry mass 1 kg, wet mass 1 kg
- chemical factory, organics: 4e-10 unit; lognormal variance with pedigree 0.3448, pedigree (2,4,2,5,4)
  Calculated based on literature data published by the industry. For this activity, no information was readily available concerning infrastructure and land-use. Therefore, the infrastructure is estimated based on data from two chemical factories, the BASF site of Ludwigshafen and the chemical factory in Gendorf (which are both located in Germany), which produce a wide range of chemical substances. Based on this data, the following assumptions are made: the built area amounts to about 4.2 ha, the plant has an average output of 50'000 t/a and a lifespan of fifty years. The estimated infrastructure amount is therefore 4.00 E-10 units per kg of produced chemical. References: Althaus H.-J., Chudacoff M., Hischier R., Jungbluth N., Osses M. and Primas A. (2007) Life Cycle Inventories of Chemicals. ecoinvent report No. 8, v2.0. EMPA Dübendorf, Swiss Centre for Life Cycle Inventories, Dübendorf, CH. Gendorf (2000) Umwelterklärung 2000, Werk Gendorf. Werk Gendorf, Burgkirchen.
  Uncertainty: Estimation
- electricity, medium voltage: 0.0156482, 0.312147, 0.10488, 0.00479202, 0.000959117, 0.000205944, 0.032234 kWh (7 suppliers, which the file names only by identifier); sum of these 0.470866 kWh; lognormal variance with pedigree 0.0046, pedigree (2,3,2,5,2)
  Value reported by Wurster, R., Zittel, W.: Hydrogen Energy in: "Energy technologies to reduce CO2 emissions in Europe: prospects, competition, synergy", Conference Proceeding of the Conference held at Petten, 11-12 April 1994, OECD/IEA, Paris 1994. This value represents the electricity input of methylcyclohexane production of a plant in Germany.
- heat, from steam, in chemical industry: 0.22 MJ; lognormal variance with pedigree 0.006, pedigree (2,4,2,5,2)
  This value is estimated based on the heating requirements of a similar process. Specifically, this value represents the hydrogenation of benzene, which was reported by Chauvel, Alain, Gilles Lefebvre, and L. Castex in "Petrochemical processes. Technical and economical characteristics Vol. 2." (1989) for the liquid phase process in presence of Raney nickel catalyst. The steam input of 0.08 kg per kg are required at medium pressure, while low pressure steam is go-generated amounting to 0.95 kg per kg that could potentially recovered. All in all, we assume that the heating requirements for the hydrogenation of toluene and benzene are similar.
  properties: heating value, net 1 MJ
- hydrogen, gaseous, medium pressure, merchant: 0.0402269, 0.0252588 kg (2 suppliers, which the file names only by identifier); sum of these 0.0654857 kg; lognormal variance with pedigree 0.0046, pedigree (2,3,2,5,2)
  Calculated value based on stoichiometric calculations and literature data. For more information on the calculations refer to the sampling procedure.
  properties: dry mass 1 kg, heating value, net 120.21 MJ, wet mass 1 kg
- nickel, class 1: 3.1e-5 kg; lognormal variance with pedigree 0.0721, pedigree (1,2,5,5,1)
  (same comment as for aluminium, cast alloy)
  properties: dry mass 1 kg, wet mass 1 kg
- toluene, liquid: 0.992737 kg; lognormal variance with pedigree 0.0046, pedigree (2,3,2,5,2)
  (same comment as for hydrogen, gaseous, medium pressure, merchant)
  properties: carbon content, fossil 0.913043, dry mass 1 kg, heating value, net 38.17 MJ, wet mass 1 kg
- wastewater, average: -2.27191e-6, -8.08887e-9 m3 (2 suppliers, which the file names only by identifier); sum of these -2.28e-6 m3; lognormal variance with pedigree 0.0452, pedigree (2,4,1,5,4)
  Calculated based on literature data published by the GENDORF Chemical Park. The factory produced an average of 2462760 tonnes of chemical substances (including intermediates) per year in the years 2015-2019. The average ouput of wastewater going to an external wastewater treatment plant in the years 2015-2019 was 5608 m3 per year. This equals 0.000002277 m3/kg chemical produced. References: Chemiepark GENDORF, Umwelterklärung 2016, https://www.gendorf.de/Nachbarn/Umweltschutz/Industrie%20und%20Nachhaltigkeit Chemiepark GENDORF, Umwelterklärung 2017, https://www.gendorf.de/Nachbarn/Umweltschutz/Industrie%20und%20Nachhaltigkeit Chemiepark GENDORF, Umwelterklärung 2020, https://www.gendorf.de/Nachbarn/Umweltschutz/Industrie%20und%20Nachhaltigkeit
  production volume; = RP_PV * (WW / RP)
    Calculated from production volume of reference product using the relative outputs.
  properties: carbon content, non-fossil 0.194039, dry mass 0.346837 kg, mass concentration, TOC 0.1091 kg/m3, mass concentration, calcium 0.039453 kg/m3, mass concentration, chlorine 0.030031 kg/m3, mass concentration, hydrogen 0.013365 kg/m3, mass concentration, nitrogen 0.031015 kg/m3, mass concentration, oxygen 0.069824 kg/m3, mass concentration, sodium 0.06456 kg/m3, mass concentration, sulfur 0.015602 kg/m3, water content 2882.2, wet mass 1000 kg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
  note on carbon content, non-fossil: 0.0673 kg TOC/m3 (Tab A.17, ecoinvent v2.2 report 13_I). TOC was considered as Total Carbon.

## Inputs from nature
- Water, cooling, unspecified natural origin [natural resource, in water]: 0.00312176 m3; name CW_u; = 0.891930591 * ( 3.5 / 1000 ); lognormal variance with pedigree 0.0454, pedigree (2,4,2,5,4)
  This value is estimated based on the cooling requirements of a similar process. Specifically, this value represents the hydrogenation of benzene, which was reported by Chauvel, Alain, Gilles Lefebvre, and L. Castex in "Petrochemical processes. Technical and economical characteristics Vol. 2." (1989). The value of cooling water input for the latter process is 0.0035 m3 per kg.
  At the same time, the latter amount was split between the following sources (1) "Water, cooling, unspecified natural origin", (2) "Water, river", and (3) "Water, well. in ground"
  Uncertainty: Estimation
- Water, river [natural resource, in water]: 0.000204926 m3; name CW_r; = 0.058550155 * ( 3.5 / 1000 ); lognormal variance with pedigree 0.0454, pedigree (2,4,2,5,4)
  This value is estimated based on the cooling requirements of a similar process. Specifically, this value represents the hydrogenation of benzene, which was reported by Chauvel, Alain, Gilles Lefebvre, and L. Castex in "Petrochemical processes. Technical and economical characteristics Vol. 2." (1989). The value of cooling water input for the latter process is 0.0035 m3 per kg.
  At the same time, the latter amount was split between the following sources (1) "Water, cooling, unspecified natural origin", (2) "Water, river", and (3) "Water, well. in ground"
- Water, well, in ground [natural resource, in water]: 0.000173317 m3; name CW_g; = 0.049519254 * ( 3.5 / 1000 ); lognormal variance with pedigree 0.0454, pedigree (2,4,2,5,4)
  (same comment as for Water, river)

## Emissions to nature
- Carbon dioxide, fossil [air, urban air close to ground]: 0.172564 kg; lognormal variance with pedigree 0.006, pedigree (3,3,2,5,2)
  Calculated losses, based on the boiling point of a chemical, to water or to air. In addition, unreacted chemicals are assumed to go to wastewater treatment, which has a conversion rate in biological treatment of 95% of carbon into carbon dioxide. The remaining 5% are released as emissions to water.
  Uncertainty: Calculated from the water treatment
- Hydrogen [air, urban air close to ground]: 0.000490324 kg; lognormal variance with pedigree 0.006, pedigree (3,3,2,5,2)
  Calculated losses, based on the boiling point of a chemical, to water or to air. In addition, unreacted chemicals are assumed to go to wastewater treatment, which has a conversion rate in biological treatment of 95% of carbon into carbon dioxide. The remaining 5% are released as emissions to water.
  Uncertainty: Estimation
- Water [air, unspecified]: 0.000311629 m3; = 0.089036947 * (CW_u + CW_r + CW_g ); lognormal variance with pedigree 0.0848, pedigree (2,4,2,5,4)
  Calculated based on literature data published by the GENDORF Chemical Park. The factory produced an average of 2462760 tonnes of chemical substances (including intermediates) per year in the years 2015-2019. To determine the emissions of water to air, the difference of all water inputs (from river, well, tap water and cooling) and outputs (wastewater, emissions to water) was calculated. The average ouput of water to air in the years 2015-2019 was 3620444 m3 per year. This equals 0.00147 m3/kg chemical produced. For more information on the other water exchanges please consult the respective exchange comment. References: Chemiepark GENDORF, Umwelterklärung 2016, https://www.gendorf.de/Nachbarn/Umweltschutz/Industrie%20und%20Nachhaltigkeit Chemiepark GENDORF, Umwelterklärung 2017, https://www.gendorf.de/Nachbarn/Umweltschutz/Industrie%20und%20Nachhaltigkeit Chemiepark GENDORF, Umwelterklärung 2020, https://www.gendorf.de/Nachbarn/Umweltschutz/Industrie%20und%20Nachhaltigkeit
  property fraction, origin: fresh water 0.0591092; name fraction_origin_fresh_water
  property fraction, origin: salt water 0; name fraction_origin_salt_water
  property fraction, origin: unspecified 0.940891; name fraction_origin_unspecified
- BOD5, Biological Oxygen Demand [water, surface water]: 0.00990579 kg; lognormal variance with pedigree 0.218, pedigree (4,5,5,5,5)
  Calculated value. The BOD, COD, TOC and BOD5 are calculated based on the amount and type of emissions released to water in the same activity.
  Uncertainty: Calculated from the water emissions
- COD, Chemical Oxygen Demand [water, surface water]: 0.00990579 kg; lognormal variance with pedigree 0.218, pedigree (4,5,5,5,5)
  (same comment as for BOD5, Biological Oxygen Demand)
- DOC, Dissolved Organic Carbon [water, surface water]: 0.00247645 kg; lognormal variance with pedigree 0.218, pedigree (4,5,5,5,5)
  (same comment as for BOD5, Biological Oxygen Demand)
- Methylcyclohexane [water, unspecified]: 0.00025 kg; lognormal variance with pedigree 0.006, pedigree (3,3,2,5,2)
  (same comment as for Carbon dioxide, fossil)
- TOC, Total Organic Carbon [water, surface water]: 0.00247645 kg; lognormal variance with pedigree 0.218, pedigree (4,5,5,5,5)
  (same comment as for BOD5, Biological Oxygen Demand)
- Toluene [water, unspecified]: 0.00248184 kg; lognormal variance with pedigree 0.006, pedigree (3,3,2,5,2)
  (same comment as for Carbon dioxide, fossil)
- Water [water, unspecified]: 0.00318837 m3; = 0.910963053 * (CW_u + CW_r + CW_g ); lognormal variance with pedigree 0.0848, pedigree (2,4,2,5,4)
  Calculated based on literature data published by the GENDORF Chemical Park. The factory produced an average of 2462760 tonnes of chemical substances (including intermediates) per year in the years 2015-2019. The amount of water released back to the environment consists of the sum of the amount of process water treated in the internal WWTP that is then released back to the environment and the amount of cooling water released back to the environment. The average ouput of the internal WWTP in the years 2015-2019 was 2628800 m3 and that of cooling water released back to the environment was 34408800 m3. This gives a yearly average of 37037600 m3 emissions of water to water. This equals 0.01504 m3/kg chemical produced. References: Chemiepark GENDORF, Umwelterklärung 2016, https://www.gendorf.de/Nachbarn/Umweltschutz/Industrie%20und%20Nachhaltigkeit Chemiepark GENDORF, Umwelterklärung 2017, https://www.gendorf.de/Nachbarn/Umweltschutz/Industrie%20und%20Nachhaltigkeit Chemiepark GENDORF, Umwelterklärung 2020, https://www.gendorf.de/Nachbarn/Umweltschutz/Industrie%20und%20Nachhaltigkeit
  property carbon content, fossil 0; name C_content_fossil
  property carbon content, non-fossil 0; name C_content_non_fossil
  property dry mass 0 kg; name DM
  property fraction, origin: fresh water 0.133548; name fraction_origin_fresh_water_Ww
  property fraction, origin: salt water 0; name fraction_origin_salt_water_Ww
  property fraction, origin: unspecified 0.866452; name fraction_origin_unspecified_Ww
  property water in wet mass 1000 kg; name WWM
  property wet mass 1000 kg; name WM

## Sampling procedure
Literature data and stoichiometric calculation. This inventory is partially based on a generic model of the production of chemicals. The data generated by this model have been improved with compound-specific data when available. The model of the production of chemicals is using specific industry or literature data wherever possible and more generic data on chemical production processes to fill compound-specific data gaps when necessary. The basic principles of the model have been published in literature (Hischier, 2005). The model has been updated and extended with newly available data from the chemical industry. In the model, unreacted fractions are treated in a waste treatment process, and emissions reported are after a waste treatment process that is included in the scope of this dataset. For volatile reactants, a small level of evaporation is assumed. Solvents and catalysts are mostly recycled in closed-loop systems within the scope of the dataset and reported flows are for losses from this system.
The source of information for the heat and electricity inputs is literature data (from 1989 and 1994) for the specific technology. Finally, the main source of information for the values for water (process and cooling), nitrogen, and chemical factory is industry data from the GENDORF Chemical Park. The values are a 5-year average of data from 2015 to 2019 published by the GENDORF Chemical Park, which is based in Germany and produced an average of 2462760 tonnes of chemical substances in the years 2015-2019. For more information refer to the comments of the exchanges.

References:
Hischier, R. (2005) Establishing Life Cycle Inventories of Chemicals Based on Differing Data Availability (9 pp). The International Journal of Life Cycle Assessment, Volume 10, Issue 1, pp 59-67. 10.1065/lca2004.10.181.7
Chemiepark GENDORF, Umwelterklärung 2016, https://www.gendorf.de/Nachbarn/Umweltschutz/Industrie%20und%20Nachhaltigkeit
Chemiepark GENDORF, Umwelterklärung 2017, https://www.gendorf.de/Nachbarn/Umweltschutz/Industrie%20und%20Nachhaltigkeit
Chemiepark GENDORF, Umwelterklärung 2020, https://www.gendorf.de/Nachbarn/Umweltschutz/Industrie%20und%20Nachhaltigkeit
Chauvel, Alain, Gilles Lefebvre, and L. Castex in "Petrochemical processes. Technical and economical characteristics Vol. 2." (1989)
Wurster, R., Zittel, W.: Hydrogen Energy in: "Energy technologies to reduce CO2 emissions in Europe: prospects, competition, synergy", Conference Proceeding of the Conference held at Petten, 11-12 April 1994, OECD/IEA, Paris 1994

## Extrapolations
This dataset has been copied from an original dataset covering the geography RER. The uncertainty has been adjusted accordingly.
