# clinker production

Dataset: EcoSpold 2, unit process
Geography: EC
Time period: 2019-01-01 to 2023-12-31
Technology level: current
Classification: ISIC rev.4 ecoinvent: 2394:Manufacture of cement, lime and plaster
Tags: combined production
Scenario: Business-as-Usual
System model: Allocation, cut-off by classification
Share of production covered: 62.8 %
Generated by: K.Padron;E.Barros;J.Aguirre;S.Martines
Published in: Petroche, D.M. 2022
Database: ecoinvent
isCopyrightProtected: true
accessRestrictedTo: 1

## General comment
This dataset represents the production of 1 kg clinker in Ecuador. Clinker is the main constituent of cement and the main responsible for its environmental impacts. The data is obtained for the year 2019 from the publication of Petroche & Ramirez (2022), based on information from factories.
Reference:
Petroche, D. M., & Ramirez, A. D. (2022). The Environmental Profile of Clinker, Cement, and Concrete: A Life Cycle Perspective Study Based on Ecuadorian Data. Buildings, 12(3), 311.

## Included activities start
The activity starts from the reception of raw materials at the clinker manufacturing plant.

## Included activities end
The activity ends with the production of clinker at the factory gate. The activity includes the processing of materials and their transport within the factory gates. The dataset does not include the packaging.

## Geography
This dataset is representative of the production of clinker in Ecuador.

## Technology
Current technology. Clinker is made by heating at high temperature in a rotary kiln a mixture of limestone and clays. In the production of clinker, 86% of the total raw materials are composed of limestone. Four types of clays are used, which come from different parts of
Ecuador; these clays represent 11% by mass, and other raw materials of mineral correction
represent 3%.

## Time period
The time period is 2019 (year of the data collection) to 2023 (year of the compilation of the dataset).

## Reference product
- clinker: 1 kg; By-product classification allocatable product; CPC 37430: Cement clinkers; HS2017 252310: Cement clinkers (whether or not coloured)
  production volume 7.62097e9 kg; name clinker_PV
    Literature value. The total production of clinker in Ecuador is 7"620"970 ton for 2016 (ASOCEM, 2016).
  property price 0.047 EUR2005
    Calculated value based on data from United Nations Commodity Trade Statistics Database (comtrade.un.org). UN comtrade category: 252310 Cement Clinkers. Using exchange rate of 1EURO = 1.209 USD. Average of price of import into 5 main markets (EU, US, JP, IN and CN).
  properties: carbon allocation 0 kg, carbon content 0, carbon content, fossil 0, carbon content, non-fossil 0, dry mass 1 kg, water content 0, water in wet mass 0 kg, wet mass 1 kg

## Inputs from technosphere
- calcareous marl: 0.17544 kg; = 0.17544*clinker+0*BW+0*CS+0*MSW+0*EAFS+0*WMO; lognormal variance with pedigree 0.0007, pedigree (1,2,1,1,1)
  Literature value. Value obtained from plant's sustainability reports and the registering system of raw materials consumption, fuels, and electricity use in each phase of the process. This value was verified through on-site data collection (Petroche & Ramirez, 2022). Reference: Petroche, D. M., & Ramirez, A. D. (2022). The Environmental Profile of Clinker, Cement, and Concrete: A Life Cycle Perspective Study Based on Ecuadorian Data. Buildings, 12(3), 311.
  properties: carbon content, fossil 0.087767, dry mass 1 kg, wet mass 1 kg
  note on carbon content, fossil: composed from 3/4 pure limestone and 1/4 clay, ecoinvent v2.2 report 7 part II pg 14. C content of limestone is 0.117 kg/kg WM
- cement factory: 9.45e-12 unit; = 0.00000000000945*clinker+0*BW+0*CS+0*MSW+0*EAFS+0*WMO; lognormal variance with pedigree 0.3101, pedigree (1,2,1,1,1)
  Literature value. Value calculated based on the production and lifespan of the facility. The average production of the last five years and a life span of 50 years were used (Petroche & Ramirez, 2022). Reference: Petroche, D. M., & Ramirez, A. D. (2022). The Environmental Profile of Clinker, Cement, and Concrete: A Life Cycle Perspective Study Based on Ecuadorian Data. Buildings, 12(3), 311.
- clay: 0.03304 kg; = 0.03304*clinker+0*BW+0*CS+0*MSW+0*EAFS+0*WMO; lognormal variance with pedigree 0.0007, pedigree (1,2,1,1,1)
  (same comment as for calcareous marl)
  properties: dry mass 0.965 kg, water content 0.0362694, wet mass 1 kg
- diesel, low-sulfur: 0.00032 kg; = 0.00032*clinker+0*BW+0*CS+0*MSW+0*EAFS+0*WMO; lognormal variance with pedigree 0.0007, pedigree (1,2,1,1,1)
  Literature value. Value obtained from plant's sustainability reports and the registering system of raw materials consumption, fuels, and electricity use in each phase of the process. (Petroche & Ramirez, 2022). Reference: Petroche, D. M., & Ramirez, A. D. (2022). The Environmental Profile of Clinker, Cement, and Concrete: A Life Cycle Perspective Study Based on Ecuadorian Data. Buildings, 12(3), 311.
  properties: carbon content, fossil 0.865, dry mass 1 kg, heating value, net 42.8 MJ, wet mass 1 kg
- electricity, medium voltage: 0.07124 kWh; = 0.07124*clinker+0*BW+0*CS+0*MSW+0*EAFS+0*WMO; lognormal variance with pedigree 0.0007, pedigree (1,2,1,1,1)
  (same comment as for diesel, low-sulfur)
- fluorspar, 97% purity: 0.00018 kg; = 0.00018*clinker+0*BW+0*CS+0*MSW+0*EAFS+0*WMO; lognormal variance with pedigree 0.0007, pedigree (1,2,1,1,1)
  (same comment as for calcareous marl)
  properties: dry mass 1 kg, wet mass 1 kg
- industrial machine, heavy, unspecified: 3.8e-5 kg; = 0.000038*clinker+0*BW+0*CS+0*MSW+0*EAFS+0*WMO; lognormal variance with pedigree 0.3201, pedigree (1,2,1,1,1)
  Literature value. Value obtained from the plant's accounting and logistics records (Petroche & Ramirez, 2022). Reference: Petroche, D. M., & Ramirez, A. D. (2022). The Environmental Profile of Clinker, Cement, and Concrete: A Life Cycle Perspective Study Based on Ecuadorian Data. Buildings, 12(3), 311.
- inert waste, for final disposal: -0.000223 kg; name inert_waste_amount; = (0.000179+0.000044)*clinker+0*BW+0*CS+0*MSW+0*EAFS+0*WMO; lognormal variance with pedigree 0.0007, pedigree (1,2,1,1,1)
  Literature value. Value obtained from the accounting record of waste generated in the plant, through the mass recorded by seesaws. The solid waste generated is collected by the municipal company, where 0.000179 kg is inert waste, and 0.000044 is municipal solid waste (Petroche & Ramirez, 2022). Reference: Petroche, D. M., & Ramirez, A. D. (2022). The Environmental Profile of Clinker, Cement, and Concrete: A Life Cycle Perspective Study Based on Ecuadorian Data. Buildings, 12(3), 311.
  production volume; = clinker_PV/ clinker * inert_waste_amount
    Calculated from the production volume of the reference product in proportion to the respective output amounts.
  properties: dry mass 0.995 kg, water content 0.00502513, wet mass 1 kg
- iron ore, crude ore, 46% Fe: 0.00041 kg; = 0.00041*clinker+0*BW+0*CS+0*MSW+0*EAFS+0*WMO; lognormal variance with pedigree 0.0101, pedigree (1,2,1,1,1)
  (same comment as for calcareous marl)
  properties: dry mass 1 kg, wet mass 1 kg
- limestone, crushed, for mill: 1.52572 kg; = 1.5257151281001*clinker+0*BW+0*CS+0*MSW+0*EAFS+0*WMO; lognormal variance with pedigree 0.0007, pedigree (1,2,1,1,1)
  Literature value. Value obtained from plant's sustainability reports and the registering system of raw materials consumption, fuels, and electricity use in each phase of the process. This value was verified through on-site data collection (Petroche & Ramirez, 2022). The amount of limestone differs from the study in order to close the mass balance. This was also confirmed with the author of the study, who stated that in the study certain residues which go back into the system were not considered. Reference: Petroche, D. M., & Ramirez, A. D. (2022). The Environmental Profile of Clinker, Cement, and Concrete: A Life Cycle Perspective Study Based on Ecuadorian Data. Buildings, 12(3), 311.
  properties: carbon content, fossil 0.117492, dry mass 0.998 kg, water content 0.00200401, wet mass 1 kg
- lubricating oil: 4.7e-5 kg; name lubricating_oil_input; = 0.000047*clinker+0*BW+0*CS+0*MSW+0*EAFS+0*WMO; lognormal variance with pedigree 0.0101, pedigree (1,2,1,1,1)
  Literature value. Value obtained from plant's sustainability reports and the registering system of raw materials consumption, fuels, and electricity use in each phase of the process (Petroche & Ramirez, 2022).
  The waste after use of the lubricating oil is included in the exchange "inert waste, for final disposal". The residue is managed by a qualified waste manager. Reference: Petroche, D. M., & Ramirez, A. D. (2022). The Environmental Profile of Clinker, Cement, and Concrete: A Life Cycle Perspective Study Based on Ecuadorian Data. Buildings, 12(3), 311.
  properties: carbon content, fossil 0.75, dry mass 1 kg, heating value, net 40.2 MJ, wet mass 1 kg
  note on carbon content, fossil: Lubricating oil is produced from diesel. C-content/dry mass of fats and oils considered 75%, from: ecoinvent v2.2 report, n 15a, pg 40
  note on heating value, net: Literature value, Source: IPCC 2006, 2006 IPCC Guidelines for National Greenhouse Gas Inventories, Prepared by the National Greenhouse Gas Inventories Programme, Eggleston H.S., Buendia L., Miwa K., Ngara T. and Tanabe K. (eds). Published: IGES, Japan
- petroleum coke: 0.08891 kg; = 0.08891*clinker+0*BW+0*CS+0*MSW+0*EAFS+0*WMO; lognormal variance with pedigree 0.0007, pedigree (1,2,1,1,1)
  (same comment as for diesel, low-sulfur)
  properties: carbon content, fossil 0.885, dry mass 1 kg, heating value, net 35 MJ, wet mass 1 kg
- refractory, basic, packed: 0.00019 kg; = 0.00019*clinker+0*BW+0*CS+0*MSW+0*EAFS+0*WMO; lognormal variance with pedigree 0.0007, pedigree (1,2,1,1,1)
  (same comment as for industrial machine, heavy, unspecified)
  properties: dry mass 1 kg, wet mass 1 kg
- refractory, fireclay, packed: 8.2e-5 kg; = 0.000082*clinker+0*BW+0*CS+0*MSW+0*EAFS+0*WMO; lognormal variance with pedigree 0.0101, pedigree (1,2,1,1,1)
  (same comment as for industrial machine, heavy, unspecified)
  properties: dry mass 1 kg, wet mass 1 kg
- refractory, high aluminium oxide, packed: 0.000137 kg; = 0.000137*clinker+0*BW+0*CS+0*MSW+0*EAFS+0*WMO; lognormal variance with pedigree 0.0101, pedigree (1,2,1,1,1)
  (same comment as for industrial machine, heavy, unspecified)
  properties: dry mass 1 kg, wet mass 1 kg
- steel, chromium steel 18/8, hot rolled: 5.9e-5 kg; name steel_input; = 0.000059*clinker+0*BW+0*CS+0*MSW+0*EAFS+0*WMO; lognormal variance with pedigree 0.0101, pedigree (1,2,1,1,1)
  Literature value. Value obtained from the plant's accounting and logistics records (Petroche & Ramirez, 2022).
  The waste of the replacemement of the steel of wearing parts is included in the exchange "inert waste, for final disposal". The residue is managed by a qualified waste manager. Reference: Petroche, D. M., & Ramirez, A. D. (2022). The Environmental Profile of Clinker, Cement, and Concrete: A Life Cycle Perspective Study Based on Ecuadorian Data. Buildings, 12(3), 311. Reference: Petroche, D. M., & Ramirez, A. D. (2022). The Environmental Profile of Clinker, Cement, and Concrete: A Life Cycle Perspective Study Based on Ecuadorian Data. Buildings, 12(3), 311.
  properties: carbon content, fossil 0.0008, dry mass 1 kg, wet mass 1 kg
  note on carbon content, fossil: Stainless steel model is the grade 304 steel (18/8 stainless, 18% chromium 8% nickel; max. 0.08% C)
- tap water: 0.00276 kg; = 0.00276*clinker+0*BW+0*CS+0*MSW+0*EAFS+0*WMO; lognormal variance with pedigree 0.0007, pedigree (1,2,1,1,1)
  (same comment as for industrial machine, heavy, unspecified)
  properties: carbon content, fossil 0.0017899, dry mass 0.000337476 kg, water content 2962.17, wet mass 1 kg
- transport, freight, conveyor belt: 0.00211 metric ton*km; = 0.00211*clinker+0*BW+0*CS+0*MSW+0*EAFS+0*WMO; lognormal variance with pedigree 0.1201, pedigree (1,2,1,1,1)
  Literature value. The location of the factories of the suppliers of the main raw materials was determined, then an optimal route was generated using global positioning system (GPS) tools. Finally, using the weights of the raw materials, the transportation was expressed in t*km (Petroche & Ramirez, 2022). Reference: Petroche, D. M., & Ramirez, A. D. (2022). The Environmental Profile of Clinker, Cement, and Concrete: A Life Cycle Perspective Study Based on Ecuadorian Data. Buildings, 12(3), 311.

## Emissions to nature
- Ammonia [air, unspecified]: 2.5e-8 kg; = 0.000000025*clinker+0*BW+0*CS+0*MSW+0*EAFS+0*WMO; lognormal variance with pedigree 0.0401, pedigree (1,2,1,1,1)
  Literature value. Ammonia emissions were obtained from the biannual measurement reports of each clinker kiln (Petroche & Ramirez, 2022). Reference: Petroche, D. M., & Ramirez, A. D. (2022). The Environmental Profile of Clinker, Cement, and Concrete: A Life Cycle Perspective Study Based on Ecuadorian Data. Buildings, 12(3), 311.
- Antimony ion [air, unspecified]: 2e-9 kg; = 0.000000002*clinker+0*BW+0*CS+0*MSW+0*EAFS+0*WMO; lognormal variance with pedigree 0.0401, pedigree (1,2,1,1,1)
  Literature value. Antimony emissions were obtained from the biannual measurement reports of each clinker kiln (Petroche & Ramirez, 2022). Reference: Petroche, D. M., & Ramirez, A. D. (2022). The Environmental Profile of Clinker, Cement, and Concrete: A Life Cycle Perspective Study Based on Ecuadorian Data. Buildings, 12(3), 311.
- Arsenic ion [air, unspecified]: 5.9e-9 kg; = 0.0000000059*clinker+0*BW+0*CS+0*MSW+0*EAFS+0*WMO; lognormal variance with pedigree 0.6501, pedigree (1,2,1,1,1)
  Literature value. Arsenic emissions were obtained from the biannual measurement reports of each clinker kiln (Petroche & Ramirez, 2022). Reference: Petroche, D. M., & Ramirez, A. D. (2022). The Environmental Profile of Clinker, Cement, and Concrete: A Life Cycle Perspective Study Based on Ecuadorian Data. Buildings, 12(3), 311.
- Benzene [air, unspecified]: 8.8e-8 kg; = 0.000000088*clinker+0*BW+0*CS+0*MSW+0*EAFS+0*WMO; lognormal variance with pedigree 0.0401, pedigree (1,2,1,1,1)
  Literature value. Benzene emissions were obtained from the biannual measurement reports of each clinker kiln (Petroche & Ramirez, 2022). Reference: Petroche, D. M., & Ramirez, A. D. (2022). The Environmental Profile of Clinker, Cement, and Concrete: A Life Cycle Perspective Study Based on Ecuadorian Data. Buildings, 12(3), 311.
- Cadmium II [air, unspecified]: 6e-9 kg; = 0.000000006*clinker+0*BW+0*CS+0*MSW+0*EAFS+0*WMO; lognormal variance with pedigree 0.0501, pedigree (1,2,1,1,1)
  Literature value. Cadmiun emissions were obtained from the biannual measurement reports of each clinker kiln (Petroche & Ramirez, 2022). Reference: Petroche, D. M., & Ramirez, A. D. (2022). The Environmental Profile of Clinker, Cement, and Concrete: A Life Cycle Perspective Study Based on Ecuadorian Data. Buildings, 12(3), 311.
- Carbon dioxide, fossil [air, unspecified]: 0.84269 kg; = 0.84269*clinker+0*BW+0*CS+0*MSW+0*EAFS+0*WMO; lognormal variance with pedigree 0.0007, pedigree (1,2,1,1,1)
  Literature value. Monthly emission data for CO2 was obtained from the continuous emission‐monitoring system of each clinker kiln (Petroche & Ramirez, 2022). Reference: Petroche, D. M., & Ramirez, A. D. (2022). The Environmental Profile of Clinker, Cement, and Concrete: A Life Cycle Perspective Study Based on Ecuadorian Data. Buildings, 12(3), 311.
- Carbon monoxide, fossil [air, unspecified]: 0.000875 kg; = 0.000875*clinker+0*BW+0*CS+0*MSW+0*EAFS+0*WMO; lognormal variance with pedigree 0.6501, pedigree (1,2,1,1,1)
  Literature value. Carbon monoxide emissions were obtained from the biannual measurement reports of each clinker kiln (Petroche & Ramirez, 2022). Reference: Petroche, D. M., & Ramirez, A. D. (2022). The Environmental Profile of Clinker, Cement, and Concrete: A Life Cycle Perspective Study Based on Ecuadorian Data. Buildings, 12(3), 311.
- Chromium III [air, unspecified]: 8.8e-9 kg; = 0.0000000088*clinker+0*BW+0*CS+0*MSW+0*EAFS+0*WMO; lognormal variance with pedigree 0.6501, pedigree (1,2,1,1,1)
  Literature value. Chromium emissions were obtained from the biannual measurement reports of each clinker kiln (Petroche & Ramirez, 2022). Reference: Petroche, D. M., & Ramirez, A. D. (2022). The Environmental Profile of Clinker, Cement, and Concrete: A Life Cycle Perspective Study Based on Ecuadorian Data. Buildings, 12(3), 311.
- Cobalt II [air, unspecified]: 1.18e-8 kg; = 0.0000000118*clinker+0*BW+0*CS+0*MSW+0*EAFS+0*WMO; lognormal variance with pedigree 0.0501, pedigree (1,2,1,1,1)
  Literature value. Cobalt emissions were obtained from the biannual measurement reports of each clinker kiln (Petroche & Ramirez, 2022). Reference: Petroche, D. M., & Ramirez, A. D. (2022). The Environmental Profile of Clinker, Cement, and Concrete: A Life Cycle Perspective Study Based on Ecuadorian Data. Buildings, 12(3), 311.
- Copper ion [air, unspecified]: 1.47e-8 kg; = 0.0000000147*clinker+0*BW+0*CS+0*MSW+0*EAFS+0*WMO; lognormal variance with pedigree 0.6501, pedigree (1,2,1,1,1)
  Literature value. Copper emissions were obtained from the biannual measurement reports of each clinker kiln (Petroche & Ramirez, 2022). Reference: Petroche, D. M., & Ramirez, A. D. (2022). The Environmental Profile of Clinker, Cement, and Concrete: A Life Cycle Perspective Study Based on Ecuadorian Data. Buildings, 12(3), 311.
- Dioxins, measured as 2,3,7,8-tetrachlorodibenzo-p-dioxin [air, unspecified]: 9.7e-14 kg; = 0.000000000000097*clinker+0*BW+0*CS+0*MSW+0*EAFS+0*WMO; lognormal variance with pedigree 0.0401, pedigree (1,2,1,1,1)
  Literature value. Dioxins emissions were obtained from the biannual measurement reports of each clinker kiln (Petroche & Ramirez, 2022). Reference: Petroche, D. M., & Ramirez, A. D. (2022). The Environmental Profile of Clinker, Cement, and Concrete: A Life Cycle Perspective Study Based on Ecuadorian Data. Buildings, 12(3), 311.
- Hydrochloric acid [air, unspecified]: 1.35e-8 kg; = 0.0000000135*clinker+0*BW+0*CS+0*MSW+0*EAFS+0*WMO; lognormal variance with pedigree 0.0401, pedigree (1,2,1,1,1)
  Literature value. Hydrogen chloride emissions were obtained from the biannual measurement reports of each clinker kiln (Petroche & Ramirez, 2022). Reference: Petroche, D. M., & Ramirez, A. D. (2022). The Environmental Profile of Clinker, Cement, and Concrete: A Life Cycle Perspective Study Based on Ecuadorian Data. Buildings, 12(3), 311.
- Lead II [air, unspecified]: 1.76e-8 kg; = 0.0000000176*clinker+0*BW+0*CS+0*MSW+0*EAFS+0*WMO; lognormal variance with pedigree 0.0501, pedigree (1,2,1,1,1)
  Literature value. Lead emissions were obtained from the biannual measurement reports of each clinker kiln (Petroche & Ramirez, 2022). Reference: Petroche, D. M., & Ramirez, A. D. (2022). The Environmental Profile of Clinker, Cement, and Concrete: A Life Cycle Perspective Study Based on Ecuadorian Data. Buildings, 12(3), 311.
- Mercury II [air, unspecified]: 2.8e-9 kg; = 0.0000000028*clinker+0*BW+0*CS+0*MSW+0*EAFS+0*WMO; lognormal variance with pedigree 0.6501, pedigree (1,2,1,1,1)
  Literature value. Mercury emissions were obtained from the biannual measurement reports of each clinker kiln (Petroche & Ramirez, 2022). Reference: Petroche, D. M., & Ramirez, A. D. (2022). The Environmental Profile of Clinker, Cement, and Concrete: A Life Cycle Perspective Study Based on Ecuadorian Data. Buildings, 12(3), 311.
- Nickel II [air, unspecified]: 1.18e-8 kg; = 0.0000000118*clinker+0*BW+0*CS+0*MSW+0*EAFS+0*WMO; lognormal variance with pedigree 0.6501, pedigree (1,2,1,1,1)
  Literature value. Nickel emissions were obtained from the biannual measurement reports of each clinker kiln (Petroche & Ramirez, 2022). Reference: Petroche, D. M., & Ramirez, A. D. (2022). The Environmental Profile of Clinker, Cement, and Concrete: A Life Cycle Perspective Study Based on Ecuadorian Data. Buildings, 12(3), 311.
- Nitrogen oxides [air, unspecified]: 0.00161 kg; = 0.00161*clinker+0*BW+0*CS+0*MSW+0*EAFS+0*WMO; lognormal variance with pedigree 0.0401, pedigree (1,2,1,1,1)
  Literature value. Monthly emission data for NOx was obtained from the continuous emission‐monitoring system of each clinker kiln (Petroche & Ramirez, 2022). Reference: Petroche, D. M., & Ramirez, A. D. (2022). The Environmental Profile of Clinker, Cement, and Concrete: A Life Cycle Perspective Study Based on Ecuadorian Data. Buildings, 12(3), 311.
- Particulate Matter, < 2.5 um [air, unspecified]: 4.6e-6 kg; = 0.0000046*clinker+0*BW+0*CS+0*MSW+0*EAFS+0*WMO; lognormal variance with pedigree 0.3001, pedigree (1,2,1,1,1)
  Literature value. Monthly emission data for particulate matter was obtained from the continuous emission‐monitoring system of each clinker kiln (Petroche & Ramirez, 2022). Reference: Petroche, D. M., & Ramirez, A. D. (2022). The Environmental Profile of Clinker, Cement, and Concrete: A Life Cycle Perspective Study Based on Ecuadorian Data. Buildings, 12(3), 311.
- Particulate Matter, > 10 um [air, unspecified]: 3.3e-6 kg; = 0.0000033*clinker+0*BW+0*CS+0*MSW+0*EAFS+0*WMO; lognormal variance with pedigree 0.0401, pedigree (1,2,1,1,1)
  (same comment as for Particulate Matter, < 2.5 um)
- Particulate Matter, > 2.5 um and < 10um [air, unspecified]: 1.7e-6 kg; = 0.0000017*clinker+0*BW+0*CS+0*MSW+0*EAFS+0*WMO; lognormal variance with pedigree 0.1201, pedigree (1,2,1,1,1)
  (same comment as for Particulate Matter, < 2.5 um)
- Sulfur dioxide [air, unspecified]: 5.8e-5 kg; = 0.000058*clinker+0*BW+0*CS+0*MSW+0*EAFS+0*WMO; lognormal variance with pedigree 0.0061, pedigree (1,2,1,1,1)
  Literature value. Monthly emission data for SO2 was obtained from the continuous emission‐monitoring system of each clinker kiln (Petroche & Ramirez, 2022). Reference: Petroche, D. M., & Ramirez, A. D. (2022). The Environmental Profile of Clinker, Cement, and Concrete: A Life Cycle Perspective Study Based on Ecuadorian Data. Buildings, 12(3), 311.
- Thallium I [air, unspecified]: 6e-9 kg; = 0.000000006*clinker+0*BW+0*CS+0*MSW+0*EAFS+0*WMO; lognormal variance with pedigree 0.6501, pedigree (1,2,1,1,1)
  Literature value. Thallium emissions were obtained from the biannual measurement reports of each clinker kiln (Petroche & Ramirez, 2022). Reference: Petroche, D. M., & Ramirez, A. D. (2022). The Environmental Profile of Clinker, Cement, and Concrete: A Life Cycle Perspective Study Based on Ecuadorian Data. Buildings, 12(3), 311.
- VOC, volatile organic compounds [air, unspecified]: 7.7e-5 kg; = 0.000077*clinker+0*BW+0*CS+0*MSW+0*EAFS+0*WMO; lognormal variance with pedigree 0.0401, pedigree (1,2,1,1,1)
  Literature value. Monthly emission data for VOCs was obtained from the continuous emission‐monitoring system of each clinker kiln (Petroche & Ramirez, 2022). Reference: Petroche, D. M., & Ramirez, A. D. (2022). The Environmental Profile of Clinker, Cement, and Concrete: A Life Cycle Perspective Study Based on Ecuadorian Data. Buildings, 12(3), 311.
- Vanadium V [air, unspecified]: 1.76e-8 kg; = 0.0000000176*clinker+0*BW+0*CS+0*MSW+0*EAFS+0*WMO; lognormal variance with pedigree 0.6501, pedigree (1,2,1,1,1)
  Literature value. Vanadium emissions were obtained from the biannual measurement reports of each clinker kiln (Petroche & Ramirez, 2022). Reference: Petroche, D. M., & Ramirez, A. D. (2022). The Environmental Profile of Clinker, Cement, and Concrete: A Life Cycle Perspective Study Based on Ecuadorian Data. Buildings, 12(3), 311.
- Water [air, unspecified]: 1.91517e-5 m3; = 0.0000191516968562002*clinker+0*BW+0*CS+0*MSW+0*EAFS+0*WMO; lognormal variance with pedigree 0.0421, pedigree (3,2,1,1,1)
  Estimated value. Evaporated water in the processing from tap water, raw materials (clay and limestone) and secondary fuels (biowaste, municipal solid waste and waste mineral oil). Calculated based on the mass balance of the dataset.

## Sampling procedure
The dataset is based on the data available in Petroche & Ramirez (2022). In this study, information was obtained in factories from: plants’ sustainability reports, registering systems, emission-monitoring system, biannual measurement reports, consumption reports and logistics records. Specifically, material and energy inputs to produce clinker were obtained from plants' sustainability reports. Access was provided to the data of the registering system of raw materials consumption, fuels, and electricity use in each phase of the system. Monthly emission data for CO2, NOx, SO2, PM, and VOCs was obtained from the continuous emission-monitoring system of each clinker kiln. Pollutant emissions such as ammonia, antimony, arsenic, benzene, cadmium, hydrogen chloride, cobalt, copper, chromium, dioxins, mercury, carbon monoxide, nickel, lead, thallium, and vanadium were obtained from the biannual measurement reports of each clinker kiln. Reports on the consumption of oils, heavy machinery, and maintenance equipment were obtained from logistics records.
The datasets for clinker and cement represent 62.8% of the production in Ecuador, according to Petroche (2021).

Reference:
Petroche, D. M., & Ramirez, A. D. (2022). The environmental profile of clinker, cement, and concrete: a life cycle perspective study based on ecuadorian data. Buildings, 12(3), 311.
Petroche, D. (2021). Desempeño Ambiental del Cemento y del Concreto en el Ecuador: Una puerta a la Construcción Sostenible [Master’s degree thesis in Industrial Eco-efficiency, Escuela Superior Politécnica del Litoral]. https://www.dspace.espol.edu.ec/bitstream/123456789/52614/1/T-88998%20%20DANIEL%20PETROCHE%20S%C3%81NCHEZ.pdf

## Extrapolations
The amount of limestone differs from the study in order to close the mass balance. This was also confirmed with the author of the study, who stated that in the study certain residues which go back into the system were not considered.
