# treatment of inert waste, inert material landfill

Dataset: EcoSpold 2, unit process
Geography: RoW
Time period: 1995-01-01 to 2023-12-31
Technology level: current
Classification: ISIC rev.4 ecoinvent: 3821:Treatment and disposal of non-hazardous waste
Scenario: Business-as-Usual
System model: Allocation, cut-off by classification
Generated by: Gabor Doka (obsolete)
Published in: Doka G. 2007
Database: ecoinvent
isCopyrightProtected: true
accessRestrictedTo: 1

## General comment
This dataset represents the activity of waste disposal of 'inert waste, for final disposal' in an inert material landfill.

## Included activities start
The activity starts with the waste being available at the gate of the treatment facility. Collection and transportation of the waste to the treatment plant is not included.

## Included activities end
The activity ends with the waste being treated and no direct emissions from inert material landfill (leachate) are inventoried, as they are considered negligible. The dataset contains only exchanges to process-specific burdens (energy, land use) and infrastructure.

## Geography
Modelling parameters affecting the treatment technology are not specific to this geography.

## Technology
Inert material landfill with leachate collection system and renaturation after closure. 50% of the sites is equipped with a base seal.

## Reference product
- inert waste, for final disposal: -1 kg; By-product classification Waste; CPC 39990: Other wastes n.e.c.
  production volume 2.61587e11 kg; = 3.25E+11*((0.003972031/0.609421263*0.95)+(0.274856880438401/0.609421263*0.7)+(0.330592352/0.609421263*0.9))
    The global total production of C&D waste is estimated to be 325 million tonnes in 2003 (http://www3.epa.gov/epawaste/inforesources/pubs/infocus/rif-cd.pdf, accessed 20151013). To calculate the share that is redirected to inert material landfill, sanitary landfill and recycling the weighted average (based on nominal GDP, source: United Nations, http://data.un.org/Glossary.aspx?q=GDP+%28current+US%24%29, accessed 20130726 and 20130312) of treatments in EU (GDP2005 0.330592), Honk Kong (GDP2005 0.003972) and Northeast America (GDP2005 0.274857) is calculated. Honk Kong’s Environmental protection department reports 95% of construction waste to inert material landfill and 5% to landfill (Statistic unit, 2013) (https://www.wastereduction.gov.hk/sites/default/files/msw2013.pdf, accessed 20151013). US Northeast Waste Management Officials’ Association reports 70% of waste going to inert material landfill and 30% to landfill (2009) (http://www.newmoa.org/solidwaste/CDReport2006DataFinalJune302009.pdf, accessed 20151013). For the EU, treatments vary greatly between states (recycling varies from less than 10% to over 90%) as an average 90% of waste is sent to inert material landfill and 10% to recycling. The weighted average of these regions result in 81% of waste sent to inert material landfill, 14% to sanitary landfill and 5% to recycling. No dataset for recycling is available at the moment.
  property price 0 EUR2005
    Waste products are assigned a price of zero as they are assumed to require further treatment.
  properties: carbon allocation 0 kg, carbon content 0, carbon content, fossil 0, carbon content, non-fossil 0, dry mass 0.995 kg, water content 0.00502513, water in wet mass 0.005 kg, wet mass 1 kg

## Inputs from technosphere
- inert material landfill: 1.48e-9 unit; lognormal variance with pedigree 0.042, pedigree (1,1,5,5,1)
  landfill infrastructure per kg waste, uncerteinty heeded in module.
- process-specific burdens, inert material landfill: 1 kg; lognormal variance with pedigree 0.042, pedigree (1,1,5,5,1)
  process-specific burdens per kg waste, uncerteinty heeded in module.

## Extrapolations
This dataset has been copied from an original dataset covering the geography CH. The uncertainty has been adjusted accordingly.

## Review by Niels Jungbluth 2003-05-28
Passed.

## Review by Emilia Moreno Ruiz 2015-10-16
PV adjusted
