# sodium cyanide production

Dataset: EcoSpold 2, unit process
Geography: RER
Time period: 2003-01-01 to 2023-12-31
Technology level: current
Classification: ISIC rev.4 ecoinvent: 2011:Manufacture of basic chemicals
Scenario: Business-as-Usual
System model: Allocation, cut-off by classification
Generated by: Iasonas Ioannou
Published in: Hischier R. 2007
Database: ecoinvent
isCopyrightProtected: true
accessRestrictedTo: 1

## General comment
The functional unit represent 1 kg of sodium cyanide. The production of sodium cyanides is the same worldwide, comprising of a simple neutralization reaction between a weak acid and a strong base, as follows:
HCN + NaOH → NaCN + H2O, ΔH = 460 kJ
Pure sodium cyanide NaCN (CAS: 143-33-9) is a white crystalline solid commonly called white cyanide, that is readily soluble in water. Sodium and potassium cyanides are often called “alkaline cyanides” because they render water alkaline pH when dissolved (Ulmann, 2004). At the same time, alkali metal cyanides are sensitive to humitity which contains carbon dioxide, which is a weak acid in aqueous solution. Furthermore, alkili cyanides attracted significant interest for the recovery of precous metals. For example, in 1840, the electroplating process for gold and silver was developed and acted as major driver for the consumption of sodium cyanide. Other large single uses of sodium cyanide considered the electroplating of zinc, copper, brass, and cadmium (Kirk, 2004). Sodium cyanide could also find several uses in the chemical industry, such as an additive (<5%) in dyes, including optical brighteners, agricultural chemicals, pharmaceutricals, chelating or sequestering agents. Finally, sodium cyanide, along with CaCl2, find also used in the treatment of wood chips.
In this dataset, the raw material inputs, and process-specific material exchanges, are modelled with a generic stoichiometry-based tool, using literature or estimated yields. The emissions are modelled with a default value, which is estimated based on losses, unreacted chemicals, among others. At the same time, the energy consumption is based on data from literature sources. Finally, the auxiliary (i.e., cooling water and infrastructure) exchanges are modelled with a default value based on industry data from literature sources. For more information on the calculations refer to the sampling procedure.
References:
Kirk, Raymond E., Donald F. Othmer, and Charles A. Mann. "Encyclopedia of Chemical Technology." 2004.
Ullmann's encyclopedia of industrial chemistry (2004).

## Included activities start
The activity starts when the raw materials enter the process.

## Included activities end
The activity ends with sodium cyanide being ready for further transformation or transportation at the production site gate. Materials entering the process are included as well as energy uses, infrastructure and emissions.

## Geography
The inventory is modelled for Europe. The main material inputs and outputs of this activity are generated with on a generic stoichiometry-based model, using literature or estimated yields. Furthermore, the source of information for the heat and electricity inputs is literature data for the specific technology. Finally, the main source of information for the values for water (process and cooling), nitrogen, chemical factory is industry data from the GENDORF Chemical Park, which is based in Germany and produced an average of 2462760 tonnes of chemical substances in the years 2015-2019. For more information on the calculations refer to the sampling procedure.
The dataset could also be considered as not geography-specific, and thus, valid for a broader geographical coverage.
References:
Hischier, R. (2005) Establishing Life Cycle Inventories of Chemicals Based on Differing Data Availability (9 pp). The International Journal of Life Cycle Assessment, Volume 10, Issue 1, pp 59-67. 10.1065/lca2004.10.181.7
Chemiepark GENDORF, Umwelterklärung 2016, https://www.gendorf.de/Nachbarn/Umweltschutz/Industrie%20und%20Nachhaltigkeit
Chemiepark GENDORF, Umwelterklärung 2017, https://www.gendorf.de/Nachbarn/Umweltschutz/Industrie%20und%20Nachhaltigkeit
Chemiepark GENDORF, Umwelterklärung 2020, https://www.gendorf.de/Nachbarn/Umweltschutz/Industrie%20und%20Nachhaltigkeit
Kim, Seungdo, and Michael Overcash "Energy in chemical manufacturing processes: gate‐to‐gate information for life cycle assessment." Journal of Chemical Technology & Biotechnology: International Research in Process, Environmental & Clean Technology 78.9 (2003): 995-1005.

## Technology
Production from sodium hydroxide and hydrogen cyanide by neutralization, the efficiency of which is very high (if the raw materials are sufficiently pure (Kirk, 2004)), attaining a yield >99%, and only minimal losses occur (Ulmann, 2004).
Reaction:
HCN + NaOH → NaCN + H2O, ΔH = 460 kJ
Modern commercial facilities use purified anhydrous liquid hydrogen cyanide as raw material, that reacts with a 50% solution of sodium hydroxide. Furthermore, high capacity plants generate high purity sodium cyanide via evaporation of water and crystallization (Kirk, 2004). A crucial aspect is the system's control to maximize the sodium formate formation by avoiding the hydrogen cyanide polymer formation.
In this dataset, a yield of 99% was assumed, as per the literature mentioned above.
References:
Kirk, Raymond E., Donald F. Othmer, and Charles A. Mann. "Encyclopedia of Chemical Technology." 2004.
Ullmann's encyclopedia of industrial chemistry (2004).

## Time period
The time period spans from the earliest year from which at least one of the input values was obtained until 2022, but overall form the most realistic picture of the production. Besides, the activity is partly generated, in terms of material inputs and outputs, based on a generic stoichiometry-based model, using literature or estimated yields, which does not expect to change over time.
The source of information for the heat and electricity inputs is literature data (from 2003) for the specific technology. Finally, the main source of information for the values for water (process and cooling), nitrogen, chemical factory is industry data from the GENDORF Chemical Park. The values are a 5-year average of data from 2015 to 2019 published by the GENDORF Chemical Park, which is based in Germany and produced an average of 2462760 tonnes of chemical substances in the years 2015-2019. The end time period is therefore set based on the years from Gendorf reference.
For more information on the calculations refer to the sampling procedure and in the comments of the exchanges.
References:
Hischier, R. (2005) Establishing Life Cycle Inventories of Chemicals Based on Differing Data Availability (9 pp). The International Journal of Life Cycle Assessment, Volume 10, Issue 1, pp 59-67. 10.1065/lca2004.10.181.7
Chemiepark GENDORF, Umwelterklärung 2016, https://www.gendorf.de/Nachbarn/Umweltschutz/Industrie%20und%20Nachhaltigkeit
Chemiepark GENDORF, Umwelterklärung 2017, https://www.gendorf.de/Nachbarn/Umweltschutz/Industrie%20und%20Nachhaltigkeit
Chemiepark GENDORF, Umwelterklärung 2020, https://www.gendorf.de/Nachbarn/Umweltschutz/Industrie%20und%20Nachhaltigkeit
Kim, Seungdo, and Michael Overcash "Energy in chemical manufacturing processes: gate‐to‐gate information for life cycle assessment." Journal of Chemical Technology & Biotechnology: International Research in Process, Environmental & Clean Technology 78.9 (2003): 995-1005.

## Reference product
- sodium cyanide: 1 kg; name RP; By-product classification allocatable product; CPC 34270: Cyanides, cyanide oxides and complex cyanides; fulminates, cyanates and thiocyanates; silicates; borates; perb[…]; HS2017 283711: Cyanides and cyanide oxides; of sodium; CAS 143-33-9
  production volume 1.82252e8 kg; name RP_PV; = 1305.3 * 1e6 * (14040893546587 / 100562011134034)
    The provided European production volume is an estimated value as described below.
    The global demand of sodium cyanide amounted to 1305.3 kt in 2023, based on: Expert Market Research (<https://www.expertmarketresearch.com/>), available here: <https://www.globenewswire.com/en/news-release/2023/06/20/2691437/0/en/Sodium-Cyanide-Market-Size-Share-Analysis-Growth-Trends-Forecasts-2023-2028.html>, last accessed 23-09-2023.
    The European counterpart is estimated to be 110'504'024 kg, considering the nominal GDP of EU in 2022, equal to 14'040'893'546'587 US$ and in the World, equal to 100'562'011'134'034 US$, available here: <https://api.worldbank.org/v2/en/indicator/NY.GDP.MKTP.CD?downloadformat=excel> , last accessed 23-09.2023.
  property heating value, net 7.43 MJ
    LHV is calculated based on the elemental composition of the substance. Based on the CAS number of the substance (000143-33-9), the chemical formula of the substance is found to be: CNNa, (PubChem 2020). Reference: Kim, S., Chen, J., Cheng, T., Gindulyte, A., He, J., He, S., Li, Q., Shoemaker, B. A., Thiessen, P. A., Yu, B., Zaslavsky, L., Zhang, J., & Bolton, E. E. (2019). PubChem 2019 update: improved access to chemical data. Nucleic acids research, 47(D1), D1102–D1109. https://doi.org/10.1093/nar/gky1033
  property price 0.91 EUR2005
    Calculated value based on data from United Nations Commodity Trade Statistics Database (comtrade.un.org). UN comtrade category: 283711 Cyanides and cyanide oxides of sodium. Year 2005. Using exchange rate of 1EURO = 1.209 USD. Average of price of import into 5 main markets (EU, US, JP, IN and CN).
  properties: carbon allocation 0.244898 kg, carbon content 0.244898, carbon content, fossil 0.244898, carbon content, non-fossil 0, dry mass 1 kg, water content 0, water in wet mass 0 kg, wet mass 1 kg

## Inputs from technosphere
- chemical factory, organics: 4e-10 unit; lognormal variance with pedigree 0.3434, pedigree (2,4,2,4,4)
  Calculated based on literature data published by the industry. For this activity, no information was readily available concerning infrastructure and land-use. Therefore, the infrastructure is estimated based on data from two chemical factories, the BASF site of Ludwigshafen and the chemical factory in Gendorf (which are both located in Germany), which produce a wide range of chemical substances. Based on this data, the following assumptions are made: the built area amounts to about 4.2 ha, the plant has an average output of 50'000 t/a and a lifespan of fifty years. The estimated infrastructure amount is therefore 4.00 E-10 units per kg of produced chemical. References: Althaus H.-J., Chudacoff M., Hischier R., Jungbluth N., Osses M. and Primas A. (2007) Life Cycle Inventories of Chemicals. ecoinvent report No. 8, v2.0. EMPA Dübendorf, Swiss Centre for Life Cycle Inventories, Dübendorf, CH. Gendorf (2000) Umwelterklärung 2000, Werk Gendorf. Werk Gendorf, Burgkirchen.
- electricity, medium voltage: 2.44 kWh; lognormal variance with pedigree 0.0026, pedigree (2,3,2,1,2)
  Value reported by Kim, Seungdo, and Michael Overcash "Energy in chemical manufacturing processes: gate‐to‐gate information for life cycle assessment." Journal of Chemical Technology & Biotechnology: International Research in Process, Environmental & Clean Technology 78.9 (2003): 995-1005.
- heat, district or industrial, natural gas: 13.1 MJ; lognormal variance with pedigree 0.0026, pedigree (2,3,2,1,2)
  (same comment as for electricity, medium voltage)
  properties: heating value, net 1 MJ
- heat, from steam, in chemical industry: 1.41 MJ; lognormal variance with pedigree 0.0026, pedigree (2,3,2,1,2)
  Value reported by Kim, Seungdo, and Michael Overcash "Energy in chemical manufacturing processes: gate‐to‐gate information for life cycle assessment." Journal of Chemical Technology & Biotechnology: International Research in Process, Environmental & Clean Technology 78.9 (2003): 995-1005. Please note that Kim, Seungdo, and Michael Overcash reported the potential energy recovery of 0.54 MJ per kg of sodium cyanide produced.
  properties: heating value, net 1 MJ
- hydrogen cyanide: 0.562629 kg; lognormal variance with pedigree 0.0026, pedigree (2,3,2,1,2)
  Calculated value based on stoichiometric calculations and literature data. For more information on the calculations refer to the sampling procedure.
  properties: carbon content, fossil 0.444444, dry mass 1 kg, heating value, net 17.95 MJ, wet mass 1 kg
- sodium hydroxide, without water, in 50% solution state: 0.828508 kg; lognormal variance with pedigree 0.0026, pedigree (2,3,2,1,2)
  Calculated value based on stoichiometric calculations and literature data. For more information on the calculations refer to the sampling procedure.
  Uncertainty: estimation, based on stoechiometry
  properties: dry mass 1 kg, heating value, net 3.03 MJ, wet mass 1 kg
- wastewater, average: -9.01169e-6, -0.000358582 m3 (2 suppliers, which the file names only by identifier); sum of these -0.000367593 m3; lognormal variance with pedigree 0.002425, pedigree (2,3,1,2,2)
  (same comment as for hydrogen cyanide)
  production volume; = RP_PV * (WW / RP)
    Calculated from production volume of reference product using the relative outputs.
  properties: carbon content, non-fossil 0.194039, dry mass 0.346837 kg, mass concentration, TOC 0.1091 kg/m3, mass concentration, calcium 0.039453 kg/m3, mass concentration, chlorine 0.030031 kg/m3, mass concentration, hydrogen 0.013365 kg/m3, mass concentration, nitrogen 0.031015 kg/m3, mass concentration, oxygen 0.069824 kg/m3, mass concentration, sodium 0.06456 kg/m3, mass concentration, sulfur 0.015602 kg/m3, water content 2882.2, wet mass 1000 kg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
  note on carbon content, non-fossil: 0.0673 kg TOC/m3 (Tab A.17, ecoinvent v2.2 report 13_I). TOC was considered as Total Carbon.

## Inputs from nature
- Water, cooling, unspecified natural origin [natural resource, in water]: 0.014707 m3; lognormal variance with pedigree 0.044, pedigree (2,4,2,4,4)
  Calculated based on literature data published by the GENDORF Chemical Park. The factory produced an average of 2462760 tonnes of chemical substances (including intermediates) per year in the years 2015-2019. The average amount of cooling water released in the years 2015-2019 was 34408800 t per year. It was assumed that 5% of the cooling water was emitted to air during its use, therefore, to calculate the input of cooling water, the output value reported by GENDORF was scaled up by the factor 1/0.95. This equals 0.014707 m3/kg chemical produced. References: Chemiepark GENDORF, Umwelterklärung 2016, https://www.gendorf.de/Nachbarn/Umweltschutz/Industrie%20und%20Nachhaltigkeit Chemiepark GENDORF, Umwelterklärung 2017, https://www.gendorf.de/Nachbarn/Umweltschutz/Industrie%20und%20Nachhaltigkeit Chemiepark GENDORF, Umwelterklärung 2020, https://www.gendorf.de/Nachbarn/Umweltschutz/Industrie%20und%20Nachhaltigkeit
- Water, river [natural resource, in water]: 0.00096543 m3; lognormal variance with pedigree 0.044, pedigree (2,4,2,4,4)
  Calculated based on literature data published by the GENDORF Chemical Park. The factory produced an average of 2462760 tonnes of chemical substances (including intermediates) per year in the years 2015-2019. The average consumption of river water in the years 2015-2019 was 22000820 t per year. However, since the cooling water is modelled as an input, the amount of river water was adjusted to avoid double counting. 55% of the input amount of cooling water was deducted from the amount of river water, as that is the share of river water versus well water. This equals 0.00096543 m3/kg chemical produced. References: Chemiepark GENDORF, Umwelterklärung 2016, https://www.gendorf.de/Nachbarn/Umweltschutz/Industrie%20und%20Nachhaltigkeit Chemiepark GENDORF, Umwelterklärung 2017, https://www.gendorf.de/Nachbarn/Umweltschutz/Industrie%20und%20Nachhaltigkeit Chemiepark GENDORF, Umwelterklärung 2020, https://www.gendorf.de/Nachbarn/Umweltschutz/Industrie%20und%20Nachhaltigkeit
- Water, well, in ground [natural resource, in water]: 0.00081652 m3; lognormal variance with pedigree 0.044, pedigree (2,4,2,4,4)
  Calculated based on literature data published by the GENDORF Chemical Park. The factory produced an average of 2462760 tonnes of chemical substances (including intermediates) per year in the years 2015-2019. The average consumption of well water in the years 2015-2019 was 18607480 t per year. However, since the cooling water is modelled as an input, the amount of well water was adjusted to avoid double counting. 45% of the input amount of cooling water was deducted from the amount of well water, as that is the share of well water versus river water. This equals 0.00081652 m3/kg chemical produced. References: Chemiepark GENDORF, Umwelterklärung 2016, https://www.gendorf.de/Nachbarn/Umweltschutz/Industrie%20und%20Nachhaltigkeit Chemiepark GENDORF, Umwelterklärung 2017, https://www.gendorf.de/Nachbarn/Umweltschutz/Industrie%20und%20Nachhaltigkeit Chemiepark GENDORF, Umwelterklärung 2020, https://www.gendorf.de/Nachbarn/Umweltschutz/Industrie%20und%20Nachhaltigkeit

## Emissions to nature
- Carbon dioxide, fossil [air, urban air close to ground]: 0.0129261 kg; lognormal variance with pedigree 0.004, pedigree (3,3,2,1,2)
  Calculated losses, based on the boiling point of a chemical, to water or to air. In addition, unreacted chemicals are assumed to go to wastewater treatment, which has a conversion rate in biological treatment of 95% of carbon into carbon dioxide. The remaining 5% are released as emissions to water.
- Water [air, unspecified]: 0.00147008 m3; lognormal variance with pedigree 0.0834, pedigree (2,4,2,4,4)
  Calculated based on literature data published by the GENDORF Chemical Park. The factory produced an average of 2462760 tonnes of chemical substances (including intermediates) per year in the years 2015-2019. To determine the emissions of water to air, the difference of all water inputs (from river, well, tap water and cooling) and outputs (wastewater, emissions to water) was calculated. The average ouput of water to air in the years 2015-2019 was 3620444 m3 per year. This equals 0.00147 m3/kg chemical produced. For more information on the other water exchanges please consult the respective exchange comment. References: Chemiepark GENDORF, Umwelterklärung 2016, https://www.gendorf.de/Nachbarn/Umweltschutz/Industrie%20und%20Nachhaltigkeit Chemiepark GENDORF, Umwelterklärung 2017, https://www.gendorf.de/Nachbarn/Umweltschutz/Industrie%20und%20Nachhaltigkeit Chemiepark GENDORF, Umwelterklärung 2020, https://www.gendorf.de/Nachbarn/Umweltschutz/Industrie%20und%20Nachhaltigkeit
  property fraction, origin: fresh water 0; name fraction_origin_fresh_water
  property fraction, origin: salt water 0; name fraction_origin_salt_water
  property fraction, origin: unspecified 1; name fraction_origin_unspecified
- BOD5, Biological Oxygen Demand [water, unspecified]: 0.00108592 kg; lognormal variance with pedigree 0.218, pedigree (4,5,5,5,5)
  Calculated value. The BOD, COD, TOC and BOD5 are calculated based on the amount and type of emissions released to water in the same activity.
- COD, Chemical Oxygen Demand [water, unspecified]: 0.00108592 kg; lognormal variance with pedigree 0.218, pedigree (4,5,5,5,5)
  (same comment as for BOD5, Biological Oxygen Demand)
- Cyanide [water, unspecified]: 0.000402192 kg; lognormal variance with pedigree 0.004, pedigree (3,3,2,1,2)
  (same comment as for Carbon dioxide, fossil)
- DOC, Dissolved Organic Carbon [water, surface water]: 0.0001855 kg; lognormal variance with pedigree 0.218, pedigree (4,5,5,5,5)
  (same comment as for BOD5, Biological Oxygen Demand)
- Sodium I [water, surface water]: 0.000355384 kg; lognormal variance with pedigree 0.004, pedigree (3,3,2,1,2)
  (same comment as for Carbon dioxide, fossil)
- TOC, Total Organic Carbon [water, surface water]: 0.0001855 kg; lognormal variance with pedigree 0.218, pedigree (4,5,5,5,5)
  Calculated value. The BOD, COD, TOC and BOD5 are calculated based on the amount and type of emissions released to water in the same activity.
  Uncertainty: estimation
- Water [water, unspecified]: 0.0150391 m3; lognormal variance with pedigree 0.0834, pedigree (2,4,2,4,4)
  Calculated based on literature data published by the GENDORF Chemical Park. The factory produced an average of 2462760 tonnes of chemical substances (including intermediates) per year in the years 2015-2019. The amount of water released back to the environment consists of the sum of the amount of process water treated in the internal WWTP that is then released back to the environment and the amount of cooling water released back to the environment. The average ouput of the internal WWTP in the years 2015-2019 was 2628800 m3 and that of cooling water released back to the environment was 34408800 m3. This gives a yearly average of 37037600 m3 emissions of water to water. This equals 0.01504 m3/kg chemical produced. References: Chemiepark GENDORF, Umwelterklärung 2016, https://www.gendorf.de/Nachbarn/Umweltschutz/Industrie%20und%20Nachhaltigkeit Chemiepark GENDORF, Umwelterklärung 2017, https://www.gendorf.de/Nachbarn/Umweltschutz/Industrie%20und%20Nachhaltigkeit Chemiepark GENDORF, Umwelterklärung 2020, https://www.gendorf.de/Nachbarn/Umweltschutz/Industrie%20und%20Nachhaltigkeit
  property carbon content, fossil 0; name C_content_fossil
  property carbon content, non-fossil 0; name C_content_non_fossil
  property dry mass 0 kg; name DM
  property fraction, origin: fresh water 0; name fraction_origin_fresh_water_Ww
  property fraction, origin: salt water 0; name fraction_origin_salt_water_Ww
  property fraction, origin: unspecified 1; name fraction_origin_unspecified_Ww
  property water in wet mass 1000 kg; name WWM
  property wet mass 1000 kg; name WM

## Sampling procedure
Literature data and stoichiometric calculation. This inventory is partially based on a generic model of the production of chemicals. The data generated by this model have been improved with compound-specific data when available. The model of the production of chemicals is using specific industry or literature data wherever possible and more generic data on chemical production processes to fill compound-specific data gaps when necessary. The basic principles of the model have been published in literature (Hischier, 2005). The model has been updated and extended with newly available data from the chemical industry. In the model, unreacted fractions are treated in a waste treatment process, and emissions reported are after a waste treatment process that is included in the scope of this dataset. For volatile reactants, a small level of evaporation is assumed. Solvents and catalysts are mostly recycled in closed-loop systems within the scope of the dataset and reported flows are for losses from this system.
The source of information for the heat and electricity inputs is literature data (from 2003) for the specific technology. Finally, the main source of information for the values for water (process and cooling), nitrogen, and chemical factory is industry data from the GENDORF Chemical Park. The values are a 5-year average of data from 2015 to 2019 published by the GENDORF Chemical Park, which is based in Germany and produced an average of 2462760 tonnes of chemical substances in the years 2015-2019. For more information refer to the comments of the exchanges.

References:
Hischier, R. (2005) Establishing Life Cycle Inventories of Chemicals Based on Differing Data Availability (9 pp). The International Journal of Life Cycle Assessment, Volume 10, Issue 1, pp 59-67. 10.1065/lca2004.10.181.7
Chemiepark GENDORF, Umwelterklärung 2016, https://www.gendorf.de/Nachbarn/Umweltschutz/Industrie%20und%20Nachhaltigkeit
Chemiepark GENDORF, Umwelterklärung 2017, https://www.gendorf.de/Nachbarn/Umweltschutz/Industrie%20und%20Nachhaltigkeit
Chemiepark GENDORF, Umwelterklärung 2020, https://www.gendorf.de/Nachbarn/Umweltschutz/Industrie%20und%20Nachhaltigkeit
Kim, Seungdo, and Michael Overcash "Energy in chemical manufacturing processes: gate‐to‐gate information for life cycle assessment." Journal of Chemical Technology & Biotechnology: International Research in Process, Environmental & Clean Technology 78.9 (2003): 995-1005.
