# nutrient supply from potash salt

Dataset: EcoSpold 2, unit process
Geography: RER
Time period: 2016-01-01 to 2023-12-31
Technology level: current
Classification: ISIC rev.4 ecoinvent: 0161:Support activities for crop production
Scenario: Business-as-Usual
System model: Allocation, cut-off by classification
Generated by: Avraam Symeonidis
Database: ecoinvent
isCopyrightProtected: true
accessRestrictedTo: 1

## General comment
This inventory describes the supply of nutrients from ''potash salt'' for fertiliser use.
No machinery expenditures or emissions to the environment are considered related to the actual application of this substance on soil during its agricultural use. The purpose of this activity is to connect the chemical production of ''potash salt'' with its generic use as fertilizer. The product ''potash salt'' is connected to the generic market for ''inorganic potassium fertiliser, as K2O'' through this supplying activity. In the agricultural context, ''potash salt'' can be used directly as a fertilizer input to crop production, eventually with other chemicals; alternatively, a generic input of ''inorganic potassium fertiliser, as K2O'' can be used instead, and this will represent the regional consumption mix for his type of nutrient. A way in between is allowed by using the generic input ''inorganic potassium fertiliser, as K2O'' and link to the activity providing it from a specific chemical.
In all cases, emissions associated to the application of the fertilizer have to be calculated in the crop production activity.

## Technology
Inventory based on composition of ''potash salt''.

## Reference product
- inorganic potassium fertiliser, as K2O: 1 kg; name RP; By-product classification allocatable product; CPC 3463: Mineral or chemical fertilizers, potassic; HS2017 310420: Fertilizers, mineral or chemical; potassic, potassium chloride
  production volume 2.6019e7 kg; = 20354000*1000*0.05*0.1*0.255664316966328
    The production volume has been extrapolated from the global production volume of this product in the database by employing GDP scaling. GDP for Europe is calculated to amount circa 25.6% of the global GDP. Original comment of the GLO dataset is: Estimation from production volume in the respective producing activity. Assuming that 5% is used directly in agriculture.References: United Nations, Statistics division, 2020, GDP/breakdown at current prices in US Dollars (all countries and regions), All countries and regions/subregions (totals) for all years - sorted by region/subregion,
    Available at: https://unstats.un.org/unsd/snaama/Downloads
  property carbon content, fossil 0
    Carbon content, fossil is calculated based on the chemical formula of the substance.
  property oxygen content 0.169852
    Oxygen content (on a dry matter basis) of inorganic potassium fertiliser, as K2O is calculated from the molecular formula of the substance (Potassium).
  property potassium content 0.830148
    Potassium content (on a dry matter basis) of inorganic potassium fertiliser, as K2O is calculated from the molecular formula of the substance (Potassium).
  property price 0.188 EUR2005
    Temporary price data. Calculated as 90% of purchasers price based on: 2004 import price calulated from FAOSTAT (http://faostat.fao.org/site/575/DesktopDefault.aspx?PageID=575#ancor [accessed 2011.01.27] Potash Fertilizers (K20 total nutrients) in kUSD/Mg
  properties: carbon allocation 0 kg, carbon content 0, carbon content, non-fossil 0, dry mass 1 kg, water content 0, water in wet mass 0 kg, wet mass 1 kg

## Inputs from technosphere
- potash salt: 10 kg; lognormal variance with pedigree 0.172, pedigree (3,5,3,1,4)
  properties: dry mass 1 kg, oxygen content 0.0169852, potassium content 0.0830148, wet mass 1 kg
  note on oxygen content: Oxygen content (on a dry matter basis) of potash salt is calculated from the molecular formula of the substance ().
  note on potassium content: Potassium content (on a dry matter basis) of potash salt is calculated from the molecular formula of the substance ().
