# cement production, Portland Slag

Dataset: EcoSpold 2, unit process
Geography: IN
Time period: 2014-04-01 to 2023-12-31
Technology level: current
Classification: ISIC rev.4 ecoinvent: 2394:Manufacture of cement, lime and plaster
Synonyms: Portland Slag Cement; PSC
Scenario: Business-as-Usual
System model: Allocation, cut-off by classification
Share of production covered: 60 %
Generated by: P V Kiran Ananth
Published in: Kiran Ananth P. V. 2017
Database: ecoinvent
isCopyrightProtected: true
accessRestrictedTo: 1

## General comment
The total installed capacity of cement in india during the year 2014-15 is 390 million tonnes. Total cement production during same year was 270.93 million tonnes. As per the goverment statistics cement industry grew at 5.6% in 2014-15. Cement industry is likely to grow in coming years due to various initiative of goverment of India like National highway project, 100 smart city, housing for all etc. Indian cement plant are most energy efficienct in the word.There thermal and electrical energy consumption is lower than the word. In India, various types of cements are manufactured like ordinary portland cement, pozzolana portland cement, portland slag cement, white cement etc. Portland slag cement manufactured by mixing and grinding of clinker, slag and gypsum in certain proportion.

## Included activities start
Activity starts from clinker storage in Silo. It includes Clinker and additives blending and grinding in cement mill, slag drying, internal transportation etc.

## Included activities end
This activity ends with the cement produced in the cement mill. The dataset does not include packaging and administration.

## Geography
Data represents for all geographical locations where cement has been manufactured in India.

## Technology
For this activity latest available technologies were considered like Vertical roller mill, energy efficient fans etc. In India portland slag cement manufactured in two ways. Either clinker, slag and additives mix and grind together or clinker, slag grinde separately and then mixed with additives.

## Time period
For this activity time period of 2014 to 2017 has been considered . As during this period many cement plants are adding slag more than 50%. Also during this period Indian cement industry has done significant works in improving energy efficiency by installing energy efficient equipment, process optimization, equipment retrofit etc.

## Reference product
- cement, Portland Slag: 1 kg; name cement; By-product classification allocatable product; CPC 3744: Portland cement, aluminous cement, slag cement and similar hydraulic cements, except in the form of clinkers; HS2017 252329: Cement; portland, other than white, whether or not artificially coloured
  Primary data collected from 20 cement manufacturing units. The value has been calculated as a weighted average with respect to production volume.
  production volume 2.366e10 kg; = 338000*10^6*7%
    Total production volume of hydraulic cement in India in 2019: 338'000'000 ton. Source: USGS (2019). U.S. Geological Survey, Minerals Yearbook Annual Tables, 2019. Available at: https://www.usgs.gov/centers/national-minerals-information-center/cement-statistics-and-information
    Portland slag cement share in total cement production is 7% for year 2012. Source: ATKearney & CII - Cement vision 2025: Scaling new heights.
  property carbon content, fossil 0; name cement_C_content_fossil
    fossil carbon content on a dry matter basis
  property carbon content, non-fossil 0; name cement_C_content_non_fossil
    biogene carbon content on a dry matter basis
  property dry mass 1 kg; name cement_DM
  property price 0.0615 EUR2005
    2005 import and export prices (total trades (USD) divided by total weight (kg) in China, India, USA, Japan, Russia and Europe, major producers and consumers (http://www.cementchina.net/freport/showfre.asp?id=749) from UN Commodity Trade Statistics Database (http://data.un.org/Explorer.aspxDatabase [Accessed 2 July 2010]). Commodity: Cement (portland, aluminious, slag or hydraulic)
  property water content 0; name cement_water_content
  property water in wet mass 0 kg; name cement_WWM
  property wet mass 1 kg; name cement_WM
  properties: carbon allocation 0 kg, carbon content 0

## Inputs from technosphere
- cement factory: 5.36e-11 unit; = 5.36e-11* cement; source Kellenberger D. 2007; lognormal variance with pedigree 0.3092, pedigree (2,1,4,4,1)
  Extrapolated value, based on "cement production, portland, blast furnace slag GLO" dataset. India specific data not available.
  Uncertainty: Variance of log-transformed data was taken from ecoinvent report no 1, table 10.3. Value represents demand of infrastructure for input/output group c.
- clinker: 0.496 kg; = 0.496* cement; lognormal variance with pedigree 0.001525, pedigree (2,2,2,2,1)
  Primary data collected from 20 cement manufacturing units. The value has been calculated as a weighted average with respect to production volume.
  Uncertainty: Variance of log-transformed data was taken from ecoinvent report no 1, table 10.3. Value represents demand of products, electricity etc. for input/output group c.
  properties: dry mass 1 kg, wet mass 1 kg
- electricity, medium voltage: 0.03598 kWh; = 0.03598* cement; lognormal variance with pedigree 0.041525, pedigree (2,2,2,2,4)
  (same comment as for clinker)
- ethylene glycol: 0.00021 kg; = 2.1e-4* cement; source Kellenberger D. 2007; lognormal variance with pedigree 0.0606, pedigree (3,5,4,5,4)
  Extrapolated value, based on "cement production, portland, blast furnace slag GLO" dataset. India specific data not available.
  Uncertainty: Variance of log-transformed data was taken from ecoinvent report no 1, table 10.3. Value represents demand of products, electricity etc. for input/output group c.
  properties: carbon content, fossil 0.387097, dry mass 1 kg, heating value, net 23.44 MJ, wet mass 1 kg
- ground granulated blast furnace slag: 0.468 kg; name GGBFS; = 0.468* cement; lognormal variance with pedigree 0.0113, pedigree (3,3,4,3,1)
  (same comment as for clinker)
  property carbon content, fossil 0; name GGBFS_C_content_fossil
  property carbon content, non-fossil 0; name GGBFS_C_content_non_fossil
  property water content 0; name GGBFS_water_content
  property water in wet mass 0 kg; name GGBFS_WWM
  properties: dry mass 1 kg, wet mass 1 kg
- gypsum, mineral: 0.036 kg; = 0.036* cement; lognormal variance with pedigree 0.0113, pedigree (3,3,4,3,1)
  (same comment as for clinker)
  properties: dry mass 1 kg, wet mass 1 kg
- heat, district or industrial, other than natural gas: 0.158643 MJ; = 0.33898*GGBFS; lognormal variance with pedigree 0.1269, pedigree (2,2,2,1,5)
  Moisture content in slag 15%. Generally in Indian for integrated plant to remove moisture from slag waste heat from clinkerisation process is used.
  property corresponding fuel use, propane, furnace >100kW 0 MJ; name fuel_use
  properties: heating value, net 1 MJ
  note on corresponding fuel use, propane, furnace >100kW: Lower heating value of the fuel input related to the heat/electricity output, taken directly from ecoinvent v3.0 dataset "heat production, natural gas, at industrial furnace >100kW, GLO 2000".
- steel, low-alloyed: 0.00011 kg; name steel; = 0.00011* cement; source Kellenberger D. 2007; lognormal variance with pedigree 0.0606, pedigree (3,5,4,5,4)
  (same comment as for ethylene glycol)
  properties: carbon content, fossil 0.005, dry mass 1 kg, wet mass 1 kg

## Sampling procedure
For this activity sample questionnaire has been prepared and circulated to all cement manufacturing units in India. Here we have selected clusterwise approch for collecting the data. Due to clusterwise approch variation in quality of raw material , different technologies etc. has taken care. After receiving the data from plants same has been analysed for any discripancies. Extreme minimum and maximum values reported by plants were removed. Final numbers were checked with cement industry expert.

## Extrapolations
Data represents for 60% of the total installed cement capacity in the year of 2014-15.
