# selective coating, stainless steel sheet, black chrome

Dataset: EcoSpold 2, unit process
Geography: RoW
Time period: 2001-01-01 to 2023-12-31
Technology level: current
Classification: EcoSpold01Categories: metals/refinement
Classification: ISIC rev.4 ecoinvent: 2592:Treatment and coating of metals; machining
Tags: ConvertedDataset
Scenario: Business-as-Usual
System model: Allocation, cut-off by classification
Share of production covered: 100 %
Generated by: Niels Jungbluth
Published in: Althaus H.-J. 2000
Database: ecoinvent
isCopyrightProtected: true
accessRestrictedTo: 1

## General comment
Inventory for selective coatings of solar absorbers. For black chrome and black nickel the solar absorbance is a=0.91~0.98 and thermal emittance is e=0.06~0.14.
[This dataset was already contained in the ecoinvent database version 2. It was not individually updated during the transfer to ecoinvent version 3. Life Cycle Impact Assessment results may still have changed, as they are affected by changes in the supply chain, i.e. in other datasets. This dataset was generated following the ecoinvent quality guidelines for version 2. It may have been subject to central changes described in the ecoinvent version 3 change report (http://www.ecoinvent.org/database/ecoinvent-version-3/reports-of-changes/), and the results of the central updates were reviewed extensively. The changes added e.g. consistent water flows and other information throughout the database. The documentation of this dataset can be found in the ecoinvent reports of version 2, which are still available via the ecoinvent website. The change report linked above covers all central changes that were made during the conversion process.]

## Included activities start
The activity starts with the sheet entering the process. The material on which this activity is applied it is not included as input.

## Included activities end
Gate to gate inventory for the process including infrastructure. No information for waste and packages.

## Geography
Production plant data for CH.

## Technology
Black chrome coating. The main process stages used for the process are: Cleaning with electrolytic wash bath at ambient temperature (20°C), Activation, Black coating at ambient temperature (20°C), Recuperation baths, Reduction bath

## Time period
Environmental report.

## Parameters
- fraction, process water, to air: 0.15 dimensionless; name fraction_PW_to_air; lognormal variance with pedigree 0.092025, pedigree (4,4,3,2,4)
- fraction, tap water, to air: 0.15 dimensionless; name fraction_TW_to_air; lognormal variance with pedigree 0.092025, pedigree (4,4,3,2,4)

## Reference product
- selective coat, stainless steel sheet, black chrome: 1 m2; By-product classification allocatable product; CPC 41117: Granules and powders, of pig iron and spiegeleisen, or steel; HS2017 720510: Iron or steel, pig iron, spiegeleisen; granules thereof
  EcoSpold01Location=CH
  production volume 436000 m2
    Upscaled with a factor 3.18 from the EU production volume of 1.2 Mio. m2 per year according to Ecoinvent v.2 report 10, section 8.2. Equally distributed over the 6 types of 'selective coating'.
  property price 0.262284 EUR2005
    Calculated based on inputs: The price of the product has been calculated as a sum of the values of the material and energy inputs for this product. This value is therefore a rough estimation. It may underestimate the real price since there are additional expenses when producing any product. These expences can include for example labour costs, treatment of waste materials and profit for the producer. Please consider carefully whether this level of data quality is acceptable for your application.
  properties: carbon allocation 0 kg, carbon content 0

## Inputs from technosphere
- chromium trioxide, flakes: 0.035 kg; lognormal variance with pedigree 0.0427, pedigree (2,2,5,5,1)
  Questionnaire, coating, wastes are recycled
  EcoSpold01Location=RER
  Uncertainty: Questionnaire, coating, wastes are recycled
  properties: dry mass 1 kg, wet mass 1 kg
- electricity, medium voltage: 0.0377103, 0.752236, 0.252749, 0.0115482, 0.00231136, 0.0004963, 0.0525264, 0.07768, 0.162742 kWh (9 suppliers, which the file names only by identifier); sum of these 1.35 kWh; lognormal variance with pedigree 0.0427, pedigree (2,2,5,5,1)
  Questionnaire, electricity use for the process
  EcoSpold01Location=CH
  Uncertainty: Questionnaire, electricity use for the process
- hydrochloric acid, without water, in 30% solution state: 0.05 kg; lognormal variance with pedigree 0.0427, pedigree (2,2,5,5,1)
  EcoSpold01Location=RER
  Questionnaire, activation
  Uncertainty: Questionnaire, activation
  properties: dry mass 1 kg, heating value, net 3.32 MJ, wet mass 1 kg
- metal coating facility: 3.33e-7 unit; lognormal variance with pedigree 0.63, pedigree (5,5,5,5,5)
  Estimation
  EcoSpold01Location=RER
  Uncertainty: Estimation
- sodium hydroxide, without water, in 50% solution state: 0.095 kg; lognormal variance with pedigree 0.0427, pedigree (2,2,5,5,1)
  Questionnaire, wash bath
  EcoSpold01Location=RER
  Uncertainty: Questionnaire, wash bath
  properties: dry mass 1 kg, heating value, net 3.03 MJ, wet mass 1 kg
- sodium sulfate, anhydrite: 0.03 kg; lognormal variance with pedigree 0.0607, pedigree (2,2,5,5,3)
  Questionnaire, sodium bisulfite, reduction of Cr
  EcoSpold01Location=RER
  Uncertainty: Questionnaire, sodium bisulfite, reduction of Cr
  properties: dry mass 1 kg, wet mass 1 kg
- sulfuric acid: 0.005 kg; lognormal variance with pedigree 0.0427, pedigree (2,2,5,5,1)
  Questionnaire, Ph correction
  EcoSpold01Location=RER
  Uncertainty: Questionnaire, Ph correction
  properties: dry mass 1 kg, wet mass 1 kg
- tap water: 0.010365, 0.0158006, 0.0294831, 0.0794253, 0.00956067, 0.398428, 4.55942, 3.39752 kg (8 suppliers, which the file names only by identifier); sum of these 8.5 kg; source Benveniste, G. 2007; lognormal variance with pedigree 0.0546, pedigree (3,3,5,5,1)
  Questionnaire, water is evaporated.
  Calculated based on literature, (Vionnet, S., Quantis Water Database - Technical Report, 2012). Thickness of the coating layer is 2microm. The process starts when untreated surface enters the coating plant. It includes the processes: pre-treatment (cleaning) and coating itself.
  Questionnaire, water is evaporated.
  Calculated based on literature, (Vionnet, S., Quantis Water Database - Technical Report, 2012). Thickness of the coating layer is 2£m. The process starts when untreated surface enters the coating plant. It includes the processes: pre-treatment (cleaning) and coating itself.
  EcoSpold01Location=RER
  Uncertainty: Questionnaire, water is evaporated.
  properties: carbon content, fossil 0.00178991, dry mass 0.000337476 kg, water content 2962.17, wet mass 1 kg
  note on carbon content, fossil: Bicarbonate content is 2.93 mol/m3. CO2 content is 0.1 mol/m3 (ecoinvent v2.2 report 8, Tab 93.1).

## Emissions to nature
- Water [air, unspecified]: 0.001275 m3; name water_to_air_unspecified; lognormal variance with pedigree 0.0827, pedigree (2,2,5,5,1)
  Calculated value based on literature values and expert opinion. See comments in the parametres' comment field.
  property fraction, origin: fresh water 1; name fraction_origin_fresh_water
  property fraction, origin: salt water 0; name fraction_origin_salt_water
  property fraction, origin: unspecified 0; name fraction_origin_unspecified
- Water [water, unspecified]: 0.007225 m3; name water_to_water_unspecified; lognormal variance with pedigree 0.0827, pedigree (2,2,5,5,1)
  (same comment as for Water)
  property carbon content, fossil 0; name C_content_fossil
  property carbon content, non-fossil 0; name C_content_non_fossil
  property dry mass 0 kg; name DM
  property fraction, origin: fresh water 1; name fraction_origin_fresh_water_Ww
  property fraction, origin: salt water 0; name fraction_origin_salt_water_Ww
  property fraction, origin: unspecified 0; name fraction_origin_unspecified_Ww
  property water in wet mass 1000 kg; name WWM
  property wet mass 1000 kg; name WM

## Sampling procedure
Personal communication.

## Extrapolations
This dataset has been copied from an original dataset covering the geography CH. The uncertainty has been adjusted accordingly.

## Review by Hans-Jörg Althaus 2003-05-22
passed
