# hardwood forestry, eucalyptus ssp., planted forest management

Dataset: EcoSpold 2, unit process
Geography: RoW
Time period: 2012-01-01 to 2023-12-31
Technology level: current
Classification: ISIC rev.4 ecoinvent: 0210:Silviculture and other forestry activities
Synonyms: energy wood; wood fuel
Scenario: Business-as-Usual
System model: Allocation, cut-off by classification
Generated by: Leticia De Santi Barrantes
Database: ecoinvent
isCopyrightProtected: true
accessRestrictedTo: 1

## General comment
This dataset represents the production of 1 kg of eucalyptus wood fuel (fresh matter) from planted forest management. The actitivity lasts 14 years with 2 harvesting events. Specie mainly cultivated is E. urograndis.
References:
Canals, 2003: Contributions to LCA Methodology for Agricultural Systems. Site-dependency and soil degradation impact assessment: http://www.tdx.cat/handle/10803/3155
Nemecek & Schnetzer: Methods of assessment of direct field emissions for LCIs of agricultural production systems, Data v3.0 (2011): http://www.ecoinvent.org/fileadmin/talkpages/pages/01-01-crop-production/01_crop_production_-_direct_field_emissions___natural_resources_v1.1.pdf
Novais & Smyth (1999) Fósforo em solo e planta em condições tropicais. Viçosa: Universidade Federal de Viçosa, p. 399.
Novaes, Renan M. L. et al. (2017) Estimating 20-year land use change and derived CO2 emissions associated with crops, parture and forestry in Brazil and each of its 27 states. Global Change Biology, 2017, 1-13.
Nemecek T., Bengoa X., Lansche J., Mouron P., Riedener E., Rossi V. & Humbert S. (2015) Methodological Guidelines for the Life Cycle Inventory of Agricultural Products. Version 3.0, July 2015. World Food LCA Database (WFLDB). Quantis and Agroscope, Lausanne and Zurich, Switzerland.

## Included activities start
Activity starts with the establishment of the eucalyptus plantation in the first year, covers the maintenance during six years and the first harvesting in the seventh. Eucalyptus sprouts are conducted to regrowth and the same process is repited.

## Included activities end
The processing of wood is not performed as the final product are logs for energy. This activity ends with the logs at the forest road and includes time for drying in air before transportation. The dataset does not include the seedling production and the infrastructure of firebreaks and forest roads.

## Geography
The inventory is modelled as a weighted average of other geographies.

## Technology
Cultivation of wood to generate energy inside industries.

## Time period
Time period of the most of the data collected for this dataset.

## Parameters
- clay content into soil: 50 % (obsolete); name Clay_content; lognormal variance with pedigree 0.216, pedigree (5,5,5,5,5)
  This value represents the fraction of clay content into soil (%).
  Used in the SQCB-NO3 model for the calculation of leaching of NO3.
- land transformation to: 0.00298258 m2/kg; name T_t; lognormal variance with pedigree 0.008, pedigree (1,1,1,1,1)
  This value will be used to transform exchanges per ha to exchanges per kg of cleft timber. From Folegatti et al. (2016).
  Uncertainty: Variance of log-transformed data as recommended by Ecoinvent for "Land use, transformation" for agriculture.
- nitrogen in crop residues: 9002.98 kg N/ha; name Ncrop_residues; lognormal variance with pedigree 0.2106, pedigree (5,5,5,5,5)
  This value represents the nitrogen contained in the crop residues (kg N/ha). Used for the calculation of emissions of N2O to the air.
  From Barreto et al. (2008).
- nitrogen uptake by plant: 150 kg N/ha; name Nuptake_plant; lognormal variance with pedigree 0.2106, pedigree (5,5,5,5,5)
  This value represents the N taken by plant during its growth (kg N/ha). Used in the SQCB-NO3 model for the calculation of leaching of NO3.
  From Nemececk & Schnetzer (2011),
- organic nitrogen into soil: 7785 kg N/ha; name Norg_soil; lognormal variance with pedigree 0.2106, pedigree (5,5,5,5,5)
  Norg is the mass of organic nitrogen contained in the upper 50 cm of soil per ha. Naturally only a fraction of this mass is mineralised and, hence, available for uptake by plants and leaching to the ground water.
  This fraction is determined by the mineralisation rate, which is 1.6% here and implicitly included in the regression coefficient of the term Norg. Used in the SQCB-NO3 model for the calculation of leaching of NO3. From Gatto (2010).
- precipitation, annual: 1254 mm/year; name precipitation; lognormal variance with pedigree 0.2106, pedigree (5,5,5,5,5)
  This value represents the average annual precipitation in BR-SP.
  Used in the SQCB-NO3 model for the calculation of leaching of NO3.
- rooting depth: 2.5 m; name root_depth; lognormal variance with pedigree 0.2106, pedigree (5,5,5,5,5)
  This value represents the rooting depth of the crop (m).
  Used in the SQCB-NO3 model for the calculation of leaching of NO3.
  From Foelkel (2016).
- soil eroded: 7277.2 kg/ha.yr; name soil_eroded; lognormal variance with pedigree 0.2106, pedigree (5,5,5,5,5)
  This value represents the quantity of soil eroded in 14 years (kg/ha). Used for the calculation of P emissions through water erosion to surface water. From Silva et al. (2010).
- total liming: 900 kg/ha; name L_total; lognormal variance with pedigree 0.2106, pedigree (5,5,5,5,5)
  This value represents the total limestone applied (kg N/ha).
- total nitrogen: 131.03 kg/ha; name N_total; lognormal variance with pedigree 0.2106, pedigree (5,5,5,5,5)
  This value represents the total nitrogen in mineral fertilisers (kg N/ha).
- yield, hardwood, m3: 633.8 m³/ha; name yield; lognormal variance with pedigree 0.2106, pedigree (5,5,5,5,5)
  refers to the yield in the first harvest of the forest in 7th year plus the yield achieved in the second harvest in 14th year (20% lower)

## Reference product
- cleft timber, measured as dry mass: 1 kg; name REF_PRODUCT; By-product classification allocatable product; CPC 3110: Wood, sawn or chipped lengthwise, sliced or peeled, of a thickness exceeding 6 mm; railway or tramway sleepers […]; HS2017 4401: Fuel wood, in logs, billets, twigs, faggots or similar forms; wood in chip or particles; sawdust and wood was[...]
  1 kg of dry mass, including bark.
  production volume 8.44946e10 kg; = ((231000*0.3)+(17629000*0.8))*12.5*density
    According to the Forest Resources Development Service of FAO [http://www.fao.org/docrep/004/y2316e/y2316e0b.htm], there are 17860000 ha of eucalyptus plantations in the world in 2000. Assuming that 30% of eucalyptus wood produced in developed countries and 80% produced in developing countries have energy purposes [http://www.fao.org/docrep/005/y4450e/y4450e02.htm], the total annual production volume of eucalyptus for energy is around 97435937500 kg.
    MAY: 12.5 m³/ha*year [http://www.fao.org/docrep/004/ac121e/ac121e04.htm]
    Access in websites in 21 mar 2016.
  property basic density 522 kg/m3; name density
    Weighted average.
  property carbon content, fossil 0; name cleft_timber_C_content_fossil
    fossil carbon content on a dry matter basis
  property carbon content, non-fossil 0.494; name cleft_timber_C_content_non_fossil
    biogene carbon content on a dry matter basis
  property dry mass 0.75 kg; name cleft_timber_DM
  property heating value, gross 20.4556 MJ; name gross_energy
    According to Quirino et al. (2005).
  property price 0.073 EUR2005
    Calculated based on data from FAOSTAT (accessed 20140429). The price is calculated by using data on total world import quantity (m3) and import value (1000 USD), year 2005. 3411751 m3 of Wood Fuel Trd was imported in the world in 2005. The import value was 161229000 USD. The calculated price is thus (161229000/3411751=47.3*0.8=) 38.1 Euro/m3. The density of cleft timber, measured as dry mass is 541.2 kg/m3. The recalculated price is (1/541.2*38.1=) 0.07 Euro/kg. Using the same approach the calculated price for 2010 was 0.112 Euro/kg.
  property water in wet mass 0.25 kg; name cleft_timber_WWM
  property wet mass 1 kg; name cleft_timber_WM
  properties: carbon allocation 0.3705 kg, carbon content 0.494, heating value, net 14.46 MJ, water content 0.333333

## Inputs from technosphere
- ammonium nitrate: 0.000117352, 6.25553e-5, 0.000212357, 8.13878e-5 kg (4 suppliers, which the file names only by identifier); sum of these 0.000473652 kg; lognormal variance with pedigree 0.0072, pedigree (3,3,3,5,1)
  The exchange has been updated from 'ammonium nitrate, as N' into 'ammonium nitrate' and therefore its amount has been scaled (multiplied) from 0.0002 kg by 2.8573 kg of 'ammonium nitrate' per kg of 'ammonium nitrate, as N'. Original comment of the exchange is: Ammonium nitrate as source of N. N is applied through NPK-fertilizer and was converted using the NPK formulation. Amount for typical system from Folegatti et al. (2016).
  Original values per ha were attributed to total volume of wood produced per hectare (changing the reference product from ha to m3) and to density (changing the reference product from m3 to kg).
  properties: dry mass 1 kg, wet mass 1 kg
- ammonium sulfate: 0.000144847, 4.44487e-5 kg (2 suppliers, which the file names only by identifier); sum of these 0.000189296 kg; lognormal variance with pedigree 0.0072, pedigree (3,3,3,5,1)
  Ammonium sulfate as source of N. N is applied through NPK-fertilizer and was converted using the NPK formulation. Amount for typical system from Folegatti et al. (2016).
  Original values per ha were attributed to total volume of wood produced per hectare (changing the reference product from ha to m3) and to density (changing the reference product from m3 to kg).
  properties: dry mass 1 kg, wet mass 1 kg
- boric acid, anhydrous, powder: 2.23857e-5 kg; lognormal variance with pedigree 0.0107, pedigree (2,2,3,5,1)
  Boric acid as Boron fertiliser. Amount for typical system from Folegatti et al. (2016).
  Original values per ha were attributed to total volume of wood produced per hectare (changing the reference product from ha to m3) and to density (changing the reference product from m3 to kg).
  properties: dry mass 1 kg, wet mass 1 kg
- copper sulfate: 6.42952e-6 kg; lognormal variance with pedigree 0.0053, pedigree (2,2,3,5,1)
  Copper sulfate as copper fertiliser. Amount for typical system from Folegatti et al. (2016).
  Original values per ha were attributed to total volume of wood produced per hectare (changing the reference product from ha to m3) and to density (changing the reference product from m3 to kg).
  properties: dry mass 1 kg, wet mass 1 kg
- diesel, burned in agricultural machinery: 0.000122615 MJ; lognormal variance with pedigree 0.0053, pedigree (2,2,3,5,1)
  Related to Loading of harvested wood. Amount for typical system from Folegatti et al. (2016).
- diesel, burned in building machine: 0.00974941 MJ; lognormal variance with pedigree 0.3066, pedigree (3,3,3,5,1)
  Related to diesel for maintenance of forest road in the end of the first and second rotation period (7th and 14th year) PLUS the diesel consumed for maintenance of firebreaks (once a year) PLUS diesel consumed to loading the transport vehicles. Amount for typical system from Folegatti et al. (2016).
  Original values per ha were attributed to total volume of wood produced per hectare (changing the reference product from ha to m3) and to density (changing the reference product from m3 to kg).
  properties: heating value, net 1 MJ
- eucalyptus seedling, for planting: 0.00555062 unit; name seedling; lognormal variance with pedigree 0.0072, pedigree (3,3,3,5,1)
  Amount for typical system from Folegatti et al. (2016).
  Original values per ha were attributed to total volume of wood produced per hectare (changing the reference product from ha to m3) and to density (changing the reference product from m3 to kg).
  properties: carbon content, non-fossil 0.494, dry mass 0.6 kg, water content 0.666667, wet mass 1 kg
- fertilising, by broadcaster: 1.32644e-5 ha; lognormal variance with pedigree 0.0053, pedigree (2,2,3,5,1)
  Related to Fertilising and Limestone and gypsum application, respectively. Amount for typical system from Folegatti et al. (2016).
- glyphosate: 1.98854e-5 kg; lognormal variance with pedigree 0.0072, pedigree (3,3,3,5,1)
  (same comment as for eucalyptus seedling, for planting)
  properties: carbon content, fossil 0.214286, dry mass 1 kg, wet mass 1 kg
- gravel, crushed: 0.0182061, 6.26248e-6, 0.00474318, 9.48537e-5 kg (4 suppliers, which the file names only by identifier); sum of these 0.0230504 kg; lognormal variance with pedigree 0.0072, pedigree (3,3,3,5,1)
  Related to the input of gravel for maintenance of forest roads in the end of both rotation periods. Amount for typical system from Folegatti et al. (2016).
  Original values per ha were attributed to total volume of wood produced per hectare (changing the reference product from ha to m3) and to density (changing the reference product from m3 to kg).
  properties: dry mass 1 kg, wet mass 1 kg
- gypsum, mineral: 0.00132184, 2.78197e-6, 2.75972e-5, 6.19824e-6 kg (4 suppliers, which the file names only by identifier); sum of these 0.00135842 kg; lognormal variance with pedigree 0.0053, pedigree (2,2,3,5,1)
  Amount for typical system from Folegatti et al. (2016).
  Original values per ha were attributed to total volume of wood produced per hectare (changing the reference product from ha to m3) and to density (changing the reference product from m3 to kg).
  Uncertainty: Variance of log-transformed data as recommended by Ecoinvent for "Primary energy carriers, metals, salts" for agriculture.
  properties: dry mass 1 kg, wet mass 1 kg
- inorganic nitrogen fertiliser, as N: 5.64795e-10, 1.32533e-7, 1.57215e-8, 1.68823e-7, 3.86168e-8, 1.63538e-8, 1.50724e-7, 1.41536e-8, 9.92943e-8, 1.01579e-8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 kg (29 suppliers, which the file names only by identifier); sum of these 1.66772e-5 kg; lognormal variance with pedigree 0.0072, pedigree (3,3,3,5,1)
  Nitrogen fertiliser is representing monoammonium phosphate as source of N. N is applied through NPK-fertilizer and was converted using the NPK formulation. Amount for typical system from Folegatti et al. (2016).
  Original values per ha were attributed to total volume of wood produced per hectare (changing the reference product from ha to m3) and to density (changing the reference product from m3 to kg).
  properties: dry mass 1 kg, wet mass 1 kg
- inorganic phosphorus fertiliser, as P2O5: 2.64687e-6, 5.87512e-6, 5.08295e-5, 1.64038e-6, 4.02849e-7, 5.70458e-7, 1.4232e-6, 1.86932e-7, 9.16177e-7, 2.18437e-8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 kg (29 suppliers, which the file names only by identifier); sum of these 0.00035369 kg; lognormal variance with pedigree 0.0072, pedigree (3,3,3,5,1)
  (same comment as for eucalyptus seedling, for planting)
  properties: dry mass 1 kg, wet mass 1 kg
- lime: 0.00889301, 0.000768076 kg (2 suppliers, which the file names only by identifier); sum of these 0.00966109 kg; lognormal variance with pedigree 0.0072, pedigree (3,3,3,5,1)
  (same comment as for eucalyptus seedling, for planting)
  properties: carbon content, fossil 0.120005, dry mass 1 kg, wet mass 1 kg
- machine operation, diesel, >= 18.64 kW and < 74.57 kW, high load factor: 8.08792e-6 hour; lognormal variance with pedigree 0.0053, pedigree (2,2,3,5,1)
  Related to Weed control. Amount for typical system from Folegatti et al. (2016).
- machine operation, diesel, >= 74.57 kW, high load factor: 4.06424e-8 hour; lognormal variance with pedigree 0.0053, pedigree (2,2,3,5,1)
  Related to road grader. Amount for typical system from Folegatti et al. (2016).
- mulching: 1.7836e-5 ha; lognormal variance with pedigree 0.0053, pedigree (2,2,3,5,1)
  Related to Forestry mulcher. Amount for typical system from Folegatti et al. (2016).
  Uncertainty: Variance of log-transformed data as recommended by Ecoinvent for "Primary energy carriers, metals, salts" for agriculture.
- pesticide, unspecified: 6.08045e-7 kg; name pesticides; lognormal variance with pedigree 0.0072, pedigree (3,3,3,5,1)
  Related to the input of pesticide to aint control - sulfluramide (0.0323 kg) plus the pesticide to pre-emergent weed control - isoxaflutole (0.000 1kg). Amount for typical system from Folegatti et al. (2016).
  Original values per ha were attributed to total volume of wood produced per hectare (changing the reference product from ha to m3) and to density (changing the reference product from m3 to kg).
  properties: carbon content, fossil 0.486978, dry mass 1 kg, wet mass 1 kg
- planting: 5.06397e-7 ha; lognormal variance with pedigree 0.0053, pedigree (2,2,3,5,1)
  Related to Planting of eucalyptus seedlings. Amount for typical system from Folegatti et al. (2016).
  Uncertainty: Variance of log-transformed data as recommended by Ecoinvent for "Primary energy carriers, metals, salts" for agriculture.
- potassium chloride: 0.000130999, 0.00157959 kg (2 suppliers, which the file names only by identifier); sum of these 0.00171058 kg; lognormal variance with pedigree 0.0072, pedigree (3,3,3,5,1)
  The exchange has been updated from 'potassium chloride, as K2O' into 'potassium chloride' and therefore its amount has been scaled (multiplied) from 0.0011 kg by 1.5829 kg of 'potassium chloride' per kg of 'potassium chloride, as K2O'. Original comment of the exchange is: Potassium chloride as source of K2O. K2O is applied through NPK-fertilizer and was converted using the NPK formulation. Amount for typical system from Folegatti et al. (2016).
  Original values per ha were attributed to total volume of wood produced per hectare (changing the reference product from ha to m3) and to density (changing the reference product from m3 to kg).
  properties: dry mass 1 kg, wet mass 1 kg
- power sawing, with catalytic converter: 0.000113201 hour; lognormal variance with pedigree 0.0072, pedigree (3,3,3,5,1)
  Input covers hand-held gasoline-driven equipment used for open the hole where seedlings are planted (0.34 h/ha) and harvesting with chainsaw (0.74 h/ha). Amount for typical system from Folegatti et al. (2016).
  Original values per ha were attributed to total volume of wood produced per hectare (changing the reference product from ha to m3) and to density (changing the reference product from m3 to kg).
- skidding, skidder: 1.87227e-5 hour; lognormal variance with pedigree 0.0053, pedigree (2,2,3,5,1)
  Related to the extraction of wood from the harvesting place to the forest border. Amount for typical system from Folegatti et al. (2016).
  Uncertainty: Variance of log-transformed data as recommended by Ecoinvent for "Primary energy carriers, metals, salts" for agriculture.
- tap water: 4.6761e-5, 7.12831e-5, 0.000133011, 4.31323e-5, 0.00179748, 0.0205695, 0.0153597 kg (7 suppliers, which the file names only by identifier); sum of these 0.0380209 kg; lognormal variance with pedigree 0.0072, pedigree (3,3,3,5,1)
  Related to water consumption to dilution of pesticides and fertilizers applied with costal pump. Amount for typical system from Folegatti et al. (2016).
  Original values per ha were attributed to total volume of wood produced per hectare (changing the reference product from ha to m3) and to density (changing the reference product from m3 to kg).
  properties: carbon content, fossil 0.00178991, dry mass 0.000337476 kg, water content 2962.17, wet mass 1 kg
  note on carbon content, fossil: Bicarbonate content is 2.93 mol/m3. CO2 content is 0.1 mol/m3 (ecoinvent v2.2 report 8, Tab 93.1).
- tillage, harrowing, by offset disc harrow: 7.20724e-8 ha; lognormal variance with pedigree 0.0053, pedigree (2,2,3,5,1)
  Related to heavy tillage. Amount for typical system from Folegatti et al. (2016).
- tillage, ploughing: 9.2125e-7 ha; lognormal variance with pedigree 0.0053, pedigree (2,2,3,5,1)
  Related to Subsoiling with fertilizer application. Amount for typical system from Folegatti et al. (2016).
- transport, tractor and trailer, agricultural: 0.00560626, 2.27977e-5 metric ton*km (2 suppliers, which the file names only by identifier); sum of these 0.00562906 metric ton*km; lognormal variance with pedigree 0.1266, pedigree (3,3,3,5,1)
  Covers the extraction of wood from the harvest place to the border of the road. Amount for typical system from Folegatti et al. (2016).
  Original values per ha were attributed to total volume of wood produced per hectare (changing the reference product from ha to m3) and to density (changing the reference product from m3 to kg).
- urea: 0.000159466, 2.0168e-5, 2.50016e-5, 0.000136173 kg (4 suppliers, which the file names only by identifier); sum of these 0.000340808 kg; lognormal variance with pedigree 0.0053, pedigree (2,2,3,5,1)
  The exchange has been updated from 'urea, as N' into 'urea' and therefore its amount has been scaled (multiplied) from 0.0002 kg by 2.1438 kg of 'urea' per kg of 'urea, as N'. Original comment of the exchange is: Urea as source of N. N is applied through NPK-fertilizer and was converted using the NPK formulation. Amount for typical system from Folegatti et al. (2016).
  Original values per ha were attributed to total volume of wood produced per hectare (changing the reference product from ha to m3) and to density (changing the reference product from m3 to kg).
  properties: carbon content, fossil 0.2, dry mass 1 kg, wet mass 1 kg
- waste concrete gravel: -0.000194012, -0.0228564 kg (2 suppliers, which the file names only by identifier); sum of these -0.0230504 kg; lognormal variance with pedigree 0.0052, pedigree (3,3,1,5,1)
  Results from the input of gravel.
  production volume
    Calculated from production volume of reference product using the relative outputs.
  properties: dry mass 1 kg, wet mass 1 kg
- zinc: 4.07726e-6 kg; lognormal variance with pedigree 0.0053, pedigree (2,2,3,5,1)
  Zinc as Zinc fertiliser. Amount for typical system from Folegatti et al. (2016).
  Original values per ha were attributed to total volume of wood produced per hectare (changing the reference product from ha to m3) and to density (changing the reference product from m3 to kg).
  properties: dry mass 1 kg, wet mass 1 kg

## Inputs from nature
- Carbon dioxide, in air [natural resource, in air]: 1.31397 kg; source Nemecek, T. 2011; lognormal variance with pedigree 0.0986, pedigree (4,5,5,5,4)
  Resource input, referring to total biomass harvested, i.e. wood including bark. CO2 absorbed during photosyntesis. See "3.1 CO2 from the Atmosphere" in Nemececk & Schnetzer (2011).
- Energy, gross calorific value, in biomass [natural resource, biotic]: 20.4556 MJ; lognormal variance with pedigree 0.0986, pedigree (4,5,5,5,4)
  Calorific value of Eucalyptus wood.
- Occupation, forest, intensive [natural resource, land]: 0.499446 m2*year; lognormal variance with pedigree 0.0081, pedigree (3,2,3,5,1)
  Area occupied for the production of wood over two rotation periods.
- Transformation, from annual crop [natural resource, land]: 0.00100081 m2; source Novaes R. 2017
  Lange use change flows were estimated according to Novaes et al. (2017).
- Transformation, from forest, intensive [natural resource, land]: 0.0282905 m2; source Novaes R. 2017
  Lange use change flows were estimated according to Novaes et al. (2017).
- Transformation, from pasture, man made [natural resource, land]: 0.00574631 m2; source Novaes R. 2017
  Lange use change flows were estimated according to Novaes et al. (2017).
- Transformation, from permanent crop [natural resource, land]: 0.000454832 m2; source Novaes R. 2017; triangular min 0, mostLikely 6.81635e-5, max 0.00129633, pedigree (4,2,5,5,4)
  Lange use change flows were estimated according to Novaes et al. (2017).
- Transformation, from unspecified, natural (non-use) [natural resource, land]: 0.000182284 m2; source Novaes R. 2017
  Lange use change flows were estimated according to Novaes et al. (2017).
- Transformation, to forest, intensive [natural resource, land]: 0.0356747 m2; name land_occupied; source Novaes R. 2017; lognormal variance with pedigree 0.0141, pedigree (3,2,3,5,1)
  Lange use change flows were estimated according to Novaes et al. (2017).

## Emissions to nature
- Ammonia [air, non-urban air or from high stacks]: 4.88654e-5 kg; name NH3; source Nemecek T. 2015; lognormal variance with pedigree 0.138, pedigree (4,5,5,5,4)
  NH3 emissions from applied mineral fertilisers are calculated according to Agrammon model available in EEA/EMEP (2013), page 35. Constant emission factors are: 1.1% for ammonium sulphate, 3% for ammonium nitrate and 9.3% for mono-ammonium phosphate; in soils with pH<=7 (brazilian conditions).
- Carbon dioxide, fossil [air, non-urban air or from high stacks]: 0.00467759 kg; source Nemecek T. 2015; lognormal variance with pedigree 0.0986, pedigree (4,5,5,5,4)
  Emissions of CO2 to air from limestone application.
- Dinitrogen monoxide [air, non-urban air or from high stacks]: 0.000436409 kg; name N2O; source Nemecek, T. 2011; lognormal variance with pedigree 0.138, pedigree (4,5,5,5,4)
  Emissions of N2O to the air are calculated through the showed mathematical relation that is in accordance with "2.4 EMISSIONS OF N2O TO THE AIR" in Nemecek & Schnetzer (2011).
  Original values per ha were attributed to total volume of wood produced per hectare (changing the reference product from ha to m3) and to density (changing the reference product from m3 to kg).
- Nitrogen oxides [air, non-urban air or from high stacks]: 9.1646e-5 kg; source Nemecek, T. 2011; lognormal variance with pedigree 0.0426, pedigree (4,3,3,5,1)
  Emissions of NOx to the air are calculated through the showed mathematical relation that is in accordance with "2.5 EMISSIONS OF NOX TO THE AIR" in Nemecek & Schnetzer (2011).
  Uncertainty: Variance of log-transformed data as recommended by Ecoinvent for "NOX, N2O" for agriculture.
- Water [air, non-urban air or from high stacks]: 3.80209e-5 m3; name water_air; lognormal variance with pedigree 0.0986, pedigree (4,5,5,5,4)
  It is assumed that the total water applied evaporates.
- 2,4-D [soil, agricultural]: 7.34605e-8 kg; source Nemecek, T. 2011; lognormal variance with pedigree 0.0456, pedigree (4,3,3,5,1)
  "All pesticides applied for crop production were assumed to end up as emissions to the soil. The amounts of pesticides used as inputs were thus simultaneously calculated as outputs (emissions to agricultural soil)", as recomended by Nemecek & Schnetzer (2011), "2.9 EMISSIONS OF PESTICIDES TO AGRICULTURAL SOIL" (page 21).
  Original values per ha were attributed to total volume of wood produced per hectare (changing the reference product from ha to m3) and to density (changing the reference product from m3 to kg).
- Cadmium II [soil, forestry]: 3.10397e-7 kg; source Milà i Canals, L. 2003; lognormal variance with pedigree 0.188, pedigree (4,5,5,5,4)
  Emissions of heavy metals to soil and surface water estimated from mineral fertilisers and liming as recommended by Canals (2003). Due to lack of data about metal content in wood, it was considered zero absorption.
  Original values per ha were attributed to total volume of wood produced per hectare (changing the reference product from ha to m3) and to density (changing the reference product from m3 to kg).
- Chromium III [soil, forestry]: 3.538e-6 kg; source Milà i Canals, L. 2003; lognormal variance with pedigree 0.188, pedigree (4,5,5,5,4)
  (same comment as for Cadmium II)
- Copper ion [soil, forestry]: -3.7e-6 kg; source Milà i Canals, L. 2003
  "Emissions of heavy metals to soil and surface water estimated from mineral fertilisers and liming as recommended by Canals (2003). It was considered copper absorption in wood. According to Andrade et al. (2011), there is 10 mg Cu/kg wood in a similar product.
- Flumioxazin [soil, agricultural]: 1.97845e-7 kg; source Nemecek, T. 2011; lognormal variance with pedigree 0.0456, pedigree (4,3,3,5,1)
  (same comment as for 2,4-D)
- Glyphosate [soil, agricultural]: 1.98854e-5 kg; source Nemecek, T. 2011; lognormal variance with pedigree 0.131, pedigree (4,5,5,5,4)
  (same comment as for 2,4-D)
- Isoxaflutole [soil, agricultural]: 8.26411e-8 kg; source Nemecek, T. 2011; lognormal variance with pedigree 0.0456, pedigree (4,3,3,5,1)
  (same comment as for 2,4-D)
- Lead II [soil, forestry]: 2.45182e-7 kg; source Milà i Canals, L. 2003; lognormal variance with pedigree 0.188, pedigree (4,5,5,5,4)
  (same comment as for Cadmium II)
- Nickel II [soil, forestry]: 2.14136e-6 kg; source Milà i Canals, L. 2003; lognormal variance with pedigree 0.188, pedigree (4,5,5,5,4)
  Emissions of heavy metals to soil and surface water estimated from mineral fertilisers and liming as recommended by Canals (2003), metal content in wood from Freddo et al. (1999). According to the authors, there is 0,195 mg Ni/kg wood in a similar product.
  Original values per ha were attributed to total volume of wood produced per hectare (changing the reference product from ha to m3) and to density (changing the reference product from m3 to kg).
- Pesticides, unspecified [soil, agricultural]: 2.55106e-7 kg; source Nemecek, T. 2011; lognormal variance with pedigree 0.131, pedigree (4,5,5,5,4)
  "All pesticides applied for crop production were assumed to end up as emissions to the soil. The amounts of pesticides used as inputs were thus simultaneously calculated as outputs (emissions to agricultural soil)", as recomended by Nemecek & Schnetzer (2011), "2.9 EMISSIONS OF PESTICIDES TO AGRICULTURAL SOIL" (page 21).
  This exchange represents the input of sulfluramide.
  Original values per ha were attributed to total volume of wood produced per hectare (changing the reference product from ha to m3) and to density (changing the reference product from m3 to kg).
- Zinc II [soil, forestry]: -1.08e-5 kg; source Milà i Canals, L. 2003
  "Emissions of heavy metals to soil and surface water estimated from mineral fertilisers and liming as recommended by Canals (2003), metal content in wood from Andrade et al. (2011). According to the authors, there is 46 mg Zn/kg wood in a similar product.
- Cadmium II [water, surface water]: 3.10397e-11 kg; source Milà i Canals, L. 2003; lognormal variance with pedigree 0.188, pedigree (4,5,5,5,4)
  Emissions of heavy metals to soil and surface water estimated from mineral fertilisers and liming as recommended by Canals (2003). Due to lack of data about metal content in wood, it was considered zero absorption.
- Chromium III [water, surface water]: 3.538e-10 kg; source Milà i Canals, L. 2003; lognormal variance with pedigree 0.188, pedigree (4,5,5,5,4)
  (same comment as for Cadmium II)
- Copper ion [water, surface water]: 1.30825e-10 kg; source Milà i Canals, L. 2003; lognormal variance with pedigree 0.188, pedigree (4,5,5,5,4)
  Emissions of heavy metals to soil and surface water estimated from mineral fertilisers and liming as recommended by Canals (2003), metal content in wood from Andrade et al. (2011). According to the authors, there is 10 mg Cu/kg wood in a similar product.
- Lead II [water, surface water]: 2.45702e-11 kg; source Milà i Canals, L. 2003; lognormal variance with pedigree 0.188, pedigree (4,5,5,5,4)
  (same comment as for Cadmium II)
- Nickel II [water, surface water]: 2.14135e-10 kg; source Milà i Canals, L. 2003; lognormal variance with pedigree 0.188, pedigree (4,5,5,5,4)
  (same comment as for Nickel II)
- Nitrate [water, ground-]: 0.000415126 kg; name NO3; source Nemecek, T. 2011; lognormal variance with pedigree 0.138, pedigree (4,5,5,5,4)
  Emissions of nitrate to the groundwater are calculated through the showed mathematical relation that is in accordance with "2.2.2 The SQCB-NO3 model" in Nemececk & Schnetzer (2011), as "SALCA-NO3 model" has "Geographic scope of application: Europe"
  Original values per ha were attributed to total volume of wood produced per hectare (changing the reference product from ha to m3) and to density (changing the reference product from m3 to kg).
- Phosphorus [water, surface water]: 7.81671e-6 kg; source Nemecek, T. 2011; lognormal variance with pedigree 0.138, pedigree (4,5,5,5,4)
  Due to phosphorus low mobility in Brazilian soils, its emissions through leaching and run-off were disregarded (Novais & Smyth, 1999). Only P emission by water erosion through surface water was considered. They are calculated through the showed mathematical relation that is in accordance with "2.3.3 Phorsphorous Emissions Through Water Erosion to Surface Water" Nemecek and Schnetzer (2011).
- Zinc II [water, surface water]: -1.08e-9 kg; source Milà i Canals, L. 2003
  (same comment as for Zinc II)

## Sampling procedure
This dataset is a weighted average of the other geographies.

## Extrapolations
Carbon content is based on ecoinvent database
