# thermal spraying, cold spray, tungsten carbide-cobalt, on carbon steel substrate

Dataset: EcoSpold 2, unit process
Geography: GLO
Time period: 2022-01-01 to 2023-12-31
Technology level: modern
Classification: ISIC rev.4 ecoinvent: 2592:Treatment and coating of metals; machining
Synonyms: CSP; CS
Scenario: Business-as-Usual
System model: Allocation, cut-off by classification
Generated by: Edwin Rua
Database: ecoinvent
isCopyrightProtected: true
accessRestrictedTo: 1

## General comment
This activity provides the service of Cold Spray (CS) coating, and it represent the coating of 1 square meter of substrate (carbon steel), with a coating thickness of 150 micrometre. The CS is a process used to for the deposition of micron sized powders. It consist of spraying a ceramic or metallic feedstock powder onto a substrate to build up a coating. This dataset considers a tungsten carbide-cobalt powder to be used. The process is carried out using a carrier gas, which accelerates the powders to a speed which will cause them to adhere the substrate after the impact. This dataset represent a GLO average because it is a well-established technique in the industry. This technique is used because it doesn't oxidize the coating. The maximum thickness is limited by the plastic deformation of the powder used.
More in detail, the CS works using a gas heather which heats the carrier gas between 800 and 1100˚C. The carrier gas is usually Nitrogen or Helium. A minor part of the gas is kept cold and it pass through the powder feeder and the gas nozzle.
The dataset is based on direct measures of a pilot plant in the University of Barcelona. It is composed of a robotic arm which operates the spraying gun, the spray gun, the feeder, a compressor, and gas tanks. The dataset includes the energy use of the robotic arm but it does not include the production and the general maintenance of the tooling, of the machine, and of the ancillary equipment.
The CS coating is used when a hard coating is needed, but the application temperature could be an issue (a heat-affected-zone is not accepted), no oxide formation is accepted or a residual compressive stress is wanted. The main industries using CS are aerospace, or biomedical.
References:
Poza, P., & Garrido-Maneiro, M. Á. (2022). Cold-sprayed coatings: Microstructure, mechanical properties, and wear behaviour. Progress in Materials Science, 123, 100839.
Villa, M., Dosta, S., Fernández, J., & Guilemany, J. M. (2012). La proyección fría (CGs): Una alternativa a las tecnologías convencionales de deposición. Revista de Metalurgia, 48(3), 175-191.

## Included activities start
The activity is a service and it starts with the sandblasted carbon steel workpiece entering the cold spraying cabin. The activity refers to the coating of 1 square meter of substrate for a thickness of 150 micrometer. The carbon steel substrate is not included in the activity exchanges.

## Included activities end
The activity is a service and it ends with the coated workpiece.

## Geography
The data are based on estimations and do not have a specific geographical origin. They are assumed to be representative of this geography.

## Technology
The cold spray process (CS )is performed on a prepared specimen. The preparation consists in an abrasive blasting, with the aim to remove the rust, dirt, or external particles from the surface and leave the surface with the correct final roughness. The abrasive basting process is not considered in this dataset, if the workpiece is treated with abrasive blasting it has to be accounted with proper dataset.
More in detail, the CS process works by having a stream of carrier gas that is separated in two parts: a major part that goes through the gas heater, and a minor part which stays at low temperature. The first one, passes through an heat exchanger which aims to warm up the gas between 800 and 1100˚C. The latter one stays at room temperature and it is brought to the powder feeder. After the powders and the cold gas get mixed they are directed towards a de Laval convergent-divergent nozzle, where they are mixed with the heated gas. Here the particles reach supersonic speed, ranging from 300 to 1200 m/s, with a temperature that is still below the melting temperature of the powders. Due to the high speed of the particles, when they impact with the substrate, there is a high plastic deformation with and high strain rate during the impact. These effects cause the particles to have a good adhesion to themselves and to the substrate.

## Time period
Data are considered representative of current production practices.The data collection was performed in 2022.
The tooling expected life is of 25 years.

## Parameters
- deposition efficiency: 0.17 kg/kg; name deposition_efficiency
  Deposition efficiency, considered as mass deposited / total mass used. Value calculated from the pilot plant.

## Reference product
- thermal spraying, cold spray, tungsten carbide-cobalt, on carbon steel substrate: 1 m2; name RP; By-product classification allocatable product; CPC 88731: Metal treatment and coating services
  Thickness of the coating: 150 micrometer.
  production volume 4 m2; name pv_cs
    This is a placeholder value that does not reflect real-world production volumes. This dataset does not currently require a real-world production volume to work in the database framework, and no actual data were collected yet. This has no negative effect on the results of the ecoinvent database.
  property price 726.82 EUR2005
    Price calculated based on direct measure in 2022 of the consumption of the University of Barcelona plant and on costs of the inputs. Price shall be reconsidered depending on application, e.g. different region, full scale application, etc.
    The price was converted to EUR based on the annual exchange rates published by the European Central Bank (https://sdw.ecb.europa.eu/quickview.do?SERIES_KEY=120.EXR.A.USD.EUR.SP00.A, last accessed on 2022-02-15) and adjusted for inflation relative to 2005 using the producer price index (PPI) of the euro area, published by eurostat (https://appsso.eurostat.ec.europa.eu/nui/show.do?dataset=sts_inpp_a&lang=en, last accessed on 2022-05-04).
  properties: carbon allocation 0 kg, carbon content 0

## Inputs from technosphere
- electricity, medium voltage: 8.88 kWh; lognormal variance with pedigree 0.002825, pedigree (1,4,2,2,1)
  Measured consumption of the robotic arms, spray gun, and ancillary equipment. Electricity is assumed to be in medium voltage for industrial scale use.
  Uncertainty: Variance value taken from Tab 10.3 of "Overview and methodology. Data quality guideline for the ecoinvent database version 3" Ecoinvent Report 1(v3), Weidema B P, Bauer C, Hischier R, Mutel C, Nemecek T, Reinhard J, Vadenbo C O, Wernet G. (2013).
- hazardous waste, for underground deposit: -0.177252, -2.75182 kg (2 suppliers, which the file names only by identifier); sum of these -2.92907 kg; = tungsten_carbide_powder*((1-deposition_efficiency)); lognormal variance with pedigree 0.002625, pedigree (1,4,1,2,1)
  Amount calculated from deposition efficiency. It represents the material that is not deposited. The exchange is a proxy of tungsten carbide.
  Uncertainty: Variance value taken from Tab 10.3 of "Overview and methodology. Data quality guideline for the ecoinvent database version 3" Ecoinvent Report 1(v3), Weidema B P, Bauer C, Hischier R, Mutel C, Nemecek T, Reinhard J, Vadenbo C O, Wernet G. (2013).
  production volume; = hw*pv_cs/abs(RP)
    Production volume calculated based on the production volume of the reference product.
  properties: carbon content, fossil 0.554667, dry mass 1 kg, wet mass 1 kg
  note on carbon content, fossil: Tab A.6, ecoinvent v2.2 report 13_I, average hazardous waste composition was used, and referred to 0% water mass. No waste-specific emission are currently inventoried for underground deposits. Accordingly, no waste composition must be specified. For generic, average waste to underground deposit deposition in a 200 liter steel drum without cement solidification is assumed (ecoinvent v2.2 report 13_I).
- nitrogen, liquid: 245.099, 67.278 kg (2 suppliers, which the file names only by identifier); sum of these 312.377 kg; lognormal variance with pedigree 0.002825, pedigree (1,4,2,2,1)
  Nitrogen is used as carrier gas.
  Uncertainty: Variance value taken from Tab 10.3 of "Overview and methodology. Data quality guideline for the ecoinvent database version 3" Ecoinvent Report 1(v3), Weidema B P, Bauer C, Hischier R, Mutel C, Nemecek T, Reinhard J, Vadenbo C O, Wernet G. (2013).
  properties: dry mass 1 kg, wet mass 1 kg
- tungsten carbide powder: 3.529 kg; name tungsten_carbide_powder; lognormal variance with pedigree 0.002825, pedigree (1,4,2,2,1)
  The deposition has an efficiency of 17%, and it is referred to a thickness of 150 micrometre.
  Uncertainty: Variance value taken from Tab 10.3 of "Overview and methodology. Data quality guideline for the ecoinvent database version 3" Ecoinvent Report 1(v3), Weidema B P, Bauer C, Hischier R, Mutel C, Nemecek T, Reinhard J, Vadenbo C O, Wernet G. (2013).
  properties: carbon content, fossil 0.061, dry mass 1 kg, wet mass 1 kg

## Emissions to nature
- Nitrogen [air, unspecified]: 312.377 kg; = nitrogen_gas; lognormal variance with pedigree 0.002825, pedigree (1,4,2,2,1)
  Emission due to the carrier gas. The amount is set equal to the input.
  Uncertainty: Variance value taken from Tab 10.3 of "Overview and methodology. Data quality guideline for the ecoinvent database version 3" Ecoinvent Report 1(v3), Weidema B P, Bauer C, Hischier R, Mutel C, Nemecek T, Reinhard J, Vadenbo C O, Wernet G. (2013).

## Sampling procedure
The sampling of the data was performed with direct measure coating a speciment of 50*20 mm of dimension, applying a total thickness of 150 micrometre. The results were scaled for the development of the dataset.

## Extrapolations
The value of the datasets are linearly extrapolated from the measurement performed on site
