# iron-nickel-chromium alloy production

Dataset: EcoSpold 2, unit process
Geography: RoW
Time period: 2000-01-01 to 2023-12-31
Technology level: current
Classification: EcoSpold01Categories: metals/extraction
Classification: ISIC rev.4 ecoinvent: 2410:Manufacture of basic iron and steel
Synonyms: 1.4876; Incoloy 800
Tags: ConvertedDataset
Scenario: Business-as-Usual
System model: Allocation, cut-off by classification
Generated by: Alex Primas
Published in: Althaus H.-J. 2004
Database: ecoinvent
isCopyrightProtected: true
accessRestrictedTo: 1

## General comment
Class I nickel as nickel input and ferrochromium (68% Cr) as chromium input used. Scrap is only used as iron bearing input. No nicked or chromium input from the iron scrap assumed.
[This dataset was already contained in the ecoinvent database version 2. It was not individually updated during the transfer to ecoinvent version 3. Life Cycle Impact Assessment results may still have changed, as they are affected by changes in the supply chain, i.e. in other datasets. This dataset was generated following the ecoinvent quality guidelines for version 2. It may have been subject to central changes described in the ecoinvent version 3 change report (http://www.ecoinvent.org/database/ecoinvent-version-3/reports-of-changes/), and the results of the central updates were reviewed extensively. The changes added e.g. consistent water flows and other information throughout the database. The documentation of this dataset can be found in the ecoinvent reports of version 2, which are still available via the ecoinvent website. The change report linked above covers all central changes that were made during the conversion process.]

## Included activities start
The activity starts with the reception of the raw materials at the production plant gate.

## Included activities end
Transports of scrap metal and other input materials to electric arc furnace, steel-making process and casting.

## Geography
Data relate to EAF plants in the EU

## Technology
EAV-Process for stainless steel used as approximation for the production of high alloyed iron-nickel-chromium alloys. EU technology mix for electric arc furnace process (mainly furnace with 4th hole, partly with additional evacuation of building atmosphere).

## Reference product
- iron-nickel-chromium alloy: 1 kg; By-product classification allocatable product; CPC 41115: Other ferro-alloys; HS2017 7202: Ferro-alloys
  EcoSpold01Location=RER
  production volume 2.67763 kg
    This is a placeholder value that does not reflect real-world production volumes. This dataset does not currently require a real-world production volume to work in the database framework, and no actual data were collected yet. This has no negative effect on the results of the ecoinvent database.
  property price 12.82 EUR2005
    Calculated after Alibaba. Source: http://www.alibaba.com/product-detail/nickel-iron-chromium-alloy-800_60268184954.html?spm=a2700.7724857.29.348.C0emWl
  properties: carbon allocation 0 kg, carbon content 0, carbon content, fossil 0, carbon content, non-fossil 0, dry mass 1 kg, water content 0, water in wet mass 0 kg, wet mass 1 kg

## Inputs from technosphere
- anode, for metal electrolysis: 0.003 kg; lognormal variance with pedigree 0.1132, pedigree (2,3,5,5,4)
  EcoSpold01Location=RER
  Based on data from steel production with EAF
  Uncertainty: based on data from steel production with EAF
  properties: carbon content, fossil 0.865971, dry mass 1 kg, wet mass 1 kg
  note on carbon content, fossil: The main component of the anode is carbon, coming from bitumen and petroleum coke (ecoinvent v2.2 report 10). The C content in those components of the anode has been taken into account to calculate the anode final C content.
- electric arc furnace converter: 4e-11 unit; lognormal variance with pedigree 0.48, pedigree (5,5,5,5,4)
  Based on data from steel production with EAF
  EcoSpold01Location=RER
  Uncertainty: based on data from steel production with EAF
- electric arc furnace dust: -0.00490562, -0.000194375 kg (2 suppliers, which the file names only by identifier); sum of these -0.0051 kg; lognormal variance with pedigree 0.0734, pedigree (2,3,2,5,4)
  Based on data from steel production with EAF
  production volume
    Calculated from production volume of reference product using the relative outputs.
  properties: calcium content 0.0523414, carbon content, fossil 0.0155074, chlorine content 0.010876, dry mass 0.999 kg, iron content 0.259301, magnesium content 0.013047, manganese content 0.019242, oxygen content 0.0832861, silicon content 0.0212644, tungsten content 0.00866892, wet mass 1 kg, zinc content 0.0646678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
  note on calcium content: The value of 'calcium content' is documented in Turner & Symeonidis, 2020. Reference: Turner David & Symeonidis Avraam, 2020, Life cycle inventories of the treatment of iron and steelmaking by-products, ecoinvent association, Zürich, Switzerland
  note on carbon content, fossil: The value of 'carbon content, fossil' is documented in Turner & Symeonidis, 2020. Reference: Turner David & Symeonidis Avraam, 2020, Life cycle inventories of the treatment of iron and steelmaking by-products, ecoinvent association, Zürich, Switzerland
  note on chlorine content: The value of 'chlorine content' is documented in Turner & Symeonidis, 2020. Reference: Turner David & Symeonidis Avraam, 2020, Life cycle inventories of the treatment of iron and steelmaking by-products, ecoinvent association, Zürich, Switzerland
  note on iron content: The value of 'iron content' is documented in Turner & Symeonidis, 2020. Reference: Turner David & Symeonidis Avraam, 2020, Life cycle inventories of the treatment of iron and steelmaking by-products, ecoinvent association, Zürich, Switzerland
  note on magnesium content: The value of 'magnesium content' is documented in Turner & Symeonidis, 2020. Reference: Turner David & Symeonidis Avraam, 2020, Life cycle inventories of the treatment of iron and steelmaking by-products, ecoinvent association, Zürich, Switzerland
  note on manganese content: The value of 'manganese content' is documented in Turner & Symeonidis, 2020. Reference: Turner David & Symeonidis Avraam, 2020, Life cycle inventories of the treatment of iron and steelmaking by-products, ecoinvent association, Zürich, Switzerland
  note on oxygen content: The value of 'oxygen content' is documented in Turner & Symeonidis, 2020. Reference: Turner David & Symeonidis Avraam, 2020, Life cycle inventories of the treatment of iron and steelmaking by-products, ecoinvent association, Zürich, Switzerland
  note on silicon content: The value of 'silicon content' is documented in Turner & Symeonidis, 2020. Reference: Turner David & Symeonidis Avraam, 2020, Life cycle inventories of the treatment of iron and steelmaking by-products, ecoinvent association, Zürich, Switzerland
  note on tungsten content: The value of 'tungsten content' is documented in Turner & Symeonidis, 2020. Reference: Turner David & Symeonidis Avraam, 2020, Life cycle inventories of the treatment of iron and steelmaking by-products, ecoinvent association, Zürich, Switzerland
  note on zinc content: The value of 'zinc content' is documented in Turner & Symeonidis, 2020. Reference: Turner David & Symeonidis Avraam, 2020, Life cycle inventories of the treatment of iron and steelmaking by-products, ecoinvent association, Zürich, Switzerland
- electric arc furnace slag: -0.0767659, -3.40917e-5 kg (2 suppliers, which the file names only by identifier); sum of these -0.0768 kg; lognormal variance with pedigree 0.0734, pedigree (2,3,2,5,4)
  EcoSpold01Location=CH
  Based on data from steel production with EAF
  Uncertainty: based on data from steel production with EAF
  production volume
    Calculated from the production volume of iron-nickel-chromium alloy in proportion to the respective output amounts.
  properties: carbon content, fossil 0.00338635, dry mass 1 kg, wet mass 1 kg
- electricity, medium voltage: 0.0141239, 0.281741, 0.0946641, 0.00432524, 0.000865691, 0.000185883, 0.0290941 kWh (7 suppliers, which the file names only by identifier); sum of these 0.425 kWh; lognormal variance with pedigree 0.1132, pedigree (2,3,5,5,4)
  EcoSpold01Location=UCTE
  Based on data from steel production with EAF
  Uncertainty: based on data from steel production with EAF
- ferrochromium, high-carbon, 68% Cr: 0.309 kg; lognormal variance with pedigree 0.118, pedigree (4,5,5,5,4)
  EcoSpold01Location=GLO
  Share of Cr in scrap input not known
  Uncertainty: share of Cr in scrap input not known
  properties: carbon content, fossil 0.07, dry mass 1 kg, heating value, net 2.12 MJ, wet mass 1 kg
  note on carbon content, fossil: Ferrochromium is a master alloy of iron and chromium, containing 45 – 95 % Cr and various amounts of iron, carbon, and other elements. High-carbon ferrochromium (HC ferrochromium) contains 4 – 10 % C (ecoinvent v2.2 report 20_part VI). An average content of 7% C was considered
- hard coal: 0.000925477, 0.000219609, 0.00654982, 0.00153822, 0.000944428, 0.00137978, 0.00204104, 0.000401628 kg (8 suppliers, which the file names only by identifier); sum of these 0.014 kg; lognormal variance with pedigree 0.1132, pedigree (2,3,5,5,4)
  Based on data from steel production with EAF
  EcoSpold01Location=UCTE
  Uncertainty: based on data from steel production with EAF
  properties: carbon content, fossil 0.845, dry mass 0.94 kg, heating value, net 27.91 MJ, water content 0.0638298, wet mass 1 kg
  note on carbon content, fossil: C content 75-94% (specified in Tab 1.1, report 6, part VI). A mean content of 0.845 kg C/ kg dry hard coal was considered
  note on heating value, net: Based on the Characterization factor of Hard coal in the CED method
- inert waste, for final disposal: -0.005 kg; lognormal variance with pedigree 0.0734, pedigree (2,3,2,5,4)
  Based on data from steel production with EAF
  EcoSpold01Location=CH
  Uncertainty: based on data from steel production with EAF
  production volume
    (same comment as for electric arc furnace slag)
  properties: dry mass 0.995 kg, water content 0.00502513, wet mass 1 kg
- iron scrap, sorted, pressed: 0.474 kg; lognormal variance with pedigree 0.118, pedigree (4,5,5,5,4)
  EcoSpold01Location=RER
  Iron input from scrap, balance to 110.5% of output
  Uncertainty: iron input from scrap, balance to 110.5% of output
  properties: dry mass 1 kg, wet mass 1 kg
- natural gas, high pressure: 0.000193039, 0.000325633, 0.000710306, 0.000237709, 5.55517e-5, 0.000330633, 0.000317267, 0.000834262, 0.00032208, 0.000498168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 m3 (37 suppliers, which the file names only by identifier); sum of these 0.025 m3; lognormal variance with pedigree 0.1132, pedigree (2,3,5,5,4)
  (same comment as for anode, for metal electrolysis)
  properties: carbon content, fossil 0.602381, dry mass 0.84 kg, heating value, gross 40 MJ, heating value, net 36 MJ, wet mass 0.84 kg
  note on carbon content, fossil: An average C content of 0.506 kg C/ m3 has been assumed (this average has been calculated using data in Tab 3.5, ecoinvent v2.2 report 6_V
  note on heating value, net: Literature value, Source: Christoph Meili;Niels Jungbluth;Maresa Bussa (2021) Life cycle inventories of crude oil and natural gas extraction. ESU-services Ltd. commissioned by BAFU & VSG, Schaffhausen, Switzerland, http://esu-services.ch/data/public-lci-reports/
- nickel, class 1: 0.322 kg; lognormal variance with pedigree 0.118, pedigree (4,5,5,5,4)
  EcoSpold01Location=GLO
  Share of Ni in scrap input not known
  Uncertainty: share of Ni in scrap input not known
  properties: dry mass 1 kg, wet mass 1 kg
- oxygen, liquid: 0.0507 kg; lognormal variance with pedigree 0.1132, pedigree (2,3,5,5,4)
  (same comment as for electric arc furnace converter)
  properties: dry mass 1 kg, wet mass 1 kg
- quicklime, in pieces, loose: 0.055 kg; lognormal variance with pedigree 0.1132, pedigree (2,3,5,5,4)
  (same comment as for inert waste, for final disposal)
  properties: dry mass 0.99 kg, water content 0.010101, wet mass 1 kg
- refractory, basic, packed: 0.0135 kg; lognormal variance with pedigree 0.1132, pedigree (2,3,5,5,4)
  Based on data from steel production with EAF
  EcoSpold01Location=DE
  Uncertainty: based on data from steel production with EAF
  properties: dry mass 1 kg, wet mass 1 kg

## Emissions to nature
- Benzene [air, unspecified]: 2.28e-6 kg; lognormal variance with pedigree 0.1532, pedigree (2,3,5,5,4)
  Based on data from steel production with EAF
  Uncertainty: based on data from steel production with EAF
- Cadmium II [air, unspecified]: 3.65e-8 kg; lognormal variance with pedigree 0.7632, pedigree (2,3,5,5,4)
  (same comment as for Benzene)
- Carbon monoxide, fossil [air, unspecified]: 0.00232 kg; lognormal variance with pedigree 0.7632, pedigree (2,3,5,5,4)
  (same comment as for Benzene)
- Chromium III [air, unspecified]: 1.25e-6 kg; lognormal variance with pedigree 0.7632, pedigree (2,3,5,5,4)
  (same comment as for Benzene)
- Copper ion [air, unspecified]: 2.3e-7 kg; lognormal variance with pedigree 0.7632, pedigree (2,3,5,5,4)
  (same comment as for Benzene)
- Dioxins, measured as 2,3,7,8-tetrachlorodibenzo-p-dioxin [air, unspecified]: 4.54e-12 kg; lognormal variance with pedigree 0.4132, pedigree (2,3,5,5,4)
  (same comment as for Benzene)
- Hexachlorobenzene [air, unspecified]: 2e-8 kg; lognormal variance with pedigree 0.4132, pedigree (2,3,5,5,4)
  (same comment as for Benzene)
- Hydrocarbons, aromatic [air, unspecified]: 7.7e-5 kg; lognormal variance with pedigree 0.1532, pedigree (2,3,5,5,4)
  (same comment as for Benzene)
- Hydrochloric acid [air, unspecified]: 5.2e-6 kg; lognormal variance with pedigree 0.1532, pedigree (2,3,5,5,4)
  (same comment as for Benzene)
- Hydrogen fluoride [air, unspecified]: 2.35e-6 kg; lognormal variance with pedigree 0.1532, pedigree (2,3,5,5,4)
  (same comment as for Benzene)
- Lead II [air, unspecified]: 1.81e-6 kg; lognormal variance with pedigree 0.7632, pedigree (2,3,5,5,4)
  (same comment as for Benzene)
- Mercury II [air, unspecified]: 2.24e-6 kg; lognormal variance with pedigree 0.7632, pedigree (2,3,5,5,4)
  (same comment as for Benzene)
- Nickel II [air, unspecified]: 7e-7 kg; lognormal variance with pedigree 0.7632, pedigree (2,3,5,5,4)
  (same comment as for Benzene)
- Nitrogen oxides [air, unspecified]: 0.00018 kg; lognormal variance with pedigree 0.1532, pedigree (2,3,5,5,4)
  (same comment as for Benzene)
- PAH, polycyclic aromatic hydrocarbons [air, unspecified]: 3.72e-8 kg; lognormal variance with pedigree 0.4132, pedigree (2,3,5,5,4)
  (same comment as for Benzene)
- Particulate Matter, < 2.5 um [air, unspecified]: 0.000166 kg; lognormal variance with pedigree 0.4132, pedigree (2,3,5,5,4)
  (same comment as for Benzene)
- Particulate Matter, > 10 um [air, unspecified]: 5.86e-5 kg; lognormal variance with pedigree 0.1532, pedigree (2,3,5,5,4)
  (same comment as for Benzene)
- Particulate Matter, > 2.5 um and < 10um [air, unspecified]: 0.000166 kg; lognormal variance with pedigree 0.2332, pedigree (2,3,5,5,4)
  (same comment as for Benzene)
- Polychlorinated biphenyls [air, unspecified]: 2.32e-8 kg; lognormal variance with pedigree 0.4132, pedigree (2,3,5,5,4)
  (same comment as for Benzene)
- Sulfur dioxide [air, unspecified]: 7.7e-5 kg; lognormal variance with pedigree 0.1132, pedigree (2,3,5,5,4)
  (same comment as for Benzene)
- Zinc II [air, unspecified]: 2.29e-5 kg; lognormal variance with pedigree 0.7632, pedigree (2,3,5,5,4)
  (same comment as for Benzene)

## Sampling procedure
based on literature

## Extrapolations
none This dataset has been copied from an original dataset covering the geography RER. The uncertainty has been adjusted accordingly.

## Review by Rolf Frischknecht 2007-08-13
passed
none
