# power block installation, solar thermal parabolic trough, 50 MW

Dataset: EcoSpold 2, unit process
Geography: RoW
Time period: 2010-01-01 to 2023-01-01
Technology level: current
Classification: ISIC rev.4 ecoinvent: 4220:Construction of utility projects
Tags: CSP; Concentrated Solar Power
Scenario: Business-as-Usual
System model: Allocation, cut-off by classification
Generated by: Karin Treyer
Published in: Telsnig, Thomas 2015
Database: ecoinvent
isCopyrightProtected: true
accessRestrictedTo: 1

## General comment
This activity represents the construction of a power block unit for a 50MW solar thermal parabolic trough plant in South Africa, Upington. The main components are pressure vessels, compressors, heat exchangers with cooling towers, steam turbine generators etc.
This dataset is entirely based on the detailed life cycle inventory as presented in the dissertation report by
Telsnig, Thomas. 2015. Standortabhängige Analyse und Bewertung solarthermischer Kraftwerke am Beispiel Südafrikas. Forschungsbericht. Band 123. ISSN 0938-1228. Institut für Energiewirtschaft und Rationelle Energieanwendung, Universität Stuttgart, Germany.

## Included activities start
The activity starts with the assembly of all needed components of the power block.

## Included activities end
The activity concludes when the solar power plant is decomissioned.

## Geography
This dataset has been extrapolated from a dataset modelled for the location Upington, South Africa. Uncertainty has not been adjusted as it is assumed that the modelled 50 MW parabolic trough power plant would be very similar in other parts of the world.

## Technology
Condensate - 2* 100 %, 4025 gpm, 335 ft tdh, 114 °F, 450 bhp motor, 4.16 kV 1750rpm, multi-stage vertical turbine, mounted in below-grade cans
Comprises of air compressors, vacuum pumps, air exhauster
Steam Turbine - 2 cylinder (HP and LP/LP), downward exhaust 265 Mwe, 1800 rpm, 1465 psia / 703 F / 703F, 2.5 in.HgA exhaust 2340000 lb/hr main steam flow rate
Generator - 2 pole, air cooled, 294 MVA, 0.9 lagging power factor 13.8 kV, 12300 A each phase

## Reference product
- power block, solar thermal parabolic trough, 50 MW: 1 unit; name RP_amount_1; By-product classification allocatable product; CPC 54262: General construction services of power plants
  Reference product unit of a power block installation unit for a 50MW solar thermal parabolic trough plant
  production volume 7 unit; name RP_PV_1
    Data about concentrating solar power plants in operation, construction and development globally are available from SolarPACES (https://solarpaces.nrel.gov/, accessed April 2019). On average 8 parabolic through concentrating solar power plants per year went in operation worldwide between 2010 and 2019. This includes plants with an installed capacity other than 50MW and is used as approximate annual production volume for this dataset.
  property lifetime 30 year
    The economic lifetime of the plant is assumed to be 30 years.
  property price 6.3e7 EUR2005
    Telsnig 2015: Investment cost for the power block of a 50MW CSP solar thermal parabolic trough plant in South Africa (EUR2010) with limited storage capacity (see Table 4-4 in Telsnig, 2015).
    Reference(s): Telsnig, Thomas. 2015. Standortabhängige Analyse und Bewertung solarthermischer Kraftwerke am Beispiel Südafrikas. Forschungsbericht. Band 123. ISSN 0938-1228. Institut für Energiewirtschaft und Rationelle Energieanwendung, Universität Stuttgart, Germany.
  properties: carbon allocation 0 kg, carbon content 0

## Inputs from technosphere
- alkyd paint, white, without solvent, in 60% solution state: 267.624, 56.376 kg (2 suppliers, which the file names only by identifier); sum of these 324 kg; lognormal variance with pedigree 0.0197, pedigree (4,4,4,3,2)
  Paint to prevent rust of structural steel materials
  properties: carbon content, fossil 0.140367, carbon content, non-fossil 0.199629, dry mass 1 kg, heating value, net 10.3 MJ, wet mass 1 kg
  note on carbon content, fossil: C content was calculated as an addition of C content in the raw materials.
- aluminium alloy, metal matrix composite: 314531 kg; name Al_MMC; lognormal variance with pedigree 0.0197, pedigree (4,4,4,3,2)
  Includes metal working for aluminium production, used for coating in compressors,pumps etc
  property carbon content, fossil 0.0475; name Al_MMC_C_content_fossil
  property carbon content, non-fossil 0; name Al_MMC_C_content_non_fossil
  property dry mass 1 kg; name Al_MMC_DM
  property water content 0; name Al_MMC_water_content
  property water in wet mass 0 kg; name Al_MMC_WWM
  property wet mass 1 kg; name Al_MMC_WM
- aluminium, cast alloy: 96 kg; name aluminiumcast; lognormal variance with pedigree 0.0197, pedigree (4,4,4,3,2)
  Aluminium cast supplied for sheet rolling
  properties: dry mass 1 kg, wet mass 1 kg
- brass: 7.96, 0.04 kg (2 suppliers, which the file names only by identifier); sum of these 8 kg; lognormal variance with pedigree 0.0197, pedigree (4,4,4,3,2)
  Red brass in transformersfor power distribution
  properties: dry mass 1 kg, wet mass 1 kg
- cast iron: 97841 kg; name castiron; lognormal variance with pedigree 0.0197, pedigree (4,4,4,3,2)
  Used in material composition of pumps, compressors, turbines
  properties: carbon content, fossil 0.04, dry mass 1 kg, wet mass 1 kg
  note on carbon content, fossil: Cast iron is made by remelting pig iron in small furnaces (e.g. cupola furnaces or electric arc furnaces) and poured into moulds to make castings. It usually contains 2% to 6% carbon (ecoinvent v2.2 report 10_partII). An average content of 4% was considered
- cast iron removed by milling, average: 11833 kg; lognormal variance with pedigree 0.0197, pedigree (4,4,4,3,2)
  Process of milling cast iron.
  properties: carbon content, fossil 0.04, dry mass 1 kg, wet mass 1 kg
- ceramic tile: 8518 kg; name ceramic; lognormal variance with pedigree 0.0197, pedigree (4,4,4,3,2)
  Porcelain materials in transformer electrical equipment
  properties: dry mass 1 kg, wet mass 1 kg
- chromium steel removed by milling, average: 12586 kg; lognormal variance with pedigree 0.0197, pedigree (4,4,4,3,2)
  Process of milling chromesteel. 0
  properties: carbon content, fossil 0.0008, dry mass 1 kg, wet mass 1 kg
- concrete, normal strength: 130.035, 28.555, 45.1338, 24.8016, 550.661, 231.173, 274.044, 9803.6 m3 (8 suppliers, which the file names only by identifier); sum of these 11088 m3; lognormal variance with pedigree 0.0197, pedigree (4,4,4,3,2)
  Main application in turbine-generator foundation and cooling tower foundation
  properties: dry mass 2190 kg, water content 0.086758, wet mass 2380 kg
- copper, cathode: 61824 kg; name copper; lognormal variance with pedigree 0.0197, pedigree (4,4,4,3,2)
  Copper supplied for field wiring etc
  properties: dry mass 1 kg, wet mass 1 kg
- drawing of pipe, steel: 1.20861e6 kg; lognormal variance with pedigree 0.0197, pedigree (4,4,4,3,2)
  Process done to draw pipes made of steel.
- electricity, high voltage: 47.4544, 1130.34, 4158.05, 1700.94, 1018.45, 94734.4, 146.463, 133.965, 452599, 2735.28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 kWh (36 suppliers, which the file names only by identifier); sum of these 2.414e6 kWh; lognormal variance with pedigree 0.0197, pedigree (4,4,4,3,2)
  Electrical energy
- excavation, hydraulic digger: 1258 m3; lognormal variance with pedigree 0.0197, pedigree (4,4,4,3,2)
  Backfill and site excavation
- expanded perlite: 80397 kg; name expandedperilite; lognormal variance with pedigree 0.0197, pedigree (4,4,4,3,2)
  Used primarily for insulation purposes in pipes etc
  properties: dry mass 1 kg, wet mass 1 kg
- extrusion, plastic pipes: 2.21848e6 kg; lognormal variance with pedigree 0.0197, pedigree (4,4,4,3,2)
  Process of extrusion to produce plastic pipes from HDPE.
- glass fibre: 2189 kg; name glassfibre; lognormal variance with pedigree 0.0197, pedigree (4,4,4,3,2)
  Material composition used in fuel oil storage, sand filters, and service water storage
  properties: dry mass 1 kg, wet mass 1 kg
- glass fibre reinforced plastic, polyamide, injection moulded: 302433 kg; name glassfibrereinforced; lognormal variance with pedigree 0.0197, pedigree (4,4,4,3,2)
  Material composition of ventilators etc.
  properties: carbon content, fossil 0.446018, dry mass 1 kg, wet mass 1 kg
- hazardous waste, for incineration: -16055.3, -7720.92, -201.82 kg (3 suppliers, which the file names only by identifier); sum of these -23978 kg; = silicone_product; lognormal variance with pedigree 0.0137, pedigree (4,4,3,3,2)
  Disposal of the oil used for the initial filling and during operation of the pumps and transformers. Calculated based on the environmental product declarations for pumps as provided by Sulzer and for transformers as provided by ABB.
  Sulzer EPDs: https://www.sulzer.com/en/shared/about-us/2017/08/10/13/22/environmental-product-declarations (accessed May 2019)
  ABB library: https://library.abb.com/en/ (accessed May 2019)
  production volume; = RP_PV_1 * (BP_amount_10 / RP_amount_1)
    Calculated from production volume of reference product using the relative outputs.
  properties: carbon content, fossil 0.554667, dry mass 0.75 kg, heating value, net 17 MJ, water content 0.333333, wet mass 1 kg
  note on carbon content, fossil: Tab A.6, ecoinvent v2.2 report 13_I. C content has been calculated after data in the tables, and then referred to 1 kg DM
  note on heating value, net: Value taken from the general comment of the treatment dataset.
- heat, district or industrial, other than natural gas: 68680 MJ; lognormal variance with pedigree 0.0197, pedigree (4,4,4,3,2)
  Heat energy
  properties: corresponding fuel use, propane, furnace >100kW 1.05263 MJ, heating value, net 1 MJ
  note on corresponding fuel use, propane, furnace >100kW: Lower heating value of the fuel input related to the heat/electricity output, taken directly from ecoinvent v3.0 dataset "heat production, natural gas, at industrial furnace >100kW, GLO 2000".
- injection moulding: 17 kg; lognormal variance with pedigree 0.0197, pedigree (4,4,4,3,2)
  Process to produce polystyrene
- iron-nickel-chromium alloy: 33157 kg; name ironnickelchromiumalloy; lognormal variance with pedigree 0.0197, pedigree (4,4,4,3,2)
  Material composition of steam turbine
  properties: dry mass 1 kg, wet mass 1 kg
- kraft paper: 125.547, 1005.45 kg (2 suppliers, which the file names only by identifier); sum of these 1131 kg; lognormal variance with pedigree 0.0197, pedigree (4,4,4,3,2)
  Proxy for electrical insulation paper
  properties: carbon content, fossil 0.0020219, carbon content, non-fossil 0.41662, dry mass 0.945 kg, heating value, net 14.11 MJ, water content 0.0582011, wet mass 1 kg
  note on carbon content, fossil: Fossil C content was calculated after fossil C contents of chemicals used in the production of the paper (in Tab 9.4 ecoinvent v2.2 report 11_III, part 9).
  note on carbon content, non-fossil: Biogenic C content was calculated after biogenic C contents of chemicals used in the production of the paper (in Tab 9.4 ecoinvent v2.2 report 11_III, part 9). The cellulose content in 1 kg of paper (on a wet mas basis) was estimated as (1-chemical content), C content of cellulose was considered 0.44 kgC/kg dry mass (ecoinvent v2.2 report, n 15a, pg 40)
- metal working, average for aluminium product manufacturing: 313881 kg; lognormal variance with pedigree 0.0197, pedigree (4,4,4,3,2)
  Coating in compressors, pumps.
- molybdenum: 907 kg; lognormal variance with pedigree 0.0197, pedigree (4,4,4,3,2)
  Material composition of steam turbine
  properties: dry mass 1 kg, wet mass 1 kg
- particleboard, cement bonded: 1.3752, 1.6248 m3 (2 suppliers, which the file names only by identifier); sum of these 3 m3; lognormal variance with pedigree 0.0197, pedigree (4,4,4,3,2)
  Used in pumps to ensure no leaks occur
  properties: carbon content, fossil 0.0240148, carbon content, non-fossil 0.139276, dry mass 1176.78 kg, heating value, net 5765.37 MJ, water content 0.0197355, wet mass 1200 kg
- polyethylene, high density, granulate: 2.22016e6 kg; name polyethylene; lognormal variance with pedigree 0.0197, pedigree (4,4,4,3,2)
  Material composition of plastic pipes used in underground construction. A high density polymer plastic for high pressure withstanding conditions
  properties: carbon content, fossil 0.857143, dry mass 1 kg, heating value, net 42.47 MJ, wet mass 1 kg
  note on carbon content, fossil: Polyethylene is formed out of a huge amount of ethylene monomers (C2H4) (ecoinvent v2.2 report 11_II). MW=28 g/mol
- polystyrene, high impact: 17 kg; name polystyrene; lognormal variance with pedigree 0.0197, pedigree (4,4,4,3,2)
  Used as adsorbers for high temperature variations
  properties: carbon content, fossil 0.923077, dry mass 1 kg, heating value, net 38.67 MJ, wet mass 1 kg
- polyurethane, rigid foam: 12.8931, 26.1069 kg (2 suppliers, which the file names only by identifier); sum of these 39 kg; lognormal variance with pedigree 0.0197, pedigree (4,4,4,3,2)
  Used as resin material
  properties: carbon content, fossil 0.69089, dry mass 1 kg, heating value, net 30.67 MJ, wet mass 1 kg
- polyvinylchloride, bulk polymerised: 14 kg; name pvc; lognormal variance with pedigree 0.0197, pedigree (4,4,4,3,2)
  Hydrochlorinator, soda ash mixing, and liquid coagulant
  properties: carbon content, fossil 0.387097, dry mass 1 kg, heating value, net 21.5 MJ, wet mass 1 kg
  note on carbon content, fossil: Monomer is vynyl chloride, C2H3Cl (ecoinvent v2.2 report 11_II). MW=62 g/mol
- reinforcing steel: 1.816e6 kg; name steel; lognormal variance with pedigree 0.0197, pedigree (4,4,4,3,2)
  Used in construction of tanks, columns and vessels etc
  properties: carbon content, fossil 0.004, dry mass 1 kg, wet mass 1 kg
- sand: 2.54187, 0.0304344, 165.414, 0.0131962 kg (4 suppliers, which the file names only by identifier); sum of these 168 kg; lognormal variance with pedigree 0.0197, pedigree (4,4,4,3,2)
  Tank foundations. End of life neglected
  properties: dry mass 1 kg, wet mass 1 kg
- scrap aluminium: -210142, -99802.1, -4682.49 kg (3 suppliers, which the file names only by identifier); sum of these -314627 kg; = Al_MMC+aluminiumcast; lognormal variance with pedigree 0.0137, pedigree (4,4,3,3,2)
  Scrap aluminium at end of life not usable in reproduction of aluminium sent to municipal incineration
  production volume; = RP_PV_1 * (BP_amount_3 / RP_amount_1)
    Calculated from production volume of reference product using the relative outputs.
  properties: dry mass 1 kg, wet mass 1 kg
- scrap copper: -41292.8, -19611.1, -920.108 kg (3 suppliers, which the file names only by identifier); sum of these -61824 kg; = copper; lognormal variance with pedigree 0.0137, pedigree (4,4,3,3,2)
  Scrap copper at end of life not usable in reproduction of copper sent to municipal incineration
  production volume; = RP_PV_1 * (BP_amount_7 / RP_amount_1)
    Calculated from production volume of reference product using the relative outputs.
  properties: dry mass 1 kg, wet mass 1 kg
- section bar rolling, steel: 188920 kg; lognormal variance with pedigree 0.0197, pedigree (4,4,4,3,2)
  Process done to steel for coating
- sheet rolling, aluminium: 96 kg; lognormal variance with pedigree 0.0197, pedigree (4,4,4,3,2)
  Process done for coating using aluminium
- sheet rolling, chromium steel: 97 kg; lognormal variance with pedigree 0.0197, pedigree (4,4,4,3,2)
  Process done for coating using chromesteel
- sheet rolling, steel: 552 kg; lognormal variance with pedigree 0.0197, pedigree (4,4,4,3,2)
  Process done for coating using steel.
- silicone product: 7899.89, 16078.1 kg (2 suppliers, which the file names only by identifier); sum of these 23978 kg; lognormal variance with pedigree 0.0197, pedigree (4,4,4,3,2)
  Used to prevent leakage in pumps. End of life neglected
  properties: carbon content, fossil 0.324324, dry mass 1 kg, heating value, net 9.83 MJ, wet mass 1 kg
- steel removed by milling, average: 38916 kg; lognormal variance with pedigree 0.0197, pedigree (4,4,4,3,2)
  Process of milling steel.
  properties: carbon content, fossil 0.0025, dry mass 1 kg, wet mass 1 kg
- steel, chromium steel 18/8, hot rolled: 23296 kg; name chromesteel; lognormal variance with pedigree 0.0197, pedigree (4,4,4,3,2)
  Material composition of pumps. Compressors etc
  properties: carbon content, fossil 0.0008, dry mass 1 kg, wet mass 1 kg
  note on carbon content, fossil: Stainless steel model is the grade 304 steel (18/8 stainless, 18% chromium 8% nickel; max. 0.08% C)
- steel, low-alloyed: 275546 kg; name lowsteel; lognormal variance with pedigree 0.0197, pedigree (4,4,4,3,2)
  Material composition of pumps, compressors etc
  properties: carbon content, fossil 0.005, dry mass 1 kg, wet mass 1 kg
- synthetic rubber: 6 kg; name rubber; lognormal variance with pedigree 0.0197, pedigree (4,4,4,3,2)
  Material composition in compressors for heat adsorption
  properties: carbon content, fossil 0.871949, dry mass 1 kg, heating value, net 26.42 MJ, wet mass 1 kg
  note on carbon content, fossil: EPDM (Ethylene-propene-diene terpolymer) rubber is a terpolymer of ethylene, propene, and a diene with the residual unsaturated portion of the diene in the side chain (ecoinvent v2.2 report 7-part XX & Ullmann). Chemical formula (deduced from Evidences of Solvent-Induced Miscibility in Polychloroprene-co-Ethylene-Propene Diene Terpolymer Blends, Dubey et al., Journal of Applied Polymer Science, 2009, 111:1884–1891): C20H35
- tap water: 74.4094, 113.431, 570.186, 68.6351, 2860.28, 32731.6, 24441.5 kg (7 suppliers, which the file names only by identifier); sum of these 60860 kg; lognormal variance with pedigree 0.0197, pedigree (4,4,4,3,2)
  Used in the manufacturing of pumps
  properties: carbon content, fossil 0.00178991, dry mass 0.000337476 kg, water content 2962.17, wet mass 1 kg
  note on carbon content, fossil: Bicarbonate content is 2.93 mol/m3. CO2 content is 0.1 mol/m3 (ecoinvent v2.2 report 8, Tab 93.1).
- transformer, high voltage use: 337 kg; lognormal variance with pedigree 0.0197, pedigree (4,4,4,3,2)
  Transformer bulk material high voltage used
  properties: carbon content, fossil 0.262798, dry mass 1 kg, wet mass 1 kg
- waste concrete: -1.67283e6, -2.28038e7, -5914.48 kg (3 suppliers, which the file names only by identifier); sum of these -2.44825e7 kg; = (concrete*2200)+expandedperilite+ceramic; lognormal variance with pedigree 0.0137, pedigree (4,4,3,3,2)
  Disposal of concrete. The density is assumed to be 2200kg/m3.
  production volume; = RP_PV_1 * (BP_amount_4 / RP_amount_1)
    Calculated from production volume of reference product using the relative outputs.
  properties: dry mass 0.5 kg, water content 1, wet mass 1 kg
- waste glass: -0.72099, -2182.68, -0.00619988, -0.066452, -5.51346, -0.00150757, -0.00941486 kg (7 suppliers, which the file names only by identifier); sum of these -2189 kg; = glassfibre; lognormal variance with pedigree 0.0137, pedigree (4,4,3,3,2)
  Inert material cullet sometimes reused in the production of glass but nonusable inert cullet sent to landfill
  production volume; = RP_PV_1 * (BP_amount_5 / RP_amount_1)
    Calculated from production volume of reference product using the relative outputs.
  properties: dry mass 1 kg, heating value, net 0.05 MJ, wet mass 1 kg
  note on heating value, net: Value extracted from "treatment of waste glass, open dump, very wet infiltration class (1000mm)"
- waste paint: -35.0598, -288.807, -0.133201 kg (3 suppliers, which the file names only by identifier); sum of these -324 kg; = paint; lognormal variance with pedigree 0.0137, pedigree (4,4,3,3,2)
  Inert materials in alkyd solvent 60% are disposed in landfill
  production volume; = RP_PV_1 * (BP_amount_11 / RP_amount_1)
    Calculated from production volume of reference product using the relative outputs.
  properties: carbon content, fossil 0.65, dry mass 1 kg, heating value, net 19.7 MJ, wet mass 1 kg
- waste polyethylene/polypropylene product: -707585, -21232.8, -1.79383e6 kg (3 suppliers, which the file names only by identifier); sum of these -2.52264e6 kg; = polyethylene+polyurethane+pvc+glassfibrereinforced; lognormal variance with pedigree 0.0137, pedigree (4,4,3,3,2)
  Polymer material non reusable sent for incineration
  production volume; = RP_PV_1 * (BP_amount_6 / RP_amount_1)
    Calculated from production volume of reference product using the relative outputs.
  properties: carbon content, fossil 0.748045, dry mass 0.847 kg, heating value, net 42.47 MJ, water content 0.180638, wet mass 1 kg
  note on carbon content, fossil: Mixed various plastics was used to estimate the C content of this waste (Tab A.2, ecoinvent v2.2 report 13_I)
- waste polystyrene: -0.0361107, -0.0004026, -0.00241278, -0.000996564, -0.000182474, -16.9148, -0.04514 kg (7 suppliers, which the file names only by identifier); sum of these -17 kg; = polystyrene; lognormal variance with pedigree 0.0137, pedigree (4,4,3,3,2)
  Waste polystyrene sent for municipal incineration
  production volume; = RP_PV_1 * (BP_amount_8 / RP_amount_1)
    Calculated from production volume of reference product using the relative outputs.
  properties: carbon content, fossil 0.922579, dry mass 0.998 kg, heating value, net 38.67 MJ, water content 0.00200401, wet mass 1 kg
- waste reinforcement steel: -2.24596e6, -1559.49 kg (2 suppliers, which the file names only by identifier); sum of these -2.24752e6 kg; = steel+castiron+chromesteel+lowsteel+ironnickelchromiumalloy+brass+zinc+molybdenum; lognormal variance with pedigree 0.0137, pedigree (4,4,3,3,2)
  All steel masses combined. Treatment of reinforced steel is used as a proxy for all steel types.
  production volume; = RP_PV_1 * (BP_amount_2 / RP_amount_1)
    Calculated from production volume of reference product using the relative outputs.
  properties: dry mass 1 kg, wet mass 1 kg
- waste rubber, unspecified: -0.0957621, -3.62309, -2.28115 kg (3 suppliers, which the file names only by identifier); sum of these -6 kg; = rubber; lognormal variance with pedigree 0.0137, pedigree (4,4,3,3,2)
  Waste rubber sent for municipal incineration
  production volume; = RP_PV_1 * (BP_amount_9 / RP_amount_1)
    Calculated from production volume of reference product using the relative outputs.
  properties: carbon content, fossil 0.853, dry mass 1 kg, heating value, net 27.19 MJ, wet mass 1 kg
- wastewater, unpolluted: -0.292895, -60.5671 m3 (2 suppliers, which the file names only by identifier); sum of these -60.86 m3; = water/1000; lognormal variance with pedigree 0.0137, pedigree (4,4,3,3,2)
  The amount of tap water input stems from the water consumption reported in the EPDs of the modelled pumps (Sulzer EPDs). It is stated in the EPDs that the water is used for testing purposes. Therefore, it is assumed to be discharged to the sewer system without pollution. Sulzer EPDs: https://www.sulzer.com/en/shared/about-us/2017/08/10/13/22/environmental-product-declarations (accessed May 2019)
  production volume; = RP_PV_1 * (BP_amount_1 / RP_amount_1)
    Calculated from production volume of reference product using the relative outputs.
  properties: carbon content, fossil 0.00178991, carbon content, non-fossil 0.00178991, dry mass 0.337476 kg, water content 2962.17, wet mass 1000 kg
  note on carbon content, fossil: Assumed to be like in tap water. Bicarbonate content is 2.93 mol/m3. CO2 content is 0.1 mol/m3 (ecoinvent v2.2 report 8, Tab 93.1).
- welding, arc, steel: 766 m; lognormal variance with pedigree 0.0197, pedigree (4,4,4,3,2)
  Arc welding done with steel
- wire drawing, copper: 47222 kg; lognormal variance with pedigree 0.0197, pedigree (4,4,4,3,2)
  Process done to draw wires, cables etc
- zinc: 761 kg; lognormal variance with pedigree 0.0197, pedigree (4,4,4,3,2)
  Material composition of cooling tower construction
  properties: dry mass 1 kg, wet mass 1 kg
- zinc coat, coils: 12091 m2; lognormal variance with pedigree 0.0197, pedigree (4,4,4,3,2)
  Process done to zinc for coating

## Sampling procedure
This dataset is entirely based on the detailed life cycle inventory as presented in the dissertation report by
Telsnig, Thomas. 2015. Standortabhängige Analyse und Bewertung solarthermischer Kraftwerke am Beispiel Südafrikas. Forschungsbericht. Band 123. ISSN 0938-1228. Institut für Energiewirtschaft und Rationelle Energieanwendung, Universität Stuttgart, Germany.

Further, data in Telsnig 2015 are not shown explicitely for the downscaled 50 MW parabolic trough power plant. This gap is filled in the ecoinvent report.

## Extrapolations
This dataset has been extrapolated from a dataset modelled for the location Upington, South Africa.
The original data modelling a 250 MW power plant have been scaled down with parameter specific linear and non-linear equations to represent a 50 MW plant design.
Uncertainty has not been adjusted as it is assumed that the modelled 50 MW parabolic trough plant would be very similar in other parts of the world.

## Review by Christopher Oberschelp 2017-03-06
Very detailed and well-structured dataset with in-depth documentation. Key exchanges have been found reasonable. Comparison of impacts with other technologies might now help to spot any unusual or unexpected exchanges.
