# limestone production, crushed, washed

Dataset: EcoSpold 2, unit process
Geography: RoW
Time period: 2000-01-01 to 2023-12-31
Technology level: current
Classification: ISIC rev.4 ecoinvent: 0810:Quarrying of stone, sand and clay
Classification: EcoSpold01Categories: construction materials/additives
Tags: ConvertedDataset
Scenario: Business-as-Usual
System model: Allocation, cut-off by classification
Generated by: Daniel Kellenberger (obsolete)
Published in: Kellenberger D. 2007
Database: ecoinvent
isCopyrightProtected: true
accessRestrictedTo: 1

## General comment
Infrastructure data are estimated based on a site visit and sketches of the process. The value of the infrastructure is normalized with a annual production capacity of about 195'000 tons of product per year. The estimated lifespan of the machines is 25 years. Assumed size partition of dust emissions for crushing, screening and transport processes: 50% >10µm (PM10), 45% between 10 µm and 2.5 µm, 5%<2.5 µm. Limestone, crushed, washed is a pre-product for the milling process. 50% of the electricity consumption is covered by the grid and 50% by a hydropower plant nearby. The infrastructure for electricity transportation from power plant to KFN is not included. 50% of the electricity consumption is covered by the grid and 50% by a hydropower plant nearby. The infrastructure for electricity transportation from power plant to KFN is not included.

## Included activities start
From limestone unprocessesd

## Included activities end
This activity ends with the limestone, crushed, for mill.

This dataset includes the processes: crushing, washing, and transportation by conveyor belt. One part of the total heating energy for "production" and "administration" is included. Equipment included in the infrastructure: 2 crushers, 2 sieves, and 2 small silos.

## Geography
data are from only one company in Switzerland (KFN), for some exchanges RER-modules have been used as proxy

## Technology
The company works on a technically high level; heavy machines (excl. building machines) are operated electrically; air recirculated in closed loop to avoid dust emissions; ground water used for washing.

## Parameters
- Quebec gross domestic product 2011: 3.11e11 USD(2011); name quebecGDP2011; lognormal variance with pedigree 0.0006, pedigree (1,1,1,1,1)
  Quebec Gross domestic product for 2011, expressed in 2011 USD. Source: Institut de la statistique du Québec. Converted from CAD to USD using a yearly average exchange rate of 0.989 CAD/USD (Source: bank of Canada).
- fraction, process water, to air: 0.291902 dimensionless; name fraction_PW_to_air; lognormal variance with pedigree 0.092025, pedigree (4,4,3,2,4)
- quebec production volume: 1.26605e9 kg; name PV_Quebec; lognormal variance with pedigree 0.0006, pedigree (1,1,1,1,1)
  2012 limestone production, crushed, and sent to kiln in Quebec. Primary data from the only quicklime producer in Quebec (Canada).
- world gross domestic product 2011: 7e13 USD(2011); name worldGDP2011; lognormal variance with pedigree 0.0006, pedigree (1,1,1,1,1)
  World Gross domestic product for 2011, expressed in 2011 USD. Source: World Bank.

## Reference product
- limestone, crushed, washed: 1 kg; By-product classification allocatable product; CPC 15200: Gypsum; anhydrite; limestone flux; limestone and other calcareous stone, of a kind used for the manufacture of[…]; HS2017 252100: Limestone flux; limestone and other calcareous stone, of a kind used for the manufacture of lime or cement; CAS 1317-65-3
  EcoSpold01Location=CH
  production volume 2.81298e11 kg; name PV_world; = PV_Quebec*worldGDP2011/quebecGDP2011
    Gross approximation of World production volume using relative value of Quebec (Canada) GDP to world GDP. See parameters.
  property carbon content, fossil 0.117257
    Table 3.1, ecoinvent v2.2 report 7, part VII, pg 3. MW CaCO3=100, MW MgCO3=84. C content of limestone is 0.117257 kg/kg DM
  property price 0.014 EUR2005
    Calculated value based on data from United Nations Commodity Trade Statistics Database (comtrade.un.org). UN comtrade category: 252100 Limestone materials for manufacture of lime or cement. Using exchange rate of 1EURO = 1.209 USD. Average of price of import into 5 main markets (EU, US, JP, IN and CN).
  properties: carbon allocation 0.117023 kg, carbon content 0.117257, carbon content, non-fossil 0, dry mass 0.998 kg, heating value, net 0 MJ, water content 0.00200401, water in wet mass 0.002 kg, wet mass 1 kg

## Inputs from technosphere
- conveyor belt: 2.07e-8 m; lognormal variance with pedigree 0.3706, pedigree (4,3,5,5,1)
  EcoSpold01Location=RER
- diesel, burned in building machine: 0.00340282 MJ; lognormal variance with pedigree 0.0444, pedigree (2,3,5,5,2)
  Extrapolated value, based on "limestone production, crushed, washed, QC 2012" dataset. Takes into account diesel consumption for onsite transportation of material.
  properties: heating value, net 1 MJ
- electricity, high voltage: 0.00036 kWh; lognormal variance with pedigree 0.0421, pedigree (1,2,5,5,1)
  activityLink added to better reflect the reality of the supply chain
- electricity, medium voltage: 1.01361e-5, 0.000202192, 5.0616e-6, 3.10401e-6, 6.21264e-7, 1.33399e-7, 1.41184e-5, 2.08794e-5, 4.37431e-5, 6.0011e-5 kWh (10 suppliers, which the file names only by identifier); sum of these 0.00036 kWh; lognormal variance with pedigree 0.0421, pedigree (1,2,5,5,1)
  EcoSpold01Location=CH
- heat, central or small-scale, other than natural gas: 1.91041e-5, 0.0013909 MJ (2 suppliers, which the file names only by identifier); sum of these 0.00141 MJ; lognormal variance with pedigree 0.0421, pedigree (1,2,5,5,1)
  EcoSpold01Location=CH
  properties: heating value, net 1 MJ
- industrial machine, heavy, unspecified: 9.11e-6 kg; lognormal variance with pedigree 0.3706, pedigree (4,3,5,5,1)
  EcoSpold01Location=RER
- limestone, unprocessed: 0.0379969, 0.962003 kg (2 suppliers, which the file names only by identifier); sum of these 1 kg; lognormal variance with pedigree 0.0726, pedigree (3,3,5,5,3)
  EcoSpold01Location=CH
  properties: carbon content, fossil 0.117257, dry mass 0.998 kg, water content 0.00200401, wet mass 1 kg
  note on carbon content, fossil: Table 3.1, ecoinvent v2.2 report 7, part VII, pg 3. MW CaCO3=100, MW MgCO3=84. C content of limestone is 0.117257 kg/kg DM

## Inputs from nature
- Water, well, in ground [natural resource, in water]: 0.0001875 m3; name water_well_in_ground_input; source IPPC - Integrated Pollution Prevention a 2010; lognormal variance with pedigree 0.0546, pedigree (3,3,5,5,1)
  Estimation, based on company data. The total water consumption for hydratation by 2001 was 11.010 m3 and the total pumped water was 19.450 m3. Half of this amount is assumed that is used for the process and the rest for limestone crushing (for kiln).
  Calculated based on literature(IPPC, 2010, Cement, Lime and Magnesium Oxide Manufacturing Industries; Byers, W., 2003, Industrial Water Management), (Vionnet, S., Quantis Water Database - Technical Report, 2012). The water use is 0.5 - 2 m3/tonne of limestone, 85% is recycled, so only 15% of this amount needs to be added from fresh water. The amount of water extracted based on IPPC, the evaporation rate based on Byers. It includes the process of crushing, but there is no water use during crushing. The amount of water used during washing varies depending on the amount of inpurities. The process ends when the limestone is in such a status that it can be fed into the cement kiln.
  Estimation, based on company data. The total water consumption for hydratation by 2001 was 11.010 m3 and the total pumped water was 19.450 m3. Half of this amount is assumed that is used for the process and the rest for limestone crushing (for kiln).
  Calculated based on literature(IPPC, 2010, Cement, Lime and Magnesium Oxide Manufacturing Industries; Byers, W., 2003, Industrial Water Management), (Vionnet, S., Quantis Water Database - Technical Report, 2012). The water use is 0.5 - 2 m3/tonne of limestone, 85% is recycled, so only 15% of this amount needs to be added from fresh water. The amount of water extracted based on IPPC, the evaporation rate based on Byers. It includes the process of crushing, but there is no water use during crushing. The amount of water used during washing varies depending on the amount of inpurities. The process ends when the limestone is in such a status that it can be fed into the cement kiln.

## Emissions to nature
- Particulate Matter, < 2.5 um [air, non-urban air or from high stacks]: 8.71e-7 kg; lognormal variance with pedigree 0.25, pedigree (1,5,5,5,4)
- Particulate Matter, > 10 um [air, non-urban air or from high stacks]: 8.71e-6 kg; lognormal variance with pedigree 0.25, pedigree (1,5,5,5,4)
- Particulate Matter, > 2.5 um and < 10um [air, non-urban air or from high stacks]: 7.84e-6 kg; lognormal variance with pedigree 0.25, pedigree (1,5,5,5,4)
- Water [air, unspecified]: 5.47316e-5 m3; name water_to_air_unspecified; lognormal variance with pedigree 0.0827, pedigree (2,2,5,5,1)
  Calculated value based on literature values and expert opinion. See comments in the parametres' comment field.
  property fraction, origin: fresh water 1; name fraction_origin_fresh_water
  property fraction, origin: salt water 0; name fraction_origin_salt_water
  property fraction, origin: unspecified 0; name fraction_origin_unspecified
- Water [water, unspecified]: 0.000132768 m3; name water_to_water_unspecified; lognormal variance with pedigree 0.0827, pedigree (2,2,5,5,1)
  (same comment as for Water)
  property carbon content, fossil 0; name C_content_fossil
  property carbon content, non-fossil 0; name C_content_non_fossil
  property dry mass 0 kg; name DM
  property fraction, origin: fresh water 1; name fraction_origin_fresh_water_Ww
  property fraction, origin: salt water 0; name fraction_origin_salt_water_Ww
  property fraction, origin: unspecified 0; name fraction_origin_unspecified_Ww
  property water in wet mass 1000 kg; name WWM
  property wet mass 1000 kg; name WM

## Sampling procedure
survey

## Extrapolations
data which are only available for RER have been used as proxy for CH This dataset has been copied from an original dataset covering the geography CH. The uncertainty has been adjusted accordingly.

## Review by Roberto Dones 2003-07-23
passed

## Review by Bo Weidema 2012-09-28
replaced "electricity, high voltage, hydro, run-of-river" with "electricity, high voltage" + activity link to "electricity production, hydro, run-of-river"
