# treatment of tyre wear emissions, passenger car

Dataset: EcoSpold 2, unit process
Geography: RoW
Time period: 2012-01-01 to 2023-12-31
Technology level: current
Classification: ISIC rev.4 ecoinvent: 3821:Treatment and disposal of non-hazardous waste
Scenario: Business-as-Usual
System model: Allocation, cut-off by classification
Generated by: Andrew Simons
Published in: Ntziachristos L., Paul P. 2009
Database: ecoinvent
isCopyrightProtected: true
accessRestrictedTo: 1

## General comment
This dataset represents the treatment of non-exhaust emissions produced by average passenger car tyre abrasion. The datasets are treatments because they represent a removal of substances from the technosphere (removal of tyre material). This dataset represents the average data for the operation of average passenger car. Calculation of non-exhaust emissions (tyre, brake and road wear emissions as well as petrol evaporation emissions) are based on: Ntziachristos, L., Boulter, P. (2009b). EMEP/EEA air pollutant emissions inventory guidebook 2009: Road vehicle tyre and brake wear; Road surface wear. Copenhagen, European Environment Agency. The emission factors relate to 1kg tyre wear. The quantity of tyre wear emissions per kg vehicle and km is defined in the transport datasets. The tyre wear emissions are to air, water and soil. All particulates are accounted for as emissions to air and have particle sizes below 100um. Anything above this does not remain airborne over longer periods. Total particulates equals total of all air emission substances. The fractions to water and soil are calculated by deducting the airborne emissions from the total tyre wear. This remaining amount is then simply split 50/50 between water and soil.

## Included activities start
The activity starts with the abrasion of passenger cart tyres on the road

## Included activities end
The activity ends with emissions of passenger car tyre wear

## Reference product
- tyre wear emissions, passenger car: -1 kg; source Ntziachristos L., Paul P. 2009; By-product classification Waste; CPC 39260: Used pneumatic tyres of rubber; HS2017 262190: Slag and ash n.e.c. in chapter 26; including seaweed ash (kelp) but excluding ash and residues from the inc[...]
  production volume 1.62453e9 kg
    Estimation. Value represents 2008 because regional annual production volume was only available for this year. Calculated from production volume of reference product using the relative outputs. Extrapolation from vkm data for Europe in 1990 and 2008, and for GLO in 1990. a) Tyre wear emissions RER 1990 = 4.707E+08 kg b) Tyre wear emissions RER 2008 = 5.954E+08 kg c) Tyre wear emissions GLO 1990 = 1.755E+09 kg Tyre wear emissions GLO 2008 = (b/a)*c Extrapolation from vkm data for Europe and GLO using: Shafer A., The global demand for motorized mobility, 1998, Elsevier <http://www.sciencedirect.com/science/article/pii/S0965856498000044>
  property price 0 EUR2005
    Waste products are assigned a price of zero as they are assumed to require further treatment.
  properties: carbon allocation 0 kg, carbon content 0

## Emissions to nature
All rows: lognormal variance with pedigree 0.0419, pedigree (2,2,5,4,1)
- Aluminium III [air, urban air close to ground]: 7.2e-5 kg; source Ntziachristos L., Paul P. 2009
  Literature value
- Antimony ion [air, urban air close to ground]: 4.44e-7 kg; source Ntziachristos L., Paul P. 2009
  Literature value
- Arsenic ion [air, urban air close to ground]: 5.29e-6 kg; source Ntziachristos L., Paul P. 2009
  Literature value
- Barium II [air, urban air close to ground]: 2.78e-5 kg; source Ntziachristos L., Paul P. 2009
  Literature value
- Bromine [air, urban air close to ground]: 4.44e-6 kg; source Ntziachristos L., Paul P. 2009
  Literature value
- Cadmium II [air, urban air close to ground]: 1.04e-6 kg; source Ntziachristos L., Paul P. 2009
  Literature value
- Calcium II [air, urban air close to ground]: 0.000198 kg; source Ntziachristos L., Paul P. 2009
  Literature value
- Carbon [air, urban air close to ground]: 0.034 kg; source Ntziachristos L., Paul P. 2009
  Literature value
- Chlorine [air, urban air close to ground]: 0.000116 kg; source Ntziachristos L., Paul P. 2009
  Literature value
- Chromium III [air, urban air close to ground]: 5.29e-6 kg; source Ntziachristos L., Paul P. 2009
  Literature value
- Cobalt II [air, urban air close to ground]: 2.84e-6 kg; source Ntziachristos L., Paul P. 2009
  Literature value
- Copper ion [air, urban air close to ground]: 3.87e-5 kg; source Ntziachristos L., Paul P. 2009
  Literature value
- Iron ion [air, urban air close to ground]: 0.00038 kg; source Ntziachristos L., Paul P. 2009
  Literature value
- Lead II [air, urban air close to ground]: 3.91e-5 kg; source Ntziachristos L., Paul P. 2009
  Literature value
- Lithium I [air, urban air close to ground]: 2.89e-7 kg; source Ntziachristos L., Paul P. 2009
  Literature value
- Manganese II [air, urban air close to ground]: 1.13e-5 kg; source Ntziachristos L., Paul P. 2009
  Literature value
- Molybdenum VI [air, urban air close to ground]: 6.22e-7 kg; source Ntziachristos L., Paul P. 2009
  Literature value
- Nickel II [air, urban air close to ground]: 6.64e-6 kg; source Ntziachristos L., Paul P. 2009
  Literature value
- Nitrate [air, urban air close to ground]: 0.000333 kg; source Ntziachristos L., Paul P. 2009
  Literature value
- Organic carbon [air, urban air close to ground]: 0.08 kg; source Ntziachristos L., Paul P. 2009
  Literature value
- PAH, polycyclic aromatic hydrocarbons [air, urban air close to ground]: 8.67e-7 kg; source Ntziachristos L., Paul P. 2009
  Literature value
- Particulate Matter, < 2.5 um [air, urban air close to ground]: 0.0498 kg; source Ntziachristos L., Paul P. 2009
  Literature value. The three classes of particulates are included in the total emissions together with other air emissions. This implies a (minor) double-counting of mass as by Ecoinvent quality guidelines in "Overview and methodology, final draft revision 2, Weidema et al., 2012
- Particulate Matter, > 10 um [air, urban air close to ground]: 0.0474 kg; source Ntziachristos L., Paul P. 2009
  (same comment as for Particulate Matter, < 2.5 um)
  property carbon content, fossil 0.922579; name C_content_fossil
  property carbon content, non-fossil 0; name C_content_non_fossil
  property dry mass 1 kg; name DM
  property water content 0; name water_content
  property water in wet mass 0 kg; name WWM
  property wet mass 1 kg; name WM
- Particulate Matter, > 2.5 um and < 10um [air, urban air close to ground]: 0.0214 kg; source Ntziachristos L., Paul P. 2009
  (same comment as for Particulate Matter, < 2.5 um)
- Potassium I [air, urban air close to ground]: 6.22e-5 kg; source Ntziachristos L., Paul P. 2009
  Literature value
- Selenium IV [air, urban air close to ground]: 4.44e-6 kg; source Ntziachristos L., Paul P. 2009
  Literature value
- Silicon [air, urban air close to ground]: 0.00038 kg; source Ntziachristos L., Paul P. 2009
  Literature value
- Silver I [air, urban air close to ground]: 2.22e-8 kg; source Ntziachristos L., Paul P. 2009
  Literature value
- Sodium I [air, urban air close to ground]: 0.000143 kg; source Ntziachristos L., Paul P. 2009
  Literature value
- Strontium II [air, urban air close to ground]: 3.2e-6 kg; source Ntziachristos L., Paul P. 2009
  Literature value
- Sulfate [air, urban air close to ground]: 0.000555 kg; source Ntziachristos L., Paul P. 2009
  Literature value
- Sulfur dioxide [air, urban air close to ground]: 0.000489 kg; source Ntziachristos L., Paul P. 2009
  Sulphur as Sulphur dioxide. Literature value
- Titanium ion [air, urban air close to ground]: 8.4e-5 kg; source Ntziachristos L., Paul P. 2009
  Literature value
- Vanadium V [air, urban air close to ground]: 2.22e-7 kg; source Ntziachristos L., Paul P. 2009
  Literature value
- Zinc II [air, urban air close to ground]: 0.00165 kg; source Ntziachristos L., Paul P. 2009
  Literature value
- Aluminium III [soil, unspecified]: 0.000268 kg; source Ntziachristos L., Paul P. 2009
  Literature value
- Antimony ion [soil, unspecified]: 1.65e-6 kg; source Ntziachristos L., Paul P. 2009
  Literature value
- Arsenic ion [soil, unspecified]: 3.14e-6 kg; source Ntziachristos L., Paul P. 2009
  Literature value
- Barium II [soil, unspecified]: 0.000103 kg; source Ntziachristos L., Paul P. 2009
  Literature value
- Bromine [soil, unspecified]: 1.65e-5 kg; source Ntziachristos L., Paul P. 2009
  Literature value
- Cadmium II [soil, unspecified]: 3.89e-6 kg; source Ntziachristos L., Paul P. 2009
  Literature value
- Calcium II [soil, unspecified]: 0.000737 kg; source Ntziachristos L., Paul P. 2009
  Literature value
- Carbon [soil, unspecified]: 0.126 kg; source Ntziachristos L., Paul P. 2009
  Literature value
- Chlorine [soil, unspecified]: 0.00043 kg; source Ntziachristos L., Paul P. 2009
  Literature value
- Chromium III [soil, unspecified]: 1.97e-5 kg; source Ntziachristos L., Paul P. 2009
  Literature value
- Cobalt II [soil, unspecified]: 1.06e-5 kg; source Ntziachristos L., Paul P. 2009
  Literature value
- Copper ion [soil, unspecified]: 0.000144 kg; source Ntziachristos L., Paul P. 2009
  Literature value
- Iron ion [soil, unspecified]: 0.00142 kg; source Ntziachristos L., Paul P. 2009
  Literature value
- Lead II [soil, unspecified]: 0.000146 kg; source Ntziachristos L., Paul P. 2009
  Literature value
- Lithium I [soil, unspecified]: 1.07e-6 kg; source Ntziachristos L., Paul P. 2009
  Literature value
- Manganese II [soil, unspecified]: 4.22e-5 kg; source Ntziachristos L., Paul P. 2009
  Literature value
- Molybdenum VI [soil, unspecified]: 2.31e-6 kg; source Ntziachristos L., Paul P. 2009
  Literature value
- Nickel II [soil, unspecified]: 2.47e-5 kg; source Ntziachristos L., Paul P. 2009
  Literature value
- Nitrate [soil, unspecified]: 0.00124 kg; source Ntziachristos L., Paul P. 2009
  Literature value
- Organic carbon [soil, unspecified]: 0.298 kg; source Ntziachristos L., Paul P. 2009
  Literature value
- PAH, polycyclic aromatic hydrocarbons [soil, unspecified]: 3.22e-6 kg; source Ntziachristos L., Paul P. 2009
  Literature value
- Potassium I [soil, unspecified]: 0.000231 kg; source Ntziachristos L., Paul P. 2009
  Literature value
- Selenium IV [soil, unspecified]: 1.65e-5 kg; source Ntziachristos L., Paul P. 2009
  Literature value
- Silicon [soil, unspecified]: 0.00149 kg; source Ntziachristos L., Paul P. 2009
  Literature value
- Silver I [soil, unspecified]: 8.27e-8 kg; source Ntziachristos L., Paul P. 2009
  Literature value
- Sodium I [soil, unspecified]: 0.000533 kg; source Ntziachristos L., Paul P. 2009
  Literature value
- Strontium II [soil, unspecified]: 1.19e-5 kg; source Ntziachristos L., Paul P. 2009
  Literature value
- Sulfate [soil, unspecified]: 0.00207 kg; source Ntziachristos L., Paul P. 2009
  Literature value
- Sulfur [soil, unspecified]: 0.000486 kg; source Ntziachristos L., Paul P. 2009
  Literature value
- Titanium ion [soil, unspecified]: 0.000313 kg; source Ntziachristos L., Paul P. 2009
  Literature value
- Vanadium V [soil, unspecified]: 8.27e-7 kg; source Ntziachristos L., Paul P. 2009
  Literature value
- Zinc II [soil, unspecified]: 0.00615 kg; source Ntziachristos L., Paul P. 2009
  Literature value
- Aluminium III [water, ground-]: 0.000268 kg; source Ntziachristos L., Paul P. 2009
  Literature value
- Antimony ion [water, ground-]: 1.65e-6 kg; source Ntziachristos L., Paul P. 2009
  Literature value
- Arsenic ion [water, ground-]: 3.14e-6 kg; source Ntziachristos L., Paul P. 2009
  Literature value
- Barium II [water, ground-]: 0.000103 kg; source Ntziachristos L., Paul P. 2009
  Literature value
- Bromine [water, ground-]: 1.65e-5 kg; source Ntziachristos L., Paul P. 2009
  Literature value
- Cadmium II [water, ground-]: 3.89e-6 kg; source Ntziachristos L., Paul P. 2009
  Literature value
- Calcium II [water, ground-]: 0.000737 kg; source Ntziachristos L., Paul P. 2009
  Literature value
- Carbon [water, ground-]: 0.126 kg; source Ntziachristos L., Paul P. 2009
  Literature value
- Chlorine [water, ground-]: 0.00043 kg; source Ntziachristos L., Paul P. 2009
  Literature value
- Chromium III [water, ground-]: 1.97e-5 kg; source Ntziachristos L., Paul P. 2009
  Literature value
- Cobalt II [water, ground-]: 1.06e-5 kg; source Ntziachristos L., Paul P. 2009
  Literature value
- Copper ion [water, ground-]: 0.000144 kg; source Ntziachristos L., Paul P. 2009
  Literature value
- Iron ion [water, ground-]: 0.00142 kg; source Ntziachristos L., Paul P. 2009
  Literature value
- Lead II [water, ground-]: 0.000146 kg; source Ntziachristos L., Paul P. 2009
  Literature value
- Lithium I [water, ground-]: 1.07e-6 kg; source Ntziachristos L., Paul P. 2009
  Literature value
- Manganese II [water, ground-]: 4.22e-5 kg; source Ntziachristos L., Paul P. 2009
  Literature value
- Molybdenum VI [water, ground-]: 2.31e-6 kg; source Ntziachristos L., Paul P. 2009
  Literature value
- Nickel II [water, ground-]: 2.47e-5 kg
  Literature value
- Nitrate [water, ground-]: 0.00124 kg; source Ntziachristos L., Paul P. 2009
  Literature value
- Organic carbon [water, ground-]: 0.298 kg; source Ntziachristos L., Paul P. 2009
  Literature value
- PAH, polycyclic aromatic hydrocarbons [water, ground-]: 3.22e-6 kg; source Ntziachristos L., Paul P. 2009
  Literature value
- Potassium I [water, ground-]: 0.000231 kg; source Ntziachristos L., Paul P. 2009
  Literature value
- Selenium IV [water, ground-]: 1.65e-5 kg; source Ntziachristos L., Paul P. 2009
  Literature value
- Silicon [water, ground-]: 0.00149 kg; source Ntziachristos L., Paul P. 2009
  Literature value
- Silver I [water, ground-]: 8.27e-8 kg; source Ntziachristos L., Paul P. 2009
  Literature value
- Sodium I [water, ground-]: 0.000533 kg; source Ntziachristos L., Paul P. 2009
  Literature value
- Strontium II [water, ground-]: 1.19e-5 kg; source Ntziachristos L., Paul P. 2009
  Literature value
- Sulfate [water, ground-]: 0.00207 kg; source Ntziachristos L., Paul P. 2009
  Literature value
- Sulfur [water, ground-]: 0.00182 kg; source Ntziachristos L., Paul P. 2009
  Literature value
- Titanium ion [water, ground-]: 0.000313 kg; source Ntziachristos L., Paul P. 2009
  Literature value
- Vanadium V [water, ground-]: 8.27e-7 kg; source Ntziachristos L., Paul P. 2009
  Literature value
- Zinc II [water, ground-]: 0.00615 kg; source Ntziachristos L., Paul P. 2009
  Literature value

## Sampling procedure
Literature

## Extrapolations
Extrapolation from dataset of Switzerland using GDP per capita and p/v values.Source: Shafer A., The global demand for motorized mobility, 1998, Elsevier <http://www.sciencedirect.com/science/article/pii/S0965856498000044> World Bank.org <http://data.worldbank.org/indicator/NY.GDP.PCAP.CD/countries?display=default>
