# aluminium oxide, metallurgical, import from Northern America

Dataset: EcoSpold 2, unit process
Geography: IAI Area, EU27 & EFTA
Time period: 2015-01-01 to 2023-12-31
Technology level: current
Classification: ISIC rev.4 ecoinvent: 2420:Manufacture of basic precious and other non-ferrous metals
Classification: EcoSpold01Categories: metals/extraction
Scenario: Business-as-Usual
System model: Allocation, cut-off by classification
Generated by: Lucia Valsasina
Published in: European Aluminium 2018
Database: ecoinvent
isCopyrightProtected: true
accessRestrictedTo: 1

## General comment
This dataset represents the amount of imported primary aluminium oxide metallurgical from Northern America to EU27 & EFTA. The import value is valid for 2015 and includes all imports, independently whether used within the importing region, or re-exported.

## Included activities start
The activity starts at the factory gate with the product ready for transport.

## Included activities end
This activity includes the transport from the exporting region (including transport within the region) to EU27 & EFTA.

## Reference product
- aluminium oxide, metallurgical: 1 kg; By-product classification allocatable product; CPC 41432: Alumina (aluminium oxide), except artificial corundum; HS2017 2818: Aluminium oxide (including artificial corundum); aluminium hydroxide; CAS 1344-28-1
  production volume 9.09867e7 kg; = 4743750000/0.61*0.39*0.03
    Estimate based on official trade data.
  property price 0.28 EUR2005
    From UN trade database. http://data.un.org/ Import data from the largest economies of the world are used (Brazil, India, USA, China, Japan and EU-27).
  properties: carbon allocation 0 kg, carbon content 0, carbon content, fossil 0, carbon content, non-fossil 0, dry mass 1 kg, water content 0, water in wet mass 0 kg, wet mass 1 kg

## Inputs from technosphere
- aluminium oxide, metallurgical: 1 kg; lognormal variance with pedigree 0.0086, pedigree (1,1,4,1,1)
  properties: dry mass 1 kg, wet mass 1 kg
- transport, freight train: 0.05 metric ton*km; = 50/1000; lognormal variance with pedigree 0.212, pedigree (5,4,4,5,4)
  Estimated value. Data set equal to average transport distances within the region of Europe, this accounts for transport within the region of Northern America. The data for Europe comes is extracted from the 2018 European aluminium association ENVIRONMENTAL
  PROFILE REPORT. Life-Cycle inventory data for aluminium production and transformation processes in Europe. Accessible from: https://www.european-aluminium.eu/
  Uncertainty: Default uncertainty and pedigree applied for all similar autogenerated amounts
- transport, freight, inland waterways, barge: 0.2 metric ton*km; = 200/1000; lognormal variance with pedigree 0.212, pedigree (5,4,4,5,4)
  Estimated value. Data set equal to average transport distances within the region of Europe, this accounts for transport within the region of Northern America. The data for Europe comes is extracted from the 2018 European aluminium association ENVIRONMENTAL
  PROFILE REPORT. Life-Cycle inventory data for aluminium production and transformation processes in Europe. Accessible from: https://www.european-aluminium.eu/
- transport, freight, lorry, unspecified: 0.005 metric ton*km; = 5/1000; lognormal variance with pedigree 0.212, pedigree (5,4,4,5,4)
  (same comment as for transport, freight train)
- transport, freight, sea, container ship: 6.5755 metric ton*km; = 6575.5/1000; lognormal variance with pedigree 0.128, pedigree (1,1,4,1,1)
  Estimated value. Set equal to the distance between the port of New York and the one of Rotterdam. Distance from the website: https://www.marinetraffic.com/
  Uncertainty: Default uncertainty and pedigree applied for all similar autogenerated amounts
