# printed wiring board production, surface mounted, unspecified, Pb containing

Dataset: EcoSpold 2, unit process
Geography: GLO
Time period: 2005-01-01 to 2023-12-31
Technology level: current
Classification: ISIC rev.4 ecoinvent: 2610:Manufacture of electronic components and boards
Classification: EcoSpold01Categories: electronics/module
Tags: ConvertedDataset
Scenario: Business-as-Usual
System model: Allocation, cut-off by classification
Generated by: Roland Hischier
Published in: Hischier R. 2007
Database: ecoinvent
isCopyrightProtected: true
accessRestrictedTo: 1

## General comment
This dataset represents 1 kg of an unspecified, surface-mounted, PWB used in electronic devices. Main data are based on literature and own dismantling activities. Infrastructure and production efforts are based on own assumptions.
"This dataset represents 1 kg of an unspecified, surface-mounted, PWB used in electronic devices. Main data are based on literature and own dismantling activities. Infrastructure and production efforts are based on own assumptions.
The composition of components is based on the printed wiring board for desktop and laptop computer."
[This dataset was already contained in the ecoinvent database version 2. It was not individually updated during the transfer to ecoinvent version 3. Life Cycle Impact Assessment results may still have changed, as they are affected by changes in the supply chain, i.e. in other datasets. This dataset was generated following the ecoinvent quality guidelines for version 2. It may have been subject to central changes described in the ecoinvent version 3 change report (http://www.ecoinvent.org/database/ecoinvent-version-3/reports-of-changes/), and the results of the central updates were reviewed extensively. The changes added e.g. consistent water flows and other information throughout the database. The documentation of this dataset can be found in the ecoinvent reports of version 2, which are still available via the ecoinvent website. The change report linked above covers all central changes that were made during the conversion process.]

## Included activities start
From reception of solder materials at the factory gate.

## Included activities end
This dataset includes component input and production efforts (incl. PWB waste due to failure in mounting) for the production of an unspecified, surface mounted, PWB, using Pb-containing solder material.

## Geography
Data represent a global valuable example for a unspecified, surface mounted, PWB.

## Technology
Average PWB mounting technology (solder paste production line)

## Reference product
- printed wiring board, surface mounted, unspecified, Pb containing: 1 kg; By-product classification allocatable product; CPC 47130: Printed circuits; HS2017 853400: Circuits; printed
  Typically, a printed wiring board (PWB) consists of a number of electric current conducting and non-conducting layers which are sandwiched together. Printed wiring boards are the interconnective electrical framework and physical structure that hold together the various electronic components.
  EcoSpold01Location=GLO
  production volume 1 kg
    Dummy value to be replaced by measured, estimated or calculated value
  property carbon content, fossil 0.132522
    C content was calculated as the addition of C content in the PWB components
  property price 364.134 EUR2005
    Calculated based on inputs: The price of the product has been calculated as a sum of the values of the material and energy inputs for this product. This value is therefore a rough estimation. It may underestimate the real price since there are additional expenses when producing any product. These expences can include for example labour costs, treatment of waste materials and profit for the producer. Please consider carefully whether this level of data quality is acceptable for your application.
  properties: carbon allocation 0.132522 kg, carbon content 0.132522, carbon content, non-fossil 0, dry mass 1 kg, water content 0, water in wet mass 0 kg, wet mass 1 kg

## Inputs from technosphere
- capacitor, for surface-mounting: 0.032653 kg; lognormal variance with pedigree 0.0701, pedigree (3,5,5,3,1)
  EcoSpold01Location=GLO
  Estimation, based on literature and own assumptions.
  Uncertainty: own assumptions - from literature & dismantling
  properties: dry mass 1 kg, wet mass 1 kg
- diode, glass-, for surface-mounting: 0.0040816 kg; lognormal variance with pedigree 0.0701, pedigree (3,5,5,3,1)
  Estimation, based on literature and own assumptions.
  EcoSpold01Location=GLO
  Uncertainty: own assumptions - from literature & dismantling
  properties: carbon content, fossil 0.00928779, dry mass 1 kg, wet mass 1 kg
  note on carbon content, fossil: Calculated as the addition of C contents in the product composition
- electric connector, peripheral component interconnect buss: 0.019388 kg; lognormal variance with pedigree 0.0701, pedigree (3,5,5,3,1)
  (same comment as for capacitor, for surface-mounting)
  properties: carbon content, fossil 0.506549, dry mass 1 kg, wet mass 1 kg
- integrated circuit, logic type: 0.17347 kg; lognormal variance with pedigree 0.0701, pedigree (3,5,5,3,1)
  (same comment as for capacitor, for surface-mounting)
  properties: carbon content, fossil 0.221701, dry mass 1 kg, wet mass 1 kg
- light emitting diode: 0.0010204 kg; lognormal variance with pedigree 0.0701, pedigree (3,5,5,3,1)
  (same comment as for capacitor, for surface-mounting)
  properties: carbon content, fossil 0.0203273, dry mass 1 kg, wet mass 1 kg
- mounting, surface mount technology, Pb-containing solder: 0.23225 m2; lognormal variance with pedigree 0.0701, pedigree (3,5,5,3,1)
  (same comment as for capacitor, for surface-mounting)
- printed wiring board, for surface mounting, Pb containing surface: 0.23225 m2; lognormal variance with pedigree 0.0701, pedigree (3,5,5,3,1)
  (same comment as for capacitor, for surface-mounting)
  properties: carbon content, fossil 0.109783, dry mass 3.26 kg, wet mass 3.26 kg
  note on carbon content, fossil: C content was calculated as the addition of C content in the PWB components, listed in Tab 2.2 (ecoinvent v2.2 report 18_II), and considering a final weight of 3.26 kg/m2 (an efficiency of 88%). Referred to 1 kg DM PWB
- resistor, surface-mounted: 0.023469 kg; lognormal variance with pedigree 0.0701, pedigree (3,5,5,3,1)
  (same comment as for capacitor, for surface-mounting)
  properties: carbon content, fossil 0.00893558, dry mass 1 kg, wet mass 1 kg
  note on carbon content, fossil: Calculated as the addition of C contents in the product composition, and referred to 1 kg DM resistor.
- transistor, surface-mounted: 0.010204 kg; lognormal variance with pedigree 0.0701, pedigree (3,5,5,3,1)
  (same comment as for diode, glass-, for surface-mounting)
  properties: carbon content, fossil 0.083636, dry mass 1 kg, wet mass 1 kg
  note on carbon content, fossil: Calculated as the addition of C contents in the product composition, and referred to 1 kg DM transistor.
- used printed wiring boards: -0.020408 kg; source Kemna R. 2005; lognormal variance with pedigree 0.0127, pedigree (3,3,1,3,1)
  Estimation, based on literature and own assumptions.
  EcoSpold01Location=GLO
  Uncertainty: data from literature plus own assumptions
  production volume
    Calculated from the production volume of printed wiring board, surface mounted, unspecified, Pb containing in proportion to the respective output amounts.
  properties: carbon content, fossil 0.193742, carbon content, non-fossil 0.000960142, dry mass 1 kg, wet mass 1 kg
  note on carbon content, fossil: Composition of printed wiring boards used to calculate C content

## Sampling procedure
literature & own estimations

## Review by Rolf Frischknecht 2007-09-21
passed.
