# onshore petroleum field infrastructure construction

Dataset: EcoSpold 2, unit process
Geography: GLO
Time period: 1990-01-01 to 2023-12-31
Technology level: current
Classification: EcoSpold01Categories: oil/production
Classification: ISIC rev.4 ecoinvent: 0910:Support activities for petroleum and natural gas extraction
Scenario: Business-as-Usual
System model: Allocation, cut-off by classification
Generated by: Christoph Meili
Published in: Meili, C. 2022
Database: ecoinvent
isCopyrightProtected: true
accessRestrictedTo: 1

## General comment
This activity represents the construction of an onshore production field with 100 wells for extraction of crude petroleum oil. Lifetime 20 years.
For onshore production, several hundred production sites (wells) are summarized to one production field. The inventory is estimated for a field with 100 drilling sites and described in more detail in Schori & Frischknecht (2012) and Jungbluth (2007). Oil and gas processing are done centrally, which requires pipes and pumps.
Onshore production requires space for pumps, separators, tanks, pipes, energy generation (for internal electricity production) as well as cleaning processes (particularly wastewater treatment). In this study a value of 1000 m2/drilling is used.
Meili et al. (2021, section 6.4) assume that the lifetime of the land use change is only 20 instead of the formerly estimated 30 (oil) or 50 (gas) years. This assumption is based on analysis done for horizontal wells in Oklahoma US.
Reference(s): C. Meili, N. Jungbluth, M. Bussa (2021) Life cycle inventories of crude oil and natural gas extraction. ESU-services Ltd. commissioned by the Federal Office for the Environment (FOEN) and the “Verband der Schweizerischen Gasindustrie (VSG), Schaffhausen, Switzerland, DOI: 10.13140/RG.2.2.29142.78409, http://esu-services.ch/data/public-lci-reports/

## Included activities start
This activity starts with the transformation of land (forest assumed).

## Included activities end
Materials for construction and energy use for construction. Land use and transformation. Drilling of the wells is not included and hence considered separately. Manufacturing of facilities partly not included.

## Geography
Data for fields in RU, US and multinational companies.

## Technology
Onshore crude oil production in the Northern hemisphere.

## Time period
Data for materials and land use based on information from 1990. New data for energy and material uses during construction.

## Parameters
- fraction, process water, to air: 0.15 dimensionless; name fraction_PW_to_air; lognormal variance with pedigree 0.092025, pedigree (4,4,3,2,4)
  Literature value. In case when no industry/process specific data are available, default evaporation fraction value is used. This value is 15% and is based on literature (Statistics Canada, 2007 & Shaffer, K.H., 2008, Consumptive water use in the Great Lakes Basin, USGS & Shiklomanov, 2003, World Water Resources at the Beginning of the 21st Century) and has been approved by an expert.

## Reference product
- onshore petroleum field infrastructure: 1 unit; By-product classification allocatable product; CPC 86211: Support services to oil and gas extraction
  EcoSpold01Location=GLO
  production volume 1 unit
    Unknown.
    Dummy value to be replaced by measured, estimated or calculated value
  property price 2.72728e7 EUR2005
    EU27 I/O database(in the 'EU & DK Input Output Database' (available in SimaPro)); -79 Building, non-residential EU 27 (calculated to be 38.169 EUR2003/kg). Based on consumption of (_53 Iron basic, virgin, EU27;7.25517782294095E-3 kg/EUR building; 0.45 EUR2003 per kg DS), (_61 Iron, after first processing, EU27;5.8766830719783E-3kg/EUR building; 0.62 EUR2003 per kg DS), (_65 Fabricated metal products, except machinery, EU27; 8.9167022775554E-3 kg/EUR building; 3.63 EUR2003 per kg DS) and (_66 Machinery and equipment n.e.c., EU27;4.15071881936446E-3 kg/EUR building; 5.71 EUR2003 per kg DS) - 720000 kg
  properties: carbon allocation 0 kg, carbon content 0

## Inputs from technosphere
- diesel, burned in building machine: 675000 MJ; lognormal variance with pedigree 0.0015, pedigree (2,3,2,3,1)
  EcoSpold01Location=GLO
  Environmental report
  Uncertainty: Environmental report
  properties: heating value, net 1 MJ
- electricity, medium voltage: 3.67e6 kWh; lognormal variance with pedigree 0.1221, pedigree (5,4,5,3,1)
  Literature
  EcoSpold01Location=UCTE
  Uncertainty: Literature
- municipal solid waste: -23.8062, -1.22248, -0.145165, -0.922334, -0.903468, -689.724, -0.10158, -0.0326055, -0.0736974, -3.06805 kg (10 suppliers, which the file names only by identifier); sum of these -720 kg; lognormal variance with pedigree 0.0007, pedigree (1,3,1,3,1)
  Environmental report
  EcoSpold01Location=CH
  Uncertainty: Environmental report
  production volume
    Calculated from the production volume of onshore petroleum field infrastructure in proportion to the respective output amounts.
  properties: carbon content, fossil 0.171549, carbon content, non-fossil 0.261655, dry mass 0.771 kg, heating value, net 11.74 MJ, water content 0.297017, wet mass 1 kg
  note on carbon content, fossil: MSW composition in tab 4.1, ecoinvent v2.2 report 13_I. C content referred to 1 kg DM
  note on heating value, net: Value taken from the general comment of the treatment dataset.
- reinforcing steel: 720000 kg; lognormal variance with pedigree 0.0221, pedigree (3,4,4,3,1)
  Literature
  EcoSpold01Location=RER
  Uncertainty: Literature
  properties: carbon content, fossil 0.004, dry mass 1 kg, wet mass 1 kg

## Inputs from nature
- Occupation, industrial area [natural resource, land]: 2e6 m2*year; = 100*1000*20; lognormal variance with pedigree 0.0621, pedigree (3,4,4,3,1)
  Lifetime of 20 years, 100 wells, and 1000m2 per drilling assumed (updated based on Meili et al. 2021 from 30 years, which was applied up to v3.8)
  Uncertainty: Life time 30a
- Transformation, from forest, unspecified [natural resource, land]: 100000 m2; lognormal variance with pedigree 0.1321, pedigree (3,4,4,3,1)
  Literature
  Uncertainty: Literature
- Transformation, to mineral extraction site [natural resource, land]: 100000 m2; lognormal variance with pedigree 0.1321, pedigree (3,4,4,3,1)
  Literature
  Uncertainty: Literature
- Water, unspecified natural origin [natural resource, in water]: 82.8 m3; name water_UNO_input; lognormal variance with pedigree 0.0009, pedigree (1,3,2,3,1)
  Environmental report
  Uncertainty: Environmental report

## Emissions to nature
- Water [air, unspecified]: 12.42 m3; name water_to_air_unspecified; = (water_UNO_input*fraction_PW_to_air); lognormal variance with pedigree 0.0409, pedigree (2,2,2,1,1)
  Calculated value based on literature values and expert opinion. See comments in the parametres' comment field.
  property fraction, origin: fresh water 0; name fraction_origin_fresh_water
  property fraction, origin: salt water 0; name fraction_origin_salt_water
  property fraction, origin: unspecified 1; name fraction_origin_unspecified
- Water [water, unspecified]: 70.38 m3; name water_to_water_unspecified; = water_UNO_input*(1-fraction_PW_to_air); lognormal variance with pedigree 0.0409, pedigree (2,2,2,1,1)
  (same comment as for Water)
  property carbon content, fossil 0; name C_content_fossil
  property carbon content, non-fossil 0; name C_content_non_fossil
  property dry mass 0 kg; name DM
  property fraction, origin: fresh water 0; name fraction_origin_fresh_water_Ww
  property fraction, origin: salt water 0; name fraction_origin_salt_water_Ww
  property fraction, origin: unspecified 1; name fraction_origin_unspecified_Ww
  property water in wet mass 1000 kg; name WWM
  property wet mass 1000 kg; name WM

## Sampling procedure
Publication in environmental reports and other literature. The inventory is estimated for a field with 100 drilling sites and described in more detail in Schori & Frischknecht (2012) and Jungbluth (2007).

## Extrapolations
Applied to all onshore operations. Data vary considerable depending on infrastructure necessary to access the place of production. No data for Middle East. It is assumed that the lifetime of the land use change is only 20 instead of the formerly estimated 30 (oil) or 50 (gas) years. This assumption is based on analysis done for horizontal wells in Oklahoma US. Here, more than half of the production of oil and gas, which is projected for the total lifetime occurs during the first three years of operation. A lifetime of 20 years might be too low for exceptionally large oil fields, such as Rumaila in Iraq. Therefore, by using this estimate, the impact of land use might be slightly underestimated for the dataset for Iraq. However, for most of the globally accessible, smaller oil fields, this estimate seems appropriate. (Meili et al. 2021, section 6.4)
