# treatment of waste wood pole, chrome preserved, municipal incineration FAE

Dataset: EcoSpold 2, unit process
Geography: CH
Time period: 2006-01-01 to 2023-12-31
Technology level: current
Classification: ISIC rev.4 ecoinvent: 3821:Treatment and disposal of non-hazardous waste
Scenario: Business-as-Usual
System model: Allocation, cut-off by classification
Generated by: Nikolia Stoikou
Database: ecoinvent
isCopyrightProtected: true
accessRestrictedTo: 1

## General comment
The process represents the treatment of 'waste wood pole, chrome preserved' in a municipal solid waste incinerator (MSWI). Recommended use of this dataset: For disposal of bulk or small parts of chrome preserved wood poles as used for electricity grids. Please note there is another, slightly different chrome preserved wood for genereal building products.Inventoried waste consists of fraction: 100% chrome-preserved wood electricity pole; . Waste composition (wet, in ppmw): gross heating value 15.36 MJ/kg; net heating value 13.99 MJ/kg; H2O 173450; O 370840; H 49982; C 400020; S 288.79; N 983.43; P 108.57; B 58.919; Cl 329.76; Br na; F 21.03; I na; Ag na; As 0.42061; Ba na; Cd 0.19979; Co 0.086459; Cr 2281.5; Cu 786.37; Hg 0.31861; Mn 52.927; Mo 0.82721; Ni 0.5538; Pb 27.767; Sb na; Se na; Sn na; V na; Zn 17.743; Be na; Sc na; Sr na; Ti na; Tl na; W na; Si na; Fe 15.423; Ca 130.42; Al 6.3093; K 65.176; Mg 196.85; Na 334.08. Share of carbon in initial waste input that is biogenic 100%.Share of metals in waste not oxidised and bulk-recyclable (exclude very small or thin parts) Iron: 0%; Alu: 0%; Copper: 0%.Recovery of metal scrap from bottom ash to recycling: 0g iron scrap, 0g aluminium scrap, 0g copper scrap. From this waste, the FLUWA process in the technology mix recovers 0.000155kg (DM) of a hydroxide sludge to be recycled in zinc furnaces. Net energy production: 1.74MJ/kg electric energy and 3.5MJ/kg thermal energy.

## Included activities start
The activity starts with the waste being available at the gate of the treatment facility. Collection and transportation of the waste to the treatment plant is not included.

## Included activities end
The activity ends with the waste being treated and waste-specific emissions from the incineration process and auxiliary material consumption for flue gas cleaning are released to the environment (air and water). Infrastructure and waste-specific energy demands for Municipal Solid Waste Incineration (MSWI) and net energy generation are included.

## Geography
Modelling parameters affecting the treatment technology are specific to this geography and to the technology mix encountered in Switzerland in 2012.

## Technology
The waste is treated in the incineration plant with flue gas cleaning. Incineration is the controlled combustion of a waste and it includes fly ash extraction (FAE). Auxiliary material consumption for this step of air pollution control (APC) are included in the process. Air polution control includes electrostatic precipitator for fly ash (ESP), wet flue gas scrubber and 25% SNCR , 42.77% SCR-high dust , 32.68% SCR-low dust -DeNOx facilities and 0% without DeNOx (weighted according to mass of burnt waste). Efficiency of iron scrap separation from slag : 58%. Efficiency of aluminium scrap separation from slag : 31%. Efficiency of copper scrap separation from slag : 31%. The technology mix for this dataset includes a filter ash treatment (FLUWA) of a share of 46.22%. Gross electric efficiency technology mix 15.84% and Gross thermal efficiency technology mix 28.51%

## Reference product
- heat, for reuse in municipal waste incineration only: 1 MJ; By-product classification allocatable product; CPC 17300: Steam and hot water
  net useful heat generated from this waste and used in internal MSWI plant energy redistribution.
  production volume 3.57252e7 MJ
    calculated in proportion to incinerated waste input
  property price 0.0106 EUR2005
    Average European district heat price from Ecoheatcool and Euroheat 2005-2006, Ecoheat Work package 1: The European heat market. Final report. 10.6 EUR/GJ i s the price of district heat. http://www.solarthermalworld.org/files/Ecoheatcool%20WP1%20Web.pdf?download
  properties: carbon allocation 0 kg, carbon content 0, exergy 0.1842 MJ, true value relation 0.1842
