# stirling heat and power co-generation unit construction, 3kW electrical, wood pellet, future

Dataset: EcoSpold 2, unit process
Geography: RoW
Time period: 2000-01-01 to 2023-12-31
Technology level: current
Classification: ISIC rev.4 ecoinvent: 4220:Construction of utility projects
Classification: EcoSpold01Categories: biomass/cogeneration
Tags: ConvertedDataset
Scenario: Business-as-Usual
System model: Allocation, cut-off by classification
Generated by: Alex Primas
Published in: Primas A. 2007
Database: ecoinvent
isCopyrightProtected: true
accessRestrictedTo: 1

## General comment
The module reflects a Stirling cogeneration unit with 3 kW electrical output. Operation of the unit with wood pellets. Inventory based on information of a pilot unit from literature and from one manufacturer. Life time operation is 80'000 h or 15 years.
[This dataset was already contained in the ecoinvent database version 2. It was not individually updated during the transfer to ecoinvent version 3. Life Cycle Impact Assessment results may still have changed, as they are affected by changes in the supply chain, i.e. in other datasets. This dataset was generated following the ecoinvent quality guidelines for version 2. It may have been subject to central changes described in the ecoinvent version 3 change report (http://www.ecoinvent.org/database/ecoinvent-version-3/reports-of-changes/), and the results of the central updates were reviewed extensively. The changes added e.g. consistent water flows and other information throughout the database. The documentation of this dataset can be found in the ecoinvent reports of version 2, which are still available via the ecoinvent website. The change report linked above covers all central changes that were made during the conversion process.]

## Included activities end
The module includes the most important materials used for production, the energy needed for production, planning and engineering. Also included is the transport of the raw materials the installation on the site.

## Geography
Process applicable in central European conditions.

## Technology
Stirling motor for combustion of wood pellets. Power range: 1-3 kW electrical output, 4.5-10.5 kW heat output. Includes pellet storage volume for one day of operation. Electrical efficiency 23%, total efficiency 90%. Performance and lifetime according to expected future values for a serial product.

## Parameters
- fraction, process water, to air: 0.15 dimensionless; name fraction_PW_to_air; lognormal variance with pedigree 0.092025, pedigree (4,4,3,2,4)

## Reference product
- stirling heat and power co-generation unit, 3kW electrical, wood pellet, future: 1 unit; By-product classification allocatable product; CPC 53262: Power plants
  EcoSpold01Location=CH
  production volume 3.96633 unit
    This is a placeholder value that does not reflect real-world production volumes. This dataset does not currently require a real-world production volume to work in the database framework, and no actual data were collected yet. This has no negative effect on the results of the ecoinvent database.
  property price 712.329 EUR2005
    Calculated based on inputs: The price of the product has been calculated as a sum of the values of the material and energy inputs for this product. This value is therefore a rough estimation. It may underestimate the real price since there are additional expenses when producing any product. These expences can include for example labour costs, treatment of waste materials and profit for the producer. Please consider carefully whether this level of data quality is acceptable for your application.
  properties: carbon allocation 0 kg, carbon content 0

## Inputs from technosphere
- aluminium, wrought alloy: 2.4 kg; lognormal variance with pedigree 0.0546, pedigree (2,4,5,5,1)
  EcoSpold01Location=RER
  Data from pilot plant design
  Uncertainty: data from pilot plant design
  properties: dry mass 1 kg, wet mass 1 kg
- building, hall, steel construction: 0.012 m2; lognormal variance with pedigree 0.372, pedigree (4,4,5,5,1)
  EcoSpold01Location=CH
  Rough estimation based on company data
  Uncertainty: rough estimation based on company data
- building, multi-storey: 0.073 m3; lognormal variance with pedigree 0.372, pedigree (4,4,5,5,1)
  Rough estimation based on company data
  EcoSpold01Location=RER
  Uncertainty: rough estimation based on company data
- cast iron: 148 kg; lognormal variance with pedigree 0.0546, pedigree (2,4,5,5,1)
  Data from pilot plant design
  EcoSpold01Location=RER
  Uncertainty: data from pilot plant design
  properties: carbon content, fossil 0.04, dry mass 1 kg, wet mass 1 kg
  note on carbon content, fossil: Cast iron is made by remelting pig iron in small furnaces (e.g. cupola furnaces or electric arc furnaces) and poured into moulds to make castings. It usually contains 2% to 6% carbon (ecoinvent v2.2 report 10_partII). An average content of 4% was considered
- ceramic tile: 0.5 kg; lognormal variance with pedigree 0.072, pedigree (4,4,5,5,1)
  Estimation
  EcoSpold01Location=CH
  Uncertainty: estimation
  properties: dry mass 1 kg, wet mass 1 kg
- copper, cathode: 4.5 kg; lognormal variance with pedigree 0.0546, pedigree (2,4,5,5,1)
  (same comment as for cast iron)
  properties: dry mass 1 kg, wet mass 1 kg
- electricity, low voltage: 1.51912, 0.0678111, 1.06638, 22.134, 2.18473, 0.0136083, 5.01643, 7.62041, 0.37752 kWh (9 suppliers, which the file names only by identifier); sum of these 40 kWh; lognormal variance with pedigree 0.064, pedigree (3,4,5,5,3)
  EcoSpold01Location=CH
  Estimation based on specific energy demand of engineering hours
  Uncertainty: estimation based on specific energy demand of engineering hours
- electricity, medium voltage: 5.19564, 103.641, 34.8232, 1.59108, 0.318454, 0.0683792, 7.23696, 10.7026, 22.4223 kWh (9 suppliers, which the file names only by identifier); sum of these 186 kWh; lognormal variance with pedigree 0.1246, pedigree (2,4,5,5,4)
  Approximation with company data of similar branch
  EcoSpold01Location=UCTE
  Uncertainty: approximation with company data of similar branch
- heat, central or small-scale, other than natural gas: 3.82081, 278.179 MJ (2 suppliers, which the file names only by identifier); sum of these 282 MJ; lognormal variance with pedigree 0.064, pedigree (3,4,5,5,3)
  Estimation based on specific energy demand of engineering hours
  EcoSpold01Location=CH
  Uncertainty: estimation based on specific energy demand of engineering hours
  properties: heating value, net 1 MJ
- heat, district or industrial, natural gas: 15.0957, 918.645, 339.259 MJ (3 suppliers, which the file names only by identifier); sum of these 1273 MJ; lognormal variance with pedigree 0.1246, pedigree (2,4,5,5,4)
  EcoSpold01Location=RER
  Approximation with company data of similar branch
  Uncertainty: approximation with company data of similar branch
  properties: heating value, net 1 MJ
- heating and sanitary equipment, mini CHP plant: 0.75 unit; lognormal variance with pedigree 0.39, pedigree (4,4,5,5,3)
  Approximation based on similar process
  EcoSpold01Location=CH
  Uncertainty: approximation based on similar process
- inert waste, for final disposal: -0.525 kg; lognormal variance with pedigree 0.032, pedigree (4,4,1,5,1)
  Based on material input of ceramic parts
  EcoSpold01Location=CH
  Uncertainty: based on material input of ceramic parts
  production volume
    Calculated from the production volume of stirling cogen unit, 3kWe, wood pellet, future in proportion to the respective output amounts.
  properties: dry mass 0.995 kg, water content 0.00502513, wet mass 1 kg
- lead: 0.12 kg; lognormal variance with pedigree 0.0546, pedigree (2,4,5,5,1)
  (same comment as for aluminium, wrought alloy)
  properties: dry mass 1 kg, wet mass 1 kg
- nickel, class 1: 0.06 kg; lognormal variance with pedigree 0.0546, pedigree (2,4,5,5,1)
  EcoSpold01Location=GLO
  Data from pilot plant design
  Uncertainty: data from pilot plant design
  properties: dry mass 1 kg, wet mass 1 kg
- polyethylene, high density, granulate: 12.6 kg; lognormal variance with pedigree 0.0546, pedigree (2,4,5,5,1)
  (same comment as for aluminium, wrought alloy)
  properties: carbon content, fossil 0.857143, dry mass 1 kg, heating value, net 42.47 MJ, wet mass 1 kg
  note on carbon content, fossil: Polyethylene is formed out of a huge amount of ethylene monomers (C2H4) (ecoinvent v2.2 report 11_II). MW=28 g/mol
- polyvinylchloride, emulsion polymerised: 0.153192 kg; lognormal variance with pedigree 0.0546, pedigree (2,4,5,5,1)
  (same comment as for cast iron)
  properties: carbon content, fossil 0.387097, dry mass 1 kg, heating value, net 21.5 MJ, wet mass 1 kg
  note on carbon content, fossil: Monomer is vynyl chloride, C2H3Cl (ecoinvent v2.2 report 11_II). MW=62 g/mol
- polyvinylchloride, suspension polymerised: 1.04681 kg; lognormal variance with pedigree 0.0546, pedigree (2,4,5,5,1)
  (same comment as for aluminium, wrought alloy)
  properties: carbon content, fossil 0.387097, dry mass 1 kg, heating value, net 21.5 MJ, wet mass 1 kg
- reinforcing steel: 136 kg; lognormal variance with pedigree 0.0546, pedigree (2,4,5,5,1)
  (same comment as for aluminium, wrought alloy)
  properties: carbon content, fossil 0.004, dry mass 1 kg, wet mass 1 kg
- sheet rolling, aluminium: 2.4 kg; lognormal variance with pedigree 0.0546, pedigree (2,4,5,5,1)
  EcoSpold01Location=RER
  Based on material input
  Uncertainty: based on material input
- sheet rolling, chromium steel: 31 kg; lognormal variance with pedigree 0.0546, pedigree (2,4,5,5,1)
  EcoSpold01Location=RER
  Based on material input
  Uncertainty: based on material input
- sheet rolling, steel: 136 kg; lognormal variance with pedigree 0.0546, pedigree (2,4,5,5,1)
  (same comment as for cast iron)
- steel, chromium steel 18/8, hot rolled: 31 kg; lognormal variance with pedigree 0.056, pedigree (3,4,5,5,1)
  EcoSpold01Location=RER
  Data from pilot plant design, assumption
  Uncertainty: data from pilot plant design, assumption
  properties: carbon content, fossil 0.0008, dry mass 1 kg, wet mass 1 kg
  note on carbon content, fossil: Stainless steel model is the grade 304 steel (18/8 stainless, 18% chromium 8% nickel; max. 0.08% C)
- stone wool, packed: 12 kg; lognormal variance with pedigree 0.0546, pedigree (2,4,5,5,1)
  EcoSpold01Location=CH
  Data from pilot plant design
  Uncertainty: data from pilot plant design
  properties: carbon content, fossil 0.015401, dry mass 1 kg, wet mass 1 kg
  note on carbon content, fossil: The chemical composition of the glass fibres used in the rock wool production is similar to the composition of naturally cooled volcano basalt and has a composition listed in Tab. 3.1 and 3.2 in ecoinvent v2.2 report 16, part XIV. Rock wool contains: a minimum of 96% mineral fibres,between 0.5 and 3.0 weight percent of phenolic resin depending on the specific product characteristics, and about 0.2 percent mineral oil (ecoinvent v2.2 report 16, part XIV). An average composition of 1.8% phenolic resin, 0.2% mineral oil, and 98% mineral fibres has been assumed and used to calculate C content of the rock wool
- tin: 0.26 kg; lognormal variance with pedigree 0.0546, pedigree (2,4,5,5,1)
  (same comment as for cast iron)
  properties: dry mass 1 kg, wet mass 1 kg
- transport, passenger car: 400 km; lognormal variance with pedigree 0.2, pedigree (4,4,5,5,3)
  EcoSpold01Location=CH
  Estimation
  Uncertainty: estimation
- waste mineral wool: -3.4898, -8.5102 kg (2 suppliers, which the file names only by identifier); sum of these -12 kg; lognormal variance with pedigree 0.0346, pedigree (2,4,3,5,3)
  Approximation for disposal of insulation material
  EcoSpold01Location=CH
  Uncertainty: approximation for disposal of insulation material
  production volume
    (same comment as for inert waste, for final disposal)
  properties: dry mass 1 kg, wet mass 1 kg
- waste polyethylene/polypropylene product: -3.56422, -9.03578 kg (2 suppliers, which the file names only by identifier); sum of these -12.6 kg; lognormal variance with pedigree 0.0346, pedigree (2,4,3,5,3)
  EcoSpold01Location=CH
  Approximation for disposal of plastic parts
  Uncertainty: approximation for disposal of plastic parts
  production volume
    (same comment as for inert waste, for final disposal)
  properties: carbon content, fossil 0.748045, dry mass 0.847 kg, heating value, net 42.47 MJ, water content 0.180638, wet mass 1 kg
  note on carbon content, fossil: Mixed various plastics was used to estimate the C content of this waste (Tab A.2, ecoinvent v2.2 report 13_I)
- waste polyvinylchloride product: -0.335827, -0.864173 kg (2 suppliers, which the file names only by identifier); sum of these -1.2 kg; lognormal variance with pedigree 0.0346, pedigree (2,4,3,5,3)
  Approximation for disposal of plastic parts
  EcoSpold01Location=CH
  Uncertainty: approximation for disposal of plastic parts
  production volume
    (same comment as for inert waste, for final disposal)
  properties: carbon content, fossil 0.440882, dry mass 0.998 kg, heating value, net 21.51 MJ, water content 0.00200401, wet mass 1 kg
- wastewater, average: -0.343612, -0.0821647, -0.00122339 m3 (3 suppliers, which the file names only by identifier); sum of these -0.427 m3; lognormal variance with pedigree 0.102, pedigree (4,4,1,5,4)
  Approximation for waste water treatment
  EcoSpold01Location=CH
  Uncertainty: approximation for waste water treatment
  production volume
    (same comment as for inert waste, for final disposal)
  properties: carbon content, non-fossil 0.194039, dry mass 0.346837 kg, mass concentration, TOC 0.1091 kg/m3, mass concentration, calcium 0.039453 kg/m3, mass concentration, chlorine 0.030031 kg/m3, mass concentration, hydrogen 0.013365 kg/m3, mass concentration, nitrogen 0.031015 kg/m3, mass concentration, oxygen 0.069824 kg/m3, mass concentration, sodium 0.06456 kg/m3, mass concentration, sulfur 0.015602 kg/m3, water content 2882.2, wet mass 1000 kg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
  note on carbon content, non-fossil: 0.0673 kg TOC/m3 (Tab A.17, ecoinvent v2.2 report 13_I). TOC was considered as Total Carbon.
- wire drawing, copper: 4.2 kg; lognormal variance with pedigree 0.0546, pedigree (2,4,5,5,1)
  Based on material input
  EcoSpold01Location=RER
  Uncertainty: based on material input
- zinc: 0.04 kg; lognormal variance with pedigree 0.0546, pedigree (2,4,5,5,1)
  (same comment as for cast iron)
  properties: dry mass 1 kg, wet mass 1 kg

## Inputs from nature
- Occupation, industrial area [natural resource, land]: 2.19 m2*year; lognormal variance with pedigree 0.112, pedigree (4,4,5,5,1)
  Rough estimation based on company data
  Uncertainty: rough estimation based on company data
- Transformation, from unspecified [natural resource, land]: 0.044 m2; lognormal variance with pedigree 0.192, pedigree (4,4,5,5,1)
  Rough estimation based on company data
  Uncertainty: rough estimation based on company data
- Transformation, to industrial area [natural resource, land]: 0.044 m2; lognormal variance with pedigree 0.192, pedigree (4,4,5,5,1)
  Rough estimation based on company data
  Uncertainty: rough estimation based on company data
- Water, unspecified natural origin [natural resource, in water]: 0.427 m3; name water_UNO_input; lognormal variance with pedigree 0.1246, pedigree (2,4,5,5,4)
  Approximation with company data of similar branch
  Uncertainty: approximation with company data of similar branch

## Emissions to nature
- Water [air, unspecified]: 0.06405 m3; name water_to_air_unspecified; lognormal variance with pedigree 0.0827, pedigree (2,2,5,5,1)
  Calculated value based on literature values and expert opinion. See comments in the parametres' comment field.
  property fraction, origin: fresh water 0; name fraction_origin_fresh_water
  property fraction, origin: salt water 0; name fraction_origin_salt_water
  property fraction, origin: unspecified 1; name fraction_origin_unspecified

## Sampling procedure
Literature data and manufacturer information

## Extrapolations
none This dataset has been copied from an original dataset covering the geography CH. The uncertainty has been adjusted accordingly.

## Review by Rolf Frischknecht 2007-08-13
passed
none
