# tap water production, underground water with chemical treatment

Dataset: EcoSpold 2, unit process
Geography: IN
Time period: 2010-01-01 to 2023-12-31
Technology level: current
Classification: EcoSpold01Categories: water supply/production
Classification: ISIC rev.4 ecoinvent: 3600:Water collection, treatment and supply
Synonyms: potable water
Tags: single enterprise data
Scenario: Business-as-Usual
System model: Allocation, cut-off by classification
Generated by: Laura Rubio
Published in: Gmünder S. 2017
Database: ecoinvent
isCopyrightProtected: true
accessRestrictedTo: 1

## General comment
This dataset is created as a child of the global dataset with edited production volume for this geography.
This dataset represents production of 1 kg of tap water under pressure at facility gate, ready for distribution in network. It represents average operation of tap water from underground water with chemical treatments. Water is pumped from aquifer, chemically enhanced (e.g. corosion inhibitor, ph, chloration, etc.) and pressurized for distribution. Inventory was constructed from reported energy inputs and wastes from a single plant located in Québec assumed to represent 8% of total production of tap water from this technology.
[This dataset is meant to replace the following datasets:
- tap water production and supply, GLO, 2000 - 2000]

## Included activities start
From the intake pumping of raw surface water into the water treatment plant.

## Included activities end
This dataset ends with the production of tap water, at facility gate, under pressure. It includes energy for intake pumping, lighting and heating of the building as well as the energy of the pump pressurizing water to the beginning of the network. Infrastructure for the facility is estimated. It excludes energy for pumping stations and water losses within the network which is included in the tap water market. Emissions to the environment occurring during the treatment and during the distribution were not considered as they are assumed negligible. Main substance in water that would be released in the environment are assumed to be considered in wastewater processes.

## Geography
Extrapolated from data from a single plant in Quebec (Canada).The uncertainty was adjusted accordingly.

## Time period
The time period is set from 2010 to the year 2017 as it is a considering period in which data has not passed through drastic changes.

## Reference product
- tap water: 1 kg; name tapwater; By-product classification allocatable product; CPC 18000: Natural water; CAS 7732-18-5
  production volume 2.9158e12 kg; name PV_tapwater; = 56073000000000*0.052
    Calculated value based on AQUASTAT total tap water production volume ( AQUASTAT, 2010)- <http://www.fao.org/nr/water/aquastat/data/popups/itemDefn.html?id=4251>. Further water treatment technology mix was based mainly on “Status of Water Treatment Plants in India” (Pollution & Board, 2010)- http://cpcb.nic.in/upload/NewItems/NewItem_103_statusofwaterqualitypackage.pdf , which compiled data from 52 treatment plants in various parts of the country. The water treatment is divided among conventional (81%), filtration treatment (6 %) and underground water with chemical treatment (5.2%). The treatment technology of the remaining 7.0% was estimated as groundwater without treatment in accordance to literature (IIHS, 2014). Overall the production technology shares, present in the ecoinvent database, are calculated to be as follows; tap water production, conventional treatment (81 %) followed by tap water production, direct filtration treatment (6.0%) , tap water production, underground water with chemical treatment (5%) and tap water production, underground water without treatment (7%).
  property price 0.000397 EUR2005
    Converted from EU price by using Purchasing Power Parities (0.8458 in 2003 and 0.8426 in 2004)
  properties: carbon allocation 6.08566e-7 kg, carbon content 0.0017899, carbon content, fossil 0.0017899, carbon content, non-fossil 0, dry mass 0.00034 kg, water content 2940.18, water in wet mass 0.99966 kg, wet mass 1 kg

## Inputs from technosphere
- electricity, medium voltage: 0.000841 kWh; lognormal variance with pedigree 0.0058, pedigree (2,3,3,5,1)
  EcoSpold01Location=UCTE
  Measured value taken from the "tap water production, underground water with chemical treatment, GLO" dataset (accessed 20170920) as it was considered adequate also for this dataset. Average electricity consumption for entire process including pumping for water intake and pumping for distribution at the plant gate. All plants (2) reported electricity use.
- pump station: 2.0568e-11 unit; lognormal variance with pedigree 0.0466, pedigree (5,4,3,5,1)
  Approximated process taken from the "tap water production, underground water with chemical treatment, GLO" dataset (accessed 20170920) as it was considered adequate also for this dataset. Used to represent facility pumping both intake and at facility gate. Value taken directly from ecoinvent V2.2 tap water, at user module.
- sodium hydroxide, without water, in 50% solution state: 5.9524e-6 kg; lognormal variance with pedigree 0.0072, pedigree (2,4,3,5,1)
  Measured value taken from the "tap water production, underground water with chemical treatment, GLO" dataset (accessed 20170920) as it was considered adequate also for this dataset. Average use of sodium hydroxide (dry basis) for adjustement in surveyed underground water with chemical treatment plants. Input of exchange "water", based on NaOH concentration, was added accordingly. Note that 1 plants reported using this substance.
  properties: dry mass 1 kg, heating value, net 3.03 MJ, wet mass 1 kg
- sodium hypochlorite, without water, in 15% solution state: 1.2e-6 kg; lognormal variance with pedigree 0.0072, pedigree (2,4,3,5,1)
  Measured value taken from the "tap water production, underground water with chemical treatment, GLO" dataset (accessed 20170920) as it was considered adequate also for this dataset. Average use of hypochlorite (dry basis) for disinfection in surveyed underground water with chemical treatment plants. Reported concentration of solution is 12% (w/w), input of exchange "water" was added accordingly. Note the 1 plants reported using this substance.
  properties: dry mass 1 kg, wet mass 1 kg
- sodium pyrophosphate: 8.12435e-7 kg; name tetrasodiumpyrophosphate; lognormal variance with pedigree 0.0072, pedigree (2,4,3,5,1)
  Measured value taken from the "tap water production, underground water with chemical treatment, GLO" dataset (accessed 20170920) as it was considered adequate also for this dataset. Average use of tetrasodium pyrophosphate reported in surveyed underground water with chemical treatment plants. Note than 1 plant reported using this substance.
- sodium silicate, solid: 8.54444e-7 kg; lognormal variance with pedigree 0.0072, pedigree (2,4,3,5,1)
  Measured value taken from the "tap water production, underground water with chemical treatment, GLO" dataset (accessed 20170920) as it was considered adequate also for this dataset. Average use of chemical reported in surveyed underground water with chemical treatment plants. Note than 1 plant reported using this substance.
  properties: dry mass 1 kg, wet mass 1 kg
- sodium tripolyphosphate: 7.91365e-7 kg; lognormal variance with pedigree 0.0072, pedigree (2,4,3,5,1)
  (same comment as for sodium silicate, solid)
  properties: dry mass 1 kg, wet mass 1 kg
- tap water: 2.41269e-5 kg; lognormal variance with pedigree 0.0072, pedigree (3,3,3,5,1)
  Calculated value taken from the "tap water production, underground water with chemical treatment, GLO" dataset (accessed 20170920) as it was considered adequate also for this dataset. Water content of hypochlorite solution, sodium hydroxide, sodium silicate solution, pyrophosphate solution and zinc polyphosphate solution.
  properties: carbon content, fossil 0.00178991, dry mass 0.000337476 kg, water content 2962.17, wet mass 1 kg
  note on carbon content, fossil: Bicarbonate content is 2.93 mol/m3. CO2 content is 0.1 mol/m3 (ecoinvent v2.2 report 8, Tab 93.1).
- water pump operation, diesel: 5.29805e-5 MJ; = diesel_use*density_diesel*NHV; lognormal variance with pedigree 0.004, pedigree (1,1,3,5,1)
  Calculated value taken from the "tap water production, underground water with chemical treatment, GLO" dataset (accessed 20170920) as it was considered adequate also for this dataset
  Uncertainty: Calculated variable. Uncertainty will be determined from propagation of uncertainty factors of underlying variables.
  property density 0.84 kg/l; name density_diesel
  property fuel input in physical units, L 1.46e-6 l; name diesel_use
  property heating value, net 43.2 MJ; name NHV
  properties: price 0.07 EUR2005
  note on fuel input in physical units, L: Measured value. Diesel volume consumed in a year. Exclusively used for routine runs of emergy generators. Diesel use was available for one plant only, but extrapolated for both.
  note on heating value, net: Literature. net (lower) heating (calorific) value for diesel in MJ/kg

## Inputs from nature
- Water, well, in ground [natural resource, in water]: 0.001 m3; name waterIn; lognormal variance with pedigree 0.2106, pedigree (5,5,5,5,5)
  Measured value, taken from the "tap water production, underground water with chemical treatment, GLO" dataset (accessed 20170920) as it was considered adequate also for this dataset. Data provider reported that no loss occurs thoughout water treatment.

## Sampling procedure
Based on data collected from a treatment plant using underground water and chemical treatment in Quebec (Canada). See corresponding Quebec dataset for more information. Note that percent representativeness is not supplied because technology-specific global production volumes is too uncertain. Should this information become available, the representativeness can be calculated by dividing the sum of the water treated by the Quebec plants that served as a basis for the Global dataset by the technology-specific global production volume. (9.74E9 kg/a)

## Extrapolations
From one underground water with chemical treatment tap water production facility in Quebec (Canada) to Indian average of same technology. Regionalization was based on the production volume, the remaining exchanges were copied from the global dataset.Underground water with chemical treatment accounts for 5.2% of the total produced tap water in India. The uncertainty has been changed accordingly.

## Review by Philippe Loubet 2017-11-23
The overall quality of this dataset is acceptable.
In the future it would be desirable to update this dataset with Indian data.
