# photovoltaic slanted-roof installation, 3kWp, multi-Si, laminated, integrated, on roof

Dataset: EcoSpold 2, unit process
Geography: RoW
Time period: 2008-01-01 to 2023-12-31
Technology level: current
Classification: ISIC rev.4 ecoinvent: 3320:Installation of industrial machinery and equipment
Classification: EcoSpold01Categories: photovoltaic/production of components
Synonyms: polycrystalline; multi-crystalline
Tags: infrastructure; photovoltaic power
Scenario: Business-as-Usual
System model: Allocation, cut-off by classification
Generated by: [System]
Published in: Jungbluth N. 2012
Database: ecoinvent
isCopyrightProtected: true
accessRestrictedTo: 1

## General comment
This dataset represents a photovoltaic installation with a capacity of 3kWp and a lifetime of 30 years installed on an average location on the world. The installation consists out of the following infrastructure parts (represented by unit processes in the database):
- Laminate: multi-Si (mc-Si)
- integrated slanted-roof mounting structure
- inverse rectifier
- 3kWp electric installation
All four main unit processes include the material uses, emissions process energies and dismantling per unit.

## Included activities start
This dataset starts from the purchase of the construction items needed for the mounting/installation of the 3kWp photovoltaic installation.

## Included activities end
This activity ends with the mounting of the photovoltaic installation.

This dataset includes all components for the installation of a 3kWp photovoltaic plant and the energy use for the mounting.

This dataset doesn't include dismantling as this is included in the infrastructure datasets.

## Geography
Average installation for a global dataset. This dataset has been copied from an original dataset covering the geography Switzerland (CH). The uncertainty has been adjusted accordingly.

## Technology
Current technology for mounting of panels or laminates, electric installations and other components. For technical details of the different installation components see in the particular infrastructure datasets. The construction process of integrated slanted-roof installations is the following way: The roof tiles are removed in the area foreseen for the solar laminates. Then steel profiles are screwed to the tile slats. Different aluminium profiles are used to make a frame for the laminate. A rubber is attached to these profiles. The laminates are placed within these frames and connected to the electric system. All edges are closed with rubber or silicones. Steel sheets are mounted at the gp between roof tiles and solar laminates.

## Time period
Calculation of amount of panels used based on efficiency data for 2005. Other data are adopted.

## Parameters
- Installed capacity: 5490 MW; name capacity_installed; lognormal variance with pedigree 0.0562, pedigree (4,2,1,3,3)
  Literature value. New installed grid-connected photovoltaic capacity in 2008
  IEA. 2009. Trends in Photovoltaic Applications:Survey report of selected IEA countries between 1992 and 2008. International Energy Agency (IEA), Report IEA-PVPS T1-18:2009, Paris Cedex (FR)
  Uncertainty: The given value for new installed grid-connected capacity in 2008 is too low, which is considered in the uncertainty.
  Investigations for the year 2009 showed the following figures:
  - Total installed capacity in 2009 (on- and offgrid or not specified in the sources): 14560MWp GLO, out of it 7450MWp installed in 2009.
  Source: Data from 30 countries (AU,AT, BE, CA, CN, CZ, DK, FI, FR, DE, GR, HU, IN, IT, JP, LU, MY, MX, NL, PT, SI, ZA, KR, ES, SE, CH, TW, TH, GB, US) and 4 sources: [1] [IEA, 2010. Trends in Photovoltaic Applications:Survey report of selected IEA countries between1992 and 2009. International Energy Agency, Report IEA-PVPS T1-19:2010]; [2] [Eurobserver, 2010. Photovoltaic barometer. Systèmes Solaires - le journal du photovoltaïque; Baromètre Photovoltaïque - Eurobserver Nr.3, avril 2010. ]; [3] [Eurobserver, 2011. Photovoltaic barometer. Systèmes Solaires - le journal du photovoltaïque; Baromètre Photovoltaïque - Eurobserver Nr.5, avril 2011.]; [4] [EPIA.Global Market Outlook for Photovoltaics until 2015. European Photovoltaic Industry Association.]
  - Total installed new capacity in 2009, total: 6188 MW (21 countries) [IEA. 2010. Trends in Photovoltaic Applications:Survey report of selected IEA countries between1992 and 2009. International Energy Agency (IEA), Report IEA-PVPS T1-19:2010, Paris Cedex (FR)]
  - New on-grid capacity in 2009: 6113 MW (21 countries) [IEA. 2010. Trends in Photovoltaic Applications:Survey report of selected IEA countries between1992 and 2009. International Energy Agency (IEA), Report IEA-PVPS T1-19:2010, Paris Cedex (FR)]
  This gives a factor of 7447/6188=1.2 between the sources.
- Share 3kWp slanted-roof installation, multi-Si, laminated, integrated, on roof: 0.0077 dimensionless; name pv_3sri_mSi_lir; lognormal variance with pedigree 0.1782, pedigree (4,5,2,5,5)
  Literature values, calculated value.
  Calculated from the shares of different types of cells in 2008 (European Photovoltaic Technology Platform 2012) and the shares of different types of mounting systems (Jungbluth et al. 2012). The latter shares are valid for Europe (RER) and do not take into account open ground PV plants. Due to lack of data for other regions or even countries on the world, the shares have been taken as calculation basis for all PV datasets. Uncertainty has been adjusted accordingly. The shares are taken to calculate all combinations of cell and mounting systems types at buildings. The final calculation then took into account the share of open ground plants, representing 35.2% of grid-connected installed capacity on the world (2008) (IEA-PVPS 2009).
  Data:
  Shares of different types of cells:
  - multi-Si: 47.7%
  - single-Si: 38.3%
  - CdTe: 6.4%
  - a-Si: 5.1%
  - ribbon-Si: 1.5%
  - CIS: 1.0%
  Shares of different types of mounting systems:
  - slanted-roof installation, panel, mounted, on roof: 65%
  - flat roof installation, on roof: 20%
  - facade installation, panel, mounted, at building: 10%
  - facade installation, laminated, integrated, at building: 2.5%
  - slanted-roof installation, laminated, integrated, on roof: 2.5%
  Sources:
  - European Photovoltaic Technology Platform. 2012. Photovoltaic Fact Sheets. The status of the PV industry (2008). LB-32-10-251-EN-D. retrieved from <http://www.eupvplatform.org/publications/misperceptions-fact-sheets.html#c2242> (accessed 31.01.2012)
  - Jungbluth N., Stucki M., Flury K., Frischknecht R. and Buesser S. (2012) Life Cycle Inventories of Photovoltaic Power Production. ESU-services Ltd., Uster, CH, retrieved from: www.esu-services.ch/data/public-lci-reports
  - IEA - PVPS 2009. Trends in photovoltaic applications. Survey report of selected IEA countries between 1992 and 2008. International Energy Agency (IEA) and Photovoltaic Power Systems Programme (PVPS). Report IEA-PVPS T1-18:2009
  Uncertainty: Basic data for the calculations are valid for Europe. Please see the general parameter comment for further discussion.
- capacity of the inverter: 2.5 kW; name capacity_inverter; lognormal variance with pedigree 0.008, pedigree (1,1,1,1,1)
  Measured value. Capacity of the inverter used for the 3kWp installations
- energy: aluminium-U-profile mounting: 0.02 kWh; name aluminium_profile; lognormal variance with pedigree 0.218, pedigree (5,5,5,5,5)
  Energy use for mounting of a 3kWp-slanted roof plant, aluminium-U-profile mounting [Schwarz U. and Keller M. 1992. ERZ und OPRZ einer 3kW-Photovoltaikanlage. Semesterarbeit ETH Zürich, Switzerland].
  Uncertainty: No information on uncertainty; insertion of a medium uncertainty.
- energy: material lift: 0.04 kWh; name material_lift; lognormal variance with pedigree 0.218, pedigree (5,5,5,5,5)
  Energy use for mounting of a 3kWp-slanted roof plant, material lift [Wiest 1993. Phone call 13.04.1993. Schweizer Metallbau AG].
  Uncertainty: No information on uncertainty; insertion of a medium uncertainty.
- energy: screws: 0.1 kWh; name screws; lognormal variance with pedigree 0.218, pedigree (5,5,5,5,5)
  Energy use for mounting of a 3kWp-slanted roof plant, screws [Schwarz U. and Keller M. 1992. ERZ und OPRZ einer 3kW-Photovoltaikanlage. Semesterarbeit ETH Zürich, Switzerland].
- energy: steel bracket mounting: 0.07 kWh; name steel_bracket; lognormal variance with pedigree 0.218, pedigree (5,5,5,5,5)
  Energy use for mounting of a 3kWp-slanted roof plant, steel bracket mounting [Schwarz U. and Keller M. 1992. ERZ und OPRZ einer 3kW-Photovoltaikanlage. Semesterarbeit ETH Zürich, Switzerland].
  Uncertainty: No information on uncertainty; insertion of a medium uncertainty.
- lifetime: 30 year; lognormal variance with pedigree 0.026625, pedigree (4,3,3,2,3)
  Oral communication. Gnos, S. 2002. Personal Communication, 10.2002. NET AG, Switzerland
- lifetime of the electric installation: 30 year; name lifetime_electric_installation; lognormal variance with pedigree 0.026625, pedigree (4,3,3,2,3)
  Oral communication. Gnos, S. 2002. Personal Communication, 10.2002. NET AG, Switzerland
- lifetime of the inverter: 15 year; name lifetime_inverter; lognormal variance with pedigree 0.026625, pedigree (4,3,3,2,3)
  Estimation.

## Reference product
- photovoltaic slanted-roof installation, 3kWp, multi-Si, laminated, integrated, on roof: 1 unit; By-product classification allocatable product; CPC 87360: Installation services of electrical machinery and apparatus n.e.c.
  EcoSpold01Location=CH
  production volume 13980.9 unit; = (capacity_installed*1000* pv_3sri_mSi_lir)/capacity
    Calculated value. See comments at the particular parameters.
  property capacity 3 kWp; name capacity
    capacity of photovoltaic cells in kWp.
  property price 14411.5 EUR2005
    Calculated based on inputs: The price of the product has been calculated as a sum of the values of the material and energy inputs for this product. This value is therefore a rough estimation. It may underestimate the real price since there are additional expenses when producing any product. These expences can include for example labour costs, treatment of waste materials and profit for the producer. Please consider carefully whether this level of data quality is acceptable for your application.
  properties: carbon allocation 0 kg, carbon content 0

## Inputs from technosphere
- electricity, low voltage: 0.00873493, 0.000389914, 0.00613166, 0.12727, 0.0125622, 7.82475e-5, 0.0288445, 0.0438173, 0.00217074 kWh (9 suppliers, which the file names only by identifier); sum of these 0.23 kWh; = aluminium_profile+ screws+ steel_bracket+ material_lift; lognormal variance with pedigree 0.056, pedigree (3,4,5,5,1)
  Literature value, calculation. Energy use for erection of 3kWp plant. Most of the energy use for mounting is due to the electricity used for drilling and screwing [Schwarz U. and Keller M. 1992. ERZ und OPRZ einer 3kW-Photovoltaikanlage. Semesterarbeit ETH Zürich, Switzerland]. Additionally the use of a lift for materials is taken into account [Wiest 1993. Phone call 13.04.1993. Schweizer Metallbau AG].
  EcoSpold01Location=CH
- inverter, 2.5kW: 2.4 unit; = ( lifetime/ lifetime_inverter)*( capacity/ capacity_inverter); lognormal variance with pedigree 0.0446, pedigree (2,4,5,5,1)
  Calculated value. The lifetime of the inverter is assumed with 15 years. Thus, it must be exchanged once during the lifetime of the plant. The inverter investigated for this study has a capacity of 2.5 kW.
  EcoSpold01Location=RER
- photovoltaic laminate, multi-Si wafer: 23.4737 m2; = panel_area*1.03; lognormal variance with pedigree 0.066, pedigree (3,4,5,5,1)
  Calculated value. For the PV panels a 2% replacement of damaged modules during the lifetime plus a further production loss during handling of 1% is assumed here.
  EcoSpold01Location=RER
- photovoltaic module, building-integrated, for slanted-roof installation: 22.79 m2; name panel_area; source de Wild-Scholten M. J. 2006; lognormal variance with pedigree 0.064, pedigree (3,1,5,5,1)
  EcoSpold01Location=RER
  Literature value/Calculated value. A cell efficiency of 14.4% and a panel efficiency of 13.2% have been taken from literature [de Wild-Scholten et al. 2006].
  Uncertainty: The original variance of 0.01 has been adjusted due to the extrapolation of the dataset from Switzerland to a global dataset.
- photovoltaics, electric installation for 3kWp module, at building: 1 unit; = lifetime/ lifetime_electric_installation; lognormal variance with pedigree 0.236, pedigree (3,4,5,5,1)
  Lognormal (Geometric mean=1, Variance of log-transformed data=0.19, Arithmetic mean of log-transformed data=0, Standard deviation=2.3912, CI/2wP, half range of confidence interval=2.4459, Variance of data with pedigree=0.2)
  Pedigree matrix: 3 4 3 5 1 , Comment: The original variance of 0.13 has been adjusted due to the extrapolation of the dataset from Switzerland to a global dataset.
  EcoSpold01Location=CH
  Uncertainty: The original variance of 0.13 has been adjusted due to the extrapolation of the dataset from Switzerland to a global dataset.

## Sampling procedure
Publication for efficiency, mounting systems and own estimations for other components.

## Extrapolations
Rough assumption for the decrease in material weights for mounting structures. This dataset has been copied from an original dataset covering the geography CH. The uncertainty has been adjusted accordingly.

## Review by Bo Weidema 2011-12-02
Dataset reviewed by two reviewers only.
