# lignite briquettes production

Dataset: EcoSpold 2, unit process
Geography: RoW
Time period: 1988-01-01 to 2023-12-31
Technology level: current
Classification: EcoSpold01Categories: lignite/fuels
Classification: ISIC rev.4 ecoinvent: 1920:Manufacture of refined petroleum products
Tags: ConvertedDataset
Scenario: Business-as-Usual
System model: Allocation, cut-off by classification
Generated by: Christian Bauer
Published in: Röder, A. 2004
Database: ecoinvent
isCopyrightProtected: true
accessRestrictedTo: 1

## General comment
Low heating value is 19.5 MJ/kg. Bulk density is 730 kg/m3. No details on the production process are available. Emission data from drying and milling available from references. The emitted trace elements are proportional to the trace elements in the lignite. Losses from the prozess (0.5 %) are accounted as lignite ashes. The energy requirements are from an onsite mine-mouth lignite power plant.
[This dataset was already contained in the ecoinvent database version 2. It was not individually updated during the transfer to ecoinvent version 3. Life Cycle Impact Assessment results may still have changed, as they are affected by changes in the supply chain, i.e. in other datasets. This dataset was generated following the ecoinvent quality guidelines for version 2. It may have been subject to central changes described in the ecoinvent version 3 change report (http://www.ecoinvent.org/database/ecoinvent-version-3/reports-of-changes/), and the results of the central updates were reviewed extensively. The changes added e.g. consistent water flows and other information throughout the database. The documentation of this dataset can be found in the ecoinvent reports of version 2, which are still available via the ecoinvent website. The change report linked above covers all central changes that were made during the conversion process.]

## Included activities end
The water content of the lignite is reduced in driers from initial 60 % to 20 %. Production of briquettes and lignite dust follows.

## Geography
German conditions.

## Technology
Details not available.

## Reference product
- lignite briquettes: 1 MJ; By-product classification allocatable product; CPC 11040: Brown coal briquettes and similar solid fuels manufactured from brown coal; HS2017 270220: Lignite; agglomerated, excluding jet
  EcoSpold01Location=DE
  production volume 3.75794 MJ
    This is a placeholder value that does not reflect real-world production volumes. This dataset does not currently require a real-world production volume to work in the database framework, and no actual data were collected yet. This has no negative effect on the results of the ecoinvent database.
  property carbon content, fossil 0.65679
    53.2% C and 19% water in wet mass (ecoinvent v2.1 report 6_VI Table 7.1)
  property heating value, net 19.5 MJ
    Based on literature, page 52, Report 5: Dones, R., Bauer, C., Bolliger, R., Burger, B., faist Emmenegger, M., Frischknecht, R., Heck, T., Jungbluth, N., Röder, A., Tuchschmid, M. (2007) Life Cycle Inventories of Energy Systems: Resulst for current Systems in Switzerland and other UCTE Countries. ecoinvent report No. 5. Paul Scherrer Institut Villigen, Swiss Centre for Life Cycle Inventories, Dübendorf, CH
  property price 0.00232 EUR2005
    Same prices as for 'lignite, burned in power plant' are assumed.
  properties: carbon allocation 0.0272821 kg, carbon content 0.65679, carbon content, non-fossil 0, dry mass 0.0415385 kg, water content 0.234568, water in wet mass 0.00974359 kg, wet mass 0.0512821 kg

## Inputs from technosphere
- electricity, high voltage: 4.57405e-5, 8.03549e-6, 5.90667e-5, 5.06205e-6, 4.3995e-5, 4.32467e-5, 5.01623e-5, 6.77341e-5, 0.00100236, 3.35836e-5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 kWh (47 suppliers, which the file names only by identifier); sum of these 0.0253 kWh; lognormal variance with pedigree 0.342, pedigree (1,1,5,5,1)
  own assumption
  EcoSpold01Location=DE
- lignite: 0.102414, 0.00858605 kg (2 suppliers, which the file names only by identifier); sum of these 0.111 kg; lognormal variance with pedigree 0.042, pedigree (1,1,5,5,1)
  standard for ressources
  EcoSpold01Location=RER
  properties: carbon content, fossil 0.655, dry mass 0.42 kg, heating value, net 8.8 MJ, water content 1.38095, wet mass 1 kg
  note on carbon content, fossil: C content of dry lignite is 58-73% (specified in Tab 1.1, report 6, part VI). A mean content of 0.655 kg C/kg dry lignite was considered.
  note on heating value, net: Based on literature, page 52, Dones R., Bauer C., Bolliger R., Burger B., Faist Emmenegger M., Frischknecht R., Heck T., Jungbluth N., Röder A., Tuchschmid M. (2007) Life Cycle Inventories of Energy Systems: Results for Current Systems in Switzerland and other UCTE Countries. ecoinvent report No. 5. Paul Scherrer Institut Villigen, Swiss Centre for Life Cycle Inventories, Dübendorf, CH.
- lignite ash: -1.51638e-7, -0.000499848 kg (2 suppliers, which the file names only by identifier); sum of these -0.0005 kg; lognormal variance with pedigree 0.012, pedigree (1,1,1,5,1)
  EcoSpold01Location=DE
  own assumption
  production volume
    Calculated from the production volume of lignite briquettes in proportion to the respective output amounts.
  properties: dry mass 1 kg, heating value, net 21.7 MJ, wet mass 1 kg
  note on heating value, net: Based on literature, page 52, Report 5: Dones, R., Bauer, C., Bolliger, R., Burger, B., faist Emmenegger, M., Frischknecht, R., Heck, T., Jungbluth, N., Röder, A., Tuchschmid, M. (2007) Life Cycle Inventories of Energy Systems: Resulst for current Systems in Switzerland and other UCTE Countries. ecoinvent report No. 5. Paul Scherrer Institut Villigen, Swiss Centre for Life Cycle Inventories, Dübendorf, CH
- lignite briquettes factory: 8.55e-13 unit; lognormal variance with pedigree 0.082, pedigree (1,1,5,5,1)
  own assumption
  EcoSpold01Location=RER

## Emissions to nature
- Aluminium III [air, non-urban air or from high stacks]: 9.5e-9 kg; lognormal variance with pedigree 0.692, pedigree (1,1,5,5,1)
  own assumption
- Antimony ion [air, non-urban air or from high stacks]: 3.2e-11 kg; lognormal variance with pedigree 0.692, pedigree (1,1,5,5,1)
  own assumption
- Arsenic ion [air, non-urban air or from high stacks]: 1e-11 kg; lognormal variance with pedigree 0.082, pedigree (1,1,5,5,1)
  own assumption
- Barium II [air, non-urban air or from high stacks]: 2e-10 kg; lognormal variance with pedigree 0.692, pedigree (1,1,5,5,1)
  own assumption
- Beryllium II [air, non-urban air or from high stacks]: 8.1e-12 kg; lognormal variance with pedigree 0.692, pedigree (1,1,5,5,1)
  own assumption
- Boron [air, non-urban air or from high stacks]: 2.4e-9 kg; lognormal variance with pedigree 0.692, pedigree (1,1,5,5,1)
  own assumption
- Bromine [air, non-urban air or from high stacks]: 3.2e-11 kg; lognormal variance with pedigree 0.692, pedigree (1,1,5,5,1)
  own assumption
- Cadmium II [air, non-urban air or from high stacks]: 1.2e-12 kg; lognormal variance with pedigree 0.082, pedigree (1,1,5,5,1)
  own assumption
- Calcium II [air, non-urban air or from high stacks]: 4.1e-8 kg; lognormal variance with pedigree 0.692, pedigree (1,1,5,5,1)
  own assumption
- Chromium III [air, non-urban air or from high stacks]: 2.8e-11 kg; lognormal variance with pedigree 0.692, pedigree (1,1,5,5,1)
  own assumption
- Cobalt II [air, non-urban air or from high stacks]: 3e-11 kg; lognormal variance with pedigree 0.692, pedigree (1,1,5,5,1)
  own assumption
- Copper ion [air, non-urban air or from high stacks]: 1.2e-11 kg; lognormal variance with pedigree 0.692, pedigree (1,1,5,5,1)
  own assumption
- Iodine [air, non-urban air or from high stacks]: 4.1e-12 kg; lognormal variance with pedigree 0.692, pedigree (1,1,5,5,1)
  own assumption
- Iron ion [air, non-urban air or from high stacks]: 1.1e-8 kg; lognormal variance with pedigree 0.692, pedigree (1,1,5,5,1)
  own assumption
- Lead II [air, non-urban air or from high stacks]: 1e-11 kg; lognormal variance with pedigree 0.082, pedigree (1,1,5,5,1)
  own assumption
- Magnesium [air, non-urban air or from high stacks]: 6.1e-9 kg; lognormal variance with pedigree 0.692, pedigree (1,1,5,5,1)
  own assumption
- Manganese II [air, non-urban air or from high stacks]: 4.1e-11 kg; lognormal variance with pedigree 0.692, pedigree (1,1,5,5,1)
  own assumption
- Mercury II [air, non-urban air or from high stacks]: 2e-13 kg; lognormal variance with pedigree 0.342, pedigree (1,1,5,5,1)
  own assumption
- Molybdenum VI [air, non-urban air or from high stacks]: 1.4e-11 kg; lognormal variance with pedigree 0.692, pedigree (1,1,5,5,1)
  own assumption
- Nickel II [air, non-urban air or from high stacks]: 3e-11 kg; lognormal variance with pedigree 0.692, pedigree (1,1,5,5,1)
  own assumption
- Particulate Matter, < 2.5 um [air, non-urban air or from high stacks]: 5.3e-6 kg; lognormal variance with pedigree 0.342, pedigree (1,1,5,5,1)
  own assumption
- Particulate Matter, > 10 um [air, non-urban air or from high stacks]: 1.5e-6 kg; lognormal variance with pedigree 0.342, pedigree (1,1,5,5,1)
  own assumption
- Particulate Matter, > 2.5 um and < 10um [air, non-urban air or from high stacks]: 3.2e-6 kg; lognormal variance with pedigree 0.342, pedigree (1,1,5,5,1)
  own assumption
- Phosphorus [air, non-urban air or from high stacks]: 8.1e-11 kg; lognormal variance with pedigree 0.692, pedigree (1,1,5,5,1)
  own assumption
- Potassium I [air, non-urban air or from high stacks]: 1.2e-9 kg; lognormal variance with pedigree 0.692, pedigree (1,1,5,5,1)
  own assumption
- Scandium [air, non-urban air or from high stacks]: 1e-12 kg; lognormal variance with pedigree 0.692, pedigree (1,1,5,5,1)
  own assumption
- Selenium IV [air, non-urban air or from high stacks]: 4.1e-12 kg; lognormal variance with pedigree 0.692, pedigree (1,1,5,5,1)
  own assumption
- Silicon [air, non-urban air or from high stacks]: 9.7e-8 kg; lognormal variance with pedigree 0.692, pedigree (1,1,5,5,1)
  own assumption
- Sodium I [air, non-urban air or from high stacks]: 1.8e-9 kg; lognormal variance with pedigree 0.692, pedigree (1,1,5,5,1)
  own assumption
- Strontium II [air, non-urban air or from high stacks]: 1.4e-10 kg; lognormal variance with pedigree 0.692, pedigree (1,1,5,5,1)
  own assumption
- Thorium [air, non-urban air or from high stacks]: 3.2e-12 kg; lognormal variance with pedigree 0.692, pedigree (1,1,5,5,1)
  own assumption
- Tin ion [air, non-urban air or from high stacks]: 3.2e-12 kg; lognormal variance with pedigree 0.692, pedigree (1,1,5,5,1)
  own assumption
- Titanium ion [air, non-urban air or from high stacks]: 2e-10 kg; lognormal variance with pedigree 0.692, pedigree (1,1,5,5,1)
  own assumption
- Uranium [air, non-urban air or from high stacks]: 2e-12 kg; lognormal variance with pedigree 0.692, pedigree (1,1,5,5,1)
  own assumption
- Vanadium V [air, non-urban air or from high stacks]: 7.1e-11 kg; lognormal variance with pedigree 0.692, pedigree (1,1,5,5,1)
  own assumption
- Zinc II [air, non-urban air or from high stacks]: 5.7e-11 kg; lognormal variance with pedigree 0.692, pedigree (1,1,5,5,1)
  own assumption
- Zirconium [air, non-urban air or from high stacks]: 1.7e-10 kg; lognormal variance with pedigree 0.692, pedigree (1,1,5,5,1)
  own assumption

## Sampling procedure
literature

## Extrapolations
see Geography/Text This dataset has been copied from an original dataset covering the geography DE. The uncertainty has been adjusted accordingly.

## Review by Christian Bauer 2004-04-02
Corrected for v1.1
