# processing of nickel-rich materials

Dataset: EcoSpold 2, unit process
Geography: GLO
Time period: 1994-01-01 to 2023-12-31
Technology level: current
Classification: ISIC rev.4 ecoinvent: 2420:Manufacture of basic precious and other non-ferrous metals
Synonyms: electrowinning, Ni, electrolysis
Scenario: Business-as-Usual
System model: Allocation, cut-off by classification
Share of production covered: 54 %
Generated by: Johannes Müller
Published in: Classen M. 2009
Database: ecoinvent
isCopyrightProtected: true
accessRestrictedTo: 1

## General comment
For the electrorefining of nickel-rich materials from cobalt production to produce class 1 nickel, globally.
Background: Metals are produced as part of a complex, highly interconnected and interdependent system, with many desirable but scarce/critical metals recovered as by-products during the production of one or more ‘host’ metal(s). Cobalt and nickel are found co-located in ore deposits. During processing of these complex ores, nickel-rich electrolytes are produced during electrolysis of nickel-cobalt mineral concentrates. These electrolytes are sent for further processing in nickel production facilities.
Modelling approach: The amounts of exchanges of land transformation, conveyor belt and facility were taken from the dataset "electrorefining of copper, anode". The amount of nickel-rich electrolyte input from technosphere was based on data reported by the Cobalt Institute (for more information, see documentation for the dataset "cobalt production"). Amounts of other exchanges taken from the process model "nickel production" (part: electrolysis), as described in Classen et al. (2009).
References:
Classen, M., Althaus, H.-J., Blaser, S., Scharnhost, W., Tuchschmid, M., Jungbluth, N., & Emmenegger, M. F. (2009). Life cycle inventories of metals. Final report, ecoinvent data v2.1, No. 10. Dübendorf, Switzerland.
[This dataset is meant to replace the following datasets:
- processing of electrolyte, nickel-rich, GLO, 1994 - 2021]

## Included activities start
Upon delivery of nickel-rich materials

## Included activities end
The electrorefining of the nickel rich materials and the production of nickel, class 1.

## Geography
This module is valid for the whole corresponding region.

## Technology
Based on typical current technology.

## Time period
Production volumes are representative of the situation in 2012 but are considered valid until the end of 2021.

## Parameters
- dray mass of electrolyte, nickel-rich: 77.006 kg; name drymass_electrolyte

## Reference product
- nickel, class 1: 1 kg; name RP; By-product classification allocatable product; CPC 41422: Unwrought nickel; HS2017 7506: Nickel; plates, sheets, strip and foil; CAS 7440-02-0
  production volume 1.93227e8 kg
    Calculated as total Ni production in the countries included in the Cobalt Institute study (Belgium, Canada, DRC, Finland, Japan, France and Zambia) in 2012 (base year of study), 3.76E+08 kg, minus the amount of refined (Class 1) nickel that is reported to be produced produced in those countries in 2012, 1.83E+08. All production data taken from McRae (2018).
    References
    McRae, M. E. (2018). 2015 Minerals Yearbook - Nickel [Advance Release]. U.S. Geological Survey (USGS), Washington, DC, US.
  property price 12.0741 EUR2005
    Price calculated as 5-year market average (2015-2019; USD/kg; USGS [2020]) and converted to EUR2005 (USD2019/EUR2005 exchange rate: 0.62; Official Data Foundation [2020] and Macrotrends [2020]).
  properties: carbon allocation 0 kg, carbon content 0, carbon content, fossil 0, carbon content, non-fossil 0, copper content 1, dry mass 1 kg, nickel content 0.995, water content 0, water in wet mass 0 kg, wet mass 1 kg

## Inputs from technosphere
- chemical factory, organics: 2.80559e-10 unit; lognormal variance with pedigree 0.429225, pedigree (2,3,4,2,5)
- conveyor belt: 1.47294e-5 m; lognormal variance with pedigree 0.429225, pedigree (2,3,4,2,5)
- electricity, high voltage: 1.416 kWh; lognormal variance with pedigree 0.129825, pedigree (2,3,4,2,5)
- heat, district or industrial, natural gas: 3.87 MJ; lognormal variance with pedigree 0.129825, pedigree (2,3,4,2,5)
  properties: heating value, net 1 MJ
- nickel smelter slag: -0.0735164, -0.000583548 kg (2 suppliers, which the file names only by identifier); sum of these -0.0740999 kg; = nickel_rich_materials - RP; lognormal variance with pedigree 0.123825, pedigree (2,3,3,2,5)
  Calculated Value. Exchange used as a proxy for anode slime
  production volume
    Calculated relative to the PV of nickel produced by the electrorefining of Ni-rich electrolyte from cobalt production
  properties: carbon content, fossil 0.00345, dry mass 1 kg, wet mass 1 kg
- nickel-rich materials: 1.0741 kg; name nickel_rich_materials; = drymass_electrolyte * 0.0139482625309625; lognormal variance with pedigree 0.129825, pedigree (2,3,4,2,5)
  Calculated Value.
  properties: dry mass 1 kg, nickel content 1, wet mass 1 kg

## Inputs from nature
- Transformation, from unspecified [natural resource, land]: 1.12429e-5 m2; lognormal variance with pedigree 0.249225, pedigree (2,3,4,2,5)
- Transformation, to mineral extraction site [natural resource, land]: 1.12429e-5 m2; lognormal variance with pedigree 0.249225, pedigree (2,3,4,2,5)

## Sampling procedure
The amounts of exchanges of land transformation, conveyor belt and facility were taken from the dataset "electrorefining of copper, anode". The amount of nickel-rich materials input from technosphere was based on the amount of electrolyte, nickel-rich produced per kg cobalt reported by the Cobalt Institute (for more information, see documentation for the dataset "cobalt production"). Amounts of other exchanges taken from the process model "nickel production" (part: electrolysis), as described in Classen et al. (2009).
References:
Classen, M., Althaus, H.-J., Blaser, S., Scharnhost, W., Tuchschmid, M., Jungbluth, N., & Emmenegger, M. F. (2009). Life cycle inventories of metals. Final report, ecoinvent data v2.1, No. 10. Dübendorf, Switzerland.

## Extrapolations
see Geography and Technology comments.
