# hardwood forestry, mixed species, sustainable forest management

Dataset: EcoSpold 2, unit process
Geography: CH
Time period: 2010-01-01 to 2023-12-31
Technology level: current
Classification: ISIC rev.4 ecoinvent: 0220:Logging
Tags: Swiss brush-up completed; combined production; combined production,
Scenario: Business-as-Usual
System model: Allocation, cut-off by classification
Generated by: Frank Werner
Database: ecoinvent
isCopyrightProtected: true
accessRestrictedTo: 1

## General comment
The dataset represents sustainable forest management practices and covers the weighted average of several harvesting systems employed in Switzerland related to the harvesting of an average m3 of solid hardwood under bark. Three main assortments are distinguished as reference products of Swiss wood production: sawlogs, industrial wood (pulp wood) and wood fuel, which can be processed to chips (at forest road or in the stand), to bundles of energy wood, or cleft timber.
The harvested volumes and the relative share of assortments represent the average of the years 2008 to 2010 according to Swiss Forestry Statistics (Bafu 2011: Wald und Holz 2012). Wood chips (for which no distinction is made between soft- and hardwood in the statistics) are attributed to the assortment 'energy wood' in proportion to the assortment 'energy wood' as reported in the Swiss forestry statistics:
The technology mix for the harvesting operations for 1 m3 of solid wood has was determined starting from the types of haulings as reported in the Swiss National Forest Inventory (LFI 3) for each of the production regions in Switzerland. The following table documents the hauling methods applied and their relative share to the total harvested volume. To each of the relevant hauling methods, a generic harvesting method was developed and assigned proportionally to 1 m3 of harvested wood at the forest road:

## Included activities start
The activity starts with site preparation assuming natural regeneration and includes all process related to forest management, including clearing, tending pruning, thinnings and harvesting operations including the processing of wood fuel to chips, bundles and cleft timber (logs for energy) over one rotation period. It covers also the maintenance of forest roads.

## Included activities end
This activity ends with the assortments at the forest road and includes eventual drying before transportation.

## Technology
This dataset considers sustainable forest management practices and covers the weighted average of several harvesting systems employed in Switzerland.

## Parameters
- Bark ratio: 0.1 dimensionless; name bark; lognormal variance with pedigree 0.025, pedigree (1,1,1,1,1)
  share of bark of total volume of trunk (solid wood + bark); U. Luginbühl, personal written communication, HIS
- area forest per m3 wood: 8.5272 m2/m3; name a_transformation_forest; = (10000-a_forest_road)*share_revenues_wood/yield_wood_ub
  area of forest per ha divided by total harvest over one rotation period per hectare
- area forest road: 109 m2/ha; name a_forest_road; lognormal variance with pedigree 0.2506, pedigree (2,1,1,1,1)
  area of covered by forest roads of one hectare of forest. Source: Kaufmann, E. WSL, personal written communication; based on 3rd national forest inventory
- area forest road in gravel: 85.15 m2/ha; name a_forest_road_gravel; lognormal variance with pedigree 0.2506, pedigree (2,1,1,1,1)
  area of covered by forest roads in gravel of one hectare of forest. Source: Kaufmann, E. WSL, personal written communication; based on 3rd national forest inventory
- area forest road per m3 wood: 0.151811 m2/m3; name a_transformation_road; = a_forest_road/yield_wood_ub
  area of forest road per ha divided by total harvest over one rotation period per hectare
- bulk density gravel: 1600 kg/m3; name d_gravel; lognormal variance with pedigree 0.2506, pedigree (2,1,1,1,1)
  Werner, F., T. Künniger, H.-J. Althaus and K. Richter (2007): Life cycle inventories of wood as fuel and construction material, Duebendorf, November 2002. Centre for life cycle inventories in the ETH domain, Duebendorf.
- cable yarding & processing with mobile cable yarder per m3: 0.00268 PMH/m3; name cable_yarding_mobile_yarder; lognormal variance with pedigree 0.2506, pedigree (2,1,1,1,1)
  IMPORTANT NOTE: When considering several harvesting systems, e.g. in datasets on national forestry, this parameter is NOT the inverse productivity of the harvesting system but the inverse productivity of the system weighted with the share of the amount harvested by the respective system. This has to be calculated outside EcoEditor.
- cable yarding with mobile cable yarder on trailer per m3: 0.00562 PMH/m3; name cable_yarding_trailer; lognormal variance with pedigree 0.2506, pedigree (2,1,1,1,1)
  (same comment as for cable yarding & processing with mobile cable yarder per m3)
- cable yarding with sled yarder per m3: 7.5e-5 PMH/m3; name cable_yarding_sled_yarder; lognormal variance with pedigree 0.2506, pedigree (2,1,1,1,1)
  (same comment as for cable yarding & processing with mobile cable yarder per m3)
- delimbing/sorging with excavator based processor per m3: 0.0049 PMH/m3; name delimbing_excavator; lognormal variance with pedigree 0.2506, pedigree (2,1,1,1,1)
  (same comment as for cable yarding & processing with mobile cable yarder per m3)
- diesel consumption per kg of gravel used for maintenance of forest roads: 0.043 MJ/kg; name diesel_per_gravel; lognormal variance with pedigree 0.2506, pedigree (2,1,1,1,1)
  (same comment as for bulk density gravel)
- forwarding with forwarder per m3: 0.0195 PMH/m3; name forwarding_forwarder; lognormal variance with pedigree 0.2506, pedigree (2,1,1,1,1)
  (same comment as for cable yarding & processing with mobile cable yarder per m3)
- forwarding with helikopter per m3: 0.000456 PMH/m3; name forwarding_helicopter; lognormal variance with pedigree 0.2506, pedigree (2,1,1,1,1)
  IMPORTANT NOTE: When considering several harvesting systems, e.g. in datasets on national forestry, this parameter is NOT the productivity of the harvesting system but the productivity of the system weighted with the share of the amount harvested by the respective system. This has to be calculated outside EcoEditor.
- gravel for maintenance of forest roads: 49.3348 kg/m3; name m_gravel; = thickness_new_gravel*a_forest_road_gravel*d_gravel*rotation_period/interval_road_maintenance/yield_wood_ub
  adding up all gravel input over one rotation period per m3 of total yield of wood
- harvesting with forestry harvester: 0.0156 year; name harvesting; lognormal variance with pedigree 0.2506, pedigree (2,1,1,1,1)
  (same comment as for cable yarding & processing with mobile cable yarder per m3)
- moisture content cleft timber: 0.35 dimensionless; name moisture_cleft_timber; lognormal variance with pedigree 0.2506, pedigree (2,1,1,1,1)
  amount of water/kg dry mass
- moisture content pulpwood: 0.6 dimensionless; name moisture_pulpwood; lognormal variance with pedigree 0.2506, pedigree (2,1,1,1,1)
  amount of water/kg dry mass
- moisture content sawlogs and veneer logs: 0.6 dimensionless; name moisture_sawlogs; lognormal variance with pedigree 0.2506, pedigree (2,1,1,1,1)
  amount of water/kg dry mass
- moisture content wood chips: 0.7 dimensionless; name moisture_wood_chips; lognormal variance with pedigree 0.2506, pedigree (2,1,1,1,1)
  amount of water/kg dry mass
- periodicity of maintenance of forest roads: 10 year; name interval_road_maintenance; lognormal variance with pedigree 0.2506, pedigree (2,1,1,1,1)
  time period between two maintenance activities of forest roads. Source: Werner, F., T. Künniger, H.-J. Althaus and K. Richter (2007): Life cycle inventories of wood as fuel and construction material, Duebendorf, November 2002. Centre for life cycle inventories in the ETH domain, Duebendorf.
- power sawing without catalytic converter per m3: 0.305 PMH/m3; name power_sawing; lognormal variance with pedigree 0.2506, pedigree (2,1,1,1,1)
  (same comment as for cable yarding & processing with mobile cable yarder per m3)
- productivity mobile chipper: 120 m3/PMH; name productivity_mobile_chipper; lognormal variance with pedigree 0.2506, pedigree (2,1,1,1,1)
  as m3 bulked/ productive machine hour
- productivity, clefting device: 5.26 m3/PMH; name productivity_clefting_device; lognormal variance with pedigree 0.2506, pedigree (2,1,1,1,1)
  as m3 bulked/ productive machine hour
- ratio bulk density / solid density of chips: 2.8 dimensionless; name ratio_bulk_solid_chips; lognormal variance with pedigree 0.2506, pedigree (2,1,1,1,1)
  as m3 bulked / m3 solid
- ratio bulk density / solid density of cleft timber: 1.4 dimensionless; name ratio_bulk_solid_cleft_timber; lognormal variance with pedigree 0.2506, pedigree (2,1,1,1,1)
  as m3 bulked / m3 solid
- rotation period: 130 year; name rotation_period; lognormal variance with pedigree 0.252, pedigree (3,1,1,1,1)
  number of years from planting to final harvest. Source: Kaufmann, E. WSL, personal written communication
- share of chips of total wood fuel: 0.386194 dimensionless; name share_chips; = 414/1072; lognormal variance with pedigree 0.2506, pedigree (2,1,1,1,1)
  Share of chips of total wood fuel harvested (referring consistently to volume under bark or volume over bark for all types of wood fuel)share_bundles + share_chopped_wood+share_chips = 100% wood fuel
- share of cleft timber of total wood fuel: 0.613806 dimensionless; name share_cleft_timber; = 658/1072; lognormal variance with pedigree 0.2506, pedigree (2,1,1,1,1)
  Share of cleft timber as wood fuel of total wood fuel harvested (referring consistently to volume under bark or volume over bark for all types of wood fuel); share_bundles + share_cleft_timber+share_chips = 100% wood fuel
- share of pulpwood of total wood harvest: 0.136 dimensionless; name share_pulpwood; lognormal variance with pedigree 0.2506, pedigree (2,1,1,1,1)
  Share of pulpwood of total wood harvest (referring to volume below bark); share_sawlogs + share_pulpwood + share_wood_fuel = 100%
- share of sawlogs and veneer logs of total wood harvest: 0.188 dimensionless; name share_sawlogs; lognormal variance with pedigree 0.2506, pedigree (2,1,1,1,1)
  Share of sawlogs and veneer logs of total wood harvest (referring to volume below bark); share_sawlogs + share_pulpwood + share_wood_fuel = 100%
- share of wood fuel of total wood harvest: 0.676 dimensionless; name share_wood_fuel; lognormal variance with pedigree 0.2506, pedigree (2,1,1,1,1)
  Share of wood fuel of total wood harvest (referring to volume below bark); share_sawlogs + share_pulpwood + share_wood_fuel = 100%
- share, revenues wood production: 0.619 dimensionless; name share_revenues_wood; lognormal variance with pedigree 0.2506, pedigree (2,1,1,1,1)
  Used to determine the share of land used for the productive function of forestry covered in this dataset
- shrinkage ratio: 0.004 dimensionless; name shrinkage_ratio; lognormal variance with pedigree 0.2506, pedigree (2,1,1,1,1)
  for wood: % of volume lost per % of humidity lowered; usually applicable for humidity u < 30%
- skidding with skidder per m3: 0.0749 PMH/m3; name skidding; lognormal variance with pedigree 0.2506, pedigree (2,1,1,1,1)
  (same comment as for forwarding with helikopter per m3)
- sum of reference products in volume: 1 m3; name sum_RP_m3; lognormal variance with pedigree 0.005, pedigree (1,1,1,1,1)
  volume under bark
- thickness of new gravel layer: 0.02 m; name thickness_new_gravel; lognormal variance with pedigree 0.252, pedigree (3,1,1,1,1)
  thickness of the new gravel layer that is added for the maintenance of forest roads: Source: Werner, F., T. Künniger, H.-J. Althaus and K. Richter (2007): Life cycle inventories of wood as fuel and construction material, Duebendorf, November 2002. Centre for life cycle inventories in the ETH domain, Duebendorf.
- wood density, basic: 563.2 kg/m3; name basic_wood_d; = dry_wood_d*(1-30*shrinkage_ratio); lognormal variance with pedigree 0.252, pedigree (3,1,1,1,1)
  kg oven-dry matter/wet volume
- wood density, dry: 640 kg/m3; name dry_wood_d; lognormal variance with pedigree 0.2506, pedigree (2,1,1,1,1)
  kg oven-dry matter/dry volume
- yield wood over rotation period: 718 m3; name yield_wood_ub; lognormal variance with pedigree 0.252, pedigree (3,1,1,1,1)
  yield of wood under bark per ha over one rotation period

## Reference product
- cleft timber, measured as dry mass: 1 kg; name cleft_timber; = share_wood_fuel*basic_wood_d/(1-bark)*share_cleft_timber; source Kaufmann E. 2012; By-product classification allocatable product; CPC 3110: Wood, sawn or chipped lengthwise, sliced or peeled, of a thickness exceeding 6 mm; railway or tramway sleepers […]; HS2017 4401: Fuel wood, in logs, billets, twigs, faggots or similar forms; wood in chip or particles; sawdust and wood was[...]
  average composition of 1 m3 solid wood under bark, harvested in Switzerland according to forest statistics Bafu (2011): Wald und Holz 2011, Bern. The wood of wood chips (indicated as a sum of chips from soft- and hardwood) are asigned to energy wood from softwood and hardwood in relation to the respective shares of energy wood (i.e. cleft/split wood).
  production volume 4.11762e8 kg; = 658000* basic_wood_d/(1-bark)
    calculated from forest statistics Bafu (2011): Wald und Holz 2011, Bern. The wood of wood chips (indicated as a sum of chips from soft- and hardwood) are assigned to energy wood from softwood and hardwood in relation to the respective shares of energy wood (i.e. chopped/split wood).
  property apparent wood density 760.32 kg/m3; name cleft_timber_apparent_wood_d; = cleft_timber_basic_wood_d*(1+moisture_cleft_timber)
    wet mass/wet volume
  property basic wood density 563.2; name cleft_timber_basic_wood_d; = dry_wood_d*(1-30*shrinkage_ratio)
    dry mass/wet volume
  property carbon content, non-fossil 0.494; name cleft_timber_C_content_non_fossil
    biogene carbon content on a dry matter basis
  property dry mass 1 kg; name cleft_timber_DM
  property dry wood density 640 kg/m3; name cleft_timber_dry_wood_d; = dry_wood_d
    kg dry matter/ dry volume
  property heating value, gross 19.6 MJ; name cleft_timber_Gross_Heat_Value
    gross (upper) heating (calorific) value
  property heating value, net 13.0948 MJ; name cleft_timber_Net_Heat_Value; = cleft_timber_Gross_Heat_Value-1.32-(20*moisture_cleft_timber/(1+moisture_cleft_timber))
    net (lower) heating (calorific) value
  property price 0.073 EUR2005
    Calculated based on data from FAOSTAT (accessed 20140429). The price is calculated by using data on total world import quantity (m3) and import value (1000 USD), year 2005. 3411751 m3 of Wood Fuel Trd was imported in the world in 2005. The import value was 161229000 USD. The calculated price is thus (161229000/3411751=47.3*0.8=) 38.1 Euro/m3. The density of cleft timber, measured as dry mass is 541.2 kg/m3. The recalculated price is (1/541.2*38.1=) 0.07 Euro/kg. Using the same approach the calculated price for 2010 was 0.112 Euro/kg.
  property water content 0.35; name cleft_timber_water_content; = moisture_cleft_timber
  property water in wet mass 0.35 kg; name cleft_timber_WWM; = cleft_timber_WM-cleft_timber_DM
  property wet mass 1.35 kg; name cleft_timber_WM; = 1+moisture_cleft_timber
  properties: basic density 0 kg/m3, carbon allocation 0.494 kg, carbon content 0.494, carbon content, fossil 0

## Inputs from technosphere
- cable yarding: 4.28267e-6 hour; = saw_veneer_logs*cable_yarding_mobile_yarder/sum_RP_m3+pulpwood*cable_yarding_mobile_yarder/sum_RP_m3+wood_chips*(1-bark)/basic_wood_d*cable_yarding_mobile_yarder/sum_RP_m3+cleft_timber*(1-bark)/ cleft_timber_basic_wood_d*cable_yarding_mobile_yarder/sum_RP_m3; source Kaufmann E. 2012; lognormal variance with pedigree 0.0336, pedigree (2,1,4,1,1)
  average input per m3; see general comment for details
- cable yarding: 8.98082e-6 hour; = saw_veneer_logs*cable_yarding_trailer/sum_RP_m3+pulpwood*cable_yarding_trailer/sum_RP_m3+wood_chips*(1-bark)/basic_wood_d*cable_yarding_trailer/sum_RP_m3+cleft_timber*(1-bark)/ cleft_timber_basic_wood_d*cable_yarding_trailer/sum_RP_m3; source Kaufmann E. 2012; lognormal variance with pedigree 0.0336, pedigree (2,1,4,1,1)
  average input per m3; see general comment for details
- cable yarding: 1.19851e-7 hour; = saw_veneer_logs*cable_yarding_sled_yarder/sum_RP_m3+pulpwood*cable_yarding_sled_yarder/sum_RP_m3+wood_chips*(1-bark)/basic_wood_d*cable_yarding_sled_yarder/sum_RP_m3+cleft_timber*(1-bark)/ cleft_timber_basic_wood_d*cable_yarding_sled_yarder/sum_RP_m3; source Kaufmann E. 2012; lognormal variance with pedigree 0.0336, pedigree (2,1,4,1,1)
  average input per m3; see general comment for details
- clefting of energy wood: 0.000472585 hour; name clefting; = cleft_timber/cleft_timber_basic_wood_d* ratio_bulk_solid_cleft_timber/productivity_clefting_device; lognormal variance with pedigree 0.0336, pedigree (2,1,4,1,1)
  no comment
- delimbing/sorting, excavator-based processor: 7.83026e-6 hour; = saw_veneer_logs*delimbing_excavator/sum_RP_m3+pulpwood*delimbing_excavator/sum_RP_m3+wood_chips*(1-bark)/basic_wood_d*delimbing_excavator/sum_RP_m3+cleft_timber*(1-bark)/ cleft_timber_basic_wood_d*delimbing_excavator/sum_RP_m3; source Kaufmann E. 2012; lognormal variance with pedigree 0.0336, pedigree (2,1,4,1,1)
  average input per m3; see general comment for details
- diesel, burned in building machine: 0.00339002 MJ; = saw_veneer_logs*(diesel_per_gravel*m_gravel)/sum_RP_m3+pulpwood*(diesel_per_gravel*m_gravel)/sum_RP_m3+wood_chips*(1-bark)/basic_wood_d*(diesel_per_gravel*m_gravel)/sum_RP_m3+cleft_timber*(1-bark)/cleft_timber_basic_wood_d*(diesel_per_gravel*m_gravel)/sum_RP_m3; source Werner F. 2007; lognormal variance with pedigree 0.0336, pedigree (2,1,4,1,1)
  for distribution of gravel for maintenance of forest road over rotation period
  properties: UVEK_link_1 732, UVEK_relative_amount_1 1, heating value, net 1 MJ
  note on UVEK_link_1: to be used only in special submissions in coordination with ecoinvent and the Swiss FOEN
- forwarding, forwarder: 3.11612e-5 hour; = saw_veneer_logs*forwarding_forwarder/sum_RP_m3+pulpwood*forwarding_forwarder/sum_RP_m3+wood_chips*(1-bark)/basic_wood_d*forwarding_forwarder/sum_RP_m3+cleft_timber*(1-bark)/ cleft_timber_basic_wood_d*forwarding_forwarder/sum_RP_m3; source Kaufmann E. 2012; lognormal variance with pedigree 0.0336, pedigree (2,1,4,1,1)
  average input per m3; see general comment for details
- gravel, crushed: 0.0788376 kg; = saw_veneer_logs*m_gravel/sum_RP_m3+pulpwood*m_gravel/sum_RP_m3+wood_chips*(1-bark)/basic_wood_d*m_gravel/sum_RP_m3+cleft_timber*(1-bark)/ cleft_timber_basic_wood_d*m_gravel/sum_RP_m3; source Werner F. 2007; lognormal variance with pedigree 0.0336, pedigree (2,1,4,1,1)
  gravel for maintenance of forest road over rotation period
  properties: UVEK_link_1 2312, UVEK_relative_amount_1 1, dry mass 1 kg, wet mass 1 kg
- harvesting, forestry harvester: 2.4929e-5 hour; = saw_veneer_logs*harvesting/sum_RP_m3+pulpwood*harvesting/sum_RP_m3+wood_chips*(1-bark)/basic_wood_d*harvesting/sum_RP_m3+ cleft_timber*(1-bark)/ cleft_timber_basic_wood_d*harvesting/sum_RP_m3; source Kaufmann E. 2012; lognormal variance with pedigree 0.0336, pedigree (2,1,4,1,1)
  average input per m3; see general comment for details
- power sawing, without catalytic converter: 0.000616481 hour; = saw_veneer_logs*power_sawing/sum_RP_m3+pulpwood*power_sawing/sum_RP_m3+wood_chips*(1-bark)/basic_wood_d*power_sawing/sum_RP_m3+ cleft_timber*(1-bark)/cleft_timber_basic_wood_d*power_sawing/sum_RP_m3+saw_veneer_logs*(2*14+2*15)/yield_wood_ub/sum_RP_m3+pulpwood*(2*14+2*15)/yield_wood_ub/sum_RP_m3+wood_chips*(1-bark)/basic_wood_d*(2*14+2*15)/yield_wood_ub/sum_RP_m3+ cleft_timber*(1-bark)/cleft_timber_basic_wood_d*(2*14+2*15)/yield_wood_ub/sum_RP_m3; source Kaufmann E. 2012; lognormal variance with pedigree 0.0336, pedigree (2,1,4,1,1)
  average input per m3 covering hand-held gasoline-driven equipment used for site preparation, tending and pruning (attributing per ha values to total amount of wood harvested) as well as the amount of power sawing per harvested m3; see general comment for details
- skidding, skidder: 0.000119691 hour; = saw_veneer_logs*skidding/sum_RP_m3+pulpwood*skidding/sum_RP_m3+wood_chips*(1-bark)/basic_wood_d*skidding/sum_RP_m3+cleft_timber*(1-bark)/ cleft_timber_basic_wood_d*skidding/sum_RP_m3; source Kaufmann E. 2012; lognormal variance with pedigree 0.0336, pedigree (2,1,4,1,1)
  average input per m3; see general comment for details
- transport, helicopter: 7.28693e-7 hour; = saw_veneer_logs*forwarding_helicopter/sum_RP_m3+pulpwood*forwarding_helicopter/sum_RP_m3+wood_chips*(1-bark)/basic_wood_d*forwarding_helicopter/sum_RP_m3+cleft_timber*(1-bark)/ cleft_timber_basic_wood_d*forwarding_helicopter/sum_RP_m3; source Kaufmann E. 2012; lognormal variance with pedigree 0.3586, pedigree (2,1,4,1,1)
  average input per m3; see general comment for details
  properties: UVEK_link_1 4381, UVEK_relative_amount_1 1

## Inputs from nature
- Carbon dioxide, in air [natural resource, in air]: 1.81133 kg; = saw_veneer_logs/(1-bark)*basic_wood_d* saw_veneer_logs_C_content_non_fossil/12*44/sum_RP_m3+pulpwood/(1-bark)*basic_wood_d* pulpwood_C_content_non_fossil/12*44/sum_RP_m3+wood_chips* chips_C_content_non_fossil/12*44/sum_RP_m3+cleft_timber* cleft_timber_C_content_non_fossil/12*44/sum_RP_m3; lognormal variance with pedigree 0.033, pedigree (1,1,4,1,1)
  Resource input, referring to total biomass harvested, i.e. wood including bark
- Energy, gross calorific value, in biomass [natural resource, biotic]: 19.6 MJ; = saw_veneer_logs/(1-bark)*saw_veneer_logs_basic_wood_d*saw_veneer_logs_Gross_Heat_Value/sum_RP_m3+pulpwood/(1-bark)*pulpwood_basic_wood_d*pulpwood_Gross_Heat_Value/sum_RP_m3+wood_chips*wood_chips_Gross_Heat_Value/sum_RP_m3+cleft_timber*cleft_timber_Gross_Heat_Value/sum_RP_m3; lognormal variance with pedigree 0.033, pedigree (1,1,4,1,1)
  Energy content of wood
- Occupation, forest, extensive [natural resource, land]: 1.77145 m2*year; = saw_veneer_logs*(a_transformation_forest*rotation_period)/sum_RP_m3+pulpwood*(a_transformation_forest*rotation_period)/sum_RP_m3+wood_chips*(1-bark)/basic_wood_d*(a_transformation_forest*rotation_period)/sum_RP_m3+cleft_timber*(1-bark)/ cleft_timber_basic_wood_d*(a_transformation_forest*rotation_period)/sum_RP_m3; source Kaufmann E. 2012; lognormal variance with pedigree 0.208, pedigree (1,1,4,1,1)
  Area occupied for the production of wood over one rotation period
- Occupation, traffic area, rail/road embankment [natural resource, land]: 0.0315374 m2*year; = saw_veneer_logs*a_transformation_road*rotation_period/sum_RP_m3+pulpwood*a_transformation_road*rotation_period/sum_RP_m3+wood_chips*(1-bark)/basic_wood_d*a_transformation_road*rotation_period/sum_RP_m3+cleft_timber*(1-bark)/ cleft_timber_basic_wood_d*a_transformation_road*rotation_period/sum_RP_m3; source Kaufmann E. 2012; lognormal variance with pedigree 0.208, pedigree (1,1,4,1,1)
  Area occupied by forest roeads over one roation period
- Transformation, from forest, extensive [natural resource, land]: 0.0136266 m2; = saw_veneer_logs*((10000-a_forest_road)/yield_wood_ub*share_revenues_wood)/sum_RP_m3+pulpwood*((10000-a_forest_road)/yield_wood_ub*share_revenues_wood)/sum_RP_m3+wood_chips*(1-bark)/basic_wood_d*((10000-a_forest_road)/yield_wood_ub*share_revenues_wood)/sum_RP_m3+cleft_timber*(1-bark)/ cleft_timber_basic_wood_d*((10000-a_forest_road)/yield_wood_ub*share_revenues_wood)/sum_RP_m3; source Kaufmann E. 2012; lognormal variance with pedigree 0.358, pedigree (1,1,4,1,1)
  Area of forest, excluding forest roads per ha
- Transformation, from traffic area, rail/road embankment [natural resource, land]: 0.000242595 m2; = saw_veneer_logs*a_forest_road/yield_wood_ub/sum_RP_m3+pulpwood*a_forest_road/yield_wood_ub/sum_RP_m3+wood_chips*(1-bark)/basic_wood_d*a_forest_road/yield_wood_ub/sum_RP_m3+cleft_timber*(1-bark)/ cleft_timber_basic_wood_d*a_forest_road/yield_wood_ub/sum_RP_m3; source Kaufmann E. 2012; lognormal variance with pedigree 0.358, pedigree (1,1,4,1,1)
  Area of forest roads per ha
- Transformation, to forest, extensive [natural resource, land]: 0.0136266 m2; = saw_veneer_logs*((10000-a_forest_road)/yield_wood_ub*share_revenues_wood)/sum_RP_m3+pulpwood*((10000-a_forest_road)/yield_wood_ub*share_revenues_wood)/sum_RP_m3+wood_chips*(1-bark)/basic_wood_d*((10000-a_forest_road)/yield_wood_ub*share_revenues_wood)/sum_RP_m3+cleft_timber*(1-bark)/ cleft_timber_basic_wood_d*((10000-a_forest_road)/yield_wood_ub*share_revenues_wood)/sum_RP_m3; source Kaufmann E. 2012; lognormal variance with pedigree 0.358, pedigree (1,1,4,1,1)
  no comment
- Transformation, to traffic area, rail/road embankment [natural resource, land]: 0.000242595 m2; = saw_veneer_logs*a_forest_road/yield_wood_ub/sum_RP_m3+pulpwood*a_forest_road/yield_wood_ub/sum_RP_m3+wood_chips*(1-bark)/basic_wood_d*a_forest_road/yield_wood_ub/sum_RP_m3+cleft_timber*(1-bark)/ cleft_timber_basic_wood_d*a_forest_road/yield_wood_ub/sum_RP_m3; source Kaufmann E. 2012; lognormal variance with pedigree 0.358, pedigree (1,1,4,1,1)
  no comment
- Wood, hard, standing [natural resource, biotic]: 0.00159801 m3; name v_wood_standing; = saw_veneer_logs/sum_RP_m3+pulpwood/sum_RP_m3+wood_chips*(1-bark)/basic_wood_d/sum_RP_m3+cleft_timber*(1-bark)/ cleft_timber_basic_wood_d/sum_RP_m3; lognormal variance with pedigree 0.033, pedigree (1,1,4,1,1)
  Resource input, referring to wood under bark

## Sampling procedure
Literature

## Extrapolations
see Geography and Technology
