# fibre cement facing tile production, large format

Dataset: EcoSpold 2, unit process
Geography: RoW
Time period: 2007-01-01 to 2023-12-31
Technology level: current
Classification: ISIC rev.4 ecoinvent: 2395:Manufacture of articles of concrete, cement and plaster
Classification: EcoSpold01Categories: construction materials/coverings
Tags: ConvertedDataset
Scenario: Business-as-Usual
System model: Allocation, cut-off by classification
Generated by: Hans-Jörg Althaus
Published in: Hischier, R. 2009
Database: ecoinvent
isCopyrightProtected: true
accessRestrictedTo: 1

## General comment
Data are based on a in depth analysis of the production of Eternit Switzerland. Different products (base colours & coatings) are averaged.
[This dataset was already contained in the ecoinvent database version 2. It was not individually updated during the transfer to ecoinvent version 3. Life Cycle Impact Assessment results may still have changed, as they are affected by changes in the supply chain, i.e. in other datasets. This dataset was generated following the ecoinvent quality guidelines for version 2. It may have been subject to central changes described in the ecoinvent version 3 change report (http://www.ecoinvent.org/database/ecoinvent-version-3/reports-of-changes/), and the results of the central updates were reviewed extensively. The changes added e.g. consistent water flows and other information throughout the database. The documentation of this dataset can be found in the ecoinvent reports of version 2, which are still available via the ecoinvent website. The change report linked above covers all central changes that were made during the conversion process.]

## Included activities end
All processes relating to the product at the Eternit production plant in Niederurnen and in Payern are included. Also included are the material and energy input and the waste treatment services corresponding to these processes.

## Geography
Production in Switzerland for World wide market

## Technology
Raw tile production, drying, coating

## Parameters
- fraction, process water, to air: 0.15 dimensionless; name fraction_PW_to_air; lognormal variance with pedigree 0.092025, pedigree (4,4,3,2,4)
- fraction, tap water, to air: 0.15 dimensionless; name fraction_TW_to_air; lognormal variance with pedigree 0.092025, pedigree (4,4,3,2,4)

## Reference product
- fibre cement facing tile, large format: 1 kg; By-product classification allocatable product; CPC 37540: Tiles, flagstones, bricks and similar articles, of cement, concrete or artificial stone; HS2017 681019: Cement, concrete or artificial stone; tiles, flagstones and similar, (excluding building blocks and bricks)[...]
  EcoSpold01Location=CH
  production volume 3.96633 kg
    This is a placeholder value that does not reflect real-world production volumes. This dataset does not currently require a real-world production volume to work in the database framework, and no actual data were collected yet. This has no negative effect on the results of the ecoinvent database.
  property carbon content, fossil 0.0201818
    Tab 5.1, ecoinvent v2.2 report 7, part IX. Fibres (pulp) 2.5%. Fibres (polyvinyl alcohol) 3.7%. C-content/dry mass of natural fibres was considered 46% (from "Evolutionary and Biochemical Aspects", A.D. Kay and T. Vrede (in Global Ecology, 2010, Elsevier B.V., S.E. Jørgensen Ed.)). C-content/dry mass of polyvinyl alcohol ((C2H4O)x) was considered =24/44.
  property carbon content, non-fossil 0.0115
    (same comment as for fibre cement facing tile, large format)
  property heating value, net 0 MJ
    Non combustible products are assumed to have an LHV equal to zero (0).
  property price 0.704 EUR2005
    Estimation. 2005 import and export prices (total trades (USD) divided by total weight (kg) in EU27, USA, India, China and Japan from UN Commodity Trade Statistics Database. Commodity: Tiles & flagstones of cement, concrete, artificial stone
  properties: carbon allocation 0.0316818 kg, carbon content 0.0316818, dry mass 1 kg, water content 0, water in wet mass 0 kg, wet mass 1 kg

## Inputs from technosphere
- acrylic dispersion, with water, in 58% solution state: 0.015978 kg; lognormal variance with pedigree 0.042, pedigree (1,1,5,5,1)
  EcoSpold01Location=RER
  properties: carbon content, fossil 0.342442, dry mass 0.59 kg, heating value, net 16.66 MJ, water content 0.70041, wet mass 1 kg
  note on carbon content, fossil: The carbon content was calculated from the carbon content of the inputs.
- carbon dioxide, liquid: 0.002134 kg; lognormal variance with pedigree 0.042, pedigree (1,1,5,5,1)
  EcoSpold01Location=RER
  properties: carbon content, fossil 0.272727, dry mass 1 kg, heating value, net 8.27 MJ, wet mass 1 kg
- cement, Portland: 0.787903, 0.0298573, 0.0398333, 0.0436676, 0.00180801, 0.0016484, 0.00160659, 0.00204915, 0.00106678 kg (9 suppliers, which the file names only by identifier); sum of these 0.90944 kg; = 0.66125+0.24819; lognormal variance with pedigree 0.042, pedigree (1,1,5,5,1)
  composite
  properties: dry mass 1 kg, wet mass 1 kg
- chemical, inorganic: 0.017465 kg; lognormal variance with pedigree 0.042, pedigree (1,1,5,5,1)
  EcoSpold01Location=GLO
  composite
  properties: carbon content, fossil 0.003, dry mass 1 kg, wet mass 1 kg
  note on carbon content, fossil: This dataset is an unweighted average of 20 inorganic substances (listed in Tab 88.1, ecoinvent v2.2 report 8, part II), being part of the top100 chemicals included in this database. The C-content has also been calculated as an unweighted average of the C content of the substances composing this dataset.
- chemical, organic: 0.0022878 kg; lognormal variance with pedigree 0.042, pedigree (1,1,5,5,1)
  composite
  EcoSpold01Location=GLO
  properties: carbon content, fossil 0.628, dry mass 1 kg, heating value, net 19.03 MJ, wet mass 1 kg
  note on carbon content, fossil: This dataset is an unweighted average of 20 organic substances (listed in Tab 88.1, ecoinvent v2.2 report 8, part II), being part of the top100 chemicals included in this database. The C-content has also been calculated as an unweighted average of the C content of the substances composing this dataset.
- electricity, medium voltage: 0.00621801, 0.124035, 0.0416755, 0.00190417, 0.000381117, 8.18344e-5, 0.00866101, 0.0128086, 0.0268344 kWh (9 suppliers, which the file names only by identifier); sum of these 0.2226 kWh; lognormal variance with pedigree 0.042, pedigree (1,1,5,5,1)
  EcoSpold01Location=CH
  composite
- hazardous waste, for incineration: -0.000857589, -0.000412411 kg (2 suppliers, which the file names only by identifier); sum of these -0.00127 kg; lognormal variance with pedigree 0.002, pedigree (1,1,1,5,1)
  EcoSpold01Location=CH
  composite
  production volume
    Calculated from the production volume of fibre cement facing tile, large format in proportion to the respective output amounts.
  properties: carbon content, fossil 0.554667, dry mass 0.75 kg, heating value, net 17 MJ, water content 0.333333, wet mass 1 kg
  note on carbon content, fossil: Tab A.6, ecoinvent v2.2 report 13_I. C content has been calculated after data in the tables, and then referred to 1 kg DM
  note on heating value, net: Value taken from the general comment of the treatment dataset.
- heat, central or small-scale, other than natural gas: 0.000359793, 0.0261952 MJ (2 suppliers, which the file names only by identifier); sum of these 0.026555 MJ; lognormal variance with pedigree 0.042, pedigree (1,1,5,5,1)
  composite
  EcoSpold01Location=CH
  properties: heating value, net 1 MJ
- heat, district or industrial, natural gas: 0.0151169, 0.919932, 0.339735 MJ (3 suppliers, which the file names only by identifier); sum of these 1.27478 MJ; lognormal variance with pedigree 0.042, pedigree (1,1,5,5,1)
  composite
  EcoSpold01Location=RER
  properties: heating value, net 1 MJ
- inert waste, for final disposal: -0.08082 kg; lognormal variance with pedigree 0.002, pedigree (1,1,1,5,1)
  composite
  EcoSpold01Location=CH
  production volume
    (same comment as for hazardous waste, for incineration)
  properties: dry mass 0.995 kg, water content 0.00502513, wet mass 1 kg
- iron sulfate: 0.001134 kg; lognormal variance with pedigree 0.042, pedigree (1,1,5,5,1)
  EcoSpold01Location=RER
  properties: dry mass 1 kg, wet mass 1 kg
- iron(III) chloride, without water, in 40% solution state: 0.0005056 kg; lognormal variance with pedigree 0.042, pedigree (1,1,5,5,1)
  EcoSpold01Location=CH
  properties: dry mass 1 kg, wet mass 1 kg
- lime: 0.031612 kg; lognormal variance with pedigree 0.042, pedigree (1,1,5,5,1)
  EcoSpold01Location=CH
  composite
  properties: carbon content, fossil 0.120005, dry mass 1 kg, wet mass 1 kg
- lime, packed: 0.00689535, 0.0137867 kg (2 suppliers, which the file names only by identifier); sum of these 0.020682 kg; lognormal variance with pedigree 0.042, pedigree (1,1,5,5,1)
  composite
  EcoSpold01Location=CH
  properties: carbon content, fossil 0.117492, dry mass 0.998 kg, water content 0.00200401, wet mass 1 kg
  note on carbon content, fossil: Table 3.1, ecoinvent v2.2 report 7, part VII, pg 3. MW CaCO3=100, MW MgCO3=84
- lubricating oil: 0.000835 kg; lognormal variance with pedigree 0.042, pedigree (1,1,5,5,1)
  EcoSpold01Location=RER
  properties: carbon content, fossil 0.75, dry mass 1 kg, heating value, net 40.2 MJ, wet mass 1 kg
  note on carbon content, fossil: Lubricating oil is produced from diesel. C-content/dry mass of fats and oils considered 75%, from: ecoinvent v2.2 report, n 15a, pg 40
  note on heating value, net: Literature value, Source: IPCC 2006, 2006 IPCC Guidelines for National Greenhouse Gas Inventories, Prepared by the National Greenhouse Gas Inventories Programme, Eggleston H.S., Buendia L., Miwa K., Ngara T. and Tanabe K. (eds). Published: IGES, Japan
- municipal solid waste: -2.82924e-5, -3.35959e-6, -2.13459e-5, -2.09093e-5, -0.0159625, -0.000537741, -2.35091e-6, -7.54601e-7, -1.70561e-6, -7.10049e-5 kg (10 suppliers, which the file names only by identifier); sum of these -0.01665 kg; lognormal variance with pedigree 0.002, pedigree (1,1,1,5,1)
  EcoSpold01Location=CH
  composite
  production volume
    (same comment as for hazardous waste, for incineration)
  properties: carbon content, fossil 0.171549, carbon content, non-fossil 0.261655, dry mass 0.771 kg, heating value, net 11.74 MJ, water content 0.297017, wet mass 1 kg
  note on carbon content, fossil: MSW composition in tab 4.1, ecoinvent v2.2 report 13_I. C content referred to 1 kg DM
- paraffin: 0.0010912 kg; lognormal variance with pedigree 0.042, pedigree (1,1,5,5,1)
  EcoSpold01Location=RER
  properties: carbon content, fossil 0.847059, dry mass 1 kg, heating value, net 41.5 MJ, wet mass 1 kg
  note on carbon content, fossil: An average composition of C12H26 (molecular weight of 170 g/mol) was assumed for n-parafins, after ecoinvent v2.2 report 8, part II, pg 398
  note on heating value, net: Indicative value. Reference: Fuels - Higher and Lower Calorific Values, available at: https://www.engineeringtoolbox.com/fuels-higher-calorific-values-d_169.html
- polyethylene, high density, granulate: 0.018051 kg; lognormal variance with pedigree 0.042, pedigree (1,1,5,5,1)
  composite
  EcoSpold01Location=RER
  properties: carbon content, fossil 0.857143, dry mass 1 kg, heating value, net 42.47 MJ, wet mass 1 kg
  note on carbon content, fossil: Polyethylene is formed out of a huge amount of ethylene monomers (C2H4) (ecoinvent v2.2 report 11_II). MW=28 g/mol
- sodium hydroxide, without water, in 50% solution state: 0.0003786 kg; lognormal variance with pedigree 0.042, pedigree (1,1,5,5,1)
  EcoSpold01Location=RER
  properties: dry mass 1 kg, heating value, net 3.03 MJ, wet mass 1 kg
- stone wool factory: 4.44e-10 unit; lognormal variance with pedigree 0.042, pedigree (1,1,5,5,1)
  EcoSpold01Location=CH
- sulfate pulp, bleached: 0.0260536 kg; = 0.032567*0.8; lognormal variance with pedigree 0.042, pedigree (1,1,5,5,1)
  20% of pulp input are from unbleached pulp, 80% from bleached pulp.
  properties: carbon content, non-fossil 0.494, dry mass 0.9 kg, heating value, net 13.23 MJ, water content 0.111111, wet mass 1 kg
  note on carbon content, non-fossil: C content of dry mass of sulfate pulp is 0.494 kgC/kg dry wood (ecoinvent v2.2 report 6_IX & ecoinvent v2.2 report 9). No other C containing products in the formulation of the pulp.
- sulfate pulp, unbleached: 0.065134 kg; = 0.32567*0.2; lognormal variance with pedigree 0.042, pedigree (1,1,5,5,1)
  20% of pulp input are from unbleached pulp, 80% from bleached pulp.
  properties: carbon content, non-fossil 0.494, dry mass 0.9 kg, heating value, net 13.23 MJ, price 0.355 EUR2005, water content 0.111111, wet mass 1 kg
- tap water: 0.000509654, 0.000776924, 0.0014497, 0.00390539, 0.000470104, 0.0195909, 0.224189, 0.167058 kg (8 suppliers, which the file names only by identifier); sum of these 0.41795 kg; source Kull, T. 2008; lognormal variance with pedigree 0.042, pedigree (1,1,5,5,1)
  EcoSpold01Location=CH
  Literature value.
  properties: carbon content, fossil 0.00178991, dry mass 0.000337476 kg, water content 2962.17, wet mass 1 kg
  note on carbon content, fossil: Bicarbonate content is 2.93 mol/m3. CO2 content is 0.1 mol/m3 (ecoinvent v2.2 report 8, Tab 93.1).
- transport, freight, light commercial vehicle: 2.73306e-5, 5.65483e-5, 0.000469021 metric ton*km (3 suppliers, which the file names only by identifier); sum of these 0.0005529 metric ton*km; lognormal variance with pedigree 0.042, pedigree (1,1,5,5,1)
  composite. This flow has been changed during revision. It replaces the old flow "energy and combustion emissions, light commercial vehicle"
- vinyl acetate: 0.018051 kg; lognormal variance with pedigree 0.042, pedigree (1,1,5,5,1)
  EcoSpold01Location=RER
  composite
  properties: carbon content, fossil 0.55814, dry mass 1 kg, heating value, net 25.35 MJ, wet mass 1 kg
  note on carbon content, fossil: Vinyl acetate (CH3CO2CH=CH2) (ecoinvent v2.2 report 11_II), C4H6O2. MW=86 g/mol
- waste polyethylene: -9.75934e-8, -2.48826e-7, -1.02774e-7, -1.88183e-8, -0.00153259, -3.17305e-6, -4.15195e-8, -3.72403e-6 kg (8 suppliers, which the file names only by identifier); sum of these -0.00154 kg; lognormal variance with pedigree 0.002, pedigree (1,1,1,5,1)
  EcoSpold01Location=CH
  composite
  production volume
    (same comment as for hazardous waste, for incineration)
  properties: carbon content, fossil 0.825301, dry mass 0.996 kg, heating value, net 42.47 MJ, water content 0.00401606, wet mass 1 kg
  note on carbon content, fossil: C content in 1 kg DM was calculated using data in Tab A.1, ecoinvent v2.2 report 13_I
- waste wood, untreated: -1.75428e-6, -4.56644e-8, -3.40289e-5, -6.24588e-7, -2.65029e-7, -7.83225e-6, -4.18989e-7, -5.0303e-6 kg (8 suppliers, which the file names only by identifier); sum of these -5e-5 kg; lognormal variance with pedigree 0.002, pedigree (1,1,1,5,1)
  composite
  EcoSpold01Location=CH
  production volume
    (same comment as for hazardous waste, for incineration)
  properties: carbon content, non-fossil 0.48632, dry mass 0.8 kg, heating value, net 13.99 MJ, water content 0.25, wet mass 1 kg
  note on carbon content, non-fossil: Tab A.4, ecoinvent v2.2 report 13_I. C content has been referred to 1 kg DM,
- wastewater treatment facility, capacity 1.6E8l/year: 1.825e-8 unit; lognormal variance with pedigree 0.042, pedigree (1,1,5,5,1)
  composite
  EcoSpold01Location=CH
- wastewater, unpolluted: -6.464e-5 m3; lognormal variance with pedigree 0.002, pedigree (1,1,1,5,1)
  EcoSpold01Location=CH
  production volume
    (same comment as for hazardous waste, for incineration)
  properties: carbon content, fossil 0.00178991, carbon content, non-fossil 0.00178991, dry mass 0.337476 kg, water content 2962.17, wet mass 1000 kg
  note on carbon content, fossil: Assumed to be like in tap water. Bicarbonate content is 2.93 mol/m3. CO2 content is 0.1 mol/m3 (ecoinvent v2.2 report 8, Tab 93.1).

## Inputs from nature
- Water, well, in ground [natural resource, in water]: 0.0029531 m3; name water_well_in_ground_input; source Kull, T. 2008; lognormal variance with pedigree 0.042, pedigree (1,1,5,5,1)
  Literature value.

## Emissions to nature
- Ammonia [air, unspecified]: 2.4e-6 kg; lognormal variance with pedigree 0.042, pedigree (1,1,5,5,1)
- NMVOC, non-methane volatile organic compounds [air, unspecified]: 0.00054359 kg; lognormal variance with pedigree 0.042, pedigree (1,1,5,5,1)
- Water [air, unspecified]: 0.000505658 m3; name water_to_air_unspecified; lognormal variance with pedigree 0.0827, pedigree (2,2,5,5,1)
  Calculated value based on literature values and expert opinion. See comments in the parametres' comment field.
  property fraction, origin: fresh water 1; name fraction_origin_fresh_water
  property fraction, origin: salt water 0; name fraction_origin_salt_water
  property fraction, origin: unspecified 0; name fraction_origin_unspecified
- BOD5, Biological Oxygen Demand [water, surface water]: 0.00075352 kg; lognormal variance with pedigree 0.042, pedigree (1,1,5,5,1)
  Calculated as 0.5*COD.
- COD, Chemical Oxygen Demand [water, surface water]: 0.00037676 kg; lognormal variance with pedigree 0.042, pedigree (1,1,5,5,1)
- Chromium VI [water, surface water]: 7.3e-8 kg; lognormal variance with pedigree 0.042, pedigree (1,1,5,5,1)
- DOC, Dissolved Organic Carbon [water, surface water]: 0.000139541 kg; lognormal variance with pedigree 0.042, pedigree (1,1,5,5,1)
  Calculated as equal to TOC.
- TOC, Total Organic Carbon [water, surface water]: 0.000139541 kg; lognormal variance with pedigree 0.042, pedigree (1,1,5,5,1)
  Calculated by default as TOC (gC) = COD/2.7 (COD measured in g O2). Should more correctly be calculated from the carbon content of the specified emissions to water.
- Water [water, unspecified]: 0.00286539 m3; name water_to_water_unspecified; lognormal variance with pedigree 0.0827, pedigree (2,2,5,5,1)
  (same comment as for Water)
  property carbon content, fossil 0; name C_content_fossil
  property carbon content, non-fossil 0; name C_content_non_fossil
  property dry mass 0 kg; name DM
  property fraction, origin: fresh water 1; name fraction_origin_fresh_water_Ww
  property fraction, origin: salt water 0; name fraction_origin_salt_water_Ww
  property fraction, origin: unspecified 0; name fraction_origin_unspecified_Ww
  property water in wet mass 1000 kg; name WWM
  property wet mass 1000 kg; name WM

## Sampling procedure
literature

## Extrapolations
none This dataset has been copied from an original dataset covering the geography CH. The uncertainty has been adjusted accordingly.

## Review by Roland Hischier 2010-02-07
passed
