# electricity production, hydro, aluminium industry

Dataset: EcoSpold 2, unit process
Geography: CN
Time period: 2015-01-01 to 2023-12-31
Technology level: current
Classification: EcoSpold01Categories: hard coal/power plants
Classification: ISIC rev.4 ecoinvent: 3510:Electric power generation, transmission and distribution
Tags: electricity, primary aluminium industry; re-labelling activity
Scenario: Business-as-Usual
System model: Allocation, cut-off by classification
Share of production covered: 89 %
Generated by: Lucia Valsasina
Database: ecoinvent
isCopyrightProtected: false
accessRestrictedTo: 1

## General comment
This is a dataset used to create an aluminium industry specific electricity market for 'aluminium production Area 9' (China). It identifies the portion of hydroelectricity production in China that is used for the electrolysis step of the aluminium life cycle.
Electricity markets specific to the aluminium-industry are needed in an LCI database because primary aluminium production is very energy intensive, and hence the location of production plants is often determined by access to large amounts of cheap electricity, which often results in an electricity mix that is different from the general grid mix of the countries where the production plants are located.
It is assumed that the production of electricity in general and in aluminium industry specific power plants is identical. Details on actual electricity generation with each technology can be found in the corresponding datasets.

## Included activities start
Re-labelling dataset, not representing a real transformation activity. Conceptually, the activity can be said to start with the production of electricity.

## Included activities end
Re-labelling dataset, not representing a real transformation activity. Conceptually, the activity can be said to end with a given amount of high voltage electricity labelled as specifically used for the production of electricity.

## Geography
China

## Time period
Production volume updated with 2015 data from IAI

## Reference product
- electricity, high voltage, aluminium industry: 1 kWh; By-product classification allocatable product; CPC 17100: Electrical energy; HS2017 271600: Electrical energy
  Expressed as sum of contributing technologies (inputs) to allow uncertainty analysis: each technology share is uncertain, and in a Monte Carlo analysis will always be normalized by the sum contribution of each technology
  production volume 4.44123e10 kWh
    The production volume, which is ultimately used to determine the share of hydroelectricity in the downstream market for aluminium industry specific high voltage electricity, is calculated by multiplying the following data:
    (1) public estimates of the electricity mix used to produce aluminium in the 'aluminium production area 9' (China), provided by the International Aluminium Institute (IAI), see http://www.world-aluminium.org/statistics/. These estimates are based on the subset of aluminium producers that provide information to the IAI.
    (2) global average electricity requirements, per tonne primary aluminium, for the prebake electrolysis technology (100% prebake electrolysis in China).
    (3) electricity compensating line and transformation losses from production to consumption as medium voltage electricity, using country-level ecoinvent v3 data.
  property price 0.0977 EUR2005
    Calculated in temporary price data. 94% of the average price (to account for a 6% loss in transformation and transmission) for electricity for industrial consumersin 2005 (excluded taxes). From IEA.
  properties: carbon allocation 0 kg, carbon content 0

## Inputs from technosphere
- electricity, high voltage: 0.0519595, 0.000827174, 0.00452362, 0.000566398, 0.0541208, 0.000789843, 0.00212702, 0.0323699, 0.0555721, 0.00681939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 kWh (29 suppliers, which the file names only by identifier); sum of these 1 kWh; lognormal variance with pedigree 0.0113, pedigree (3,2,4,1,2)
  Calculated amount (see general comments). Share of hydroelectricity used for primary aluminium production in Area 1 (Africa) that is produced in South Africa (ZA) and is assumed to come from non alpine region reservoir plants, based on the share of hydroelectricity produced from such plants in general in South Africa.

## Sampling procedure
IAI data used for total electricity used in the production of aluminium that is from hydroelectric plants. ecoinvent data used to split hydroelectricity production to the respective technologies (reservoir, run-of-river, pumped storage). The cited 89% representativeness is for IAI data (data based on 100% of regional aluminium production). The percent representativeness of data used to split hydroelectricity production to different types of plants (national grid proxy) is 100%.

## Extrapolations
For the split of hydroelectricity production to the respective technologies (reservoir, run-of-river, pumped storage), shares of different types of hydroelectric plants in the countries, when available, were used as a proxy for the split relevant for the aluminium industry, see general comments.
