# treatment of conditioned spent nuclear fuel, in interim storage

Dataset: EcoSpold 2, unit process
Geography: Europe without Switzerland
Time period: 1992-01-01 to 2023-12-31
Technology level: current
Classification: EcoSpold01Categories: nuclear power/waste treatment
Classification: ISIC rev.4 ecoinvent: 3822:Treatment and disposal of hazardous waste
Tags: Treatment
Scenario: Business-as-Usual
System model: Allocation, cut-off by classification
Generated by: [System]
Database: ecoinvent
isCopyrightProtected: true
accessRestrictedTo: 1

## General comment
Electricity consumption is assumed to be negligible (cooling of the high level waste is by natural circulation). The heat generated by the waste itself has not been taken into account.

## Included activities end
The module requires input of service from the final repository for high and intermediate active level waste, i.e. the take over of the conditioned waste. Use of the infrastructure has been accounted for using the originally planned waste flow. Transport of the conditioned waste from the reprocessing facilities is included.

## Technology
Information regards design in mid 1990s.

## Reference product
- conditioned spent nuclear fuel: -1 m3; name RP; By-product classification Waste; CPC 33720: Spent (irradiated) fuel elements (cartridges) of nuclear reactors; HS2017 284450: Spent (irradiated) fuel elements (cartridges) of nuclear reactors
  production volume 1.12197 m3; name RP_PV; = 4*0.280493523
    Estimated. The EU without CH production volume is extrapolated from the global production volume using the nominal GDP of 2010 (source: United Nations, http://data.un.org/Glossary.aspx?q=GDP+%28current+US%24%29, accessed 20130726 and 20130312). Where the Global GDP is set to a dummy value of 4.
    Gross domestic product (GDP) at current prices is GDP at prices of the current reporting period. Also known as nominal GDP.
  property price 0 EUR2005
    Waste products are assigned a price of zero as they are assumed to require further treatment.
  properties: carbon allocation 0 kg, carbon content 0, carbon content, fossil 0, carbon content, non-fossil 0, dry mass 7600 kg, water content 0, water in wet mass 0 kg, wet mass 7600 kg

## Inputs from technosphere
- high level radioactive waste for final repository: -1 m3; name hl_waste; lognormal variance with pedigree 0.002, pedigree (1,1,1,5,1)
  all waste in will move out to final repository
  production volume; = hl_waste*RP_PV/ABS(RP)
    Calculated from the production volume of conditioned spent nuclear fuel in proportion to the respective output amounts.
  properties: dry mass 5400 kg, wet mass 5400 kg
- nuclear waste storage, interim, for high level radioactive waste before final repository: 0.000175 unit; lognormal variance with pedigree 0.082, pedigree (1,1,5,5,1)
  estimation based on somewhat outdated waste flow amount

## Sampling procedure
Literature

## Extrapolations
none This dataset has been copied from an original dataset covering the geography CH. The uncertainty has been adjusted accordingly.
