# treatment of used vegetable cooking oil, purification

Dataset: EcoSpold 2, unit process
Geography: CA-QC
Time period: 2012-01-01 to 2023-12-31
Technology level: current
Classification: ISIC rev.4 ecoinvent: 3830:Materials recovery
Classification: EcoSpold01Categories: biomass/fuels
Synonyms: vegetable oil; SVO; pure vegetable oil; straight vegetable oil
Tags: single enterprise data
Scenario: Business-as-Usual
System model: Allocation, cut-off by classification
Share of production covered: 40 %
Generated by: François Saunier
Database: ecoinvent
isCopyrightProtected: true
accessRestrictedTo: 1

## General comment
This dataset represents the purification of waste vegetable cooking oil before its esterification.
This dataset could be too used for the treatment of waste animal fat. The studied plant treats both types of waste.
Data have been collected for the annual production of the esterification plant and adapted to production of one liter of vegetable oil methyl esther. To fit with the current ecoinvent datasets, collected data have been divided between a purification step and an esterification step. This dataset considers only the purification step.

## Included activities start
From reception of waste cooking oil at factory gate.

## Included activities end
This activity ends at esterification plant with the purified used vegetable cooking oil.
The dataset includes the treatment of impurities and water removal from the used vegetable cooking oil, the intermediate storage of the oil and treatment of specific wastewater effluents.

## Geography
Data from one biodiesel producer in the Quebec region.

## Technology
Typical waste oil esterification plant designed for methyl ester production (for the vehicle fuels market), Quebec context. Based on industrial data from one biodiesel producer in the Quebec region with a low production volume (2 000 000 litres of biodiesel per year). The transesterification is base-catalysed with sodium methoxide and sodium hydroxide.

## Time period
Data from 2012, current technology in Quebec.

## Parameters
- consumption, used oil: 1.12 l; name usedOil_consumption_l; lognormal variance with pedigree 0.0032, pedigree (2,4,1,1,1)
  Measured value of used vegatable cooking oil consumption at plant.
- dry mass, used oil: 0.8 dimensionless; name usedOil_DM; lognormal variance with pedigree 0.01, pedigree (4,4,1,1,1)
  Measured value from industry.
- usedOil_density: 0.92 kg/l; lognormal variance with pedigree 0.042, pedigree (5,4,1,1,1)
  Density of used vegetable cooking oil. Measured value from industry.

## Reference product
- used vegetable cooking oil, purified: 1 kg; name purifiedOil; = (-1*usedOil*usedOil_DM/purifiedOil_drymass)-oil_loss; By-product classification Recyclable; CPC 39120: Bran and other residues from the working of cereals or legumes; vegetable materials and vegetable waste, veget[…]; HS2017 230800: Vegetable materials and vegetable waste, vegetable residues and by-products; whether or not in the form of [...]
  Calculated value. All the water in the used cooking oil input is supposed to be extracte durng purification.
  Mass of purified used cooking oil produced = (mass of used cooking oil input without water) - used oil loss
  production volume 4.0355e6 kg; name PV_purifiedOil
    Based on the purified used vegetable cooking oil consumption of the esterification dataset for Quebec region ("treatment of waste cooking oil, purified, esterification, Quebec").
  property dry mass 1 kg; name purifiedOil_drymass
  property heating value, net 38.4 MJ
    Values is approximated from HHV from "vegetable oil, crude". Source: Radovanovic,M.; Zivanovic,T.; Stojiljkovic,D.; Jovanovic,V.; Jerinic,N.; Knezevic,S. et.al. Utilization of sunflower husk as a fuel for industrial boilers - 20 years experience. Proc. 5th Eur. Conf. on Industrial Furnaces&Boilers 2000,vol.2,p.221-233.
    Available at: https://phyllis.nl/Biomass/View/2152
  property price 0.362 EUR2005
    Temporary price data. Calculated as 90% of purchasers price based on: Assumed equal to palm oil
  properties: carbon allocation 0.75 kg, carbon content 0.75, carbon content, fossil 0.003, carbon content, non-fossil 0.747, water content 0, water in wet mass 0 kg, wet mass 1 kg

## Inputs from technosphere
- electricity, medium voltage: 0.0546246 kWh; = 0.6*0.075; lognormal variance with pedigree 0.0113, pedigree (2,4,4,3,1)
  EcoSpold01Location=CH
  Measured value. 60% of energy consumption on site is associated to the purification step (estimation from industrial).
  Uncertainty: Measured data from industry under study.
- heat, district or industrial, natural gas: 0.406079 MJ; = 0.6*m3Fuel_input*Net_Heat_Value*36.3/fuel_use; lognormal variance with pedigree 0.008, pedigree (1,1,4,1,1)
  Calculated based on reported fuel input (measured value), the Net Heating Value of the fuel and efficiency (1/fuel_use). 60% of energy consumption on site is associated to the purification step (estimation from industrial).
  EcoSpold01Location=RER
  Uncertainty: Calculated variable. Uncertainty will be determined from propagation of uncertainty factors of underlying variables. Uncertainty of actual relation between variables not accounted for at this time, although this could be included in a future update.
  property Corresponding fuel use 1.0417 MJ; name fuel_use
  property heating value, net 1 MJ; name Net_Heat_Value
  property m3Fuel_input 0.016 m3; name m3Fuel_input
  note on Corresponding fuel use: Lower heating value of the fuel input related to the heat/electricity output. Assume a 96% energy efficiency based on Section 5.3.6 of report "Life cycle Inventories of Energy Systems, Results for Current Systems in Switzerland and other UCTE Countries" (ecoinvent report No. 5, 2007)
  note on heating value, net: Net (lower) heating (calorific) value. Value Taken from Table 5.1 of report "Overview and methodology, Data quality guideline for the ecoinvent database version 3" (ecoinvent report No. 1 (v3), 2011)
- polyethylene terephthalate, granulate, amorphous: 0.00194221 kg; lognormal variance with pedigree 0.0112, pedigree (2,4,4,1,1)
  Proxy. Represents PET filters. Measured value.
  Uncertainty: Measured data from industry under study.
  properties: carbon content, fossil 0.625, dry mass 1 kg, heating value, net 22.95 MJ, wet mass 1 kg
- tap water: 0.0728328 kg; lognormal variance with pedigree 0.0112, pedigree (2,4,4,1,1)
  Measured value.
  EcoSpold01Location=CH
  Uncertainty: Measured data from industry under study.
  properties: carbon content, fossil 0.00178991, dry mass 0.000337476 kg, water content 2962.17, wet mass 1 kg
  note on carbon content, fossil: In Tab 17.4, ecoinvent v2.2 report n 17 Bicarbonate content is 2.93 mol/m3. CO2 content is 0.1 mol/m3 (ecoinvent v2.2 report 8, Tab 93.1).
- used vegetable cooking oil: 1.25078 kg; name usedOil; = -1*usedOil_consumption_l*usedOil_density
  See Properties.
  production volume; = PV_purifiedOil * -usedOil / purifiedOil
    Calculated from the purified oil production volume using the relative outputs.
  properties: carbon content, non-fossil 0.6, dry mass 0.8 kg, heating value, net 38.4 MJ, water content 0.25, wet mass 1 kg
  note on carbon content, non-fossil: C content in fat is estimated to be 75% in dry mass (ecoinvent v2.2 report, n 15a, p 40)
  note on heating value, net: Values is approximated from HHV from "vegetable oil, crude". Source: Radovanovic,M.; Zivanovic,T.; Stojiljkovic,D.; Jovanovic,V.; Jerinic,N.; Knezevic,S. et.al. Utilization of sunflower husk as a fuel for industrial boilers - 20 years experience. Proc. 5th Eur. Conf. on Industrial Furnaces&Boilers 2000,vol.2,p.221-233. Available at: https://phyllis.nl/Biomass/View/2152
- vegetable oil esterification facility: 9.18526e-10 unit; lognormal variance with pedigree 0.3846, pedigree (3,3,5,5,4)
  EcoSpold01Location=CH
  Calculated value, according to feed capacity of esterification plant (2 000 000 tonnes of methyl ester) and lifetime of the plant (50 years).
- waste polyethylene terephthalate: -0.00194221 kg; name wastePET; lognormal variance with pedigree 0.0032, pedigree (2,4,1,1,1)
  Measured value. Represents used filters.
  Uncertainty: Measured data from industry under study.
  production volume; = PV_purifiedOil * wastePET / purifiedOil
    Calculated from the purified oil production volume using the relative outputs.
  properties: carbon content, fossil 0.625, dry mass 1 kg, heating value, net 22.95 MJ, wet mass 1 kg
  note on heating value, net: Value taken from the general comment of the treatment dataset.
- wastewater, average: -0.000314152 m3; name wastewater; lognormal variance with pedigree 0.0032, pedigree (2,4,1,1,1)
  EcoSpold01Location=CH
  Proxy. Composition unknow. Measured value.
  Uncertainty: Measured data from industry under study.
  production volume; = PV_purifiedOil * wasteWater / purifiedOil
    Calculated from the purified oil production volume using the relative outputs.
  properties: carbon content, non-fossil 0.194039, dry mass 0.346837 kg, mass concentration, TOC 0.1091 kg/m3, mass concentration, calcium 0.039453 kg/m3, mass concentration, chlorine 0.030031 kg/m3, mass concentration, hydrogen 0.013365 kg/m3, mass concentration, nitrogen 0.031015 kg/m3, mass concentration, oxygen 0.069824 kg/m3, mass concentration, sodium 0.06456 kg/m3, mass concentration, sulfur 0.015602 kg/m3, water content 2882.2, wet mass 1000 kg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
  note on carbon content, non-fossil: 0.0673 kg TOC/m3 (Tab A.17, ecoinvent v2.2 report 13_I). TOC was considered as Total Carbon.

## Emissions to nature
- Oils, non-fossil [soil, industrial]: 0.000625391 kg; name oil_loss; = oil_emission_to_soil*usedOil*-1; lognormal variance with pedigree 0.008, pedigree (1,1,4,1,1)
  See Properties.
  Uncertainty: Calculated variable. Uncertainty will be determined from propagation of uncertainty factors of underlying variables. Uncertainty of actual relation between variables not accounted for at this time, although this could be included in a future update.
  property used oil fraction emitted to soil 0.0005; name oil_emission_to_soil
- BOD5, Biological Oxygen Demand [water, surface water]: 0.00437772 kg; lognormal variance with pedigree 0.25, pedigree (5,5,5,5,5)
  Calculated value. According to emissions of used oil to soil.
- COD, Chemical Oxygen Demand [water, surface water]: 0.00437772 kg; lognormal variance with pedigree 0.25, pedigree (5,5,5,5,5)
  Calculated value. According to emissions of used oil to soil.
- DOC, Dissolved Organic Carbon [water, surface water]: 0.000541103 kg; lognormal variance with pedigree 0.25, pedigree (5,5,5,5,5)
  Calculated value. According to emissions of used oil to soil.
- TOC, Total Organic Carbon [water, surface water]: 0.000541103 kg; lognormal variance with pedigree 0.25, pedigree (5,5,5,5,5)
  Calculated value. According to emissions of used oil to soil.

## Sampling procedure
Industrial data from one biodiesel producer in the Quebec region.

## Extrapolations
Data from one biodiesel producer used to represent the total Québec region production.
Energy consumption of the plant has been divided between purification and esterification seps based on industrial expertise.

## Review by Emilia Moreno Ruiz 2015-09-17
broken formula fixed
