# solar collector glass tube production, with silver mirror

Dataset: EcoSpold 2, unit process
Geography: RoW
Time period: 2002-01-01 to 2023-12-31
Technology level: current
Classification: EcoSpold01Categories: glass/construction
Classification: ISIC rev.4 ecoinvent: 2310:Manufacture of glass and glass products
Synonyms: glass evacuated tube; magnetron sputtering; Vakuumröhrenkollektor; Internal Circular Reflector
Tags: ConvertedDataset
Scenario: Business-as-Usual
System model: Allocation, cut-off by classification
Generated by: Niels Jungbluth
Published in: Kellenberger D. 2007
Database: ecoinvent
isCopyrightProtected: true
accessRestrictedTo: 1

## General comment
Production of solar collector tubes.
[This dataset was already contained in the ecoinvent database version 2. It was not individually updated during the transfer to ecoinvent version 3. Life Cycle Impact Assessment results may still have changed, as they are affected by changes in the supply chain, i.e. in other datasets. This dataset was generated following the ecoinvent quality guidelines for version 2. It may have been subject to central changes described in the ecoinvent version 3 change report (http://www.ecoinvent.org/database/ecoinvent-version-3/reports-of-changes/), and the results of the central updates were reviewed extensively. The changes added e.g. consistent water flows and other information throughout the database. The documentation of this dataset can be found in the ecoinvent reports of version 2, which are still available via the ecoinvent website. The change report linked above covers all central changes that were made during the conversion process.]

## Included activities end
Gate to gate inventory for the manufacturing of collector tubes from glass tubes including a sputter coating with a selective coating and a mirror layer. Infrastructure considered for the pre-product.

## Geography
Production plant in DE. Some pre-products and waste treatment services estimated with European and Swiss data.

## Technology
Sputtering and coating of glass.

## Time period
Data for a few month of production.

## Parameters
- fraction, process water, to air: 0 dimensionless
- fraction, tap water, to air: 0 dimensionless

## Reference product
- solar collector glass tube, with silver mirror: 1 kg; By-product classification allocatable product; CPC 37199: Articles of glass n.e.c. (including glass inners for vacuum flasks, signalling glassware, glass cubes for mosa[…]; HS2017 702000: Glass; articles n.e.c. in chapter 70
  EcoSpold01Location=DE
  production volume 3.75794 kg
    This is a placeholder value that does not reflect real-world production volumes. This dataset does not currently require a real-world production volume to work in the database framework, and no actual data were collected yet. This has no negative effect on the results of the ecoinvent database.
  property price 3.77652 EUR2005
    Calculated based on inputs: The price of the product has been calculated as a sum of the values of the material and energy inputs for this product. This value is therefore a rough estimation. It may underestimate the real price since there are additional expenses when producing any product. These expences can include for example labour costs, treatment of waste materials and profit for the producer. Please consider carefully whether this level of data quality is acceptable for your application.
  properties: carbon allocation 0 kg, carbon content 0, carbon content, fossil 0, carbon content, non-fossil 0, dry mass 1 kg, water content 0, water in wet mass 0 kg, wet mass 1 kg

## Inputs from technosphere
- EUR-flat pallet: 3.37e-5 unit; lognormal variance with pedigree 0.0527, pedigree (2,2,5,5,1)
  EcoSpold01Location=RER
  Wood palette packaging
  Uncertainty: Wood palette packaging
  properties: carbon content, fossil 0.0311351, carbon content, non-fossil 0.58833, dry mass 18.3333 kg, heating value, net 335.11 MJ, water content 0.2, wet mass 22 kg
  note on carbon content, fossil: C content in components of the pallet (ecoinvent v2.2 report 7_part XVIII)
- aluminium, wrought alloy: 0.0028 kg; lognormal variance with pedigree 0.0707, pedigree (2,2,5,5,3)
  EcoSpold01Location=RER
  Coating agents
  Uncertainty: Coating agents
  properties: dry mass 1 kg, wet mass 1 kg
- chemical, organic: 0.0008 kg; lognormal variance with pedigree 0.1227, pedigree (2,2,5,5,4)
  EcoSpold01Location=GLO
  Other chemicals
  Uncertainty: Other chemicals
  properties: carbon content, fossil 0.628, dry mass 1 kg, heating value, net 19.03 MJ, wet mass 1 kg
  note on carbon content, fossil: This dataset is an unweighted average of 20 organic substances (listed in Tab 88.1, ecoinvent v2.2 report 8, part II), being part of the top100 chemicals included in this database. The C-content has also been calculated as an unweighted average of the C content of the substances composing this dataset.
- electricity, medium voltage: 0.000428126, 0.000640859, 0.000202453, 0.00376843, 0.00221179, 0.00262229, 0.031852, 7.59672e-5, 0.635376, 0.213484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 kWh (47 suppliers, which the file names only by identifier); sum of these 1.12 kWh; lognormal variance with pedigree 0.0527, pedigree (2,2,5,5,1)
  Questionnaire
  EcoSpold01Location=DE
  Uncertainty: Questionnaire
- glass tube, borosilicate: 1.05 kg; lognormal variance with pedigree 0.0527, pedigree (2,2,5,5,1)
  EcoSpold01Location=DE
  Glass wastes added.
  Uncertainty: Glass wastes added.
  properties: dry mass 1 kg, wet mass 1 kg
- hazardous waste, for incineration: -0.0158014, -0.000198629 kg (2 suppliers, which the file names only by identifier); sum of these -0.016 kg; lognormal variance with pedigree 0.0127, pedigree (2,2,1,5,1)
  Concentrated solvents
  EcoSpold01Location=CH
  Uncertainty: Concentrated solvents
  production volume
    Calculated from the production volume of solar collector glass tube, with silver mirror in proportion to the respective output amounts.
  properties: carbon content, fossil 0.554667, dry mass 0.75 kg, heating value, net 17 MJ, water content 0.333333, wet mass 1 kg
  note on carbon content, fossil: Tab A.6, ecoinvent v2.2 report 13_I. C content has been calculated after data in the tables, and then referred to 1 kg DM
  note on heating value, net: Value taken from the general comment of the treatment dataset.
- heat, district or industrial, natural gas: 0.0168731, 1.02681, 0.000317316 MJ (3 suppliers, which the file names only by identifier); sum of these 1.044 MJ; lognormal variance with pedigree 0.0527, pedigree (2,2,5,5,1)
  Gasburner with open flame, no gas treatment.
  EcoSpold01Location=RER
  Uncertainty: Gasburner with open flame, no gas treatment.
  properties: heating value, net 1 MJ
- hydrochloric acid, without water, in 30% solution state: 0.008 kg; lognormal variance with pedigree 0.0527, pedigree (2,2,5,5,1)
  EcoSpold01Location=RER
  Questionnaire
  Uncertainty: Questionnaire
  properties: dry mass 1 kg, heating value, net 3.32 MJ, wet mass 1 kg
- municipal solid waste: -2.06504e-6, -1.27507e-7, -8.39577e-8, -3.40911e-6, -4.04817e-7, -2.26296e-7, -2.57209e-6, -9.98641e-7, -2.51948e-6, -6.48052e-7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 kg (44 suppliers, which the file names only by identifier); sum of these -0.002 kg; lognormal variance with pedigree 0.0127, pedigree (2,2,1,5,1)
  Questionnaire
  EcoSpold01Location=CH
  Uncertainty: Questionnaire
  production volume
    (same comment as for hazardous waste, for incineration)
  properties: carbon content, fossil 0.171549, carbon content, non-fossil 0.261655, dry mass 0.771 kg, heating value, net 11.74 MJ, water content 0.297017, wet mass 1 kg
  note on carbon content, fossil: MSW composition in tab 4.1, ecoinvent v2.2 report 13_I. C content referred to 1 kg DM
- steel, chromium steel 18/8, hot rolled: 0.026 kg; lognormal variance with pedigree 0.0527, pedigree (2,2,5,5,1)
  Steel parts of the tube.
  EcoSpold01Location=RER
  Uncertainty: Steel parts of the tube.
  properties: carbon content, fossil 0.0008, dry mass 1 kg, wet mass 1 kg
  note on carbon content, fossil: Stainless steel model is the grade 304 steel (18/8 stainless, 18% chromium 8% nickel; max. 0.08% C)
- tap water: 0.00632905, 0.00964811, 0.0180029, 0.0484984, 0.00583791, 0.243287, 0.00433876, 2.78406 kg (8 suppliers, which the file names only by identifier); sum of these 3.12 kg; lognormal variance with pedigree 0.0527, pedigree (2,2,5,5,1)
  EcoSpold01Location=RER
  Questionnaire
  Uncertainty: Questionnaire
  properties: carbon content, fossil 0.00178991, dry mass 0.000337476 kg, water content 2962.17, wet mass 1 kg
  note on carbon content, fossil: Bicarbonate content is 2.93 mol/m3. CO2 content is 0.1 mol/m3 (ecoinvent v2.2 report 8, Tab 93.1).
- waste glass: -9.11741e-5, -4.34785e-6, -1.58112e-5, -7.17051e-7, -3.40024e-7, -4.50753e-7, -4.75373e-7, -7.24952e-7, -0.0478659, -5.53977e-7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 kg (42 suppliers, which the file names only by identifier); sum of these -0.048 kg; lognormal variance with pedigree 0.0127, pedigree (2,2,1,5,1)
  EcoSpold01Location=CH
  Glass used as sealing material
  Uncertainty: Glass used as sealing material
  production volume
    (same comment as for hazardous waste, for incineration)
  properties: dry mass 1 kg, heating value, net 0.05 MJ, wet mass 1 kg
  note on heating value, net: Value extracted from "treatment of waste glass, open dump, very wet infiltration class (1000mm)"
- wastewater from tube collector production: -1.50153e-5, -0.00310498 m3 (2 suppliers, which the file names only by identifier); sum of these -0.00312 m3; lognormal variance with pedigree 0.0127, pedigree (2,2,1,5,1)
  EcoSpold01Location=CH
  Questionnaire
  Uncertainty: Questionnaire
  production volume
    (same comment as for hazardous waste, for incineration)
  properties: dry mass 0.337476 kg, water content 2962.17, wet mass 1000 kg
- xenon, gaseous: 0.00389 kg; lognormal variance with pedigree 0.1221, pedigree (5,2,5,5,1)
  Xenon filling of the tube, 1bar, own calculation
  EcoSpold01Location=CH
  Uncertainty: Xenon filling of the tube, 1bar, own calculation
  properties: dry mass 1 kg, wet mass 1 kg

## Sampling procedure
Questionnaire.

## Extrapolations
Partly based on estimations. This dataset has been copied from an original dataset covering the geography DE. The uncertainty has been adjusted accordingly.

## Review by Daniel Kellenberger (obsolete) 2003-07-25
Passed.
