# cottonseed, organic to generic market for energy feed

Dataset: EcoSpold 2, unit process
Geography: IN
Time period: 2016-01-01 to 2023-12-31
Technology level: current
Classification: ISIC rev.4 ecoinvent: 1080:Manufacture of prepared animal feeds
Scenario: Business-as-Usual
System model: Allocation, cut-off by classification
Generated by: Avraam Symeonidis
Database: ecoinvent
isCopyrightProtected: true
accessRestrictedTo: 1

## General comment
This is a linking (transfering) activity which links cottonseed, organic to the generic market for energy feed. Cottonseeds are a by-product of the cotton ginning process which produces cotton fibres.

## Included activities start
The activity starts with the reception of cottonseeds.

## Included activities end
The activity models the part of cottonseeds that contribute to the generic market for energy feed, resulting in energy and protein outputs.

## Reference product
- energy feed, gross: 1 MJ; name RP; = cottonseed_input_gross_E_feed_per_kg_DM* cottonseed_input*cottonseed_input_DM; By-product classification allocatable product; CPC 23319: Preparations used in animal feeding n.e.c.
  Calculated based on literature value for "cottonseed" (Feedipedia, 2019), which reports a crude protein content of 21.3% of dry matter; while gross energy content equates to 23.8 MJ/kg dry matter of feed. Dry matter content equates 92.3% of wet mass of feed. Reference(s): Feedipedia (2019) Hominy Feed, Animal Feed Resources Information System, Accessed online at: https://www.feedipedia.org/node/742 on 05/06/2019.
  production volume 6.43701e8 MJ; name fh_pv; = 146512678.843789* cottonseed_input_DM* cottonseed_input_gross_E_feed_per_kg_DM*0.2
    Calculated based on the production volume of cottonseed, organic produced in India. Given the production volume of cottonseed, organic in India (146512678 kg), the production volume of energy feed driven to the generic market for energy feed is calculated to be 39197749864 MJ. It is assumed that 20% of the cottonseed, organic produced is further used as animal feed.
  property price 0.0108 EUR2005
    Based on energy feed, gross content in soybean meal and prices per kg of soybean meal. Assumed soybean meal is the most used feed. Soybean meal 2004 prices for World import/export data (tonnes and US$) from FaoStat statistics (http://faostat.fao.org/site/535/default.aspx#ancor, TRADE)- [Accessed 24 May 2010]. See calculations for protein /energy content
  properties: allocation factor 0.73551, carbon allocation 0 kg, carbon content 0, carbon content, fossil 0, carbon content, non-fossil 0, dry mass 1 kg, true value 0.237248, water content 0, water in wet mass 0 kg, wet mass 1 kg

## Inputs from technosphere
- cottonseed, organic: 0.0334819 kg; name cottonseed_input
  property dry mass 0.923 kg; name cottonseed_input_DM
  property energy content 23.8 MJ; name cottonseed_input_gross_E_feed_per_kg_DM
  property protein content 0.218; name cottonseed_input_protein_feed_per_kg_DM
  properties: carbon content, non-fossil 0.475, water content 0.0834236, wet mass 1 kg
  note on carbon content, non-fossil: Biogenic carbon content of vegetation on a dry mass basis (47.5% DM) derived from FAOSTAT. Reference: http://www.fao.org/forestry/17111/en
  note on energy content: Gross energy content (23.8 MJ/kg DM) for cottonseed. Reference: Feedipedia - Animal Feed Resources Information System. Accessed online at: https://www.feedipedia.org/node/742 on 05/06/2019.
  note on protein content: Crude protein content (21.8 % DM) for cottonseeds. Reference: Feedipedia - Animal Feed Resources Information System. Accessed online at: https://www.feedipedia.org/node/742 on 05/06/2019.
