# wood chipping, industrial residual wood, stationary electric chipper

Dataset: EcoSpold 2, unit process
Geography: RoW
Time period: 1996-01-01 to 2023-12-31
Technology level: current
Classification: EcoSpold01Categories: wooden materials/extraction
Classification: ISIC rev.4 ecoinvent: 1610:Sawmilling and planing of wood
Tags: ConvertedDataset
Scenario: Business-as-Usual
System model: Allocation, cut-off by classification
Generated by: Hans-Jörg Althaus
Published in: Werner F. 2007
Database: ecoinvent
isCopyrightProtected: true
accessRestrictedTo: 1

## General comment
[This dataset was already contained in the ecoinvent database version 2. It was not individually updated during the transfer to ecoinvent version 3. Life Cycle Impact Assessment results may still have changed, as they are affected by changes in the supply chain, i.e. in other datasets. This dataset was generated following the ecoinvent quality guidelines for version 2. It may have been subject to central changes described in the ecoinvent version 3 change report (http://www.ecoinvent.org/database/ecoinvent-version-3/reports-of-changes/), and the results of the central updates were reviewed extensively. The changes added e.g. consistent water flows and other information throughout the database. The documentation of this dataset can be found in the ecoinvent reports of version 2, which are still available via the ecoinvent website. The change report linked above covers all central changes that were made during the conversion process.]

## Included activities end
Chopping of industrial residual wood in stationary electric chopper, per kg chopped wood (dry mass)

## Geography
Data for Switzerland used for central Europe

## Technology
Stationary electric chopper

## Reference product
- wood chipping, industrial residual wood, stationary electric chipper: 1 kg; By-product classification allocatable product; CPC 88311: Wood manufacturing services
  EcoSpold01Location=RER
  production volume 2.67763 kg
    This is a placeholder value that does not reflect real-world production volumes. This dataset does not currently require a real-world production volume to work in the database framework, and no actual data were collected yet. This has no negative effect on the results of the ecoinvent database.
  property price 0.00214967 EUR2005
    Calculated based on inputs: The price of the product has been calculated as a sum of the values of the material and energy inputs for this product. This value is therefore a rough estimation. It may underestimate the real price since there are additional expenses when producing any product. These expences can include for example labour costs, treatment of waste materials and profit for the producer. Please consider carefully whether this level of data quality is acceptable for your application.
  properties: carbon allocation 0 kg, carbon content 0

## Inputs from technosphere
- chipper, stationary, electric: 5.3e-8 unit; lognormal variance with pedigree 0.458, pedigree (4,5,5,5,4)
  EcoSpold01Location=RER
- electricity, medium voltage: 0.000664656, 0.0132584, 0.00445478, 0.000203541, 4.07384e-5, 8.74745e-6, 0.00136914 kWh (7 suppliers, which the file names only by identifier); sum of these 0.02 kWh; lognormal variance with pedigree 0.0726, pedigree (3,3,5,5,3)
  EcoSpold01Location=UCTE
- lubricating oil: 2.04e-6 kg; lognormal variance with pedigree 0.0726, pedigree (3,3,5,5,3)
  EcoSpold01Location=RER
  properties: carbon content, fossil 0.75, dry mass 1 kg, heating value, net 40.2 MJ, wet mass 1 kg
  note on carbon content, fossil: Lubricating oil is produced from diesel. C-content/dry mass of fats and oils considered 75%, from: ecoinvent v2.2 report, n 15a, pg 40
  note on heating value, net: Literature value, Source: IPCC 2006, 2006 IPCC Guidelines for National Greenhouse Gas Inventories, Prepared by the National Greenhouse Gas Inventories Programme, Eggleston H.S., Buendia L., Miwa K., Ngara T. and Tanabe K. (eds). Published: IGES, Japan
- steel, low-alloyed, hot rolled: 4.08e-6 kg; lognormal variance with pedigree 0.0726, pedigree (3,3,5,5,3)
  EcoSpold01Location=RER
  properties: carbon content, fossil 0.005, dry mass 1 kg, wet mass 1 kg
  note on carbon content, fossil: Low alloyed steel composition given in Tab. 3.2 ecoinvent v2.2 report 10_partII. Steel assumed to have a C content of 0.5%

## Sampling procedure
Literature

## Extrapolations
none This dataset has been copied from an original dataset covering the geography RER. The uncertainty has been adjusted accordingly.

## Review by Roberto Dones 2003-07-04
Passed
