# lime production, hydrated, loose weight

Dataset: EcoSpold 2, unit process
Geography: RoW
Time period: 2000-01-01 to 2023-12-31
Technology level: current
Classification: ISIC rev.4 ecoinvent: 2394:Manufacture of cement, lime and plaster
Classification: EcoSpold01Categories: construction materials/binder
Tags: ConvertedDataset
Scenario: Business-as-Usual
System model: Allocation, cut-off by classification
Share of production covered: 50 %
Generated by: Daniel Kellenberger (obsolete)
Published in: Kellenberger D. 2004
Database: ecoinvent
isCopyrightProtected: true
accessRestrictedTo: 1

## General comment
Infrastructure data are estimated based on a site visit and sketches of the process. The value of the infrastructure is normalized with a annual production capacity of about 20'000 tons of product per year. The estimated lifespan of the machines is 25 years. There are no significant dust emissions as a dust control system is installed. This product exists also packed.

## Included activities end
Includes the processes: slaking, crushing, dust abatement (cyclone), transportation and storing. A part of the total heating energy for "production" and "administration" is included. Equipment included in the infrastructure: 1 swing hammer crusher, 2 cyclone dust catchers, 1 lime slaking plant, 2 conveyor worms, and 1 silo.

## Geography
data are from only one company in Switzerland (KFN), for some exchanges RER-modules have been used as proxy

## Technology
The company KFN works on a technically high level. Effective dust control systems are installed.

## Parameters
- Quebec gross domestic product 2011: 3.11e11 USD(2011); name quebecGDP2011; lognormal variance with pedigree 0.0006, pedigree (1,1,1,1,1)
  Quebec Gross domestic product for 2011, expressed in 2011 USD. Source: Institut de la statistique du Québec. Converted from CAD to USD using a yearly average exchange rate of 0.989 CAD/USD (Source: bank of Canada).
- fraction, process water, to air: 0.15 dimensionless; name fraction_PW_to_air; lognormal variance with pedigree 0.092025, pedigree (4,4,3,2,4)
  Calculated value based on literature values and expert opinion.
- process water: 0.000602 m3; name process_water; lognormal variance with pedigree 0.0041, pedigree (3,2,1,5,1)
  Estimation, based on company data. The total amount of water consumed for hydratation by 2001 was 11.010 m3.
- quebec production volume: 6.49e7 kg; name PV_Quebec; lognormal variance with pedigree 0.0006, pedigree (1,1,1,1,1)
  2012 hydrated lime production in Quebec. Primary data from the only producer in Quebec (Canada).
- reaction water: 0.243243 kg; name reaction_water; lognormal variance with pedigree 0.0006, pedigree (1,1,1,1,1)
  Calculated value. Amount of water to produce 1 kg of hydrated lime, based on stoechiometry.
  Mass H2O = 18 *M Ca(OH)2 / 74
- world gross domestic product 2011: 7e13 USD(2011); name worldGDP2011; lognormal variance with pedigree 0.0006, pedigree (1,1,1,1,1)
  World Gross domestic product for 2011, expressed in 2011 USD. Source: World Bank.

## Reference product
- lime, hydrated, loose weight: 1 kg; By-product classification allocatable product; CPC 37420: Quicklime, slaked lime and hydraulic lime; HS2017 252100: Limestone flux; limestone and other calcareous stone, of a kind used for the manufacture of lime or cement; CAS 1305-62-0
  EcoSpold01Location=CH
  production volume 1.44199e10 kg; name PV_world; = PV_Quebec*worldGDP2011/quebecGDP2011
    Gross approximation of World production volume using relative value of Quebec (Canada) GDP to world GDP. See parameters.
  property carbon content, fossil 0
    Mainly Ca(OH)2. Tab 3.4, ecoinvent v2.2 report 7, part VII, pg 7
  property carbon content, non-fossil 0
    Mainly Ca(OH)2. Tab 3.4, ecoinvent v2.2 report 7, part VII, pg 7
  property price 0.108 EUR2005
    Calculated value based on data from United Nations Commodity Trade Statistics Database (comtrade.un.org). UN comtrade category: 252220 Slaked lime. Year 2005. Using exchange rate of 1EURO = 1.209 USD. Average of price of import into 5 main markets (EU, US, JP, IN and CN).
  properties: carbon allocation 0 kg, carbon content 0, dry mass 0.997 kg, water content 0.00300903, water in wet mass 0.003 kg, wet mass 1 kg

## Inputs from technosphere
- electricity, high voltage: 0.00636 kWh; lognormal variance with pedigree 0.0421, pedigree (1,2,5,5,1)
  activityLink added to better reflect the reality of the supply chain
- electricity, medium voltage: 0.00017907, 0.00357205, 8.94217e-5, 5.48375e-5, 1.09757e-5, 2.35672e-6, 0.000249426, 0.00036887, 0.000772795, 0.00106019 kWh (10 suppliers, which the file names only by identifier); sum of these 0.00636 kWh; lognormal variance with pedigree 0.0421, pedigree (1,2,5,5,1)
  EcoSpold01Location=CH
- heat, central or small-scale, other than natural gas: 1.91041e-5, 0.0013909 MJ (2 suppliers, which the file names only by identifier); sum of these 0.00141 MJ; lognormal variance with pedigree 0.0421, pedigree (1,2,5,5,1)
  EcoSpold01Location=CH
  properties: heating value, net 1 MJ
- industrial machine, heavy, unspecified: 8.76e-5 kg; lognormal variance with pedigree 0.3706, pedigree (4,3,5,5,1)
  EcoSpold01Location=RER
- quicklime, in pieces, loose: 0.00341656 kg; name quicklime_Quebec; = 0.769*PV_quebec/PV_world; lognormal variance with pedigree 0.04, pedigree (1,1,5,1,1)
  This flow is considered as a regional specificity of Quebec. The flow is scaled using the production volumes (Quebec and GLO) to avoid its accounting of this specificity in the other regions
  Uncertainty: Calculated variable. Uncertainty will be determined from propagation of uncertainty factors of underlying variables. Uncertainty of actual relation between variables not accounted at this time
  properties: dry mass 0.99 kg, water content 0.010101, wet mass 1 kg
- quicklime, in pieces, loose: 0.765583 kg; = 0.769-quicklime_Quebec; lognormal variance with pedigree 0.0421, pedigree (1,2,5,5,1)
  EcoSpold01Location=CH

## Inputs from nature
- Water, well, in ground [natural resource, in water]: 0.000845243 m3; name water_well_in_ground_input; = process_water+reaction_water/1000; lognormal variance with pedigree 0.0441, pedigree (3,2,5,5,1)
  Calculated value.
  Estimation, based on company data. The total amount of water consumed for hydratation by 2001 was 11.010 m3.
  Uncertainty: Calculated variable. Uncertainty will be determined from propagation of uncertainty factors of underlying variables. Uncertainty of actual relation between variables not accounted at this time

## Emissions to nature
- Water [air, unspecified]: 9.03e-5 m3; name water_to_air_unspecified; = process_water*fraction_PW_to_air; lognormal variance with pedigree 0.0827, pedigree (2,2,5,5,1)
  Calculated value.
  Calculated value based on literature values and expert opinion. See comments in the parametres' comment field.
  property fraction, origin: fresh water 1; name fraction_origin_fresh_water
  property fraction, origin: salt water 0; name fraction_origin_salt_water
  property fraction, origin: unspecified 0; name fraction_origin_unspecified
- Water [water, unspecified]: 0.0005117 m3; name water_to_water_unspecified; = process_water*(1-fraction_PW_to_air); lognormal variance with pedigree 0.0827, pedigree (2,2,5,5,1)
  Calculated value.
  Calculated value based on literature values and expert opinion. See comments in the parametres' comment field.
  Uncertainty: Calculated variable. Uncertainty will be determined from propagation of uncertainty factors of underlying variables. Uncertainty of actual relation between variables not accounted at this time
  property carbon content, fossil 0; name C_content_fossil
  property carbon content, non-fossil 0; name C_content_non_fossil
  property dry mass 0 kg; name DM
  property fraction, origin: fresh water 1; name fraction_origin_fresh_water_Ww
  property fraction, origin: salt water 0; name fraction_origin_salt_water_Ww
  property fraction, origin: unspecified 0; name fraction_origin_unspecified_Ww
  property water in wet mass 1000 kg; name WWM
  property wet mass 1000 kg; name WM

## Sampling procedure
survey

## Extrapolations
data which are only available for RER have been used as proxy for CH This dataset has been copied from an original dataset covering the geography CH. The uncertainty has been adjusted accordingly.

## Review by Roberto Dones 2004-04-14
Passed

## Review by Bo Weidema 2012-09-28
replaced "electricity, high voltage, hydro, run-of-river" with "electricity, high voltage" + activity link to "electricity production, hydro, run-of-river"
