# potassium nitrate production, industrial grade

Dataset: EcoSpold 2, unit process
Geography: CL
Time period: 2015-01-01 to 2023-12-31
Technology level: current
Classification: ISIC rev.4 ecoinvent: 2012:Manufacture of fertilizers and nitrogen compounds
Scenario: Business-as-Usual
System model: Allocation, cut-off by classification
Generated by: Yvonne Baeuerle
Database: ecoinvent
isCopyrightProtected: true
accessRestrictedTo: 1

## General comment
This activity represents the refining of potassium nitrate of lower purity to high purity of >95%. Potassium nitrate (KNO3) in prill form used as industrial chemical for glass, ceramic frits, enamel glazes, and metal treatment, fireworks and gun powder.

## Included activities start
The activity involves further refining processes at moderate temperatures ( 40°C) to form KNO3 in high purity.

## Included activities end
This activity ends with potassium nitrate refined to a purity of >95% ready for use.

## Geography
The production facilitiy is located in the Atacama Desert in northern Chile where the chemical is produced by the global producer and supplier SQM.

## Technology
SQM continueously improves this process to increase production volume and its efficiency.

## Time period
Process data provided are from 2014/2015 and are valid for today's and near future production at SQM in Chile.

## Reference product
- potassium nitrate, industrial grade: 1 kg; By-product classification allocatable product; CPC 34280: Hydrogen peroxide; phosphides; carbides; hydrides, nitrides, azides, silicides and borides; HS2017 283421: Nitrates; of potassium; CAS 7757-79-1
  production volume 4.04e8 kg
    Average production volume from 2015/2016 specific this dataset provided by experts from SQM
  property price 0.34 EUR2005
    Calculated value based on data from United Nations Commodity Trade Statistics Database (comtrade.un.org). UN comtrade category: 283421 Potassium nitrate. Year 2005. Using exchange rate of 1EURO = 1.209 USD. Average of price of import into 5 main markets (EU, US, JP, IN and CN).
  properties: carbon allocation 0 kg, carbon content 0

## Inputs from technosphere
- diesel, burned in building machine: 0.011 MJ; lognormal variance with pedigree 0.0026, pedigree (1,1,3,1,1)
  Diesel used for the processes based on plant measurements
  properties: heating value, net 1 MJ
- electricity, medium voltage: 0.11 kWh; lognormal variance with pedigree 0.0026, pedigree (1,1,3,1,1)
  Electricity used for the processes based on plant measurements
- heat, district or industrial, other than natural gas: 0.54 MJ; lognormal variance with pedigree 0.0026, pedigree (1,1,3,1,1)
  Bunker burned to provide heat for the refining process
  properties: corresponding fuel use, propane, furnace >100kW 1.05263 MJ, heating value, net 1 MJ
  note on corresponding fuel use, propane, furnace >100kW: Lower heating value of the fuel input related to the heat/electricity output, taken directly from ecoinvent v3.0 dataset "heat production, natural gas, at industrial furnace >100kW, GLO 2000".
- potassium chloride, industrial grade: 0.28 kg; name KCL; lognormal variance with pedigree 0.0026, pedigree (1,1,3,1,1)
  Controlled forming of potassium nitrate from NaNO3 + KCL
- purge gas, rich in sodium nitrate: 0.44 kg; lognormal variance with pedigree 0.008, pedigree (1,1,3,1,1)
  By-product from potassium nitrate production, agriculutral grade to form high purities of KNO3 via controlled forming from NaNO3 + KCl
- sodium nitrate, unrefined: 0.28 kg; lognormal variance with pedigree 0.0026, pedigree (1,1,3,1,1)
  Sodium nitrate reaching a purity of about 50%. This sodium nitrate is used in the production of potassium nitrate or will be further procecced to higher purities. So, this product is not sold on the market.
  properties: dry mass 1 kg, wet mass 1 kg
- transport, freight, lorry 16-32 metric ton, EURO3: 0.084 metric ton*km; = 0.300* KCL; lognormal variance with pedigree 0.122, pedigree (1,1,3,1,1)
  Transport of KCL from Salar del Atacama to Coya Sur (300 km)

## Sampling procedure
Data have been provided by the producer SQM in Chile. SQM is a global producer and supplier of plant nutrients, iodine, lithium and industrial chemicals. The production facilities are located in the Atacama Desert where the chemicals are produced from natural resources via mining, crystalization and refining processes. Initially, some data and process information has been exchanged via questionaires. Further, more specific data were provided via intensive direct contact with experts at SQM.
