# hydrochloric acid production, Mannheim process

Dataset: EcoSpold 2, unit process
Geography: RoW
Time period: 2000-01-01 to 2023-12-31
Technology level: current
Classification: ISIC rev.4 ecoinvent: 2011:Manufacture of basic chemicals
Synonyms: Chlorohydric acid; Acide chlorhydrique; 7647-01-0; Muriatic acid; Hydrogen chloride
Scenario: Business-as-Usual
System model: Allocation, cut-off by classification
Generated by: Roland Hischier
Published in: Althaus H.-J. 2007
Database: ecoinvent
isCopyrightProtected: true
accessRestrictedTo: 1

## General comment
This dataset represents the co-production of sodium sulfate and hydrochloric acid by means of the Mannheim process.
Sodium sulfate is found in nature in the anhydrous form (thenardite) or the decahydrate form (Glauber's salt). Sodium sulfate is also produced chemically – either as a by-product of other processes or as the main product of a process. Sodium sulfate is used for the production of soap and detergents, textiles, pulp and paper, glass and for a variety of other uses – e.g. carpet fresheners or starch manufacturing.
Hydrogen chloride (HCl) is a colorless to yellowish fuming liquid with a sharp, pungent odor. It is a strong highly corrosive acid. The main applications
for HCl are according to (Inchem hcl):
- Acidizing (activation) of petroleum wells
- Manufacture of dyes, phenols and plastics
- Ore reduction (manganese, radium, vanadium, tantalum, tin and tungsten)
- Food processing (corn, syrup, sodium glutamate)
- Pickling and metal cleaning
- Industrial acidizing
- Water treatment
- Resin regeneration and demineralizers
Due to a lack of industrial data, this dataset is based on literature and stoichiometric calculations.
References:
Althaus H.-J., Chudacoff M., Hischier R., Jungbluth N., Osses M. and Primas A. (2007) Life Cycle Inventories of Chemicals. ecoinvent report No. 8, v2.0. EMPA Dübendorf, Swiss Centre for Life Cycle Inventories, Dübendorf, CH.

## Included activities start
The activity starts when the raw materials enter the process.

## Included activities end
This activity ends with the production of hydrochloric acid and sodium sulfate. The consumption of raw materials and chemicals used for production are taken into account, as well as emissions to air and water. The energy demand and infrastructure use are estimated. The production of solid wastes is omitted.

## Geography
The data used has no specific geographical origin as it is based on stoechiometric calculations and estimations. It is assumed to be representative of the production processes in this geography.

## Technology
Production of sodium sulfate and HCl by the Mannheim process. This process can be summarized with the following overall stoechiometric reaction:
2 NaCl + H2SO4 → Na2SO4 + 2 HCl

## Parameters
- fraction, cooling water, cooling pond system, to air: 0.032 dimensionless; name fraction_CW_CP_to_air; lognormal variance with pedigree 0.0413, pedigree (2,3,1,3,1)
  Calculated based on literature value (Scown, C.D., 2011, Water Footprint of U.S. Transportation Fuels and supplying information of the article) (Vionnet, S., Quantis Water Database - Technical Report, 2012).
- fraction, cooling water, once-through system, to air: 0.004 dimensionless; name fraction_CW_OT_to_air; lognormal variance with pedigree 0.0413, pedigree (2,3,1,3,1)
  (same comment as for fraction, cooling water, cooling pond system, to air)
- fraction, cooling water, recirculating system, to air: 0.771 dimensionless; name fraction_CW_R_to_air; lognormal variance with pedigree 0.0413, pedigree (2,3,1,3,1)
  (same comment as for fraction, cooling water, cooling pond system, to air)
- fraction, cooling water, to air: 0.3875 dimensionless; name fraction_CW_to_air; = (0.5*fraction_CW_OT_to_air)+(0.5*fraction_CW_R_to_air); lognormal variance with pedigree 0.092025, pedigree (4,4,3,2,4)
  Calculated value based on literature value (see comments of the other parametres present in this dataset) and expert opinion. In the case when no industry/literature data are available about the type of cooling or directly fraction, cooling water, to air specific for the process a default assumption is applied. It is assumed that the once-through cooling system is used in 50% of all cases and recirculating system is used in another 50% of all cases.
- fraction, process water, to air: 0.205 dimensionless; name fraction_PW_to_air; lognormal variance with pedigree 0.092025, pedigree (4,4,3,2,4)
  Literature value (Statistics Canada, 2007 & Shaffer, K.H., 2008, Consumptive water use in the Great Lakes Basin, USGS) (Vionnet, S., Quantis Water Database - Technical Report, 2012).

## Reference product
- sodium sulfate, anhydrite: 1 kg; name BP_sodium_sulfate_anhydrite; By-product classification allocatable product; CPC 34240: Phosphates of triammonium; salts and peroxysalts of inorganic acids and metals n.e.c.; HS2017 283311: Sodium sulphates; disodium sulphate; CAS 7757-82-6
  production volume 2.79923e10 kg; = RP_PV*BP_sodium_sulfate_anhydrite/ABS(RP)
    Calculated from the production volume of hydrochloric acid, without water, in 30% solution state in proportion to the respective output amounts.
  property price 0.191 EUR2005
    Temporary price data. Calculated as 90% of purchasers price based on: 2004 Import/Export data (total trades (USD) divided by total weight (kg) in EU27, USA, China, Japan and India) from UN Commodity Trade Statistics Database (http://data.un.org/Explorer.aspxDatabase [Accessed 2 July 2010]). Commodity: Sodium sulphates other than disodium sulphate
  properties: allocation factor 0.745654, carbon allocation 0 kg, carbon content 0, carbon content, fossil 0, carbon content, non-fossil 0, dry mass 1 kg, true value 0.37232, water content 0, water in wet mass 0 kg, wet mass 1 kg

## Inputs from technosphere
- chemical factory, organics: 2.98262e-10 unit; lognormal variance with pedigree 0.3498, pedigree (2,3,5,4,3)
  Calculated based on literature data published by the industry. For this activity, no information was readily available concerning infrastructure and land-use. Therefore, the infrastructure is estimated based on data from two chemical factories, the BASF site of Ludwigshafen and the chemical factory in Gendorf (which are both located in Germany), which produce a wide range of chemical substances. Based on this data, the following assumptions are made: the built area amounts to about 4.2 ha, the plant has an average output of 50'000 t/a and a lifespan of fifty years. The estimated infrastructure amount is therefore 4.00 E-10 units per kg of produced chemical.
  References:
  Althaus H.-J., Chudacoff M., Hischier R., Jungbluth N., Osses M. and Primas A. (2007) Life Cycle Inventories of Chemicals. ecoinvent report No. 8, v2.0. EMPA Dübendorf, Swiss Centre for Life Cycle Inventories, Dübendorf, CH.
  Gendorf (2000) Umwelterklärung 2000, Werk Gendorf. Werk Gendorf, Burgkirchen.
- electricity, medium voltage: 0.00161071, 0.0321301, 0.0107956, 0.000493255, 9.87244e-5, 2.11984e-5, 0.00331793 kWh (7 suppliers, which the file names only by identifier); sum of these 0.0484675 kWh; lognormal variance with pedigree 0.096, pedigree (4,5,5,5,3)
  Information from Ullmann's Encyclopedia
  Uncertainty: i
- heat, district or industrial, natural gas: 0.0206139, 1.25445 MJ (2 suppliers, which the file names only by identifier); sum of these 1.27507 MJ; lognormal variance with pedigree 0.096, pedigree (4,5,5,5,3)
  Information from Ullmann's Encyclopedia
  Uncertainty: i
  properties: heating value, net 1 MJ
- heat, district or industrial, other than natural gas: 1.27448, 0.000590442 MJ (2 suppliers, which the file names only by identifier); sum of these 1.27507 MJ; lognormal variance with pedigree 0.096, pedigree (4,5,5,5,3)
  Information from Ullmann's Encyclopedia
  Uncertainty: i
  properties: heating value, net 1 MJ
- sodium chloride, powder: 0.645736 kg; lognormal variance with pedigree 0.1786, pedigree (4,5,5,5,5)
  Stoechiometric calc., yield 99.8%-90%
  Uncertainty: s
  properties: dry mass 1 kg, wet mass 1 kg
- sulfuric acid: 0.54209 kg; lognormal variance with pedigree 0.1786, pedigree (4,5,5,5,5)
  Stoechiometric calc., yield 99.8%-90%
  Uncertainty: s
  properties: dry mass 1 kg, wet mass 1 kg

## Inputs from nature
- Water, cooling, unspecified natural origin [natural resource, in water]: 0.019387 m3; name water_cooling_UNO_input; lognormal variance with pedigree 0.096, pedigree (4,5,5,5,3)
  Information from Ullmann's Encyclopedia
  Uncertainty: i
- Water, unspecified natural origin [natural resource, in water]: 0.00104392 m3; name water_UNO_input; lognormal variance with pedigree 0.096, pedigree (4,5,5,5,3)
  Information from Ullmann's Encyclopedia
  Uncertainty: i

## Emissions to nature
- Sulfate [air, urban air close to ground]: 0.00105883 kg; lognormal variance with pedigree 0.26, pedigree (5,5,5,5,5)
  Assumption, 0.2% of input = air emission
  Uncertainty: a
- Water [air, unspecified]: 0.00772647 m3; = (water_cooling_UNO_input*fraction_CW_to_air)+(water_UNO_input*fraction_PW_to_air); lognormal variance with pedigree 0.0827, pedigree (2,2,5,5,1)
  Calculated as a fraction of the input of water. For more details, refer to the mathematical relation and the parameters.
  property fraction, origin: fresh water 0; name fraction_origin_fresh_water
  property fraction, origin: salt water 0; name fraction_origin_salt_water
  property fraction, origin: unspecified 1; name fraction_origin_unspecified
- Chloride [water, surface water]: 0.0196107 kg; lognormal variance with pedigree 0.23, pedigree (5,5,5,5,4)
  Calculated from mass bilance
  Uncertainty: c
- Sodium I [water, surface water]: 0.0126761 kg; lognormal variance with pedigree 0.23, pedigree (5,5,5,5,4)
  Calculated from mass bilance
  Uncertainty: c
- Sulfate [water, surface water]: 0.0255014 kg; lognormal variance with pedigree 0.23, pedigree (5,5,5,5,4)
  Calculated from mass bilance
  Uncertainty: c
- Water [water, unspecified]: 0.0127045 m3; = water_cooling_UNO_input*(1-fraction_CW_to_air)+water_UNO_input*(1-fraction_PW_to_air); lognormal variance with pedigree 0.0827, pedigree (2,2,5,5,1)
  (same comment as for Water)
  property carbon content, fossil 0; name C_content_fossil
  property carbon content, non-fossil 0; name C_content_non_fossil
  property dry mass 0 kg; name DM
  property fraction, origin: fresh water 0; name fraction_origin_fresh_water_Ww
  property fraction, origin: salt water 0; name fraction_origin_salt_water_Ww
  property fraction, origin: unspecified 1; name fraction_origin_unspecified_Ww
  property water in wet mass 1000 kg; name WWM
  property wet mass 1000 kg; name WM

## Sampling procedure
The data is based on literature and stoechiometric calculations.

## Extrapolations
This dataset has been copied from an original dataset covering the geography RER. The uncertainty has been adjusted accordingly.

## Review by Emilia Moreno Ruiz 2017-08-08
This dataset was additionally reviewed in a separate review process by Eric Johnson of Atlantic Consulting as well as Emilia Moreno Ruiz and Gregor Wernet of ecoinvent.
