# application of plant protection product, by field sprayer

Dataset: EcoSpold 2, unit process
Geography: AU
Time period: 2012-01-01 to 2023-01-01
Technology level: current
Classification: ISIC rev.4 ecoinvent: 0161:Support activities for crop production
Scenario: Business-as-Usual
System model: Allocation, cut-off by classification
Generated by: Dominique Maxime
Published in: Nemecek, T. 2007
Database: ecoinvent
isCopyrightProtected: true
accessRestrictedTo: 1

## General comment
This dataset represents the service of spraying broad acre crops over 1 ha of agricultural land. The spray rig is assumed to be 30 metres wide and 125kW.
Dataset exchanges scaled from GLO parent dataset based on diesel consumption in Australia with other flows on capital infrastructure being kept the same as global process.
This inventory has been developed as part of the AusAgLCI initiative funded by a partnership of Australian Research and Development Corporations (RIRDC, CRDC, GRDC, SRDC, HAL, MLA, DA, FWPA) and Research Agencies (CSIRO, USQ and Q DAFF), with technical support from Life Cycle Strategies. More detail on inventory development can be found in the 'AusAgLCI Methodology for developing Life Cycle Inventory' documents located at www.Auslci.alcas.asn.au. Energy use from WA farm energy calculator.
Fuel consumption data have been derived from the Western Australia Farm Energy Calculator for broadacre crop.

## Included activities start
The activity starts from the agricultural field foreseen to be processed.

## Included activities end
The inventory takes into account the diesel fuel consumption and the amount of agricultural machinery and of the shed, which has to be attributed to the application of plant protection. Also taken into consideration is the amount of emissions to the air from combustion and the emission to the soil from tyre abrasion during the work process. The following activities were considered part of the work process: preliminary work at the farm, like attaching the adequate machine to the tractor; transfer to field (with an assumed distance of 1 km); field work (for a parcel of land of 1 ha surface); transfer to farm and concluding work, like uncoupling the machine. The overlapping during the field work is considered. The amount of sprayed plant protection products is not taken into account. Not included are dust other than from combustion and noise.

## Geography
Fuel consumption data have been derived from the Western Australia Farm Energy Calculator for spraying from global defaults.

## Technology
Fuel use is from current technology used in Australia

## Time period
Model is based on data in 2010

## Parameters
- AUtralia diesel consumption: 0.5894 kg/ha; name AU_diesel; lognormal variance with pedigree 0.000725, pedigree (1,2,1,2,1)
  Diesel consumption of tractor and machinery within the AUtralian context; kg diesel/ha
- ecoinvent diesel consumption: 0.595 kg/ha; name EI_diesel; lognormal variance with pedigree 0.004, pedigree (1,4,1,5,1)
  Diesel consumption in the parent dataset (ecoinvent); kg diesel/ha
- farm machinery diesel consumption ratio: 0.990588 dimensionless; name machine_diesel_ratio; = AU_diesel/ EI_diesel
  Ratio of diesel consumption for tractor and its machinery: kg diesel per ha of the Australia machinery/kg diesel per ha of the ecoinvent"s parent machinery
- quebec cropped area: 1.87476e6 ha; name qc_crop_area; lognormal variance with pedigree 0.0006, pedigree (1,1,1,1,1)
  Not adapted to AU values. Original values: Land in crops, Canada, Quebec in 2011. Source: Statistics Canada, 2013. Table 004-0002 - Census of Agriculture, total area of farms and use of farm land, CANSIM (database). (accessed: 2013-11-15) ("Land in crops" includes field crops, vegetables, fruits and nursery crops, and sod.) Statistics Canada
- world arable land area: 1.39628e9 ha; name world_arable_area; lognormal variance with pedigree 0.0006, pedigree (1,1,1,1,1)
  Arable land area, World, in 2011. Source: FAOSTAT, 2013

## Reference product
- application of plant protection product, by field sprayer: 1 ha; By-product classification allocatable product; CPC 86119: Other support services to crop production
  production volume 4.1629e6 ha
    Gross approximation of Australia production volume using relative value of Australia cropped area to world arable area
  property price 6.83616 EUR2005
    The price was calculated from the Department of Primary Industries NSW 2012 NSW Gross margin, Department of Primary Industries NSW, “Canola After Pasture, Dryland Winter 2012, Gross Margin Budget”. The prices were converted to EUR based on the annual exchange rates published by the European Central Bank (https://sdw.ecb.europa.eu/quickview.do?SERIES_KEY=120.EXR.A.AUD.EUR.SP00.A, last accessed on 2023-06-01) and adjusted for inflation relative to 2005 using the producer price index (PPI) of the euro area, published by eurostat (https://ec.europa.eu/eurostat/databrowser/view/STS_INPP_A__custom_6416181/default/table?lang=en, last accessed on 2023-06-01).
  properties: carbon allocation 0 kg, carbon content 0

## Inputs from technosphere
- agricultural machinery, unspecified: 0.53 kg; lognormal variance with pedigree 0.046, pedigree (1,4,1,5,1)
- diesel: 1.67 kg; lognormal variance with pedigree 0.046, pedigree (1,4,1,5,1)
  Scaling to Australia diesel consumption
  property calculation property, kg 0 kg; name m_diesel
  properties: carbon content, fossil 0.865, dry mass 1 kg, heating value, net 42.8 MJ, wet mass 1 kg
  note on calculation property, kg: Mass output. Defined here for use in the combined production calculations.
  note on carbon content, fossil: C-content of diesel is 86.5% (ecoinvent v2.2 report 6_IV, Tab 3.14)
- shed: 0.00198 m2; lognormal variance with pedigree 0.304, pedigree (1,4,1,5,1)
- tractor, 4-wheel, agricultural: 0.321 kg; lognormal variance with pedigree 0.046, pedigree (1,4,1,5,1)

## Emissions to nature
- Ammonia [air, non-urban air or from high stacks]: 3.34949e-5 kg; lognormal variance with pedigree 0.0601, pedigree (1,2,1,5,3)
  Scaling to Australia diesel consumption
- Benzene [air, non-urban air or from high stacks]: 1.22403e-5 kg; lognormal variance with pedigree 0.0601, pedigree (1,2,1,5,3)
  Scaling to Australia diesel consumption
- Benzo(a)pyrene [air, non-urban air or from high stacks]: 5.01949e-8 kg; lognormal variance with pedigree 0.6601, pedigree (1,2,1,5,3)
  Scaling to Australia diesel consumption
- Cadmium II [air, non-urban air or from high stacks]: 1.67e-8 kg; lognormal variance with pedigree 0.6601, pedigree (1,2,1,5,3)
  Scaling to Australia diesel consumption
- Carbon dioxide, fossil [air, non-urban air or from high stacks]: 5.20926 kg; lognormal variance with pedigree 0.0201, pedigree (1,2,1,5,3)
  Scaling to Australia diesel consumption
- Carbon monoxide, fossil [air, non-urban air or from high stacks]: 0.00929886 kg; lognormal variance with pedigree 0.654, pedigree (1,4,1,5,1)
  Scaling to Australia diesel consumption
- Chromium III [air, non-urban air or from high stacks]: 8.36898e-8 kg; lognormal variance with pedigree 0.6601, pedigree (1,2,1,5,3)
  Scaling to Australia diesel consumption
- Copper ion [air, non-urban air or from high stacks]: 2.84659e-6 kg; lognormal variance with pedigree 0.6601, pedigree (1,2,1,5,3)
  Scaling to Australia diesel consumption
- Dinitrogen monoxide [air, non-urban air or from high stacks]: 0.000201159 kg; lognormal variance with pedigree 0.0601, pedigree (1,2,1,5,3)
  Scaling to Australia diesel consumption
- Methane, fossil [air, non-urban air or from high stacks]: 0.000216341 kg; lognormal variance with pedigree 0.0601, pedigree (1,2,1,5,3)
  Scaling to Australia diesel consumption
- NMVOC, non-methane volatile organic compounds [air, non-urban air or from high stacks]: 0.00640483 kg; lognormal variance with pedigree 0.044, pedigree (1,4,1,5,1)
  Scaling to Australia diesel consumption
- Nickel II [air, non-urban air or from high stacks]: 1.1671e-7 kg; lognormal variance with pedigree 0.6601, pedigree (1,2,1,5,3)
  Scaling to Australia diesel consumption
- Nitrogen oxides [air, non-urban air or from high stacks]: 0.0750551 kg; lognormal variance with pedigree 0.044, pedigree (1,4,1,5,1)
  Scaling to Australia diesel consumption
- PAH, polycyclic aromatic hydrocarbons [air, non-urban air or from high stacks]: 5.50341e-6 kg; lognormal variance with pedigree 0.3201, pedigree (1,2,1,5,3)
  Scaling to Australia diesel consumption
- Particulate Matter, < 2.5 um [air, non-urban air or from high stacks]: 0.00439324 kg; lognormal variance with pedigree 0.3201, pedigree (1,2,1,5,3)
  Scaling to Australia diesel consumption
- Selenium IV [air, non-urban air or from high stacks]: 1.67e-8 kg; lognormal variance with pedigree 0.0601, pedigree (1,2,1,5,3)
  Scaling to Australia diesel consumption
- Sulfur dioxide [air, non-urban air or from high stacks]: 0.00168898 kg; lognormal variance with pedigree 0.0201, pedigree (1,2,1,5,3)
  Scaling to Australia diesel consumption
- Zinc II [air, non-urban air or from high stacks]: 1.67e-6 kg; lognormal variance with pedigree 0.6601, pedigree (1,2,1,5,3)
  Scaling to Australia diesel consumption
- Cadmium II [soil, agricultural]: 1.75e-7 kg; lognormal variance with pedigree 0.044, pedigree (1,4,1,5,1)
  Emission from tyre abrasion, not related to diesel consumption
- Lead II [soil, agricultural]: 7.8e-7 kg; lognormal variance with pedigree 0.044, pedigree (1,4,1,5,1)
  Emission from tyre abrasion, not related to diesel consumption
- Zinc II [soil, agricultural]: 0.00046 kg; lognormal variance with pedigree 0.044, pedigree (1,4,1,5,1)
  Emission from tyre abrasion, not related to diesel consumption

## Sampling procedure
The inventoried HC, NOx, CO and fuel consumption values are measurements made following two test cycles (ISO 8178 C1 test and a specific 6-level-test created by the FAT) and on measurements made during the field work. The other emissions were calculated basing on literature data and the measured fuel consumption.

## Extrapolations
Values given in the reference are representative for the chosen work processes. Dataset based on GLO parent dataset which was extrapolated from CH geography context without modification of exchanges. Processes are typical procedures for Switzerland around the year 2000, they are not statistical average processes. This dataset has been adapted only for diesel input representative of the Australia context and for combustion emissions scaled from the difference in diesel consumption. The uncertainty has been adjusted accordingly.

## Review by Christian Bauer 2013-11-21
passed; APV needs an update

## Review by Thomas Nemecek 2013-11-21
The production volume - calculated with a formula from the global volume - needs to be updated, since the production volume of the GLO dataset has changed.
