# ferroniobium production, from pyrochlore concentrate, 66% Nb

Dataset: EcoSpold 2, unit process
Geography: RoW
Time period: 2019-01-01 to 2023-12-31
Technology level: current
Classification: ISIC rev.4 ecoinvent: 2410:Manufacture of basic iron and steel
Synonyms: Iron-Niobium
Scenario: Business-as-Usual
System model: Allocation, cut-off by classification
Generated by: Efstathios Kakkos
Database: ecoinvent
isCopyrightProtected: true
accessRestrictedTo: 1

## General comment
This dataset has been copied from an original dataset covering the geography of BR. The data is assumed to be also representative of the global situation, since Brazil produces more than 88% of the ferroniobium production (Source: https://prd-wret.s3.us-west-2.amazonaws.com/assets/palladium/production/atoms/files/myb1-2017-niobi.pdf).This dataset refers to the production of ferroniobium from refined pyrochlore concentrate, 63% Nb2O5 (produced from the mining and beneficiation activities in Araxa, Brazil) through the aluminothermic reduction process in Araxa, Brazil. This dataset is based mostly on the following source: Eckert J (2012) Niobium and Niobium Compounds. In: Ullmann’s Encyclopedia of industrial chemistry. Wiley-VCH Verlag GmbH &Co.KGaA (for more information check the sampling procedure).

## Included activities start
The activities start with the processing of the refined pyrochlore concentrate (63% Nb2O5) in the metallurgy unit.

## Included activities end
The activities end with the production of Ferroniobium product, 66% Nb.

## Allocation
No allocation is applied.

## Technology
The refined pyrochlore concentrate is placed in the metallurgical unit, where it is mixed with aluminium powder and iron, homogenized and processed in electric furnaces (as reported by Eckert 2012) in order to produce Ferroniobium via aluminothermic reduction (in electric arc furnaces) with the following chemical reaction: 3Nb2O5 + 10Al -> 6Nb + 5Al2O3
The aluminothermic reaction is not self-sustaining (enthalpy of this reaction: − 276.1 kJ/mol Al), meaning that preheating or addition of compounds (such as BaO2, CaO2, KClO4, KClO3 or NaNO3) into the mixture that release oxygen is required. Furthermore, the CBMM Ferroniobium production process requires primary aluminium powder while the added iron (or iron oxide) is secondary (scrap). It is reported by Eckert (see source above) that such a process requires 18 t of pyrochlore concentrate and yields 11 t of FeNb product and approximately 20 t of slag. Afterwards the FeNb block product from the reaction is detached from the slag and solidifies while the slag is disposed in the tailings dam. Finally, the product is cooled, crushed in the required size and sent to the customers.

## Time period
Data are considered representative of current production practices.

## Reference product
- ferroniobium, 66% Nb: 1 kg; By-product classification allocatable product; CPC 41115: Other ferro-alloys; HS2017 720293: Ferro-alloys; ferro-niobium; CAS 12023-22-2
  production volume 1.18182e7 kg; name PVRP; = 66800*1000/0.66
    According to USGS (2020), the global production of ferroniobium (FeNb) was estimated to be 66'800 metric tons of contained niobium in 2018. The niobium content is considered to be the same as in Brazil (66%, based on Dolganova et al. 2020), since Brazil represents 88% of the global FeNb production (according to USG 2020).
    References:
    USGS (2020). Niobium (Columbium) and Tantalum Statistics and Information, Advance Data Release of the 2018 Annual Tables. https://prd-wret.s3.us-west-2.amazonaws.com/assets/palladium/production/atoms/files/myb1-2018-niobi-adv.xlsx
    Dolganova, I., Bosch, F., Bach, V., Baitz, M., & Finkbeiner, M. (2020). Life cycle assessment of ferro niobium. The International Journal of Life Cycle Assessment, 25(3), 611-619. doi:10.1007/s11367-019-01714-7.
  property price 16.5971 EUR2005
    Price calculated based on the prices of imported and exported ferroniobium in the United States of America from 2011 to 2019, reported in the USGS Minerals Yearbooks for Niobium (https://www.usgs.gov/centers/nmic/niobium-columbium-and-tantalum-statistics-and-information). The prices given in USD were converted to EUR based on the annual exchange rates published by the European Central Bank (https://sdw.ecb.europa.eu/quickview.do?SERIES_KEY=120.EXR.A.USD.EUR.SP00.A), and then adjusted for inflation relative to 2005 by using the Harmonised Index of Consumer Prices (HICP) of the euro area, published by eurostat (https://ec.europa.eu/eurostat/databrowser/view/PRC_HICP_AIND/default/table).
  properties: aluminium content 0.0125, carbon allocation 0 kg, carbon content 0, carbon content, fossil 0, carbon content, non-fossil 0, dry mass 1 kg, iron content 0.295, niobium content 0.66, silicon content 0.325, water content 0, water in wet mass 0 kg, wet mass 1 kg

## Inputs from technosphere
- aluminium, primary, ingot: 0.0769549, 0.0446841, 0.423816 kg (3 suppliers, which the file names only by identifier); sum of these 0.545455 kg; lognormal variance with pedigree 0.0033, pedigree (2,2,3,1,1)
  This exchange is used as a proxy for the aluminium powder required for the production of 1 kg of ferroniobium (FeNb). The amount is based on the following source: Eckert J (2012) Niobium and Niobium Compounds. In: Ullmann’s
  Encyclopedia of industrial chemistry. Wiley-VCH Verlag GmbH
  & Co.KGaA.
  properties: dry mass 1 kg, wet mass 1 kg
- anode, for metal electrolysis: 0.04 kg; lognormal variance with pedigree 0.0033, pedigree (2,2,3,1,1)
  This exchange (used as a proxy) represents the amount of electrodes required in the aluminothermic reduction process for the production of 1 kg of ferroniobium (FeNb). The amount is based on the following source: Dolganova, I., Bosch, F., Bach, V., Baitz, M., & Finkbeiner, M. (2020). Life cycle assessment of ferro niobium. The International Journal of Life Cycle Assessment, 25(3), 611-619. doi:10.1007/s11367-019-01714-7
  properties: carbon content, fossil 0.865971, dry mass 1 kg, wet mass 1 kg
- electric arc furnace slag: -1.6048, -0.0047237, -0.00148951, -0.000712691 kg (4 suppliers, which the file names only by identifier); sum of these -1.61173 kg; lognormal variance with pedigree 0.0033, pedigree (2,2,3,1,1)
  This exchange represents the amount of slag produced as a byproduct during the production of 1 kg of ferroniobium (FeNb). The amount presented here is based on wet mass balance and is an underestimated value compared to the one reported on the following source (20000 kg of slag for the production of 11000 kg of FeNb or 1.82 kg of slag for the production of 1 kg of FeNb): Eckert J (2012) Niobium and Niobium Compounds. In: Ullmann’s
  Encyclopedia of industrial chemistry. Wiley-VCH Verlag GmbH
  & Co.KGaA. This exchange is considered as a proxy for the produced slag, because the refined concentrate is process in an electric arc furnace (see general comment).
  production volume; = PVRP*bp1
    Calculated from production volume of reference product using the relative outputs.
  properties: aluminium content 0.0393524, calcium content 0.257715, chromium content 0.0174286, dry mass 0.995 kg, fluorine content 0.0201005, iron content 0.16826, magnesium content 0.050462, manganese content 0.0386403, oxygen content 0.265728, silicon content 0.0917304, water content 0.00502513, wet mass 1 kg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
  note on aluminium content: The value of 'aluminium content' is documented in Turner & Symeonidis, 2020. Reference: Turner David & Symeonidis Avraam, 2020, Life cycle inventories of the treatment of iron and steelmaking by-products, ecoinvent association, Zürich, Switzerland
  note on calcium content: The value of 'calcium content' is documented in Turner & Symeonidis, 2020. Reference: Turner David & Symeonidis Avraam, 2020, Life cycle inventories of the treatment of iron and steelmaking by-products, ecoinvent association, Zürich, Switzerland
  note on chromium content: The value of 'chromium content' is documented in Turner & Symeonidis, 2020. Reference: Turner David & Symeonidis Avraam, 2020, Life cycle inventories of the treatment of iron and steelmaking by-products, ecoinvent association, Zürich, Switzerland
  note on fluorine content: The value of 'fluorine content' is documented in Turner & Symeonidis, 2020. Reference: Turner David & Symeonidis Avraam, 2020, Life cycle inventories of the treatment of iron and steelmaking by-products, ecoinvent association, Zürich, Switzerland
  note on iron content: The value of 'iron content' is documented in Turner & Symeonidis, 2020. Reference: Turner David & Symeonidis Avraam, 2020, Life cycle inventories of the treatment of iron and steelmaking by-products, ecoinvent association, Zürich, Switzerland
  note on magnesium content: The value of 'magnesium content' is documented in Turner & Symeonidis, 2020. Reference: Turner David & Symeonidis Avraam, 2020, Life cycle inventories of the treatment of iron and steelmaking by-products, ecoinvent association, Zürich, Switzerland
  note on manganese content: The value of 'manganese content' is documented in Turner & Symeonidis, 2020. Reference: Turner David & Symeonidis Avraam, 2020, Life cycle inventories of the treatment of iron and steelmaking by-products, ecoinvent association, Zürich, Switzerland
  note on oxygen content: The value of 'oxygen content' is documented in Turner & Symeonidis, 2020. Reference: Turner David & Symeonidis Avraam, 2020, Life cycle inventories of the treatment of iron and steelmaking by-products, ecoinvent association, Zürich, Switzerland
  note on silicon content: The value of 'silicon content' is documented in Turner & Symeonidis, 2020. Reference: Turner David & Symeonidis Avraam, 2020, Life cycle inventories of the treatment of iron and steelmaking by-products, ecoinvent association, Zürich, Switzerland
- electricity, medium voltage: 0.000329972, 1.47226e-5, 0.000343074, 0.000173938, 0.00021299, 0.000123261, 0.0136262, 0.271812, 3.05668e-5, 0.0913279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 kWh (31 suppliers, which the file names only by identifier); sum of these 0.475 kWh; lognormal variance with pedigree 0.0866, pedigree (3,4,5,5,4)
  The amount of electricity required for the aluminothermic processing is assumed to be 0.475 kWh (Source: http://heattreatconsortium.com/metals-advisor/electric-arc-furnace/electric-arc-furnace-energy-consumption/).
- fluorspar, 97% purity: 0.0681818 kg; lognormal variance with pedigree 0.0033, pedigree (2,2,3,1,1)
  This exchange represents the amount of fluorspar chemical required for the production of 1 kg of ferroniobium (FeNb). The amount is based on the following source: Eckert J (2012) Niobium and Niobium Compounds. In: Ullmann’s
  Encyclopedia of industrial chemistry. Wiley-VCH Verlag GmbH
  & Co.KGaA.
  properties: dry mass 1 kg, wet mass 1 kg
- iron scrap, sorted, pressed: 0.291773, 0.0718629 kg (2 suppliers, which the file names only by identifier); sum of these 0.363636 kg; lognormal variance with pedigree 0.0033, pedigree (2,2,3,1,1)
  This exchange represents the amount of iron oxide required for the production of 1 kg of ferroniobium (FeNb). The amount is based on the following source: Eckert J (2012) Niobium and Niobium Compounds. In: Ullmann’s
  Encyclopedia of industrial chemistry. Wiley-VCH Verlag GmbH
  & Co.KGaA. The CBMM production process utilizes iron scrap, which is taken into account.
  properties: dry mass 1 kg, wet mass 1 kg
- non-ferrous metal smelter: 7.55e-12 unit; lognormal variance with pedigree 0.3027, pedigree (2,2,3,1,1)
  Infrastructural input considered due to Ecoinvent guidelines. This value was obtained from the supplementary materials of the following publication: Nuss, P., & Eckelman, M. J. (2014). Life Cycle Assessment of Metals: A Scientific Synthesis. PLOS ONE, 9(7), e101298. doi:10.1371/journal.pone.0101298.
- pyrochlore concentrate: 1.55 kg; lognormal variance with pedigree 0.0033, pedigree (2,2,3,1,1)
  This exchange represents the amount of refined pyrochlore concentrate required for the production of 1 kg of ferroniobium (FeNb). The amount is based on the following source: Eckert J (2012) Niobium and Niobium Compounds. In: Ullmann’s
  Encyclopedia of industrial chemistry. Wiley-VCH Verlag GmbH
  & Co.KGaA. In the abovementioned source, a concentrate with 60% Nb2O5 content was considered. Since the newest data (Source: ) suggest that 1.55 kg of refined pyrochlore concentrate with 63% Nb2O5 content is required for the production of 1 kg of FeNb, the original value is replaced with 1.55 kg. Furthermore, this adjustment holds true, considering that in the end the same mass of Nb2O5 content is processed for the production of 1 kg of FeNb (1.636 *0.60 ≈ 1.55*0.63).
  properties: dry mass 1 kg, niobium content 0.44037, oxygen content 0.18963, wet mass 1 kg
- quicklime, milled, loose: 0.0450778, 0.000376721 kg (2 suppliers, which the file names only by identifier); sum of these 0.0454545 kg; lognormal variance with pedigree 0.0033, pedigree (2,2,3,1,1)
  This exchange represents the amount of quicklime required for the production of 1 kg of ferroniobium (FeNb). The amount is based on the following source: Eckert J (2012) Niobium and Niobium Compounds. In: Ullmann’s
  Encyclopedia of industrial chemistry. Wiley-VCH Verlag GmbH
  & Co.KGaA.
  properties: dry mass 0.99 kg, water content 0.010101, wet mass 1 kg

## Emissions to nature
- Particulate Matter, < 2.5 um [air, non-urban air or from high stacks]: 0.0006 kg; = 600/1000000; lognormal variance with pedigree 0.386, pedigree (3,4,5,5,4)
  The amount of partculate emissions is not contained on the source, on which this dataset is based on (Source: Eckert J (2012) Niobium and Niobium Compounds. In: Ullmann’s
  Encyclopedia of industrial chemistry. Wiley-VCH Verlag GmbH
  & Co.KGaA). However the emission of Particulate Matter (PM) exists according to the following source (Alves, A. R., & Coutinho, A. d. R. (2019). Life cycle assessment of niobium: A mining and production case study in Brazil. Minerals Engineering, 132, 275-283. doi:https://doi.org/10.1016/j.mineng.2018.11.041. Due to lack of data, the amount of PM is based on the following source (https://www.eea.europa.eu/publications/emep-eea-guidebook-2019/part-b-sectoral-guidance-chapters/2-industrial-processes/2-c-metal-production/2-c-2-ferroalloys-production/view) which provides a simplified process description for the estimation of emissions of ferroalloys. PM2.5 = 600 g / Mg alloy produced or 0.0006 kg / kg alloy produced.
- Particulate Matter, > 10 um [air, non-urban air or from high stacks]: 0.00015 kg; = (1000-850)/1000000; lognormal variance with pedigree 0.126, pedigree (3,4,5,5,4)
  The amount of partculate emissions is not contained on the source, on which this dataset is based on (Source: Eckert J (2012) Niobium and Niobium Compounds. In: Ullmann’s
  Encyclopedia of industrial chemistry. Wiley-VCH Verlag GmbH
  & Co.KGaA). However the emission of Particulate Matter (PM) exists according to the following source (Alves, A. R., & Coutinho, A. d. R. (2019). Life cycle assessment of niobium: A mining and production case study in Brazil. Minerals Engineering, 132, 275-283. doi:https://doi.org/10.1016/j.mineng.2018.11.041. Due to lack of data, the amount of PM is based on the following source (https://www.eea.europa.eu/publications/emep-eea-guidebook-2019/part-b-sectoral-guidance-chapters/2-industrial-processes/2-c-metal-production/2-c-2-ferroalloys-production/view) which provides a simplified process description for the estimation of emissions of ferroalloys. The amount of PM>10 um is calculated by subtracting the amount of PM10 from the amount of TSP (total suspended solids). TSP = 1000 g / Mg alloy produced PM10 = 850 g / Mg alloy produced. Value adjusted to correspond to kg per kg of alloy produced.
- Particulate Matter, > 2.5 um and < 10um [air, non-urban air or from high stacks]: 0.00025 kg; = (850-600)/1000000; lognormal variance with pedigree 0.206, pedigree (3,4,5,5,4)
  The amount of partculate emissions is not contained on the source, on which this dataset is based on (Source: Eckert J (2012) Niobium and Niobium Compounds. In: Ullmann’s
  Encyclopedia of industrial chemistry. Wiley-VCH Verlag GmbH
  & Co.KGaA). However the emission of Particulate Matter (PM) exists according to the following source (Alves, A. R., & Coutinho, A. d. R. (2019). Life cycle assessment of niobium: A mining and production case study in Brazil. Minerals Engineering, 132, 275-283. doi:https://doi.org/10.1016/j.mineng.2018.11.041. Due to lack of data, the amount of PM is based on the following source (https://www.eea.europa.eu/publications/emep-eea-guidebook-2019/part-b-sectoral-guidance-chapters/2-industrial-processes/2-c-metal-production/2-c-2-ferroalloys-production/view) which provides a simplified process description for the estimation of emissions of ferroalloys. The amount of PM,>2.5 um and < 10 um is calculated by subtracting the amount of PM2.5 from the amount of PM10. PM10 = 850 g / Mg alloy produced PM2.5 = 600 g / Mg alloy produced. Value adjusted to correspond to kg per kg of alloy produced.

## Sampling procedure
This dataset is based on the following source: Albrecht, S., Cymorek, C. and Eckert, J. (2011). Niobium and Niobium Compounds. In Ullmann's Encyclopedia of Industrial Chemistry, (Ed.). https://doi.org/10.1002/14356007.a17_251.pub2. The inputs / outputs considered for the aluminothermic reduction process (inputs: pyrochlore concentrate, iron oxide as scrap, aluminium powder, fluorspar, lime / outputs: slag) were taken from the abovementioned source. The amount of slag produced is based on wet mass balance and the original amount reported from the abovementioned source was not considered, leading to an underestimation of the amount of the produced slag (1.61 kg compared to 1.82 kg per kg of produced FeNb). Furthermore, the amount of pure niobium oxide produced as byproduct (0.1363 kg per kg of FeNb) is not containted in the abovementioned source (even though its existence its acknowledged by the authors) and is based on the following source: Alves, A. R., & Coutinho, A. d. R. (2019). Life cycle assessment of niobium: A mining and production case study in Brazil. Minerals Engineering, 132, 275-283. doi:https://doi.org/10.1016/j.mineng.2018.11.041.
Due to lack of data about the electricity consumption, the electricity required for the aluminothermic process was taken from this source: http://heattreatconsortium.com/metals-advisor/electric-arc-furnace/electric-arc-furnace-energy-consumption/. Particulate matter emissions exists according to the following source but no specific amounts are reported (Alves, A. R., & Coutinho, A. d. R. (2019). Life cycle assessment of niobium: A mining and production case study in Brazil. Minerals Engineering, 132, 275-283. doi:https://doi.org/10.1016/j.mineng.2018.11.041. Due to lack of data, the amount of PM is based on the following source (https://www.eea.europa.eu/publications/emep-eea-guidebook-2019/part-b-sectoral-guidance-chapters/2-industrial-processes/2-c-metal-production/2-c-2-ferroalloys-production/view) which provides a simplified process description for the estimation of emissions of ferroalloys, including FeNb.
The infrastructural input (non-ferrous metal smelter) was based on the supplementary materials of the following publication: Nuss, P., & Eckelman, M. J. (2014). Life Cycle Assessment of Metals: A Scientific Synthesis. PLOS ONE, 9(7), e101298. doi:10.1371/journal.pone.0101298.
The electrode exchange (proxy with anode) is based on the following source: Dolganova, I., Bosch, F., Bach, V., Baitz, M., & Finkbeiner, M. (2020). Life cycle assessment of ferro niobium. The International Journal of Life Cycle Assessment, 25(3), 611-619. doi:10.1007/s11367-019-01714-7.
For more details about the considered exchanges, consult the individual exchanges comments.

## Extrapolations
This dataset has been copied from an original dataset covering the geography BR. The uncertainty has been adjusted accordingly. For further information, see sampling procedure.
