# evacuated tube collector production

Dataset: EcoSpold 2, unit process
Geography: RoW
Time period: 2001-01-01 to 2023-12-31
Technology level: current
Classification: EcoSpold01Categories: solar collector systems/production of components
Classification: ISIC rev.4 ecoinvent: 2815:Manufacture of ovens, furnaces and furnace burners
Synonyms: VTC
Tags: ConvertedDataset
Scenario: Business-as-Usual
System model: Allocation, cut-off by classification
Generated by: Niels Jungbluth
Published in: Jungbluth, N. 2007
Database: ecoinvent
isCopyrightProtected: true
accessRestrictedTo: 1

## General comment
The collector has selective TINOX-coating on copper made in DE.
[This dataset was already contained in the ecoinvent database version 2. It was not individually updated during the transfer to ecoinvent version 3. Life Cycle Impact Assessment results may still have changed, as they are affected by changes in the supply chain, i.e. in other datasets. This dataset was generated following the ecoinvent quality guidelines for version 2. It may have been subject to central changes described in the ecoinvent version 3 change report (http://www.ecoinvent.org/database/ecoinvent-version-3/reports-of-changes/), and the results of the central updates were reviewed extensively. The changes added e.g. consistent water flows and other information throughout the database. The documentation of this dataset can be found in the ecoinvent reports of version 2, which are still available via the ecoinvent website. The change report linked above covers all central changes that were made during the conversion process.]

## Included activities end
Production of an evacuated tube collector in Northern-Ireland. Including materials and energy use of production. Disposal in CH.

## Geography
Production in GB. Main components are imported from DE.

## Technology
Assembly of an evacuated tube collector. The collector has selective TINOX-coating on copper made in DE.

## Time period
Material data have been investigated for a collector produced in 2002. Data for energy uses during production have been investigated for 2001.

## Parameters
- fraction, process water, to air: 0.15 dimensionless; name fraction_PW_to_air; lognormal variance with pedigree 0.092025, pedigree (4,4,3,2,4)
- fraction, tap water, to air: 0.15 dimensionless; name fraction_TW_to_air; lognormal variance with pedigree 0.092025, pedigree (4,4,3,2,4)
- fraction, water, completely softened, to air: 0.15 dimensionless; name fraction_WCS_to_air; lognormal variance with pedigree 0.092025, pedigree (4,4,3,2,4)

## Reference product
- evacuated tube collector: 1 m2; By-product classification allocatable product; CPC 43430: Parts for the goods of subclasses 43410 and 43420; parts of non-electric bakery ovens; HS2017 720421: Ferrous waste and scrap; of stainless steel
  EcoSpold01Location=GB
  production volume 3.7991 m2
    This is a placeholder value that does not reflect real-world production volumes. This dataset does not currently require a real-world production volume to work in the database framework, and no actual data were collected yet. This has no negative effect on the results of the ecoinvent database.
  property price 170 EUR2005
    The production volume of this product is small compared to other products supplied by the activities within the same ISIC 3 category. Therefore, an average price of products supplied by the activities in the same ISIC 3 code has been applied.This price is obtained as '-66 Machinery and equipment, EU27' (5.71 EURO2003/kg dry soilds) in the 'EU & DK Input Output Database' (available in SimaPro); Weight of product according to Ecoinvent: approx 30 kg per m2
  properties: carbon allocation 0 kg, carbon content 0

## Inputs from technosphere
- anti-reflex-coating, etching, solar glass: 1 m2; lognormal variance with pedigree 0.0606, pedigree (2,5,5,5,1)
  EcoSpold01Location=DK
  Questionnaire
  Uncertainty: Questionnaire
- brazing solder, cadmium free: 0.1 kg; lognormal variance with pedigree 0.0606, pedigree (2,5,5,5,1)
  Questionnaire
  EcoSpold01Location=RER
  Uncertainty: Questionnaire
  properties: dry mass 1 kg, wet mass 1 kg
- chemical, organic: 0.0113 kg; lognormal variance with pedigree 0.1327, pedigree (2,2,5,5,4)
  EcoSpold01Location=GLO
  Questionnaire, data for other type of collector
  Uncertainty: Questionnaire, data for other type of collector
  properties: carbon content, fossil 0.628, dry mass 1 kg, heating value, net 19.03 MJ, wet mass 1 kg
  note on carbon content, fossil: This dataset is an unweighted average of 20 organic substances (listed in Tab 88.1, ecoinvent v2.2 report 8, part II), being part of the top100 chemicals included in this database. The C-content has also been calculated as an unweighted average of the C content of the substances composing this dataset.
- copper, cathode: 2.8 kg; lognormal variance with pedigree 0.0606, pedigree (2,5,5,5,1)
  EcoSpold01Location=RER
  Questionnaire
  Uncertainty: Questionnaire
  properties: dry mass 1 kg, wet mass 1 kg
- corrugated board box: 1.03427, 0.0385266, 2.25721 kg (3 suppliers, which the file names only by identifier); sum of these 3.33 kg; lognormal variance with pedigree 0.056, pedigree (3,4,5,5,1)
  EcoSpold01Location=RER
  Company information, packaging
  Uncertainty: Company information, packaging
  properties: carbon content, fossil 0.000656085, carbon content, non-fossil 0.432275, dry mass 0.945 kg, heating value, net 12.86 MJ, water content 0.0582011, wet mass 1 kg
  note on carbon content, fossil: Fossil C content was calculated after fossil C contents of chemicals used in the production of board (Tab 10-15 & 10.16 ecoinvent v2.2 report 11_III, part 10)
  note on carbon content, non-fossil: Biogenic C content was calculated after biogenic C contents of chemicals used in the production of board (Tab 10.15 & 10.16, ecoinvent v2.2 report 11_III, part 10).
- electricity, medium voltage: 0.0064482, 0.00304925, 1.46568, 0.479738, 9.5697, 3.21539, 0.0901366, 0.0202333, 0.0133723, 0.146912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 kWh (23 suppliers, which the file names only by identifier); sum of these 17 kWh; lognormal variance with pedigree 0.1327, pedigree (2,2,5,5,4)
  Questionnaire, data for other type of collector plus data for flat plate collector production
  EcoSpold01Location=GB
  Uncertainty: Questionnaire, data for other type of collector plus data for flat plate collector production
- glass tube, borosilicate: 14.2 kg; lognormal variance with pedigree 0.0606, pedigree (2,5,5,5,1)
  Questionnaire plus 5% losses
  EcoSpold01Location=DE
  Uncertainty: Questionnaire plus 5% losses
  properties: dry mass 1 kg, wet mass 1 kg
- hazardous waste, for incineration: -0.224182, -0.00281804 kg (2 suppliers, which the file names only by identifier); sum of these -0.227 kg; lognormal variance with pedigree 0.0927, pedigree (2,2,1,5,4)
  EcoSpold01Location=CH
  Questionnaire, data for other type of collector
  Uncertainty: Questionnaire, data for other type of collector
  production volume
    Calculated from the production volume of evacuated tube collector in proportion to the respective output amounts.
  properties: carbon content, fossil 0.554667, dry mass 0.75 kg, heating value, net 17 MJ, water content 0.333333, wet mass 1 kg
  note on carbon content, fossil: Tab A.6, ecoinvent v2.2 report 13_I. C content has been calculated after data in the tables, and then referred to 1 kg DM
  note on heating value, net: Value taken from the general comment of the treatment dataset.
- heat carrier liquid, 40% C3H8O2: -7.45954e-6, -0.00154254 m3 (2 suppliers, which the file names only by identifier); sum of these -0.00155 m3; lognormal variance with pedigree 0.022, pedigree (3,5,1,5,1)
  Estimation
  EcoSpold01Location=CH
  Uncertainty: Estimation
  production volume
    (same comment as for hazardous waste, for incineration)
  properties: carbon content, fossil 3, dry mass 6.31366 kg, price 1.08656 EUR2005, water content 157.387, wet mass 1000 kg
  note on carbon content, fossil: The composition of the product was used to estimate its carbon content: 40% (w/v) C3H8O2.
- heat, district or industrial, natural gas: 0.240006, 14.6055, 0.00451354 MJ (3 suppliers, which the file names only by identifier); sum of these 14.85 MJ; lognormal variance with pedigree 0.1327, pedigree (2,2,5,5,4)
  Questionnaire, data for other type of collector
  EcoSpold01Location=RER
  Uncertainty: Questionnaire, data for other type of collector
  properties: heating value, net 1 MJ
- hydrochloric acid, without water, in 30% solution state: 0.113 kg; lognormal variance with pedigree 0.1327, pedigree (2,2,5,5,4)
  EcoSpold01Location=RER
  Questionnaire, data for other type of collector
  Uncertainty: Questionnaire, data for other type of collector
  properties: dry mass 1 kg, heating value, net 3.32 MJ, wet mass 1 kg
- municipal solid waste: -2.93256e-5, -1.81072e-6, -1.19228e-6, -4.84128e-5, -5.74881e-6, -3.21362e-6, -3.65263e-5, -1.41817e-5, -3.57792e-5, -9.20299e-6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 kg (44 suppliers, which the file names only by identifier); sum of these -0.0284 kg; lognormal variance with pedigree 0.0927, pedigree (2,2,1,5,4)
  Questionnaire, data for other type of collector
  EcoSpold01Location=CH
  Uncertainty: Questionnaire, data for other type of collector
  production volume
    (same comment as for hazardous waste, for incineration)
  properties: carbon content, fossil 0.171549, carbon content, non-fossil 0.261655, dry mass 0.771 kg, heating value, net 11.74 MJ, water content 0.297017, wet mass 1 kg
  note on carbon content, fossil: MSW composition in tab 4.1, ecoinvent v2.2 report 13_I. C content referred to 1 kg DM
- propylene glycol, liquid: 0.654 kg; lognormal variance with pedigree 0.0606, pedigree (2,5,5,5,1)
  EcoSpold01Location=RER
  Questionnaire, heat transfer fluid
  Uncertainty: Questionnaire, heat transfer fluid
  properties: carbon content, fossil 0.473684, dry mass 1 kg, heating value, net 27.09 MJ, wet mass 1 kg
- selective coat, copper sheet, physical vapour deposition: 1 m2; lognormal variance with pedigree 0.0606, pedigree (2,5,5,5,1)
  Questionnaire
  EcoSpold01Location=DE
  Uncertainty: Questionnaire
- sheet rolling, copper: 2.8 kg; lognormal variance with pedigree 0.0606, pedigree (2,5,5,5,1)
  EcoSpold01Location=RER
  Questionnaire
  Uncertainty: Questionnaire
- silicone product: 0.0533 kg; lognormal variance with pedigree 0.0606, pedigree (2,5,5,5,1)
  EcoSpold01Location=RER
  Questionnaire
  Uncertainty: Questionnaire
  properties: carbon content, fossil 0.324324, dry mass 1 kg, heating value, net 9.83 MJ, wet mass 1 kg
  note on carbon content, fossil: The term silicones is used for compounds in which silicon atoms are linked via oxygen atoms, each silicon atom bearing one or several organic groups. In industrially important silicones, these groups are usually methyl or phenyl (ecoinvent v2.2 report 8_part71 & Ullmann). The chemical formula was considered to be [Si(CH3)2O]n (Ullmann).
- solar collector factory: 2e-7 unit; lognormal variance with pedigree 0.3686, pedigree (2,5,5,5,3)
  EcoSpold01Location=RER
  Estimation for flat plate collector
  Uncertainty: Estimation for flat plate collector
- steel, chromium steel 18/8, hot rolled: 4 kg; lognormal variance with pedigree 0.0606, pedigree (2,5,5,5,1)
  EcoSpold01Location=RER
  Questionnaire
  Uncertainty: Questionnaire
  properties: carbon content, fossil 0.0008, dry mass 1 kg, wet mass 1 kg
  note on carbon content, fossil: Stainless steel model is the grade 304 steel (18/8 stainless, 18% chromium 8% nickel; max. 0.08% C)
- stone wool, packed: 2.03 kg; lognormal variance with pedigree 0.0606, pedigree (2,5,5,5,1)
  EcoSpold01Location=CH
  Questionnaire
  Uncertainty: Questionnaire
  properties: carbon content, fossil 0.015401, dry mass 1 kg, wet mass 1 kg
  note on carbon content, fossil: The chemical composition of the glass fibres used in the rock wool production is similar to the composition of naturally cooled volcano basalt and has a composition listed in Tab. 3.1 and 3.2 in ecoinvent v2.2 report 16, part XIV. Rock wool contains: a minimum of 96% mineral fibres,between 0.5 and 3.0 weight percent of phenolic resin depending on the specific product characteristics, and about 0.2 percent mineral oil (ecoinvent v2.2 report 16, part XIV). An average composition of 1.8% phenolic resin, 0.2% mineral oil, and 98% mineral fibres has been assumed and used to calculate C content of the rock wool
- synthetic rubber: 0.667 kg; lognormal variance with pedigree 0.0606, pedigree (2,5,5,5,1)
  EcoSpold01Location=RER
  Questionnaire
  Uncertainty: Questionnaire
  properties: carbon content, fossil 0.871949, dry mass 1 kg, heating value, net 26.42 MJ, wet mass 1 kg
  note on carbon content, fossil: EPDM (Ethylene-propene-diene terpolymer) rubber is a terpolymer of ethylene, propene, and a diene with the residual unsaturated portion of the diene in the side chain (ecoinvent v2.2 report 7-part XX & Ullmann). Chemical formula (deduced from Evidences of Solvent-Induced Miscibility in Polychloroprene-co-Ethylene-Propene Diene Terpolymer Blends, Dubey et al., Journal of Applied Polymer Science, 2009, 111:1884–1891): C20H35
- tap water: 0.10873, 0.16575, 0.30928, 0.833178, 0.100292, 4.17955, 0.0745376, 47.8287 kg (8 suppliers, which the file names only by identifier); sum of these 53.6 kg; lognormal variance with pedigree 0.1327, pedigree (2,2,5,5,4)
  EcoSpold01Location=RER
  Questionnaire, data for other type of collector plus data for flat plate collector production
  Uncertainty: Questionnaire, data for other type of collector plus data for flat plate collector production
  properties: carbon content, fossil 0.00178991, dry mass 0.000337476 kg, water content 2962.17, wet mass 1 kg
  note on carbon content, fossil: Bicarbonate content is 2.93 mol/m3. CO2 content is 0.1 mol/m3 (ecoinvent v2.2 report 8, Tab 93.1).
- waste glass: -0.00129156, -6.15911e-5, -0.000223979, -1.01577e-5, -4.81674e-6, -6.38531e-6, -6.73407e-6, -1.02696e-5, -0.678062, -7.84757e-6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 kg (42 suppliers, which the file names only by identifier); sum of these -0.68 kg; lognormal variance with pedigree 0.0927, pedigree (2,2,1,5,4)
  (same comment as for hazardous waste, for incineration)
  production volume
    (same comment as for hazardous waste, for incineration)
  properties: dry mass 1 kg, heating value, net 0.05 MJ, wet mass 1 kg
  note on heating value, net: Value extracted from "treatment of waste glass, open dump, very wet infiltration class (1000mm)"
- waste glass sheet: -0.0932066, -14.1068 kg (2 suppliers, which the file names only by identifier); sum of these -14.2 kg; lognormal variance with pedigree 0.022, pedigree (3,5,1,5,1)
  Estimation
  EcoSpold01Location=CH
  Uncertainty: Estimation
  production volume
    (same comment as for hazardous waste, for incineration)
  properties: dry mass 1 kg, wet mass 1 kg
- waste mineral wool: -0.00945462, -2.02055 kg (2 suppliers, which the file names only by identifier); sum of these -2.03 kg; lognormal variance with pedigree 0.022, pedigree (3,5,1,5,1)
  Estimation
  EcoSpold01Location=CH
  Uncertainty: Estimation
  production volume
    (same comment as for hazardous waste, for incineration)
  properties: dry mass 1 kg, wet mass 1 kg
- waste paperboard, unsorted: -3.33 kg; lognormal variance with pedigree 0.022, pedigree (3,5,1,5,1)
  EcoSpold01Location=CH
  Estimation
  Uncertainty: Estimation
  production volume
    (same comment as for hazardous waste, for incineration)
  properties: carbon content, non-fossil 0.483259, dry mass 0.804 kg, heating value, net 15.92 MJ, price 0.03924 EUR2005, water content 0.243781, wet mass 1 kg
  note on carbon content, non-fossil: C content was calculated for 1 kg DM, using data in Tab A.3, ecoinvent v2.2 report 13_I.
- waste plastic, mixture: -0.000518389, -0.000188875, -3.33012e-5, -1.96438e-5, -0.000130334, -1.1748e-5, -1.21311e-5, -3.1441e-5, -1.12375e-5, -1.35662e-5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 kg (42 suppliers, which the file names only by identifier); sum of these -0.72 kg; lognormal variance with pedigree 0.022, pedigree (3,5,1,5,1)
  Estimation
  EcoSpold01Location=CH
  Uncertainty: Estimation
  production volume
    (same comment as for hazardous waste, for incineration)
  properties: carbon content, fossil 0.747344, dry mass 0.847 kg, heating value, net 30.79 MJ, water content 0.180638, wet mass 1 kg
  note on carbon content, fossil: C content in 1 kg DM was calculated using data in Tab A.2, ecoinvent v2.2 report 13_I
- wastewater, average: -0.0002631, -0.043781, -0.000155877 m3 (3 suppliers, which the file names only by identifier); sum of these -0.0442 m3; lognormal variance with pedigree 0.0927, pedigree (2,2,1,5,4)
  (same comment as for hazardous waste, for incineration)
  production volume
    (same comment as for hazardous waste, for incineration)
  properties: carbon content, non-fossil 0.194039, dry mass 0.346837 kg, mass concentration, TOC 0.1091 kg/m3, mass concentration, calcium 0.039453 kg/m3, mass concentration, chlorine 0.030031 kg/m3, mass concentration, hydrogen 0.013365 kg/m3, mass concentration, nitrogen 0.031015 kg/m3, mass concentration, oxygen 0.069824 kg/m3, mass concentration, sodium 0.06456 kg/m3, mass concentration, sulfur 0.015602 kg/m3, water content 2882.2, wet mass 1000 kg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
  note on carbon content, non-fossil: 0.0673 kg TOC/m3 (Tab A.17, ecoinvent v2.2 report 13_I). TOC was considered as Total Carbon.
- water, completely softened: 0.385289, 0.514711 kg (2 suppliers, which the file names only by identifier); sum of these 0.9 kg; lognormal variance with pedigree 0.0606, pedigree (2,5,5,5,1)
  Questionnaire, heat transfer fluid
  EcoSpold01Location=RER
  Uncertainty: Questionnaire, heat transfer fluid
  properties: wet mass 1 kg

## Emissions to nature
- Water [air, unspecified]: 0.008175 m3; name water_to_air_unspecified; lognormal variance with pedigree 0.0827, pedigree (2,2,5,5,1)
  Calculated value based on literature values and expert opinion. See comments in the parametres' comment field.
  property fraction, origin: fresh water 1; name fraction_origin_fresh_water
  property fraction, origin: salt water 0; name fraction_origin_salt_water
  property fraction, origin: unspecified 0; name fraction_origin_unspecified
- Water [water, unspecified]: 0.002125 m3; name water_to_water_unspecified; = (tap_water_input/1000)*(1-fraction_TW_to_air)+(water_softened_input/1000)*(1-fraction_WCS_to_air)-0.0442; lognormal variance with pedigree 0.0827, pedigree (2,2,5,5,1)
  (same comment as for Water)
  property carbon content, fossil 0; name C_content_fossil
  property carbon content, non-fossil 0; name C_content_non_fossil
  property dry mass 0 kg; name DM
  property fraction, origin: fresh water 1; name fraction_origin_fresh_water_Ww
  property fraction, origin: salt water 0; name fraction_origin_salt_water_Ww
  property fraction, origin: unspecified 0; name fraction_origin_unspecified_Ww
  property water in wet mass 1000 kg; name WWM
  property wet mass 1000 kg; name WM

## Sampling procedure
Questionnaires.

## Extrapolations
Energy uses during production investigated in an other factory for an other type of tube collector. This dataset has been copied from an original dataset covering the geography GB. The uncertainty has been adjusted accordingly.

## Review by Sebastiano Meier 2003-07-07
Passed.
