# fraction 1 from naphtha separation to generic market for chemical, organic

Dataset: EcoSpold 2, unit process
Geography: GLO
Time period: 2012-01-01 to 2023-12-31
Technology level: current
Classification: ISIC rev.4 ecoinvent: 201:Manufacture of basic chemicals, fertilizers and nitrogen compounds, plastics
Scenario: Business-as-Usual
System model: Allocation, cut-off by classification
Generated by: Sofia Parada Tur
Database: ecoinvent
isCopyrightProtected: true
accessRestrictedTo: 1

## General comment
This activity links the byproduct fraction 1 from the naphtha separation process to the generic market for organic chemicals.
All chemicals that enter this market provide the function of an organic chemical. This route is chosen due to lack of knowledge on the fate of this fraction. It may also be fed back into the general raw material streams or be used as a fuel. It is recommended to rivise this dataset accordingly as soon as possible.

## Included activities start
The activity starts with the reception of fraction 1 from naphtha separation

## Included activities end
The activity ends with the production of chemical, organic for the generic market

## Technology
The fraction 1 of naphtha separation is a mixture of cyclopentane (C5H10) and 2,2-dimethylbutane ((CH3)3CCH2CH3, condensated C6H14

## Reference product
- chemical, organic: 1 kg; By-product classification allocatable product; CPC 341: Basic organic chemicals; HS2017 29: Organic chemicals
  production volume 1.67657e7 kg
    based on production volume of byproduct fraction 1 in naphtha separation
  property carbon content, fossil 0.628
    This dataset is an unweighted average of 20 organic substances (listed in Tab 88.1, ecoinvent v2.2 report 8, part II), being part of the top100 chemicals included in this database. The C-content has also been calculated as an unweighted average of the C content of the substances composing this dataset.
  property carbon content, non-fossil 0
    (same comment as for chemical, organic)
  property heating value, net 19.03 MJ
    LHV is calculated based on the Carbon content of the product. More details can be found on the respective documentation.
  properties: carbon allocation 0.628 kg, carbon content 0.628, dry mass 1 kg, price 1.57 EUR2005, water content 0, water in wet mass 0 kg, wet mass 1 kg

## Inputs from technosphere
- fraction 1 from naphtha separation: 1 kg
  The activity links this product to the market for chemical organic
  properties: carbon content, fossil 0.847176, dry mass 1 kg, heating value, net 45 MJ, wet mass 1 kg

## Extrapolations
the present inventory is a linking activity, from fraction 1 of naphtha separation process, to the generic product "chemical, organic"

## Review by Eric Johnson 2012-03-07
I am satisfied with the revisions.

## Review by Bo Weidema 2012-03-07
Accepted as a temporary solution to the use of these fractions. As indicated in the dataset, the fractions may also be used as solvents or be fed back into the refinery streams as fuels.
