# solder factory construction

Dataset: EcoSpold 2, unit process
Geography: RER
Time period: 2000-01-01 to 2023-12-31
Technology level: current
Classification: ISIC rev.4 ecoinvent: 4100:Construction of buildings
Classification: EcoSpold01Categories: metals/refinement
Tags: ConvertedDataset
Scenario: Business-as-Usual
System model: Allocation, cut-off by classification
Generated by: Niels Jungbluth
Published in: Althaus H.-J. 2000
Database: ecoinvent
isCopyrightProtected: true
accessRestrictedTo: 1

## General comment
Inventory for a production plant with an annual capacity of 100'000t and a life time of 50a.
[This dataset was already contained in the ecoinvent database version 2. It was not individually updated during the transfer to ecoinvent version 3. Life Cycle Impact Assessment results may still have changed, as they are affected by changes in the supply chain, i.e. in other datasets. This dataset was generated following the ecoinvent quality guidelines for version 2. It may have been subject to central changes described in the ecoinvent version 3 change report (http://www.ecoinvent.org/database/ecoinvent-version-3/reports-of-changes/), and the results of the central updates were reviewed extensively. The changes added e.g. consistent water flows and other information throughout the database. The documentation of this dataset can be found in the ecoinvent reports of version 2, which are still available via the ecoinvent website. The change report linked above covers all central changes that were made during the conversion process.]

## Included activities start
The activity starts from the transformation of unspecified land to industrial area.

## Included activities end
Infrastructure of a solder production plant including land use and buildings, not including equipment.

## Geography
Producer in Germany.

## Technology
Infrastracture building and land use.

## Time period
Time of publications. Most data for 2000.

## Reference product
- solder factory: 1 unit; By-product classification allocatable product; CPC 53269: Other constructions for manufacturing
  EcoSpold01Location=RER
  production volume 1.32237 unit
    This is a placeholder value that does not reflect real-world production volumes. This dataset does not currently require a real-world production volume to work in the database framework, and no actual data were collected yet. This has no negative effect on the results of the ecoinvent database. The placeholder value of this activity was scaled according to the nominal GDP of 2005 (source: United Nations, http://data.un.org/Glossary.aspx?q=GDP+%28current+US%24%29, accessed 20130726) to reflect an appropriate share of the global production volume, which is also a placeholder value.
  property price 83969.3 EUR2005
    Calculated based on inputs: The price of the product has been calculated as a sum of the values of the material and energy inputs for this product. This value is therefore a rough estimation. It may underestimate the real price since there are additional expenses when producing any product. These expences can include for example labour costs, treatment of waste materials and profit for the producer. Please consider carefully whether this level of data quality is acceptable for your application.
  properties: carbon allocation 0 kg, carbon content 0

## Inputs from technosphere
- building, hall: 600 m2; lognormal variance with pedigree 0.3413, pedigree (2,3,5,3,1)
  EcoSpold01Location=CH
  Questionnaire
  Uncertainty: Questionnaire

## Inputs from nature
- Occupation, industrial area [natural resource, land]: 112500 m2*year; lognormal variance with pedigree 0.0813, pedigree (2,3,5,3,1)
  Standard 50a occupation
  Uncertainty: Standard 50a occupation
- Transformation, from unspecified [natural resource, land]: 2250 m2; lognormal variance with pedigree 0.1613, pedigree (2,3,5,3,1)
  Questionnaire
  Uncertainty: Questionnaire
- Transformation, to industrial area [natural resource, land]: 2250 m2; lognormal variance with pedigree 0.1613, pedigree (2,3,5,3,1)
  Questionnaire
  Uncertainty: Questionnaire

## Sampling procedure
Questionnaire

## Extrapolations
From one producer to European average.

## Review by Hans-Jörg Althaus 2003-06-16
passed
