# limestone production, crushed, for mill

Dataset: EcoSpold 2, unit process
Geography: IN
Time period: 2014-04-01 to 2023-12-31
Technology level: current
Classification: EcoSpold01Categories: construction materials/others
Classification: ISIC rev.4 ecoinvent: 0810:Quarrying of stone, sand and clay
Scenario: Business-as-Usual
System model: Allocation, cut-off by classification
Share of production covered: 60 %
Generated by: P V Kiran Ananth
Published in: Kiran Ananth P. V. 2017
Database: ecoinvent
isCopyrightProtected: true
accessRestrictedTo: 1

## General comment
This dataset represents limestone, crushed for mill. It is built on Limestone production, crushed for mill/GLO dataset (accessed 20170823) in which some exchanges have been edited to make it specific to India. Limestone is basic raw material for Cement production. Total production of limestone in India 292.8 million tonne in 2014-15 year. Total consumption of limestone in India is 239.26 million tonne out of which 221.08 million tonne consumed by Cement industry (Nearly 92.4%). Also production of limestone is dry process so there is no consumption of water.

## Included activities start
Reception of unprocessed limestone at factory gate

## Included activities end
Includes the processes: crushing and its transportation by conveyor belt.

## Geography
This dataset is built on Limestone production, crushed for mill/GLO dataset (accessed 20170823) in which some exchanges have been edited to make it specific to India. The representativeness at national scale is estimated above 50%.

## Technology
In India, most commonly used crusher for crushing limestone are Impact crushers, Jaw crushers and rotory crushers. Depending on requirement of size cement plant will have secondary and or tertiary crusher.

## Time period
Data collected and analysied for year 2014-15. and has been assumed that there is no significant change in technology.

## Reference product
- limestone, crushed, for mill: 1 kg; By-product classification allocatable product; CPC 15200: Gypsum; anhydrite; limestone flux; limestone and other calcareous stone, of a kind used for the manufacture of[…]; HS2017 252100: Limestone flux; limestone and other calcareous stone, of a kind used for the manufacture of lime or cement; CAS 1317-65-3
  EcoSpold01Location=CH
  Considering no loss during production process
  production volume 2.928e8 kg; = 292.8E6
    Total limestone production in India during the year April 2014 to March 2015 is 292.8 million tonnes. Total limestone consumption by cement plant in India during the year April 2014 to March 2015 is 221.08 million tonnes. Indian Minerals Yearbook 2015. 54th edition. Limestone and other calcareous minerals.
  property carbon content, fossil 0.117492
    Table 3.1, ecoinvent v2.2 report 7, part VII, pg 3. MW CaCO3=100, MW MgCO3=84
  property price 0.0141398 EUR2005
    Calculated based on inputs: The price of the product has been calculated as a sum of the values of the material and energy inputs for this product. This value is therefore a rough estimation. It may underestimate the real price since there are additional expenses when producing any product. These expences can include for example labour costs, treatment of waste materials and profit for the producer. Please consider carefully whether this level of data quality is acceptable for your application.
  properties: carbon allocation 0.117257 kg, carbon content 0.117492, carbon content, non-fossil 0, dry mass 0.998 kg, heating value, net 0 MJ, water content 0.00200401, water in wet mass 0.002 kg, wet mass 1 kg

## Inputs from technosphere
- conveyor belt: 9.046e-9 m; lognormal variance with pedigree 0.368625, pedigree (4,3,5,2,1)
  Based on expert judgement
  EcoSpold01Location=RER
- electricity, medium voltage: 0.0012388 kWh; lognormal variance with pedigree 0.011325, pedigree (2,2,3,2,3)
  Data reported for weighted average of 30 cement plants.
  EcoSpold01Location=CH
- industrial machine, heavy, unspecified: 6.12e-6 kg; lognormal variance with pedigree 0.3706, pedigree (4,3,5,5,1)
  EcoSpold01Location=RER
  Extrapolated from limestone production, crushed for mill, GLO dataset.
- limestone, unprocessed: 1 kg; lognormal variance with pedigree 0.0246, pedigree (3,3,3,5,3)
  EcoSpold01Location=CH
  properties: carbon content, fossil 0.117257, dry mass 0.998 kg, water content 0.00200401, wet mass 1 kg
  note on carbon content, fossil: Table 3.1, ecoinvent v2.2 report 7, part VII, pg 3. MW CaCO3=100, MW MgCO3=84. C content of limestone is 0.117257 kg/kg DM

## Emissions to nature
- Particulate Matter, < 2.5 um [air, non-urban air or from high stacks]: 8.71e-7 kg; lognormal variance with pedigree 0.25, pedigree (1,5,5,5,4)
  Data from limestone production, crushed, for mill/GLO (accessed on 20170823)
- Particulate Matter, > 10 um [air, non-urban air or from high stacks]: 8.71e-6 kg; lognormal variance with pedigree 0.25, pedigree (1,5,5,5,4)
  Data from limestone production, crushed, for mill/GLO (accessed on 20170823)
- Particulate Matter, > 2.5 um and < 10um [air, non-urban air or from high stacks]: 7.84e-6 kg; lognormal variance with pedigree 0.25, pedigree (1,5,5,5,4)
  Data from limestone production, crushed, for mill/GLO (accessed on 20170823)

## Sampling procedure
For this activity sample questionnaire has been prepared and circulated to all cement manufacturing units in India. Here we have selected clusterwise approch for collecting the data. Due to clusterwise approch variation in quality of raw material , different technologies etc. has taken care. After receiving the data from plants same has been analysed for any discripancies. Extreme minimum and maximum values reported by plants were removed. Final numbers were checked with cement industry expert. We received more than 30 questionnaire from cement plant which represent nearly 60% of the total cement capacity. The data retrived from questionnnaire is electricity conumed for the operation. Other details were not reported by cement plant.

## Extrapolations
This dataset is built on the exisitng ecoinvent process limestone production, crushed for mill/GLO (accessed 20170823) in which the electricity input have been edited to make it specific to Indian situation. The data is estimated representative for 60% of the Indian production of limestone crushed for mill.
