# resorcinol production, benzene disulfonation

Dataset: EcoSpold 2, unit process
Geography: DE
Time period: 2022-01-01 to 2023-12-31
Technology level: current
Classification: ISIC rev.4 ecoinvent: 2011:Manufacture of basic chemicals
Synonyms: m-Benzenediol; 1,3-Dihydroxybenzene; m-Dihydroxybenzene; 1,3-Benzenediol
Scenario: Business-as-Usual
System model: Allocation, cut-off by classification
Generated by: Daria Dellenbach
Database: ecoinvent
isCopyrightProtected: true
accessRestrictedTo: 1

## General comment
This dataset represents the production of resorcinol from disulfonation of benzene. The process includes disulfonation of benzene and subsequent hydrolysis.
Resorcinol is an organic substance with a CAS no.: 000108-46-3. It is called benzene-1,3-diol under IUPAC naming and its molecular formula is: C6H6O2. It is solid under normal conditions of temperature and pressure as white flakes. It is modelled as a pure substance. On a consumer level, is used in the following products: cosmetics and personal care products. On industrial sites, the substance is used for the manufacture of products in the following sectors: chemicals, rubber products, plastic products, fabricated metal products and machinery and vehicles.
References:
Schmiedel K.W., Decker D. (2011): Resorcinol, Ullmann's Encyclopedia of Industrial Chemistry, Wiley-VCH.
ECHA: Resorcinol, available here: https://echa.europa.eu/substance-information/-/substanceinfo/100.003.260, last accessed 20-07-2022.
Thebeeapelo J. K. (2002): The investigation of the hydrolysis reaction of m-phenylene diamine to resorcinol, Master Thesis, Port Elizabeth Technikon.
[This dataset is meant to replace the following datasets:]

## Included activities start
With benzene disulfonation.

## Included activities end
With production of resorcinol. It includes raw materials, and energy. Emissions to air and water as well as infrastructure are estimated.

## Technology
Disulfonation of benzene is carried out with sulfur trioxide, formed sulfuric acid is neutralised with recirculated sodium sulfite. The formed benzene 1,3-disulfonate is reacted with sodium hydroxide at 320–350°C. The overall yield is 85%.
Sodium sulfite is a valuable by product, without which the process would not be economical.
C6H6 + 2 SO3 --> C6H6S2O6
C6H6S2O6 + 4 NaOH --> C6H6O2 + 2 Na2SO3 + 2 H2O
This production process is almost exclusively applied Germany.
References:
Schmiedel K.W., Decker D. (2011): Resorcinol, Ullmann's Encyclopedia of Industrial Chemistry, Wiley-VCH.
Thebeeapelo J. K. (2002): The investigation of the hydrolysis reaction of m-phenylene diamine to resorcinol, Master Thesis, Port Elizabeth Technikon.

## Reference product
- resorcinol: 1 kg; name RP; By-product classification allocatable product; CPC 34139: Other alcohols, phenols, phenol-alcohols, and their halogenated, sulphonated, nitrated or nitrosated derivativ[…]; HS2017 290721: Polyphenols; resorcinol and its salts; CAS 108-46-3
  production volume 2.655e7 kg; name PV_RP; = (5.9E7*0.45)
    The global resorcinol market size was 59.0 kilotons in 2016. It is known, that the preferred production methods are benzene disulfonation and hydroperoxidation of meta-diisopropylbenzene over hydrolysis of meta-phenylenediamine, therefore the market shares were assumed to be 45%:45%:10%. References: Resorcinol Market Size, Share & Trends Analysis Report By Application (Rubber Products, Wood Adhesives, UV Stabilizers, Flame Retardants), By Region, And Segment Forecasts, 2018 - 2025, Report Overview, avaiable here: https://www.grandviewresearch.com/industry-analysis/resorcinol-market, last accessed 20-07-2022. Schmiedel K.W., Decker D. (2011): Resorcinol, Ullmann's Encyclopedia of Industrial Chemistry, Wiley-VCH.
  property price 9.02683 EUR2005
    The price is calculated based on price information 2020/2021 from chemAnalyst (available here: https://www.chemanalyst.com/Pricing-data/resorcinol-1191) and ECHEMI (available here: https://www.echemi.com/productsInformation/pd1804031006-995-pharmaceutical-intermediates-resorcinol.html), both sources last accessed 2022-06-15.
    The prices were converted to EUR based on the annual exchange rates published by the European Central Bank (https://sdw.ecb.europa.eu/quickview.do?SERIES_KEY=120.EXR.A.USD.EUR.SP00.A, last accessed on 2022-02-15) and adjusted for inflation relative to 2005 using the producer price index (PPI) of the euro area, published by eurostat (https://appsso.eurostat.ec.europa.eu/nui/show.do?dataset=sts_inpp_a&lang=en, last accessed on 2022-05-04).
  properties: allocation factor 0.918673, carbon allocation 0.653951 kg, carbon content 0.653951, carbon content, fossil 0.653951, carbon content, non-fossil 0, dry mass 1 kg, heating value, net 26.434 MJ, true value 9.02683, water content 0, water in wet mass 0 kg, wet mass 1 kg

## Inputs from technosphere
- benzene: 0.77718 kg; lognormal variance with pedigree 0.0175, pedigree (2,5,2,3,3)
  Calculated value based on stoichiometric calculations and literature data. For more information on the calculations refer to the sampling procedure.
  properties: carbon content, fossil 0.923077, dry mass 1 kg, heating value, net 42.5 MJ, wet mass 1 kg
- chemical factory, organics: 3.67469e-10 unit; lognormal variance with pedigree 0.3434, pedigree (2,4,2,4,4)
  Calculated based on literature data published by the industry. For this activity, no information was readily available concerning infrastructure and land-use. Therefore, the infrastructure is estimated based on data from two chemical factories, the BASF site of Ludwigshafen and the chemical factory in Gendorf (which are both located in Germany), which produce a wide range of chemical substances. Based on this data, the following assumptions are made: the built area amounts to about 4.2 ha, the plant has an average output of 50'000 t/a and a lifespan of fifty years. The estimated infrastructure amount is therefore 4.00 E-10 units per kg of produced chemical.
  References:
  Althaus H.-J., Chudacoff M., Hischier R., Jungbluth N., Osses M. and Primas A. (2007) Life Cycle Inventories of Chemicals. ecoinvent report No. 8, v2.0. EMPA Dübendorf, Swiss Centre for Life Cycle Inventories, Dübendorf, CH.
  Gendorf (2000) Umwelterklärung 2000, Werk Gendorf. Werk Gendorf, Burgkirchen.
- electricity, medium voltage: 0.384005 kWh; lognormal variance with pedigree 0.044, pedigree (2,4,2,4,4)
  Literature value. As reported by Thebeeapelo (2002).
- heat, district or industrial, natural gas: 2.25075 MJ; lognormal variance with pedigree 0.044, pedigree (2,4,2,4,4)
  Literature value. As reported by Thebeeapelo (2002). Assumed to be from natural gas.
  properties: heating value, net 1 MJ
- nitrogen, liquid: 0.033036 kg; lognormal variance with pedigree 0.044, pedigree (2,4,2,4,4)
  Literature value. As reported by Thebeeapelo (2002). Report as nitrogen volume, density used 1.229 kg/Nm3.
  properties: dry mass 1 kg, wet mass 1 kg
- sodium hydroxide, without water, in 50% solution state: 1.45502 kg; lognormal variance with pedigree 0.0175, pedigree (2,5,2,3,3)
  (same comment as for benzene)
  properties: dry mass 1 kg, heating value, net 3.03 MJ, wet mass 1 kg
- steam, in chemical industry: 24.6296 kg; lognormal variance with pedigree 0.044, pedigree (2,4,2,4,4)
  Literature value. As reported by Thebeeapelo (2002).
  properties: dry mass 1 kg, wet mass 1 kg
- sulfur trioxide: 1.58917 kg; lognormal variance with pedigree 0.0175, pedigree (2,5,2,3,3)
  (same comment as for benzene)
  properties: dry mass 1 kg, wet mass 1 kg
- tap water: 0.111792 kg; lognormal variance with pedigree 0.044, pedigree (2,4,2,4,4)
  Literature value. As reported by Thebeeapelo (2002). Split of water input sources based on literature data published by the GENDORF Chemical Park. The factory produced an average of 2462760 tonnes of chemical substances (including intermediates) per year in the years 2015-2019.
  properties: carbon content, fossil 0.00178991, dry mass 0.000337476 kg, water content 2962.17, wet mass 1 kg
  note on carbon content, fossil: Bicarbonate content is 2.93 mol/m3. CO2 content is 0.1 mol/m3 (ecoinvent v2.2 report 8, Tab 93.1).
- wastewater, average: -1.13127e-5 m3; name BP_wastewater; lognormal variance with pedigree 0.0438, pedigree (2,4,1,4,4)
  Literature value. As reported by Thebeeapelo (2002). Split of water output sources based on literature data published by the GENDORF Chemical Park. The factory produced an average of 2462760 tonnes of chemical substances (including intermediates) per year in the years 2015-2019.
  production volume; name PV_wastewater; = (BP_wastewater*PV_RP/RP)
    Calculated from production volume of reference product using the relative outputs.
  properties: carbon content, non-fossil 0.194039, dry mass 0.346837 kg, mass concentration, TOC 0.1091 kg/m3, mass concentration, calcium 0.039453 kg/m3, mass concentration, chlorine 0.030031 kg/m3, mass concentration, hydrogen 0.013365 kg/m3, mass concentration, nitrogen 0.031015 kg/m3, mass concentration, oxygen 0.069824 kg/m3, mass concentration, sodium 0.06456 kg/m3, mass concentration, sulfur 0.015602 kg/m3, water content 2882.2, wet mass 1000 kg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
  note on carbon content, non-fossil: 0.0673 kg TOC/m3 (Tab A.17, ecoinvent v2.2 report 13_I). TOC was considered as Total Carbon.

## Inputs from nature
- Water, cooling, unspecified natural origin [natural resource, in water]: 0.073072 m3; lognormal variance with pedigree 0.044, pedigree (2,4,2,4,4)
  (same comment as for tap water)
- Water, river [natural resource, in water]: 0.00479676 m3; lognormal variance with pedigree 0.044, pedigree (2,4,2,4,4)
  (same comment as for tap water)
- Water, well, in ground [natural resource, in water]: 0.0040569 m3; lognormal variance with pedigree 0.044, pedigree (2,4,2,4,4)
  (same comment as for tap water)

## Emissions to nature
- Benzene [air, unspecified]: 0.00278119 kg; lognormal variance with pedigree 0.0569, pedigree (2,5,2,3,3)
  Calculated losses, based on the boiling point of a chemical, to water or to air. In addition, unreacted chemicals are assumed to go to wastewater treatment, which has a conversion rate in biological treatment of 95% of carbon into carbon dioxide. The remaining 5% are released as emissions to water.
- Carbon dioxide, fossil [air, unspecified]: 0.394019 kg; lognormal variance with pedigree 0.0569, pedigree (2,5,2,3,3)
  Calculated based on the carbon content of unreacted chemical substances. The unreacted chemicals are assumed to go to wastewater treatment, which has a conversion rate in biological treatment of 95% of carbon into carbon dioxide. The remaining 5% are released as emissions to water, unspecified.
- Nitrogen [air, unspecified]: 0.033036 kg; lognormal variance with pedigree 0.0834, pedigree (2,4,2,4,4)
  Calculated value. The amount of nitrogen released to air is equal to the amount of nitrogen entering the activity.
- Sulfur dioxide [air, unspecified]: 0.001001 kg; lognormal variance with pedigree 0.0569, pedigree (2,5,2,3,3)
  Calculated losses, based on the boiling point of a chemical, to water or to air. In addition, unreacted chemicals are assumed to go to wastewater treatment, which has a conversion rate in biological treatment of 95% of carbon into carbon dioxide. The remaining 5% are released as emissions to water. This includes the emissions of sodium from the sulfuric acid neutralisation.
- Sulfur trioxide [air, unspecified]: 0.000170269 kg; lognormal variance with pedigree 0.0569, pedigree (2,5,2,3,3)
  (same comment as for Benzene)
- Water [air, unspecified]: 0.00730336 m3; lognormal variance with pedigree 0.0834, pedigree (2,4,2,4,4)
  (same comment as for wastewater, average)
- BOD5, Biological Oxygen Demand [water, unspecified]: 0.0201595 kg; lognormal variance with pedigree 0.0569, pedigree (2,5,2,3,3)
  Calculated value. The BOD, COD, TOC and BOD5 are calculated based on the amount and type of emissions released to water in the same activity.
- COD, Chemical Oxygen Demand [water, unspecified]: 0.0201595 kg; lognormal variance with pedigree 0.0569, pedigree (2,5,2,3,3)
  (same comment as for BOD5, Biological Oxygen Demand)
- DOC, Dissolved Organic Carbon [water, unspecified]: 0.00565452 kg; lognormal variance with pedigree 0.0569, pedigree (2,5,2,3,3)
  (same comment as for BOD5, Biological Oxygen Demand)
- Sodium I [water, unspecified]: 0.0663889 kg; lognormal variance with pedigree 0.0569, pedigree (2,5,2,3,3)
  (same comment as for Sulfur dioxide)
- Sulfate [water, unspecified]: 0.00915286 kg; lognormal variance with pedigree 0.0569, pedigree (2,5,2,3,3)
  (same comment as for Sulfur dioxide)
- TOC, Total Organic Carbon [water, unspecified]: 0.00565452 kg; lognormal variance with pedigree 0.0569, pedigree (2,5,2,3,3)
  (same comment as for BOD5, Biological Oxygen Demand)
- Water [water, unspecified]: 0.0750234 m3; lognormal variance with pedigree 0.0834, pedigree (2,4,2,4,4)
  Literature value. As reported by Thebeeapelo (2002). Split of water output sources based on literature data published by the GENDORF Chemical Park. The factory produced an average of 2462760 tonnes of chemical substances (including intermediates) per year in the years 2015-2019. This value includes process emissions.

## Sampling procedure
Literature data and stoichiometric calculation. This inventory is partially based on a generic model of the production of chemicals. The data generated by this model have been improved with compound-specific data when available. The model of the production of chemicals is using specific industry or literature data wherever possible and more generic data on chemical production processes to fill compound-specific data gaps when necessary. The basic principles of the model have been published in literature (Hischier, 2005). The model has been updated and extended with newly available data from the chemical industry. In the model, unreacted fractions are treated in a waste treatment process, and emissions reported are after a waste treatment process that is included in the scope of this dataset. For volatile reactants, a small level of evaporation is assumed. Solvents and catalysts are mostly recycled in closed-loop systems within the scope of the dataset and reported flows are for losses from this system. The main source of information for the values for heat, electricity, water (process and cooling), nitrogen, chemical factory is industry data from the GENDORF Chemical Park. The values are a 5-year average of data from 2015 to 2019 published by the GENDORF Chemical Park, which is based in Germany and produced an average of 2462760 tonnes of chemical substances in the years 2015-2019. Reference(s): Hischier, R. (2005) Establishing Life Cycle Inventories of Chemicals Based on Differing Data Availability (9 pp). The International Journal of Life Cycle Assessment, Volume 10, Issue 1, pp 59–67. 10.1065/lca2004.10.181.7 Chemiepark GENDORF, Umwelterklärung 2016, https://www.gendorf.de/Nachbarn/Umweltschutz/Industrie%20und%20Nachhaltigkeit Chemiepark GENDORF, Umwelterklärung 2017, https://www.gendorf.de/Nachbarn/Umweltschutz/Industrie%20und%20Nachhaltigkeit Chemiepark GENDORF, Umwelterklärung 2020, https://www.gendorf.de/Nachbarn/Umweltschutz/Industrie%20und%20Nachhaltigkeit Schmiedel K.W., Decker D. (2011): Resorcinol, Ullmann's Encyclopedia of Industrial Chemistry, Wiley-VCH. ECHA: Resorcinol, available here: https://echa.europa.eu/substance-information/-/substanceinfo/100.003.260, last accessed 20-07-2022.
