# heat and power co-generation unit construction, organic Rankine cycle, 1400kW thermal, building

Dataset: EcoSpold 2, unit process
Geography: CH
Time period: 2000-01-01 to 2023-12-31
Technology level: current
Classification: ISIC rev.4 ecoinvent: 4220:Construction of utility projects
Classification: EcoSpold01Categories: wood energy/cogeneration
Tags: ConvertedDataset
Scenario: Business-as-Usual
System model: Allocation, cut-off by classification
Generated by: Christian Bauer
Published in: Bauer, C. 2007
Database: ecoinvent
isCopyrightProtected: true
accessRestrictedTo: 1

## General comment
This dataset represents the construction of components of a 1400 kWth cogeneration plant. The dataset represents all components necessary only for electricity production.

## Included activities start
From unoccupied land forseen for the construction of a cogeneration plant.

## Included activities end
This activity ends with the building of a cogeneration plant, having a lifetime of 80 years. The dataset includes apart the materials for the building of the cogeneration plant also the land use, as well as the disposal of all these parts.

## Geography
Data for a specific Swiss cogeneration plant. Dataset could be used for similarly dimensioned cogeneration plants in other regions.

## Technology
The 1400 kWth cogeneration plant is supplied with wood chips automatically. The electricity production takes place through an Organic Ranking Cycle using a steam turbine and a multi-cyclone filter.

## Reference product
- heat and power co-generation unit, organic Rankine cycle, 1400kW thermal, building: 1 unit; name RP_amount_1; By-product classification allocatable product; CPC 53262: Power plants
  In contrast to pure heating systems, the building is treated separately, as cogeneration plants of this size can hardly be integrated into an existing building.
  EcoSpold01Location=CH
  production volume 0.0336675 unit; name RP_PV_1
    This is a placeholder value that does not reflect real-world production volumes. This dataset does not currently require a real-world production volume to work in the database framework, and no actual data were collected yet. This has no negative effect on the results of the ecoinvent database. The placeholder value of this activity was scaled according to the nominal GDP of 2005 (source: United Nations, http://data.un.org/Glossary.aspx?q=GDP+%28current+US%24%29, accessed 20130726) to reflect an appropriate share of the global production volume, which is also a placeholder value.
  property price 1.09603e6 EUR2005
    Convert from EU 27 price to the world by currency exchange rate.
  properties: carbon allocation 0 kg, carbon content 0

## Inputs from technosphere
- alkyd paint, white, without solvent, in 60% solution state: 544 kg; source Jungbluth N. 2002; lognormal variance with pedigree 0.186, pedigree (4,5,5,1,1)
  EcoSpold01Location=RER
  Estimation.
  properties: carbon content, fossil 0.140367, carbon content, non-fossil 0.199629, dry mass 1 kg, heating value, net 10.3 MJ, wet mass 1 kg
  note on carbon content, fossil: C content was calculated as an addition of C content in the raw materials.
- concrete, normal strength: 582 m3; source Jungbluth N. 2002; lognormal variance with pedigree 0.186, pedigree (4,5,5,1,1)
  Proxy. For asphalt used as a material, concrete is assumed.
  EcoSpold01Location=CH
  properties: dry mass 2190 kg, water content 0.086758, wet mass 2380 kg
- excavation, hydraulic digger: 6400 m3; source Jungbluth N. 2002; lognormal variance with pedigree 0.186, pedigree (4,5,5,1,1)
  EcoSpold01Location=RER
  Estimation.
- glued laminated timber, MUF-glue: 7.3 m3; source Jungbluth N. 2002; lognormal variance with pedigree 0.186, pedigree (4,5,5,1,1)
  EcoSpold01Location=RER
  Estimation. The split between PUR-glue and MUF-glue glued laminated timber is made based on the Swiss relative production volumes for the products.
  properties: carbon content, fossil 0.01638, carbon content, non-fossil 0.442689, dry mass 403.64 kg, heating value, net 5517.96 MJ, price 298 EUR2005, water content 0.0975126, wet mass 443 kg
- glued laminated timber, PUR-glue: 7.3 m3; source Jungbluth N. 2002; lognormal variance with pedigree 0.186, pedigree (4,5,5,1,1)
  Estimation. The split between PUR-glue and MUF-glue glued laminated timber is made based on the Swiss relative production volumes for the products.
  properties: carbon content, fossil 0.00801, carbon content, non-fossil 0.446904, dry mass 399.46 kg, heating value, net 5409.08 MJ, price 298 EUR2005, water content 0.0989836, wet mass 439 kg
- gravel, crushed: 168000 kg; source Jungbluth N. 2002; lognormal variance with pedigree 0.186, pedigree (4,5,5,1,1)
  EcoSpold01Location=CH
  Estimation.
  properties: dry mass 1 kg, wet mass 1 kg
- iron scrap, unsorted: -6080 kg; name BP_amount_1
  production volume; = RP_PV_1 * BP_amount_1 / RP_amount_1
    Calculated from production volume of reference product using the relative outputs.
  properties: dry mass 1 kg, price 0.149 EUR2005, wet mass 1 kg
- reinforcing steel: 25200 kg; source Jungbluth N. 2002; lognormal variance with pedigree 0.186, pedigree (4,5,5,1,1)
  Estimation.
  EcoSpold01Location=RER
  properties: carbon content, fossil 0.004, dry mass 1 kg, wet mass 1 kg
- sawnwood, softwood, raw, dried (u=20%): 120 m3; source Jungbluth N. 2002; lognormal variance with pedigree 0.186, pedigree (4,5,5,1,1)
  Proxy. For structural wood used as a material, sawnwood is assumed.
  EcoSpold01Location=RER
  properties: carbon content, non-fossil 0.494, dry mass 450 kg, heating value, net 6514.84 MJ, water content 0.2, wet mass 540 kg
  note on carbon content, non-fossil: C content of dry mass is 0.494 kgC/kg dry wood (ecoinvent v2.2 report 9)
- steel, low-alloyed, hot rolled: 6080 kg; source Jungbluth N. 2002; lognormal variance with pedigree 0.186, pedigree (4,5,5,1,1)
  Estimation.
  EcoSpold01Location=RER
  properties: carbon content, fossil 0.005, dry mass 1 kg, wet mass 1 kg
  note on carbon content, fossil: Low alloyed steel composition given in Tab. 3.2 ecoinvent v2.2 report 10_partII. Steel assumed to have a C content of 0.5%
- stone wool: 10.4 kg; source Jungbluth N. 2002; lognormal variance with pedigree 0.186, pedigree (4,5,5,1,1)
  EcoSpold01Location=CH
  Estimation.
  properties: carbon content, fossil 0.015401, dry mass 1 kg, wet mass 1 kg
  note on carbon content, fossil: The chemical composition of the glass fibres used in the rock wool production is similar to the composition of naturally cooled volcano basalt and has a composition listed in Tab. 3.1 and 3.2 in ecoinvent v2.2 report 16, part XIV. Rock wool contains: a minimum of 96% mineral fibres,between 0.5 and 3.0 weight percent of phenolic resin depending on the specific product characteristics, and about 0.2 percent mineral oil (ecoinvent v2.2 report 16, part XIV). An average composition of 1.8% phenolic resin, 0.2% mineral oil, and 98% mineral fibres has been assumed and used to calculate C content of the rock wool
- waste concrete gravel: -168000 kg; lognormal variance with pedigree 0.0847, pedigree (3,3,3,3,4)
  Estimation. 100% of that material goes into a sorting plant.
  EcoSpold01Location=CH
  production volume
    Calculated from the production volume of cogen unit, organic Rankine cycle 1400kWth, wood burning, building in proportion to the respective output amounts.
  properties: dry mass 1 kg, wet mass 1 kg
- waste mineral wool: -10.4 kg; lognormal variance with pedigree 0.0847, pedigree (3,3,3,3,4)
  EcoSpold01Location=CH
  Estimation. 100% of that material goes into a sorting plant.
  production volume
    (same comment as for waste concrete gravel)
  properties: dry mass 1 kg, wet mass 1 kg
- waste paint on wood: -544 kg; lognormal variance with pedigree 0.0847, pedigree (3,3,3,3,4)
  Estimation. 100% of that material is disposed after use.
  EcoSpold01Location=CH
  production volume
    (same comment as for waste concrete gravel)
  properties: carbon content, fossil 0.65, dry mass 1 kg, heating value, net 19.7 MJ, wet mass 1 kg
- waste reinforced concrete: -1.31e6 kg; lognormal variance with pedigree 0.0847, pedigree (3,3,3,3,4)
  EcoSpold01Location=CH
  Estimation. 100% of that material goes into a sorting plant.
  production volume
    (same comment as for waste concrete gravel)
  properties: dry mass 0.99418 kg, water content 0.00585407, wet mass 1 kg
- waste wood, untreated: -10500 kg; lognormal variance with pedigree 0.0847, pedigree (3,3,3,3,4)
  Estimation. Material is disposed after use.
  EcoSpold01Location=CH
  production volume
    (same comment as for waste concrete gravel)
  properties: carbon content, non-fossil 0.48632, dry mass 0.8 kg, heating value, net 13.99 MJ, water content 0.25, wet mass 1 kg
  note on carbon content, non-fossil: Tab A.4, ecoinvent v2.2 report 13_I. C content has been referred to 1 kg DM,
  note on heating value, net: Value taken from the general comment of the treatment dataset.

## Inputs from nature
- Occupation, industrial area [natural resource, land]: 128000 m2*year; source Jungbluth N. 2002; lognormal variance with pedigree 0.186, pedigree (4,5,5,1,1)
  Estimation.
- Transformation, from unspecified [natural resource, land]: 1600 m2; source Jungbluth N. 2002; lognormal variance with pedigree 0.186, pedigree (4,5,5,1,1)
  Estimation.
- Transformation, to industrial area [natural resource, land]: 1600 m2; source Jungbluth N. 2002; lognormal variance with pedigree 0.186, pedigree (4,5,5,1,1)
  Estimation.

## Sampling procedure
Data from one specific 5 MW cogeneration plant, installed in Switzerland.

## Extrapolations
Data is extrapolated based on one specific 5 MW cogeneration plant with a factor of 0.8.

## Review by Christian Bauer 2003-08-19
passed

## Review by Roland Hischier 2011-11-22
Transfer of documentation done.
