# maize grain production, first crop

Dataset: EcoSpold 2, unit process
Geography: BR-MG
Time period: 2015-01-01 to 2023-12-31
Technology level: current
Classification: ISIC rev.4 ecoinvent: 0111:Growing of cereals (except rice), leguminous crops and oil seeds
Synonyms: summer maize production, summer maize cultivation, summer corn production
Tags: No
Scenario: Business-as-Usual
System model: Allocation, cut-off by classification
Generated by: Marcelo A. B. Morandi
Published in: Folegatti Matsuura, M. 2017
Database: ecoinvent
isCopyrightProtected: true
accessRestrictedTo: 1

## General comment
The raw data collected in panels were organized in electronic spreadsheets and checked for completeness and consistency. Agricultural inputs were detailed as to their composition and physical characteristics. Agricultural operations were characterized in terms of machinery (tractor and implement), type of fuel and specific consumption. Precipitation is enought to supply water to the crop, no extra water needed. Emissions from the agricultural process were estimated using the BRCalc/ICVCalc tool, developed by Embrapa Environment, which includes specific climate and soil databases for the 137 Brazilian agricultural mesoregions, in addition to databases of parameters related to agricultural crops, fertilizers and pesticides.
The main emission models adopted by BRCalc/ICVCalc derive from the references: Nemecek et al. (2015), IPCC (2019), Nemecek & Kagi (2007). It was used the model BRLUC (Donke et al., 2020) to estimate the LUC emissions; and the PestLCI Consensus V1.0, parameterized for Brazil (Barizon et al., 2021), to estimate pesticide emissions.

## Included activities start
This activity starts after the harvest of the previous crop.

## Included activities end
The dataset includes the inputs of seeds, mineral fertilisers and pesticides. It is assumed that no organic fertiliser is applied. The dataset includes all machine operations and corresponding machine infrastructure and sheds for: limestone and gypsum application, application of plant protection product, planting with starter fertiliser, fertilising, combine harvesting and drying of grains. For other agricultural operations, the amount of fuel consumed and their emissions are estimated. The dataset also includes the transportation of products inside the farm: water, soil correctives and fertilisers from sheds to field and grain from field to truck. Furthermore, direct field emissions and land use change emissions are included, with important regionalizations added. The dataset doesn't include: seed treatment, cleaning and storage of harvested grains. The activity ends after harvest at the farm gate.

## Allocation
In Brazil, maize can be produced as a monoculture or in cropping systems. For the fraction of maize produced in cropping systems, land occupation, liming operation and limestone are allocated among the products of the system, adopting factors that consider the fraction of area and the occupation time.

## Geography
The inventory is modelled for Brazil, Minas Gerais

## Technology
This dataset represents the production of 1 kg of maize in the state of Minas Gerais, which is composed of the maize regions of Uberaba. In this region, maize can be produced as a monoculture or in cropping systems, including other crops such as beans. When in a cropping system, land occupation, liming operation and limestone are allocated among the products of the system, adopting factors that consider the fraction of area and the occupation time. The average productivity is 9000 kg/ha, at 14% moisture.
Agricultural operation was modelled based on the total diesel consumed to perform the operation and the emissions to air related to diesel burning.
There was no net expansion of maize in these states for the period 1999-2020, according to IBGE data. According to Reinhard et al, 2017 , LUC is assumed to be irrelevant.

## Time period
Time period of the most of the data collected for this dataset.

## Reference product
- maize grain: 1 kg; By-product classification allocatable product; CPC 01122: Maize (corn), other; HS2017 100590: Cereals; maize (corn), other than seed
  This dataset represents the production of 1 kg of maize in the state of Minas Gerais, which is composed of the maize regions of Uberaba. In this region, maize can be produced as a monoculture or in cropping systems, including other crops such as beans. When in a cropping system, land occupation, liming operation and limestone are allocated among the products of the system, adopting factors that consider the fraction of area and the occupation time. The average productivity is 9000 kg/ha, at 14% moisture.
  production volume 4.65246e9 kg
    The covered datasets together represent 71,2% of national production (PV). Due to the high representativeness and the lack of information regarding the other regions not covered by the inventories, it was assumed that the available data represent 100% of the national production and a new percentage of contribution was attributed to each state.
  property price 0.12 EUR2005
    Literature value. Based on SAFEX price of R 2,025 per tonne (average yellow and white). Source: SAGIS, 2018. Retrieved from: http://www.sagis.org.za/safex_historic.html, accessed 28May2018.
  properties: carbon allocation 0.40383 kg, carbon content 0.46957, carbon content, fossil 0, carbon content, non-fossil 0.46957, dry mass 0.86 kg, water content 0.162791, water in wet mass 0.14 kg, wet mass 1 kg

## Inputs from technosphere
- atrazine: 0.00014 kg; lognormal variance with pedigree 1.0709, pedigree (2,2,2,1,1)
  The amount of pesticide or adjuvant was obtained from interviews with producers and experts. Concentration of the active ingredient was obtained in the Material Safety Data Sheet. The amount of dilution water was 200 L/ha per application.
  properties: carbon content, fossil 0.446512, dry mass 1 kg, wet mass 1 kg
- diammonium phosphate: 0.019 kg; lognormal variance with pedigree 1.0709, pedigree (2,2,2,1,1)
  The amount of fertiliser was obtained from interviews with producers and experts. The nutrient content in the input was obtained from technical literature and technical regulation documents. The selection of the fertiliser from the ecoinvent database and its ammount was based on the commercial product.
  properties: dry mass 1 kg, nitrogen content 0.18, phosphorus content 0.200754, wet mass 1 kg
  note on nitrogen content: Nitrogen content (on a dry matter basis) of diammonium phosphate is calculated from the molecular formula of the nutrient present in the substance.
  note on phosphorus content: Phosphorus content (on a dry matter basis) of diammonium phosphate is calculated from the molecular formula of the nutrient present in the substance.
- diesel, low-sulfur: 0.00352 kg; lognormal variance with pedigree 1.2403, pedigree (3,2,2,1,3)
  The amount of diesel fuel (B12 mix in Brazil) used in agricultural operations not found in ecoinvent
  properties: carbon content, fossil 0.865, dry mass 1 kg, heating value, net 42.8 MJ, wet mass 1 kg
- drying of maize grain: 0.0488 l; lognormal variance with pedigree 1.0709, pedigree (2,2,2,1,1)
  Drying of grains
- fatty acid methyl ester: 0.000496 kg; lognormal variance with pedigree 1.2403, pedigree (3,2,2,1,3)
  The amount of biodiesel fuel (B12 mix in Brazil) used in agricultural operations not found in ecoinvent plus the fatty acids used as pesticide adjuvant
  properties: carbon content, fossil 0.041, carbon content, non-fossil 0.732, dry mass 1 kg, heating value, net 37.2 MJ, wet mass 1 kg
  note on heating value, net: Based on literature, report 17, page 439. Jungbluth, N., Chudacoff, M., Dauriat, A., Dinkel, F., Doka, G., Faist Emmenegger, M., Gnansounou, E., Kljun, N., Schleiss, K., Spielmann, M., Stettler, C., Sutter, J. 2007: Life Cycle Inventories of Bioenergy. ecoinvent report No. 17, Swiss Centre for Life Cycle Inventories, Dübendorf, CH.
- glyphosate: 0.00037 kg; lognormal variance with pedigree 1.0709, pedigree (2,2,2,1,1)
  (same comment as for atrazine)
  properties: carbon content, fossil 0.214286, dry mass 1 kg, wet mass 1 kg
- lime: 0.023 kg; lognormal variance with pedigree 1.1123, pedigree (3,2,2,1,1)
  The amount of soil corrective was obtained from interviews with producers and experts.
  properties: carbon content, fossil 0.120005, dry mass 1 kg, wet mass 1 kg
- maize seed, for sowing: 0.0022 kg; lognormal variance with pedigree 1.0902, pedigree (1,1,2,1,1)
  The amount of seeds for sowing
  property carbon content, non-fossil 0.45263; name C_content_non_fossil
  property dry mass 0.88 kg; name DM
  property water content 0.136364; name water_content
  property water in wet mass 0.12 kg; name WWM
  property wet mass 1 kg; name WM
  note on carbon content, non-fossil: biogene carbon content on a dry matter basis; Composition data obtained from Corn Grain Whole, in (http://beefmagazine.com/images/2009%20feed%20table.pdf). First, composition data were refered to 1 kg dry mass. Then, C-contents were calculated considering a C-content/dry mass of 44% in carbohydrates (including fibres), 53% in proteins and 75% in fats. All data from ecoinvent report, n 15a, pg 40, except C-content in protein, that comes from Determination of protein concentration by total organic carbon analysis, Rouwenhorst et al., 1991, J Biochem and Biophys Methods, 22:119-128.
- mancozeb: 0.00053 kg; lognormal variance with pedigree 1.0709, pedigree (2,2,2,1,1)
  (same comment as for atrazine)
  properties: carbon content, fossil 0.17759, dry mass 1 kg, wet mass 1 kg
- metolachlor: 0.000582 kg; lognormal variance with pedigree 1.0709, pedigree (2,2,2,1,1)
  (same comment as for atrazine)
  properties: carbon content, fossil 0.633803, dry mass 1 kg, wet mass 1 kg
- packaging, for fertilisers: 0.098 kg; lognormal variance with pedigree 1.6408, pedigree (4,3,2,5,4)
  The HDPE packaging was considered for macronutrient fertilisers. Soil correctives were not considered in the packaging calculation since these are transported in bulk. The amount of packaging for pesticides was also estimated. It was considered twice the value of the active ingredient of fertilisers and pesticides applied in the field to account for the packaging of the diluted products. The production and disposal of the packaging were included in this exchange.
  properties: carbon content, fossil 0.825301, dry mass 1 kg, price 0.0642 EUR2005, wet mass 1 kg
  note on carbon content, fossil: Considering a chemical formula (C2H4)n for polyethylene, carbon content-fossil is calculated to be 0.856286 kg of Carbon per kg of dry mass.
- packaging, for pesticides: 0.0034 kg; lognormal variance with pedigree 1.6408, pedigree (4,3,2,5,4)
  (same comment as for packaging, for fertilisers)
  properties: carbon content, fossil 0.85714, dry mass 1 kg, price 0.0642 EUR2005, wet mass 1 kg
- pesticide, unspecified: 0.00064 kg; lognormal variance with pedigree 1.0709, pedigree (2,2,2,1,1)
  The commercial pesticides not found in the ecoinvent database were summed up and added as “pesticide, unspecified”. Amount in kg/kg: Azoxystrobin (1,1E-05), carfentrazone-ethyl (4,4E-06), cyproconazole (4,4E-06), chlorpyrifos (1,1E-04), epoxiconazole (1,3E-06), fluxapyroxade (1,1E-05), lambda-cyhalothrin (2,9E-06), methomyl (4,8E-05), Other Ingredients (2,4E-04), Pyraclostrobin (2,5E-05), quizalofop-P-ethyl (3,3E-06), Tebuconazole (1,1E-05), Tembotrione (2,2E-06), thiamethoxam (3,9E-06), THIOPHANATE-METHYL (1,7E-04)
  properties: carbon content, fossil 0.486978, dry mass 1 kg, wet mass 1 kg
- potassium chloride: 0.029 kg; lognormal variance with pedigree 1.0709, pedigree (2,2,2,1,1)
  (same comment as for diammonium phosphate)
  properties: dry mass 1 kg, wet mass 1 kg
- transport, tractor and trailer, agricultural: 0.0053 metric ton*km; lognormal variance with pedigree 1.1123, pedigree (3,2,2,1,1)
  Average transport of fertilisers, limestone and gypsum from shed to field.. Transport of sugarcane from field to warehouse and transport of tapwater for pesticide spray from source to mixing point. are also included. Calculation based on consultation to experts.
- triple superphosphate: 0.012 kg; lognormal variance with pedigree 1.0709, pedigree (2,2,2,1,1)
  (same comment as for diammonium phosphate)
  properties: dry mass 1 kg, phosphorus content 0.200754, wet mass 1 kg
  note on phosphorus content: Phosphorus content (on a dry matter basis) of triple superphosphate is calculated from the molecular formula of the nutrient present in the substance.
- urea: 0.034 kg; lognormal variance with pedigree 1.0709, pedigree (2,2,2,1,1)
  (same comment as for diammonium phosphate)
  properties: carbon content, fossil 0.2, dry mass 1 kg, wet mass 1 kg

## Inputs from nature
- Carbon dioxide, in air [natural resource, in air]: 1.6317 kg; lognormal variance with pedigree 1.0709, pedigree (2,2,2,1,1)
  Carbon dioxide (CO2) absorption from air during photosynthesis was also included, according to Nemecek and Schnetzer (2012). It considers the carbon content of the reference product based on the ecoinvent database (Jungbluth et al., 2007).
- Occupation, annual crop, non-irrigated, intensive [natural resource, land]: 1.756e-5 m2*year; lognormal variance with pedigree 1.2122, pedigree (3,1,2,1,1)
  The land occupation was calculated based on crop yield
- Transformation, from annual crop, non-irrigated, intensive [natural resource, land]: 1.11 m2; lognormal variance with pedigree 1.0608, pedigree (2,1,2,1,1)
  The LUC input comprises the actual data related to land transformation. This land transformation flow is irrelevant to LUC and the amounts are equal in both the 'land transformation from' and 'land transformation to'.
- Transformation, to annual crop, non-irrigated, intensive [natural resource, land]: 1.11 m2; lognormal variance with pedigree 1.0608, pedigree (2,1,2,1,1)
  (same comment as for Transformation, from annual crop, non-irrigated, intensive)
- Water, unspecified natural origin [natural resource, in water]: 8.9e-5 m3; lognormal variance with pedigree 1.0608, pedigree (2,1,2,1,1)
  Water consumed for pesticide dilution. Estimated volume based on interviews with producers and experts

## Emissions to nature
- Ammonia [air, non-urban air or from high stacks]: 0.00332167 kg; lognormal variance with pedigree 1.11033, pedigree (3,2,2,2,3)
  Ammonia releases to air, according to the AGRAMMON model: 'Plant production' (Nemecek & Schnetzer, 2011)
- Atrazine [air, non-urban air or from high stacks]: 7.8e-5 kg; lognormal variance with pedigree 1.1123, pedigree (3,2,2,1,1)
  Pesticide emissions are calculated using the PestLCI model, adapted to the Brazilian conditions (Embrapa, 2021; PestLCI, 2022).
- Azoxystrobin [air, non-urban air or from high stacks]: 6.24e-6 kg; lognormal variance with pedigree 1.1123, pedigree (3,2,2,1,1)
  (same comment as for Atrazine)
- Benzene [air, non-urban air or from high stacks]: 2.57e-8 kg; lognormal variance with pedigree 1.2403, pedigree (3,2,2,1,3)
  Emissions derived from fuel combustion (diesel 88%, and biodiesel 12%), using emission factors from Nemecek & Kagi (2007)
- Benzo(a)pyrene [air, non-urban air or from high stacks]: 1.05e-10 kg; lognormal variance with pedigree 1.2403, pedigree (3,2,2,1,3)
  (same comment as for Benzene)
- Cadmium II [air, non-urban air or from high stacks]: 3.52e-11 kg; lognormal variance with pedigree 1.2403, pedigree (3,2,2,1,3)
  (same comment as for Benzene)
- Carbon dioxide, fossil [air, non-urban air or from high stacks]: 0.0464 kg; lognormal variance with pedigree 1.1089, pedigree (4,3,2,3,1)
  Carbon dioxide releases from urea and limestone application, according to IPCC (2006) plus emissions derived from fuel combustion (diesel 88%, and biodiesel 12%), using emission factors from Nemecek & Kagi (2007)
- Carbon dioxide, non-fossil [air, non-urban air or from high stacks]: 0.00137 kg; lognormal variance with pedigree 1.1089, pedigree (4,3,2,3,1)
  (same comment as for Benzene)
- Carbon monoxide, fossil [air, non-urban air or from high stacks]: 1.88e-5 kg; lognormal variance with pedigree 1.2403, pedigree (3,2,2,1,3)
  (same comment as for Benzene)
- Carfentrazone-ethyl [air, non-urban air or from high stacks]: 2.5e-6 kg; lognormal variance with pedigree 1.1123, pedigree (3,2,2,1,1)
  (same comment as for Atrazine)
- Chromium III [air, non-urban air or from high stacks]: 1.76e-10 kg; lognormal variance with pedigree 1.2403, pedigree (3,2,2,1,3)
  (same comment as for Benzene)
- Copper ion [air, non-urban air or from high stacks]: 5.98e-9 kg; lognormal variance with pedigree 1.2403, pedigree (3,2,2,1,3)
  (same comment as for Benzene)
- Cyproconazole [air, non-urban air or from high stacks]: 2.5e-6 kg; lognormal variance with pedigree 1.1123, pedigree (3,2,2,1,1)
  (same comment as for Atrazine)
- Dinitrogen monoxide [air, non-urban air or from high stacks]: 0.000554624 kg; lognormal variance with pedigree 1.11033, pedigree (3,2,2,2,3)
  Direct and indirect N2O emissions according to IPCC (2019) plus emissions derived from fuel combustion (diesel 88%, and biodiesel 12%), using emission factors from Nemecek & Kagi (2007)
- Epoxiconazole [air, non-urban air or from high stacks]: 7.05e-7 kg; lognormal variance with pedigree 1.1123, pedigree (3,2,2,1,1)
  (same comment as for Atrazine)
- Glyphosate [air, non-urban air or from high stacks]: 0.000232 kg; lognormal variance with pedigree 1.1123, pedigree (3,2,2,1,1)
  (same comment as for Atrazine)
- Hydrocarbons, unspecified [air, non-urban air or from high stacks]: 1.05e-5 kg; lognormal variance with pedigree 1.2403, pedigree (3,2,2,1,3)
  (same comment as for Benzene)
- Mancozeb [air, non-urban air or from high stacks]: 0.0002 kg; lognormal variance with pedigree 1.1123, pedigree (3,2,2,1,1)
  (same comment as for Atrazine)
- Methane, fossil [air, non-urban air or from high stacks]: 4.54e-7 kg; lognormal variance with pedigree 1.2403, pedigree (3,2,2,1,3)
  (same comment as for Benzene)
- Methane, non-fossil [air, non-urban air or from high stacks]: 1.87e-7 kg; lognormal variance with pedigree 1.2403, pedigree (3,2,2,1,3)
  (same comment as for Benzene)
- Methomyl [air, non-urban air or from high stacks]: 2.68e-5 kg; lognormal variance with pedigree 1.1123, pedigree (3,2,2,1,1)
  (same comment as for Atrazine)
- Nickel II [air, non-urban air or from high stacks]: 2.46e-10 kg; lognormal variance with pedigree 1.2403, pedigree (3,2,2,1,3)
  (same comment as for Benzene)
- Nitrogen oxides [air, non-urban air or from high stacks]: 0.0003788 kg; lognormal variance with pedigree 1.11033, pedigree (3,2,2,2,3)
  Emissions of NOx from applied mineral fertilisers, according to WFLDB (2019)
- PAH, polycyclic aromatic hydrocarbons [air, non-urban air or from high stacks]: 1.16e-8 kg; lognormal variance with pedigree 1.2403, pedigree (3,2,2,1,3)
  (same comment as for Benzene)
- Particulate Matter, < 2.5 um [air, non-urban air or from high stacks]: 1.97e-7 kg; lognormal variance with pedigree 1.2403, pedigree (3,2,2,1,3)
  (same comment as for Benzene)
- Pyraclostrobin [air, non-urban air or from high stacks]: 1.87e-6 kg; lognormal variance with pedigree 1.1123, pedigree (3,2,2,1,1)
  (same comment as for Atrazine)
- Quizalofop-p-ethyl [air, non-urban air or from high stacks]: 1.87e-6 kg; lognormal variance with pedigree 1.1123, pedigree (3,2,2,1,1)
  (same comment as for Atrazine)
- Selenium IV [air, non-urban air or from high stacks]: 3.52e-11 kg; lognormal variance with pedigree 1.2403, pedigree (3,2,2,1,3)
  (same comment as for Benzene)
- Sulfur dioxide [air, non-urban air or from high stacks]: 3.55e-6 kg; lognormal variance with pedigree 1.2403, pedigree (3,2,2,1,3)
  (same comment as for Benzene)
- Thiamethoxam [air, non-urban air or from high stacks]: 4.39e-6 kg; lognormal variance with pedigree 1.1123, pedigree (3,2,2,1,1)
  (same comment as for Atrazine)
- Thiophanate-methyl [air, non-urban air or from high stacks]: 6.24e-5 kg; lognormal variance with pedigree 1.1123, pedigree (3,2,2,1,1)
  (same comment as for Atrazine)
- Water [air, unspecified]: 8.9e-5 m3; lognormal variance with pedigree 0.0034, pedigree (2,1,2,5,1)
- Zinc II [air, non-urban air or from high stacks]: 3.52e-9 kg; lognormal variance with pedigree 1.2403, pedigree (3,2,2,1,3)
  (same comment as for Benzene)
- Arsenic ion [soil, agricultural]: 1.94203e-7 kg; normal variance with pedigree 1.21, pedigree (5,5,5,5,5)
  Heavy metals emissions to agricultural soil through erosion are estimated by using the SALCA-heavy metal model (Nemecek et al., 2015).
  Uncertainty: Emissions of heavy metals to soil estimated based on WFLDB adapted to Brazil
- Atrazine [soil, agricultural]: 0.000526 kg; lognormal variance with pedigree 1.11233, pedigree (3,2,2,2,1)
  (same comment as for Atrazine)
- Atrazine [soil, forestry]: 2.45e-6 kg; lognormal variance with pedigree 1.11233, pedigree (3,2,2,2,1)
  (same comment as for Atrazine)
- Azoxystrobin [soil, agricultural]: 2.83e-5 kg; lognormal variance with pedigree 1.11233, pedigree (3,2,2,2,1)
  (same comment as for Atrazine)
- Azoxystrobin [soil, forestry]: 1.95e-7 kg; lognormal variance with pedigree 1.11233, pedigree (3,2,2,2,1)
  (same comment as for Atrazine)
- Cadmium II [soil, agricultural]: -2.16955e-8 kg; normal variance with pedigree 1.21, pedigree (5,5,5,5,5)
  (same comment as for Arsenic ion)
- Carfentrazone-ethyl [soil, agricultural]: 2.24e-5 kg; lognormal variance with pedigree 1.11233, pedigree (3,2,2,2,1)
  (same comment as for Atrazine)
- Carfentrazone-ethyl [soil, forestry]: 7.8e-8 kg; lognormal variance with pedigree 1.11233, pedigree (3,2,2,2,1)
  (same comment as for Atrazine)
- Chromium III [soil, agricultural]: 6.32538e-8 kg; normal variance with pedigree 1.21, pedigree (5,5,5,5,5)
  (same comment as for Arsenic ion)
- Copper ion [soil, agricultural]: -1.72217e-6 kg; normal variance with pedigree 1.21, pedigree (5,5,5,5,5)
  (same comment as for Arsenic ion)
- Cyproconazole [soil, agricultural]: 1.13e-5 kg; lognormal variance with pedigree 1.11233, pedigree (3,2,2,2,1)
  (same comment as for Atrazine)
- Cyproconazole [soil, forestry]: 7.8e-8 kg; lognormal variance with pedigree 1.11233, pedigree (3,2,2,2,1)
  (same comment as for Atrazine)
- Epoxiconazole [soil, agricultural]: 1.63e-6 kg; lognormal variance with pedigree 1.11233, pedigree (3,2,2,2,1)
  (same comment as for Atrazine)
- Epoxiconazole [soil, forestry]: 2.21e-8 kg; lognormal variance with pedigree 1.11233, pedigree (3,2,2,2,1)
  (same comment as for Atrazine)
- Glyphosate [soil, agricultural]: 0.00182 kg; lognormal variance with pedigree 1.11233, pedigree (3,2,2,2,1)
  (same comment as for Atrazine)
- Glyphosate [soil, forestry]: 7.27e-6 kg; lognormal variance with pedigree 1.11233, pedigree (3,2,2,2,1)
  (same comment as for Atrazine)
- Lead II [soil, agricultural]: -6.5668e-8 kg; normal variance with pedigree 1.21, pedigree (5,5,5,5,5)
  (same comment as for Arsenic ion)
- Mancozeb [soil, agricultural]: 0.000683 kg; lognormal variance with pedigree 1.11233, pedigree (3,2,2,2,1)
  (same comment as for Atrazine)
- Mancozeb [soil, forestry]: 6.25e-6 kg; lognormal variance with pedigree 1.11233, pedigree (3,2,2,2,1)
  (same comment as for Atrazine)
- Methomyl [soil, agricultural]: 0.000181 kg; lognormal variance with pedigree 1.11233, pedigree (3,2,2,2,1)
  (same comment as for Atrazine)
- Methomyl [soil, forestry]: 8.42e-7 kg; lognormal variance with pedigree 1.11233, pedigree (3,2,2,2,1)
  (same comment as for Atrazine)
- Pyraclostrobin [soil, agricultural]: 4.32e-6 kg; lognormal variance with pedigree 1.11233, pedigree (3,2,2,2,1)
  (same comment as for Atrazine)
- Pyraclostrobin [soil, forestry]: 5.85e-8 kg; lognormal variance with pedigree 1.11233, pedigree (3,2,2,2,1)
  (same comment as for Atrazine)
- Quizalofop-p-ethyl [soil, agricultural]: 1.68e-5 kg; lognormal variance with pedigree 1.11233, pedigree (3,2,2,2,1)
  (same comment as for Atrazine)
- Quizalofop-p-ethyl [soil, forestry]: 5.86e-8 kg; lognormal variance with pedigree 1.11233, pedigree (3,2,2,2,1)
  (same comment as for Atrazine)
- Thiamethoxam [soil, agricultural]: 2.47e-5 kg; lognormal variance with pedigree 1.11233, pedigree (3,2,2,2,1)
  (same comment as for Atrazine)
- Thiamethoxam [soil, forestry]: 1.38e-7 kg; lognormal variance with pedigree 1.11233, pedigree (3,2,2,2,1)
  (same comment as for Atrazine)
- Thiophanate-methyl [soil, agricultural]: 0.000214 kg; lognormal variance with pedigree 1.11233, pedigree (3,2,2,2,1)
  (same comment as for Atrazine)
- Thiophanate-methyl [soil, forestry]: 1.96e-6 kg; lognormal variance with pedigree 1.11233, pedigree (3,2,2,2,1)
  (same comment as for Atrazine)
- Arsenic ion [water, surface water]: 1.94222e-11 kg; lognormal variance with pedigree 1.11233, pedigree (3,2,2,2,1)
  Emissions of heavy metals to surface water are calculated according to Schmidt (2007)
- Atrazine [water, unspecified]: 1.32e-7 kg; lognormal variance with pedigree 1.11233, pedigree (3,2,2,2,1)
  (same comment as for Atrazine)
- Azoxystrobin [water, unspecified]: 1.05e-8 kg; lognormal variance with pedigree 1.11233, pedigree (3,2,2,2,1)
  (same comment as for Atrazine)
- Cadmium II [water, surface water]: 4.10488e-13 kg; lognormal variance with pedigree 1.11233, pedigree (3,2,2,2,1)
  Emissions of heavy metals to surface water are calculated according to Schmidt (2007)
- Carfentrazone-ethyl [water, unspecified]: 4.22e-9 kg; lognormal variance with pedigree 1.11233, pedigree (3,2,2,2,1)
  (same comment as for Atrazine)
- Chromium III [water, surface water]: 3.38488e-11 kg; lognormal variance with pedigree 1.11233, pedigree (3,2,2,2,1)
  Emissions of heavy metals to surface water are calculated according to Schmidt (2007)
- Copper ion [water, surface water]: 4.27876e-11 kg; lognormal variance with pedigree 1.11233, pedigree (3,2,2,2,1)
  Emissions of heavy metals to surface water are calculated according to Schmidt (2007)
- Cyproconazole [water, unspecified]: 4.22e-9 kg; lognormal variance with pedigree 1.11233, pedigree (3,2,2,2,1)
  (same comment as for Atrazine)
- Epoxiconazole [water, unspecified]: 1.19e-9 kg; lognormal variance with pedigree 1.11233, pedigree (3,2,2,2,1)
  (same comment as for Atrazine)
- Glyphosate [water, unspecified]: 3.92e-7 kg; lognormal variance with pedigree 1.11233, pedigree (3,2,2,2,1)
  (same comment as for Atrazine)
- Lead II [water, surface water]: 1.92351e-11 kg; lognormal variance with pedigree 1.11233, pedigree (3,2,2,2,1)
  Emissions of heavy metals to surface water are calculated according to Schmidt (2007)
- Mancozeb [water, unspecified]: 3.37e-7 kg; lognormal variance with pedigree 1.11233, pedigree (3,2,2,2,1)
  (same comment as for Atrazine)
- Methomyl [water, unspecified]: 4.53e-8 kg; lognormal variance with pedigree 1.11233, pedigree (3,2,2,2,1)
  (same comment as for Atrazine)
- Nitrate [water, ground-]: 0.0476031 kg; lognormal variance with pedigree 1.11233, pedigree (3,2,2,2,1)
  The SQCB-NO3 model was used according to Nemecek et al. (2015), considering only the quantity of water from precipitation (no irrigation was applied). Technical parameters are available in the BRCalc/ICVCalc tool (Folegatti-Matsuura et al., 2022).
- Phosphorus [water, surface water]: 1.16164e-5 kg; lognormal variance with pedigree 1.11233, pedigree (3,2,2,2,1)
  Only the phosphorus emission to surface water caused by soil erosion was calculated, according to Nemecek et al., 2015. Required technical parameters are available in the BRCalc/ICVCalc tool (Folegatti-Matsuura et al., 2022).
- Pyraclostrobin [water, unspecified]: 3.15e-9 kg; lognormal variance with pedigree 1.11233, pedigree (3,2,2,2,1)
  (same comment as for Atrazine)
- Quizalofop-p-ethyl [water, unspecified]: 3.16e-9 kg; lognormal variance with pedigree 1.11233, pedigree (3,2,2,2,1)
  (same comment as for Atrazine)
- Thiodicarb [water, unspecified]: 7.4e-9 kg; lognormal variance with pedigree 1.11233, pedigree (3,2,2,2,1)
  (same comment as for Atrazine)
- Thiophanate-methyl [water, unspecified]: 1.05e-7 kg; lognormal variance with pedigree 1.11233, pedigree (3,2,2,2,1)
  (same comment as for Atrazine)

## Sampling procedure
The main source of data for agricultural inputs and operations is the ProspecSoy Project, conducted by Embrapa Soja. Data are also provided by relevant experts. Emissions from the agricultural process are estimated using BRCalc/ICVCalc.

## Review by Simone Fazio 2022-07-29
all the review comments have been addressed, solved or better explained
agricultural operations with minor consumption (fertilizer distribution, pesticide application, etc) should be better defined in the future updates, for the sake of precision even if the overall impact don't change significantly
