# treatment of spent anion exchange resin from potable water production, municipal incineration FAE

Dataset: EcoSpold 2, unit process
Geography: CH
Time period: 2006-01-01 to 2023-12-31
Technology level: current
Classification: ISIC rev.4 ecoinvent: 3821:Treatment and disposal of non-hazardous waste
Scenario: Business-as-Usual
System model: Allocation, cut-off by classification
Generated by: Nikolia Stoikou
Database: ecoinvent
isCopyrightProtected: true
accessRestrictedTo: 1

## General comment
The process represents the treatment of 'spent anion exchange resin from potable water production' in a municipal solid waste incinerator (MSWI). Recommended use of this dataset: disposal of used ion exchange resins *for potable water production*. Resins used of other purifications can have significantly more toxic composition, depending on use.Inventoried waste consists of fraction: 100% anion exchange resin f. water; . Waste composition (wet, in ppmw): gross heating value 16.06 MJ/kg; net heating value 6.081 MJ/kg; H2O 499710; O 70320; H 40160; C 327130; S 23980; N 28640; P 10; B na; Cl 7880; Br na; F na; I na; Ag na; As na; Ba na; Cd 1.592; Co na; Cr na; Cu 16.311; Hg na; Mn na; Mo na; Ni na; Pb 9.2482; Sb na; Se na; Sn 226.21; V na; Zn 34.545; Be na; Sc na; Sr na; Ti na; Tl na; W na; Si 1880; Fe na; Ca na; Al na; K na; Mg na; Na na. Share of carbon in initial waste input that is biogenic 0%.Share of metals in waste not oxidised and bulk-recyclable (exclude very small or thin parts) Iron: 0%; Alu: 0%; Copper: 0%.Recovery of metal scrap from bottom ash to recycling: 0g iron scrap, 0g aluminium scrap, 0g copper scrap. From this waste, the FLUWA process in the technology mix recovers 0.00402kg (DM) of a hydroxide sludge to be recycled in zinc furnaces. Net energy production: 0.5MJ/kg electric energy and 1.19MJ/kg thermal energy.

## Included activities start
The activity starts with the waste being available at the gate of the treatment facility. Collection and transportation of the waste to the treatment plant is not included.

## Included activities end
The activity ends with the waste being treated and waste-specific emissions from the incineration process and auxiliary material consumption for flue gas cleaning are released to the environment (air and water). Infrastructure and waste-specific energy demands for Municipal Solid Waste Incineration (MSWI) and net energy generation are included.

## Geography
Modelling parameters affecting the treatment technology are specific to this geography and to the technology mix encountered in Switzerland in 2012.

## Technology
The waste is treated in the incineration plant with flue gas cleaning. Incineration is the controlled combustion of a waste and it includes fly ash extraction (FAE). Auxiliary material consumption for this step of air pollution control (APC) are included in the process. Air polution control includes electrostatic precipitator for fly ash (ESP), wet flue gas scrubber and 25% SNCR , 42.77% SCR-high dust , 32.68% SCR-low dust -DeNOx facilities and 0% without DeNOx (weighted according to mass of burnt waste). Efficiency of iron scrap separation from slag : 58%. Efficiency of aluminium scrap separation from slag : 31%. Efficiency of copper scrap separation from slag : 31%. The technology mix for this dataset includes a filter ash treatment (FLUWA) of a share of 46.22%. Gross electric efficiency technology mix 15.84% and Gross thermal efficiency technology mix 28.51%

## Reference product
- spent anion exchange resin from potable water production: -1 kg; By-product classification Waste; CPC 39990: Other wastes n.e.c.
  main reference product of this activity (supply of disposal service).
  production volume 21442 kg
    based on corresponding global production volume of MSW fraction in conventional MSWI (wo fly ash extraction) and scaled down to annual Swiss incinerated MSW mass of 3.02 mio. tonnes.
  property price 0 EUR2005
    Waste products are assigned a price of zero as they are assumed to require further treatment.
  properties: cadmium content 3.18209e-6, carbon allocation 0.32713 kg, carbon content 0.653883, carbon content, fossil 0.653883, carbon content, non-fossil 0, chlorine content 0.0157509, copper content 3.26032e-5, dry mass 0.500288 kg, heating value, gross 32.1095 MJ, heating value, net 12.1557 MJ, hydrogen content 0.0802738, lead content 1.84857e-5, nitrogen content 0.057247, oxygen content 0.140559, phosphorus content 1.99885e-5, silicon content 0.00375784, sulfur content 0.0479324, tin content 0.000452154, water content 0.998849, water in wet mass 0.499712 kg, wet mass 1 kg, zinc content 6.90507e-5

## Inputs from technosphere
- ammonia, anhydrous, liquid: 0.00351516 kg; lognormal variance with pedigree 0.86341, pedigree (1,1,4,1,1)
  Input to DeNOx stage (100% NH3).
  Uncertainty: uncertainty calculated from uncertainty in average DeNOx input, uncertainty in the share of thermal NOx, uncertainty of nitrogen content in average municipal waste and the uncertainty in nitrogen content in *this* waste.
  properties: dry mass 1 kg, wet mass 1 kg
- bottom ash, MSWI[F], spent anion exchange resin from potable water production: -0.0629334 kg; lognormal variance with pedigree 0.064504, pedigree (1,1,1,1,1)
  waste-specific bottom ash from the incineration of this waste
  Uncertainty: uncertainty is calculated from uncertainties in waste composition and transfer coefficients in incinerator
  production volume
    calculated in proportion to incinerated waste input
  properties: cadmium content 4.88034e-6, carbon content, fossil 0.0308838, chlorine content 0.0024117, copper content 0.000299323, dry mass 0.813788 kg, lead content 0.000126884, nitrogen content 0.00556523, oxygen content 0.602603, phosphorus content 0.000175893, silicon content 0.0348593, sulfur content 0.319851, tin content 0.00291938, water content 0.228822, wet mass 1 kg, zinc content 0.000299755
- chemical, inorganic: 0.000212657 kg; lognormal variance with pedigree 0.18782, pedigree (1,1,4,1,1)
  auxiliary inputs for the wastewater treatment stage of the incinerator plant. Proxy for Polyelectrolyte.
  Uncertainty: uncertainty calculated from uncertainty in average Polyelectrolyte input, of transfer coefficients in the incinerator, and the uncertainty of the waste composition of this waste
  properties: carbon content, fossil 0.003, dry mass 1 kg, wet mass 1 kg
- chromium trioxide, flakes: 4.49456e-6 kg; lognormal variance with pedigree 1.2695, pedigree (1,1,4,1,1)
  Input to DeNOx stage. Active component in SCR catalyst (vanadium pentoxide, V2O5), here approximated with the available chromium trioxide.
  Uncertainty: uncertainty calculated from uncertainty in average DeNOx input, uncertainty in the share of thermal NOx, uncertainty of nitrogen content in average municipal waste and the uncertainty in nitrogen content in *this* waste.
  properties: dry mass 1 kg, wet mass 1 kg
- heat, district or industrial, natural gas: 0.657333 MJ; lognormal variance with pedigree 0.86341, pedigree (1,1,4,1,1)
  Input to DeNOx stage, to heat up flue gas in low-dust SCR.
  Uncertainty: uncertainty calculated from uncertainty in average DeNOx input, uncertainty in the share of thermal NOx, uncertainty of nitrogen content in average municipal waste and the uncertainty in nitrogen content in *this* waste.
  properties: heating value, net 1 MJ
- hydrochloric acid, without water, in 30% solution state: 0.000420472 kg; lognormal variance with pedigree 0.11603, pedigree (1,1,4,1,1)
  auxiliary inputs for the wastewater treatment stage of the incinerator plant.
  Uncertainty: uncertainty calculated from uncertainty in average HCl input, of transfer coefficients in the incinerator, and the uncertainty of the waste composition of this waste
  properties: dry mass 1 kg, heating value, net 3.32 MJ, wet mass 1 kg
- hydrogen peroxide, without water, in 50% solution state: 0.000927912 kg; lognormal variance with pedigree 0.14583, pedigree (1,1,4,1,1)
  auxiliary oxidising agent for filter ash treatment (FLUWA).
  Uncertainty: uncertainty calculated from uncertainty in of transfer coefficients in the incinerator, and the uncertainty of the waste composition of this waste
  properties: dry mass 1 kg, heating value, net 7.13 MJ, wet mass 1 kg
- iron(III) chloride, without water, in 40% solution state: 3.98605e-7 kg; lognormal variance with pedigree 0.74136, pedigree (1,1,4,1,1)
  auxiliary inputs for the wastewater treatment stage of the incinerator plant.
  Uncertainty: uncertainty calculated from uncertainty in average FeCl3 input, of transfer coefficients in the incinerator, and the uncertainty of the waste composition of this waste
  properties: dry mass 1 kg, wet mass 1 kg
- metalliferous hydroxide sludge: -0.0160908 kg; lognormal variance with pedigree 0.058956, pedigree (1,1,1,1,1)
  Metalliferous hydroxide sludge/zinc concentrate from filter ash leaching (FLUWA).
  Uncertainty: uncertainty is calculated from uncertainties in waste composition and transfer coefficients to filter ash in incinerator and the uncertainty of the transfer coefficients of the FLUWA process.
  production volume
    calculated in proportion to incinerated waste input
  properties: calcium content 0.1045, carbon content, fossil 0.00422958, chlorine content 0.047226, dry mass 0.25 kg, fluorine content 0.005, oxygen content 0.580145, potassium content 0.0122, price 0.0042 EUR2005, sodium content 0.0163, sulfur content 0.366583, water content 3, wet mass 1 kg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
  note on calcium content: Calculated as a production volume weighted average of properties of all the metalliferous hydroxide sludge products produced in the database.
- municipal waste incineration facility: 2.5e-10 unit
  Infrastructure demands per kilogram incinerated waste.
- quicklime, milled, packed: 0.00373132 kg; lognormal variance with pedigree 0.47669, pedigree (1,1,4,1,1)
  auxiliary inputs for the flue gas treatment stage of the incinerator plant.
  Uncertainty: uncertainty calculated from uncertainty in average CaO input, of transfer coefficients in the incinerator, and the uncertainty of the waste composition of this waste
  properties: dry mass 0.99 kg, water content 0.010101, wet mass 1 kg
- residues, MSWI[F], spent anion exchange resin from potable water production: -0.0149345 kg; lognormal variance with pedigree 0.059364, pedigree (1,1,1,1,1)
  waste-specific incineration residues (fly ash + scrubber sludge) from the incineration of this waste
  Uncertainty: uncertainty is calculated from uncertainties in waste composition and transfer coefficients in incinerator
  production volume
    calculated in proportion to incinerated waste input
  properties: cadmium content 5.3478e-5, carbon content, fossil 0.0177429, chlorine content 0.0915094, copper content 6.51008e-5, dry mass 1 kg, lead content 0.000172868, nitrogen content 6.22491e-5, oxygen content 0.561179, phosphorus content 5.22896e-5, silicon content 0.00632732, sulfur content 0.316851, tin content 0.00510855, wet mass 1 kg, zinc content 0.000875577
- sodium hydroxide, without water, in 50% solution state: 0.00936494 kg; lognormal variance with pedigree 0.12733, pedigree (1,1,4,1,1)
  auxiliary inputs for the flue gas treatment stage of the incinerator plant, and partially in the filter ash treatment (FLUWA).
  Uncertainty: uncertainty calculated from uncertainty in average NaOH input, of transfer coefficients in the incinerator, and the uncertainty of the waste composition of this waste
  properties: dry mass 1 kg, heating value, net 3.03 MJ, wet mass 1 kg
- titanium dioxide: 0.000220234 kg; lognormal variance with pedigree 1.2695, pedigree (1,1,4,1,1)
  Input to DeNOx stage (TiO2 catalyst carrier)
  Uncertainty: uncertainty calculated from uncertainty in average DeNOx input, uncertainty in the share of thermal NOx, uncertainty of nitrogen content in average municipal waste and the uncertainty in nitrogen content in *this* waste.
  properties: dry mass 1 kg, wet mass 1 kg
- triazine-compound: 2.25373e-7 kg; lognormal variance with pedigree 1.5146, pedigree (1,1,4,1,1)
  auxiliary inputs for the wastewater treatment stage of the incinerator plant. Proxy for (pure) Trisodium-trimercapto-s-triazine (CAS 17766-26-6), used as 15% diluted solution, aka TMT15.
  Uncertainty: uncertainty calculated from uncertainty in average TMT15 input, of transfer coefficients in the incinerator, and the uncertainty of the waste composition of this waste
  properties: carbon content, fossil 0.475616, dry mass 1 kg, wet mass 1 kg
- water, decarbonised: 2.52103 kg; lognormal variance with pedigree 0.74136, pedigree (1,1,4,1,1)
  Incinerator process water used in flue gas scrubber stage.
  Uncertainty: uncertainty calculated from uncertainty in average water input, and the uncertainty of the waste composition of this waste
  properties: wet mass 1 kg

## Inputs from nature
- Oxygen [natural resource, in air]: 2.44769 kg; lognormal variance with pedigree 0.039253, pedigree (1,1,4,1,1)
  oxygen from ambient air needed to combust and oxidise this waste. Net demand, i.e. without O2 leaving the plant in flue gas uncombusted.
  Uncertainty: uncertainty is calculated from uncertainties in waste composition and transfer coefficients to flue gas and solid residues in incinerator

## Emissions to nature
- Ammonia [air, urban air close to ground]: 4.13294e-6 kg; lognormal variance with pedigree 0.92731, pedigree (1,1,4,1,1)
  Nitrogen species emitted to air after DeNOx stage.
  Uncertainty: uncertainty calculated from uncertainty in average N-emissions and uncertainty in the share of thermal NOx and the uncertainty in nitrogen content in *this* waste.
- Benzene [air, urban air close to ground]: 3.19188e-8 kg; lognormal variance with pedigree 0.096757, pedigree (1,1,4,1,1)
  Incomplete combustion product emitted to air.
  Uncertainty: uncertainty calculated from uncertainty in average operation emissions, and the uncertainty of the flue gas volume from this waste.
- Benzo(a)pyrene [air, urban air close to ground]: 7.10296e-13 kg; lognormal variance with pedigree 0.42337, pedigree (1,1,4,1,1)
  (same comment as for Benzene)
- Cadmium II [air, urban air close to ground]: 8.11436e-10 kg; lognormal variance with pedigree 1.5416, pedigree (1,1,4,1,1)
  Emission to air from waste composition and incinerator transfer coefficients.
  Uncertainty: uncertainty is calculated from uncertainties in waste composition and transfer coefficients in incinerator
- Carbon dioxide, fossil [air, urban air close to ground]: 1.19217 kg; lognormal variance with pedigree 0.041912, pedigree (1,1,4,1,1)
  (same comment as for Cadmium II)
- Carbon monoxide, fossil [air, urban air close to ground]: 5.42584e-5 kg; lognormal variance with pedigree 0.81783, pedigree (1,1,4,1,1)
  (same comment as for Benzene)
- Copper ion [air, urban air close to ground]: 1.49393e-9 kg; lognormal variance with pedigree 1.2442, pedigree (1,1,4,1,1)
  (same comment as for Cadmium II)
- Cyanide [air, urban air close to ground]: 9.17705e-5 kg; lognormal variance with pedigree 1.0285, pedigree (1,1,4,1,1)
  (same comment as for Ammonia)
- Dinitrogen monoxide [air, urban air close to ground]: 0.000427156 kg; lognormal variance with pedigree 1.0285, pedigree (1,1,4,1,1)
  (same comment as for Ammonia)
- Dioxins, measured as 2,3,7,8-tetrachlorodibenzo-p-dioxin [air, urban air close to ground]: 6.38334e-14 kg; lognormal variance with pedigree 0.42337, pedigree (1,1,4,1,1)
  (same comment as for Benzene)
- Heat, waste [air, urban air close to ground]: 11.8723 MJ; lognormal variance with pedigree 0.048453, pedigree (1,1,4,1,1)
  Waste heat generated from heating value of this waste plus any electricity required to process it.
  Uncertainty: uncertainty is calculated from uncertainties in waste composition and uncertainties in energy efficiency and the uncertainty in internal energy demand
- Hexachlorobenzene [air, urban air close to ground]: 6.67406e-11 kg; lognormal variance with pedigree 0.096757, pedigree (1,1,4,1,1)
  (same comment as for Benzene)
- Hydrochloric acid [air, urban air close to ground]: 4.49676e-6 kg; lognormal variance with pedigree 0.42742, pedigree (1,1,4,1,1)
  (same comment as for Cadmium II)
- Lead II [air, urban air close to ground]: 7.61912e-10 kg; lognormal variance with pedigree 1.3245, pedigree (1,1,4,1,1)
  (same comment as for Cadmium II)
- Methane, fossil [air, urban air close to ground]: 4.78783e-7 kg; lognormal variance with pedigree 0.096757, pedigree (1,1,4,1,1)
  (same comment as for Benzene)
- NMVOC, non-methane volatile organic compounds [air, urban air close to ground]: 1.45262e-6 kg; lognormal variance with pedigree 0.096757, pedigree (1,1,4,1,1)
  (same comment as for Benzene)
- Nitrogen oxides [air, urban air close to ground]: 0.00130876 kg; lognormal variance with pedigree 0.92731, pedigree (1,1,4,1,1)
  sum of fuel-NOx and thermal-NOx emitted to air after DeNOx stage.
  Uncertainty: uncertainty calculated from uncertainty in average N-emissions and uncertainty in the share of thermal NOx and the uncertainty in nitrogen content in *this* waste.
- Particulate Matter, < 2.5 um [air, urban air close to ground]: 3.81085e-6 kg; lognormal variance with pedigree 0.42337, pedigree (1,1,4,1,1)
  (same comment as for Benzene)
- Particulate Matter, > 2.5 um and < 10um [air, urban air close to ground]: 1.915e-8 kg; lognormal variance with pedigree 0.20315, pedigree (1,1,4,1,1)
  (same comment as for Benzene)
- Pentachlorobenzene [air, urban air close to ground]: 1.68638e-10 kg; lognormal variance with pedigree 0.096757, pedigree (1,1,4,1,1)
  (same comment as for Benzene)
- Pentachlorophenol [air, urban air close to ground]: 1.39002e-11 kg; lognormal variance with pedigree 0.096757, pedigree (1,1,4,1,1)
  (same comment as for Benzene)
- Phosphorus [air, urban air close to ground]: 1.01624e-8 kg; lognormal variance with pedigree 1.2954, pedigree (1,1,4,1,1)
  (same comment as for Cadmium II)
- Silicon [air, urban air close to ground]: 2.92814e-9 kg; lognormal variance with pedigree 0.65121, pedigree (1,1,4,1,1)
  (same comment as for Cadmium II)
- Sulfur dioxide [air, urban air close to ground]: 0.000255015 kg; lognormal variance with pedigree 0.28599, pedigree (1,1,4,1,1)
  (same comment as for Cadmium II)
- Tin ion [air, urban air close to ground]: 1.4776e-10 kg; lognormal variance with pedigree 0.9357, pedigree (1,1,4,1,1)
  (same comment as for Cadmium II)
- Toluene [air, urban air close to ground]: 6.38377e-8 kg; lognormal variance with pedigree 0.096757, pedigree (1,1,4,1,1)
  (same comment as for Benzene)
- Water [air, urban air close to ground]: 0.00247522 m3; lognormal variance with pedigree 2.8462, pedigree (1,1,4,1,1)
  water vapour from waste humidity, hydrogen oxidation and part of the process water.
  Uncertainty: Uncertainty calculated from uncertainty in waste composition, process water input and the uncertainty of fraction to air.
- Zinc II [air, urban air close to ground]: 2.31545e-8 kg; lognormal variance with pedigree 1.1343, pedigree (1,1,4,1,1)
  (same comment as for Cadmium II)
- Non-hazardous waste disposed [inventory indicator, waste]: 1 kg
  Inventory indicator for waste mass disposed. To be used in EN15804 "other data" results.
- BOD5, Biological Oxygen Demand [water, surface water]: 0.00024078 kg; lognormal variance with pedigree 0.049808, pedigree (1,1,4,1,1)
  Emissions to water from waste composition and incinerator transfer coefficients.
  Uncertainty: uncertainty is calculated from uncertainties in waste composition and transfer coefficients in incinerator
- COD, Chemical Oxygen Demand [water, surface water]: 0.00024078 kg; lognormal variance with pedigree 0.049808, pedigree (1,1,4,1,1)
  (same comment as for BOD5, Biological Oxygen Demand)
- Cadmium II [water, surface water]: 1.45311e-10 kg; lognormal variance with pedigree 1.1409, pedigree (1,1,4,1,1)
  (same comment as for BOD5, Biological Oxygen Demand)
- Chloride [water, surface water]: 0.00619549 kg; lognormal variance with pedigree 0.17752, pedigree (1,1,4,1,1)
  (same comment as for BOD5, Biological Oxygen Demand)
- Copper ion [water, surface water]: 8.1638e-10 kg; lognormal variance with pedigree 1.2235, pedigree (1,1,4,1,1)
  (same comment as for BOD5, Biological Oxygen Demand)
- DOC, Dissolved Organic Carbon [water, surface water]: 0.000105341 kg; lognormal variance with pedigree 0.049808, pedigree (1,1,4,1,1)
  (same comment as for BOD5, Biological Oxygen Demand)
- Heat, waste [water, surface water]: 3.69032 MJ; lognormal variance with pedigree 0.048453, pedigree (1,1,4,1,1)
  (same comment as for Heat, waste)
- Lead II [water, surface water]: 4.8878e-10 kg; lognormal variance with pedigree 1.1017, pedigree (1,1,4,1,1)
  (same comment as for BOD5, Biological Oxygen Demand)
- Nitrate [water, surface water]: 0.000128828 kg; lognormal variance with pedigree 0.144, pedigree (1,1,4,1,1)
  (same comment as for BOD5, Biological Oxygen Demand)
- Phosphate [water, surface water]: 1.33881e-8 kg; lognormal variance with pedigree 0.80116, pedigree (1,1,4,1,1)
  (same comment as for BOD5, Biological Oxygen Demand)
- Silicon [water, surface water]: 1.01169e-7 kg; lognormal variance with pedigree 0.38155, pedigree (1,1,4,1,1)
  (same comment as for BOD5, Biological Oxygen Demand)
- Sulfate [water, surface water]: 0.0037946 kg; lognormal variance with pedigree 0.20176, pedigree (1,1,4,1,1)
  (same comment as for BOD5, Biological Oxygen Demand)
- TOC, Total Organic Carbon [water, surface water]: 0.000105341 kg; lognormal variance with pedigree 0.049808, pedigree (1,1,4,1,1)
  (same comment as for BOD5, Biological Oxygen Demand)
- Tin ion [water, surface water]: 1.99671e-7 kg; lognormal variance with pedigree 0.82784, pedigree (1,1,4,1,1)
  (same comment as for BOD5, Biological Oxygen Demand)
- Water [water, surface water]: 0.000863077 m3; lognormal variance with pedigree 3.0388, pedigree (1,1,4,1,1)
  process water released to surface water.
  Uncertainty: uncertainty calculated from uncertainty in process water input and the uncertainty of fraction to surface water.
- Zinc II [water, surface water]: 1.38564e-9 kg; lognormal variance with pedigree 1.0161, pedigree (1,1,4,1,1)
  (same comment as for BOD5, Biological Oxygen Demand)
