# transmission network construction, electricity, high voltage direct current aerial line

Dataset: EcoSpold 2, unit process
Geography: RoW
Time period: 1998-01-01 to 2023-12-31
Technology level: current
Classification: EcoSpold01Categories: electricity/distribution
Classification: ISIC rev.4 ecoinvent: 4220:Construction of utility projects
Synonyms: HVDC aerial line; high voltage direct current overhead line; HVDC overhead line
Scenario: Business-as-Usual
System model: Allocation, cut-off by classification
Generated by: Heidi Hottenroth
Published in: Jorge, R. 2012
Database: ecoinvent
isCopyrightProtected: true
accessRestrictedTo: 1

## General comment
This dataset represents the construction and decommissioning of 1 km transmission network high voltage direct current aerial line. The service life of the network was assumed to be 40 years. For this period also maintenance is considered as a service. Default value for power losses at 50 % load sum up to 2.14E8 kWh/km. Recycling was modelled according to the ecoivnent quality guideline.
The inventory was modelled according to Jorge, R., Hawkins, T.R., Hertwich, E.G (2012): Life cycle assessment of electricity transmission and distribution - part 1: power lines and cables. Int J Life Cycle Assess 17: 9-15, supplementary material

## Included activities start
The activity starts with cable and mast production according to material composition (energy requirements for cable and mast production not included). Maintenance is included as a service. Substations are not included.

## Included activities end
This activity ends with the decommissioning of transmission network according to material composition.

## Geography
The scope of the underlying literature source is Europe. Uncertainty was adjusted accordingly.

## Technology
The voltage level is assumed to be 250 or 350 kV, respectively.

## Time period
Time frame of the underlying literature sources

## Parameters
- lifetime: 40 year

## Reference product
- transmission network, electricity, high voltage direct current aerial line: 1 km; name RP; By-product classification allocatable product; CPC 53242: Long-distance communication and power lines (cables)
  transmission network high voltage direct current aerial line.The voltage level is assumed to be 250 or 350 kV, respectively. Default value for power losses at 50 % load sum up to 2.14E8 kWh/km. The service life of the network was assumed to be 40 years.
  production volume 19453 km; name PV_RP
    calculated according to https://en.wikipedia.org/wiki/List_of_HVDC_projectsretrieved on 09.10.2020
    Global length of aerial lines in the years 1992-2012
  property lifetime 40 year; name RP_lifetime
  properties: carbon allocation 0 kg, carbon content 0, price 55195.5 EUR2005

## Inputs from technosphere
- aluminium scrap, post-consumer: -7414.2 kg; name BP_alu; = alu*0.9; lognormal variance with pedigree 0.0152, pedigree (3,3,3,5,3)
  Waste flow for aluminium generated through dismantling of the transmission network. 90 % Recycling is assumed by the original source. Based on the amount of the corresponding material inputs.
  production volume; = abs(BP_alu/RP) * PV_RP
    Calculated from production volume of reference product using the relative outputs.
  properties: dry mass 1 kg, price 0.685 EUR2005, wet mass 1 kg
- aluminium, wrought alloy: 8238 kg; name alu; = 7960+278; lognormal variance with pedigree 0.0132, pedigree (3,3,4,5,1)
  Literature Value. for conductors (7960 kg) and earth conductor (278 kg). Processing unknown
  properties: dry mass 1 kg, wet mass 1 kg
- cast iron: 10500 kg; name iron; lognormal variance with pedigree 0.0132, pedigree (3,3,4,5,1)
  Literature Value. for foundation
  property carbon content, fossil 0.04; name CCF_iron
  properties: dry mass 1 kg, wet mass 1 kg
  note on carbon content, fossil: Cast iron is made by remelting pig iron in small furnaces (e.g. cupola furnaces or electric arc furnaces) and poured into moulds to make castings. It usually contains 2% to 6% carbon (ecoinvent v2.2 report 10_partII). An average content of 4% was considered
- cement, unspecified: 1.47559, 0.0381261, 0.89923, 5.60394, 0.175901, 0.128576, 0.0696845, 0.138498, 0.211739, 56.2587 kg (10 suppliers, which the file names only by identifier); sum of these 65 kg; lognormal variance with pedigree 0.0132, pedigree (3,3,4,5,1)
  Literature Value. for insulator
  properties: dry mass 1 kg, wet mass 1 kg
- concrete, normal strength: 0.989697, 0.217333, 0.141363, 4.19109, 1.75946, 2.08575, 74.6153 m3 (7 suppliers, which the file names only by identifier); sum of these 84 m3; lognormal variance with pedigree 0.0132, pedigree (3,3,4,5,1)
  Literature Value. for foundation
  properties: dry mass 2190 kg, water content 0.086758, wet mass 2380 kg
- diesel, burned in agricultural machinery: 37400 MJ; lognormal variance with pedigree 0.0132, pedigree (3,3,4,5,1)
  Literature Value. for tractor use of 100 h with 10 l/h; diesel 37.4 MJ/l
- glass tube, borosilicate: 1380 kg; name glass; lognormal variance with pedigree 0.0132, pedigree (3,3,4,5,1)
  Literature Value. for insulator
  properties: dry mass 1 kg, wet mass 1 kg
- inert waste, for final disposal: -65 kg; name BP_iwaste; = cement; lognormal variance with pedigree 0.0152, pedigree (3,3,3,5,3)
  Waste generated through dismantling of the transmission network. Based on the amount of the corresponding material inputs.
  production volume; = abs(BP_iwaste/RP) * PV_RP
    Calculated from production volume of reference product using the relative outputs.
  properties: dry mass 0.995 kg, water content 0.00502513, wet mass 1 kg
- iron scrap, unsorted: -28587.6 kg; name BP_iron_scrap; = (steel_low + iron + steel_un)*0.9; lognormal variance with pedigree 0.0152, pedigree (3,3,3,5,3)
  Proxy for iron and steel scrap generated through dismantling of the transmission network. 90 % Recycling is assumed by the original source. Based on the amount of the corresponding material inputs.
  production volume; = abs(BP_iron_scrap/RP) * PV_RP
    Calculated from production volume of reference product using the relative outputs.
  properties: carbon content, fossil 0.0152002, dry mass 1 kg, price 0.149 EUR2005, wet mass 1 kg
- lubricating oil: 131 kg; name oil; = 14+117; lognormal variance with pedigree 0.0132, pedigree (3,3,4,5,1)
  Calculated Value. 14 kg for earth conductor, substitution for mineral fat // 117 kg for conductor, substitution for mineral fat
  properties: carbon content, fossil 0.75, dry mass 1 kg, wet mass 1 kg
  note on carbon content, fossil: Lubricating oil is produced from diesel. C-content/dry mass of fats and oils considered 75%, from: ecoinvent v2.2 report, n 15a, pg 40
- maintenance, transmission network, electricity, high voltage direct current aerial line: 40 km*year; = lifetime; lognormal variance with pedigree 0.0192, pedigree (4,3,4,5,1)
  Literature value
- scrap steel: -3176.4 kg; name BP_scrap_steel; = (steel_low + iron + steel_un)*0.1; lognormal variance with pedigree 0.0152, pedigree (3,3,3,5,3)
  Waste flow for iron and steel generated through dismantling of the transmission network.10% going to landfill is assumed by the original source. Based on the amount of the corresponding material inputs.
  production volume; = abs(BP_scrap_steel/RP) * PV_RP
    Calculated from production volume of reference product using the relative outputs.
  properties: dry mass 1 kg, wet mass 1 kg
- steel, low-alloyed: 3864 kg; name steel_low; = 464+2800+600; lognormal variance with pedigree 0.0132, pedigree (3,3,4,5,1)
  Calculated Value. 464 kg for earth conductor // 2800 kg for conductor // 600 kg for insulator
  property carbon content, fossil 0.005; name CCF_steel_low
  properties: dry mass 1 kg, wet mass 1 kg
- steel, unalloyed: 17400 kg; name steel_un; lognormal variance with pedigree 0.0132, pedigree (3,3,4,5,1)
  Literature Value. 1,74E4 kg for masts. Processing unknown
  property carbon content, fossil 0.0025; name CCF_steel_un
  properties: dry mass 1 kg, wet mass 1 kg
- waste aluminium: -823.8 kg; name BP_waste_alu; = alu*0.1; lognormal variance with pedigree 0.0152, pedigree (3,3,3,5,3)
  Waste flow for aluminium generated through dismantling of the transmission network.10% going to landfill is assumed by the original source. Based on the amount of the corresponding material inputs.
  production volume; = abs(BP_waste_alu/RP) * PV_RP
    Calculated from production volume of reference product using the relative outputs.
  properties: dry mass 1 kg, wet mass 1 kg
- waste concrete: -199920 kg; name BP_concrete; = concrete * WM_concrete; lognormal variance with pedigree 0.0152, pedigree (3,3,3,5,3)
  (same comment as for inert waste, for final disposal)
  production volume; = abs(BP_concrete/RP)*PV_RP
    Calculated from production volume of reference product using the relative outputs.
  property wet mass 1.08679 kg; name WM_waste_concrete
  properties: dry mass 1 kg, water content 0.08679
- waste glass: -0.455672, -1379.47, -0.00391838, -0.0419983, -0.0175333, -0.000952799, -0.00595028 kg (7 suppliers, which the file names only by identifier); sum of these -1380 kg; = glass; lognormal variance with pedigree 0.0152, pedigree (3,3,3,5,3)
  (same comment as for inert waste, for final disposal)
  production volume; = abs(BP_glass/RP) * PV_RP
    Calculated from production volume of reference product using the relative outputs.
  properties: dry mass 1 kg, wet mass 1 kg
- waste mineral oil: -131 kg; name BP_oil; = oil; lognormal variance with pedigree 0.0152, pedigree (3,3,3,5,3)
  (same comment as for inert waste, for final disposal)
  production volume; = abs(BP_oil/RP) * PV_RP
    Calculated from production volume of reference product using the relative outputs.
  properties: carbon content, fossil 0.864444, dry mass 0.9 kg, water content 0.111111, wet mass 1 kg
  note on carbon content, fossil: Tab A.6, ecoinvent v2.2 report 13_I. C content has been calculated after data in the tables, and then referred to 1 kg DM
- zinc: 520 kg; lognormal variance with pedigree 0.0132, pedigree (3,3,4,5,1)
  Literature Value. for masts
  properties: dry mass 1 kg, wet mass 1 kg
- zinc scrap, post-consumer: -520 kg; name BP_zinc; = zinc; lognormal variance with pedigree 0.0152, pedigree (3,3,3,5,3)
  Waste generated through dismantling of the transmission network. Recycling is assumed by the original source. Based on the amount of the corresponding material inputs.
  production volume; = abs(BP_zinc/RP) * PV_RP
    Calculated from production volume of reference product using the relative outputs.
  properties: dry mass 1 kg, price 0.55 EUR2005, wet mass 1 kg, zinc content 1

## Inputs from nature
- Occupation, industrial area [natural resource, land]: 1676 m2*year; = transformation*lifetime
  Calculated Value.
- Transformation, from annual crop [natural resource, land]: 23.3 m2; lognormal variance with pedigree 0.33, pedigree (5,5,5,5,5)
  Estimate according to dataset transmission network construction, electricity, high voltage - CH
- Transformation, from forest, unspecified [natural resource, land]: 18.6 m2; lognormal variance with pedigree 0.25, pedigree (5,5,5,5,5)
  (same comment as for Transformation, from annual crop)
- Transformation, to industrial area [natural resource, land]: 41.9 m2; name transformation; lognormal variance with pedigree 0.33, pedigree (5,5,5,5,5)
  (same comment as for Transformation, from annual crop)

## Sampling procedure
LCI data on resource use and emissions for production of materials, installation, maintenance, and end of life were provided by the Danish utility company Energinet.dk. No data referring to line manufacturing (assembly of components) were available, and hence this process was not included.
