# treatment of residues, MSWI, used LCD module, residual material landfill

Dataset: EcoSpold 2, unit process
Geography: GLO
Time period: 1994-01-01 to 2023-12-31
Technology level: current
Classification: ISIC rev.4 ecoinvent: 3822:Treatment and disposal of hazardous waste
Scenario: Business-as-Usual
System model: Allocation, cut-off by classification
Generated by: Nikolia Stoikou
Database: ecoinvent
isCopyrightProtected: true
accessRestrictedTo: 1

## General comment
The process represents the treatment of controlled landfilling in residual material landfill of a waste (residues) that is exclusively produced in another waste treatment. Residues are a by-product that is generated during the municipal solid waste incineration (MSWI) of 'used liquid crystal display module'. Recommended use of this dataset: to be used within the specific chain of treatments for 'used liquid crystal display module'. Share of biogenic carbon in the sludge: 0%.

## Included activities start
The activity starts with the waste being available at the gate of the treatment facility. Collection and transportation of the waste to the treatment plant is not included.

## Included activities end
The activity ends with the waste being treated and waste-specific emissions from the landfill are released to water (short-term emissions to river water and long-term emissions to ground water).

## Geography
Modelling parameters affecting the treatment technology are not specific to this geography.

## Technology
Residual material landfill for polluted, inorganic waste with base seal and leachate collection system (landfill type C). Recultivation after closure.

## Reference product
- residues, MSWI, used LCD module: -1 kg; By-product classification Waste; CPC 39320: Ash and residue (except from the manufacture of iron or steel), containing metals or metallic compounds, excep[…]; HS2017 262110: Slag and ash; ash and residues from the incineration of municipal waste
  main reference product of this activity (supply of disposal service).
  production volume 3.10898e6 kg
    calculated in proportion to incinerated waste reference product
  property price 0 EUR2005
    Waste products are assigned a price of zero as they are assumed to require further treatment.
  properties: aluminium content 0.0133608, antimony content 0.0090408, arsenic content 7.43645e-6, barium content 0.000327931, beryllium content 8.9586e-8, boron content 8.19134e-8, bromine content 0.00386058, cadmium content 0.000813315, calcium content 0.025451, carbon allocation 0.00785547 kg, carbon content 0.00785547, carbon content, fossil 0.00785547, carbon content, non-fossil 0, chlorine content 0.0360685, chromium content 0.00262463, cobalt content 9.34341e-6, copper content 0.165929, dry mass 1 kg, fluorine content 0.000510466, iron content 0.0142239, lead content 0.184385, magnesium content 2.06425e-5, manganese content 0.00225694, mercury content 1.26163e-5, molybdenum content 1.10222e-5, nickel content 0.00939459, nitrogen content 6.31182e-6, oxygen content 0.205931, phosphorus content 0.000554112, potassium content 0.0459437, selenium content 2.68458e-6, silicon content 0.000467001, silver content 0.000899985, sodium content 0.000126551, strontium content 1.06454e-7, sulfur content 0.0030979, thallium content 3.47986e-7, tin content 0.116516, titanium content 0.00137154, vanadium content 5.93248e-7, water content 0, water in wet mass 0 kg, wet mass 1 kg, zinc content 0.148919

## Inputs from technosphere
- cement, unspecified: 0.4 kg; lognormal variance with pedigree 0.049084, pedigree (1,1,5,1,1)
  cement required for solidification of landfilled residual material
  Uncertainty: Uncertainty calculated from uncertainty of composition of incinerated waste, and incinerator model uncertainty and residual material landfill transfer coefficient uncertainty.
  properties: dry mass 1 kg, wet mass 1 kg
- process-specific burdens, residual material landfill: 0.71109, 0.00841689, 0.280494 kg (3 suppliers, which the file names only by identifier); sum of these 1 kg
  mass-specific expenditures required for landfilling of residual material
- residual material landfill: 2.0833e-9 unit
  residual material landfill infrastructure required for landfilling of residual material
- waste cement, hydrated: -4.81263e-5, -0.998037, -0.00191494 kg (3 suppliers, which the file names only by identifier); sum of these -1 kg
  hydrated cement output for solidification of landfilled residual material
  production volume
    calculated in proportion to incineration residues landfilled
  properties: dry mass 1 kg, wet mass 1 kg

## Inputs from nature
- Organic carbon, placed in landfill [inventory indicator, waste]: 0.0078555 kg; lognormal variance with pedigree 0.086933, pedigree (1,1,5,1,1)
  Mass of organic carbon in waste (without inorganic carbon), initially put in residual material landfill. The exchange represents a flow that is within the technosphere. This exchange should only be used to apply ecofactors for the Swiss LCIA method of Ecological Scarcity and not any other purpose.
  Uncertainty: Uncertainty calculated from uncertainty of composition of incinerated waste, and incinerator model uncertainty and residual material landfill transfer coefficient uncertainty.
- Waste mass, total, placed in landfill [inventory indicator, waste]: 1 kg
  Mass of waste initially put in a residual material landfill. The exchange represents a flow that is within the technosphere. This exchange should only be used to apply ecofactors for the Swiss LCIA method of Ecological Scarcity and not any other purpose.

## Emissions to nature
- Hazardous waste disposed [inventory indicator, waste]: 1 kg
  Inventory indicator for waste mass disposed. To be used in EN15804 "other data" results.
- Aluminium III [water, ground-, long-term]: 0.0039662 kg; lognormal variance with pedigree 0.81725, pedigree (1,1,5,1,1)
  complement of long-term emissions from residual material in residual material landfill
  Uncertainty: Uncertainty calculated from uncertainty of composition of incinerated waste, and incinerator model uncertainty and residual material landfill transfer coefficient uncertainty.
- Aluminium III [water, surface water]: 6.6213e-6 kg; lognormal variance with pedigree 1.1929, pedigree (1,1,5,1,1)
  short-term emissions from residual material in residual material landfill
  Uncertainty: Uncertainty calculated from uncertainty of composition of incinerated waste, and incinerator model uncertainty and residual material landfill transfer coefficient uncertainty.
- Antimony ion [water, ground-, long-term]: 0.0058525 kg; lognormal variance with pedigree 0.90566, pedigree (1,1,5,1,1)
  (same comment as for Aluminium III)
- Antimony ion [water, surface water]: 0.0031883 kg; lognormal variance with pedigree 0.92981, pedigree (1,1,5,1,1)
  (same comment as for Aluminium III)
- Arsenic ion [water, ground-, long-term]: 7.4365e-15 kg; lognormal variance with pedigree 1.7116, pedigree (1,1,5,1,1)
  (same comment as for Aluminium III)
- Arsenic ion [water, surface water]: 7.4365e-6 kg; lognormal variance with pedigree 1.688, pedigree (1,1,5,1,1)
  (same comment as for Aluminium III)
- BOD5, Biological Oxygen Demand [water, ground-, long-term]: 0.0041965 kg; lognormal variance with pedigree 0.134533, pedigree (1,1,5,1,1)
  (same comment as for Aluminium III)
- BOD5, Biological Oxygen Demand [water, surface water]: 7.0058e-6 kg; lognormal variance with pedigree 0.72994, pedigree (1,1,5,1,1)
  (same comment as for Aluminium III)
- Barium II [water, ground-, long-term]: 2.7088e-6 kg; lognormal variance with pedigree 6.6759, pedigree (1,1,5,1,1)
  (same comment as for Aluminium III)
- Barium II [water, surface water]: 4.5222e-9 kg; lognormal variance with pedigree 2.1423, pedigree (1,1,5,1,1)
  (same comment as for Aluminium III)
- Beryllium II [water, ground-, long-term]: 3.2433e-8 kg; lognormal variance with pedigree 1.749, pedigree (1,1,5,1,1)
  (same comment as for Aluminium III)
- Beryllium II [water, surface water]: 5.4146e-11 kg; lognormal variance with pedigree 2.2094, pedigree (1,1,5,1,1)
  (same comment as for Aluminium III)
- Boron [water, ground-, long-term]: 8.0541e-8 kg; lognormal variance with pedigree 1.5081, pedigree (1,1,5,1,1)
  (same comment as for Aluminium III)
- Boron [water, surface water]: 6.418e-10 kg; lognormal variance with pedigree 1.9017, pedigree (1,1,5,1,1)
  (same comment as for Aluminium III)
- Bromine [water, ground-, long-term]: 0.00075937 kg; lognormal variance with pedigree 0.95061, pedigree (1,1,5,1,1)
  (same comment as for Aluminium III)
- Bromine [water, surface water]: 0.0031012 kg; lognormal variance with pedigree 0.9345, pedigree (1,1,5,1,1)
  (same comment as for Aluminium III)
- COD, Chemical Oxygen Demand [water, ground-, long-term]: 0.012829 kg; lognormal variance with pedigree 0.134533, pedigree (1,1,5,1,1)
  (same comment as for Aluminium III)
- COD, Chemical Oxygen Demand [water, surface water]: 2.1418e-5 kg; lognormal variance with pedigree 0.72994, pedigree (1,1,5,1,1)
  (same comment as for Aluminium III)
- Cadmium II [water, ground-, long-term]: 5.5215e-6 kg; lognormal variance with pedigree 7.4638, pedigree (1,1,5,1,1)
  (same comment as for Aluminium III)
- Cadmium II [water, surface water]: 9.2179e-9 kg; lognormal variance with pedigree 2.476, pedigree (1,1,5,1,1)
  (same comment as for Aluminium III)
- Calcium II [water, ground-, long-term]: 0.0022997 kg; lognormal variance with pedigree 1.5322, pedigree (1,1,5,1,1)
  (same comment as for Aluminium III)
- Calcium II [water, surface water]: 3.8392e-6 kg; lognormal variance with pedigree 0.98855, pedigree (1,1,5,1,1)
  (same comment as for Aluminium III)
- Chloride [water, ground-, long-term]: 0.025753 kg; lognormal variance with pedigree 0.58653, pedigree (1,1,5,1,1)
  (same comment as for Aluminium III)
- Chloride [water, surface water]: 0.010316 kg; lognormal variance with pedigree 0.62388, pedigree (1,1,5,1,1)
  (same comment as for Aluminium III)
- Chromium VI [water, ground-, long-term]: 0.00049838 kg; lognormal variance with pedigree 0.72481, pedigree (1,1,5,1,1)
  (same comment as for Aluminium III)
- Chromium VI [water, surface water]: 0.00015777 kg; lognormal variance with pedigree 0.88586, pedigree (1,1,5,1,1)
  (same comment as for Aluminium III)
- Cobalt II [water, ground-, long-term]: 1.5974e-6 kg; lognormal variance with pedigree 2.0442, pedigree (1,1,5,1,1)
  (same comment as for Aluminium III)
- Cobalt II [water, surface water]: 2.6667e-9 kg; lognormal variance with pedigree 2.0812, pedigree (1,1,5,1,1)
  (same comment as for Aluminium III)
- Copper ion [water, ground-, long-term]: 0.0063874 kg; lognormal variance with pedigree 2.8853, pedigree (1,1,5,1,1)
  (same comment as for Aluminium III)
- Copper ion [water, surface water]: 1.0663e-5 kg; lognormal variance with pedigree 1.247, pedigree (1,1,5,1,1)
  (same comment as for Aluminium III)
- DOC, Dissolved Organic Carbon [water, ground-, long-term]: 0.0050766 kg; lognormal variance with pedigree 0.134533, pedigree (1,1,5,1,1)
  (same comment as for Aluminium III)
- DOC, Dissolved Organic Carbon [water, surface water]: 8.4752e-6 kg; lognormal variance with pedigree 0.72994, pedigree (1,1,5,1,1)
  (same comment as for Aluminium III)
- Fluoride [water, ground-, long-term]: 0.0004828 kg; lognormal variance with pedigree 1.0884, pedigree (1,1,5,1,1)
  (same comment as for Aluminium III)
- Fluoride [water, surface water]: 2.7663e-5 kg; lognormal variance with pedigree 1.2661, pedigree (1,1,5,1,1)
  (same comment as for Aluminium III)
- Iron ion [water, ground-, long-term]: 7.129e-5 kg; lognormal variance with pedigree 7.3934, pedigree (1,1,5,1,1)
  (same comment as for Aluminium III)
- Iron ion [water, surface water]: 1.1901e-7 kg; lognormal variance with pedigree 1.665, pedigree (1,1,5,1,1)
  (same comment as for Aluminium III)
- Lead II [water, ground-, long-term]: 0.00095642 kg; lognormal variance with pedigree 7.359, pedigree (1,1,5,1,1)
  (same comment as for Aluminium III)
- Lead II [water, surface water]: 1.5967e-6 kg; lognormal variance with pedigree 1.7168, pedigree (1,1,5,1,1)
  (same comment as for Aluminium III)
- Magnesium [water, ground-, long-term]: 2.3455e-6 kg; lognormal variance with pedigree 2.2883, pedigree (1,1,5,1,1)
  (same comment as for Aluminium III)
- Magnesium [water, surface water]: 3.9156e-9 kg; lognormal variance with pedigree 1.9767, pedigree (1,1,5,1,1)
  (same comment as for Aluminium III)
- Manganese II [water, ground-, long-term]: 1.8643e-5 kg; lognormal variance with pedigree 6.6193, pedigree (1,1,5,1,1)
  (same comment as for Aluminium III)
- Manganese II [water, surface water]: 3.1124e-8 kg; lognormal variance with pedigree 2.0858, pedigree (1,1,5,1,1)
  (same comment as for Aluminium III)
- Mercury II [water, ground-, long-term]: 5.9551e-7 kg; lognormal variance with pedigree 3.6035, pedigree (1,1,5,1,1)
  (same comment as for Aluminium III)
- Mercury II [water, surface water]: 9.9418e-10 kg; lognormal variance with pedigree 2.2599, pedigree (1,1,5,1,1)
  (same comment as for Aluminium III)
- Molybdenum VI [water, ground-, long-term]: 5.0603e-8 kg; lognormal variance with pedigree 1.381, pedigree (1,1,5,1,1)
  (same comment as for Aluminium III)
- Molybdenum VI [water, surface water]: 1.0972e-5 kg; lognormal variance with pedigree 1.3575, pedigree (1,1,5,1,1)
  (same comment as for Aluminium III)
- Nickel II [water, ground-, long-term]: 0.0034012 kg; lognormal variance with pedigree 0.59007, pedigree (1,1,5,1,1)
  (same comment as for Aluminium III)
- Nickel II [water, surface water]: 5.6781e-6 kg; lognormal variance with pedigree 1.0505, pedigree (1,1,5,1,1)
  (same comment as for Aluminium III)
- Nitrate [water, ground-, long-term]: 2.2674e-5 kg; lognormal variance with pedigree 0.6462, pedigree (1,1,5,1,1)
  (same comment as for Aluminium III)
- Nitrate [water, surface water]: 5.2783e-6 kg; lognormal variance with pedigree 0.71299, pedigree (1,1,5,1,1)
  (same comment as for Aluminium III)
- Phosphate [water, ground-, long-term]: 0.00037957 kg; lognormal variance with pedigree 1.3191, pedigree (1,1,5,1,1)
  (same comment as for Aluminium III)
- Phosphate [water, surface water]: 6.3368e-7 kg; lognormal variance with pedigree 1.5397, pedigree (1,1,5,1,1)
  (same comment as for Aluminium III)
- Potassium I [water, ground-, long-term]: 0.032993 kg; lognormal variance with pedigree 0.51233, pedigree (1,1,5,1,1)
  (same comment as for Aluminium III)
- Potassium I [water, surface water]: 0.012951 kg; lognormal variance with pedigree 0.55064, pedigree (1,1,5,1,1)
  (same comment as for Aluminium III)
- Selenium IV [water, ground-, long-term]: 1.7378e-6 kg; lognormal variance with pedigree 1.535, pedigree (1,1,5,1,1)
  (same comment as for Aluminium III)
- Selenium IV [water, surface water]: 9.4674e-7 kg; lognormal variance with pedigree 1.5591, pedigree (1,1,5,1,1)
  (same comment as for Aluminium III)
- Silicon [water, ground-, long-term]: 0.00046595 kg
  complement of long-term emissions from residual material in residual material landfill
- Silicon [water, surface water]: 1.0503e-6 kg; lognormal variance with pedigree 0.5804, pedigree (1,1,5,1,1)
  (same comment as for Aluminium III)
- Silver I [water, ground-, long-term]: 3.4644e-5 kg; lognormal variance with pedigree 3.7481, pedigree (1,1,5,1,1)
  (same comment as for Aluminium III)
- Silver I [water, surface water]: 5.7837e-8 kg; lognormal variance with pedigree 2.1098, pedigree (1,1,5,1,1)
  (same comment as for Aluminium III)
- Sodium I [water, ground-, long-term]: 7.9059e-5 kg; lognormal variance with pedigree 0.130355, pedigree (1,1,5,1,1)
  (same comment as for Aluminium III)
- Sodium I [water, surface water]: 4.7492e-5 kg; lognormal variance with pedigree 0.15081, pedigree (1,1,5,1,1)
  (same comment as for Aluminium III)
- Strontium II [water, ground-, long-term]: 3.854e-8 kg; lognormal variance with pedigree 1.7811, pedigree (1,1,5,1,1)
  (same comment as for Aluminium III)
- Strontium II [water, surface water]: 6.4341e-11 kg; lognormal variance with pedigree 2.2415, pedigree (1,1,5,1,1)
  (same comment as for Aluminium III)
- Sulfate [water, ground-, long-term]: 0.0082966 kg; lognormal variance with pedigree 0.75946, pedigree (1,1,5,1,1)
  (same comment as for Aluminium III)
- Sulfate [water, surface water]: 0.00099711 kg; lognormal variance with pedigree 0.87272, pedigree (1,1,5,1,1)
  (same comment as for Aluminium III)
- TOC, Total Organic Carbon [water, ground-, long-term]: 0.0050766 kg; lognormal variance with pedigree 0.134533, pedigree (1,1,5,1,1)
  (same comment as for Aluminium III)
- TOC, Total Organic Carbon [water, surface water]: 8.4752e-6 kg; lognormal variance with pedigree 0.72994, pedigree (1,1,5,1,1)
  (same comment as for Aluminium III)
- Thallium I [water, ground-, long-term]: 1.2598e-7 kg; lognormal variance with pedigree 2.1574, pedigree (1,1,5,1,1)
  (same comment as for Aluminium III)
- Thallium I [water, surface water]: 2.1032e-10 kg; lognormal variance with pedigree 2.6178, pedigree (1,1,5,1,1)
  (same comment as for Aluminium III)
- Tin ion [water, ground-, long-term]: 0.0022079 kg; lognormal variance with pedigree 4.4249, pedigree (1,1,5,1,1)
  (same comment as for Aluminium III)
- Tin ion [water, surface water]: 3.686e-6 kg; lognormal variance with pedigree 1.6005, pedigree (1,1,5,1,1)
  (same comment as for Aluminium III)
- Titanium ion [water, ground-, long-term]: 0.00040714 kg; lognormal variance with pedigree 1.03354, pedigree (1,1,5,1,1)
  (same comment as for Aluminium III)
- Titanium ion [water, surface water]: 6.7971e-7 kg; lognormal variance with pedigree 1.4092, pedigree (1,1,5,1,1)
  (same comment as for Aluminium III)
- Vanadium V [water, ground-, long-term]: 4.5598e-7 kg; lognormal variance with pedigree 1.5912, pedigree (1,1,5,1,1)
  (same comment as for Aluminium III)
- Vanadium V [water, surface water]: 1.4559e-9 kg; lognormal variance with pedigree 2.1116, pedigree (1,1,5,1,1)
  (same comment as for Aluminium III)
- Zinc II [water, ground-, long-term]: 0.0018251 kg; lognormal variance with pedigree 5.3518, pedigree (1,1,5,1,1)
  (same comment as for Aluminium III)
- Zinc II [water, surface water]: 3.047e-6 kg; lognormal variance with pedigree 1.6734, pedigree (1,1,5,1,1)
  (same comment as for Aluminium III)
