# vinyl chloride production

Dataset: EcoSpold 2, unit process
Geography: RoW
Time period: 2013-01-01 to 2023-12-31
Technology level: current
Classification: ISIC rev.4 ecoinvent: 2013:Manufacture of plastics and synthetic rubber in primary forms
Synonyms: VCM, chloroethene
Scenario: Business-as-Usual
System model: Allocation, cut-off by classification
Generated by: Thomas Fröhlich
Published in: PlasticsEurope 2016
Database: ecoinvent
isCopyrightProtected: true
accessRestrictedTo: 1

## General comment
The dataset represents the production mix of commercial integrated EDC/VCM production technologies (oxychlorination and direct chlorination) in both balanced and non-balanced units.
The chlorination of ethylene can either be carried out by using chlorine (direct chlorination) or by using hydrogen chloride and oxygen (oxychlorination). Thermal cracking of dry, pure EDC then produces VCM and HCl. When all the HCl generated in EDC cracking is re-used in an oxychlorination section, and when no EDC or HCI is imported or exported, then the VCM unit is called a ‘balanced unit’. By using both, direct chlorination and oxychlorination, for EDC production, balanced units achieve a high level of chlorine utilisation without producing HCl as a by-product. Assuming a complete incorporation of chlorine input into EDC within a balanced unit, half of the produced EDC originates from each of the applied processes, direct chlorination and oxychlorination.
Additionally, the heat gain from both highly exothermic chlorination processes may be used in the associated VCM production, optimising the overall energy demand of the EDC/VCM/PVC production.
The reactions are represented by the formulae:
Direct chlorination: C2H4+Cl2 → C2H4Cl2 (EDC) ; ΔHR,0=−220 kJ/mol
Cracking: C2H4Cl2 → C2H3Cl (VCM)+ HCl ; ΔHR,0=+ 97 kJ/mol
Oxychlorination: C2H4+½ O2+2 HCl → C2H4Cl2 (EDC)+ H2O ; ΔHR,0=−320 kJ/mol
For the production of EDC in a balanced unit the raw material requirements comprise ethylene and chlorine, which are generally supplied by pipeline from nearby production facilities. Chlorine and EDC production sites are often found in close proximity in order to reduce chlorine transportation distances to the EDC process, the single largest chlorine consumer.
The bromine content of the chlorine feed should be as low as possible in order to minimise the downstream formation of brominated by-products. The inert gases contained in tail gas chlorine may create downstream emission issues. An unbalanced unit has the same ethylene and chlorine requirements as a balanced unit, but may need to import or export gaseous hydrochloric acid or EDC.

## Included activities start
Acitivity starts with ethylene, chloride and EDC (ethylene dichloride) entering the plant. Based on European production the average EDC/VCM unit covered here is unbalanced and hence needs EDC import. Both direct chlorination and oxychlorination of ethylene to produce ethylene dichloride are included. Energy supply is included in terms of heat production inside the battery limits of the plant. Steam and electricity supply is outside the activity.

## Included activities end
Activity ends with vinyl chloride leaving the factory.

## Geography
Extrapolated from dataset with data for EU27 including Norway and Switzerland. The production volume and uncertainty have been adjusted accordingly.

## Time period
Data was collected for the year 2013, processed in 2014 and published in 2015

## Reference product
- vinyl chloride: 1 kg; By-product classification allocatable product; CPC 34730: Polymers of vinyl chloride or other halogenated olefins, in primary forms; HS2017 390410: Vinyl chloride, other halogenated olefin polymers; poly(vinyl chloride), not mixed with any other substance[...]; CAS 75-01-4
  Reference Product
  production volume 2.25018e10 kg; name RP_PV
    According to Plastics Europe, Global production volume of plastics in 2013 was 299 Mt. It is assumed that the global production share (of the total plastic production) of vinyl chloride is equal to the respective European production share, which is 12 % of the total plastics production in Europe.
    Source: PlasticsEurope, 2013, Plastics - The Facts 2013, accessed online at: https://www.plasticseurope.org/en/resources/market-data on 11th of July 2018
  property heating value, net 17.46 MJ
    LHV is calculated based on the elemental composition of the substance. Based on the name of the substance, the chemical formula of the substance is assumed to be: C2H3Cl
  property price 0.584 EUR2005
    From UN data; http://data.un.org/Data.aspx?q=vinyl+chloride&d=ComTrade&f=_l1Code%3a30%3bcmdCode%3a290321
  properties: carbon allocation 0.387097 kg, carbon content 0.387097, carbon content, fossil 0.387097, carbon content, non-fossil 0, dry mass 1 kg, water content 0, water in wet mass 0 kg, wet mass 1 kg

## Inputs from technosphere
- ammonia, anhydrous, liquid: 5.18388e-7, 1.0063e-6, 1.11541e-5, 4.71493e-7, 1.05471e-7, 3.87624e-6, 3.33209e-7, 1.02711e-6 kg (8 suppliers, which the file names only by identifier); sum of these 1.84924e-5 kg; lognormal variance with pedigree 0.0212, pedigree (3,3,4,5,3)
  Weighted average of reported input
  properties: dry mass 1 kg, wet mass 1 kg
- chemical factory, organics: 4e-10 unit; lognormal variance with pedigree 0.3118, pedigree (2,3,3,4,3)
  Calculated based on literature data published by the industry. For this activity, no information was readily available concerning infrastructure and land-use. Therefore, the infrastructure is estimated based on data from two chemical factories, the BASF site of Ludwigshafen and the chemical factory in Gendorf (which are both located in Germany), which produce a wide range of chemical substances. Based on this data, the following assumptions are made: the built area amounts to about 4.2 ha, the plant has an average output of 50"000 t/a and a lifespan of fifty years. The estimated infrastructure amount is therefore 4.00 E-10 units per kg of produced chemical.
  References:
  Althaus H.-J., Chudacoff M., Hischier R., Jungbluth N., Osses M. and Primas A. (2007) Life Cycle Inventories of Chemicals. ecoinvent report No. 8, v2.0. EMPA Dübendorf, Swiss Centre for Life Cycle Inventories, Dübendorf, CH.
  Gendorf (2000) Umwelterklärung 2000, Werk Gendorf. Werk Gendorf, Burgkirchen.
- chemical, inorganic: 0.000970977 kg; lognormal variance with pedigree 0.0212, pedigree (3,3,4,5,3)
  Sum input parameter covering partly confidential information on additives, solvents, catalysts. Weighted average of reported input materials.
  properties: carbon content, fossil 0.003, dry mass 1 kg, wet mass 1 kg
  note on carbon content, fossil: This dataset is an unweighted average of 20 inorganic substances (listed in Tab 88.1, ecoinvent v2.2 report 8, part II), being part of the top100 chemicals included in this database. The C-content has also been calculated as an unweighted average of the C content of the substances composing this dataset.
- chemical, organic: 2.12003e-6 kg; lognormal variance with pedigree 0.0212, pedigree (3,3,4,5,3)
  (same comment as for chemical, inorganic)
  properties: carbon content, fossil 0.628, dry mass 1 kg, heating value, net 19.03 MJ, wet mass 1 kg
  note on carbon content, fossil: This dataset is an unweighted average of 20 organic substances (listed in Tab 88.1, ecoinvent v2.2 report 8, part II), being part of the top100 chemicals included in this database. The C-content has also been calculated as an unweighted average of the C content of the substances composing this dataset.
- chlorine, gaseous: 0.425602 kg; lognormal variance with pedigree 0.0212, pedigree (3,3,4,5,3)
  Weighted average of reported input
  properties: dry mass 1 kg, wet mass 1 kg
- compressed air, 600 kPa gauge: 0.0401459 m3; lognormal variance with pedigree 0.0212, pedigree (3,3,4,5,3)
  Weighted average of reported input
- electricity, medium voltage: 0.00518742, 0.103477, 0.0347681, 0.00158857, 0.00031795, 6.8271e-5, 0.0106856 kWh (7 suppliers, which the file names only by identifier); sum of these 0.156093 kWh; lognormal variance with pedigree 0.0212, pedigree (3,3,4,5,3)
  Weighted average of reported input
- ethylene: 0.00125699, 0.431837 kg (2 suppliers, which the file names only by identifier); sum of these 0.433094 kg; lognormal variance with pedigree 0.0212, pedigree (3,3,4,5,3)
  Weighted average of reported input
  properties: carbon content, fossil 0.857143, dry mass 1 kg, heating value, net 43.22 MJ, wet mass 1 kg
- ethylene dichloride: 0.139164 kg; lognormal variance with pedigree 0.0212, pedigree (3,3,4,5,3)
  Weighted average of reported input
  properties: carbon content, fossil 0.244898, dry mass 1 kg, heating value, net 12.25 MJ, wet mass 1 kg
- hazardous waste, for incineration: -0.00776886 kg; name BP_amount5; lognormal variance with pedigree 0.0134, pedigree (3,3,2,5,3)
  Weighted average of reported waste
  production volume; = BP_amount5*RP_PV
    calculated with production volume of reference product
  properties: carbon content, fossil 0.554667, dry mass 0.75 kg, heating value, net 17 MJ, water content 0.333333, wet mass 1 kg
  note on carbon content, fossil: Tab A.6, ecoinvent v2.2 report 13_I. C content has been calculated after data in the tables, and then referred to 1 kg DM
  note on heating value, net: Value taken from the general comment of the treatment dataset.
- hydrochloric acid, without water, in 30% solution state: 0.0530296 kg; lognormal variance with pedigree 0.0212, pedigree (3,3,4,5,3)
  Weighted average of reported input
  properties: dry mass 1 kg, heating value, net 3.32 MJ, wet mass 1 kg
- hydrogen, gaseous, medium pressure, merchant: 9.56465e-5, 6.00571e-5 kg (2 suppliers, which the file names only by identifier); sum of these 0.000155704 kg; lognormal variance with pedigree 0.0212, pedigree (3,3,4,5,3)
  Weighted average of reported input
  properties: dry mass 1 kg, heating value, net 120.21 MJ, wet mass 1 kg
- natural gas, high pressure: 0.000825795, 0.00139301, 0.00303859, 0.00101689, 0.000237643, 0.0014144, 0.00135723, 0.00356885, 0.00137781, 0.00213109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 m3 (37 suppliers, which the file names only by identifier); sum of these 0.106947 m3; lognormal variance with pedigree 0.0212, pedigree (3,3,4,5,3)
  Weighted average of reported input
  properties: carbon content, fossil 0.695187, dry mass 1 kg, heating value, net 36 MJ, wet mass 1 kg
  note on heating value, net: Literature value, Source: Christoph Meili;Niels Jungbluth;Maresa Bussa (2021) Life cycle inventories of crude oil and natural gas extraction. ESU-services Ltd. commissioned by BAFU & VSG, Schaffhausen, Switzerland, http://esu-services.ch/data/public-lci-reports/
- nitrogen, liquid: 0.0368073 kg; lognormal variance with pedigree 0.0212, pedigree (3,3,4,5,3)
  Weighted average of reported input
  properties: dry mass 1 kg, wet mass 1 kg
- oxygen, liquid: 0.110791 kg; lognormal variance with pedigree 0.0212, pedigree (3,3,4,5,3)
  Weighted average of reported input
  properties: dry mass 1 kg, wet mass 1 kg
- sewage sludge, dried: -0.000399451 kg; name BP_amount2; lognormal variance with pedigree 0.0134, pedigree (3,3,2,5,3)
  Weighted average of reported waste
  production volume; = BP_amount2*RP_PV
    calculated with production volume of reference product
  properties: carbon content, non-fossil 0.4096, dry mass 0.99 kg, heating value, net 11.6 MJ, water content 0.010101, wet mass 1 kg
- sodium hydroxide, without water, in 50% solution state: 0.0217751 kg; lognormal variance with pedigree 0.0212, pedigree (3,3,4,5,3)
  Weighted average of reported input
  properties: dry mass 1 kg, heating value, net 3.03 MJ, wet mass 1 kg
- spent solvent mixture: -0.000426574 kg; name BP_amount3; lognormal variance with pedigree 0.0134, pedigree (3,3,2,5,3)
  Weighted average of reported waste
  production volume; = BP_amount3*RP_PV
    calculated with production volume of reference product
  properties: carbon content, fossil 0.571257, dry mass 0.835 kg, heating value, net 21.7 MJ, water content 0.197605, wet mass 1 kg
  note on carbon content, fossil: Tab A.7, ecoinvent v2.2 report 13_I. C content has been calculated after data in the tables, and then referred to 1 kg DM
- waste paperboard: -8.78914e-8, -3.54154e-7, -6.55575e-7, -1.00515e-6, -0.00019647, -6.58233e-6, -3.63203e-6 kg (7 suppliers, which the file names only by identifier); sum of these -0.000208787 kg; lognormal variance with pedigree 0.0134, pedigree (3,3,2,5,3)
  Weighted average of reported waste
  production volume; = BP_amount1*RP_PV
    calculated with production volume of reference product
  properties: carbon content, non-fossil 0.483259, dry mass 0.804 kg, heating value, net 15.92 MJ, water content 0.243781, wet mass 1 kg
  note on carbon content, non-fossil: C content was calculated for 1 kg DM, using data in Tab A.3, ecoinvent v2.2 report 13_I.
- wastewater, average: -0.00136832, -4.87174e-6 m3 (2 suppliers, which the file names only by identifier); sum of these -0.00137319 m3; lognormal variance with pedigree 0.0134, pedigree (3,3,2,5,3)
  Weighted average of reported waste
  production volume; = BP_amount4*RP_PV
    calculated with production volume of reference product
  properties: carbon content, non-fossil 0.194039, dry mass 0.346837 kg, water content 2882.2, wet mass 1000 kg
  note on carbon content, non-fossil: 0.0673 kg TOC/m3 (Tab A.17, ecoinvent v2.2 report 13_I). TOC was considered as Total Carbon.
- wastewater, unpolluted: -0.0441706 m3; name BP_amount6; lognormal variance with pedigree 0.0134, pedigree (3,3,2,5,3)
  Weighted average of reported waste
  production volume; = BP_amount6*RP_PV
    calculated with production volume of reference product
  properties: carbon content, fossil 0.00178991, carbon content, non-fossil 0.00178991, dry mass 0.337476 kg, water content 2962.17, wet mass 1000 kg
  note on carbon content, fossil: Assumed to be like in tap water. Bicarbonate content is 2.93 mol/m3. CO2 content is 0.1 mol/m3 (ecoinvent v2.2 report 8, Tab 93.1).

## Inputs from nature
All rows: lognormal variance with pedigree 0.0212, pedigree (3,3,4,5,3)
- Water, cooling, unspecified natural origin [natural resource, in water]: 0.0450729 m3
  Weighted average of reported input
- Water, lake [natural resource, in water]: 0.000209706 m3
  Weighted average of reported input
- Water, river [natural resource, in water]: 9.84599e-5 m3
  Weighted average of reported input
- Water, unspecified natural origin [natural resource, in water]: 0.000325407 m3
  Weighted average of reported input
- Water, well, in ground [natural resource, in water]: 0.000382357 m3
  Weighted average of reported input

## Emissions to nature
- Carbon dioxide, fossil [air, unspecified]: 0.187105 kg; lognormal variance with pedigree 0.0212, pedigree (3,3,4,5,3)
  Weighted average of reported emissions
- Carbon monoxide, fossil [air, unspecified]: 9.44577e-5 kg; lognormal variance with pedigree 0.6706, pedigree (3,3,4,5,3)
  Weighted average of reported emissions
- Carbon tetrachloride [air, unspecified]: 9.92032e-7 kg; lognormal variance with pedigree 0.1406, pedigree (3,3,4,5,3)
  Weighted average of reported emissions
- Chlorine [air, unspecified]: 6.76356e-7 kg; lognormal variance with pedigree 0.0606, pedigree (3,3,4,5,3)
  Weighted average of reported emissions
- Chloroform [air, unspecified]: 1.86756e-6 kg; lognormal variance with pedigree 0.1406, pedigree (3,3,4,5,3)
  Weighted average of reported emissions
- Dinitrogen monoxide [air, unspecified]: 2.1103e-7 kg; lognormal variance with pedigree 0.0606, pedigree (3,3,4,5,3)
  Weighted average of reported emissions
- Dioxins, measured as 2,3,7,8-tetrachlorodibenzo-p-dioxin [air, unspecified]: 1.65117e-14 kg; lognormal variance with pedigree 0.3206, pedigree (3,3,4,5,3)
  Weighted average of reported emissions
- Ethylene [air, unspecified]: 8.54347e-5 kg; lognormal variance with pedigree 0.1406, pedigree (3,3,4,5,3)
  Weighted average of reported emissions
- Ethylene dichloride [air, unspecified]: 5.91079e-5 kg; lognormal variance with pedigree 0.1406, pedigree (3,3,4,5,3)
  Weighted average of reported emissions
- Hydrochloric acid [air, unspecified]: 6.7775e-6 kg; lognormal variance with pedigree 0.0606, pedigree (3,3,4,5,3)
  Weighted average of reported emissions
- Methane, fossil [air, unspecified]: 1.03064e-5 kg; lognormal variance with pedigree 0.0606, pedigree (3,3,4,5,3)
  Weighted average of reported emissions
- Monochloroethane [air, unspecified]: 1.55963e-6 kg; lognormal variance with pedigree 0.1406, pedigree (3,3,4,5,3)
  Weighted average of reported emissions
- NMVOC, non-methane volatile organic compounds [air, unspecified]: 4.32759e-5 kg; lognormal variance with pedigree 0.0606, pedigree (3,3,4,5,3)
  Weighted average of reported emissions
- Nitrogen oxides [air, unspecified]: 8.96407e-5 kg; lognormal variance with pedigree 0.0606, pedigree (3,3,4,5,3)
  Weighted average of reported emissions
- Particulate Matter, > 10 um [air, unspecified]: 1.20387e-7 kg; lognormal variance with pedigree 0.0606, pedigree (3,3,4,5,3)
  Weighted average of reported emissions
- Particulate Matter, > 2.5 um and < 10um [air, unspecified]: 2.87884e-8 kg; lognormal variance with pedigree 0.1406, pedigree (3,3,4,5,3)
  Weighted average of reported emissions
- Propylene [air, unspecified]: 1.84457e-7 kg; lognormal variance with pedigree 0.1406, pedigree (3,3,4,5,3)
  Weighted average of reported emissions
- Sulfur dioxide [air, unspecified]: 7.79159e-8 kg; lognormal variance with pedigree 0.0212, pedigree (3,3,4,5,3)
  Weighted average of reported emissions
- Sulfur hexafluoride [air, unspecified]: 2.70829e-10 kg; lognormal variance with pedigree 0.0606, pedigree (3,3,4,5,3)
  Weighted average of reported emissions
- Trichloroethylene [air, unspecified]: 6.19885e-7 kg; lognormal variance with pedigree 0.1406, pedigree (3,3,4,5,3)
  Weighted average of reported emissions
- Vinyl chloride [air, unspecified]: 1.49677e-5 kg; lognormal variance with pedigree 0.1406, pedigree (3,3,4,5,3)
  Weighted average of reported emissions
- Water [air, unspecified]: 0.000545036 m3; lognormal variance with pedigree 0.0212, pedigree (3,3,4,5,3)
  Calculated to close water balance
- AOX, Adsorbable Organic Halides [water, unspecified]: 3.10738e-7 kg; lognormal variance with pedigree 0.0606, pedigree (3,3,4,5,3)
  Weighted average of reported emissions
- Arsenic ion [water, unspecified]: 8.00288e-10 kg; lognormal variance with pedigree 0.6706, pedigree (3,3,4,5,3)
  Weighted average of reported emissions
- Cadmium II [water, unspecified]: 8.07608e-11 kg; lognormal variance with pedigree 0.6706, pedigree (3,3,4,5,3)
  Weighted average of reported emissions
- Carbon tetrachloride [water, unspecified]: 6.3457e-9 kg; lognormal variance with pedigree 0.3206, pedigree (3,3,4,5,3)
  Weighted average of reported emissions
- Chloride [water, unspecified]: 0.00727674 kg; lognormal variance with pedigree 0.0606, pedigree (3,3,4,5,3)
  Weighted average of reported emissions
- Chloroform [water, unspecified]: 1.03566e-8 kg; lognormal variance with pedigree 0.3206, pedigree (3,3,4,5,3)
  Weighted average of reported emissions
- Chromium III [water, unspecified]: 9.77523e-10 kg; lognormal variance with pedigree 0.6706, pedigree (3,3,4,5,3)
  Weighted average of reported emissions
- Copper ion [water, unspecified]: 1.53406e-7 kg; lognormal variance with pedigree 0.6706, pedigree (3,3,4,5,3)
  Weighted average of reported emissions
- Dioxins, measured as 2,3,7,8-tetrachlorodibenzo-p-dioxin [water, unspecified]: 2.87792e-14 kg; lognormal variance with pedigree 0.3206, pedigree (3,3,4,5,3)
  Weighted average of reported emissions
- Ethylene dichloride [water, unspecified]: 8.62652e-8 kg; lognormal variance with pedigree 0.3206, pedigree (3,3,4,5,3)
  Weighted average of reported emissions
- Hexachlorobenzene [water, unspecified]: 8.04895e-11 kg; lognormal variance with pedigree 0.3206, pedigree (3,3,4,5,3)
  Weighted average of reported emissions
- Mercury II [water, unspecified]: 8.82156e-12 kg; lognormal variance with pedigree 0.6706, pedigree (3,3,4,5,3)
  Weighted average of reported emissions
- Nickel II [water, unspecified]: 1.19844e-8 kg; lognormal variance with pedigree 0.6706, pedigree (3,3,4,5,3)
  Weighted average of reported emissions
- Nitrogen, organic bound [water, unspecified]: 4.602e-7 kg; lognormal variance with pedigree 0.0606, pedigree (3,3,4,5,3)
  Weighted average of reported emissions
- Pentachlorobenzene [water, unspecified]: 1.32076e-10 kg; lognormal variance with pedigree 0.3206, pedigree (3,3,4,5,3)
  Weighted average of reported emissions
- Phosphorus [water, unspecified]: 1.44129e-6 kg; lognormal variance with pedigree 0.0606, pedigree (3,3,4,5,3)
  Weighted average of reported emissions
- Sodium I [water, unspecified]: 0.00142916 kg; lognormal variance with pedigree 0.0606, pedigree (3,3,4,5,3)
  Weighted average of reported emissions
- Sulfate [water, unspecified]: 0.000178621 kg; lognormal variance with pedigree 0.0606, pedigree (3,3,4,5,3)
  Weighted average of reported emissions
- Suspended solids, unspecified [water, unspecified]: 4.39797e-7 kg; lognormal variance with pedigree 0.0606, pedigree (3,3,4,5,3)
  Weighted average of reported emissions
- Vinyl chloride [water, unspecified]: 2.31486e-9 kg; lognormal variance with pedigree 0.3206, pedigree (3,3,4,5,3)
  Weighted average of reported emissions
- Zinc II [water, unspecified]: 1.81602e-8 kg; lognormal variance with pedigree 0.6706, pedigree (3,3,4,5,3)
  Weighted average of reported emissions

## Sampling procedure
Extrapolated from European data. Questionnaires sent out to all production units in Europe operated by PlasticEurope/ECVM member companies.

## Extrapolations
This dataset has been created as a copy of the original dataset covering the geography RER, i.e., Europe. Annual production volume(s) and uncertainty have been adjusted accordingly. It is important to note that original RER dataset represents the average production mix, composed of several different processes/technologies, in Europe in the year of reference. It might not reflect the actual global production mix and should hence only be used as a proxy.
