# treatment of leachate, SLF, municipal solid waste, wastewater treatment

Dataset: EcoSpold 2, unit process
Geography: RoW
Time period: 2010-01-01 to 2023-12-31
Technology level: current
Classification: ISIC rev.4 ecoinvent: 3700:Sewerage
Scenario: Business-as-Usual
System model: Allocation, cut-off by classification
Generated by: Nikolia Stoikou
Database: ecoinvent
isCopyrightProtected: true
accessRestrictedTo: 1

## General comment
This dataset represents the treatment of a wastewater (leachate), that is exclusively generated in another waste treatment. It models the purification in wastewater treatment of (WWT) a leachate, generated during the sanitary landfilling (SLF) of 'municipal solid waste'. Recommended use of this dataset: to be used within the specific chain of treatments for 'municipal solid waste'. The leachate has a content of TOC: 0.40757 kg/m3, COD: 0.44578 kg/m3 and BOD: 0.10553 kg/m3. TOC is equal to C organic present in the leachate, COD is calculated as TOC*1.09375 and BOD is calculated as TOC*0.258928571 . Detailed elemental composition can be found in the properties of the leachate treated. Share of biogenic carbon in the sludge: 95.63%.

## Included activities start
The activity starts with the leachate being available at the gate of the wastewater treatment facility. Collection and transportation of the leachate to the treatment plant is not included.

## Included activities end
The activity ends with the wastewater being treated and waste-specific emissions released to the environment. Expenditures from treatment of wastewater in waste treatment plant are included as well as relevant infrastructure of the plant. Emissions from any sludge digestion, biogas generation and utilization (heeding specific wastewater composition) are also included. Waste-specific direct emissions of untreated wastewater and required territory-specific infrastructure for sewers are not contained within this dataset but instead in the regional market datasets for this wastewater.

## Geography
The site has mean annual temperature (MAT) of 16.743579766537 degC, mean annual precipitation (MAP) of 1250.84108527132 mm/year, mean annual actual evaporation (EAT) of 460.58904958214 mm/year. In the WWT plant, 0% of its water input are lost due to evaporation from pools, 0.0201% of water is *gained* from organic mass degradation, and 0.0244% is removed off site via sludge disposal.
References:
UN data, 2020. Precipitation, Environment Statistics Database, United Nations Statistics Division Available at: http://data.un.org/Data.aspx?q=precipitation&d=ENV&f=variableID%3a6;
World Bank, 2022. Surface area (sq.km), World Bank Group Available at: https://data.worldbank.org/indicator/AG.SRF.TOTL.K2;
Doka G.,2021. A model for composition-specific life cycle inventories of regionalised wastewater fates, Zurich, Switzerland. http://www.doka.ch/publications.htm

## Technology
This is an inventory for the disposal of a selected wastewater in Global. The reference unit is 1 m3 wastewater input. This activity represents the treatment of a specific wastewater in a WWT plant (while direct emissions and sewering are heeded in the upstream market dataset for this wastewater). The size of the treatment plant infrastructure is for a supranational region average territory situation. The assumed size of the WWTP treats 82.2 Mio m3 per year. The mixture of WWTP with one, two, or three stages is 8.2%-41.2%-50.6%. The actual, waste-specific oxygen requirement in the biological stages is 0.60211195 kg O. The digestion process produces 60.63149 litres of biogas with an energy content of 1.1403713MJ. 60.5% of the biogas is utilized for energy. The remainder is flared. The gross electric efficiency is 0%. The gross thermal efficiency is 0%.

## Reference product
- leachate, SLF, municipal solid waste: -1 m3; By-product classification Waste; CPC 39990: Other wastes n.e.c.
  main reference product of this activity
  production volume 3.42277e12 m3
    calculated in proportion to landfilled waste reference product
  property price 0 EUR2005
    Waste products are assigned a price of zero as they are assumed to require further treatment.
  properties: carbon allocation 0.000407559 kg, carbon content 0.000188394, carbon content, fossil 8.2338e-6, carbon content, non-fossil 0.00018016, dry mass 2.16334 kg, fossil share of carbon 0.043704, mass concentration, TOC 0.40757 kg/m3, mass concentration, aluminium 0.023846 kg/m3, mass concentration, antimony 3.2142e-5 kg/m3, mass concentration, arsenic 7.4732e-6 kg/m3, mass concentration, barium 0.0027304 kg/m3, mass concentration, boron 0.0017898 kg/m3, mass concentration, bromine 0.00041981 kg/m3, mass concentration, cadmium 3.4711e-5 kg/m3, mass concentration, calcium 0.077988 kg/m3, mass concentration, chlorine 0.30922 kg/m3, mass concentration, chromium 8.3862e-5 kg/m3, mass concentration, cobalt 2.8901e-5 kg/m3, mass concentration, copper 7.2429e-5 kg/m3, mass concentration, fluorine 0.00026699 kg/m3, mass concentration, hydrogen 0.051475 kg/m3, mass concentration, iodine 2.0469e-6 kg/m3, mass concentration, iron 0.0077319 kg/m3, mass concentration, lead 4.1957e-5 kg/m3, mass concentration, magnesium 0.10169 kg/m3, mass concentration, manganese 0.0014786 kg/m3, mass concentration, mercury 7.4503e-7 kg/m3, mass concentration, molybdenum 1.4015e-5 kg/m3, mass concentration, nickel 9.5502e-5 kg/m3, mass concentration, nitrogen 0.36685 kg/m3, mass concentration, oxygen 0.36651 kg/m3, mass concentration, phophorus 0.0033722 kg/m3, mass concentration, potassium 0.10639 kg/m3, mass concentration, selenium 1.5173e-6 kg/m3, mass concentration, silicon 0.051652 kg/m3, mass concentration, sodium 0.26183 kg/m3, mass concentration, sulfur 0.019482 kg/m3, mass concentration, tin 3.3947e-6 kg/m3, mass concentration, vanadium 4.5438e-5 kg/m3, mass concentration, zinc 0.0005701 kg/m3, water content 461.249, water in wet mass 997.837 kg, wet mass 1000 kg

## Inputs from technosphere
- aluminium scrap, post-consumer, prepared for melting: -6.61389e-5 kg; lognormal variance with pedigree 0.3609, pedigree (1,1,1,1,1)
  scrap output from used infrastructure for wastewater treatment plant.
  Uncertainty: Uncertainty calculated from wastewater technosphere fate uncertainty and treatment infrastructure uncertainty.
  production volume
    calculated in proportion to wastewater reference product
  properties: dry mass 1 kg, price 0.806 EUR2005, wet mass 1 kg
- aluminium, cast alloy: 6.61389e-5 kg; lognormal variance with pedigree 0.3611, pedigree (1,1,2,1,1)
  For infrastructure for wastewater treatment plant.
  Uncertainty: Uncertainty calculated from wastewater technosphere fate uncertainty and treatment infrastructure uncertainty.
  properties: dry mass 1 kg, wet mass 1 kg
- chemical, inorganic: 4.30427e-5 kg; lognormal variance with pedigree 0.3611, pedigree (1,1,2,1,1)
  (same comment as for aluminium, cast alloy)
  properties: carbon content, fossil 0.003, dry mass 1 kg, wet mass 1 kg
- chemical, organic: 0.000343292 kg; lognormal variance with pedigree 0.3611, pedigree (1,1,2,1,1)
  (same comment as for aluminium, cast alloy)
  properties: carbon content, fossil 0.628, dry mass 1 kg, heating value, net 19.03 MJ, wet mass 1 kg
  note on carbon content, fossil: This dataset is an unweighted average of 20 organic substances (listed in Tab 88.1, ecoinvent v2.2 report 8, part II), being part of the top100 chemicals included in this database. The C-content has also been calculated as an unweighted average of the C content of the substances composing this dataset.
- concrete, 25MPa: 6.9887e-8, 1.49648e-7, 2.3661e-6, 5.75372e-5 m3 (4 suppliers, which the file names only by identifier); sum of these 6.01228e-5 m3; lognormal variance with pedigree 0.3611, pedigree (1,1,2,1,1)
  (same comment as for aluminium, cast alloy)
  properties: cement content 206 kg, dry mass 2285 kg, fly ash content 69 kg, gravel content 1100 kg, sand content 910 kg, water content 0.0538293, wet mass 2408 kg
- copper scrap, sorted, pressed: -7.97866e-5 kg; lognormal variance with pedigree 0.3609, pedigree (1,1,1,1,1)
  (same comment as for aluminium scrap, post-consumer, prepared for melting)
  production volume
    calculated in proportion to wastewater reference product
  properties: dry mass 1 kg, price 2.84 EUR2005, wet mass 1 kg
- copper, cathode: 7.97866e-5 kg; lognormal variance with pedigree 0.3611, pedigree (1,1,2,1,1)
  (same comment as for aluminium, cast alloy)
  properties: copper content 1, dry mass 1 kg, wet mass 1 kg
- electricity, medium voltage: 0.0408336, 0.81454, 0.0203909, 0.0125047, 0.00250279, 0.000537406, 0.0568768, 0.0841138, 0.176221, 0.241757 kWh (10 suppliers, which the file names only by identifier); sum of these 1.45028 kWh; lognormal variance with pedigree 0.4797, pedigree (1,1,2,1,1)
  processing energy in wastewater treatment plant.
  Uncertainty: Uncertainty calculated from wastewater technosphere fate uncertainty and treatment infrastructure uncertainty.
- excavation, hydraulic digger: 0.000508839 m3; lognormal variance with pedigree 0.3611, pedigree (1,1,2,1,1)
  (same comment as for aluminium, cast alloy)
- extrusion, plastic pipes: 0.000203666 kg; lognormal variance with pedigree 0.3611, pedigree (1,1,2,1,1)
  (same comment as for aluminium, cast alloy)
- glass fibre: 0.000127029 kg; lognormal variance with pedigree 0.3611, pedigree (1,1,2,1,1)
  (same comment as for aluminium, cast alloy)
  properties: dry mass 1 kg, wet mass 1 kg
- heat, district or industrial, natural gas: 0.480266, 0.177364 MJ (2 suppliers, which the file names only by identifier); sum of these 0.657631 MJ; lognormal variance with pedigree 0.05802, pedigree (1,1,2,1,1)
  processing energy in wastewater treatment plant.
  Uncertainty: Uncertainty calculated from wastewater technosphere fate uncertainty, wastewater composition uncertainty, and treatment model uncertainty
  properties: heating value, net 1 MJ
- inert waste, for final disposal: -0.00481033 kg; lognormal variance with pedigree 0.2709, pedigree (1,1,1,1,1)
  approximation for waste sand removed from wastewater in treatment plant.
  Uncertainty: Uncertainty calculated from wastewater technosphere fate uncertainty and treatment infrastructure uncertainty.
  production volume
    calculated in proportion to wastewater reference product
  properties: dry mass 0.995 kg, water content 0.00502513, wet mass 1 kg
- iron scrap, sorted, pressed: -0.000538559 kg; lognormal variance with pedigree 0.3609, pedigree (1,1,1,1,1)
  (same comment as for aluminium scrap, post-consumer, prepared for melting)
  production volume
    calculated in proportion to wastewater reference product
  properties: dry mass 1 kg, price 0.175 EUR2005, wet mass 1 kg
- iron sulfate: 0.0202275 kg; lognormal variance with pedigree 1.1492, pedigree (1,1,2,1,1)
  precipitation agent in 3rd stage of wastewater treatment.
  Uncertainty: Uncertainty calculated from wastewater technosphere fate uncertainty, wastewater composition uncertainty, and treatment model uncertainty
  properties: dry mass 1 kg, wet mass 1 kg
- limestone, crushed, washed: 0.00139102 kg; lognormal variance with pedigree 0.3611, pedigree (1,1,2,1,1)
  (same comment as for aluminium, cast alloy)
  properties: carbon content, fossil 0.117257, dry mass 0.998 kg, water content 0.00200401, wet mass 1 kg
- pitch: 3.84852e-6, 1.72506e-7, 8.50317e-8, 1.492e-6, 2.46269e-7, 2.17561e-5, 4.94413e-6 kg (7 suppliers, which the file names only by identifier); sum of these 3.25445e-5 kg; lognormal variance with pedigree 0.3611, pedigree (1,1,2,1,1)
  (same comment as for aluminium, cast alloy)
  properties: carbon content, fossil 0.83, dry mass 1 kg, heating value, net 28 MJ, wet mass 1 kg
- polyacrylamide: 0.0240855 kg; lognormal variance with pedigree 0.09855, pedigree (1,1,2,1,1)
  approximation for Polyacrylamide flocculant in 2nd stage sludge precipitation.
  Uncertainty: Uncertainty calculated from wastewater technosphere fate uncertainty and treatment infrastructure uncertainty.
  properties: carbon content, fossil 0.51, dry mass 1 kg, heating value, net 23.88 MJ, wet mass 1 kg
- polyethylene, high density, granulate: 0.000202616 kg; lognormal variance with pedigree 0.3611, pedigree (1,1,2,1,1)
  (same comment as for aluminium, cast alloy)
  properties: carbon content, fossil 0.857143, dry mass 1 kg, heating value, net 42.47 MJ, wet mass 1 kg
- polyethylene, low density, granulate: 1.04982e-6 kg; lognormal variance with pedigree 0.3611, pedigree (1,1,2,1,1)
  For infrastructure for sewer pipes.
  Uncertainty: Uncertainty calculated from wastewater technosphere fate uncertainty and treatment infrastructure uncertainty.
  properties: carbon content, fossil 0.857143, dry mass 1 kg, heating value, net 42.47 MJ, wet mass 1 kg
- reinforcing steel: 0.00513678 kg; lognormal variance with pedigree 0.3611, pedigree (1,1,2,1,1)
  (same comment as for aluminium, cast alloy)
  properties: carbon content, fossil 0.004, dry mass 1 kg, wet mass 1 kg
- sewage sludge, 70% water, WWT-SLF, municipal solid waste: -0.787407 kg; lognormal variance with pedigree 0.007041, pedigree (1,1,1,1,1)
  generated sewage sludge output to municipal incineration.
  Uncertainty: Uncertainty calculated from wastewater technosphere fate uncertainty, wastewater composition uncertainty, and treatment model uncertainty.
  production volume
    calculated in proportion to wastewater reference product
  properties: calcium content 0.0162684, carbon content, fossil 0.0223255, carbon content, non-fossil 0.240516, dry mass 0.3 kg, heating value, gross 2.59849 MJ, heating value, net 0.879543 MJ, hydrogen content 0.0357667, nitrogen content 0.0895845, oxygen content 0.522009, silicon content 0.0290901, water content 2.33333, wet mass 1 kg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
- sewage sludge, 97% water, WWT-SLF, municipal solid waste: -18.2727 kg
  generated sewage sludge output to landfarming.
  production volume
    calculated in proportion to wastewater reference product
  properties: aluminium content 0.01118, calcium content 0.0162684, carbon content, fossil 0.0223255, carbon content, non-fossil 0.240516, dry mass 0.03 kg, heating value, gross 2.59849 MJ, hydrogen content 0.0357667, nitrogen content 0.0895845, oxygen content 0.522009, silicon content 0.0290901, water content 32.3333, wet mass 1 kg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
- steel, chromium steel 18/8, hot rolled: 0.000538559 kg; lognormal variance with pedigree 0.3611, pedigree (1,1,2,1,1)
  (same comment as for aluminium, cast alloy)
  properties: carbon content, fossil 0.0008, dry mass 1 kg, wet mass 1 kg
- stone wool, packed: 5.66904e-5 kg; lognormal variance with pedigree 0.3611, pedigree (1,1,2,1,1)
  (same comment as for aluminium, cast alloy)
  properties: carbon content, fossil 0.015401, dry mass 1 kg, wet mass 1 kg
- synthetic rubber: 6.08897e-5 kg; lognormal variance with pedigree 0.3611, pedigree (1,1,2,1,1)
  (same comment as for aluminium, cast alloy)
  properties: carbon content, fossil 0.871949, dry mass 1 kg, heating value, net 26.42 MJ, wet mass 1 kg
- tap water: 9.68327e-6, 1.47613e-5, 2.75439e-5, 7.42012e-5, 0.000372222, 0.00425953, 0.00317406 kg (7 suppliers, which the file names only by identifier); sum of these 0.007932 kg; lognormal variance with pedigree 0.3611, pedigree (1,1,2,1,1)
  (same comment as for aluminium, cast alloy)
  properties: carbon content, fossil 0.00178991, dry mass 0.000337476 kg, water content 2962.17, wet mass 1 kg
- waste bitumen: -6.23307e-8, -3.24822e-5 kg (2 suppliers, which the file names only by identifier); sum of these -3.25445e-5 kg; lognormal variance with pedigree 0.3609, pedigree (1,1,1,1,1)
  waste output from used infrastructure for wastewater treatment plant and sewer pipes.
  Uncertainty: Uncertainty calculated from wastewater technosphere fate uncertainty and treatment infrastructure uncertainty.
  production volume
    calculated in proportion to wastewater reference product
  properties: carbon content, fossil 0.842657, dry mass 0.986 kg, heating value, net 40.2 MJ, water content 0.0141988, wet mass 1 kg
  note on heating value, net: Literature value, Source: IPCC 2006, 2006 IPCC Guidelines for National Greenhouse Gas Inventories, Prepared by the National Greenhouse Gas Inventories Programme, Eggleston H.S., Buendia L., Miwa K., Ngara T. and Tanabe K. (eds). Published: IGES, Japan
- waste graphical paper: -2.10019e-5, -0.0003318, -1.83643e-6, -7.3998e-6, -7.58889e-5, -0.000137533, -0.0092036, -1.36978e-5 kg (8 suppliers, which the file names only by identifier); sum of these -0.00979276 kg; lognormal variance with pedigree 0.2709, pedigree (1,1,1,1,1)
  approximation for large waste biomass pieces removed from wastewater in treatment plant.
  Uncertainty: Uncertainty calculated from wastewater technosphere fate uncertainty and treatment model uncertainty
  production volume
    calculated in proportion to wastewater reference product
  properties: carbon content, non-fossil 0.454955, dry mass 0.888 kg, heating value, net 14.12 MJ, water content 0.126126, wet mass 1 kg
  note on heating value, net: Value taken from the general comment of the treatment dataset.
- waste mineral wool: -1.64865e-5, -4.02039e-5 kg (2 suppliers, which the file names only by identifier); sum of these -5.66904e-5 kg; lognormal variance with pedigree 0.3609, pedigree (1,1,1,1,1)
  (same comment as for waste bitumen)
  production volume
    calculated in proportion to wastewater reference product
  properties: dry mass 1 kg, wet mass 1 kg
- waste plastic, mixture: -2.57443e-6, -2.44466e-6, -0.00960723, -9.32849e-5, -7.9483e-5, -6.23293e-6, -1.04004e-6, -4.71387e-7 kg (8 suppliers, which the file names only by identifier); sum of these -0.00979276 kg; lognormal variance with pedigree 0.2709, pedigree (1,1,1,1,1)
  approximation for waste macroplastic removed from wastewater in treatment plant.
  Uncertainty: Uncertainty calculated from wastewater technosphere fate uncertainty and treatment model uncertainty
  production volume
    calculated in proportion to wastewater reference product
  properties: carbon content, fossil 0.747344, dry mass 0.847 kg, heating value, net 30.79 MJ, water content 0.180638, wet mass 1 kg
- waste polyethylene/polypropylene product: -5.76118e-5, -0.000146054 kg (2 suppliers, which the file names only by identifier); sum of these -0.000203666 kg; lognormal variance with pedigree 0.3609, pedigree (1,1,1,1,1)
  (same comment as for waste bitumen)
  production volume
    calculated in proportion to wastewater reference product
  properties: carbon content, fossil 0.748045, dry mass 0.847 kg, heating value, net 42.47 MJ, water content 0.180638, wet mass 1 kg
- waste reinforced concrete: -0.00972406, -0.138779 kg (2 suppliers, which the file names only by identifier); sum of these -0.148503 kg; lognormal variance with pedigree 0.3609, pedigree (1,1,1,1,1)
  (same comment as for waste bitumen)
  production volume
    calculated in proportion to wastewater reference product
  properties: dry mass 0.99418 kg, water content 0.00585407, wet mass 1 kg
- waste reinforcement steel: -0.00513678 kg; lognormal variance with pedigree 0.3609, pedigree (1,1,1,1,1)
  (same comment as for waste bitumen)
  production volume
    calculated in proportion to wastewater reference product
  properties: dry mass 1 kg, wet mass 1 kg
- waste rubber, unspecified: -3.73645e-5, -2.35252e-5 kg (2 suppliers, which the file names only by identifier); sum of these -6.08897e-5 kg; lognormal variance with pedigree 0.3609, pedigree (1,1,1,1,1)
  (same comment as for waste bitumen)
  production volume
    calculated in proportion to wastewater reference product
  properties: carbon content, fossil 0.853, dry mass 1 kg, heating value, net 27.19 MJ, wet mass 1 kg

## Inputs from nature
- Occupation, construction site [natural resource, land]: 9.18595e-5 m2*year; lognormal variance with pedigree 0.3611, pedigree (1,1,2,1,1)
  land use for infrastructure for wastewater treatment plant.
  Uncertainty: Uncertainty calculated from wastewater technosphere fate uncertainty and treatment infrastructure uncertainty.
- Occupation, industrial area [natural resource, land]: 0.00110231 m2*year; lognormal variance with pedigree 0.3611, pedigree (1,1,2,1,1)
  (same comment as for Occupation, construction site)
- Occupation, urban/industrial fallow (non-use) [natural resource, land]: 0.000734876 m2*year; lognormal variance with pedigree 0.3611, pedigree (1,1,2,1,1)
  (same comment as for Occupation, construction site)
- Oxygen [natural resource, in air]: 0.957099 kg; lognormal variance with pedigree 0.3095, pedigree (1,1,2,1,1)
  Oxygen input for wastewater treatment (biological stage + biogas combustion).
  Uncertainty: Uncertainty calculated from wastewater technosphere fate uncertainty, wastewater composition uncertainty, and treatment model uncertainty.
- Transformation, from pasture, man made [natural resource, land]: 4.59298e-5 m2; lognormal variance with pedigree 0.3611, pedigree (1,1,2,1,1)
  (same comment as for Occupation, construction site)
- Transformation, to industrial area [natural resource, land]: 2.75579e-5 m2; lognormal variance with pedigree 0.3611, pedigree (1,1,2,1,1)
  (same comment as for Occupation, construction site)
- Transformation, to urban/industrial fallow (non-use) [natural resource, land]: 1.83719e-5 m2; lognormal variance with pedigree 0.3611, pedigree (1,1,2,1,1)
  (same comment as for Occupation, construction site)

## Emissions to nature
- Antimony ion [air, non-urban air or from high stacks]: 8.72243e-11 kg; lognormal variance with pedigree 1.5932, pedigree (1,1,2,1,1)
  emission from rural wastewater treatment plant.
  Uncertainty: Uncertainty calculated from wastewater technosphere fate uncertainty, wastewater composition uncertainty, and treatment model uncertainty.
- Antimony ion [air, urban air close to ground]: 1.86043e-10 kg; lognormal variance with pedigree 1.5932, pedigree (1,1,2,1,1)
  emission from urban wastewater treatment plant.
  Uncertainty: Uncertainty calculated from wastewater technosphere fate uncertainty, wastewater composition uncertainty, and treatment model uncertainty
- Arsenic ion [air, non-urban air or from high stacks]: 4.07671e-10 kg; lognormal variance with pedigree 1.7542, pedigree (1,1,2,1,1)
  (same comment as for Antimony ion)
- Arsenic ion [air, urban air close to ground]: 8.6953e-10 kg; lognormal variance with pedigree 1.7542, pedigree (1,1,2,1,1)
  (same comment as for Antimony ion)
- Cadmium II [air, non-urban air or from high stacks]: 9.37612e-13 kg; lognormal variance with pedigree 1.6902, pedigree (1,1,2,1,1)
  (same comment as for Antimony ion)
- Cadmium II [air, urban air close to ground]: 1.99985e-12 kg; lognormal variance with pedigree 1.6902, pedigree (1,1,2,1,1)
  (same comment as for Antimony ion)
- Carbon dioxide, fossil [air, non-urban air or from high stacks]: 0.00814132 kg; lognormal variance with pedigree 0.2928, pedigree (1,1,2,1,1)
  emission from rural wastewater treatment plant. Contribution from biological treatment stage (stage 2) in WWTP is 57.05%. Contribution from biogas combustion in WWTP is 42.95%.
  Uncertainty: Uncertainty calculated from wastewater technosphere fate uncertainty, wastewater composition uncertainty, and treatment model uncertainty.
- Carbon dioxide, fossil [air, urban air close to ground]: 0.0173648 kg; lognormal variance with pedigree 0.2928, pedigree (1,1,2,1,1)
  emission from urban wastewater treatment plant. Contribution from biological treatment stage (stage 2) in WWTP is 57.05%. Contribution from biogas combustion in WWTP is 42.95%.
  Uncertainty: Uncertainty calculated from wastewater technosphere fate uncertainty, wastewater composition uncertainty, and treatment model uncertainty
- Carbon dioxide, non-fossil [air, non-urban air or from high stacks]: 0.139554 kg; lognormal variance with pedigree 0.2706, pedigree (1,1,2,1,1)
  emission from rural wastewater treatment plant. Contribution from biological treatment stage (stage 2) in WWTP is 73.49%. Contribution from biogas combustion in WWTP is 26.51%.
  Uncertainty: Uncertainty calculated from wastewater technosphere fate uncertainty, wastewater composition uncertainty, and treatment model uncertainty.
- Carbon dioxide, non-fossil [air, urban air close to ground]: 0.297659 kg; lognormal variance with pedigree 0.2706, pedigree (1,1,2,1,1)
  emission from urban wastewater treatment plant. Contribution from biological treatment stage (stage 2) in WWTP is 73.49%. Contribution from biogas combustion in WWTP is 26.51%.
  Uncertainty: Uncertainty calculated from wastewater technosphere fate uncertainty, wastewater composition uncertainty, and treatment model uncertainty
- Dinitrogen monoxide [air, non-urban air or from high stacks]: 0.000241721 kg; lognormal variance with pedigree 0.4046, pedigree (1,1,2,1,1)
  (same comment as for Antimony ion)
- Dinitrogen monoxide [air, urban air close to ground]: 0.000515573 kg; lognormal variance with pedigree 0.4046, pedigree (1,1,2,1,1)
  (same comment as for Antimony ion)
- Heat, waste [air, non-urban air or from high stacks]: 1.89291 MJ; lognormal variance with pedigree 0.4797, pedigree (1,1,2,1,1)
  emission from rural wastewater treatment plant from digester gas combustion and infrastructure electricity use.
  Uncertainty: Uncertainty calculated from wastewater technosphere fate uncertainty, wastewater composition uncertainty, treatment infrastructure uncertainty, and treatment model uncertainty.
- Heat, waste [air, urban air close to ground]: 4.90894 MJ; lognormal variance with pedigree 0.4797, pedigree (1,1,2,1,1)
  emission from urban wastewater treatment plant from digester gas combustion and infrastructure electricity use.
  Uncertainty: Uncertainty calculated from wastewater technosphere fate uncertainty, wastewater composition uncertainty, and treatment model uncertainty
- Lead II [air, non-urban air or from high stacks]: 9.47539e-14 kg; lognormal variance with pedigree 1.7072, pedigree (1,1,2,1,1)
  (same comment as for Antimony ion)
- Lead II [air, urban air close to ground]: 2.02103e-13 kg; lognormal variance with pedigree 1.7072, pedigree (1,1,2,1,1)
  (same comment as for Antimony ion)
- Mercury II [air, non-urban air or from high stacks]: 1.06814e-13 kg; lognormal variance with pedigree 2.0832, pedigree (1,1,2,1,1)
  (same comment as for Antimony ion)
- Mercury II [air, urban air close to ground]: 2.27826e-13 kg; lognormal variance with pedigree 2.0832, pedigree (1,1,2,1,1)
  (same comment as for Antimony ion)
- Methane, fossil [air, non-urban air or from high stacks]: 6.14924e-6 kg; lognormal variance with pedigree 0.6781, pedigree (1,1,2,1,1)
  (same comment as for Antimony ion)
- Methane, fossil [air, urban air close to ground]: 1.31159e-5 kg; lognormal variance with pedigree 0.6781, pedigree (1,1,2,1,1)
  (same comment as for Antimony ion)
- Methane, non-fossil [air, non-urban air or from high stacks]: 6.59166e-5 kg; lognormal variance with pedigree 0.6781, pedigree (1,1,2,1,1)
  (same comment as for Antimony ion)
- Methane, non-fossil [air, urban air close to ground]: 0.000140595 kg; lognormal variance with pedigree 0.6781, pedigree (1,1,2,1,1)
  (same comment as for Antimony ion)
- Nitrogen oxides [air, non-urban air or from high stacks]: 0.000191056 kg; lognormal variance with pedigree 0.6992, pedigree (1,1,2,1,1)
  (same comment as for Antimony ion)
- Nitrogen oxides [air, urban air close to ground]: 0.000407508 kg; lognormal variance with pedigree 0.6992, pedigree (1,1,2,1,1)
  (same comment as for Antimony ion)
- Particulate Matter, < 2.5 um [air, non-urban air or from high stacks]: 1.25468e-6 kg; lognormal variance with pedigree 0.2775, pedigree (1,1,2,1,1)
  (same comment as for Antimony ion)
- Particulate Matter, < 2.5 um [air, urban air close to ground]: 2.67614e-6 kg; lognormal variance with pedigree 0.2775, pedigree (1,1,2,1,1)
  (same comment as for Antimony ion)
- Sulfur dioxide [air, non-urban air or from high stacks]: 4.70086e-6 kg; lognormal variance with pedigree 0.9144, pedigree (1,1,2,1,1)
  (same comment as for Antimony ion)
- Sulfur dioxide [air, urban air close to ground]: 1.00266e-5 kg; lognormal variance with pedigree 0.9144, pedigree (1,1,2,1,1)
  (same comment as for Antimony ion)
- Tin ion [air, non-urban air or from high stacks]: 3.52873e-14 kg; lognormal variance with pedigree 1.9582, pedigree (1,1,2,1,1)
  (same comment as for Antimony ion)
- Tin ion [air, urban air close to ground]: 7.5265e-14 kg; lognormal variance with pedigree 1.9582, pedigree (1,1,2,1,1)
  (same comment as for Antimony ion)
- Water [air, non-urban air or from high stacks]: 3.78972e-5 m3; lognormal variance with pedigree 0.4718, pedigree (1,1,2,1,1)
  emission of water to air from rural wastewater treatment plant due to evaporation and digester gas combustion.
  Uncertainty: Uncertainty calculated from wastewater technosphere fate uncertainty, wastewater composition uncertainty, and treatment model uncertainty.
- Water [air, urban air close to ground]: 9.82797e-5 m3; lognormal variance with pedigree 0.4718, pedigree (1,1,2,1,1)
  emission of water to air from urban wastewater treatment plant due to evaporation and digester gas combustion.
  Uncertainty: Uncertainty calculated from wastewater technosphere fate uncertainty, wastewater composition uncertainty, and treatment model uncertainty
- Non-hazardous waste disposed [inventory indicator, waste]: 1000 kg
  Inventory indicator for waste mass disposed. To be used in EN15804 "other data" results.
- Aluminium III [water, surface water]: 0.0133841 kg; lognormal variance with pedigree 0.4691, pedigree (1,1,2,1,1)
  (same comment as for Antimony ion)
- Antimony ion [water, surface water]: 1.88434e-5 kg; lognormal variance with pedigree 1.0752, pedigree (1,1,2,1,1)
  (same comment as for Antimony ion)
- Arsenic ion [water, surface water]: 2.71687e-6 kg; lognormal variance with pedigree 1.2442, pedigree (1,1,2,1,1)
  (same comment as for Antimony ion)
- BOD5, Biological Oxygen Demand [water, surface water]: 0.0430958 kg; lognormal variance with pedigree 0.6709, pedigree (1,1,2,1,1)
  (same comment as for Antimony ion)
- Barium II [water, surface water]: 0.000548116 kg; lognormal variance with pedigree 0.7655, pedigree (1,1,2,1,1)
  (same comment as for Antimony ion)
- Boron [water, surface water]: 0.00165975 kg; lognormal variance with pedigree 0.8846, pedigree (1,1,2,1,1)
  (same comment as for Antimony ion)
- Bromine [water, surface water]: 0.000419443 kg; lognormal variance with pedigree 0.8973, pedigree (1,1,2,1,1)
  (same comment as for Antimony ion)
- COD, Chemical Oxygen Demand [water, surface water]: 0.175225 kg; lognormal variance with pedigree 0.6709, pedigree (1,1,2,1,1)
  (same comment as for Antimony ion)
- Cadmium II [water, surface water]: 2.96128e-6 kg; lognormal variance with pedigree 1.8032, pedigree (1,1,2,1,1)
  (same comment as for Antimony ion)
- Calcium II [water, surface water]: 0.0627622 kg; lognormal variance with pedigree 0.3932, pedigree (1,1,2,1,1)
  (same comment as for Antimony ion)
- Chloride [water, surface water]: 0.308951 kg; lognormal variance with pedigree 0.328, pedigree (1,1,2,1,1)
  (same comment as for Antimony ion)
- Chromium VI [water, surface water]: 6.1352e-6 kg; lognormal variance with pedigree 1.8522, pedigree (1,1,2,1,1)
  (same comment as for Antimony ion)
- Cobalt II [water, surface water]: 5.54142e-6 kg; lognormal variance with pedigree 1.2292, pedigree (1,1,2,1,1)
  (same comment as for Antimony ion)
- Copper ion [water, surface water]: 7.45994e-6 kg; lognormal variance with pedigree 1.4892, pedigree (1,1,2,1,1)
  (same comment as for Antimony ion)
- DOC, Dissolved Organic Carbon [water, surface water]: 0.0289553 kg; lognormal variance with pedigree 0.6709, pedigree (1,1,2,1,1)
  (same comment as for Antimony ion)
- Fluoride [water, surface water]: 0.000266757 kg; lognormal variance with pedigree 0.8966, pedigree (1,1,2,1,1)
  (same comment as for Antimony ion)
- Heat, waste [water, surface water]: 3.56187 MJ; lognormal variance with pedigree 0.3752, pedigree (1,1,2,1,1)
  emission from wastewater treatment plant from degraded organics in biological stage.
  Uncertainty: Uncertainty calculated from wastewater technosphere fate uncertainty, wastewater composition uncertainty, and treatment model uncertainty
- Iodide [water, surface water]: 2.04506e-6 kg; lognormal variance with pedigree 1.3812, pedigree (1,1,2,1,1)
  (same comment as for Antimony ion)
- Iron ion [water, surface water]: 0.00669944 kg; lognormal variance with pedigree 0.9655, pedigree (1,1,2,1,1)
  (same comment as for Antimony ion)
- Lead II [water, surface water]: 2.60576e-6 kg; lognormal variance with pedigree 2.1472, pedigree (1,1,2,1,1)
  (same comment as for Antimony ion)
- Magnesium [water, surface water]: 0.0940707 kg; lognormal variance with pedigree 0.4011, pedigree (1,1,2,1,1)
  (same comment as for Antimony ion)
- Manganese II [water, surface water]: 0.000146854 kg; lognormal variance with pedigree 1.2412, pedigree (1,1,2,1,1)
  (same comment as for Antimony ion)
- Mercury II [water, surface water]: 7.09448e-8 kg; lognormal variance with pedigree 2.1312, pedigree (1,1,2,1,1)
  (same comment as for Antimony ion)
- Molybdenum VI [water, surface water]: 5.75634e-6 kg; lognormal variance with pedigree 1.1682, pedigree (1,1,2,1,1)
  (same comment as for Antimony ion)
- Nickel II [water, surface water]: 4.77181e-5 kg; lognormal variance with pedigree 0.9522, pedigree (1,1,2,1,1)
  (same comment as for Antimony ion)
- Nitrate [water, surface water]: 0.928259 kg; lognormal variance with pedigree 0.3459, pedigree (1,1,2,1,1)
  (same comment as for Antimony ion)
- Phosphate [water, surface water]: 0.00326894 kg; lognormal variance with pedigree 0.7863, pedigree (1,1,2,1,1)
  (same comment as for Antimony ion)
- Potassium I [water, surface water]: 0.101102 kg; lognormal variance with pedigree 0.4155, pedigree (1,1,2,1,1)
  (same comment as for Antimony ion)
- Selenium IV [water, surface water]: 4.93613e-7 kg; lognormal variance with pedigree 1.4012, pedigree (1,1,2,1,1)
  (same comment as for Antimony ion)
- Silicon [water, surface water]: 0.0244357 kg; lognormal variance with pedigree 0.4206, pedigree (1,1,2,1,1)
  (same comment as for Antimony ion)
- Sodium I [water, surface water]: 0.259881 kg; lognormal variance with pedigree 0.3522, pedigree (1,1,2,1,1)
  (same comment as for Antimony ion)
- Sulfate [water, surface water]: 0.0688332 kg; lognormal variance with pedigree 0.5497, pedigree (1,1,2,1,1)
  (same comment as for Antimony ion)
- TOC, Total Organic Carbon [water, surface water]: 0.047358 kg; lognormal variance with pedigree 0.6709, pedigree (1,1,2,1,1)
  (same comment as for Antimony ion)
- Tin ion [water, surface water]: 2.24861e-7 kg; lognormal variance with pedigree 2.3892, pedigree (1,1,2,1,1)
  (same comment as for Antimony ion)
- Vanadium V [water, surface water]: 3.64965e-6 kg; lognormal variance with pedigree 1.8462, pedigree (1,1,2,1,1)
  (same comment as for Antimony ion)
- Water [water, surface water]: 0.995934 m3; lognormal variance with pedigree 0.000200546, pedigree (1,1,2,1,1)
  release of wastewater (treated or untreated) minus water evaporated to air in treatment plant, heeding any water generation from organic compound degradation in treatment plant.
  Uncertainty: Uncertainty calculated from wastewater technosphere fate uncertainty, wastewater composition uncertainty, and treatment model uncertainty
- Zinc II [water, surface water]: 7.45248e-5 kg; lognormal variance with pedigree 1.0672, pedigree (1,1,2,1,1)
  (same comment as for Antimony ion)
