# nutrient supply from potassium sulfate

Dataset: EcoSpold 2, unit process
Geography: RER
Time period: 2016-01-01 to 2023-12-31
Technology level: current
Classification: ISIC rev.4 ecoinvent: 0161:Support activities for crop production
Scenario: Business-as-Usual
System model: Allocation, cut-off by classification
Generated by: Avraam Symeonidis
Database: ecoinvent
isCopyrightProtected: true
accessRestrictedTo: 1

## General comment
This inventory describes the supply of nutrients from ''potassium sulfate'' for fertiliser use.
No machinery expenditures or emissions to the environment are considered related to the actual application of this substance on soil during its agricultural use. The purpose of this activity is to connect the chemical production of ''potassium sulfate'' with its generic use as fertilizer. The product ''potassium sulfate'' is connected to the generic market for ''inorganic potassium fertiliser, as K2O'' through this supplying activity. In the agricultural context, ''potassium sulfate'' can be used directly as a fertilizer input to crop production, eventually with other chemicals; alternatively, a generic input of ''inorganic potassium fertiliser, as K2O'' can be used instead, and this will represent the regional consumption mix for his type of nutrient. A way in between is allowed by using the generic input ''inorganic potassium fertiliser, as K2O'' and link to the activity providing it from a specific chemical.
In all cases, emissions associated to the application of the fertilizer have to be calculated in the crop production activity.

## Technology
Inventory based on composition of ''potassium sulfate''.

## Reference product
- inorganic potassium fertiliser, as K2O: 1 kg; name RP; By-product classification allocatable product; CPC 3463: Mineral or chemical fertilizers, potassic; HS2017 310420: Fertilizers, mineral or chemical; potassic, potassium chloride
  production volume 9.6983e7 kg; = 700840*1000*0.540551087116204*0.256
    The production volume has been extrapolated from the global production volume of this product in the database by employing GDP scaling. GDP for Europe is calculated to amount circa 25.6% of the global GDP. Original comment of the GLO dataset is: Esrimated value. Based on data from FAO, the global agricultural use of potassium sulfate amounts to 700840 t. The actual value here is calculated based on the nutrient content of the potassium sulfate.
    References: Fertilizers by Product, FAOSTAT, 2020, Food and Agricultural Organization of the United Nations. Accessed at: http://www.fao.org/faostat/en/#data/RFB, on 12 of May 2020.
  property carbon content, fossil 0
    Carbon content, fossil is calculated based on the chemical formula of the substance.
  property oxygen content 0.169852
    Oxygen content (on a dry matter basis) of inorganic potassium fertiliser, as K2O is calculated from the molecular formula of the substance (Potassium).
  property potassium content 0.830148
    Potassium content (on a dry matter basis) of inorganic potassium fertiliser, as K2O is calculated from the molecular formula of the substance (Potassium).
  property price 0.188 EUR2005
    Temporary price data. Calculated as 90% of purchasers price based on: 2004 import price calulated from FAOSTAT (http://faostat.fao.org/site/575/DesktopDefault.aspx?PageID=575#ancor [accessed 2011.01.27] Potash Fertilizers (K20 total nutrients) in kUSD/Mg
  properties: carbon allocation 0 kg, carbon content 0, carbon content, non-fossil 0, dry mass 1 kg, water content 0, water in wet mass 0 kg, wet mass 1 kg

## Inputs from technosphere
- potassium sulfate: 1.84996 kg; lognormal variance with pedigree 0.172, pedigree (3,5,3,1,4)
  properties: dry mass 1 kg, oxygen content 0.367255, potassium content 0.448737, sulfur content 0.184008, wet mass 1 kg
  note on oxygen content: Oxygen content (on a dry matter basis) of potassium sulfate is calculated from the molecular formula of the substance (K2O4S).
  note on potassium content: Potassium content (on a dry matter basis) of potassium sulfate is calculated from the molecular formula of the substance (K2O4S).
  note on sulfur content: Sulfur content (on a dry matter basis) of potassium sulfate is calculated from the molecular formula of the substance (K2O4S).
