# shale quarry operation

Dataset: EcoSpold 2, unit process
Geography: RoW
Time period: 2012-01-01 to 2023-12-31
Technology level: current
Classification: EcoSpold01Categories: construction materials/additives
Classification: ISIC rev.4 ecoinvent: 0810:Quarrying of stone, sand and clay
Scenario: Business-as-Usual
System model: Allocation, cut-off by classification
Generated by: Catherine Reid
Database: ecoinvent
isCopyrightProtected: true
accessRestrictedTo: 1

## General comment
This GLO dataset is extrapolated from the Quebec dataset which represents the extraction of 1 kg of shale in Quebec in 2012.
This dataset represent the extraction of shale in Quebec in 2012. Specific data were collected from the only producer of brick (made from shale) in Quebec, with an annual production of 70'000 tons.
The assumed thickness of shale on the site is 90 feet (sampling reveal the presence of shale at this depht) and because 30 feet has been used in the last 100 years, the total lifetime is estimated to 300 years.
No shale quarry construction is needed since the infrastructures are associated with the brick production. Therefore only the land transformation related to the quarry opening is accounted for in the current dataset.

## Included activities start
This activity start from the transformation of the land to create the shale production site (quarry).

## Included activities end
This activity ends with the transportation of the shale to the brick production facility.

The dataset includes excavation by digger, transportation to the grinding machine (brick production), the land-use of the mining and the recultivation area ("recultivation, bauxite mine" has been used as Proxy).

This dataset doesn't include the machinery for the site preparation and site closure.

## Geography
Extrapolated from the Québec dataset.

## Technology
Typical technology for Quebec shale mining

## Time period
The dataset represents the activity in Quebec in 2012

## Reference product
- shale: 1 kg; By-product classification allocatable product; CPC 15400: Clays; HS2017 250810: Clays (excluding expanded clays of heading no. 6806); bentonite, whether or not calcined
  Measured Value. Represent the extraction of shale used for brick production in Quebec in 2012.
  production volume 1.56856e10 kg; = 70000000*7.00e13/3.11e11
    Gross approximation of the production volume based on an estimate of the Quebec production volume (66957000 kg/year, taken from brick shale production, Québec 2012 dataset) scaled to GLO by the ratio of global and Quebec GDP for 2011 (7e13/3.11e11). It should be replaced as soon as better data is found.
  property bulk density 2000 kg/m3; name density_shale
    Estimation based on clay, at mine dataset (ecoinvent v2.2)
  property carbon content, fossil 0
    fossil carbon content on a dry matter basis
    Estimation based on the exchange properties of clay (ecoinvent v3) since clays are the major constituent of shales (http://en.wikipedia.org/wiki/Shale)
  property carbon content, non-fossil 0
    biogene carbon content on a dry matter basis
    Estimation based on the exchange properties of clay (ecoinvent v3) since clays are the major constituent of shales (http://en.wikipedia.org/wiki/Shale)
  property volume 27.43 m3; name Volume
    Estimation of the volume of clay per m2 assuming a clay layer of 90 feet.
  properties: carbon allocation 0 kg, carbon content 0, dry mass 0.965 kg, price 0.041 EUR2005, water content 0.0362694, water in wet mass 0.035 kg, wet mass 1 kg

## Inputs from technosphere
- diesel, burned in building machine: 0.0123962 MJ; = (fuel_input_diesel*density_diesel_buildingmachine*1000)*Net_heat_value_diesel_buildingmachine*42.8; lognormal variance with pedigree 0.008, pedigree (1,1,4,1,1)
  Calculated value. See parameters and exchange properties for details.
  EcoSpold01Location=GLO
  Uncertainty: Calculated variable. Uncertainty will be determined from propagation of uncertainty factors of underlying variables.
  property density 0.84 kg/l; name density_diesel_buildingmachine
  property fuel input in physical units, m3 3.448e-7 m3; name fuel_input_diesel
  property heating value, net 1 MJ; name Net_heat_value_diesel_buildingmachine
  note on density: Literature value. Value Taken from Table 5.1 of report "Overview and methodology, Data quality guideline for the ecoinvent database version 3" (ecoinvent report No. 1 (v3), 2011)
  note on heating value, net: Literature value. Net (lower) heating (calorific) value. Value Taken from Table 5.1 of report "Overview and methodology, Data quality guideline for the ecoinvent database version 3" (ecoinvent report No. 1 (v3), 2011)
- recultivation, shale quarry: 1.82282e-5 m2; = 1/(volume*density_shale); lognormal variance with pedigree 0.2106, pedigree (5,5,5,5,5)
  Estimated value. Proxy taken directly from ecoinvent dataset ''clay pit operation, GLO, 2002''
  Uncertainty: Proxy. The uncertainty has been maximized.

## Inputs from nature
- Occupation, mineral extraction site [natural resource, land]: 0.00546847 m2*year; = surface_site*lifetime; lognormal variance with pedigree 0.008, pedigree (1,1,4,1,1)
  Calculated value. See parameters and exchange properties for details.
  Uncertainty: Calculated variable. Uncertainty will be determined from propagation of uncertainty factors of underlying variables.
  property lifetime 300 year; name lifetime
- Shale [natural resource, in ground]: 1 kg; lognormal variance with pedigree 0.018, pedigree (1,5,4,5,1)
  Measured Value given by data provider (source : questionnaire).
- Transformation, from unspecified [natural resource, land]: 1.82282e-5 m2; name surface_site; = 1/(volume*density_shale); lognormal variance with pedigree 0.008, pedigree (1,1,4,1,1)
  (same comment as for Occupation, mineral extraction site)
- Transformation, to mineral extraction site [natural resource, land]: 1.82282e-5 m2; = 1/(volume*density_shale); lognormal variance with pedigree 0.008, pedigree (1,1,4,1,1)
  (same comment as for Occupation, mineral extraction site)

## Sampling procedure
Estimations from data provider and similar processes.

## Extrapolations
GLO dataset extrapolated from Quebec dataset.
In the Quebec dataset, the shale layer and diesel consumption are based on the only Quebec brick producer. Other information is rough estimation. The uncertainty has been adjusted accordingly.
