# trout feed production, commercial

Dataset: EcoSpold 2, unit process
Geography: RoW
Time period: 2012-01-01 to 2023-12-31
Technology level: current
Classification: ISIC rev.4 ecoinvent: 1080:Manufacture of prepared animal feeds
Scenario: Business-as-Usual
System model: Allocation, cut-off by classification
Generated by: Angel Avadí
Published in: Angel Avadí 2015
Database: ecoinvent
isCopyrightProtected: true
accessRestrictedTo: 1

## General comment
This activity presents data from the Anchoveta Supply Chain project. Composition data from trout feed used in Peru and Chile. Energy use data from Pelletier et al. (2009)

## Included activities start
The system boundaries for the inventory includes the partial life cycle of production means, from construction, through maintenance and the use phase.

## Included activities end
Activities include up to the emission of N and P to water, as well as the production of the trout, excluding freighting of trout for commercialization. Therefore, the gate of the farm can be considered the boundary.

## Geography
Trout feed formulation common in parts of the world where poultry by-products and high quality (i.e. high protein) fishmeal are readily available or easy (i.e. affordable) to import.

## Technology
Common feed formulation for salmonids

## Reference product
- trout feed, 42% protein: 1 kg; By-product classification allocatable product; CPC 2331: Preparations used in animal feeding; HS2017 230990: Dog or cat food; (not put up for retail sale), used in animal feeding
  Trout feed, 42% protein
  production volume 7.10634e8 kg; = 570908000*1.4
    570 908 t per year produced in the world (2012-2014), multiplied by the average FCR (1.4)
  property price 1.62383 EUR2005
    Calculated value based on data from United Nations Commodity Trade Statistics Database (comtrade.un.org). UN comtrade category: 230990 Dog or cat food; (not put up for retail sale), used in animal feeding. Year 2016. Using exchange rate of 1EURO = 1.209 USD. Average of price of import into 4 main markets (EU, US and IN).
  properties: carbon allocation 0 kg, carbon content 0

## Inputs from technosphere
All rows: lognormal variance with pedigree 0.041925, pedigree (2,2,5,2,2)
- electricity, medium voltage: 0.00231909, 0.0462606, 0.0155434, 0.000710185, 0.0100138, 0.000142143, 3.05212e-5, 0.00323024 kWh (8 suppliers, which the file names only by identifier); sum of these 0.07825 kWh
  Electricity use
- fish oil, from anchovy: 0.06 kg
  Fish oil from the coproduction of fishmeal and fish oil. The ratio between the two co-products cannot be modified.
- fishmeal, 65-67% protein: 0.2 kg
  Fishmeal from the coproduction of fishmeal and fish oil. The ratio between the two co-products cannot be modified.
- heat, district or industrial, natural gas: 0.6272 MJ
  Heat from LPG burned in industrial boiler
  properties: heating value, net 1 MJ
- heat, district or industrial, other than natural gas: 0.2098 MJ
  Heat from heavy fuel oil burned in industrial boiler
  properties: corresponding fuel use, propane, furnace >100kW 1.05263 MJ, heating value, net 1 MJ
  note on corresponding fuel use, propane, furnace >100kW: Lower heating value of the fuel input related to the heat/electricity output, taken directly from ecoinvent v3.0 dataset "heat production, natural gas, at industrial furnace >100kW, GLO 2000".
- maize grain, feed: 0.0988295, 0.00117055 kg (2 suppliers, which the file names only by identifier); sum of these 0.1 kg
  Maize and maize gluten meal
  properties: carbon content, non-fossil 0.46957, dry mass 0.86 kg, water content 0.162791, wet mass 1 kg
- meat and bone meal: 0.000336641, 0.199663 kg (2 suppliers, which the file names only by identifier); sum of these 0.2 kg
  Blood and meat meal from poultry
  properties: carbon content, non-fossil 0.521, dry mass 0.96 kg, heating value, net 21.45 MJ, water content 0.0416667, wet mass 1 kg
  note on carbon content, non-fossil: Boesch & Hellweg 2010, 2010, Boesch, M.E., Hellweg, S., Identifying Improvement Potentials in Cement Production with Life Cycle Assessment, Environmental Science & Technology, 44, 23, 9143-9149, 1 - Article, Supporting information is available via http://pubs.acs.org
- oil mill: 8.63334e-10 unit
  Aquafeed plant with processing capacity of 1782 t/y (oil mill: 63 t/day, 50 y)
  properties: lifetime capacity [kg] 1.1e9 kg
- protein feed, 100% crude: 0.007 kg
  Aminoacids by-products
  properties: carbon content, non-fossil 0.53, dry mass 1 kg, wet mass 1 kg
- quicklime, milled, loose: 0.0079337, 6.6303e-5 kg (2 suppliers, which the file names only by identifier); sum of these 0.008 kg
  Calcium carbonate
  properties: dry mass 0.99 kg, water content 0.010101, wet mass 1 kg
- rice, non-basmati: 0.1 kg
  properties: carbon content, non-fossil 0.46412, dry mass 0.87 kg, water content 0.149425, wet mass 1 kg
- sodium chloride, powder: 0.005 kg
  Vitamin+mineral mix
  properties: dry mass 1 kg, wet mass 1 kg
- soybean meal: 0.2 kg
  properties: carbon content, non-fossil 0.475627, dry mass 0.89 kg, water content 0.123596, wet mass 1 kg
- vegetable oil, refined: 0.02 kg
  palm oil (10) + soya bean oil (10)
  properties: carbon content, non-fossil 0.768, dry mass 1 kg, heating value, net 38.4 MJ, wet mass 1 kg
  note on heating value, net: Values is approximated from HHV from "vegetable oil, crude". Source: Radovanovic,M.; Zivanovic,T.; Stojiljkovic,D.; Jovanovic,V.; Jerinic,N.; Knezevic,S. et.al. Utilization of sunflower husk as a fuel for industrial boilers - 20 years experience. Proc. 5th Eur. Conf. on Industrial Furnaces&Boilers 2000,vol.2,p.221-233. Available at: https://phyllis.nl/Biomass/View/2152
- wheat grain, feed: 0.1 kg
  properties: carbon content, non-fossil 0.4646, dry mass 0.85 kg, water content 0.17647, wet mass 1 kg

## Extrapolations
Feed compositions and energy expenditures from various feeds used in Peru and Chile were asumed to represent trout feed used in all trout-producing South American countries
