# jute production, irrigated

Dataset: EcoSpold 2, unit process
Geography: RoW
Time period: 2015-12-15 to 2023-12-15
Technology level: current
Classification: ISIC rev.4 ecoinvent: 0116:Growing of fibre crops
Classification: EcoSpold01Categories: agricultural production/plant production
Scenario: Business-as-Usual
System model: Allocation, cut-off by classification
Generated by: Archana Datta
Published in: Faist Emmenegger, M. 2018
Database: ecoinvent
isCopyrightProtected: true
accessRestrictedTo: 1

## General comment
Jute farming activity in India starts right after the harvest of the previous non-jute crops in the field. Jute farming covers soil preparation (fall tillage), inputs of seeds, application of mineral fertilizers, jute plant harvesting. Two species of jute viz., Corchorus capsularis, known as white jute and Corchorus olitorius known as tossa/deshi jute belonging to the family Sparrmanniaceae, are being cultivated for fibre purpose. Jute is generally sown in February on lowlands and in March-May on uplands. The crop is harvested in about 110 days, but different varieties take different time to mature. The harvesting period generally ranges from July till October.
Jute cultivation does not involve heavy doses of pesticides, however for better crop, manuring with farm yard manure and fertilizers is recommended. Usually, Jute crop can be grown in rain-fed and irrigated conditions both, but in irrigated condition, higher production can be obtained.
The dataset represents the production of 1 kg of jute plant in India in 2016. The farm has a yield of 40,000 kg fresh green matter per ha for this crop cycle. Mineral NPK fertilizer input is 80-40-40 kg/ha. Organic fertilizer applied amounts to 5,000 kg/ha of manure from cattle dung.The activity covers soil preparation (fall tillage), inputs of seeds, mineral fertilizers, harvesting. Machinery and fixed overhead are excluded.
This dataset covers only the field activities for the production of jute. That means the technical boundary ends at the harvesting of the mature jute plant. The transformation of jute from the jute plant - the jute retting process - is covered in a separate dataset.

## Included activities start
This activity starts right after the harvest of the previous crop. The soil is prepared for the jute cultivation.

## Included activities end
The activity ends at the harvesting of the mature jute plant.

## Geography
This dataset is a copy of Indian dataset

## Technology
Cultivation of Jute from conventional production standards

## Time period
Soil cultivating date for main crop: 15 April 2016; Harvesting date main crop: 15 Aug, 2016. Total harvesting time is approx 110 days. Data is for one crop cycle. Cycle of one year considered for entry in ecoeditor

## Reference product
- jute plant, harvested: 1 kg; By-product classification allocatable product; CPC 01922: Jute, kenaf, and other textile bast fibres, raw or retted, except flax, true hemp and ramie; HS2017 5303: Jute and other textile bast fibres (not flax, true hemp and ramie), raw or processed but not spun; tow and wa[...]
  The output of the jute cultivation activity. Mature jute plant s harvested. Jute is generally harvested when the plants are at early pod stage. The harvest index remains more or less constant over 60–105 day period following sowing. However, it reaches its peak during 110-120 day period following sowing.
  The plants are usually cut close to the ground by hand. A curved, sickle type knife is used to cut the plants. The plants are then sorted out according to height and diameter. The assorted plants are tied into bundles. Each bundle weighs 8-10 kg. The bundles are kept standing in the field for 3–4 days for defoliation.
  production volume 1.45316e9 kg; name PV_RP; = 2081000*1000
    Data for year 2010-11. Source: http://jute.org/IJSG%20Publications/Jute%20&%20kenaf%20Stat%20at%20a%20glance_ijsg.pdfhttp://jute.org/IJSG%20Publications/Jute%20&%20kenaf%20Stat%20at%20a%20glance_ijsg.pdf
  property price 0.362736 EUR2005
    Literature value. Price from FAOSTAT data Producer Prices - Annual (retrieved from: http://www.fao.org/faostat/en/#data/PP, accessed 15Feb2018). Data from 2005.
  properties: carbon allocation 0 kg, carbon content 0, dry mass 0.177647 kg

## Inputs from technosphere
- [thio]carbamate-compound: 1.875e-5 kg; lognormal variance with pedigree 0.0078, pedigree (3,3,3,5,2)
  The data was collected for a hectare area through interview
  properties: carbon content, fossil 0.626349, dry mass 1 kg, wet mass 1 kg
- ammonia, anhydrous, liquid: 4.52301e-9, 1.94314e-8, 9.73217e-8, 4.11385e-9, 9.20248e-10, 3.38208e-8, 2.9073e-9, 8.96169e-9 kg (8 suppliers, which the file names only by identifier); sum of these 1.72e-7 kg; lognormal variance with pedigree 0.0078, pedigree (3,3,3,5,2)
  Calculated Value. This value has been calculated by using the Ecoinvent LCI calculation tool for crop production.
  properties: dry mass 1 kg, wet mass 1 kg
- ammonium nitrate: 9.98178e-8, 5.32086e-8, 1.80628e-7, 6.92273e-8 kg (4 suppliers, which the file names only by identifier); sum of these 4.02882e-7 kg; lognormal variance with pedigree 0.0078, pedigree (3,3,3,5,2)
  The exchange has been updated from 'ammonium nitrate, as N' into 'ammonium nitrate' and therefore its amount has been scaled (multiplied) from 0 kg by 2.8573 kg of 'ammonium nitrate' per kg of 'ammonium nitrate, as N'. Original comment of the exchange is: Calculated Value. This value has been calculated by using the Ecoinvent LCI calculation tool for crop production.
  properties: dry mass 1 kg, wet mass 1 kg
- ammonium sulfate: 1.01005e-5, 3.0995e-6 kg (2 suppliers, which the file names only by identifier); sum of these 1.32e-5 kg; lognormal variance with pedigree 0.0078, pedigree (3,3,3,5,2)
  (same comment as for ammonia, anhydrous, liquid)
  properties: dry mass 1 kg, wet mass 1 kg
- benzimidazole-compound: 1.875e-5 kg; lognormal variance with pedigree 0.0078, pedigree (3,3,3,5,2)
  Calculated Value. This value has been calculated by using the ecoinvent LCI calculation tool for crop production.
  properties: carbon content, fossil 0.529668, dry mass 1 kg, wet mass 1 kg
- inorganic nitrogen fertiliser, as N: 4.31284e-8, 1.01204e-5, 1.20052e-6, 1.28915e-5, 2.94883e-6, 1.24879e-6, 1.15095e-5, 1.08079e-6, 7.58224e-6, 7.75668e-7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 kg (29 suppliers, which the file names only by identifier); sum of these 0.0011925 kg; lognormal variance with pedigree 0.0078, pedigree (3,3,3,5,2)
  This exchange is an aggregation of amounts:
  7.94002417686234E-4. Comment:
  1.2144723120596059E-4. Comment:
  1.2144723120596059E-4. Comment:
  1.231525904104482E-4. Comment:
  3.1481232748329797E-6. Comment:
  2.93065224707486E-5. Comment:
  properties: dry mass 1 kg, wet mass 1 kg
- inorganic phosphorus fertiliser, as P2O5: 7.63356e-6, 1.69438e-5, 0.000146592, 4.73085e-6, 1.16181e-6, 1.6452e-6, 4.10451e-6, 5.3911e-7, 2.64225e-6, 6.29972e-8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 kg (29 suppliers, which the file names only by identifier); sum of these 0.000999094 kg; lognormal variance with pedigree 0.0078, pedigree (3,3,3,5,2)
  This exchange is an aggregation of amounts:
  4.44211040383734E-6. Comment:
  8.163715852112509E-5. Comment:
  3.66667558656708E-4. Comment:
  3.66667558656708E-4. Comment:
  1.79679128882526E-4. Comment:
  properties: dry mass 1 kg, wet mass 1 kg
- inorganic potassium fertiliser, as K2O: 1.74461e-6, 5.6627e-7, 1.96113e-7, 8.38829e-6, 2.52323e-7, 9.7182e-7, 4.20123e-7, 1.58223e-8, 2.43704e-5, 1.41984e-6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 kg (29 suppliers, which the file names only by identifier); sum of these 0.00029221 kg; lognormal variance with pedigree 0.0078, pedigree (3,3,3,5,2)
  (same comment as for ammonia, anhydrous, liquid)
  properties: dry mass 1 kg, wet mass 1 kg
- irrigation: 1.63344e-5, 0.000326661, 0.0199337, 0.000251663, 0.000674757, 0.000927507, 0.0719079, 0.000147212, 3.78608e-6, 0.00884676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 m3 (16 suppliers, which the file names only by identifier); sum of these 0.1105 m3; lognormal variance with pedigree 0.0078, pedigree (3,3,3,5,2)
  The data was collected for a hectare area through interview.
  properties: dry mass 0.11 kg, water content 9089.91, wet mass 1000 kg
- lime: 0.00262469, 0.000226691 kg (2 suppliers, which the file names only by identifier); sum of these 0.00285138 kg; lognormal variance with pedigree 0.0078, pedigree (3,3,3,5,2)
  This exchange is an aggregation of amounts:
  0.0010405428165078095. Comment:
  0.0010405428165078095. Comment:
  7.702966714905932E-4. Comment:
  properties: carbon content, fossil 0.120005, dry mass 1 kg, wet mass 1 kg
- linseed seed, at farm: 0.00015 kg; lognormal variance with pedigree 0.0078, pedigree (3,3,3,5,2)
  data for jute seeds. kg/ha broadcast
  properties: carbon content, non-fossil 1, dry mass 1 kg, wet mass 1 kg
- manure, solid, cattle: 0.125 kg; lognormal variance with pedigree 0.0078, pedigree (3,3,3,5,2)
  The data was collected for a hectare area through interview
  properties: carbon content, non-fossil 0.441, dry mass 0.22 kg, water content 3.5454, wet mass 1 kg
- packaging, for fertilisers: 0.0137028 kg; lognormal variance with pedigree 0.0532, pedigree (4,3,3,5,4)
  Total amount of active substance/s of fertilisers needed for the production of 'jute plant, harvested' is calculated to be circa 6.85E-03 kg. Fertiliser/s used in this dataset is/are: 'ammonia, liquid', 'ammonium nitrate, as N', 'ammonium sulfate, as N', 'lime', 'nitrogen fertiliser, as N', 'phosphate fertiliser, as P2O5', 'phosphate rock, as P2O5, beneficiated, dry', 'potassium chloride, as K2O', 'potassium fertiliser, as K2O', 'potassium sulfate, as K2O', 'urea, as N'. The total amount of active substance/s is doubled in order to account for the packaging of the dilluted product of fertiliser/s that is/are applied. Therefore, 1.37E-02 kg of packaging for fertilisers is justified with this exchange.
  properties: carbon content, fossil 0.825301, dry mass 1 kg, heating value, net 25.01 MJ, price 0.0642 EUR2005, wet mass 1 kg
  note on carbon content, fossil: Considering a chemical formula (C2H4)n for polyethylene, carbon content-fossil is calculated to be 0.856286 kg of Carbon per kg of dry mass.
- packaging, for pesticides: 0.000175 kg; lognormal variance with pedigree 0.0532, pedigree (4,3,3,5,4)
  Total amount of active substance/s of pesticides needed for the production of jute plant, harvested is calculated to be circa 8.75E-05 kg. Pesticide/s used in this dataset is/are: '[thio]carbamate-compound', 'benzimidazole-compound', 'pendimethalin'. The total amount of active substance/s is doubled in order to account for the packaging of the dilluted product of pesticide/s that is/are applied. Therefore, 1.75E-04 kg of packaging for pesticides is justified with this exchange.
  properties: carbon content, fossil 0.85714, dry mass 1 kg, heating value, net 25.97 MJ, price 0.0642 EUR2005, wet mass 1 kg
- pendimethalin: 5e-5 kg; lognormal variance with pedigree 0.0078, pedigree (3,3,3,5,2)
  The data was collected for a hectare area through interview
  properties: carbon content, fossil 0.55516, dry mass 1 kg, wet mass 1 kg
- phosphate rock, beneficiated: 3.64737e-8, 3.64737e-8, 1.24412e-8, 2.74738e-6 kg (4 suppliers, which the file names only by identifier); sum of these 2.83277e-6 kg; lognormal variance with pedigree 0.0132, pedigree (3,3,3,5,2)
  The exchange has been updated from 'phosphate rock, as P2O5, beneficiated, dry' into 'phosphate rock, beneficiated' and therefore its amount has been scaled (multiplied) from 0 kg by 3.125 kg of 'phosphate rock, beneficiated' per kg of 'phosphate rock, as P2O5, beneficiated, dry'. Original comment of the exchange is: Calculated Value. This value has been calculated by using the Ecoinvent LCI calculation tool for crop production.
  properties: dry mass 1 kg, wet mass 1 kg
- potassium chloride: 8.52092e-5, 0.00102745 kg (2 suppliers, which the file names only by identifier); sum of these 0.00111266 kg; lognormal variance with pedigree 0.0078, pedigree (3,3,3,5,2)
  The exchange has been updated from 'potassium chloride, as K2O' into 'potassium chloride' and therefore its amount has been scaled (multiplied) from 0.0007 kg by 1.5829 kg of 'potassium chloride' per kg of 'potassium chloride, as K2O'. Original comment of the exchange is: Calculated Value. This value has been calculated by using the Ecoinvent LCI calculation tool for crop production.
  properties: dry mass 1 kg, wet mass 1 kg
- potassium sulfate: 1.5644e-6, 7.42642e-6 kg (2 suppliers, which the file names only by identifier); sum of these 8.99082e-6 kg; lognormal variance with pedigree 0.0078, pedigree (3,3,3,5,2)
  The exchange has been updated from 'potassium sulfate, as K2O' into 'potassium sulfate' and therefore its amount has been scaled (multiplied) from 0 kg by 1.85 kg of 'potassium sulfate' per kg of 'potassium sulfate, as K2O'. Original comment of the exchange is: Calculated Value. This value has been calculated by using the Ecoinvent LCI calculation tool for crop production.
  properties: dry mass 1 kg, wet mass 1 kg
- tillage, harrowing, by rotary harrow: 3.86e-5 ha; lognormal variance with pedigree 0.0078, pedigree (3,3,3,5,2)
  The data was collected for a hectare area through interview. The tillage activity was scaled based on the diesel used for tillage in the ecoinvent dataset and the diesel consumption data collected in the project
- urea: 0.00079646, 0.00010073, 0.000124871, 0.00068012 kg (4 suppliers, which the file names only by identifier); sum of these 0.00170218 kg; lognormal variance with pedigree 0.0078, pedigree (3,3,3,5,2)
  The exchange has been updated from 'urea, as N' into 'urea' and therefore its amount has been scaled (multiplied) from 0.0008 kg by 2.1438 kg of 'urea' per kg of 'urea, as N'. Original comment of the exchange is: The data was collected for a hectare area through interview
  properties: carbon content, fossil 0.2, dry mass 1 kg, wet mass 1 kg
- waste wood, untreated: -0.000140567, -0.10475, -0.00192265, -0.000815832, -0.0330965, -0.00128976, -0.0154846 kg (7 suppliers, which the file names only by identifier); sum of these -0.1575 kg; lognormal variance with pedigree 0.0058, pedigree (3,3,1,5,2)
  This exchange is an aggregation of amounts:
  0.1125. Comment: Sticks, Used in burning as fuel
  0.0075. Comment: seeds
  0.0375. Comment: leaves. Added to field itself during crop growth
  production volume; = PV_RP*wastewood
    Calculated from production volume of reference product using the relative outputs.
  properties: heating value, net 13.99 MJ
  note on heating value, net: Value taken from the general comment of the treatment dataset.

## Inputs from nature
- Carbon dioxide, in air [natural resource, in air]: 0.967346 kg; lognormal variance with pedigree 0.0078, pedigree (3,3,3,5,2)
  (same comment as for ammonia, anhydrous, liquid)
- Energy, gross calorific value, in biomass [natural resource, biotic]: 11.25 MJ; lognormal variance with pedigree 0.0078, pedigree (3,3,3,5,2)
  The data was collected for a hectare area through interview
- Occupation, annual crop, irrigated [natural resource, land]: 0.166667 m2*year; lognormal variance with pedigree 0.0092, pedigree (3,3,3,5,2)
  (same comment as for ammonia, anhydrous, liquid)
- Transformation, from annual crop, irrigated [natural resource, land]: 0.25 m2; lognormal variance with pedigree 0.0152, pedigree (3,3,3,5,2)
  (same comment as for ammonia, anhydrous, liquid)
- Transformation, to annual crop, irrigated [natural resource, land]: 0.25 m2; lognormal variance with pedigree 0.0152, pedigree (3,3,3,5,2)
  (same comment as for ammonia, anhydrous, liquid)

## Emissions to nature
- Ammonia [air, non-urban air or from high stacks]: 0.000420115 kg; lognormal variance with pedigree 0.0212, pedigree (4,5,3,5,2)
  (same comment as for ammonia, anhydrous, liquid)
- Carbon dioxide, fossil [air, non-urban air or from high stacks]: 0.0032437 kg; lognormal variance with pedigree 0.0212, pedigree (4,5,3,5,2)
  (same comment as for ammonia, anhydrous, liquid)
- Carbon dioxide, from soil or biomass stock [air, non-urban air or from high stacks]: 0.0410448 kg; = 110/2680
  Due to lack o data related to land use change of annual crops in Bangladesh, this exchange is added to cover the impact of LUC, using the methodology applied in Global datasets.
  Global average LUC emissions according 2nd edition of the Quantis-modified tool developed by Blonk Consultants 'WFLDB-adapted-Blonk 2014 direct-land-use-change-assessment-tool_2015-05-18a.xlsx', tab. 'Country & land use unknown'. The emission are based on the relative change in production areas in all countries for a given crop. The weighted average is used which takes into acount relative difference in crop expansion into primary forest, secondary forest, grassland, perennial and annual land. The amount of 110 kg of CO2 per ha*year (taken from the tool) is divided with the yield of jute plant, harvested, 2680 kg/ha.
- Dinitrogen monoxide [air, non-urban air or from high stacks]: 5.98e-5 kg; lognormal variance with pedigree 0.0212, pedigree (4,5,3,5,2)
  (same comment as for ammonia, anhydrous, liquid)
- Nitrogen oxides [air, non-urban air or from high stacks]: 0.000161753 kg; lognormal variance with pedigree 0.0212, pedigree (4,5,3,5,2)
  (same comment as for ammonia, anhydrous, liquid)
- Water [air, non-urban air or from high stacks]: 0.056355 m3; lognormal variance with pedigree 0.0212, pedigree (4,5,3,5,2)
  (same comment as for ammonia, anhydrous, liquid)
- Cadmium II [soil, agricultural]: -2.94601e-8 kg
  (same comment as for ammonia, anhydrous, liquid)
- Carbendazim [soil, agricultural]: 1.875e-5 kg; lognormal variance with pedigree 0.037, pedigree (1,4,3,1,1)
  (same comment as for ammonia, anhydrous, liquid)
- Carbofuran [soil, agricultural]: 1.875e-5 kg; lognormal variance with pedigree 0.037, pedigree (1,4,3,1,1)
  (same comment as for ammonia, anhydrous, liquid)
- Chromium III [soil, agricultural]: -9.39014e-7 kg
  (same comment as for ammonia, anhydrous, liquid)
- Copper ion [soil, agricultural]: -4.76135e-6 kg
  (same comment as for ammonia, anhydrous, liquid)
- Lead II [soil, agricultural]: -5.74587e-7 kg
  (same comment as for ammonia, anhydrous, liquid)
- Mercury II [soil, agricultural]: -2.57192e-8 kg
  (same comment as for ammonia, anhydrous, liquid)
- Nickel II [soil, agricultural]: -1.2841e-6 kg
  (same comment as for ammonia, anhydrous, liquid)
- Pendimethalin [soil, agricultural]: 5e-5 kg; lognormal variance with pedigree 0.0536, pedigree (4,5,3,5,2)
  (same comment as for ammonia, anhydrous, liquid)
- Zinc II [soil, agricultural]: -2.01043e-5 kg
  (same comment as for ammonia, anhydrous, liquid)
- Cadmium II [water, ground-]: 6.81e-10 kg; lognormal variance with pedigree 0.0212, pedigree (4,5,3,5,2)
  (same comment as for ammonia, anhydrous, liquid)
- Cadmium II [water, surface water]: 1.06e-8 kg; lognormal variance with pedigree 0.0212, pedigree (4,5,3,5,2)
  (same comment as for ammonia, anhydrous, liquid)
- Chromium III [water, ground-]: 3.33e-7 kg; lognormal variance with pedigree 0.0212, pedigree (4,5,3,5,2)
  (same comment as for ammonia, anhydrous, liquid)
- Chromium III [water, surface water]: 1.22e-6 kg; lognormal variance with pedigree 0.0212, pedigree (4,5,3,5,2)
  (same comment as for ammonia, anhydrous, liquid)
- Copper ion [water, ground-]: 4.81e-8 kg; lognormal variance with pedigree 0.0212, pedigree (4,5,3,5,2)
  (same comment as for ammonia, anhydrous, liquid)
- Copper ion [water, surface water]: 8.67e-7 kg; lognormal variance with pedigree 0.0212, pedigree (4,5,3,5,2)
  (same comment as for ammonia, anhydrous, liquid)
- Lead II [water, ground-]: 2.64e-9 kg; lognormal variance with pedigree 0.0212, pedigree (4,5,3,5,2)
  (same comment as for ammonia, anhydrous, liquid)
- Lead II [water, surface water]: 2.77e-7 kg; lognormal variance with pedigree 0.0212, pedigree (4,5,3,5,2)
  (same comment as for ammonia, anhydrous, liquid)
- Mercury II [water, ground-]: 1.52e-11 kg; lognormal variance with pedigree 0.0212, pedigree (4,5,3,5,2)
  (same comment as for ammonia, anhydrous, liquid)
- Mercury II [water, surface water]: 2.76e-9 kg; lognormal variance with pedigree 0.0212, pedigree (4,5,3,5,2)
  (same comment as for ammonia, anhydrous, liquid)
- Nickel II [water, surface water]: 7.38e-7 kg; lognormal variance with pedigree 0.0212, pedigree (4,5,3,5,2)
  (same comment as for ammonia, anhydrous, liquid)
- Nitrate [water, ground-]: 0.00456323 kg; lognormal variance with pedigree 0.0606, pedigree (4,5,3,5,2)
  (same comment as for ammonia, anhydrous, liquid)
- Phosphate [water, ground-]: 3.58e-6 kg; lognormal variance with pedigree 0.0212, pedigree (4,5,3,5,2)
  (same comment as for ammonia, anhydrous, liquid)
- Phosphate [water, surface water]: 1.04e-5 kg; lognormal variance with pedigree 0.0212, pedigree (4,5,3,5,2)
  (same comment as for ammonia, anhydrous, liquid)
- Phosphorus [water, surface water]: 0.000110504 kg; lognormal variance with pedigree 0.0212, pedigree (4,5,3,5,2)
  (same comment as for ammonia, anhydrous, liquid)
- Water [water, ground-]: 0.043095 m3; lognormal variance with pedigree 0.0212, pedigree (4,5,3,5,2)
  (same comment as for ammonia, anhydrous, liquid)
- Water [water, surface water]: 0.01105 m3; lognormal variance with pedigree 0.0212, pedigree (4,5,3,5,2)
  (same comment as for ammonia, anhydrous, liquid)
- Zinc II [water, ground-]: 2.26e-7 kg; lognormal variance with pedigree 0.0212, pedigree (4,5,3,5,2)
  (same comment as for ammonia, anhydrous, liquid)
- Zinc II [water, surface water]: 1.1e-6 kg; lognormal variance with pedigree 0.0212, pedigree (4,5,3,5,2)
  (same comment as for ammonia, anhydrous, liquid)

## Sampling procedure
Focus group discussion, expert interviews, literature data and assumptions. Standardized questionnaires were developed and adapted to jute-specific cultivation and post-harvest situation. The secondary data from literature and the primary data from surveys were compared and matched to obtain highest data quality.

## Extrapolations
The data on inputs to the field activites are collected directly from the farmers and farming experts. However, the emission data were not readily available for India. Hence, Ecoinvent LCI calculation tool for crop production was used to calculate field emissions from the cultivation process.
