# lignite mine operation

Dataset: EcoSpold 2, unit process
Geography: RoW
Time period: 1983-01-01 to 2023-12-31
Technology level: current
Classification: EcoSpold01Categories: lignite/production
Classification: ISIC rev.4 ecoinvent: 0520:Mining of lignite
Tags: ConvertedDataset
Scenario: Business-as-Usual
System model: Allocation, cut-off by classification
Generated by: Christian Bauer
Published in: Röder, A. 2007
Database: ecoinvent
isCopyrightProtected: true
accessRestrictedTo: 1

## General comment
Recultivation to arable area is taken into account. Electricity and diesel uses are included. Electricity supply is modelled with the UCTE mix, because there is no detailed information about local conditions. Heat requirements are not accounted for because: heat use is only mentioned in a few cases; heat is also used for briquette production and its allocation to different uses is not given; heat is usually produced as coproduct by mine-mouth cogenerating plants for which no module has been developed. Particle emissions are calculated on the basis of direct measurements of total particles made in Germany between mining areas and nearest populated areas. Radon emissions are extrapolated from data for hard coal mining. Methane emissions are directly taken from literature. Emissions to water are only roughly estimated on the basis of limited information from Germany and Spain and may not reflect specific conditions. They are assumed to be released to rivers. Possible emissions to groundwater have not been accounted for. Solid wastes are deposited in the same open pit and therefore not taken into account in the module.
[This dataset was already contained in the ecoinvent database version 2. It was not individually updated during the transfer to ecoinvent version 3. Life Cycle Impact Assessment results may still have changed, as they are affected by changes in the supply chain, i.e. in other datasets. This dataset was generated following the ecoinvent quality guidelines for version 2. It may have been subject to central changes described in the ecoinvent version 3 change report (http://www.ecoinvent.org/database/ecoinvent-version-3/reports-of-changes/), and the results of the central updates were reviewed extensively. The changes added e.g. consistent water flows and other information throughout the database. The documentation of this dataset can be found in the ecoinvent reports of version 2, which are still available via the ecoinvent website. The change report linked above covers all central changes that were made during the conversion process.]

## Included activities end
The module quantifies the directly affected area and occupation during operation and restoration of the mine. Electricity requirements and some diesel for mining operation are included, as well as the groundwater pumped out of the mine.

## Geography
Average European conditions around the beginning of the 1990s..

## Technology
No specific information available.

## Parameters
- fraction, process water, to air: 0.15 dimensionless; name fraction_PW_to_air; lognormal variance with pedigree 0.092025, pedigree (4,4,3,2,4)

## Reference product
- lignite: 1 kg; name RP; By-product classification allocatable product; CPC 11030: Brown coal; HS2017 2702: Lignite; whether or not agglomerated, excluding jet; CAS 129521-66-0
  EcoSpold01Location=RER
  production volume 5.22957e11 kg; name RP_PV
    Literature data. Production volume from EY, 2014. European Lignite Mines Benchmarking. Retrieved from: http://www.ey.com/Publication/vwLUAssets/EY_European_Lignite_Mines_Benchmarking_2014/$FILE/EY-European-Lignite-Mines-Benchmarking-2014.pdf, accessed 8May2018.
  property carbon content, fossil 0.655
    C content of dry lignite is 58-73% (specified in Tab 1.1, report 6, part VI). A mean content of 0.655 kg C/kg dry lignite was considered.
  property heating value, net 8.8 MJ
    Based on literature, page 52, Dones R., Bauer C., Bolliger R., Burger B., Faist Emmenegger M., Frischknecht R., Heck T., Jungbluth N., Röder A., Tuchschmid M. (2007) Life Cycle Inventories of Energy Systems: Results for Current Systems in Switzerland and other UCTE Countries. ecoinvent report No. 5. Paul Scherrer Institut Villigen, Swiss Centre for Life Cycle Inventories, Dübendorf, CH.
  property price 0.042 EUR2005
    Calculated value based on data from United Nations Commodity Trade Statistics Database (comtrade.un.org). UN comtrade category: 270210 Lignite, not agglomerated. Year 2007. Using exchange rate of 1EURO = 1.209 USD. Average of price of import into 5 main markets (EU, US, JP, IN and CN).
  properties: carbon allocation 0.2751 kg, carbon content 0.655, carbon content, non-fossil 0, dry mass 0.42 kg, water content 1.38095, water in wet mass 0.58 kg, wet mass 1 kg

## Inputs from technosphere
- diesel, burned in building machine: 0.015 MJ; lognormal variance with pedigree 0.162, pedigree (1,1,5,5,1)
  EcoSpold01Location=GLO
  own assumption
  properties: heating value, net 1 MJ
- electricity, high voltage: 6.55774e-5, 6.55436e-6, 4.3503e-5, 0.000820357, 1.52528e-5, 0.00855537, 0.000223123, 0.000235149, 9.71686e-5, 4.47521e-5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 kWh (45 suppliers, which the file names only by identifier); sum of these 0.02 kWh; lognormal variance with pedigree 0.162, pedigree (1,1,5,5,1)
  own assumption
  EcoSpold01Location=UCTE
- mine infrastructure, open cast, lignite: 1e-11 unit; lognormal variance with pedigree 0.042, pedigree (1,1,5,5,1)
  per definition
  EcoSpold01Location=RER
- spoil from lignite mining: -11.13 kg; name spoil_BP; lognormal variance with pedigree 0.012, pedigree (1,1,1,5,1)
  EcoSpold01Location=GLO
  own assumption
  production volume; = spoil_BP* RP_PV/abs(RP)
    Calculated from the production volume of lignite in proportion to the respective output amounts.
  properties: carbon content, fossil 0.007879, dry mass 1 kg, wet mass 1 kg
  note on carbon content, fossil: Lignite spoil composition from Tab 3.1, (Doka G. (2009) Life Cycle Inventory of the disposal of lignite spoil, coal spoil and coal tailings. Doka Life Cycle Assessments, Zurich. Commissioned by the Swiss Centre for Life Cycle Inventories ecoinvent Centre)

## Inputs from nature
- Coal, brown [natural resource, in ground]: 1 kg; lognormal variance with pedigree 0.042, pedigree (1,1,5,5,1)
  per definition
- Occupation, mineral extraction site [natural resource, land]: 0.00111 m2*year; lognormal variance with pedigree 0.342, pedigree (1,1,5,5,1)
  own assumption
- Transformation, from mineral extraction site [natural resource, land]: 3.7e-5 m2; lognormal variance with pedigree 0.342, pedigree (1,1,5,5,1)
  own assumption
- Transformation, from unspecified [natural resource, land]: 3.7e-5 m2; lognormal variance with pedigree 0.342, pedigree (1,1,5,5,1)
  own assumption
- Transformation, to annual crop [natural resource, land]: 3.7e-5 m2; lognormal variance with pedigree 0.342, pedigree (1,1,5,5,1)
  own assumption
- Transformation, to mineral extraction site [natural resource, land]: 3.7e-5 m2; lognormal variance with pedigree 0.342, pedigree (1,1,5,5,1)
  own assumption
- Water, well, in ground [natural resource, in water]: 0.0035 m3; name water_well_in_ground_input; lognormal variance with pedigree 0.162, pedigree (1,1,5,5,1)
  Estimation. Apart from spoil and lignite also huge amounts of water are mined. Figures for Germany amount to 6 m3/t. Water extraction has a large share of the total energy consumption of coal mining. Due to the fact that other opencast mines show smaller depths and lower delivery rates, it is assumed that the average value for water extraction may be lower.
  Estimation. Apart from spoil and lignite also huge amounts of water are mined. Figures for Germany amount to 6 m3/t. Water extraction has a large share of the total energy consumption of coal mining. Due to the fact that other opencast mines show smaller depths and lower delivery rates, it is assumed that the average value for water extraction may be lower.

## Emissions to nature
- Methane, fossil [air, non-urban air or from high stacks]: 0.00023 kg; lognormal variance with pedigree 0.162, pedigree (1,1,5,5,1)
  own assumption
- Particulate Matter, > 10 um [air, non-urban air or from high stacks]: 0.0004 kg; lognormal variance with pedigree 0.162, pedigree (1,1,5,5,1)
  own assumption
- Radon-222 [air, non-urban air or from high stacks]: 0.003 kBq; lognormal variance with pedigree 0.692, pedigree (1,1,5,5,1)
  own assumption
- Water [air, unspecified]: 0.000525 m3; name water_to_air_unspecified; lognormal variance with pedigree 0.0827, pedigree (2,2,5,5,1)
  Calculated value based on literature values and expert opinion. See comments in the parametres' comment field.
  property fraction, origin: fresh water 1; name fraction_origin_fresh_water
  property fraction, origin: salt water 0; name fraction_origin_salt_water
  property fraction, origin: unspecified 0; name fraction_origin_unspecified
- Iron ion [water, ground-]: 0.0016 kg; lognormal variance with pedigree 0.162, pedigree (1,1,5,5,1)
  own assumption
- Solids, inorganic [water, ground-]: 0.0035 kg; lognormal variance with pedigree 0.162, pedigree (1,1,5,5,1)
  own assumption
- Sulfate [water, ground-]: 0.0033 kg; lognormal variance with pedigree 0.162, pedigree (1,1,5,5,1)
  own assumption
- Water [water, unspecified]: 0.002975 m3; name water_to_water_unspecified; lognormal variance with pedigree 0.0827, pedigree (2,2,5,5,1)
  (same comment as for Water)
  property carbon content, fossil 0; name C_content_fossil
  property carbon content, non-fossil 0; name C_content_non_fossil
  property dry mass 0 kg; name DM
  property fraction, origin: fresh water 1; name fraction_origin_fresh_water_Ww
  property fraction, origin: salt water 0; name fraction_origin_salt_water_Ww
  property fraction, origin: unspecified 0; name fraction_origin_unspecified_Ww
  property water in wet mass 1000 kg; name WWM
  property wet mass 1000 kg; name WM

## Sampling procedure
literature

## Extrapolations
see Geography/Text This dataset has been copied from an original dataset covering the geography RER. The uncertainty has been adjusted accordingly.

## Review by Christian Bauer 2010-04-03
passed
