# concrete block production

Dataset: EcoSpold 2, unit process
Geography: EC
Time period: 2022-01-01 to 2023-12-31
Technology level: current
Classification: ISIC rev.4 ecoinvent: 2395:Manufacture of articles of concrete, cement and plaster
Scenario: Business-as-Usual
System model: Allocation, cut-off by classification
Share of production covered: 60 %
Generated by: K.Flasher;E.Barros;J.Aguirre;S.Martines
Database: ecoinvent
isCopyrightProtected: true
accessRestrictedTo: 1

## General comment
This dataset describes the production of mixed blocks of concrete in the warm climate zone of Santa Isabel, Ecuador. The blocks have a characteristic compressive strength of 3.1 - 3.45 MPa and are mainly used in non-structural masonry walls. The produced blocks weigh approximately 5.4 kg and the most common dimensions are of (10 x 40 x 20) cm (width, length, height). Data comes from measurement and information provided in the factory visited in March 2022 ("HormiOrtiz"). The dataset includes the whole manufacturing process of the blocks. It does not include administration and infrastructure.
This dataset was developed by Estefania Barros, Kristi Padrón, Jonnathan Aguirre and Juan Sebastian Martines, under the supervision of Prof. Dolores Sucozhañay and Prof. Paul Vanegas, from the Inclusive Circular Economy and Sustainable Development Research Group of the University of Cuenca (ECI) in the frame of the CEELA (Strengthening capacities for energy efficiency in buildings in Latin America) project with the support of the Swiss Agency for Development and Cooperation (SDC).

## Included activities start
The activity starts with the reception of raw materials at the concrete block production site.

## Included activities end
This activity ends with the production of concrete block. The dataset includes the reception of materials, dosing and mixing, block production by vibration, curing and storage, as well as internal transports. The dataset does not include the packaging. Only discarded blocks and waste wood are taken into account as solid waste.

## Geography
This dataset represents the production of concrete blocks representative for Ecuador. Data comes from primary data collection in Ecuador.

## Technology
Current production technology. The dataset covers the main technologies for concrete block production in Ecuador. The manufacturing process begins by dosing and mixing the cement, aggregates and water. In the block machine, the steel cast is filled with the mix and the block is shaped and compacted by vibration. The fresh block is then transported to a place where the drying/curing process begins. The cure is done by spraying water over the blocks in order to ensure proper hydration of the cement and avoid that the blocks get "burned". The spraying is done for three days, three times per day. The blocks are then packed in pallets and stored.

## Time period
The time period is from 2022 (year of data collection) to 2023 (year of dataset compilation).

## Parameters
- CTS fraction: 0.252 dimensionless; name share_CTS
  Calculated value: 25.2% weighted average from Penetron. (2020). Environmental Product Declaration: Penetron Admix. https://api.environdec.com/api/v1/EPDLibrary/Files/b3b1f43c-d7d9-4bb9-ad14-08da599e304a/Data
- admix amount: 1.286e-6 m3; name admix_amount
  Original amount of ADMIX for the production process of 1 kg concrete block, as informed by the owner of the factory.
- admix density: 1131 kg/m3; name admix_density
  Source: https://www.aditec-ec.com/productos/impermeabilizantes/admix-c-2000/ficha-tecnica-admix-c-2000.pdf
- calcium magnesium fraction: 0.069 dimensionless; name share_calcium_magnesium
  Calculated value: 6.9% weighted average from Penetron. (2020). Environmental Product Declaration: Penetron Admix. https://api.environdec.com/api/v1/EPDLibrary/Files/b3b1f43c-d7d9-4bb9-ad14-08da599e304a/Data
- cement fraction: 0.665 dimensionless; name share_cement
  Calculated value: 66.5% weighted average from Penetron. (2020). Environmental Product Declaration: Penetron Admix. https://api.environdec.com/api/v1/EPDLibrary/Files/b3b1f43c-d7d9-4bb9-ad14-08da599e304a/Data
- gravel content: 0.000155344 m3/kg; name gravel_amount
  Measured value. Amount of gravel used to produce 1kg of concrete block, according to the information provided by the owner of the factory. No losses considered.
- gravel density: 1650 kg/m3; name gravel_density
  Original value from http://www.especificar.cl/fichas/aridos
- lime fraction: 0.014 dimensionless; name share_lime
  Calculated value: 1.4% weighted average from Penetron. (2020). Environmental Product Declaration: Penetron Admix. https://api.environdec.com/api/v1/EPDLibrary/Files/b3b1f43c-d7d9-4bb9-ad14-08da599e304a/Data
- sand amount: 0.000155344 m3/kg; name sand_amount
  Measured value. Amount of sand used to produce 1kg of concrete block, according to the information provided by the owner of the factory. No losses considered.
- sand density: 1750 kg/m3; name sand_density
  Original value from http://www.especificar.cl/fichas/aridos
- volcanic ash amount: 0.000155344 m3/kg; name volcanic_ash_amount
  Measured value. Amount of volcanic ash, accounted for together with sand, used to produce 1kg of concrete block, according to the information provided by the owner of the factory. No losses considered.
- volcanic ash density: 700 kg/m3; name volcanic_ash_density
  Original value from Bustillos, J., & Samaniego, P. (2011). Volcán Tungurahua : tamaño de las erupciones explosivas. Proceedings of the 7th Conference on Earth Sciences (D. Andrade, Ed.). Escuela Politécnica Nacional. https://horizon.documentation.ird.fr/exl-doc/pleins_textes/divers12-08/010054876.pdf
- volcanic rock amount: 0.000466031 m3/kg; name volcanic_rock_amount
  Measured value. Amount of volcanic rock, accounted for together as gravel, used to produce 1kg of concrete block, according to the information provided by the owner of the factory. No losses considered.
- volcanic rock density: 660 kg/m3; name volcanic_rock_density
  Original value from http://repositorio.ulvr.edu.ec/bitstream/44000/2073/1/T-ULVR-1874.pdf
- water input_added water: 5.17813e-5 m3; name water_added
  Calculated value. Total water added to the process (water rain). Losses not considered.

## Reference product
- concrete block: 1 kg; name concrete_block; By-product classification allocatable product; CPC 37510: Non-refractory mortars and concretes; HS2017 6810: Cement, concrete or artificial stone; whether or not reinforced, articles thereof
  The dataset represents 1 kg of a hollow mixed block, with dimensions (10 x 40 x 20) cm (width x length x height) and average mass of 5,44 kg.
  production volume 1.40235e9 kg; name concrete_block_PV; = 1.49E+10/1.70%*0.16%
    Estimated value. Based on the production volume for the BR dataset (1.49E+10) scaled by the share of global cement production of BR 1.70% and of EC 0.16%, taken from USGS 2014 (retrieved from https://minerals.usgs.gov/minerals/pubs/commodity/cement/myb1-2014-cemen.pdf, accessed 20Jan2023).
  property price 0.0597859 EUR2005
    Sale price. Data provided by the owner of the factory. Price given as 0.101 USD/kg. The prices were converted to EUR based on the annual exchange rates published by the European Central Bank (https://sdw.ecb.europa.eu/quickview.do?SERIES_KEY=120.EXR.A.USD.EUR.SP00.A, last accessed on 2023-06-01) and adjusted for inflation relative to 2005 using the producer price index (PPI) of the euro area, published by eurostat (https://ec.europa.eu/eurostat/databrowser/view/STS_INPP_A__custom_6416181/default/table?lang=en, last accessed on 2023-06-01).
  property water in wet mass 0.05 kg; name WWM_block
  properties: carbon allocation 0 kg, carbon content 0, carbon content, fossil 0, carbon content, non-fossil 0, dry mass 0.95 kg, water content 0.0526316, wet mass 1 kg

## Inputs from technosphere
- EUR-flat pallet: 1.24091e-5 unit; name EUR_pallet; lognormal variance with pedigree 1.6202, pedigree (3,2,3,3,3)
  This value is considered standard for the mixed block production process. It was extrapolated from the dataset "concrete block production BR" due to its similarity with the process in Ecuador. The pallets are used for packing and storing the blocks.
  Uncertainty: Basic uncertainty calculated based on the sample coefficient of variation
  property wet mass 22 kg; name pallet_mass
  properties: carbon content, fossil 0.0311351, carbon content, non-fossil 0.58833, dry mass 18.3333 kg, heating value, net 335.11 MJ, water content 0.2
- cement, Portland: 0.00096722 kg; = admix_amount * admix_density * share_cement; lognormal variance with pedigree 0.0026, pedigree (1,4,1,1,1)
  Calculate value. Proxy for one component of PENETRON ADMIX®, which is a grey powder with pH equal to 10-13, mostly consisting of Portland cement and various active, proprietary chemicals. The original amount of ADMIX for the production process of 1 kg concrete block is 0.000001286 m3, as informed by the owner of the factory. The value is calculated considering the density of the admix (1.131 kg/m3) and the share in % of the cement Portland (66.5% weighted average from Penetron. (2020). Environmental Product Declaration: Penetron Admix. https://api.environdec.com/api/v1/EPDLibrary/Files/b3b1f43c-d7d9-4bb9-ad14-08da599e304a/Data
  properties: dry mass 1 kg, wet mass 1 kg
- cement, type general use: 0.0647266 kg; name cement; = 25/386.24; lognormal variance with pedigree 0.0026, pedigree (1,4,1,1,1)
  25kg of cement is used per concrete batch, each batch produces 272 kg cement blocks (71 blocks of 5.44 kg each on average). Cement content used for the production process as informed by the owner of the factory.
  property water in wet mass 0 kg; name WWM_cement
  properties: dry mass 1 kg, wet mass 1 kg
- chemical, inorganic: 0.000100358 kg; = admix_amount * admix_density * share_calcium_magnesium; lognormal variance with pedigree 0.0026, pedigree (1,4,1,1,1)
  Calculate value. Proxy for one component of PENETRON ADMIX®, which is a grey powder with pH equal to 10-13, mostly consisting of Portland cement and various active, proprietary chemicals. The original amount of ADMIX for the production process of 1 kg concrete block is 0.000001286 m3, as informed by the owner of the factory. The value is calculated considering the density of the admix (1.131 kg/m3) and the share in % of the inorganic chemicals (see parameters for details)
  properties: carbon content, fossil 0.003, dry mass 1 kg, wet mass 1 kg
  note on carbon content, fossil: This dataset is an unweighted average of 20 inorganic substances (listed in Tab 88.1, ecoinvent v2.2 report 8, part II), being part of the top100 chemicals included in this database. The C-content has also been calculated as an unweighted average of the C content of the substances composing this dataset.
- chemical, organic: 0.000366525 kg; = admix_amount * admix_density * share_CTS; lognormal variance with pedigree 0.0026, pedigree (1,4,1,1,1)
  Calculate value. Proxy for one component of PENETRON ADMIX®, which is a grey powder with pH equal to 10-13, mostly consisting of Portland cement and various active, proprietary chemicals. The original amount of ADMIX for the production process of 1 kg concrete block is 0.000001286 m3, as informed by the owner of the factory. The value is calculated considering the density of the admix (1.131 kg/m3) and the share in % of the organic chemicals (see parameters for details)
  properties: carbon content, fossil 0.628, dry mass 1 kg, heating value, net 19.03 MJ, wet mass 1 kg
  note on carbon content, fossil: This dataset is an unweighted average of 20 organic substances (listed in Tab 88.1, ecoinvent v2.2 report 8, part II), being part of the top100 chemicals included in this database. The C-content has also been calculated as an unweighted average of the C content of the substances composing this dataset.
- diesel, burned in building machine: 0.0146684 MJ; lognormal variance with pedigree 1.5302, pedigree (3,2,3,3,3)
  This value is considered standard for the mixed block production process, due to the similarities in the process assessed with the process "concrete block production BR", from which the value is therefore extrapolated from. Diesel is not used for the production of mixed blocks, but for internal transport equipment.
  Uncertainty: Basic uncertainty calculated based on the sample coefficient of variation
  property Corresponding fuel use 42.8 MJ; name LHV_diesel
  property density 0.84 kg/l; name density_diesel
  properties: heating value, net 1 MJ
  note on Corresponding fuel use: Literature value. Lower heating value of the fuel input related to the heat/electricity output (MJ/kg).
- electricity, medium voltage: 0.0063 kWh; = ((0.03*0.04)+(0.06*0.07)+(0.09*0.01)); lognormal variance with pedigree 0.0032, pedigree (2,4,1,1,1)
  Calculated value. Sum of electricity consumption (motor power (kW/kg)*run time(h)). The energy used is the motors' power times the total time they function.
- gravel, crushed: 0.563898 kg; name gravel; = gravel_amount*gravel_density + volcanic_rock_amount*volcanic_rock_density; lognormal variance with pedigree 0.0026, pedigree (1,4,1,1,1)
  Calculated value. This value represents the amount of triturado (gravel crushed) and chasqui (volcanic rock) used for the production of 1 kg of mixed block, according to the information provided by the owner of the factory. The amounts of triturado and chasqui were provided as number of wheelbarrows used. In this sense, volume and density were used to determine their mass.
  property water in wet mass 0.05 kg; name WWM_gravel
  properties: dry mass 0.95 kg, water content 0.0526316, wet mass 1 kg
- lime, hydrated, packed: 2.03625e-5 kg; = admix_amount * admix_density * share_lime; lognormal variance with pedigree 0.0026, pedigree (1,4,1,1,1)
  Calculate value. Proxy for one component of PENETRON ADMIX®, which is a grey powder with pH equal to 10-13, mostly consisting of Portland cement and various active, proprietary chemicals. The original amount of ADMIX for the production process of 1 kg concrete block is 0.000001286 m3, as informed by the owner of the factory. The value is calculated considering the density of the admix (1.131 kg/m3) and the share in % of lime (see parameters for details)
  properties: dry mass 0.997 kg, water content 0.00300903, wet mass 1 kg
- sand: 0.380592 kg; = sand_amount*sand_density + volcanic_ash_amount*volcanic_ash_density; lognormal variance with pedigree 0.0026, pedigree (1,4,1,1,1)
  Calculated value. This value represents the amount of sand and volcanic ash used for the production of 1 kg of mixed block, according to the information provided by the owner of the factory. The amounts of sand and volcanic ash were provided as number of wheelbarrows used. In this sense, volume and density were used to determine their mass.
  property water in wet mass 0.05 kg; name WWM_sand
  properties: dry mass 0.95 kg, water content 0.0526316, wet mass 1 kg
- waste concrete: -0.0140781 kg; name waste; lognormal variance with pedigree 0.5232, pedigree (3,2,3,3,3)
  Calculated value. Waste concrete refers to the disposed concrete blocks (with defects for instance). Calculated based on the mass balance of the activity.
  Uncertainty: Basic uncertainty calculated based on the sample coefficient of variation
  production volume; = waste/concrete_block*concrete_block_PV
    Calculated from the production volume of the reference product in proportion to the respective output amounts.
  property water in wet mass 0.05 kg; name WWM_waste
  properties: dry mass 0.95 kg, water content 0.0526316, wet mass 1 kg
- waste wood, untreated: -0.000273 kg; name wood_output; = EUR_pallet*pallet_mass; lognormal variance with pedigree 1.6202, pedigree (3,2,3,3,3)
  This value is considered standard for the mixed block production process. It was extrapolated from the dataset "concrete block production BR" due to its similarity with the process in Ecuador. Waste wood refers to discard of used wooden pallets used for packing the blocks.
  Uncertainty: Basic uncertainty calculated based on the sample coefficient of variation
  production volume; = wood_output/concrete_block*concrete_block_PV
    (same comment as for waste concrete)
  properties: carbon content, non-fossil 0.48632, dry mass 0.8 kg, heating value, net 13.99 MJ, water content 0.25, wet mass 1 kg
  note on heating value, net: Value taken from the general comment of the treatment dataset.
- water, harvested from rainwater: 0.0517813 kg; name rainwater; lognormal variance with pedigree 0.0026, pedigree (1,4,1,1,1)
  Water content used for the production process as informed by the owner of the factory. Water used for the production of mixed blocks is water obtained from the rain.
  property water in wet mass 0.99966 kg; name WWM_rainwater
  properties: carbon content, fossil 0.0017899, dry mass 0.00034 kg, water content 2940.18, wet mass 1 kg

## Inputs from nature
- Occupation, bare area (non-use) [natural resource, land]: 0.000535837 m2*year; = 0.25*10^4/(4665600); lognormal variance with pedigree 0.0406, pedigree (1,3,1,1,1)
  Estimated for infrastructure. Land occupation calculated as the land occupied by the production facility (0.25 ha) divided by the annual production volume of the facility (4'665'600 kg concrete block/year).

## Emissions to nature
- Water [air, unspecified]: 4.82843e-5 m3; = (WWM_rainwater*rainwater+WWM_gravel*gravel+WWM_sand*sand+WWM_cement*cement)/1000-(WWM_block*concrete_block+WWM_waste*waste)/1000; lognormal variance with pedigree 0.042, pedigree (1,4,1,1,1)
  Calculated value. This value corresponds to water that evaporates during the drying processes. Calculated as the difference in the property "water in wet mass" (WWM) of inputs (rainwater, gravel, sand and cement) and outputs (concrete block and waste concrete) of the activity.

## Sampling procedure
Data obtained by a process assessment in a technical visit in a concrete block factory. It is assumed that this dataset represents 60% of the concrete block production activity in Ecuador, since the process is semi mechanized and it could change between factories in Ecuador. Land occupation exchange is used as an estimate of infrastructure. Machinery use is accounted for through their fuel / electricity consumption.

## Extrapolations
No extrapolation was applied.
