# cement production, CEM II/A-L

Dataset: EcoSpold 2, unit process
Geography: TN
Time period: 2019-01-01 to 2023-12-31
Technology level: current
Classification: ISIC rev.4 ecoinvent: 2394:Manufacture of cement, lime and plaster
Synonyms: CEM II A-L; Portland Limestone Cement
Scenario: Business-as-Usual
System model: Allocation, cut-off by classification
Share of production covered: 15 %
Generated by: [Deleted]Makrem Cherni
Published in: Cherni Makrem 2022
Database: ecoinvent
isCopyrightProtected: true
accessRestrictedTo: 1

## General comment
The information details the manufacturing of CEM II/A-L cement using milled limestone and gypsum as fillers. Tunisia has five types of cement (CEM I to CEM V) based on the supplementary cementitious materials (limestone). In terms of mass composition, CEM II/A-L has 5% to 20% limestone filler. Tunisian standards (NT 47.01 (2017)) specify the five cement types. Tunisian cement output is represented by five different kinds of cement. The table below summarizes the various cement kinds and compositions as defined by Tunisian specifications (NT 47.01).(2017). Clinker, gypsum, and limestone made CEM I cement (see composition in the table). This dataset covers data from the clinker stockpile to the cement suitable for bulk shipment. After cooling from the rotary kiln, the clinker is pulverized in ball mills to particles less than 75 mm in size. It is then transported to silos and combined with calcium sulfate (gypsum) and limestone. The combined cement is transported to a finishing mill and then kept in cement silos until it is delivered in bulk or packaged (kraft paper). Primary data was collected from one cement factory in Tunisia, who informed the total values of cement production inputs and outputs in 2019. Primary and secondary raw materials and fuels, auxiliary materials, energy, and water use were all recorded. It equates to a 15% market share. Particulate emissions may occur. However they are not recorded owing to a lack of data for the cement grinding phase (air emissions are monitored for the integrated clinker-cement plant as a whole and reported in the clinker production process).
The CEM II/A-L manufacturing process consists of four main steps: (1) Quarrying of limestone and other raw materials to the processing plant. (2) Preparation of “raw meal” for pyroprocessing (3) Pyroprocessing of raw materials to produce clinker using the dry process. (4) Final grinding of the clinker together with inter-grinding with a small proportion of gypsum to produce CEM II/A-L. Steps (1) to (4) are not considered in dataset.
NT47.01(2017): Ciment - Partie 1: Composition, spécifications et critères des conformité des ciments courants

## Included activities start
From the reception of raw materials at the cement factory.

## Included activities end
This activity ends with the CEM II/A-L cement produced in the cement silos (after milling). The dataset does not include packaging and administration.

## Geography
The dataset represents the CEM II/A-L cement production for Tunisia.

## Technology
The dry kiln process is used in Tunisia to produce cement. In order to create Portland cement, the clinker is pulverized in mills together with gypsum (3-5%), additional materials like limestone, and/or other ingredients according to national and international standards (Tunisian standard NT 47.01 (2017); International standard EN 197-1: (2011)).

## Time period
Time period corresponds to data collection period (2019).

## Reference product
- cement, CEM II/A-L: 1 kg; name cement; By-product classification allocatable product; CPC 37440: Portland cement, aluminous cement, slag cement and similar hydraulic cements, except in the form of clinkers; HS2017 252329: Cement; portland, other than white, whether or not artificially coloured
  Estimated from two cement plants, since there is no public data on the production of each type of cement in Tunisia (due to confidentiality).
  production volume 2.88137e9 kg; name PV_cement; = 8096*10^6*35.59%
    Total production volume of hydraulic cement in Tunisia in 2019: 8'096'000 metric ton. Source: USGS (2019). U.S. Geological Survey, Minerals Yearbook Annual Tables, 2019. Available at: https://www.usgs.gov/centers/national-minerals-information-center/cement-statistics-and-information
    The share of CEM II/A-L 32.5 in the market is 35.59%. This share is based on the annual production from the cement manufacturer.
  property price 0.0615 EUR2005
    2005 import and export prices (total trades (USD) divided by total weight (kg) in China, India, USA, Japan, Russia and Europe, major producers and consumers (http://www.cementchina.net/freport/showfre.asp?id=749) from UN Commodity Trade Statistics Database (http://data.un.org/Explorer.aspxDatabase [Accessed 2 July 2010]). Commodity: Cement (portland, aluminious, slag or hydraulic)
  properties: carbon allocation 0 kg, carbon content 0, carbon content, fossil 0, carbon content, non-fossil 0, dry mass 1 kg, water content 0, water in wet mass 0 kg, wet mass 1 kg

## Inputs from technosphere
- cement factory: 5.36e-11 unit; source Kellenberger D. 2007; lognormal variance with pedigree 0.3106, pedigree (2,1,4,5,1)
  Literature Value. Extrapolated from the "cement production, Portland, GLO 2022" dataset, accessed 15.09.2022
  Uncertainty: Variance of log-transformed data was taken from ecoinvent report no 1, table 10.3. Value represents demand of infrastructure for input/output group c.
- clinker: 0.77859 kg; lognormal variance with pedigree 0.2106, pedigree (5,5,5,5,5)
  Values were calculated based on primary data collection in Tunisia. Based on annual average.
  properties: dry mass 1 kg, wet mass 1 kg
- electricity, medium voltage: 0.042 kWh; lognormal variance with pedigree 0.0146, pedigree (3,4,4,5,1)
  Electricity used to crush and grind additives (limestone and gypsum) and also to grind cement (clinker with additives). Values were calculated based on primary data from manufacturer. Based on annual average.
  Uncertainty: Variance of log-transformed data was taken from ecoinvent report no 1, table 10.3. Value represents demand of products, electricity etc. for input/output group c.
- gypsum, mineral: 0.02818 kg; lognormal variance with pedigree 0.0032, pedigree (1,3,3,1,1)
  Gyspum used for regulating the setting time of cement. Values were calculated based on primary data collected from manufacturer.
  Uncertainty: Variance of log-transformed data was taken from ecoinvent report no 1, table 10.3. Value represents demand of products, electricity etc. for input/output group c.
  properties: dry mass 1 kg, wet mass 1 kg
- limestone, crushed, for mill: 0.19323 kg; lognormal variance with pedigree 0.0032, pedigree (1,3,3,1,1)
  Values were calculated based on primary data collection in Tunisia.
  properties: dry mass 0.998 kg, water content 0.00200401, wet mass 1 kg
- lubricating oil: 3.08e-6 kg; name lubricating_oil_input; lognormal variance with pedigree 0.2106, pedigree (5,5,5,5,5)
  Values were calculated based on primary data collected from manufacturer. Lubricating grease and oil used for lubricating machine parts.
  properties: carbon content, fossil 0.75, dry mass 1 kg, heating value, net 40.2 MJ, wet mass 1 kg
  note on carbon content, fossil: Lubricating oil is produced from diesel. C-content/dry mass of fats and oils considered 75%, from: ecoinvent v2.2 report, n 15a, pg 40
  note on heating value, net: Literature value, Source: IPCC 2006, 2006 IPCC Guidelines for National Greenhouse Gas Inventories, Prepared by the National Greenhouse Gas Inventories Programme, Eggleston H.S., Buendia L., Miwa K., Ngara T. and Tanabe K. (eds). Published: IGES, Japan
- scrap steel: -6.79e-5 kg; name waste_steel; = steel_input; lognormal variance with pedigree 0.0046, pedigree (3,4,1,1,1)
  Data collected from manufacturer. The steel used in the replacement of steel balls from cement mills must be disposed of after use. Therefore, same amount as steel input is used to model the waste.
  production volume; = PV_cement * waste_steel / cement
    Calculated from production volume of reference product using the relative outputs.
  properties: carbon content, fossil 0.005, dry mass 1 kg, wet mass 1 kg
  note on carbon content, fossil: The carbon content is set as 0,005 the same as in the steel, low alloyed, to maintain the carbon balance.
- steel, low-alloyed: 6.79e-5 kg; name steel_input; lognormal variance with pedigree 0.2106, pedigree (5,5,5,5,5)
  Values were calculated based on primary data collection in Tunisia. Data collected from manufacturer. The steel used in the replacement of steel balls from cement mill.
  properties: dry mass 1 kg, wet mass 1 kg
- waste mineral oil: -3.08e-6 kg; name waste_oil; = lubricating_oil_input; lognormal variance with pedigree 0.2106, pedigree (5,5,5,5,5)
  Data collected from manufacturer. The lubricating oil must be disposed of after use (the lubricating oil is used to lube the machinery and does not become part of the product). Therefore, same amount as lubricating oil input is used to model the waste.
  production volume; = PV_cement * waste_oil / cement
    Calculated from production volume of reference product using the relative outputs.
  properties: carbon content, fossil 0.75, dry mass 0.9 kg, heating value, net 34.7 MJ, water content 0.111111, wet mass 1 kg
  note on carbon content, fossil: The carbon content is set as 0,75 the same as in the lubricating oil, to maintain the carbon balance.
  note on heating value, net: Value taken from the general comment of the treatment dataset.

## Emissions to nature
- Water [air, unspecified]: 3.8646e-7 m3; lognormal variance with pedigree 0.0052, pedigree (2,4,3,1,1)
  Water vapour from the drying of the limestone.
  Uncertainty: B

## Sampling procedure
Data represent 15% of Tunisia's 2019 cement production. Using confidential surveys, one cement manufacturer gave information on the production of cement in 2019. The manufacturer's estimated cement composition is represented by the weighted average of raw material flows. Since manufacturers did not provide the production amounts of each kind of cement owing to privacy issues, the weighting factor utilized is the overall volume of cement produced. The yearly average of the manufacturer unit flows was calculated for additional input flows, such as grinding aids, equipment maintenance supplies, fuels and power. With the exception of the grinding aids, all other flows' consumption is given for the whole cement plant, which often makes several types of cement. Manufacturer information on fuel usage was provided in terms of mass or volume. To make the dataset simpler and to take into account the accompanying air emissions, they were transformed into energy using their lower heating values and modeled as a heat input. The "cement Portland/GLO" information was used to estimate the infrastructure input flow (cement plant) (accessed 15.09.2022). The weighted average of the sample was taken into consideration while calculating the exchange amounts. In order to maintain consistency with other EcoInvent datasets, no conversion to the geometric mean of the lognormal distribution was performed.

## Extrapolations
Data represent 15% of Tunisian cement production. This sample is extrapolated to reflect total output in the country. The primary values are regarded appropriate for a typical production of CEM II/A-L cement in Tunisia.

## Review by Bruno Peuportier 2023-05-02
All explanations and corrections have been completed
