# gold mine operation and gold production, unrefined

Dataset: EcoSpold 2, unit process
Geography: RoW
Time period: 2012-01-01 to 2023-12-31
Technology level: current
Classification: ISIC rev.4 ecoinvent: 0729:Mining of other non-ferrous metal ores
Synonyms: gold dore; crude gold
Scenario: Business-as-Usual
System model: Allocation, cut-off by classification
Generated by: [System]
Published in: Charikinya E. 2017
Database: ecoinvent
isCopyrightProtected: true
accessRestrictedTo: 1

## General comment
This dataset is a copy of the South African dataset, but it is also used as the best available representation of the GLO situation of the sector as well.
This dataset represents the activity of gold production in both underground and surface (open pits) mines in South Africa. The production volume reported , as well as all other inputs/outputs fro the activity itself represent an average gold mining site and don't refer to a specific one. Data was taken from 2015 operational and environmental reports of four different companies, namely: AngloGold Ashanti, Harmony, Sibanye and GoldFields. The annual production volume of the companies investigated accounts for the 73% of the total annual production for the same year (2015).

## Included activities start
The dataset refer to the following phases of the gold production value chain: mining and concentration. The activity starts with the mining of the raw material and the transport of the mined ore to the concentration plant.

## Included activities end
Gold extraction is also included in this activity since it is very much part of gold production and the output from mine sites is an unrefined gold product, hence the dataset covers from the mining of the ore to the production of this unrefined gold. In this way cyanidation extraction and metal recovery are really part of the concentration process which ends with the produciton of unrefined gold that is sent to the following phase (extraction) also included in this dataset. Gold refining to market products takes place at (mostlyy)Rand Refinery plant which is co-owned by the major mining companies and it is out of the scope of this dataset.

## Technology
OPERATIONS:
Operations span over four different companies, namely AngloGoldAshanti Ltd., GoldFields, Harmony and Sibanye; they mostly lay in the Witwatersrand Basin Area.
AngloGoldAshanty – AngloGold Ashanti’s South Africa Region comprises four deep-level mines located at the Vaal River and West Wits operations. The Vaal River mining operations include two mine sites - Kopanang has a single shaft system to a depth of 2,334m; it exploits the Vaal Reef almost exclusively; Moab Khotsong has a single shaft system mining to a depth of 3,100m - and a share milling and treatment circuit. The West Wits operations are: Mponeng Mine is the world’s deepest gold mine, and extracts the Ventersdorp Contact Reef (VCR) via a twin-shaft system at depths of between 2 800m and 3 400m below surface. Ore is treated and smelted at the mine’s gold plant; and TauTona Mine makes use of a three-shaft system and predominantly extracts the Carbon Leader Reef (CLR), and the VCR on a smaller scale through the use of technology; TauTona mines at depths of between 2 700m and 3 300m below surface.
GoldFileds – Intermediate to deep-level gold mine (> 2,000m below surface) exploiting auriferous palaeoplacers (reefs), namely the conglomerates that comprise the Upper Elsburg Reefs of the Mondeor Formation and the Ventersdorp Contact Reef (VCR). South Deep Gold Mine. The workings are accessed from the surface through two shaft systems (main and ventilation shafts), of which the main shaft comprises a single-drop to a depth of 2,998m, the vent shaft to 2,947m and the South Shaft Complex, which is a subvertical system (four shafts) to 95 level at a depth of 2,786m. South Deep Gold Mine utilises one tailings storage facility (TSF) known as the Doornpoort TSF. The TSF footprint is designed to accommodate the LoM tonnage excluding backfill. South Deep Gold Mine operates one on-property gold plant. The comminution circuit comprises two stage milling with a free gold recovery circuit. Gold recovery is carried out using a conventional leach/carbon-in-pulp (CIP) circuit.
Harmony – It comprises Nine underground mines (Bambani, Doornkop, Joel, Kusasalethu, Masimong, Pakhisa, Target 1, Tshepong, Unisel and one open-pit Kalgold.
Bambanani, has two surface shafts: mining is conducted at a depth of 2 365 metres. Activities at the mine focus on the Basal Reef and are limited to shaft pillar extraction. The ore mined is sent to Harmony One Plant for processing.
Doornkop is a single-shaft operation and mining is conducted at a depth of 1 978 metres. The operation focuses on narrow-reef conventional mining of the South Reef. The ore from the operation is processed at the Doornkop plant.
Joel mine comprises two shafts, the North and South shafts. The primary economical reef horizon at Joel is a narrow tabular Beatrix Reef deposit which is accessed via conventional grid development. Mining is conducted at a depth of 1 452 metres. The ore is processed at the Joel plant.
Kusasalethu mines the Ventersdorp Contact Reef as its main ore body. The mine comprises twin vertical and twin sub-vertical shaft systems and uses conventional mining methods in a sequential grid layout. Mining is conducted at a depth of 3 388 metres, making it Harmony’s deepest mine. Ore mined is treated at the Kusasalethu plant.
Masimong complex comprises an operating shaft (5 shaft), and a second shaft (4 shaft), which, although closed for mining, is used for ventilation, pumping and as a second outlet. Masimong exploits the Basal Reef and the B Reef. Mining is conducted at a depth of 2 050 metres. Ore mined is processed at the Harmony One plant.
Phakisa mine has two shafts, the main Phakisa shaft and the Nyala shaft. Phakisa exploits the Basal Reef. Mining is conducted at a depth of 2 426 metres. Ore mined is processed at the Harmony One plant.
Target 1 mining operations comprise one primary underground mine, with a depth of approximately 2 945 metres. While most of the ore extracted comes from mechanised mining (massive mining techniques), conventional stoping is still employed primarily to de-stress areas ahead of mechanised mining. Ore mined is processed at the Target plant.
Tshepong mining is conducted at a depth of 2 349 metres. The mine uses conventional undercut mining in the Basal Reef while the B Reef is exploited as a high grade secondary reef. Ore mined is processed at the Harmony One plant.
Unisel mining is conducted at a depth of 2 153 metres below surface. Conventional scattered mining and pillar reclamation takes place to access the Basal, Leader and, to a lesser extent, the Middle reefs. Ore mined is processed at Harmony One plant.
Kalgold is an open-pit mine: mining takes place from the A Zone pit. Ore mined from the pit is processed at a carbon-in-leach plant located at Kalgold.
Sibanye – It comprises two main complexes: Beatrix and Kloof.
Beatrix complex consists principally of underground mine with nominal surface reserves represented by surface rock dumps (SRDs) accumulated during the operating history of the mine. Current mine infrastructure consists of three producing shaft complexes. Mining is focused on open ground and pillars of differing reef horizons with the deepest operating level some 2,055m below surface. Beatrix makes use of two gold processing plants, both treating underground and surface material.
Kloof operations is a complex of intermediate to ultra-deep-level mines, predominantly mining the Ventersdorp Contact Reef, at depths of between 1,300m and 3,350m below surface. Kloof's operations comprise five producing shaft systems and two metallurgical gold plants.
Kloof Plant 1 comprises three-stage crushing, open-circuit rod mills for primary grinding and closed-circuit pebble mills for secondary milling. This is followed by cyanide leaching, filtration, zinc precipitation and smelting. Kloof Plant 2 currently treats all of Kloof's underground ore. Reef is trucked and conveyed to a central stacker pad, which feeds two SAG mills equipped with variable-speed ring motor drives. Milling is followed by cyanide leaching, CIP and treatment at an independent elution and smelting facility. The elution facility was upgraded in June 2001 and again in October 2003 to process loaded carbon from KP1 and the former KP3 (Libanon) plant. The upgrade included the installation of continuous electro-winning sludge reactors.
REFERENCES:
AngloGlodAshanti Limited, Integrated Report, 2016
AngloGlodAshanti Limited, Sustainable Development Report, 2016
AngloGoldAshanti Limited, Vaal River Operational Report, 2016
AngloGoldAshanti Limited, West Wits Operational Report, 2016
GoldFields, Integrated Annual Report, 2016
GoldFields, GRI G4 Content Index, 2016
Harmony, Integrated Annual Report, 2016
Harmony, Operational Performance, 2016
SibanyeGold, Integrated Annual Report, 2016

## Time period
Companies environental and operational reports, years 2015 and 2016

## Parameters
- fraction, process water, to air: 0.15 dimensionless; name fraction_PW_to_air; lognormal variance with pedigree 0.092025, pedigree (4,4,3,2,4)
  Literature value. In case when no industry/process specific data are available, default evaporation fraction value is used. This value is 15% and is based on literature (Statistics Canada, 2007 & Shaffer, K.H., 2008, Consumptive water use in the Great Lakes Basin, USGS & Shiklomanov, 2003, World Water Resources at the Beginning of the 21st Century) and has been approved by an expert.
- water used in primary activity: 1013.41 m3; name totWaterPA; = water_well_in_ground_input+(potable_water/1000)+water_surface; lognormal variance with pedigree 0.0021, pedigree (1,2,1,5,1)
  This is the sum of the all source of water (ground, surface and tap/municipal) used in the production of unrefined gold.

## Reference product
- gold, unrefined: 1 kg; name RP; By-product classification allocatable product; CPC 4132: Gold (including gold plated with platinum), unwrought or in semi-manufactured forms, or in powder form; HS2017 710812: Metals; gold, non-monetary, unwrought (but not powder); CAS 7440-57-5
  Unrefined gold (85% pure); synonims are gold dore, crude gold. Dore refers to an unrefined (therefore impure) alloy of gold with variable quantities of silver and smaller quantities of base metals, which is produced at a mine berfore passing on to a refinery for upgrading toLondon Good Delivery Standard.
  production volume 1.5702e6 kg; name RP_PV; = 1425622/gold_unref_gold_content
    Calculated based on the global production volume of refined gold (in the GLO dataset "gold refinery operation"), taking into account that the gold content of unrefined gold is 85% and assuming that the losses during refining are negligible.
  property gold content 0.85; name gold_unref_gold_content
    gold content on a dry matter basis
  property price 21359.1 EUR2005
    Assuming a gold content of 85%, price calculated as 5-year market average (2015-2019; USD/kg; USGS [2020]) of Au amount and converted to EUR2005 (USD2019/EUR2005 exchange rate: 0.62; Official Data Foundation [2020] and Macrotrends [2020]).
    References:
    Official Data Foundation (2020). Inflation Calculator [Online]. Available from: https://www.officialdata.org/us/inflation/2005?endYear=2019&amount=1 [Accessed 28/07/2020]
    USGS (2020). Mineral Commodity Summaries 2020 [Online]. Available from: https://pubs.usgs.gov/periodicals/mcs2020/mcs2020.pdf [Accessed 28/07/2020]
    Macrotrends (2020). Euro Dollar Exchange Rate (EUR USD) - Historical Chart [Online]. Available from: https://www.macrotrends.net/2548/euro-dollar-exchange-rate-historical-chart [Accessed 28/07/2020]
  properties: carbon allocation 0 kg, carbon content 0, carbon content, fossil 0, carbon content, non-fossil 0, dry mass 1 kg, water content 0, water in wet mass 0 kg, wet mass 1 kg

## Inputs from technosphere
- blasting: 172.78 kg; triangular min 98.8074, mostLikely 156.566, max 262.967, pedigree (2,2,3,5,1)
  Calculated value from companies annual reports and scaled down to refer 1 kg of unrefined gold produced.
- charcoal: 3.8349 kg; lognormal variance with pedigree 0.0446, pedigree (3,3,5,5,1)
  Calculated value.
  Proxy: Carbon is approximated with 'charcoal'.
  Uncertainty: E
  properties: carbon content, non-fossil 0.8, dry mass 1 kg, heating value, net 28.4 MJ, wet mass 1 kg
  note on heating value, net: Indicative value. Reference: Fuels - Higher and Lower Calorific Values, available at: https://www.engineeringtoolbox.com/fuels-higher-calorific-values-d_169.html
- diesel, burned in building machine: 8155.83 MJ; source Placer Dome Inc. 2002; triangular min 925.018, mostLikely 5510.81, max 18031.7, pedigree (2,2,3,5,1)
  Companies report fossil fuel il KL. It was assumed all liquid fossil fuel to be diesel. The value of LFF given in KL has been converted in in Kg using the density conversion factor (0.84 kg/l). This value in kg was then converted to MJ using the gross calorific conversion factor (45.4 MJ/kg). The total value has been scaled down to refer 1 kg of unrefined gold produced.
  properties: heating value, net 1 MJ
- electricity, medium voltage: 5.02162 kWh; source Placer Dome Inc. 2002; triangular min 4.18273, mostLikely 4.61205, max 6.27008, pedigree (1,2,3,5,1)
  Calculated value from companies reports (Energy Used) and scaled down to refer 1 kg of unrefined gold produced. Only one company reports that part of the total electricity used was generetad from liqiud fossil fuel< this is has been calculated to be the 2.89%
- electricity, medium voltage: 571.958 kWh; source Placer Dome Inc. 2002; triangular min 476.409, mostLikely 525.308, max 714.156, pedigree (1,2,3,5,1)
  (same comment as for electricity, medium voltage)
- electricity, medium voltage: 2.49914 kWh; source Placer Dome Inc. 2002; triangular min 2.08164, mostLikely 2.2953, max 3.12046, pedigree (1,2,3,5,1)
  (same comment as for electricity, medium voltage)
- electricity, medium voltage: 16.0194 kWh; source Placer Dome Inc. 2002; triangular min 13.3432, mostLikely 14.7128, max 20.002, pedigree (1,2,3,5,1)
  (same comment as for electricity, medium voltage)
- electricity, medium voltage: 27.5008 kWh; source Placer Dome Inc. 2002; triangular min 22.9067, mostLikely 25.2578, max 34.338, pedigree (1,2,3,5,1)
  (same comment as for electricity, medium voltage)
- electricity, medium voltage: 54.5947 kWh; source Placer Dome Inc. 2002; triangular min 45.4743, mostLikely 50.1419, max 68.1678, pedigree (1,2,3,5,1)
  (same comment as for electricity, medium voltage)
- electricity, medium voltage: 25.5978 kWh; source Placer Dome Inc. 2002; triangular min 21.3215, mostLikely 23.51, max 31.9618, pedigree (1,2,3,5,1)
  (same comment as for electricity, medium voltage)
- electricity, medium voltage: 44.9137 kWh; source Placer Dome Inc. 2002; triangular min 37.4106, mostLikely 41.2505, max 56.08, pedigree (1,2,3,5,1)
  (same comment as for electricity, medium voltage)
- electricity, medium voltage: 46866.4 kWh; source Placer Dome Inc. 2002; triangular min 39037.1, mostLikely 43043.9, max 58518.2, pedigree (1,2,3,5,1)
  (same comment as for electricity, medium voltage)
- electricity, medium voltage: 1.07406 kWh; source Placer Dome Inc. 2002; triangular min 0.894635, mostLikely 0.986462, max 1.34109, pedigree (1,2,3,5,1)
  (same comment as for electricity, medium voltage)
- electricity, medium voltage: 15747 kWh; source Placer Dome Inc. 2002; triangular min 13116.3, mostLikely 14462.6, max 19661.9, pedigree (1,2,3,5,1)
  (same comment as for electricity, medium voltage)
- electricity, medium voltage: 4.56806 kWh; source Placer Dome Inc. 2002; triangular min 3.80494, mostLikely 4.19548, max 5.70376, pedigree (1,2,3,5,1)
  (same comment as for electricity, medium voltage)
- electricity, medium voltage: 1.64701 kWh; source Placer Dome Inc. 2002; triangular min 1.37187, mostLikely 1.51268, max 2.05649, pedigree (1,2,3,5,1)
  (same comment as for electricity, medium voltage)
- electricity, medium voltage: 59.0879 kWh; source Placer Dome Inc. 2002; triangular min 49.2169, mostLikely 54.2686, max 73.7781, pedigree (1,2,3,5,1)
  (same comment as for electricity, medium voltage)
- electricity, medium voltage: 46.8475 kWh; source Placer Dome Inc. 2002; triangular min 39.0213, mostLikely 43.0266, max 58.4945, pedigree (1,2,3,5,1)
  (same comment as for electricity, medium voltage)
- electricity, medium voltage: 117.999 kWh; source Placer Dome Inc. 2002; triangular min 98.2863, mostLikely 108.375, max 147.335, pedigree (1,2,3,5,1)
  (same comment as for electricity, medium voltage)
- electricity, medium voltage: 719.484 kWh; source Placer Dome Inc. 2002; triangular min 599.29, mostLikely 660.803, max 898.36, pedigree (1,2,3,5,1)
  (same comment as for electricity, medium voltage)
- electricity, medium voltage: 10144.9 kWh; source Placer Dome Inc. 2002; triangular min 8450.13, mostLikely 9317.47, max 12667.1, pedigree (1,2,3,5,1)
  (same comment as for electricity, medium voltage)
- electricity, medium voltage: 58.8691 kWh; source Placer Dome Inc. 2002; triangular min 49.0346, mostLikely 54.0677, max 73.5049, pedigree (1,2,3,5,1)
  (same comment as for electricity, medium voltage)
- electricity, medium voltage: 144.004 kWh; source Placer Dome Inc. 2002; triangular min 119.947, mostLikely 132.259, max 179.806, pedigree (1,2,3,5,1)
  (same comment as for electricity, medium voltage)
- electricity, medium voltage: 12.936 kWh; source Placer Dome Inc. 2002; triangular min 10.7749, mostLikely 11.8809, max 16.1521, pedigree (1,2,3,5,1)
  (same comment as for electricity, medium voltage)
- electricity, medium voltage: 5.10283 kWh; source Placer Dome Inc. 2002; triangular min 4.25037, mostLikely 4.68664, max 6.37148, pedigree (1,2,3,5,1)
  (same comment as for electricity, medium voltage)
- electricity, medium voltage: 38.5576 kWh; source Placer Dome Inc. 2002; triangular min 32.1163, mostLikely 35.4128, max 48.1437, pedigree (1,2,3,5,1)
  (same comment as for electricity, medium voltage)
- electricity, medium voltage: 30.9209 kWh; source Placer Dome Inc. 2002; triangular min 25.7554, mostLikely 28.399, max 38.6084, pedigree (1,2,3,5,1)
  (same comment as for electricity, medium voltage)
- electricity, medium voltage: 52.9284 kWh; source Placer Dome Inc. 2002; triangular min 44.0864, mostLikely 48.6115, max 66.0873, pedigree (1,2,3,5,1)
  (same comment as for electricity, medium voltage)
- electricity, medium voltage: 230.566 kWh; source Placer Dome Inc. 2002; triangular min 192.049, mostLikely 211.761, max 287.889, pedigree (1,2,3,5,1)
  (same comment as for electricity, medium voltage)
- electricity, medium voltage: 3272.54 kWh; source Placer Dome Inc. 2002; triangular min 2725.84, mostLikely 3005.63, max 4086.15, pedigree (1,2,3,5,1)
  (same comment as for electricity, medium voltage)
- electricity, medium voltage: 8.56072 kWh; source Placer Dome Inc. 2002; triangular min 7.1306, mostLikely 7.8625, max 10.6891, pedigree (1,2,3,5,1)
  (same comment as for electricity, medium voltage)
- electricity, medium voltage: 34.4989 kWh; source Placer Dome Inc. 2002; triangular min 28.7357, mostLikely 31.6852, max 43.076, pedigree (1,2,3,5,1)
  (same comment as for electricity, medium voltage)
- electricity, medium voltage: 13.6758 kWh; source Placer Dome Inc. 2002; triangular min 11.3911, mostLikely 12.5604, max 17.0758, pedigree (1,2,3,5,1)
  (same comment as for electricity, medium voltage)
- electricity, medium voltage: 84.5541 kWh; source Placer Dome Inc. 2002; triangular min 70.4289, mostLikely 77.6578, max 105.576, pedigree (1,2,3,5,1)
  (same comment as for electricity, medium voltage)
- electricity, medium voltage: 4839.68 kWh; source Placer Dome Inc. 2002; triangular min 4031.18, mostLikely 4444.95, max 6042.91, pedigree (1,2,3,5,1)
  (same comment as for electricity, medium voltage)
- electricity, medium voltage: 17.971 kWh; source Placer Dome Inc. 2002; triangular min 14.9688, mostLikely 16.5053, max 22.4389, pedigree (1,2,3,5,1)
  (same comment as for electricity, medium voltage)
- electricity, medium voltage: 43.1704 kWh; source Placer Dome Inc. 2002; triangular min 35.9586, mostLikely 39.6494, max 53.9033, pedigree (1,2,3,5,1)
  (same comment as for electricity, medium voltage)
- electricity, medium voltage: 93.2713 kWh; source Placer Dome Inc. 2002; triangular min 77.6897, mostLikely 85.664, max 116.46, pedigree (1,2,3,5,1)
  (same comment as for electricity, medium voltage)
- electricity, medium voltage: 3.88219 kWh; source Placer Dome Inc. 2002; triangular min 3.23364, mostLikely 3.56555, max 4.84736, pedigree (1,2,3,5,1)
  (same comment as for electricity, medium voltage)
- fatty alcohol: 4.6019 kg; source Placer Dome Inc. 2002; lognormal variance with pedigree 0.0446, pedigree (3,3,5,5,1)
  Proxy: Organic compounds such as flocculant / flotation / magnafloc 351 are approximated with 'fatty alcohol'.
  Uncertainty: E
  properties: carbon content, fossil 0.0408973, carbon content, non-fossil 0.743434, dry mass 1 kg, heating value, net 41.01 MJ, wet mass 1 kg
  note on carbon content, fossil: Fatty alcohols have chain lengths between C6 and C22, their chemical formula is CH3(CH2)nCH2OH (ecoinvent v2.2 report 12, pg 16). As an average, C14 was used. The dataset represents a mix of 27% produced from fatty acid splitting and 73% produced from methyl ester (ecoinvent v2.2 report 12, pg 21). In the methyl esterification, methanol (CH3OH) has a fossil origin
- hydrochloric acid, without water, in 30% solution state: 48.9841 kg; source Placer Dome Inc. 2002; triangular min 4.03035, mostLikely 11.8991, max 131.023, pedigree (2,2,3,5,1)
  Calculated value from companies annual reports and scaled down to refer 1 kg of unrefined gold produced
  properties: dry mass 1 kg, heating value, net 3.32 MJ, wet mass 1 kg
- hydrochloric acid, without water, in 30% solution state: 223.786 kg; source Placer Dome Inc. 2002; triangular min 18.4128, mostLikely 54.3616, max 598.583, pedigree (2,2,3,5,1)
  (same comment as for hydrochloric acid, without water, in 30% solution state)
- lime, packed: 410.249, 10.4449, 820.256 kg (3 suppliers, which the file names only by identifier); sum of these 1240.95 kg; source Placer Dome Inc. 2002; lognormal variance with pedigree 0.0041, pedigree (1,2,3,5,1)
  Calculated value from companies annual reports and scaled down to refer 1 kg of unrefined gold produced
  Uncertainty: C
  properties: carbon content, fossil 0.117492, dry mass 0.998 kg, water content 0.00200401, wet mass 1 kg
  note on carbon content, fossil: Table 3.1, ecoinvent v2.2 report 7, part VII, pg 3. MW CaCO3=100, MW MgCO3=84
- lubricating oil: 8.14174 kg; triangular min 4.33079, mostLikely 7.85549, max 12.2389, pedigree (2,3,3,5,1)
  Calculated value from companies annual reports and scaled down to refer 1 kg of unrefined gold produced. It accounts for lubricating oils and grease used within the plant. A density of 0.9 kg/L was used to convert volumes into mass. Usual range for lubricating oil and grease is 0,85/0,95 kg/m3.
  properties: carbon content, fossil 0.75, dry mass 1 kg, heating value, net 40.2 MJ, wet mass 1 kg
  note on carbon content, fossil: Lubricating oil is produced from diesel. C-content/dry mass of fats and oils considered 75%, from: ecoinvent v2.2 report, n 15a, pg 40
  note on heating value, net: Literature value, Source: IPCC 2006, 2006 IPCC Guidelines for National Greenhouse Gas Inventories, Prepared by the National Greenhouse Gas Inventories Programme, Eggleston H.S., Buendia L., Miwa K., Ngara T. and Tanabe K. (eds). Published: IGES, Japan
- lubricating oil: 38.6499 kg; triangular min 20.5588, mostLikely 37.291, max 58.0998, pedigree (2,3,3,5,1)
  (same comment as for lubricating oil)
- mine infrastructure, gold: 1.3945e-6 unit; lognormal variance with pedigree 0.3147, pedigree (1,2,3,5,2)
  Estimation from dataset author.
  Uncertainty: C
- sodium cyanide: 29.7791 kg; source Placer Dome Inc. 2002; triangular min 15.9243, mostLikely 25.1562, max 48.2566, pedigree (2,2,3,5,1)
  Calculated value from companies annual reports and scaled down to refer 1 kg of unrefined gold produced
  Proxy: Cyanide is approximated with 'sodium cyanide'.
  properties: carbon content, fossil 0.244898, dry mass 1 kg, heating value, net 7.43 MJ, wet mass 1 kg
- sodium cyanide: 183.501 kg; source Placer Dome Inc. 2002; triangular min 98.127, mostLikely 155.015, max 297.361, pedigree (2,2,3,5,1)
  (same comment as for sodium cyanide)
- sodium hydroxide, without water, in 50% solution state: 18.5547 kg; source Placer Dome Inc. 2002; triangular min 1.80894, mostLikely 5.26868, max 48.5865, pedigree (2,3,3,5,1)
  Calculated value.
  Proxy: Caustic is approximated with 'sodium hydroxide, without water, in 50% solution state'.
  properties: dry mass 1 kg, heating value, net 3.03 MJ, wet mass 1 kg
- sodium hydroxide, without water, in 50% solution state: 190.015 kg; source Placer Dome Inc. 2002; triangular min 18.525, mostLikely 53.9556, max 497.565, pedigree (2,3,3,5,1)
  (same comment as for sodium hydroxide, without water, in 50% solution state)
- sulfidic tailings, from gold mine operation: -48966.6, -28177.7, -222829, -53976, -11496.5, -29680.5, -12348.1, -11659.3, -87413.5, -12423.2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 kg (13 suppliers, which the file names only by identifier); sum of these -602377 kg; source Classen M. 2009; lognormal variance with pedigree 0.0032, pedigree (2,1,1,5,1)
  Calculated value from companies annual reports and scaled down to refer to 1 kg of unrefined gold produced. Outside of South Africa, all sulfidc tailing are assumed to be sent to disposal.
  Uncertainty: C
  production volume; = (ByP_01/RP)*RP_PV
    Calculated based on the APV, the RP and the BP_01
  properties: aluminium content 0.017079, calcium content 0.0037589, dry mass 0.7 kg, fluorine content 0.0011041, iron content 0.014628, magnesium content 0.0020127, oxygen content 0.88758, potassium content 0.0031243, silicon content 0.056714, sodium content 0.0014916, water content 0.428571, wet mass 1 kg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
- tap water: 188.539 kg; triangular min 37.8084, mostLikely 192.058, max 335.75, pedigree (2,1,3,5,1)
  Calculated value from companies annual reports and scaled down to refer 1 kg of unrefined gold produced. Tap water refers to both potable and non/potable water from external sources.
  properties: carbon content, fossil 0.00178991, dry mass 0.000337476 kg, water content 2962.17, wet mass 1 kg
  note on carbon content, fossil: Bicarbonate content is 2.93 mol/m3. CO2 content is 0.1 mol/m3 (ecoinvent v2.2 report 8, Tab 93.1).
- tap water: 287.412 kg; triangular min 57.6356, mostLikely 292.776, max 511.823, pedigree (2,1,3,5,1)
  (same comment as for tap water)
- tap water: 1444.74 kg; triangular min 289.719, mostLikely 1471.71, max 2572.8, pedigree (2,1,3,5,1)
  (same comment as for tap water)
- tap water: 173.908 kg; triangular min 34.8744, mostLikely 177.154, max 309.696, pedigree (2,1,3,5,1)
  (same comment as for tap water)
- tap water: 7247.38 kg; triangular min 1453.34, mostLikely 7382.65, max 12906.1, pedigree (2,1,3,5,1)
  (same comment as for tap water)
- tap water: 82935.5 kg; triangular min 16631.3, mostLikely 84483.5, max 147692, pedigree (2,1,3,5,1)
  (same comment as for tap water)
- tap water: 61929.9 kg; triangular min 12419, mostLikely 63085.9, max 110285, pedigree (2,1,3,5,1)
  (same comment as for tap water)
- zinc: 2.8946 kg; source Placer Dome Inc. 2002; lognormal variance with pedigree 0.0446, pedigree (3,3,5,5,1)
  Calculated value: Data was obtained from Australian mining, scaled by processed gold.
  Further references:
  Stewart M. (1999) Environmental Life Cycle Considerations for Design-Related Decision Making in Minerals Processing. PhD Thesis. University of Cape Town, Cape Town.
  Uncertainty: C
  properties: dry mass 1 kg, wet mass 1 kg

## Inputs from nature
- Gangue [natural resource, in ground]: 256753 kg; lognormal variance with pedigree 0.0061, pedigree (3,2,3,5,1)
  Milled ore containg gold with a grade of 4.35 gr/tonne.
  Uncertainty: M
- Gold [natural resource, in ground]: 1.1398 kg; triangular min 1.07742, mostLikely 1.13594, max 1.20603, pedigree (2,1,3,5,1)
  Average gold content (grade) in ore in ground is 3.89 gr/tonne.
- Water, river [natural resource, in water]: 183.78 m3; name water_surface; triangular min 126.84, mostLikely 171.971, max 252.529, pedigree (1,2,3,5,1)
  (same comment as for blasting)
- Water, well, in ground [natural resource, in water]: 675.42 m3; name water_well_in_ground_input; triangular min 182.505, mostLikely 498.958, max 1344.8, pedigree (2,1,3,5,1)
  (same comment as for blasting)

## Emissions to nature
- Antimony ion [air, non-urban air or from high stacks]: 0.00016114 kg; source Placer Dome Inc. 2002; lognormal variance with pedigree 0.696, pedigree (3,4,5,5,1)
  Calculated value: Data was obtained from Australian mining, scaled by milled ore.
  Further references:
  Stewart M. (1999) Environmental Life Cycle Considerations for Design-Related Decision Making in Minerals Processing. PhD Thesis. University of Cape Town, Cape Town.
  Uncertainty: E
- Arsenic ion [air, non-urban air or from high stacks]: 0.0073967 kg; source Placer Dome Inc. 2002; lognormal variance with pedigree 0.7106, pedigree (4,3,5,5,1)
  (same comment as for Antimony ion)
- Beryllium II [air, non-urban air or from high stacks]: 0.00043372 kg; source Placer Dome Inc. 2002; lognormal variance with pedigree 0.6952, pedigree (3,3,5,5,2)
  Calculated value: Data was obtained from Australian mining, scaled by milled ore.
  Further references:
  Stewart M. (1999) Environmental Life Cycle Considerations for Design-Related Decision Making in Minerals Processing. PhD Thesis. University of Cape Town, Cape Town.
  Uncertainty: C
- Cadmium II [air, non-urban air or from high stacks]: 2.2978e-5 kg; source Placer Dome Inc. 2002; lognormal variance with pedigree 0.6566, pedigree (3,3,3,5,1)
  (same comment as for Beryllium II)
- Carbon dioxide, fossil [air, non-urban air or from high stacks]: 33.23 kg; source Newmont 2005; triangular min 11.163, mostLikely 20.0078, max 68.5192, pedigree (2,1,3,5,1)
  Calculated value. This represents CO2 emissions only from explosives (blasting): they have been calculated with the factor of the mines of Newmont (0.17 kg CO2 per kg explosive). The CO2 emission from burning of fuels is accounted for in the supply chain of this dataset - diesel burned in building machine (MJ).
- Chromium III [air, non-urban air or from high stacks]: 0.0037554 kg; source Placer Dome Inc. 2002; lognormal variance with pedigree 0.6946, pedigree (3,3,5,5,1)
  (same comment as for Beryllium II)
- Cobalt II [air, non-urban air or from high stacks]: 0.00065064 kg; source Placer Dome Inc. 2002; lognormal variance with pedigree 0.6946, pedigree (3,3,5,5,1)
  (same comment as for Beryllium II)
- Lead II [air, non-urban air or from high stacks]: 0.00018263 kg; source Placer Dome Inc. 2002; lognormal variance with pedigree 0.7112, pedigree (4,3,5,5,2)
  (same comment as for Antimony ion)
- Manganese II [air, non-urban air or from high stacks]: 0.020341 kg; source Placer Dome Inc. 2002; lognormal variance with pedigree 0.6952, pedigree (3,3,5,5,2)
  (same comment as for Beryllium II)
- Mercury II [air, non-urban air or from high stacks]: 0.010467 kg; source Placer Dome Inc. 2002; lognormal variance with pedigree 0.7106, pedigree (4,3,5,5,1)
  (same comment as for Antimony ion)
- Nitrogen oxides [air, non-urban air or from high stacks]: 22.8222 kg; triangular min 2.88969, mostLikely 5.09825, max 60.4785, pedigree (2,2,3,5,1)
  (same comment as for blasting)
- Selenium IV [air, non-urban air or from high stacks]: 0.011952 kg; source Placer Dome Inc. 2002; lognormal variance with pedigree 0.6952, pedigree (3,3,5,5,2)
  (same comment as for Beryllium II)
- Sulfur oxides [air, unspecified]: 22.2291 kg; triangular min 5.6152, mostLikely 11.9505, max 49.1216, pedigree (2,2,3,5,1)
  (same comment as for blasting)
- Water [air, unspecified]: 152.011 m3; name water_to_air_unspecified; = totWaterPA*fraction_PW_to_air; lognormal variance with pedigree 0.0447, pedigree (2,2,3,5,1)
  Calculated value based on literature values and expert opinion. See comments in the parametres' comment field.
  Uncertainty: C
  property fraction, origin: fresh water 1; name fraction_origin_fresh_water
  property fraction, origin: salt water 0; name fraction_origin_salt_water
  property fraction, origin: unspecified 0; name fraction_origin_unspecified
- Oils, unspecified [soil, industrial]: 35.0937 kg; triangular min 18.6672, mostLikely 33.8599, max 52.754, pedigree (2,3,3,5,1)
  Emission to soil from the use of Luricating and hydraulic oils. It has been estimated that approximaly 70-80 % of hydraulic oils leave the system due to leakage, spill, line and hose breakage and fitting failures. www.machinerylubrication.com
- Arsenic ion [water, surface water]: 0.0055332 kg; source Placer Dome Inc. 2002; lognormal variance with pedigree 0.7126, pedigree (3,3,5,5,3)
  Calculated value: Amount is based in data from older Environmental report, scaled by milled ore (see source).
  Uncertainty: E
- Cadmium II [water, surface water]: 0.00062039 kg; source Placer Dome Inc. 2002; lognormal variance with pedigree 0.3626, pedigree (3,3,5,5,3)
  (same comment as for Arsenic ion)
- Copper ion [water, surface water]: 0.030684 kg; source Placer Dome Inc. 2002; lognormal variance with pedigree 0.3626, pedigree (3,3,5,5,3)
  (same comment as for Arsenic ion)
- Cyanide [water, surface water]: 0.30684 kg; source Placer Dome Inc. 2002; lognormal variance with pedigree 0.3626, pedigree (3,3,5,5,3)
  (same comment as for Arsenic ion)
- Lead II [water, surface water]: 0.0036888 kg; source Placer Dome Inc. 2002; lognormal variance with pedigree 0.7126, pedigree (3,3,5,5,3)
  (same comment as for Arsenic ion)
- Mercury II [water, surface water]: 0.00062039 kg; source Placer Dome Inc. 2002; lognormal variance with pedigree 0.7126, pedigree (3,3,5,5,3)
  (same comment as for Arsenic ion)
- Nickel II [water, surface water]: 0.070088 kg; source Placer Dome Inc. 2002; lognormal variance with pedigree 0.7126, pedigree (3,3,5,5,3)
  (same comment as for Arsenic ion)
- Water [water, unspecified]: 861.396 m3; name water_to_water_unspecified; = totWaterPA*(1-fraction_PW_to_air); lognormal variance with pedigree 0.0447, pedigree (2,2,3,5,1)
  (same comment as for Water)
  property carbon content, fossil 0; name C_content_fossil
  property carbon content, non-fossil 0; name C_content_non_fossil
  property dry mass 0 kg; name DM
  property fraction, origin: fresh water 1; name fraction_origin_fresh_water_Ww
  property fraction, origin: salt water 0; name fraction_origin_salt_water_Ww
  property fraction, origin: unspecified 0; name fraction_origin_unspecified_Ww
  property water in wet mass 1000 kg; name WWM
  property wet mass 1000 kg; name WM
- Zinc II [water, surface water]: 0.04611 kg; source Placer Dome Inc. 2002; lognormal variance with pedigree 0.7306, pedigree (5,3,5,5,3)
  (same comment as for Arsenic ion)

## Sampling procedure
This dataset is a copy of the South African dataset, but it is also used as the best available representation of the GLO situation of the sector as well. Data for South Africa was collected using operational and environmental companies reports: AngloGlodAshanti Limited, Integrated Report, 2016
AngloGlodAshanti Limited, Sustainable Development Report, 2016
AngloGoldAshanti Limited, Vaal River Operational Report, 2016
AngloGoldAshanti Limited, West Wits Operational Report, 2016
GoldFields, Integrated Annual Report, 2016
GoldFields, GRI G4 Content Index, 2016
Harmony, Integrated Annual Report, 2016
Harmony, Operational Performance, 2016
SibanyeGold, Integrated Annual Report, 2016

## Extrapolations
Underground and surface (open pits) mining account for the 73 % of the whole South African gold production. This dataset in conjunction with the one named treatmet of sulfidic tailing, off-site, high gold content/ZA, represent the 79,3% of the gold production occurred in South Africa for the year of reference (2015).
