# treatment of used liquid crystal display module, municipal incineration FAE

Dataset: EcoSpold 2, unit process
Geography: CH
Time period: 2006-01-01 to 2023-12-31
Technology level: current
Classification: ISIC rev.4 ecoinvent: 3821:Treatment and disposal of non-hazardous waste
Scenario: Business-as-Usual
System model: Allocation, cut-off by classification
Generated by: Nikolia Stoikou
Database: ecoinvent
isCopyrightProtected: true
accessRestrictedTo: 1

## General comment
The process represents the treatment of 'used liquid crystal display module' in a municipal solid waste incinerator (MSWI). Recommended use of this dataset: Only for incineration of LCD modules (mostly glass and inorganics, some electronic components, copper and plastics) generated in the recycling (mechanical treatment) of LCD screens (Liquid Crystal Display screen residue)Inventoried waste contains several fractions: 0.87% Plastics from electronic consumer goods; 0.87% Plastics from electronic industrial goods; 82% Glass; 0.87% wiring copper; 0.83% liquid crystals; 0.12% ITO coating; 14.5% electronic goods; . Waste composition (wet, in ppmw): gross heating value 2.835 MJ/kg; net heating value 2.551 MJ/kg; H2O 40144; O 430500; H 7674.6; C 63365; S 102.58; N 1270.5; P 46.362; B 0.0082045; Cl 1519.4; Br 95.711; F 11.587; I na; Ag 30.387; As 0.1305; Ba 8.0249; Cd 10.593; Co 0.51291; Cr 317.5; Cu 26895; Hg 0.16101; Mn 71.044; Mo 0.56082; Ni 1905; Pb 4347.4; Sb 112.38; Se 0.034097; Sn 2351.8; V 0.01305; Zn 2573.8; Be 0.0081182; Sc na; Sr 1.4369; Ti 77.9; Tl 0.0064946; W na; Si 294410; Fe 5671.6; Ca 61772; Al 900.8; K 965.57; Mg 2.0446; Na 52850. Share of carbon in initial waste input that is biogenic 0%.Share of metals in waste not oxidised and bulk-recyclable (exclude very small or thin parts) Iron: 100%; Alu: 69.8%; Copper: 100%.Recovery of metal scrap from bottom ash to recycling: 3.1892g iron scrap, 0.15979g aluminium scrap, 7.7116g copper scrap. From this waste, the FLUWA process in the technology mix recovers 0.000772kg (DM) of a hydroxide sludge to be recycled in zinc furnaces. Net energy production: 0.23MJ/kg electric energy and 0.64MJ/kg thermal energy.

## Included activities start
The activity starts with the waste being available at the gate of the treatment facility. Collection and transportation of the waste to the treatment plant is not included.

## Included activities end
The activity ends with the waste being treated and waste-specific emissions from the incineration process and auxiliary material consumption for flue gas cleaning are released to the environment (air and water). Infrastructure and waste-specific energy demands for Municipal Solid Waste Incineration (MSWI) and net energy generation are included.

## Geography
Modelling parameters affecting the treatment technology are specific to this geography and to the technology mix encountered in Switzerland in 2012.

## Technology
The waste is treated in the incineration plant with flue gas cleaning. Incineration is the controlled combustion of a waste and it includes fly ash extraction (FAE). Auxiliary material consumption for this step of air pollution control (APC) are included in the process. Air polution control includes electrostatic precipitator for fly ash (ESP), wet flue gas scrubber and 25% SNCR , 42.77% SCR-high dust , 32.68% SCR-low dust -DeNOx facilities and 0% without DeNOx (weighted according to mass of burnt waste). Efficiency of iron scrap separation from slag : 58%. Efficiency of aluminium scrap separation from slag : 31%. Efficiency of copper scrap separation from slag : 31%. The technology mix for this dataset includes a filter ash treatment (FLUWA) of a share of 46.22%. Gross electric efficiency technology mix 15.84% and Gross thermal efficiency technology mix 28.51%

## Reference product
- used liquid crystal display module: -1 kg; By-product classification Waste; CPC 39990: Other wastes n.e.c.
  main reference product of this activity (supply of disposal service).
  production volume 3.8663e6 kg
    based on corresponding global production volume of MSW fraction in conventional MSWI (wo fly ash extraction) and scaled down to annual Swiss incinerated MSW mass of 3.02 mio. tonnes.
  property price 0 EUR2005
    Waste products are assigned a price of zero as they are assumed to require further treatment.
  properties: aluminium content 0.000938471, antimony content 0.000117082, arsenic content 1.35958e-7, barium content 8.36053e-6, beryllium content 8.45775e-9, boron content 8.54763e-9, bromine content 9.97138e-5, cadmium content 1.10355e-5, calcium content 0.0643558, carbon allocation 0.0633654 kg, carbon content 0.0660155, carbon content, fossil 0.0660155, carbon content, non-fossil 0, chlorine content 0.00158297, chromium content 0.000330781, cobalt content 5.3436e-7, copper content 0.0280199, dry mass 0.959856 kg, fluorine content 1.20716e-5, heating value, gross 2.95323 MJ, heating value, net 2.65816 MJ, hydrogen content 0.00799561, iron content 0.00590881, lead content 0.00452921, magnesium content 2.13012e-6, manganese content 7.40148e-5, mercury content 1.67749e-7, molybdenum content 5.84276e-7, nickel content 0.00198462, nitrogen content 0.00132365, oxygen content 0.448502, phosphorus content 4.83014e-5, potassium content 0.00100595, selenium content 3.55225e-8, silicon content 0.30672, silver content 3.16579e-5, sodium content 0.0550604, strontium content 1.49702e-6, sulfur content 0.000106866, thallium content 6.7662e-9, tin content 0.00245015, titanium content 8.11578e-5, vanadium content 1.35958e-8, water content 0.041823, water in wet mass 0.040144 kg, wet mass 1 kg, zinc content 0.00268141

## Inputs from technosphere
- aluminium scrap, post-consumer, prepared for melting: -0.000159792 kg; lognormal variance with pedigree 0.68123, pedigree (1,1,1,1,1)
  aluminium scrap recovered from this waste.
  Uncertainty: uncertainty calculated from uncertainty in waste composition, uncertainty of share of recyclable metal, uncertainty of transfer coefficient to bottom ash, uncertainty of the efficiency of scrap removal in MSWI plant.
  production volume
    calculated in proportion to incinerated waste input
  properties: dry mass 1 kg, price 0.806 EUR2005, wet mass 1 kg
- ammonia, anhydrous, liquid: 0.000200551 kg; lognormal variance with pedigree 1.0196, pedigree (1,1,4,1,1)
  Input to DeNOx stage (100% NH3).
  Uncertainty: uncertainty calculated from uncertainty in average DeNOx input, uncertainty in the share of thermal NOx, uncertainty of nitrogen content in average municipal waste and the uncertainty in nitrogen content in *this* waste.
  properties: dry mass 1 kg, wet mass 1 kg
- bottom ash, MSWI[F], used LCD module: -0.995652 kg; lognormal variance with pedigree 0.011367, pedigree (1,1,1,1,1)
  waste-specific bottom ash from the incineration of this waste
  Uncertainty: uncertainty is calculated from uncertainties in waste composition and transfer coefficients in incinerator
  production volume
    calculated in proportion to incinerated waste input
  properties: calcium content 0.075003, copper content 0.0220367, dry mass 0.824453 kg, iron content 0.00291, lead content 0.00373281, nickel content 0.00224072, oxygen content 0.464861, silicon content 0.358649, sodium content 0.0643816, tin content 0.00193272, water content 0.212926, wet mass 1 kg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
- cationic resin: 8.1605e-7 kg; lognormal variance with pedigree 1.8103, pedigree (1,1,4,1,1)
  auxiliary input for mercury removal in filter ash treatment (FLUWA).
  Uncertainty: uncertainty calculated from uncertainty in of transfer coefficients in the incinerator, and the uncertainty of the waste composition of this waste
  properties: carbon content, fossil 0.521606, dry mass 0.5 kg, heating value, net 6.68 MJ, water content 1, wet mass 1 kg
- chemical, inorganic: 2.69303e-5 kg; lognormal variance with pedigree 0.42719, pedigree (1,1,4,1,1)
  auxiliary inputs for the wastewater treatment stage of the incinerator plant. Proxy for Polyelectrolyte.
  Uncertainty: uncertainty calculated from uncertainty in average Polyelectrolyte input, of transfer coefficients in the incinerator, and the uncertainty of the waste composition of this waste
  properties: carbon content, fossil 0.003, dry mass 1 kg, wet mass 1 kg
- chromium trioxide, flakes: 2.56429e-7 kg; lognormal variance with pedigree 1.3977, pedigree (1,1,4,1,1)
  Input to DeNOx stage. Active component in SCR catalyst (vanadium pentoxide, V2O5), here approximated with the available chromium trioxide.
  Uncertainty: uncertainty calculated from uncertainty in average DeNOx input, uncertainty in the share of thermal NOx, uncertainty of nitrogen content in average municipal waste and the uncertainty in nitrogen content in *this* waste.
  properties: dry mass 1 kg, wet mass 1 kg
- copper scrap, sorted, pressed: -0.00771156 kg; lognormal variance with pedigree 0.26248, pedigree (1,1,1,1,1)
  copper scrap recovered from this waste.
  Uncertainty: uncertainty calculated from uncertainty in waste composition, uncertainty of share of recyclable metal, uncertainty of transfer coefficient to bottom ash, uncertainty of the efficiency of scrap removal in MSWI plant.
  production volume
    calculated in proportion to incinerated waste input
  properties: dry mass 1 kg, price 2.84 EUR2005, wet mass 1 kg
- heat, district or industrial, natural gas: 0.0375029 MJ; lognormal variance with pedigree 1.0196, pedigree (1,1,4,1,1)
  Input to DeNOx stage, to heat up flue gas in low-dust SCR.
  Uncertainty: uncertainty calculated from uncertainty in average DeNOx input, uncertainty in the share of thermal NOx, uncertainty of nitrogen content in average municipal waste and the uncertainty in nitrogen content in *this* waste.
  properties: heating value, net 1 MJ
- hydrochloric acid, without water, in 30% solution state: 0.000189942 kg; lognormal variance with pedigree 0.082557, pedigree (1,1,4,1,1)
  auxiliary inputs for the wastewater treatment stage of the incinerator plant.
  Uncertainty: uncertainty calculated from uncertainty in average HCl input, of transfer coefficients in the incinerator, and the uncertainty of the waste composition of this waste
  properties: dry mass 1 kg, heating value, net 3.32 MJ, wet mass 1 kg
- hydrogen peroxide, without water, in 50% solution state: 0.00046542 kg; lognormal variance with pedigree 0.088265, pedigree (1,1,4,1,1)
  auxiliary oxidising agent for filter ash treatment (FLUWA).
  Uncertainty: uncertainty calculated from uncertainty in of transfer coefficients in the incinerator, and the uncertainty of the waste composition of this waste
  properties: dry mass 1 kg, heating value, net 7.13 MJ, wet mass 1 kg
- iron scrap, sorted, pressed: -0.00318925 kg; lognormal variance with pedigree 0.44548, pedigree (1,1,1,1,1)
  iron scrap recovered from this waste.
  Uncertainty: uncertainty calculated from uncertainty in waste composition, uncertainty of share of recyclable metal, uncertainty of transfer coefficient to bottom ash, uncertainty of the efficiency of scrap removal in MSWI plant.
  production volume
    calculated in proportion to incinerated waste input
  properties: dry mass 1 kg, price 0.175 EUR2005, wet mass 1 kg
- iron(III) chloride, without water, in 40% solution state: 8.78438e-5 kg; lognormal variance with pedigree 0.19164, pedigree (1,1,4,1,1)
  auxiliary inputs for the wastewater treatment stage of the incinerator plant.
  Uncertainty: uncertainty calculated from uncertainty in average FeCl3 input, of transfer coefficients in the incinerator, and the uncertainty of the waste composition of this waste
  properties: dry mass 1 kg, wet mass 1 kg
- metalliferous hydroxide sludge: -0.00308726 kg; lognormal variance with pedigree 0.24394, pedigree (1,1,1,1,1)
  Metalliferous hydroxide sludge/zinc concentrate from filter ash leaching (FLUWA).
  Uncertainty: uncertainty is calculated from uncertainties in waste composition and transfer coefficients to filter ash in incinerator and the uncertainty of the transfer coefficients of the FLUWA process.
  production volume
    calculated in proportion to incinerated waste input
  properties: cadmium content 0.00467593, calcium content 0.0155591, chlorine content 0.0424456, copper content 0.00979094, dry mass 0.25 kg, lead content 0.100944, oxygen content 0.206906, potassium content 0.00795756, sulfur content 0.00817286, water content 3, wet mass 1 kg, zinc content 0.587396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
- municipal waste incineration facility: 2.5e-10 unit
  Infrastructure demands per kilogram incinerated waste.
- quicklime, milled, packed: 0.000478581 kg; lognormal variance with pedigree 0.92143, pedigree (1,1,4,1,1)
  auxiliary inputs for the flue gas treatment stage of the incinerator plant.
  Uncertainty: uncertainty calculated from uncertainty in average CaO input, of transfer coefficients in the incinerator, and the uncertainty of the waste composition of this waste
  properties: dry mass 0.99 kg, water content 0.010101, wet mass 1 kg
- residues, MSWI[F], used LCD module: -0.00653392 kg; lognormal variance with pedigree 0.059839, pedigree (1,1,1,1,1)
  waste-specific incineration residues (fly ash + scrubber sludge) from the incineration of this waste
  Uncertainty: uncertainty is calculated from uncertainties in waste composition and transfer coefficients in incinerator
  production volume
    calculated in proportion to incinerated waste input
  properties: aluminium content 0.0133608, calcium content 0.025451, chlorine content 0.0360685, copper content 0.165929, dry mass 1 kg, iron content 0.0142239, lead content 0.184385, oxygen content 0.205931, potassium content 0.0459437, tin content 0.116516, wet mass 1 kg, zinc content 0.148919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
- sodium hydroxide, without water, in 50% solution state: 0.000309366 kg; lognormal variance with pedigree 0.2131, pedigree (1,1,4,1,1)
  auxiliary inputs for the flue gas treatment stage of the incinerator plant, and partially in the filter ash treatment (FLUWA).
  Uncertainty: uncertainty calculated from uncertainty in average NaOH input, of transfer coefficients in the incinerator, and the uncertainty of the waste composition of this waste
  properties: dry mass 1 kg, heating value, net 3.03 MJ, wet mass 1 kg
- spent activated carbon with mercury: -8.59e-7 kg; lognormal variance with pedigree 1.8023, pedigree (1,1,1,1,1)
  Spent ion exchanger charged with mercury, from FLUWA filter ash treatment, approximated here with Spent activated carbon with mercury, deposited undergound in a polyethylene Big Bag.
  Uncertainty: uncertainty calculated from uncertainty in of transfer coefficients in the incinerator, and the uncertainty of the waste composition of this waste.
  production volume
    calculated in proportion to incinerated waste input
  properties: carbon content, fossil 0.6, dry mass 1 kg, heating value, net 18.18 MJ, wet mass 1 kg
- titanium dioxide: 1.2565e-5 kg; lognormal variance with pedigree 1.3977, pedigree (1,1,4,1,1)
  Input to DeNOx stage (TiO2 catalyst carrier)
  Uncertainty: uncertainty calculated from uncertainty in average DeNOx input, uncertainty in the share of thermal NOx, uncertainty of nitrogen content in average municipal waste and the uncertainty in nitrogen content in *this* waste.
  properties: dry mass 1 kg, wet mass 1 kg
- triazine-compound: 2.93307e-6 kg; lognormal variance with pedigree 1.1285, pedigree (1,1,4,1,1)
  auxiliary inputs for the wastewater treatment stage of the incinerator plant. Proxy for (pure) Trisodium-trimercapto-s-triazine (CAS 17766-26-6), used as 15% diluted solution, aka TMT15.
  Uncertainty: uncertainty calculated from uncertainty in average TMT15 input, of transfer coefficients in the incinerator, and the uncertainty of the waste composition of this waste
  properties: carbon content, fossil 0.475616, dry mass 1 kg, wet mass 1 kg
- water, decarbonised: 0.319256 kg; lognormal variance with pedigree 0.19164, pedigree (1,1,4,1,1)
  Incinerator process water used in flue gas scrubber stage.
  Uncertainty: uncertainty calculated from uncertainty in average water input, and the uncertainty of the waste composition of this waste
  properties: wet mass 1 kg

## Inputs from nature
- Oxygen [natural resource, in air]: 0.386415 kg; lognormal variance with pedigree 0.034463, pedigree (1,1,4,1,1)
  oxygen from ambient air needed to combust and oxidise this waste. Net demand, i.e. without O2 leaving the plant in flue gas uncombusted.
  Uncertainty: uncertainty is calculated from uncertainties in waste composition and transfer coefficients to flue gas and solid residues in incinerator

## Emissions to nature
- Aluminium III [air, urban air close to ground]: 7.34434e-10 kg; lognormal variance with pedigree 0.75258, pedigree (1,1,4,1,1)
  Emission to air from waste composition and incinerator transfer coefficients.
  Uncertainty: uncertainty is calculated from uncertainties in waste composition and transfer coefficients in incinerator
- Ammonia [air, urban air close to ground]: 2.35797e-7 kg; lognormal variance with pedigree 1.0791, pedigree (1,1,4,1,1)
  Nitrogen species emitted to air after DeNOx stage.
  Uncertainty: uncertainty calculated from uncertainty in average N-emissions and uncertainty in the share of thermal NOx and the uncertainty in nitrogen content in *this* waste.
- Antimony ion [air, urban air close to ground]: 9.00244e-11 kg; lognormal variance with pedigree 1.024, pedigree (1,1,4,1,1)
  (same comment as for Aluminium III)
- Arsenic ion [air, urban air close to ground]: 1.02224e-9 kg; lognormal variance with pedigree 1.8463, pedigree (1,1,4,1,1)
  (same comment as for Aluminium III)
- Barium II [air, urban air close to ground]: 3.14983e-8 kg; lognormal variance with pedigree 1.3172, pedigree (1,1,4,1,1)
  (same comment as for Aluminium III)
- Benzene [air, urban air close to ground]: 4.74957e-8 kg; lognormal variance with pedigree 0.19458, pedigree (1,1,4,1,1)
  Incomplete combustion product emitted to air.
  Uncertainty: uncertainty calculated from uncertainty in average operation emissions, and the uncertainty of the flue gas volume from this waste.
- Benzo(a)pyrene [air, urban air close to ground]: 1.05693e-12 kg; lognormal variance with pedigree 0.6141, pedigree (1,1,4,1,1)
  (same comment as for Benzene)
- Bromine [air, urban air close to ground]: 4.78076e-8 kg; lognormal variance with pedigree 1.00191, pedigree (1,1,4,1,1)
  (same comment as for Aluminium III)
- Cadmium II [air, urban air close to ground]: 5.3991e-9 kg; lognormal variance with pedigree 1.2954, pedigree (1,1,4,1,1)
  (same comment as for Aluminium III)
- Calcium II [air, urban air close to ground]: 9.36926e-6 kg; lognormal variance with pedigree 0.20575, pedigree (1,1,4,1,1)
  (same comment as for Aluminium III)
- Carbon dioxide, fossil [air, urban air close to ground]: 0.230814 kg; lognormal variance with pedigree 0.17198, pedigree (1,1,4,1,1)
  (same comment as for Aluminium III)
- Carbon monoxide, fossil [air, urban air close to ground]: 8.07372e-5 kg; lognormal variance with pedigree 1.077, pedigree (1,1,4,1,1)
  (same comment as for Benzene)
- Chromium III [air, urban air close to ground]: 5.9917e-8 kg; lognormal variance with pedigree 0.84759, pedigree (1,1,4,1,1)
  (same comment as for Aluminium III)
- Cobalt II [air, urban air close to ground]: 9.32816e-10 kg; lognormal variance with pedigree 1.6772, pedigree (1,1,4,1,1)
  (same comment as for Aluminium III)
- Copper ion [air, urban air close to ground]: 1.66591e-6 kg; lognormal variance with pedigree 0.29583, pedigree (1,1,4,1,1)
  (same comment as for Aluminium III)
- Cyanide [air, urban air close to ground]: 4.07107e-6 kg; lognormal variance with pedigree 1.4085, pedigree (1,1,4,1,1)
  (same comment as for Ammonia)
- Dinitrogen monoxide [air, urban air close to ground]: 1.89493e-5 kg; lognormal variance with pedigree 1.4085, pedigree (1,1,4,1,1)
  (same comment as for Ammonia)
- Dioxins, measured as 2,3,7,8-tetrachlorodibenzo-p-dioxin [air, urban air close to ground]: 9.49849e-14 kg; lognormal variance with pedigree 0.6141, pedigree (1,1,4,1,1)
  (same comment as for Benzene)
- Heat, waste [air, urban air close to ground]: 2.1056 MJ; lognormal variance with pedigree 0.00839214, pedigree (1,1,4,1,1)
  Waste heat generated from heating value of this waste plus any electricity required to process it.
  Uncertainty: uncertainty is calculated from uncertainties in waste composition and uncertainties in energy efficiency and the uncertainty in internal energy demand
- Hexachlorobenzene [air, urban air close to ground]: 9.9311e-11 kg; lognormal variance with pedigree 0.19458, pedigree (1,1,4,1,1)
  (same comment as for Benzene)
- Hydrochloric acid [air, urban air close to ground]: 7.75437e-7 kg; lognormal variance with pedigree 0.63523, pedigree (1,1,4,1,1)
  (same comment as for Aluminium III)
- Hydrogen fluoride [air, urban air close to ground]: 7.81738e-8 kg; lognormal variance with pedigree 1.2675, pedigree (1,1,4,1,1)
  (same comment as for Aluminium III)
- Iron ion [air, urban air close to ground]: 1.01644e-8 kg; lognormal variance with pedigree 0.50931, pedigree (1,1,4,1,1)
  (same comment as for Aluminium III)
- Lead II [air, urban air close to ground]: 3.55548e-7 kg; lognormal variance with pedigree 0.5163, pedigree (1,1,4,1,1)
  (same comment as for Aluminium III)
- Magnesium [air, urban air close to ground]: 2.15661e-9 kg; lognormal variance with pedigree 1.5056, pedigree (1,1,4,1,1)
  (same comment as for Aluminium III)
- Manganese II [air, urban air close to ground]: 1.35677e-8 kg; lognormal variance with pedigree 1.046, pedigree (1,1,4,1,1)
  (same comment as for Aluminium III)
- Mercury II [air, urban air close to ground]: 4.56537e-9 kg; lognormal variance with pedigree 1.8183, pedigree (1,1,4,1,1)
  (same comment as for Aluminium III)
- Methane, fossil [air, urban air close to ground]: 7.12436e-7 kg; lognormal variance with pedigree 0.19458, pedigree (1,1,4,1,1)
  (same comment as for Benzene)
- Molybdenum VI [air, urban air close to ground]: 7.37921e-10 kg; lognormal variance with pedigree 1.6701, pedigree (1,1,4,1,1)
  (same comment as for Aluminium III)
- NMVOC, non-methane volatile organic compounds [air, urban air close to ground]: 2.16152e-6 kg; lognormal variance with pedigree 0.19458, pedigree (1,1,4,1,1)
  (same comment as for Benzene)
- Nickel II [air, urban air close to ground]: 2.39304e-6 kg; lognormal variance with pedigree 0.60107, pedigree (1,1,4,1,1)
  (same comment as for Aluminium III)
- Nitrogen oxides [air, urban air close to ground]: 7.46691e-5 kg; lognormal variance with pedigree 1.0791, pedigree (1,1,4,1,1)
  sum of fuel-NOx and thermal-NOx emitted to air after DeNOx stage.
  Uncertainty: uncertainty calculated from uncertainty in average N-emissions and uncertainty in the share of thermal NOx and the uncertainty in nitrogen content in *this* waste.
- Particulate Matter, < 2.5 um [air, urban air close to ground]: 5.6706e-6 kg; lognormal variance with pedigree 0.6141, pedigree (1,1,4,1,1)
  (same comment as for Benzene)
- Particulate Matter, > 2.5 um and < 10um [air, urban air close to ground]: 2.84955e-8 kg; lognormal variance with pedigree 0.33954, pedigree (1,1,4,1,1)
  (same comment as for Benzene)
- Pentachlorobenzene [air, urban air close to ground]: 2.50936e-10 kg; lognormal variance with pedigree 0.19458, pedigree (1,1,4,1,1)
  (same comment as for Benzene)
- Pentachlorophenol [air, urban air close to ground]: 2.06837e-11 kg; lognormal variance with pedigree 0.19458, pedigree (1,1,4,1,1)
  (same comment as for Benzene)
- Phosphorus [air, urban air close to ground]: 4.71154e-8 kg; lognormal variance with pedigree 1.0902, pedigree (1,1,4,1,1)
  (same comment as for Aluminium III)
- Potassium I [air, urban air close to ground]: 4.77039e-6 kg; lognormal variance with pedigree 0.68004, pedigree (1,1,4,1,1)
  (same comment as for Aluminium III)
- Selenium IV [air, urban air close to ground]: 4.06768e-10 kg; lognormal variance with pedigree 1.9367, pedigree (1,1,4,1,1)
  (same comment as for Aluminium III)
- Silicon [air, urban air close to ground]: 9.45525e-11 kg; lognormal variance with pedigree 0.20007, pedigree (1,1,4,1,1)
  (same comment as for Aluminium III)
- Sodium I [air, urban air close to ground]: 2.22808e-8 kg; lognormal variance with pedigree 0.27099, pedigree (1,1,4,1,1)
  (same comment as for Aluminium III)
- Strontium II [air, urban air close to ground]: 1.43692e-10 kg; lognormal variance with pedigree 1.5631, pedigree (1,1,4,1,1)
  (same comment as for Aluminium III)
- Sulfur dioxide [air, urban air close to ground]: 1.09084e-6 kg; lognormal variance with pedigree 0.97853, pedigree (1,1,4,1,1)
  (same comment as for Aluminium III)
- Thallium I [air, urban air close to ground]: 6.49457e-12 kg; lognormal variance with pedigree 1.9506, pedigree (1,1,4,1,1)
  (same comment as for Aluminium III)
- Tin ion [air, urban air close to ground]: 1.47444e-9 kg; lognormal variance with pedigree 0.62967, pedigree (1,1,4,1,1)
  (same comment as for Aluminium III)
- Titanium ion [air, urban air close to ground]: 6.46296e-8 kg; lognormal variance with pedigree 1.024, pedigree (1,1,4,1,1)
  (same comment as for Aluminium III)
- Toluene [air, urban air close to ground]: 9.49914e-8 kg; lognormal variance with pedigree 0.19458, pedigree (1,1,4,1,1)
  (same comment as for Benzene)
- Vanadium V [air, urban air close to ground]: 2.76776e-10 kg; lognormal variance with pedigree 1.9367, pedigree (1,1,4,1,1)
  (same comment as for Aluminium III)
- Water [air, urban air close to ground]: 0.000182635 m3; lognormal variance with pedigree 0.42316, pedigree (1,1,4,1,1)
  water vapour from waste humidity, hydrogen oxidation and part of the process water.
  Uncertainty: Uncertainty calculated from uncertainty in waste composition, process water input and the uncertainty of fraction to air.
- Zinc II [air, urban air close to ground]: 1.72295e-6 kg; lognormal variance with pedigree 0.56554, pedigree (1,1,4,1,1)
  (same comment as for Aluminium III)
- Non-hazardous waste disposed [inventory indicator, waste]: 1 kg
  Inventory indicator for waste mass disposed. To be used in EN15804 "other data" results.
- Aluminium III [water, surface water]: 4.57171e-9 kg; lognormal variance with pedigree 0.60955, pedigree (1,1,4,1,1)
  Emissions to water from waste composition and incinerator transfer coefficients.
  Uncertainty: uncertainty is calculated from uncertainties in waste composition and transfer coefficients in incinerator
- Antimony ion [water, surface water]: 1.21948e-6 kg; lognormal variance with pedigree 0.93425, pedigree (1,1,4,1,1)
  (same comment as for Aluminium III)
- Arsenic ion [water, surface water]: 6.42203e-17 kg; lognormal variance with pedigree 1.7832, pedigree (1,1,4,1,1)
  (same comment as for Aluminium III)
- BOD5, Biological Oxygen Demand [water, surface water]: 4.66393e-5 kg; lognormal variance with pedigree 0.14757, pedigree (1,1,4,1,1)
  (same comment as for Aluminium III)
- Barium II [water, surface water]: 2.47934e-9 kg; lognormal variance with pedigree 0.85315, pedigree (1,1,4,1,1)
  (same comment as for Aluminium III)
- Beryllium II [water, surface water]: 3.12946e-14 kg; lognormal variance with pedigree 1.5561, pedigree (1,1,4,1,1)
  (same comment as for Aluminium III)
- Boron [water, surface water]: 2.19422e-11 kg; lognormal variance with pedigree 1.54, pedigree (1,1,4,1,1)
  (same comment as for Aluminium III)
- Bromine [water, surface water]: 5.00139e-5 kg; lognormal variance with pedigree 0.45037, pedigree (1,1,4,1,1)
  (same comment as for Aluminium III)
- COD, Chemical Oxygen Demand [water, surface water]: 4.66393e-5 kg; lognormal variance with pedigree 0.14757, pedigree (1,1,4,1,1)
  (same comment as for Aluminium III)
- Cadmium II [water, surface water]: 9.66865e-10 kg; lognormal variance with pedigree 0.93031, pedigree (1,1,4,1,1)
  (same comment as for Aluminium III)
- Calcium II [water, surface water]: 1.7048e-5 kg; lognormal variance with pedigree 0.079136, pedigree (1,1,4,1,1)
  (same comment as for Aluminium III)
- Chloride [water, surface water]: 0.00106837 kg; lognormal variance with pedigree 0.28361, pedigree (1,1,4,1,1)
  (same comment as for Aluminium III)
- Chromium III [water, surface water]: 8.90819e-9 kg; lognormal variance with pedigree 0.51479, pedigree (1,1,4,1,1)
  (same comment as for Aluminium III)
- Cobalt II [water, surface water]: 6.00423e-12 kg; lognormal variance with pedigree 1.0457, pedigree (1,1,4,1,1)
  (same comment as for Aluminium III)
- Copper ion [water, surface water]: 9.10359e-7 kg; lognormal variance with pedigree 0.29084, pedigree (1,1,4,1,1)
  (same comment as for Aluminium III)
- DOC, Dissolved Organic Carbon [water, surface water]: 2.04047e-5 kg; lognormal variance with pedigree 0.14757, pedigree (1,1,4,1,1)
  (same comment as for Aluminium III)
- Fluoride [water, surface water]: 3.16745e-6 kg; lognormal variance with pedigree 0.93526, pedigree (1,1,4,1,1)
  (same comment as for Aluminium III)
- Heat, waste [water, surface water]: 0.495324 MJ; lognormal variance with pedigree 0.00839214, pedigree (1,1,4,1,1)
  (same comment as for Heat, waste)
- Iron ion [water, surface water]: 6.09271e-8 kg; lognormal variance with pedigree 0.41851, pedigree (1,1,4,1,1)
  (same comment as for Aluminium III)
- Lead II [water, surface water]: 2.2809e-7 kg; lognormal variance with pedigree 0.39928, pedigree (1,1,4,1,1)
  (same comment as for Aluminium III)
- Magnesium [water, surface water]: 8.25099e-9 kg; lognormal variance with pedigree 0.90366, pedigree (1,1,4,1,1)
  (same comment as for Aluminium III)
- Manganese II [water, surface water]: 5.59688e-9 kg; lognormal variance with pedigree 0.8329, pedigree (1,1,4,1,1)
  (same comment as for Aluminium III)
- Mercury II [water, surface water]: 4.52966e-11 kg; lognormal variance with pedigree 1.782, pedigree (1,1,4,1,1)
  (same comment as for Aluminium III)
- Molybdenum VI [water, surface water]: 5.15105e-10 kg; lognormal variance with pedigree 1.343, pedigree (1,1,4,1,1)
  (same comment as for Aluminium III)
- Nickel II [water, surface water]: 6.20918e-8 kg; lognormal variance with pedigree 0.42187, pedigree (1,1,4,1,1)
  (same comment as for Aluminium III)
- Nitrate [water, surface water]: 5.71501e-6 kg; lognormal variance with pedigree 0.36854, pedigree (1,1,4,1,1)
  (same comment as for Aluminium III)
- Phosphate [water, surface water]: 6.20705e-8 kg; lognormal variance with pedigree 0.65288, pedigree (1,1,4,1,1)
  (same comment as for Aluminium III)
- Potassium I [water, surface water]: 0.000111606 kg; lognormal variance with pedigree 0.51176, pedigree (1,1,4,1,1)
  (same comment as for Aluminium III)
- Selenium IV [water, surface water]: 3.62129e-10 kg; lognormal variance with pedigree 1.5634, pedigree (1,1,4,1,1)
  (same comment as for Aluminium III)
- Silicon [water, surface water]: 3.26685e-9 kg; lognormal variance with pedigree 0.076268, pedigree (1,1,4,1,1)
  (same comment as for Aluminium III)
- Silver I [water, surface water]: 5.99913e-8 kg; lognormal variance with pedigree 1.1403, pedigree (1,1,4,1,1)
  (same comment as for Aluminium III)
- Sodium I [water, surface water]: 4.07714e-7 kg; lognormal variance with pedigree 0.1412, pedigree (1,1,4,1,1)
  (same comment as for Aluminium III)
- Strontium II [water, surface water]: 3.47004e-11 kg; lognormal variance with pedigree 1.5546, pedigree (1,1,4,1,1)
  (same comment as for Aluminium III)
- Sulfate [water, surface water]: 1.62316e-5 kg; lognormal variance with pedigree 0.77491, pedigree (1,1,4,1,1)
  (same comment as for Aluminium III)
- TOC, Total Organic Carbon [water, surface water]: 2.04047e-5 kg; lognormal variance with pedigree 0.14757, pedigree (1,1,4,1,1)
  (same comment as for Aluminium III)
- Thallium I [water, surface water]: 6.10023e-13 kg; lognormal variance with pedigree 1.954, pedigree (1,1,4,1,1)
  (same comment as for Aluminium III)
- Tin ion [water, surface water]: 1.99244e-6 kg; lognormal variance with pedigree 0.53452, pedigree (1,1,4,1,1)
  (same comment as for Aluminium III)
- Titanium ion [water, surface water]: 1.10856e-8 kg; lognormal variance with pedigree 1.0247, pedigree (1,1,4,1,1)
  (same comment as for Aluminium III)
- Vanadium V [water, surface water]: 1.73104e-12 kg; lognormal variance with pedigree 1.3127, pedigree (1,1,4,1,1)
  (same comment as for Aluminium III)
- Water [water, surface water]: 5.08632e-5 m3; lognormal variance with pedigree 0.83996, pedigree (1,1,4,1,1)
  process water released to surface water.
  Uncertainty: uncertainty calculated from uncertainty in process water input and the uncertainty of fraction to surface water.
- Zinc II [water, surface water]: 1.03107e-7 kg; lognormal variance with pedigree 0.49767, pedigree (1,1,4,1,1)
  (same comment as for Aluminium III)
