# vermiculite mine operation

Dataset: EcoSpold 2, unit process
Geography: RoW
Time period: 2000-01-01 to 2023-12-31
Technology level: current
Classification: ISIC rev.4 ecoinvent: 0810:Quarrying of stone, sand and clay
Classification: EcoSpold01Categories: construction materials/additives
Synonyms: Glimmer
Tags: ConvertedDataset
Scenario: Business-as-Usual
System model: Allocation, cut-off by classification
Generated by: Daniel Kellenberger (obsolete)
Published in: Kellenberger D. 2004
Database: ecoinvent
isCopyrightProtected: true
accessRestrictedTo: 1

## General comment
For a lack of data the dust emissions for bauxite mining are used as proxy. No recultivation is assumed. To account for the phosphate mined together with the vermiculite, the resource "phosphorus, 18% in apatite, 12% in crude ore, in ground" is inventoried. Since the apatite is dumped but afterwards used by other companies it is neither considered co-product nor waste. The paraffin fueled heating system is approximated with "light fuel oil, burned in industrial furnace 1 MW, non-modulating". For the electricity mix the UCPTE-mix has been used.
[This dataset was already contained in the ecoinvent database version 2. It was not individually updated during the transfer to ecoinvent version 3. Life Cycle Impact Assessment results may still have changed, as they are affected by changes in the supply chain, i.e. in other datasets. This dataset was generated following the ecoinvent quality guidelines for version 2. It may have been subject to central changes described in the ecoinvent version 3 change report (http://www.ecoinvent.org/database/ecoinvent-version-3/reports-of-changes/), and the results of the central updates were reviewed extensively. The changes added e.g. consistent water flows and other information throughout the database. The documentation of this dataset can be found in the ecoinvent reports of version 2, which are still available via the ecoinvent website. The change report linked above covers all central changes that were made during the conversion process.]

## Included activities end
includes excavation by digger, blasting, transportation within mine, the land-use for quarrying, the recultivation

## Geography
For the exchanges, RER, GLO and CH modules have been used as proxy.

## Technology
High level of technology used in one of the biggest vermiculite mines in the world, in South-Africa.

## Reference product
- vermiculite: 1 kg; By-product classification allocatable product; CPC 16390: Other minerals n.e.c.; HS2017 253010: Vermiculite, perlite and chlorites; unexpanded; CAS 1318-00-9
  EcoSpold01Location=ZA
  production volume 3.11199e8 kg
    2005 production volumes according to http://minerals.usgs.gov/minerals/pubs/commodity/vermiculite/myb1-2007-vermi.xls table 4.
  property price 0.23 EUR2005
    Calculated value based on data from United Nations Commodity Trade Statistics Database (comtrade.un.org). UN comtrade category: 283522 Exfoliated vermiculite, foamed slag, expanded mineral. Year 2005. Using exchange rate of 1EURO = 1.209 USD. Average of price of import into 5 main markets (EU, US, JP, IN and CN).
  properties: carbon allocation 0 kg, carbon content 0, carbon content, fossil 0, carbon content, non-fossil 0, dry mass 1 kg, water content 0, water in wet mass 0 kg, wet mass 1 kg

## Inputs from technosphere
- blasting: 0.000166 kg; lognormal variance with pedigree 0.264, pedigree (1,4,5,5,5)
  EcoSpold01Location=RER
  Uncertainty: ;
- diesel, burned in building machine: 0.00697 MJ; lognormal variance with pedigree 0.054, pedigree (1,4,5,5,1)
  EcoSpold01Location=GLO
  Uncertainty: ;
  properties: heating value, net 1 MJ
- electricity, medium voltage: 6.31894e-9, 7.19721e-7, 3.14478e-9, 2.01579e-8, 3.46056e-8, 6.86991e-8, 3.22109e-8, 5.6517e-8, 5.89742e-5, 1.35155e-9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 kWh (36 suppliers, which the file names only by identifier); sum of these 0.000105 kWh; lognormal variance with pedigree 0.054, pedigree (1,4,5,5,1)
  EcoSpold01Location=UCTE
  Uncertainty: ;
- heat, district or industrial, other than natural gas: 0.005054 MJ; lognormal variance with pedigree 0.264, pedigree (1,4,5,5,5)
  EcoSpold01Location=RER
  Uncertainty: ;
  properties: heating value, net 1 MJ
- lubricating oil: 1.40244e-5, 6.65756e-5 kg (2 suppliers, which the file names only by identifier); sum of these 8.06e-5 kg; lognormal variance with pedigree 0.692, pedigree (1,1,5,5,1)
  EcoSpold01Location=RER
  properties: carbon content, fossil 0.75, dry mass 1 kg, heating value, net 40.2 MJ, wet mass 1 kg
  note on carbon content, fossil: Lubricating oil is produced from diesel. C-content/dry mass of fats and oils considered 75%, from: ecoinvent v2.2 report, n 15a, pg 40
  note on heating value, net: Literature value, Source: IPCC 2006, 2006 IPCC Guidelines for National Greenhouse Gas Inventories, Prepared by the National Greenhouse Gas Inventories Programme, Eggleston H.S., Buendia L., Miwa K., Ngara T. and Tanabe K. (eds). Published: IGES, Japan
- mine infrastructure, vermiculite: 6.45e-12 unit; lognormal variance with pedigree 0.564, pedigree (1,4,5,5,5)
  EcoSpold01Location=ZA
  Uncertainty: ;

## Inputs from nature
- Occupation, mineral extraction site [natural resource, land]: 0.00065 m2*year; lognormal variance with pedigree 0.094, pedigree (1,4,5,5,1)
  Uncertainty: ;
- Phosphorus [natural resource, in ground]: 0.3 kg; lognormal variance with pedigree 0.264, pedigree (1,4,5,5,5)
  18% P in apatite; 12% in ore
  Uncertainty: ;
- Transformation, from unspecified [natural resource, land]: 1.3e-5 m2; lognormal variance with pedigree 0.174, pedigree (1,4,5,5,1)
  Uncertainty: ;
- Transformation, to mineral extraction site [natural resource, land]: 1.3e-5 m2; lognormal variance with pedigree 0.174, pedigree (1,4,5,5,1)
  Uncertainty: ;
- Vermiculite [natural resource, in ground]: 1 kg; lognormal variance with pedigree 0.054, pedigree (1,4,5,5,1)
  Uncertainty: ;

## Emissions to nature
- Particulate Matter, < 2.5 um [air, non-urban air or from high stacks]: 8e-6 kg; lognormal variance with pedigree 1.372, pedigree (1,1,5,5,1)
- Particulate Matter, > 10 um [air, non-urban air or from high stacks]: 0.000112 kg; lognormal variance with pedigree 1.372, pedigree (1,1,5,5,1)
- Particulate Matter, > 2.5 um and < 10um [air, non-urban air or from high stacks]: 4e-5 kg; lognormal variance with pedigree 1.372, pedigree (1,1,5,5,1)

## Sampling procedure
Data from questionnaire from one company called Parabora mining company ltd. in South-Africa.

## Extrapolations
data which are only available for GLO, RER, MK and CH have been used as proxy for ZA This dataset has been copied from an original dataset covering the geography ZA. The uncertainty has been adjusted accordingly.

## Review by Roberto Dones 2005-07-19
passed
