# aluminium chloride production

Dataset: EcoSpold 2, unit process
Geography: GLO
Time period: 2015-01-01 to 2023-12-31
Technology level: current
Classification: ISIC rev.4 ecoinvent: 2011:Manufacture of basic chemicals
Synonyms: Trichloroaluminum; Trichloroalumane; Aluminium trichloride; Pearsall
Scenario: Business-as-Usual
System model: Allocation, cut-off by classification
Generated by: Lucia Valsasina
Database: ecoinvent
isCopyrightProtected: true
accessRestrictedTo: 1

## General comment
This dataset represents the production of 1 kg of aluminium chloride from the reaction of aluminium melt and hot chlorine gas at high temperatures.
Aluminium chloride can be produced by the reaction of aluminium with chlorine gas and of aluminium or aluminium hydrozide with hydrochloric acid (Lee et al. 2011 and Helmboldt et al. 2007). This product is used to derive aluminium powder which is used in the fabrication of solar cells and electromagnetic fields (Lee et al. 2011). Aluminium chloride is also “[…] widely applied as acid catalyst, isomerization of hydrocarbon, catalyst of aldehyde synthesis, and catalyst of cation polymerization. In case of an anhydride, it is also used for cracking of oil, and catalyst of Friedel-Crafts reaction in an organic synthesis” (Lee et al. 2011, pp. 40).
The final product has usually a shading of yellow and gray caused by residues of the reactants. The pure product would instead have a white colour (Helmboldt 2007). Anhydrous aluminium chloride is a hydroscopic, solid that reacts with moisture and air. Aluminium chloride is soluble in chlorinated solvents, while it forms a complex when being dissolved in polar aprotic solvents (Kirk et al. 2004).
In this dataset, the raw material inputs, and process-specific material exchanges, are modelled with a generic stoichiometry-based tool, using literature or estimated yields. The emissions are modelled with a default value, which is estimated based on losses, unreacted chemicals, among others. The auxiliary (i.e., cooling water and infrastructure) and energy consumption exchanges are modelled with a default value based on industry data from literature sources. For more information on the calculations refer to the sampling procedure.
Reference(s):
Lee, D. et al. 2011. CHEMICAL SYNTHESIS OF ALUMINUM CHLORIDE (AlCl3) BY COST-EFFECTIVE REDUCTION PROCESS. Rev.Adv.Mater. Sci. 28, pp.40-43
Helmboldt, O. et al. 2007. Aluminum Compounds, Inorganic. In Ullmann's Encyclopedia of Industrial Chemistry, Electronic Release, Vol.2, pp.569-584. Wiley-VCH, Weinheim.
Kirk, Raymond E., Donald F. Othmer, and Charles A. Mann. "Encyclopedia of Chemical Technology." 2004.

## Included activities start
The activity starts when the raw materials enter the process.

## Included activities end
Materials entering the process are included as well as energy uses, infrastructure and emissions.

## Geography
The inventory is modelled at the Global level. The main material inputs and outputs of this activity are generated with on a generic stoichiometry-based model, using literature or estimated yields. Furthermore, the source of information for the heat, electricity, water (process and cooling), nitrogen, chemical factory is industry data from the GENDORF Chemical Park, which is based in Germany and produced an average of 2462760 tonnes of chemical substances in the years 2015-2019. For more information on the calculations refer to the sampling procedure.
The dataset could also be considered as not geography-specific, and thus, valid for a broader geographical coverage.
References:
Hischier, R. (2005) Establishing Life Cycle Inventories of Chemicals Based on Differing Data Availability (9 pp). The International Journal of Life Cycle Assessment, Volume 10, Issue 1, pp 59-67. 10.1065/lca2004.10.181.7
Chemiepark GENDORF, Umwelterklärung 2016, https://www.gendorf.de/Nachbarn/Umweltschutz/Industrie%20und%20Nachhaltigkeit
Chemiepark GENDORF, Umwelterklärung 2017, https://www.gendorf.de/Nachbarn/Umweltschutz/Industrie%20und%20Nachhaltigkeit
Chemiepark GENDORF, Umwelterklärung 2020, https://www.gendorf.de/Nachbarn/Umweltschutz/Industrie%20und%20Nachhaltigkeit

## Technology
In the past years the most common method of production of aluminium chloride have been the reaction of aluminium and chlorine gas at high temperatures (Lee et al. 2011 and Helmboldt 2007). Notably, the alluminum could be sourced as a scrap, secondary ingot or prime ingot (Kirk et al. 2004). Chlorine gas is blown in baths of aluminium melt using cylindrical reactors with ceramic lining (Lee et al. 2011 and Helmboldt 2007). This reaction is exothermic with a heat delta of 1.41 MJ/mol, the reaction requires temperatures between 670 to 850 degrees Celsius.
Chemical reaction:
2Al + 3Cl2 -> 2AlCl3
The product sublimes through the melt pool and subsequently condenses into a vessel where it also solidifies on the condenser walls. The generated crystals of aluminium chloride are periodically removed, processed, and packed under a dry air or nitrogen atmosphere (Kirk et al. 2004). The hot gas that exits the melt pool is filtered to remove entrained liquids and solids, while the off-gases are purified before recycling.
In this dataset, a yield of 95% was assumed, with a 95% recirculation for the remaining 5% of unreacted aluminium. Finally, the residual alluminium was assumed to be sent for landfill.
Reference(s):
Lee, D. et al. 2011. CHEMICAL SYNTHESIS OF ALUMINUM CHLORIDE (AlCl3) BY COST-EFFECTIVE REDUCTION PROCESS. Rev.Adv.Mater. Sci. 28, pp.40-43
Helmboldt, O. et al. 2007. Aluminum Compounds, Inorganic. In Ullmann's Encyclopedia of Industrial Chemistry, Electronic Release, Vol.2, pp.569-584. Wiley-VCH, Weinheim.
Kirk, Raymond E., Donald F. Othmer, and Charles A. Mann. "Encyclopedia of Chemical Technology." 2004.

## Time period
In the past years the most common method of production of aluminium chloride have been the reaction of aluminium and chlorine gas at high temperatures (Lee et al. 2011 and Helmboldt 2007).
The time period spans from the earliest year from which at least one of the input values was obtained until 2020, but overall form the most realistic picture of the production. Besides, the activity is partly generated, in terms of material inputs and outputs, based on a generic stoichiometry-based model, using literature or estimated yields, which does not expect to change over time.
The source of information for the heat, electricity, water (process and cooling), nitrogen, chemical factory is industry data from the GENDORF Chemical Park. The values are a 5-year average of data from 2015 to 2019 published by the GENDORF Chemical Park, which is based in Germany and produced an average of 2462760 tonnes of chemical substances in the years 2015-2019. The end time period is therefore set based on the years from Gendorf reference.
For more information on the calculations refer to the sampling procedure and in the comments of the exchanges.
Reference(s):
Lee, D. et al. 2011. CHEMICAL SYNTHESIS OF ALUMINUM CHLORIDE (AlCl3) BY COST-EFFECTIVE REDUCTION PROCESS. Rev.Adv.Mater. Sci. 28, pp.40-43
Helmboldt, O. et al. 2007. Aluminum Compounds, Inorganic. In Ullmann's Encyclopedia of Industrial Chemistry, Electronic Release, Vol.2, pp.569-584. Wiley-VCH, Weinheim.
Hischier, R. (2005) Establishing Life Cycle Inventories of Chemicals Based on Differing Data Availability (9 pp). The International Journal of Life Cycle Assessment, Volume 10, Issue 1, pp 59-67. 10.1065/lca2004.10.181.7
Chemiepark GENDORF, Umwelterklärung 2016, https://www.gendorf.de/Nachbarn/Umweltschutz/Industrie%20und%20Nachhaltigkeit
Chemiepark GENDORF, Umwelterklärung 2017, https://www.gendorf.de/Nachbarn/Umweltschutz/Industrie%20und%20Nachhaltigkeit
Chemiepark GENDORF, Umwelterklärung 2020, https://www.gendorf.de/Nachbarn/Umweltschutz/Industrie%20und%20Nachhaltigkeit

## Reference product
- aluminium chloride: 1 kg; name RP; By-product classification allocatable product; CPC 34240: Phosphates of triammonium; salts and peroxysalts of inorganic acids and metals n.e.c.; HS2017 282732: Chlorides; of aluminium; CAS 7446-70-0
  Aluminium chloride can be produced by the reaction of aluminium with chlorine gas and of aluminium or aluminium hydrozide with hydrochloric acid (Lee et al. 2011 and Helmboldt et al. 2007). This product is used to derive aluminium powder which is used in the fabrication of solar cells and electromagnetic fields (Lee et al. 2011). Aluminium chloride is also “[…] widely applied as acid catalyst, isomerization of hydrocarbon, catalyst of aldehyde synthesis, and catalyst of cation polymerization. In case of an anhydride, it is used for cracking of oil, and catalyst of Friedel-Crafts reaction in an organic synthesis” (Lee et al. 2011, pp. 40). The final product has usually a shading of yellow and gray caused by residues of the reactants. The pure product would instead have a white colour (Helmboldt 2007). Reference(s): Lee, D. et al. 2011. CHEMICAL SYNTHESIS OF ALUMINUM CHLORIDE (AlCl3) BY COST-EFFECTIVE REDUCTION PROCESS. Rev.Adv.Mater. Sci. 28, pp.40-43 Helmboldt, O. et al. 2007. Aluminum Compounds, Inorganic. In Ullmann's Encyclopedia of Industrial Chemistry, Electronic Release, Vol.2, pp.569-584. Wiley-VCH, Weinheim.
  production volume 3.47701e8 kg; name RP_PV
    Estimated value. The global production volume is extrapolated from the European production volume based on reports from Cefic (European Chemical Industry Council), and the American Chemistry Council.
    According to Cefic (2016a) the global sales of chemicals in the year 2015 was 3 534 billion euros. The reported share of sales per region are: EU28 14.7%; Other Europe (Switzerland, Norway, Turkey, Russia and Ukraine) 2.7%; NAFTA (US, Canada and Mexico) 16.5%; Latin America 3.8%; China 39.9%; Japan 3.9%; Republic of Korea 3.2%; India 2.2%; Rest of Asia 11.9%; Rest of the World 1.3%. Cefic also reports the US total sales, which amount to 518.7 billion euros out of the global 3 534 billion euros (14.7%). The same share is reported by the American Chemistry Council (2016), according to which the USA sales account for 15% of global sales for the year 2016.
    European production volume:
    Estimated value. According to the European Chemical Agency, the consumption of Aluminium chloride for the year of 2016 is estimated to be 55000000 kg. The aforementioned value is the average of the range given in the literature. According to the European Chemical Industry Council (Cefic, 2016a), the total sales of chemicals of the European Union in 2016 amounted to 519 billion euros. Chemical imports were valued at 91 billion euros for the first 11 months of 2016. Based on this, the value for the total imports for the year 2016 was extrapolated, yielding a value of 99.3 billion euros. Furthermore, Cefic (2016b) reports a trade surplus (exports-imports) of 46.4 billion euros (once again extrapolated for the whole year using the value of 42 billion euros for the first 11 months of 2016). Considering all the aforementioned information, the total chemical consumption in the EU is calculated to be 472.6 billion euros (total sales-exports+imports). It is therefore calculated that production is 110% of consumption. This value is used to scale the information on chemical consumption to production. The European production volume is therefore 60500000 kg
    Since no data were found for the global production this value was scaled accordingly.
    References:
    American Chemistry Council 2016. Outlook: U.S. Chemical Industry Continues to Outpace Industrial Output; Accounts for More Than One-Half of Construction Spending by Manufacturing Sector. Accessible at: https://www.americanchemistry.com/Media/PressReleasesTranscripts/ACC-news-releases/US-Chemical-Industry-Continues-to-Outpace-Industrial-Output.html
    European Chemical Agency, Brief profile of Aluminium chloride, Accessible at: https://echa.europa.eu/brief-profile/-/briefprofile/100.028.371
    Cefic 2016a. Facts and figures 2016 of the European chemical industry. Accessible at: http://www.cefic.org/Facts-and-Figures/Chemicals-Industry-Profile/
    Cefic 2016b. 2016: EU chemicals output posts positive growth for third year running. Accessible at: http://www.cefic.org/Documents/RESOURCES/Chemical%20Trends%20Report/March-2017-Cefic-Chemicals-Trends-Report.pdf
  property price 1.18565 EUR2005
    Calculated based on inputs: The price of the product has been calculated as a sum of the values of the material and energy inputs for this product. This value is therefore a rough estimation. It may underestimate the real price since there are additional expenses when producing any product. These expences can include for example labour costs, treatment of waste materials and profit for the producer. Please consider carefully whether this level of data quality is acceptable for your application.
  properties: carbon allocation 0 kg, carbon content 0, carbon content, fossil 0, carbon content, non-fossil 0, dry mass 1 kg, water content 0, water in wet mass 0 kg, wet mass 1 kg

## Inputs from technosphere
- aluminium, primary, ingot: 0.0286235, 0.0166203, 0.157639 kg (3 suppliers, which the file names only by identifier); sum of these 0.202882 kg; = 0.213-(0.0475*0.213); lognormal variance with pedigree 0.010025, pedigree (2,3,2,2,3)
  Calculated value based on stoichiometric calculations and literature data. 26.981539g/mol is the molar mass of aluminium, primary, liquid (Al). 133.339639g/mol is the molar mass of aluminium chloride (AlCl3). In the past years the most common method of production of aluminium chloride have been the reaction of aluminium and chlorine gas at high temperatures (Lee et al. 2011 and Helmboldt 2007). Chlorine gas is blown in baths of aluminium using cylindrical reactors with ceramic lining (Lee et al. 2011 and Helmboldt 2007). This reaction is exothermic with a heat delta of 1.41 MJ/mol, the reaction requires temperatures between 670 to 850 degrees Celsius. Chemical reaction: 2Al + 3Cl2 -> 2AlCl3 With a yield of 95%, 0.213 kg of aluminium is necessary. Of the remaing 5%, recirculation of 95% was assumed (equals 4.75% of entire input), therefore it was subtracted from the input. The remaining 5% (0.25% of entire input) was sent to landfill.
  properties: dry mass 1 kg, wet mass 1 kg
- chemical factory, organics: 4e-10 unit; lognormal variance with pedigree 0.31, pedigree (2,3,2,4,3)
  Calculated based on literature data published by the industry. For this activity, no information was readily available concerning infrastructure and land-use. Therefore, the infrastructure is estimated based on data from two chemical factories, the BASF site of Ludwigshafen and the chemical factory in Gendorf (which are both located in Germany), which produce a wide range of chemical substances. Based on this data, the following assumptions are made: the built area amounts to about 4.2 ha, the plant has an average output of 50'000 t/a and a lifespan of fifty years. The estimated infrastructure amount is therefore 4.00 E-10 units per kg of produced chemical. References: Althaus H.-J., Chudacoff M., Hischier R., Jungbluth N., Osses M. and Primas A. (2007) Life Cycle Inventories of Chemicals. ecoinvent report No. 8, v2.0. EMPA Dübendorf, Swiss Centre for Life Cycle Inventories, Dübendorf, CH. Gendorf (2000) Umwelterklärung 2000, Werk Gendorf. Werk Gendorf, Burgkirchen.
- chlorine, liquid: 0.13996, 0.699669 kg (2 suppliers, which the file names only by identifier); sum of these 0.83963 kg; lognormal variance with pedigree 0.010025, pedigree (2,3,2,2,3)
  Calculated value based on stoichiometric calculations and literature data. 70.9054g/mol is the molar mass of chlorine, gaseous (Cl2). 133.339639g/mol is the molar mass of aluminium chloride (AlCl3). In the past years the most common method of production of aluminium chloride have been the reaction of aluminium and chlorine gas at high temperatures (Lee et al. 2011 and Helmboldt 2007). Chlorine gas is blown in baths of aluminium using cylindrical reactors with ceramic lining (Lee et al. 2011 and Helmboldt 2007). This reaction is exothermic with a heat delta of 1.41 MJ/mol, the reaction requires temperatures between 670 to 850 degrees Celsius. Chemical reaction: 2Al + 3Cl2 -> 2AlCl3
  properties: dry mass 1 kg, wet mass 1 kg
- compressed air, 1000 kPa gauge: 0.321383, 0.130777 m3 (2 suppliers, which the file names only by identifier); sum of these 0.45216 m3; lognormal variance with pedigree 0.044, pedigree (2,4,2,4,4)
  Calculated based on literature data published by the GENDORF Chemical Park. The factory produced an average of 2462760 tonnes of chemical substances (including intermediates) per year in the years 2015-2019. The average consumption of compressed air in the years 2015-2019 was 1113557454 m3 per year. This equals 0.45216 m3/kg chemical produced. References: Chemiepark GENDORF, Umwelterklärung 2016, https://www.gendorf.de/Nachbarn/Umweltschutz/Industrie%20und%20Nachhaltigkeit Chemiepark GENDORF, Umwelterklärung 2017, https://www.gendorf.de/Nachbarn/Umweltschutz/Industrie%20und%20Nachhaltigkeit Chemiepark GENDORF, Umwelterklärung 2020, https://www.gendorf.de/Nachbarn/Umweltschutz/Industrie%20und%20Nachhaltigkeit
- electricity, medium voltage: 0.39906 kWh; lognormal variance with pedigree 0.0106, pedigree (2,3,2,4,3)
  Calculated based on literature data published by the GENDORF Chemical Park. The factory produced an average of 2462760 tonnes of chemical substances (including intermediates) per year in the years 2015-2019. The average consumption of electricity in the years 2015-2019 was 982796751 kWh per year. This equals 0.39906 kWh/kg chemical produced. References: Chemiepark GENDORF, Umwelterklärung 2016, https://www.gendorf.de/Nachbarn/Umweltschutz/Industrie%20und%20Nachhaltigkeit Chemiepark GENDORF, Umwelterklärung 2017, https://www.gendorf.de/Nachbarn/Umweltschutz/Industrie%20und%20Nachhaltigkeit Chemiepark GENDORF, Umwelterklärung 2020, https://www.gendorf.de/Nachbarn/Umweltschutz/Industrie%20und%20Nachhaltigkeit
- heat, district or industrial, natural gas: 1.8865 MJ; lognormal variance with pedigree 0.0106, pedigree (2,3,2,4,3)
  Calculated based on literature data published by the GENDORF Chemical Park. The factory produced an average of 2462760 tonnes of chemical substances (including intermediates) per year in the years 2015-2019. The average consumption of natural gas in the years 2015-2019 was 4645920000 MJ per year. This equals 1.8865 MJ/kg chemical produced. References: Chemiepark GENDORF, Umwelterklärung 2016, https://www.gendorf.de/Nachbarn/Umweltschutz/Industrie%20und%20Nachhaltigkeit Chemiepark GENDORF, Umwelterklärung 2017, https://www.gendorf.de/Nachbarn/Umweltschutz/Industrie%20und%20Nachhaltigkeit Chemiepark GENDORF, Umwelterklärung 2020, https://www.gendorf.de/Nachbarn/Umweltschutz/Industrie%20und%20Nachhaltigkeit
  properties: heating value, net 1 MJ
- heat, from steam, in chemical industry: 0.176654, 0.0311463 MJ (2 suppliers, which the file names only by identifier); sum of these 0.2078 MJ; lognormal variance with pedigree 0.0106, pedigree (2,3,2,4,3)
  Calculated based on literature data published by the GENDORF Chemical Park. The factory produced an average of 2462760 tonnes of chemical substances (including intermediates) per year in the years 2015-2019. The average consumption of steam (internal and external sources) in the years 2015-2019 was 511785800 MJ per year. This equals 0.2078 MJ/kg chemical produced. References: Chemiepark GENDORF, Umwelterklärung 2016, https://www.gendorf.de/Nachbarn/Umweltschutz/Industrie%20und%20Nachhaltigkeit Chemiepark GENDORF, Umwelterklärung 2017, https://www.gendorf.de/Nachbarn/Umweltschutz/Industrie%20und%20Nachhaltigkeit Chemiepark GENDORF, Umwelterklärung 2020, https://www.gendorf.de/Nachbarn/Umweltschutz/Industrie%20und%20Nachhaltigkeit
  properties: heating value, net 1 MJ
- inert waste: -0.000414817, -0.000117683 kg (2 suppliers, which the file names only by identifier); sum of these -0.0005325 kg; = 0.213*0.0025; lognormal variance with pedigree 0.0081, pedigree (2,3,2,3,2)
  With a yield of 95%, 0.213 kg of aluminium is necessary. Of the remaing 5%, recirculation of 95% was assumed (equals 4.75% of entire input), therefore it was subtracted from the input. The remaining 5% (0.25% of entire input) was sent to landfill.
  production volume; = RP_PV * BP_landfill / RP
    Calculated from production volume of reference product using the relative outputs.
  properties: dry mass 1 kg, wet mass 1 kg
- tap water: 0.0225 kg; lognormal variance with pedigree 0.0106, pedigree (2,3,2,4,3)
  Calculated based on literature data published by the GENDORF Chemical Park. The factory produced an average of 2462760 tonnes of chemical substances (including intermediates) per year in the years 2015-2019. The average consumption of tap water in the years 2015-2019 was 55352 t per year. This equals 0.0225 kg/kg chemical produced. References: Chemiepark GENDORF, Umwelterklärung 2016, https://www.gendorf.de/Nachbarn/Umweltschutz/Industrie%20und%20Nachhaltigkeit Chemiepark GENDORF, Umwelterklärung 2017, https://www.gendorf.de/Nachbarn/Umweltschutz/Industrie%20und%20Nachhaltigkeit Chemiepark GENDORF, Umwelterklärung 2020, https://www.gendorf.de/Nachbarn/Umweltschutz/Industrie%20und%20Nachhaltigkeit
  properties: carbon content, fossil 0.00178991, dry mass 0.000337476 kg, water content 2962.17, wet mass 1 kg
  note on carbon content, fossil: Bicarbonate content is 2.93 mol/m3. CO2 content is 0.1 mol/m3 (ecoinvent v2.2 report 8, Tab 93.1).
- wastewater, average: -1.09583e-8, -1.82351e-6, -4.36039e-7, -6.49239e-9 m3 (4 suppliers, which the file names only by identifier); sum of these -2.277e-6 m3; lognormal variance with pedigree 0.0104, pedigree (2,3,1,4,3)
  Calculated based on literature data published by the GENDORF Chemical Park. The factory produced an average of 2462760 tonnes of chemical substances (including intermediates) per year in the years 2015-2019. The average ouput of wastewater going to an external wastewater treatment plant in the years 2015-2019 was 5608 m3 per year. This equals 0.000002277 m3/kg chemical produced. References: Chemiepark GENDORF, Umwelterklärung 2016, https://www.gendorf.de/Nachbarn/Umweltschutz/Industrie%20und%20Nachhaltigkeit Chemiepark GENDORF, Umwelterklärung 2017, https://www.gendorf.de/Nachbarn/Umweltschutz/Industrie%20und%20Nachhaltigkeit Chemiepark GENDORF, Umwelterklärung 2020, https://www.gendorf.de/Nachbarn/Umweltschutz/Industrie%20und%20Nachhaltigkeit
  production volume; = BP_wastewater_average*RP_PV/ABS(RP)
    Calculated from the production volume of the reference product in proportion to the respective output amounts.
  properties: carbon content, non-fossil 0.194039, dry mass 0.346837 kg, water content 2882.2, wet mass 1000 kg
  note on carbon content, non-fossil: 0.0673 kg TOC/m3 (Tab A.17, ecoinvent v2.2 report 13_I). TOC was considered as Total Carbon.

## Inputs from nature
- Water, cooling, unspecified natural origin [natural resource, in water]: 0.014707 m3; lognormal variance with pedigree 0.0106, pedigree (2,3,2,4,3)
  Calculated based on literature data published by the GENDORF Chemical Park. The factory produced an average of 2462760 tonnes of chemical substances (including intermediates) per year in the years 2015-2019. The average amount of cooling water released in the years 2015-2019 was 34408800 t per year. It was assumed that 5% of the cooling water was emitted to air during its use, therefore, to calculate the input of cooling water, the output value reported by GENDORF was scaled up by the factor 1/0.95. This equals 0.014707 m3/kg chemical produced. References: Chemiepark GENDORF, Umwelterklärung 2016, https://www.gendorf.de/Nachbarn/Umweltschutz/Industrie%20und%20Nachhaltigkeit Chemiepark GENDORF, Umwelterklärung 2017, https://www.gendorf.de/Nachbarn/Umweltschutz/Industrie%20und%20Nachhaltigkeit Chemiepark GENDORF, Umwelterklärung 2020, https://www.gendorf.de/Nachbarn/Umweltschutz/Industrie%20und%20Nachhaltigkeit
- Water, river [natural resource, in water]: 0.00096543 m3; lognormal variance with pedigree 0.0106, pedigree (2,3,2,4,3)
  Calculated based on literature data published by the GENDORF Chemical Park. The factory produced an average of 2462760 tonnes of chemical substances (including intermediates) per year in the years 2015-2019. The average consumption of river water in the years 2015-2019 was 22000820 t per year. However, since the cooling water is modelled as an input, the amount of river water was adjusted to avoid double counting. 55% of the input amount of cooling water was deducted from the amount of river water, as that is the share of river water versus well water. This equals 0.00096543 m3/kg chemical produced. References: Chemiepark GENDORF, Umwelterklärung 2016, https://www.gendorf.de/Nachbarn/Umweltschutz/Industrie%20und%20Nachhaltigkeit Chemiepark GENDORF, Umwelterklärung 2017, https://www.gendorf.de/Nachbarn/Umweltschutz/Industrie%20und%20Nachhaltigkeit Chemiepark GENDORF, Umwelterklärung 2020, https://www.gendorf.de/Nachbarn/Umweltschutz/Industrie%20und%20Nachhaltigkeit
- Water, well, in ground [natural resource, in water]: 0.00081652 m3; lognormal variance with pedigree 0.0106, pedigree (2,3,2,4,3)
  Calculated based on literature data published by the GENDORF Chemical Park. The factory produced an average of 2462760 tonnes of chemical substances (including intermediates) per year in the years 2015-2019. The average consumption of well water in the years 2015-2019 was 18607480 t per year. However, since the cooling water is modelled as an input, the amount of well water was adjusted to avoid double counting. 45% of the input amount of cooling water was deducted from the amount of well water, as that is the share of well water versus river water. This equals 0.00081652 m3/kg chemical produced. References: Chemiepark GENDORF, Umwelterklärung 2016, https://www.gendorf.de/Nachbarn/Umweltschutz/Industrie%20und%20Nachhaltigkeit Chemiepark GENDORF, Umwelterklärung 2017, https://www.gendorf.de/Nachbarn/Umweltschutz/Industrie%20und%20Nachhaltigkeit Chemiepark GENDORF, Umwelterklärung 2020, https://www.gendorf.de/Nachbarn/Umweltschutz/Industrie%20und%20Nachhaltigkeit

## Emissions to nature
- Chlorine [air, unspecified]: 0.000419815 kg; lognormal variance with pedigree 0.0106, pedigree (2,3,2,4,3)
  Calculated value. The values is based on a generic model. The basic principles of the model have been published in literature (Hischier 2005, Establishing Life Cycle Inventories of Chemicals Based on Differing Data Availability). The model has been updated and extended with newly available data from the chemical industry. Find more information in the dedicated report on the ecoinvent website. Reference(s): Hischier, R. (2005) Establishing Life Cycle Inventories of Chemicals Based on Differing Data Availability (9 pp). The International Journal of Life Cycle Assessment, Volume 10, Issue 1, pp 59–67. 10.1065/lca2004.10.181.7
- Water [air, unspecified]: 0.00147 m3; lognormal variance with pedigree 0.0106, pedigree (2,3,2,4,3)
  Calculated based on literature data published by the GENDORF Chemical Park. The factory produced an average of 2462760 tonnes of chemical substances (including intermediates) per year in the years 2015-2019. To determine the emissions of water to air, the difference of all water inputs (from river, well, tap water and cooling) and outputs (wastewater, emissions to water) was calculated. The average ouput of water to air in the years 2015-2019 was 3620444 m3 per year. This equals 0.00147 m3/kg chemical produced. For more information on the other water exchanges please consult the respective exchange comment. References: Chemiepark GENDORF, Umwelterklärung 2016, https://www.gendorf.de/Nachbarn/Umweltschutz/Industrie%20und%20Nachhaltigkeit Chemiepark GENDORF, Umwelterklärung 2017, https://www.gendorf.de/Nachbarn/Umweltschutz/Industrie%20und%20Nachhaltigkeit Chemiepark GENDORF, Umwelterklärung 2020, https://www.gendorf.de/Nachbarn/Umweltschutz/Industrie%20und%20Nachhaltigkeit
- Aluminium III [water, unspecified]: 0.0106501 kg; lognormal variance with pedigree 0.0106, pedigree (2,3,2,4,3)
  (same comment as for Chlorine)
- Water [water, unspecified]: 0.01504 m3; lognormal variance with pedigree 0.0106, pedigree (2,3,2,4,3)
  Calculated based on literature data published by the GENDORF Chemical Park. The factory produced an average of 2462760 tonnes of chemical substances (including intermediates) per year in the years 2015-2019. The amount of water released back to the environment consists of the sum of the amount of process water treated in the internal WWTP that is then released back to the environment and the amount of cooling water released back to the environment. The average ouput of the internal WWTP in the years 2015-2019 was 2628800 m3 and that of cooling water released back to the environment was 34408800 m3. This gives a yearly average of 37037600 m3 emissions of water to water. This equals 0.01504 m3/kg chemical produced. References: Chemiepark GENDORF, Umwelterklärung 2016, https://www.gendorf.de/Nachbarn/Umweltschutz/Industrie%20und%20Nachhaltigkeit Chemiepark GENDORF, Umwelterklärung 2017, https://www.gendorf.de/Nachbarn/Umweltschutz/Industrie%20und%20Nachhaltigkeit Chemiepark GENDORF, Umwelterklärung 2020, https://www.gendorf.de/Nachbarn/Umweltschutz/Industrie%20und%20Nachhaltigkeit

## Sampling procedure
Literature data and stoichiometric calculation. This inventory is partially based on a generic model of the production of chemicals. The data generated by this model have been improved with compound-specific data when available. The model of the production of chemicals is using specific industry or literature data wherever possible and more generic data on chemical production processes to fill compound-specific data gaps when necessary. The basic principles of the model have been published in literature (Hischier, 2005). The model has been updated and extended with newly available data from the chemical industry.In the model, unreacted fractions are treated in a waste treatment process, and emissions reported are after a waste treatment process that is included in the scope of this dataset. For volatile reactants, a small level of evaporation is assumed. Solvents and catalysts are mostly recycled in closed-loop systems within the scope of the dataset and reported flows are for losses from this system.The main source of information for the values for heat, electricity, water (process and cooling), nitrogen, and chemical factory is industry data from the GENDORF Chemical Park. The values are a 5-year average of data from 2015 to 2019 published by the GENDORF Chemical Park, which is based in Germany and produced an average of 2462760 tonnes of chemical substances in the years 2015-2019. For more information refer to the comments of the exchanges.

References:
Hischier, R. (2005) Establishing Life Cycle Inventories of Chemicals Based on Differing Data Availability (9 pp). The International Journal of Life Cycle Assessment, Volume 10, Issue 1, pp 59-67. 10.1065/lca2004.10.181.7
Chemiepark GENDORF, Umwelterklärung 2016, https://www.gendorf.de/Nachbarn/Umweltschutz/Industrie%20und%20Nachhaltigkeit
Chemiepark GENDORF, Umwelterklärung 2017, https://www.gendorf.de/Nachbarn/Umweltschutz/Industrie%20und%20Nachhaltigkeit
Chemiepark GENDORF, Umwelterklärung 2020, https://www.gendorf.de/Nachbarn/Umweltschutz/Industrie%20und%20Nachhaltigkeit

## Review by Emilia Moreno Ruiz 2017-08-10
This dataset was additionally reviewed in a separate review process by Eric Johnson of Atlantic Consulting as well as Emilia Moreno Ruiz and Gregor Wernet of ecoinvent.
