# dust collector production, electrostatic precipitator, for domestic use

Dataset: EcoSpold 2, unit process
Geography: CH
Time period: 2010-01-01 to 2023-12-31
Technology level: current
Classification: ISIC rev.4 ecoinvent: 2819:Manufacture of other general-purpose machinery
Classification: EcoSpold01Categories: wood energy/heating systems
Synonyms: dust precipitator; exhaust aftertreatment control system; dust collector; particulate filter
Tags: biomass power
Scenario: Business-as-Usual
System model: Allocation, cut-off by classification
Generated by: Marco Mina
Database: ecoinvent
isCopyrightProtected: true
accessRestrictedTo: 1

## General comment
This dataset represent the production and the disposal of an electrostatic precipitator for domestic use, dimensioned to be connected to a stove or furnaces for residential wood combustion (with thermal capacity less than 35kW). Its air flow capacity is 1.4 liters per second.

## Included activities start
From reception of furnace components at the factory gate

## Included activities end
This activity ends with the disposal of the device in the end of its lifetime.The dataset includes includes the most important materials used for the fabrication of a particle separator (electrostatic precipitator, ESP) to be applied in residential wood combustiondevices: stainless steel, nylon, copper, electronic control. The dataset includes electricity for the construction and the disposal of the device.

## Geography
Could be used for central European conditions.

## Technology
Particle separator for kindling fires. Model of reference developed by Ruegg Cheminee (Switzerland) in co-operation with EMPA (Swiss material testing institute). Model: Zumikron

## Reference product
- dust collector, electrostatic precipitator, for domestic use: 1 unit; By-product classification allocatable product; CPC 4393: General-purpose machinery n.e.c.; HS2017 842121: Machinery; for filtering or purifying water
  production volume 49 unit; name RP_PV_1
    estimated from the produced number of furnaces (the device is applied together) - high uncertainty
  property capacity [l/hour] 5000 l/hour; name capacity_l_per_hour
    capacity in litres per hour
  property lifetime 20 year; name lifetime
  property lifetime capacity [l] 8.76e8 l; name lifetime_capacity_l; = (20*365*24*60*60)* (capacity_l_per_hour/3600)
    lifetime capacity in litres
  property price 34.1263 EUR2005
    Calculated based on inputs: The price of the product has been calculated as a sum of the values of the material and energy inputs for this product. This value is therefore a rough estimation. It may underestimate the real price since there are additional expenses when producing any product. These expences can include for example labour costs, treatment of waste materials and profit for the producer. Please consider carefully whether this level of data quality is acceptable for your application.
  properties: carbon allocation 0 kg, carbon content 1.99072, carbon content, fossil 1.99066, carbon content, non-fossil 6.721e-5, dry mass 0 kg, water in wet mass 0 kg, wet mass 0 kg

## Inputs from technosphere
- cable, three-conductor cable: 4 m; source Ruegg Cheminèe company 2011; lognormal variance with pedigree 0.0258, pedigree (2,1,4,1,1)
  estimation
  properties: carbon content, fossil 0.451335, dry mass 1.04 kg, wet mass 1.04 kg
  note on carbon content, fossil: Calculated as the addition of C contents in the product composition. Then referred to 1 kg DM
- copper, cathode: 0.2 kg; source Ruegg Cheminèe company 2011; lognormal variance with pedigree 0.0432, pedigree (4,5,4,5,1)
  estimation (windings for the blower)
  properties: dry mass 1 kg, wet mass 1 kg
- electricity, low voltage: 5 kWh; source Ruegg Cheminèe company 2011; lognormal variance with pedigree 0.154625, pedigree (3,3,5,2,3)
  estimation
- electronics scrap from control units: -0.5 kg; name BP_amount_2; lognormal variance with pedigree 0.0007, pedigree (1,2,1,1,1)
  electronic parts
  production volume; = RP_PV_1* BP_amount_2
    Calculated from production volume of reference product using the relative outputs.
  properties: carbon content, fossil 0.337146, carbon content, non-fossil 0.00013442, dry mass 1 kg, lifetime 20 year, wet mass 1 kg
- electronics, for control units: 0.5 kg; source Ruegg Cheminèe company 2011; lognormal variance with pedigree 0.0258, pedigree (2,1,4,1,1)
  estimation (blower and control unit electronics)
  properties: carbon content, fossil 0.337146, carbon content, non-fossil 0.00013442, dry mass 1 kg, wet mass 1 kg
  note on carbon content, fossil: The control unit has a composition of 46% steel (housing), 32% plastics, 14% printed wiring boards and 8% cables (various types).;
- metal working, average for chromium steel product manufacturing: 0.05 kg; source Ruegg Cheminèe company 2011; lognormal variance with pedigree 0.0332, pedigree (4,1,4,1,1)
  estimation (stainless steel electrode)
- nylon 6: 0.02 kg; source Ruegg Cheminèe company 2011; lognormal variance with pedigree 0.0258, pedigree (2,1,4,1,1)
  estimation (high voltage insulation)
  properties: carbon content, fossil 0.637168, dry mass 1 kg, heating value, net 30.9 MJ, wet mass 1 kg
  note on carbon content, fossil: It is a chain of caprolactam molecules, originating from aminocarboxylic acids - here caproic acid or caprolactam. The structure of nylon 6 is -(NH-(CH2)5-CO)n-, C6H11NO (ecoinvent v2.2 report 11_II). MW=113 g/mol
  note on heating value, net: Assumed equal to Nylon-66. Reference: Walters, R. N., Hackett, S. M. and Lyon, R. E. (2000) ‘Heats of combustion of high temperature polymers’, Fire and Materials, 24(5), pp. 245–252. doi: 10.1002/1099-1018(200009/10)24:5<245::AID-FAM744>3.0.CO;2-7.
- scrap copper: -2.2 kg; name BP_amount_1; lognormal variance with pedigree 0.0007, pedigree (1,2,1,1,1)
  disposal of the cable (4 meter cable = about 2 kg copper) and of the copper for the wire (0.2 kg)
  production volume; = RP_PV_1* BP_amount_1
    Calculated from production volume of reference product using the relative outputs.
  properties: dry mass 1 kg, lifetime 20 year, wet mass 1 kg
- scrap steel: -5 kg; name BP_amount_3; lognormal variance with pedigree 0.0007, pedigree (1,2,1,1,1)
  steel and chromium steel
  production volume; = RP_PV_1* BP_amount_3
    Calculated from production volume of reference product using the relative outputs.
  properties: dry mass 1 kg, lifetime 20 year, wet mass 1 kg
- sheet rolling, chromium steel: 5 kg; source Ruegg Cheminèe company 2011; lognormal variance with pedigree 0.0332, pedigree (4,1,4,1,1)
  literature value (body of precipitator, for inline models)
- steel, chromium steel 18/8: 5 kg; source Ruegg Cheminèe company 2011; lognormal variance with pedigree 0.0432, pedigree (4,5,4,5,1)
  literature value (body of precipitator, for inline models)
  properties: carbon content, fossil 0.0008, dry mass 1 kg, wet mass 1 kg
  note on carbon content, fossil: Stainless steel model is the grade 304 steel (18/8 stainless, 18% chromium 8% nickel; max. 0.08% C)
- wire drawing, copper: 0.2 kg; source Ruegg Cheminèe company 2011; lognormal variance with pedigree 0.0332, pedigree (4,1,4,1,1)
  estimation (windings for the blower)

## Sampling procedure
literature, personal communications from technicians and producers, technical data available

## Review by Bo Weidema 2012-02-01
Passed. Documentation adequate, inputs relevant, mass balance correct, and correct handling of capacity utilisation.

## Review by Bo Weidema 2012-02-01
This dataset has only been reviewed by two editors. Since this is an infrastructure dataset, this deviation from normal procedures is acceptable.
