# quicklime production, milled, loose

Dataset: EcoSpold 2, unit process
Geography: CA-QC
Time period: 2012-01-01 to 2023-12-31
Technology level: current
Classification: ISIC rev.4 ecoinvent: 2394:Manufacture of cement, lime and plaster
Classification: EcoSpold01Categories: construction materials/additives
Synonyms: quick; burnt; lime; caustic; Calciumhydroxid; Calcium hydroxide
Tags: single enterprise data
Scenario: Business-as-Usual
System model: Allocation, cut-off by classification
Share of production covered: 100 %
Generated by: Geneviève Martineau
Published in: Kellenberger D. 2007
Database: ecoinvent
isCopyrightProtected: true
accessRestrictedTo: 1

## General comment
This dataset represents the production of milled quicklime in Quebec (Canada), from quicklime in pieces
The only quicklime producer in Quebec provided the electricity consumption for quicklime milling.
Infrastructure data was extrapolated from "quicklime production, milled, loose, GLO 2000-2002" ecoinvent dataset: The value of the infrastructure is normalized with a annual production capacity of about 23'000 tons of product per year. The estimated lifespan of the machines is 25 years. There are no significant dust emissions as a dust control system is installed.
Quicklime is used for acid neutralization, SO2 absorption, sludge stabilization or other industrial alkali applications.

## Included activities start
From quicklime in pieces.

## Included activities end
This activity ends with the milled quicklime, at the plant gate.

This dataset includes the processes: crushing, milling , filtering (cyclone), dedusting, and storing. One part of the total heating energy for "production" and "administration" is included. Equipment included in the infrastructure: 1 crusher, 1 roller mill, 1 plant for dedusting, 1cyclone, and 1 small silo.

This dataset does not include the electricity consumption for dedusting and filtering. This energy was included in the "quicklime, in pieces, loose, Québec".

## Geography
Quebec data are from the only company that produces quicklime on the territory. Unavalable data were extrapolated based on the GLO dataset exchanges. Uncertainties adjusted accordingly.

## Technology
Electric mills.

## Reference product
- quicklime, milled, loose: 1 kg; By-product classification allocatable product; CPC 37420: Quicklime, slaked lime and hydraulic lime; HS2017 252210: Quicklime; excluding calcium oxide and hydroxide of heading no. 2825; CAS 1305-78-8
  EcoSpold01Location=CH
  Pulverized limestone (lime, milled, loose) includes all products which are made by grinding and screening industrial grade limestone.
  These products are used in a variety of applications including:
  - Rock Dust - used to suppress coal dust explosions in the coal industry.
  - Agricultural - used to neutralize soil acidity, increase plant nutrients, increase organic matter, increase soil organisms, and increase trace elements.
  - Exhaust Gas Scrubbers - used in industrial and power plants.
  - Scrubber Reagent - used in circulating fluidized bed boilers as a reagent material for sulfur removal.
  - Roofing Materials - used as a filler in asphalt shingles.
  - Drilling Mud Additives - used as an essential component in drilling mud.
  - Glass Stone - used as a primary ingredient in the glass making process.
  - Feed Supplements - used to provide essential minerals for the animal feed industry.
  production volume 6.82e8 kg
    Source: questionnaire. Primary data for 2012 quicklime production, in Quebec. Do not include quicklime dedicated to hydrated lime production.
  property carbon content, fossil 0
    Tab 3.3, ecoinvent v2.2 report 7, part VII, pg 5. Ground quicklime
  property carbon content, non-fossil 0
    Tab 3.3, ecoinvent v2.2 report 7, part VII, pg 5. Ground quicklime
  property price 0.077 EUR2005
    Calculated value based on data from United Nations Commodity Trade Statistics Database (comtrade.un.org). UN comtrade category: 252210 Quicklime. Using exchange rate of 1EURO = 1.209 USD. Average of price of import into 5 main markets (EU, US, JP, IN and CN).
  properties: carbon allocation 0 kg, carbon content 0, dry mass 0.99 kg, water content 0.010101, water in wet mass 0.01 kg, wet mass 1 kg

## Inputs from technosphere
- conveyor belt: 8.79e-8 m; source Kellenberger D. 2007; lognormal variance with pedigree 0.3712, pedigree (4,3,5,5,2)
  Extrapolated value, based on "quicklime production, milled, loose, GLO 2002" dataset.
  EcoSpold01Location=RER
- electricity, medium voltage: 0.00802487 kWh; lognormal variance with pedigree 0.0092, pedigree (2,1,4,1,1)
  Measured value (weighted average over all Quebec sites). Electricity used for quicklime milling. Source: questionnaire
  EcoSpold01Location=CH
- heat, central or small-scale, other than natural gas: 0.00141 MJ; source Kellenberger D. 2007; lognormal variance with pedigree 0.0432, pedigree (1,3,5,5,2)
  EcoSpold01Location=CH
  Extrapolated value, based on "quicklime production, milled, loose, GLO 2002" dataset.
  properties: heating value, net 1 MJ
- industrial machine, heavy, unspecified: 0.000109 kg; source Kellenberger D. 2007; lognormal variance with pedigree 0.3712, pedigree (4,3,5,5,2)
  (same comment as for conveyor belt)
- quicklime, in pieces, loose: 1 kg; lognormal variance with pedigree 0.0086, pedigree (1,1,4,1,1)
  Measured value: No loss during the process. Source questionnaire.
  EcoSpold01Location=CH
  properties: dry mass 0.99 kg, water content 0.010101, wet mass 1 kg

## Sampling procedure
Information provided by the only Quebec producer

## Extrapolations
A weighted average of the three quicklime production plants in Quebec was used.
When no information available, GLO exchanges have been used as proxy for Quebec. The uncertainty has been adjusted accordingly.

See Geography and Technolgy fields for details.
