# polymer foaming

Dataset: EcoSpold 2, unit process
Geography: CA-QC
Time period: 1995-01-01 to 2023-12-31
Technology level: current
Classification: EcoSpold01Categories: plastics/processing
Classification: ISIC rev.4 ecoinvent: 2220:Manufacture of plastics products
Tags: recontextualization
Scenario: Business-as-Usual
System model: Allocation, cut-off by classification
Generated by: Pascal Lesage
Published in: Hischier R. 2007
Database: ecoinvent
isCopyrightProtected: true
accessRestrictedTo: 1

## General comment
1 kg of this process equals 1 kg of expanded plastics (usually polystyrene).
[This dataset was already contained in the ecoinvent database version 2. It was not individually updated during the transfer to ecoinvent version 3. Life Cycle Impact Assessment results may still have changed, as they are affected by changes in the supply chain, i.e. in other datasets. This dataset was generated following the ecoinvent quality guidelines for version 2. It may have been subject to central changes described in the ecoinvent version 3 change report (http://www.ecoinvent.org/database/ecoinvent-version-3/reports-of-changes/), and the results of the central updates were reviewed extensively. The changes added e.g. consistent water flows and other information throughout the database. The documentation of this dataset can be found in the ecoinvent reports of version 2, which are still available via the ecoinvent website. The change report linked above covers all central changes that were made during the conversion process.]
Child dataset exchanges identical to GLO dataset. Created to enable linking to regional markets (e.g. for electricity). Data quality indicators adjusted accordingly.

## Included activities end
This process contains the auxillaries and energy demand for the mentioned convertion process of plastics. The converted amount of plastics is NOT included into the dataset.

## Geography
Information from one Swiss insulation material production site - used as European average data.
Child dataset exchanges identical to GLO dataset. Created to enable linking to regional markets (e.g. for electricity). Data quality indicators adjusted accordingly.

## Technology
production of insulation panels

## Time period
Time of publication

## Parameters
- Quebec gross domestic product 2011: 3.11e11 USD(2011); name quebecGDP2011; lognormal variance with pedigree 0.0006, pedigree (1,1,1,1,1)
  Quebec Gross domestic product for 2011, expressed in 2011 USD. Source: Institut de la statistique du Québec. Converted from CAD to USD using a yearly average exchange rate of 0.989 CAD/USD (Source: bank of Canada).
- fraction, process water, to air: 0.205 dimensionless; lognormal variance with pedigree 0.092025, pedigree (4,4,3,2,4)
- world gross domestic product 2011: 7e13 USD(2011); name worldGDP2011; lognormal variance with pedigree 0.0006, pedigree (1,1,1,1,1)
  World Gross domestic product for 2011, expressed in 2011 USD. Source: World Bank.

## Reference product
- polymer foaming: 1 kg; By-product classification allocatable product; CPC 89200: Moulding, pressing, stamping, extruding and similar plastic manufacturing services
  production volume 0.0177714 kg
    Gross approximation of Quebec production volume using relative value of Quebec GDP to world GDP
  property price 0.108503 EUR2005
    Calculated based on inputs: The price of the product has been calculated as a sum of the values of the material and energy inputs for this product. This value is therefore a rough estimation. It may underestimate the real price since there are additional expenses when producing any product. These expences can include for example labour costs, treatment of waste materials and profit for the producer. Please consider carefully whether this level of data quality is acceptable for your application.
  properties: carbon allocation 0 kg, carbon content 0

## Inputs from technosphere
- diesel, burned in building machine: 0.0475 MJ; lognormal variance with pedigree 0.0532, pedigree (2,3,5,5,1)
  Average values from one Swiss company
  Uncertainty: a
  properties: heating value, net 1 MJ
- electricity, medium voltage: 0.788 kWh; lognormal variance with pedigree 0.0532, pedigree (2,3,5,5,1)
  Average values from one Swiss company
  Uncertainty: a
- heat, district or industrial, other than natural gas: 2.71795 MJ; lognormal variance with pedigree 0.0532, pedigree (2,3,5,5,1)
  Average values from one Swiss company
  Uncertainty: a
  properties: heating value, net 1 MJ

## Inputs from nature
- Water, unspecified natural origin [natural resource, in water]: 0.000661 m3; lognormal variance with pedigree 0.0532, pedigree (2,3,5,5,1)
  Average values from one Swiss company
  Uncertainty: a

## Emissions to nature
- Pentane [air, urban air close to ground]: 0.015 kg; lognormal variance with pedigree 0.1732, pedigree (2,3,5,5,1)
  Average values from one Swiss company
  Uncertainty: a
- Water [air, unspecified]: 0.000135505 m3; lognormal variance with pedigree 0.0827, pedigree (2,2,5,5,1)
  Calculated value based on literature values and expert opinion. See comments in the parametres" comment field.
- Water [water, unspecified]: 0.000525495 m3; lognormal variance with pedigree 0.0827, pedigree (2,2,5,5,1)
  (same comment as for Water)
  property carbon content, fossil 0; name C_content_fossil
  property carbon content, non-fossil 0; name C_content_non_fossil
  property dry mass 0 kg; name DM
  property water in wet mass 1000 kg; name WWM
  property wet mass 1000 kg; name WM

## Sampling procedure
company data

## Extrapolations
GLO dataset extrapolated from European dataset, which in turn was used to create this child dataset. Exchanges identical to GLO dataset. Created to enable linking to regional markets (e.g. for electricity). Data quality indicators adjusted accordingly.
