# nuclear fuel element production, for pressure water reactor, UO2 3.8% & MOX

Dataset: EcoSpold 2, unit process
Geography: FR
Time period: 2002-01-01 to 2023-12-31
Technology level: current
Classification: EcoSpold01Categories: nuclear power/production
Classification: ISIC rev.4 ecoinvent: 2011:Manufacture of basic chemicals
Tags: ConvertedDataset
Scenario: Business-as-Usual
System model: Allocation, cut-off by classification
Generated by: Roberto Dones
Published in: Dones, R. 2007
Database: ecoinvent
isCopyrightProtected: true
accessRestrictedTo: 1

## General comment
The shares are based on the current core management of French PWRs, at equilibrium, where 20 units of the 900 MW class use 30% MOX. Not all plutonium extracted at reprocessing from French spent fuel elements seems to be used at present, but in the near future this will be achieved with other units operating with MOX. Hence, the indication of data validity inputted in "TimePeriod" only says that the shares represent the knowledge available today of the fuel management for the French nuclear park.
[This dataset was already contained in the ecoinvent database version 2. It was not individually updated during the transfer to ecoinvent version 3. Life Cycle Impact Assessment results may still have changed, as they are affected by changes in the supply chain, i.e. in other datasets. This dataset was generated following the ecoinvent quality guidelines for version 2. It may have been subject to central changes described in the ecoinvent version 3 change report (http://www.ecoinvent.org/database/ecoinvent-version-3/reports-of-changes/), and the results of the central updates were reviewed extensively. The changes added e.g. consistent water flows and other information throughout the database. The documentation of this dataset can be found in the ecoinvent reports of version 2, which are still available via the ecoinvent website. The change report linked above covers all central changes that were made during the conversion process.]

## Included activities end
The module consists of the share of UO2 and MOX fuel elements.

## Geography
French conditions

## Technology
Data reflects the use of UO2 and MOX fuel elements in current nuclear reactors.

## Reference product
- nuclear fuel element, for pressure water reactor, UO2 3.8% & MOX: 1 kg; By-product classification allocatable product; CPC 33710: Fuel elements (cartridges), non-irradiated, for nuclear reactors; HS2017 840140: Nuclear reactors; parts thereof
  EcoSpold01Location=FR
  production volume 0.186957 kg
    This is a placeholder value that does not reflect real-world production volumes. This dataset does not currently require a real-world production volume to work in the database framework, and no actual data were collected yet. This has no negative effect on the results of the ecoinvent database. The placeholder value of this activity was scaled according to the nominal GDP of 2005 (source: United Nations, http://data.un.org/Glossary.aspx?q=GDP+%28current+US%24%29, accessed 20130726) to reflect an appropriate share of the global production volume, which is also a placeholder value.
  property price 532 EUR2005
    Calculated value based on data from United Nations Commodity Trade Statistics Database (comtrade.un.org). UN comtrade category: 840130 Fuel elements non-irradiated, for nuclear reactors. Year 2005. Using exchange rate of 1EURO = 1.209 USD. Average of price of import into 4 main markets (EU, US, JP and CN).
  properties: carbon allocation 0 kg, carbon content 0, carbon content, fossil 0, carbon content, non-fossil 0, dry mass 1 kg, water content 0, water in wet mass 0 kg, wet mass 1 kg

## Inputs from technosphere
- MOX fuel element, for light water reactor: 0.1 kg; lognormal variance with pedigree 0.06, pedigree (1,1,5,1,1)
  EcoSpold01Location=UCTE
  own estimation
  properties: dry mass 1 kg, wet mass 1 kg
- uranium, enriched 3.8%, in fuel element for light water reactor: 0.9 kg; lognormal variance with pedigree 0.04, pedigree (1,1,5,1,1)
  EcoSpold01Location=FR
  own estimation
  properties: dry mass 1 kg, wet mass 1 kg

## Sampling procedure
Literature

## Review by Roberto Dones 2003-08-19
passed
for final calculation August 2003
