# bromoxynil production

Dataset: EcoSpold 2, unit process
Geography: GLO
Time period: 2021-01-01 to 2023-12-31
Technology level: current
Classification: ISIC rev.4 ecoinvent: 2011:Manufacture of basic chemicals
Synonyms: Brominal, Buctril, Bromox, Bromoxan, Kaleis
Scenario: Business-as-Usual
System model: Allocation, cut-off by classification
Generated by: Daria Dellenbach
Database: ecoinvent
isCopyrightProtected: true
accessRestrictedTo: 1

## General comment
This dataset represents the production of 1 kg of bromoxynil. Emissions are estimated. Energy consumptions and infrastructure are calculated with standard values. A yield of 95% per chemical step was assumed.
Bromoxynil is an organic substance with the CAS no.: 001689-84-5. It is called '3,5-dibromo-4-hydroxybenzonitrile' under IUPAC naming and its molecular formula is: C7H3Br2NO. It is solid under normal conditions of temperature and pressure and appears as a colorless or white powder. It is modelled as a pure substance. Bromoxynil is a herbicide applied to control broad-leaved weeds. It is used post-emergence e.g. on cereals, maize, sorghum, onions, garlic, mint and turf. Bromoxynil inhibits the photosynthetic electron transfer and the oxidative phosphorylation in the mitochondria. This exacerbates the energy production and respiration of plants. There are no publicly available information about the consumption of this substance on industrial sites.
Reference(s):
Unger T., (1996). Pesticide Synthesis Handbook, Noyes Publication.
Appleby A.P., Muller F., Carpy, S., (2011): Weed Control, in Ullmanns Encyclopedia of Industrial Chemistry, Weinheim, Wiley-VCH.
Chemiepark GENDORF, Umwelterklärung 2016, https://www.gendorf.de/Nachbarn/Umweltschutz/Industrie%20und%20Nachhaltigkeit
Chemiepark GENDORF, Umwelterklärung 2017, https://www.gendorf.de/Nachbarn/Umweltschutz/Industrie%20und%20Nachhaltigkeit
Chemiepark GENDORF, Umwelterklärung 2020, https://www.gendorf.de/Nachbarn/Umweltschutz/Industrie%20und%20Nachhaltigkeit
Hischier, R. (2005) Establishing Life Cycle Inventories of Chemicals Based on Differing Data Availability (9 pp). The International Journal of Life Cycle Assessment, Volume 10, Issue 1, pp 59–67. 10.1065/lca2004.10.181.7

## Included activities start
Cradle to gate. The activity starts when the raw materials enter the process.

## Included activities end
Production of bromoxynil production including materials, energy uses, infrastructure and emissions.

## Technology
Bromoxynil is produced in four steps from phenol:
C6H6O + CHCl3 + KOH --> C7H6O2 + 2 HCl + KCl
C7H6O2 + 2 Br2 --> C7H4Br2O2 + HBr
C7H4Br2O2 + NH3O --> C7H5Br2NO2 + H2O
C7H5Br2NO2 --> C7H2Br2NO + H2O
Precursors that are used for the bromoxynil production are hydroxylamine ((NH3OH)2SO4) and nitrous dioxide (NO2).
The formed hydrochloric acid is neutralised with sodium hydroxide and release to water as sodium, chloride and water.
Reference(s):
Unger T., (1996). Pesticide Synthesis Handbook, Noyes Publication.
Appleby A.P., Muller F., Carpy, S., (2011): Weed Control, in Ullmanns Encyclopedia of Industrial Chemistry, Weinheim, Wiley-VCH.

## Reference product
- bromoxynil: 1 kg; name RP; By-product classification allocatable product; CPC 34663: Herbicides, anti-sprouting products and plant-growth regulators; HS2017 380893: Herbicides, anti-sprouting products and plant-growth regulators; other than containing goods of Subheading [...]; CAS 1689-84-5
  production volume 9.55868e6 kg; name PV_RP; = (642500+1228133.4)/(0.0357+0.1600)
    Calculated value. The global production volume is extrapolated from the German and US production volumes using the global average GDP (constant 2017 international USD from 2015-2019). The annual production value of Germany in the year 2017 is 642500 kg and the US production volume in 2017 is 1228133.4 kg. This value is divided by the German share of global GDP, 3.57% (2015-2019), and the US share, 16.00% (2015-2019).
    References:
    Bundesamt für Verbraucherschutz und Lebensmittelsicherheit (2018): Absatz an Pflanzenschutzmitteln in der Bundesrepublik Deutschland 2017, available here: https://www.bvl.bund.de/SharedDocs/Downloads/04_Pflanzenschutzmittel/01_meldungen_par_64/meld_par_64_2017.pdf?__blob=publicationFile&v=2, accessed 07-06-2022.
    U.S. Geological Survey (2018): Estimated Annual Agricultural Pesticide Use, available here: https://water.usgs.gov/nawqa/pnsp/usage/maps/county-level/, accessed 07-06-2022.
    World bank (2022): GDP, available here: https://data.worldbank.org/indicator/NY.GDP.MKTP.PP.KD, accessed 17-05-2022.
  property price 2.20453 EUR2005
    The price is calculated based on price information from Made-in-China (available here: https://aokun-agri.en.made-in-china.com/product/aEsRktMLTxhm/China-Most-Popular-Herbicide-Bromoxynil-80-Sp-Powder-CAS-No-1689-84-5-Herbicide-Supplier-Price-for-with-Best-Price-in-Stock.html, last accessed 2022-08-10).
    The prices were converted to EUR based on the annual exchange rates published by the European Central Bank (https://sdw.ecb.europa.eu/quickview.do?SERIES_KEY=120.EXR.A.USD.EUR.SP00.A, last accessed on 2022-02-15) and adjusted for inflation relative to 2005 using the producer price index (PPI) of the euro area, published by eurostat (https://appsso.eurostat.ec.europa.eu/nui/show.do?dataset=sts_inpp_a&lang=en, last accessed on 2022-05-04)., last accessed 2022-08-04).
  properties: carbon allocation 0.304729 kg, carbon content 0.304729, carbon content, fossil 0.304729, carbon content, non-fossil 0, dry mass 1 kg, water content 0, water in wet mass 0 kg, wet mass 1 kg

## Inputs from technosphere
- chemical factory, organics: 1.508e-9 unit; lognormal variance with pedigree 0.3494, pedigree (2,5,2,4,4)
  Calculated based on literature data published by the industry. For this activity, no information was readily available concerning infrastructure and land-use. Therefore, the infrastructure is estimated based on data from two chemical factories, the BASF site of Ludwigshafen and the chemical factory in Gendorf (which are both located in Germany), which produce a wide range of chemical substances. Based on this data, the following assumptions are made: the built area amounts to about 4.2 ha, the plant has an average output of 50'000 t/a and a lifespan of fifty years. The estimated infrastructure amount is therefore 4.00 E-10 units per kg of produced chemical.
  Since this process comprises 4 reactions to produce the final product, the default value was scaled up. To produce 1 kg of output, 2.77 kg of intermediate products are necessary. The value was therefore scaled up with the factor 3.77.
  References:
  Althaus H.-J., Chudacoff M., Hischier R., Jungbluth N., Osses M. and Primas A. (2007) Life Cycle Inventories of Chemicals. ecoinvent report No. 8, v2.0. EMPA Dübendorf, Swiss Centre for Life Cycle Inventories, Dübendorf, CH.
  Gendorf (2000) Umwelterklärung 2000, Werk Gendorf. Werk Gendorf, Burgkirchen.
- chloroform: 0.345888, 0.188736 kg (2 suppliers, which the file names only by identifier); sum of these 0.534625 kg; lognormal variance with pedigree 0.010025, pedigree (2,5,2,2,2)
  Calculated based on stoichiometry. See technology comment for the description of the reaction.
  properties: carbon content, fossil 0.101695, dry mass 1 kg, heating value, net 4.06 MJ, wet mass 1 kg
- compressed air, 1000 kPa gauge: 1.21161, 0.49303 m3 (2 suppliers, which the file names only by identifier); sum of these 1.70464 m3; lognormal variance with pedigree 0.05, pedigree (2,5,2,4,4)
  Calculated based on literature data published by the GENDORF Chemical Park. The factory produced an average of 2462760 tonnes of chemical substances (including intermediates) per year in the years 2015-2019. The average consumption of compressed air in the years 2015-2019 was 1113557454 m3 per year. This equals 0.45216 m3/kg chemical produced.
  Since this process comprises 4 reactions to produce the final product, the default value was scaled up. To produce 1 kg of output, 2.77 kg of intermediate products are necessary. The value was therefore scaled up with the factor 3.77.
  References:
  Chemiepark GENDORF, Umwelterklärung 2016, https://www.gendorf.de/Nachbarn/Umweltschutz/Industrie%20und%20Nachhaltigkeit
  Chemiepark GENDORF, Umwelterklärung 2017, https://www.gendorf.de/Nachbarn/Umweltschutz/Industrie%20und%20Nachhaltigkeit
  Chemiepark GENDORF, Umwelterklärung 2020, https://www.gendorf.de/Nachbarn/Umweltschutz/Industrie%20und%20Nachhaltigkeit
- electricity, medium voltage: 1.50446 kWh; lognormal variance with pedigree 0.05, pedigree (2,5,2,4,4)
  Calculated based on literature data published by the GENDORF Chemical Park. The factory produced an average of 2462760 tonnes of chemical substances (including intermediates) per year in the years 2015-2019. The average consumption of electricity in the years 2015-2019 was 982796751 kWh per year. This equals 0.39906 kWh/kg chemical produced.
  Since this process comprises 4 reactions to produce the final product, the default value was scaled up. To produce 1 kg of output, 2.77 kg of intermediate products are necessary. The value was therefore scaled up with the factor 3.77.
  References:
  Chemiepark GENDORF, Umwelterklärung 2016, https://www.gendorf.de/Nachbarn/Umweltschutz/Industrie%20und%20Nachhaltigkeit
  Chemiepark GENDORF, Umwelterklärung 2017, https://www.gendorf.de/Nachbarn/Umweltschutz/Industrie%20und%20Nachhaltigkeit
  Chemiepark GENDORF, Umwelterklärung 2020, https://www.gendorf.de/Nachbarn/Umweltschutz/Industrie%20und%20Nachhaltigkeit
- heat, district or industrial, natural gas: 7.1121 MJ; lognormal variance with pedigree 0.05, pedigree (2,5,2,4,4)
  Calculated based on literature data published by the GENDORF Chemical Park. The factory produced an average of 2462760 tonnes of chemical substances (including intermediates) per year in the years 2015-2019. The average consumption of natural gas in the years 2015-2019 was 4645920000 MJ per year. This equals 1.8865 MJ/kg chemical produced.
  Since this process comprises 4 reactions to produce the final product, the default value was scaled up. To produce 1 kg of output, 2.77 kg of intermediate products are necessary. The value was therefore scaled up with the factor 3.77.
  References:
  Chemiepark GENDORF, Umwelterklärung 2016, https://www.gendorf.de/Nachbarn/Umweltschutz/Industrie%20und%20Nachhaltigkeit
  Chemiepark GENDORF, Umwelterklärung 2017, https://www.gendorf.de/Nachbarn/Umweltschutz/Industrie%20und%20Nachhaltigkeit
  Chemiepark GENDORF, Umwelterklärung 2020, https://www.gendorf.de/Nachbarn/Umweltschutz/Industrie%20und%20Nachhaltigkeit
  properties: heating value, net 1 MJ
- heat, from steam, in chemical industry: 0.665985, 0.117421 MJ (2 suppliers, which the file names only by identifier); sum of these 0.783406 MJ; lognormal variance with pedigree 0.05, pedigree (2,5,2,4,4)
  Calculated based on literature data published by the GENDORF Chemical Park. The factory produced an average of 2462760 tonnes of chemical substances (including intermediates) per year in the years 2015-2019. The average consumption of steam (internal and external sources) in the years 2015-2019 was 511785800 MJ per year. This equals 0.2078 MJ/kg chemical produced.
  Since this process comprises 4 reactions to produce the final product, the default value was scaled up. To produce 1 kg of output, 2.77 kg of intermediate products are necessary. The value was therefore scaled up with the factor 3.77.
  References:
  Chemiepark GENDORF, Umwelterklärung 2016, https://www.gendorf.de/Nachbarn/Umweltschutz/Industrie%20und%20Nachhaltigkeit
  Chemiepark GENDORF, Umwelterklärung 2017, https://www.gendorf.de/Nachbarn/Umweltschutz/Industrie%20und%20Nachhaltigkeit
  Chemiepark GENDORF, Umwelterklärung 2020, https://www.gendorf.de/Nachbarn/Umweltschutz/Industrie%20und%20Nachhaltigkeit
  properties: heating value, net 1 MJ
- hydroxylamine: 0.110335, 0.0232425 kg (2 suppliers, which the file names only by identifier); sum of these 0.133577 kg; lognormal variance with pedigree 0.010025, pedigree (2,5,2,2,2)
  (same comment as for chloroform)
  properties: dry mass 1 kg, heating value, net 11.01 MJ, wet mass 1 kg
- nitrogen, liquid: 0.0438145, 0.0120268 kg (2 suppliers, which the file names only by identifier); sum of these 0.0558412 kg; lognormal variance with pedigree 0.05, pedigree (2,5,2,4,4)
  Calculated based on literature data published by the GENDORF Chemical Park. The factory produced an average of 2462760 tonnes of chemical substances (including intermediates) per year in the years 2015-2019. The average consumption of nitrogen, liquid in the years 2015-2019 was 29168033 m3 per year. This equals 0.014812 kg/kg chemical produced. The density to convert to kg was assumed to be 1.2506 kg/m3.
  Since this process comprises 4 reactions to produce the final product, the default value was scaled up. To produce 1 kg of output, 2.77 kg of intermediate products are necessary. The value was therefore scaled up with the factor 3.77.
  References:
  Chemiepark GENDORF, Umwelterklärung 2016, https://www.gendorf.de/Nachbarn/Umweltschutz/Industrie%20und%20Nachhaltigkeit
  Chemiepark GENDORF, Umwelterklärung 2017, https://www.gendorf.de/Nachbarn/Umweltschutz/Industrie%20und%20Nachhaltigkeit
  Chemiepark GENDORF, Umwelterklärung 2020, https://www.gendorf.de/Nachbarn/Umweltschutz/Industrie%20und%20Nachhaltigkeit
  properties: dry mass 1 kg, wet mass 1 kg
- phenol: 0.102132, 0.318747 kg (2 suppliers, which the file names only by identifier); sum of these 0.420879 kg; lognormal variance with pedigree 0.010025, pedigree (2,5,2,2,2)
  (same comment as for chloroform)
  properties: carbon content, fossil 0.765957, dry mass 1 kg, heating value, net 30.93 MJ, wet mass 1 kg
- potassium hydroxide: 0.250908 kg; lognormal variance with pedigree 0.010025, pedigree (2,5,2,2,2)
  (same comment as for chloroform)
  properties: dry mass 0.856 kg, water content 0.168224, wet mass 1 kg
- sodium hydroxide, without water, in 50% solution state: 0.030083, 0.308075 kg (2 suppliers, which the file names only by identifier); sum of these 0.338158 kg; lognormal variance with pedigree 0.01, pedigree (2,5,2,1,2)
  Sodium hydroxide was added to neutralise the formed acid. Calculated based on stoichiometry. See technology comment for the description of the reaction.
  properties: dry mass 1 kg, heating value, net 3.03 MJ, wet mass 1 kg
- tap water: 0.084825 kg; lognormal variance with pedigree 0.05, pedigree (2,5,2,4,4)
  Calculated based on literature data published by the GENDORF Chemical Park. The factory produced an average of 2462760 tonnes of chemical substances (including intermediates) per year in the years 2015-2019. The average consumption of tap water in the years 2015-2019 was 55352 t per year. This equals 0.0225 kg/kg chemical produced.
  Since this process comprises 4 reactions to produce the final product, the default value was scaled up. To produce 1 kg of output, 2.77 kg of intermediate products are necessary. The value was therefore scaled up with the factor 3.77.
  References:
  Chemiepark GENDORF, Umwelterklärung 2016, https://www.gendorf.de/Nachbarn/Umweltschutz/Industrie%20und%20Nachhaltigkeit
  Chemiepark GENDORF, Umwelterklärung 2017, https://www.gendorf.de/Nachbarn/Umweltschutz/Industrie%20und%20Nachhaltigkeit
  Chemiepark GENDORF, Umwelterklärung 2020, https://www.gendorf.de/Nachbarn/Umweltschutz/Industrie%20und%20Nachhaltigkeit
  properties: carbon content, fossil 0.00178991, dry mass 0.000337476 kg, water content 2962.17, wet mass 1 kg
  note on carbon content, fossil: Bicarbonate content is 2.93 mol/m3. CO2 content is 0.1 mol/m3 (ecoinvent v2.2 report 8, Tab 93.1).
- wastewater, average: -4.13128e-8, -6.87463e-6, -1.64387e-6, -2.44763e-8 m3 (4 suppliers, which the file names only by identifier); sum of these -8.58429e-6 m3; lognormal variance with pedigree 0.0498, pedigree (2,5,1,4,4)
  Calculated based on literature data published by the GENDORF Chemical Park. The factory produced an average of 2462760 tonnes of chemical substances (including intermediates) per year in the years 2015-2019. The average ouput of wastewater going to an external wastewater treatment plant in the years 2015-2019 was 5608 m3 per year. This equals 0.000002277 m3/kg chemical produced.
  Since this process comprises 4 reactions to produce the final product, the default value was scaled up. To produce 1 kg of output, 2.77 kg of intermediate products are necessary. The value was therefore scaled up with the factor 3.77.
  References:
  Chemiepark GENDORF, Umwelterklärung 2016, https://www.gendorf.de/Nachbarn/Umweltschutz/Industrie%20und%20Nachhaltigkeit
  Chemiepark GENDORF, Umwelterklärung 2017, https://www.gendorf.de/Nachbarn/Umweltschutz/Industrie%20und%20Nachhaltigkeit
  Chemiepark GENDORF, Umwelterklärung 2020, https://www.gendorf.de/Nachbarn/Umweltschutz/Industrie%20und%20Nachhaltigkeit
  production volume; name PV_wastewater; = (BP_wastewater* PV_RP/RP)
    Calculated from the production volume of the reference product in proportion to the respective output amounts.
  properties: carbon content, non-fossil 0.194039, dry mass 0.346837 kg, water content 2882.2, wet mass 1000 kg
  note on carbon content, non-fossil: 0.0673 kg TOC/m3 (Tab A.17, ecoinvent v2.2 report 13_I). TOC was considered as Total Carbon.

## Inputs from nature
- Bromine [natural resource, in water]: 1.36068 kg; lognormal variance with pedigree 0.010025, pedigree (2,5,2,2,2)
  (same comment as for chloroform)
- Water, cooling, unspecified natural origin [natural resource, in water]: 0.0554454 m3; lognormal variance with pedigree 0.05, pedigree (2,5,2,4,4)
  Calculated based on literature data published by the GENDORF Chemical Park. The factory produced an average of 2462760 tonnes of chemical substances (including intermediates) per year in the years 2015-2019. The average amount of cooling water released in the years 2015-2019 was 34408800 t per year. It was assumed that 5% of the cooling water was emitted to air during its use, therefore, to calculate the input of cooling water, the output value reported by GENDORF was scaled up by the factor 1/0.95. This equals 0.014707 m3/kg chemical produced.
  Since this process comprises 4 reactions to produce the final product, the default value was scaled up. To produce 1 kg of output, 2.77 kg of intermediate products are necessary. The value was therefore scaled up with the factor 3.77.
  References:
  Chemiepark GENDORF, Umwelterklärung 2016, https://www.gendorf.de/Nachbarn/Umweltschutz/Industrie%20und%20Nachhaltigkeit
  Chemiepark GENDORF, Umwelterklärung 2017, https://www.gendorf.de/Nachbarn/Umweltschutz/Industrie%20und%20Nachhaltigkeit
  Chemiepark GENDORF, Umwelterklärung 2020, https://www.gendorf.de/Nachbarn/Umweltschutz/Industrie%20und%20Nachhaltigkeit
- Water, river [natural resource, in water]: 0.00363967 m3; lognormal variance with pedigree 0.05, pedigree (2,5,2,4,4)
  Calculated based on literature data published by the GENDORF Chemical Park. The factory produced an average of 2462760 tonnes of chemical substances (including intermediates) per year in the years 2015-2019. The average consumption of river water in the years 2015-2019 was 22000820 t per year. However, since the cooling water is modelled as an input, the amount of river water was adjusted to avoid double counting. 55% of the input amount of cooling water was deducted from the amount of river water, as that is the share of river water versus well water. This equals 0.00096543 m3/kg chemical produced.
  Since this process comprises 4 reactions to produce the final product, the default value was scaled up. To produce 1 kg of output, 2.77 kg of intermediate products are necessary. The value was therefore scaled up with the factor 3.77.
  References:
  Chemiepark GENDORF, Umwelterklärung 2016, https://www.gendorf.de/Nachbarn/Umweltschutz/Industrie%20und%20Nachhaltigkeit
  Chemiepark GENDORF, Umwelterklärung 2017, https://www.gendorf.de/Nachbarn/Umweltschutz/Industrie%20und%20Nachhaltigkeit
  Chemiepark GENDORF, Umwelterklärung 2020, https://www.gendorf.de/Nachbarn/Umweltschutz/Industrie%20und%20Nachhaltigkeit
- Water, well, in ground [natural resource, in water]: 0.00307828 m3; lognormal variance with pedigree 0.05, pedigree (2,5,2,4,4)
  Calculated based on literature data published by the GENDORF Chemical Park. The factory produced an average of 2462760 tonnes of chemical substances (including intermediates) per year in the years 2015-2019. The average consumption of well water in the years 2015-2019 was 18607480 t per year. However, since the cooling water is modelled as an input, the amount of well water was adjusted to avoid double counting. 45% of the input amount of cooling water was deducted from the amount of well water, as that is the share of well water versus river water. This equals 0.00081652 m3/kg chemical produced.
  Since this process comprises 4 reactions to produce the final product, the default value was scaled up. To produce 1 kg of output, 2.77 kg of intermediate products are necessary. The value was therefore scaled up with the factor 3.77.
  References:
  Chemiepark GENDORF, Umwelterklärung 2016, https://www.gendorf.de/Nachbarn/Umweltschutz/Industrie%20und%20Nachhaltigkeit
  Chemiepark GENDORF, Umwelterklärung 2017, https://www.gendorf.de/Nachbarn/Umweltschutz/Industrie%20und%20Nachhaltigkeit
  Chemiepark GENDORF, Umwelterklärung 2020, https://www.gendorf.de/Nachbarn/Umweltschutz/Industrie%20und%20Nachhaltigkeit

## Emissions to nature
- Bromine [air, unspecified]: 0.0027991 kg; lognormal variance with pedigree 0.049425, pedigree (2,5,2,2,2)
  Calculated losses, based on the boiling point of a chemical, to water or to air. In addition, unreacted chemicals are assumed to go to wastewater treatment, which has a conversion rate in biological treatment of 95% of carbon into carbon dioxide. The remaining 5% are released as emissions to water.
- Carbon dioxide, fossil [air, unspecified]: 0.265727 kg; lognormal variance with pedigree 0.010025, pedigree (2,5,2,2,2)
  Calculated based on the carbon content of unreacted chemical substances. The unreacted chemicals are assumed to go to wastewater treatment, which has a conversion rate in biological treatment of 95% of carbon into carbon dioxide. The remaining 5% are released as emissions to water, unspecified.
- Hydrochloric acid [air, unspecified]: 0.0012193 kg; lognormal variance with pedigree 0.049425, pedigree (2,5,2,2,2)
  (same comment as for Bromine)
- Nitrogen [air, unspecified]: 0.0558412 kg; lognormal variance with pedigree 0.0894, pedigree (2,5,2,4,4)
  Calculated value. The amount of nitrogen released to air is equal to the amount of nitrogen entering the activity.
  Since this process comprises 4 reactions to produce the final product, the default value was scaled up. To produce 1 kg of output, 2.77 kg of intermediate products are necessary. The value was therefore scaled up with the factor 3.77.
- Water [air, unspecified]: 0.0055419 m3; lognormal variance with pedigree 0.0894, pedigree (2,5,2,4,4)
  Calculated based on literature data published by the GENDORF Chemical Park. The factory produced an average of 2462760 tonnes of chemical substances (including intermediates) per year in the years 2015-2019. To determine the emissions of water to air, the difference of all water inputs (from river, well, tap water and cooling) and outputs (wastewater, emissions to water) was calculated. The average ouput of water to air in the years 2015-2019 was 3620444 m3 per year. This equals 0.00147 m3/kg chemical produced. For more information on the other water exchanges please consult the respective exchange comment.
  Since this process comprises 4 reactions to produce the final product, the default value was scaled up. To produce 1 kg of output, 2.77 kg of intermediate products are necessary. The value was therefore scaled up with the factor 3.77.
  References:
  Chemiepark GENDORF, Umwelterklärung 2016, https://www.gendorf.de/Nachbarn/Umweltschutz/Industrie%20und%20Nachhaltigkeit
  Chemiepark GENDORF, Umwelterklärung 2017, https://www.gendorf.de/Nachbarn/Umweltschutz/Industrie%20und%20Nachhaltigkeit
  Chemiepark GENDORF, Umwelterklärung 2020, https://www.gendorf.de/Nachbarn/Umweltschutz/Industrie%20und%20Nachhaltigkeit
- BOD5, Biological Oxygen Demand [water, unspecified]: 0.0108677 kg; lognormal variance with pedigree 0.049425, pedigree (2,5,2,2,2)
  Calculated value. The BOD, COD, TOC and BOD5 are calculated based on the amount and type of emissions released to water in the same activity.
- Bromide [water, surface water]: 0.320891 kg; lognormal variance with pedigree 0.049425, pedigree (2,5,2,2,2)
  (same comment as for Bromine)
- COD, Chemical Oxygen Demand [water, unspecified]: 0.0108677 kg; lognormal variance with pedigree 0.049425, pedigree (2,5,2,2,2)
  (same comment as for BOD5, Biological Oxygen Demand)
- Chloride [water, surface water]: 0.449571 kg; lognormal variance with pedigree 0.049425, pedigree (2,5,2,2,2)
  Calculated losses, based on the boiling point of a chemical, to water or to air. In addition, unreacted chemicals are assumed to go to wastewater treatment, which has a conversion rate in biological treatment of 95% of carbon into carbon dioxide. The remaining 5% are released as emissions to water.
  This value includes as well emissions from acid neutralisation.
- DOC, Dissolved Organic Carbon [water, unspecified]: 0.00381341 kg; lognormal variance with pedigree 0.049425, pedigree (2,5,2,2,2)
  (same comment as for BOD5, Biological Oxygen Demand)
- Potassium I [water, surface water]: 0.165244 kg; lognormal variance with pedigree 0.049425, pedigree (2,5,2,2,2)
  (same comment as for Bromine)
- Sodium I [water, surface water]: 0.194369 kg; lognormal variance with pedigree 0.049425, pedigree (2,5,2,2,2)
  Emissions from acid neutralisation.
- TOC, Total Organic Carbon [water, unspecified]: 0.00381341 kg; lognormal variance with pedigree 0.049425, pedigree (2,5,2,2,2)
  (same comment as for BOD5, Biological Oxygen Demand)
- Water [water, unspecified]: 0.0569871 m3; lognormal variance with pedigree 0.0894, pedigree (2,5,2,4,4)
  Calculated based on literature data published by the GENDORF Chemical Park. The factory produced an average of 2462760 tonnes of chemical substances (including intermediates) per year in the years 2015-2019. The amount of water released back to the environment consists of the sum of the amount of process water treated in the internal WWTP that is then released back to the environment and the amount of cooling water released back to the environment. The average ouput of the internal WWTP in the years 2015-2019 was 2628800 m3 and that of cooling water released back to the environment was 34408800 m3. This gives a yearly average of 37037600 m3 emissions of water to water. This equals 0.01504 m3/kg chemical produced.
  Since this process comprises 4 reactions to produce the final product, the default value was scaled up. To produce 1 kg of output, 2.77 kg of intermediate products are necessary. The value was therefore scaled up with the factor 3.77.
  This value includes emissons of water which is formed in the process.
  This value includes as well emissions from acid neutralisation.
  References:
  Chemiepark GENDORF, Umwelterklärung 2016, https://www.gendorf.de/Nachbarn/Umweltschutz/Industrie%20und%20Nachhaltigkeit
  Chemiepark GENDORF, Umwelterklärung 2017, https://www.gendorf.de/Nachbarn/Umweltschutz/Industrie%20und%20Nachhaltigkeit
  Chemiepark GENDORF, Umwelterklärung 2020, https://www.gendorf.de/Nachbarn/Umweltschutz/Industrie%20und%20Nachhaltigkeit

## Sampling procedure
Literature data and stoichiometric calculation. This inventory is partially based on a generic model of the production of chemicals. The data generated by this model have been improved with compound-specific data when available.
The model of the production of chemicals is using specific industry or literature data wherever possible and more generic data on chemical production processes to fill compound-specific data gaps when necessary. The basic principles of the model have been published in literature (Hischier, 2005). The model has been updated and extended with newly available data from the chemical industry.
In the model, unreacted fractions are treated in a waste treatment process, and emissions reported are after a waste treatment process that is included in the scope of this dataset. For volatile reactants, a small level of evaporation is assumed. Solvents and catalysts are mostly recycled in closed-loop systems within the scope of the dataset and reported flows are for losses from this system.
The main source of information for the values for heat, electricity, water (process and cooling), nitrogen, chemical factory is industry data from the GENDORF Chemical Park. The values are a 5-year average of data from 2015 to 2019 published by the GENDORF Chemical Park, which is based in Germany and produced an average of 2462760 tonnes of chemical substances in the years 2015-2019.

Reference(s):
Hischier, R. (2005) Establishing Life Cycle Inventories of Chemicals Based on Differing Data Availability (9 pp). The International Journal of Life Cycle Assessment, Volume 10, Issue 1, pp 59–67. 10.1065/lca2004.10.181.7
Chemiepark GENDORF, Umwelterklärung 2016, https://www.gendorf.de/Nachbarn/Umweltschutz/Industrie%20und%20Nachhaltigkeit
Chemiepark GENDORF, Umwelterklärung 2017, https://www.gendorf.de/Nachbarn/Umweltschutz/Industrie%20und%20Nachhaltigkeit
Chemiepark GENDORF, Umwelterklärung 2020, https://www.gendorf.de/Nachbarn/Umweltschutz/Industrie%20und%20Nachhaltigkeit
Unger T., (1996). Pesticide Synthesis Handbook, Noyes Publication.
Appleby A.P., Muller F., Carpy, S., (2011): Weed Control, in Ullmanns Encyclopedia of Industrial Chemistry, Weinheim, Wiley-VCH.
