# treatment of residues, MSWI-WWT, WW, average, residual material landfill

Dataset: EcoSpold 2, unit process
Geography: RoW
Time period: 1994-01-01 to 2023-12-31
Technology level: current
Classification: ISIC rev.4 ecoinvent: 3822:Treatment and disposal of hazardous waste
Scenario: Business-as-Usual
System model: Allocation, cut-off by classification
Generated by: Nikolia Stoikou
Database: ecoinvent
isCopyrightProtected: true
accessRestrictedTo: 1

## General comment
The process represents the treatment of a waste (residues) that is exclusively produced from another waste treatment. Residues are generated in the municipal solid waste incineration (MSWI) of sewage sludge (with 70% water) that in turn is generated from wastewater treatment (WWT) of 'wastewater, average'. Recommended use of this dataset: to be used within the specific chain of treatments for 'wastewater, average'. Share of biogenic carbon in the sludge: 97.491%.

## Included activities start
The activity starts with the waste being available at the gate of the treatment facility. Collection and transportation of the waste to the treatment plant is not included.

## Included activities end
The activity ends with the waste being treated and waste-specific emissions from the landfarming process are released to the environment (air, water and soil). The activity is considering local fate of emissions and the initial specific wastewater composition (generating the sewage sludge).

## Geography
Modelling parameters affecting the treatment technology are not specific to this geography.

## Technology
Residual material landfill for polluted, inorganic waste with base seal and leachate collection system. Recultivation after closure.

## Reference product
- residues, MSWI-WWT, WW, average: -1 kg; By-product classification Waste; CPC 39320: Ash and residue (except from the manufacture of iron or steel), containing metals or metallic compounds, excep[…]; HS2017 262110: Slag and ash; ash and residues from the incineration of municipal waste
  production volume 3.52855e7 kg
    Calculated in proportion to incinerated waste reference product. The production volume is accounting as well regional specific losses (wastewater not sewered) for this geography
  properties: aluminium content 0.000137623, antimony content 8.35933e-5, arsenic content 4.94764e-5, barium content 0.00365943, beryllium content 6.25625e-7, boron content 8.37484e-5, cadmium content 3.52679e-5, calcium content 0.329091, carbon allocation 0.0160134 kg, carbon content 0.0160134, carbon content, fossil 0.000401704, carbon content, non-fossil 0.0156117, chromium content 0.000470302, cobalt content 4.12499e-5, copper content 0.00088014, dry mass 1 kg, iron content 0.024453, lead content 0.000494219, magnesium content 0.0122935, manganese content 0.00329628, mercury content 8.0802e-6, molybdenum content 4.61257e-5, nickel content 2.30035e-5, nitrogen content 7.31763e-5, oxygen content 0.371581, phosphorus content 0.0732765, potassium content 0.0587919, price 0 EUR2005, scandium content 6.23489e-8, selenium content 7.81395e-5, silicon content 0.00778948, silver content 9.85055e-5, sodium content 0.0452176, strontium content 7.32748e-6, sulfur content 0.0366748, thallium content 3.84398e-6, tin content 0.000364633, titanium content 0.0007745, tungsten content 1.00441e-5, vanadium content 0.00037483, water content 0, water in wet mass 0 kg, wet mass 1 kg, zinc content 0.0137237

## Inputs from technosphere
- cement, unspecified: 0.000494757, 0.00906934, 0.000234332, 0.00552688, 0.0344431, 0.00108113, 0.000790256, 0.000428297, 0.000851241, 0.0013014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 kg (11 suppliers, which the file names only by identifier); sum of these 0.4 kg; lognormal variance with pedigree 0.049084, pedigree (1,1,5,1,1)
  cement required for solidification of landfilled residual material
  Uncertainty: Uncertainty calculated from uncertainty of composition of incinerated waste, and incinerator model uncertainty and residual material landfill transfer coefficient uncertainty.
  properties: dry mass 1 kg, wet mass 1 kg
- process-specific burdens, residual material landfill: 0.988302, 0.0116981 kg (2 suppliers, which the file names only by identifier); sum of these 1 kg
  mass-specific expenditures required for landfilling of residual material
- residual material landfill: 2.0833e-9 unit
  residual material landfill infrastructure required for landfilling of residual material
- waste cement, hydrated: -4.82186e-5, -0.999952 kg (2 suppliers, which the file names only by identifier); sum of these -1 kg; lognormal variance with pedigree 0.5224, pedigree (5,5,5,5,5)
  hydrated cement output for solidification of landfilled residual material
  Uncertainty: Uncertainty calculated from uncertainty of composition of incinerated waste, and incinerator model uncertainty and residual material landfill transfer coefficient uncertainty.
  production volume
    Calculated from the production volume of the reference product in proportion to the respective output amounts.
  properties: dry mass 1 kg, wet mass 1 kg

## Inputs from nature
- Organic carbon, placed in landfill [inventory indicator, waste]: 0.016013 kg; lognormal variance with pedigree 0.099887, pedigree (1,1,5,1,1)
  Mass of organic carbon in waste (without inorganic carbon), initially put in residual material landfill. The exchange represents a flow that is within the technosphere. This exchange should only be used to apply ecofactors for the Swiss LCIA method of Ecological Scarcity and not any other purpose.
  Uncertainty: Uncertainty calculated from uncertainty of composition of incinerated waste, and incinerator model uncertainty and residual material landfill transfer coefficient uncertainty.
- Waste mass, total, placed in landfill [inventory indicator, waste]: 1 kg
  Mass of waste initially put in a residual material landfill. The exchange represents a flow that is within the technosphere. This exchange should only be used to apply ecofactors for the Swiss LCIA method of Ecological Scarcity and not any other purpose.

## Emissions to nature
- Hazardous waste disposed [inventory indicator, waste]: 1 kg
  Inventory indicator for waste mass disposed. To be used in EN15804 "other data" results.
- Aluminium III [water, ground-, long-term]: 4.0854e-5 kg; lognormal variance with pedigree 0.58046, pedigree (1,1,5,1,1)
  complement of long-term emissions from residual material in residual material landfill
  Uncertainty: Uncertainty calculated from uncertainty of composition of incinerated waste, and incinerator model uncertainty and residual material landfill transfer coefficient uncertainty.
- Aluminium III [water, surface water]: 6.8203e-8 kg; lognormal variance with pedigree 0.95616, pedigree (1,1,5,1,1)
  short-term emissions from residual material in residual material landfill
  Uncertainty: Uncertainty calculated from uncertainty of composition of incinerated waste, and incinerator model uncertainty and residual material landfill transfer coefficient uncertainty.
- Antimony ion [water, ground-, long-term]: 5.4113e-5 kg; lognormal variance with pedigree 0.4414, pedigree (1,1,5,1,1)
  (same comment as for Aluminium III)
- Antimony ion [water, surface water]: 2.948e-5 kg; lognormal variance with pedigree 0.46555, pedigree (1,1,5,1,1)
  (same comment as for Aluminium III)
- Arsenic ion [water, ground-, long-term]: 4.9476e-14 kg; lognormal variance with pedigree 0.47438, pedigree (1,1,5,1,1)
  (same comment as for Aluminium III)
- Arsenic ion [water, surface water]: 4.9476e-5 kg; lognormal variance with pedigree 0.45074, pedigree (1,1,5,1,1)
  (same comment as for Aluminium III)
- BOD5, Biological Oxygen Demand [water, ground-, long-term]: 0.0085545 kg; lognormal variance with pedigree 0.14749, pedigree (1,1,5,1,1)
  (same comment as for Aluminium III)
- BOD5, Biological Oxygen Demand [water, surface water]: 1.4281e-5 kg; lognormal variance with pedigree 0.7429, pedigree (1,1,5,1,1)
  (same comment as for Aluminium III)
- Barium II [water, ground-, long-term]: 3.0228e-5 kg; lognormal variance with pedigree 5.9049, pedigree (1,1,5,1,1)
  (same comment as for Aluminium III)
- Barium II [water, surface water]: 5.0464e-8 kg; lognormal variance with pedigree 1.3713, pedigree (1,1,5,1,1)
  (same comment as for Aluminium III)
- Beryllium II [water, ground-, long-term]: 2.265e-7 kg; lognormal variance with pedigree 0.88076, pedigree (1,1,5,1,1)
  (same comment as for Aluminium III)
- Beryllium II [water, surface water]: 3.7813e-10 kg; lognormal variance with pedigree 1.3412, pedigree (1,1,5,1,1)
  (same comment as for Aluminium III)
- Boron [water, ground-, long-term]: 8.2345e-5 kg; lognormal variance with pedigree 0.16057, pedigree (1,1,5,1,1)
  (same comment as for Aluminium III)
- Boron [water, surface water]: 6.5618e-7 kg; lognormal variance with pedigree 0.55422, pedigree (1,1,5,1,1)
  (same comment as for Aluminium III)
- COD, Chemical Oxygen Demand [water, ground-, long-term]: 0.026153 kg; lognormal variance with pedigree 0.14749, pedigree (1,1,5,1,1)
  (same comment as for Aluminium III)
- COD, Chemical Oxygen Demand [water, surface water]: 4.3661e-5 kg; lognormal variance with pedigree 0.7429, pedigree (1,1,5,1,1)
  (same comment as for Aluminium III)
- Cadmium II [water, ground-, long-term]: 2.3943e-7 kg; lognormal variance with pedigree 6.8339, pedigree (1,1,5,1,1)
  (same comment as for Aluminium III)
- Cadmium II [water, surface water]: 3.9972e-10 kg; lognormal variance with pedigree 1.8461, pedigree (1,1,5,1,1)
  (same comment as for Aluminium III)
- Calcium II [water, ground-, long-term]: 0.029736 kg; lognormal variance with pedigree 1.524, pedigree (1,1,5,1,1)
  (same comment as for Aluminium III)
- Calcium II [water, surface water]: 4.9643e-5 kg; lognormal variance with pedigree 0.98044, pedigree (1,1,5,1,1)
  (same comment as for Aluminium III)
- Chromium VI [water, ground-, long-term]: 8.9304e-5 kg; lognormal variance with pedigree 0.31078, pedigree (1,1,5,1,1)
  (same comment as for Aluminium III)
- Chromium VI [water, surface water]: 2.8271e-5 kg; lognormal variance with pedigree 0.47184, pedigree (1,1,5,1,1)
  (same comment as for Aluminium III)
- Cobalt II [water, ground-, long-term]: 7.0522e-6 kg; lognormal variance with pedigree 1.0841, pedigree (1,1,5,1,1)
  (same comment as for Aluminium III)
- Cobalt II [water, surface water]: 1.1773e-8 kg; lognormal variance with pedigree 1.1211, pedigree (1,1,5,1,1)
  (same comment as for Aluminium III)
- Copper ion [water, ground-, long-term]: 3.3881e-5 kg; lognormal variance with pedigree 2.8859, pedigree (1,1,5,1,1)
  (same comment as for Aluminium III)
- Copper ion [water, surface water]: 5.6562e-8 kg; lognormal variance with pedigree 1.2476, pedigree (1,1,5,1,1)
  (same comment as for Aluminium III)
- DOC, Dissolved Organic Carbon [water, ground-, long-term]: 0.010349 kg; lognormal variance with pedigree 0.14749, pedigree (1,1,5,1,1)
  (same comment as for Aluminium III)
- DOC, Dissolved Organic Carbon [water, surface water]: 1.7277e-5 kg; lognormal variance with pedigree 0.7429, pedigree (1,1,5,1,1)
  (same comment as for Aluminium III)
- Iron ion [water, ground-, long-term]: 0.00012256 kg; lognormal variance with pedigree 7.1618, pedigree (1,1,5,1,1)
  (same comment as for Aluminium III)
- Iron ion [water, surface water]: 2.046e-7 kg; lognormal variance with pedigree 1.4334, pedigree (1,1,5,1,1)
  (same comment as for Aluminium III)
- Lead II [water, ground-, long-term]: 2.5636e-6 kg; lognormal variance with pedigree 7.2585, pedigree (1,1,5,1,1)
  (same comment as for Aluminium III)
- Lead II [water, surface water]: 4.2797e-9 kg; lognormal variance with pedigree 1.6162, pedigree (1,1,5,1,1)
  (same comment as for Aluminium III)
- Magnesium [water, ground-, long-term]: 0.0013968 kg; lognormal variance with pedigree 1.2737, pedigree (1,1,5,1,1)
  (same comment as for Aluminium III)
- Magnesium [water, surface water]: 2.3319e-6 kg; lognormal variance with pedigree 0.96204, pedigree (1,1,5,1,1)
  (same comment as for Aluminium III)
- Manganese II [water, ground-, long-term]: 2.7228e-5 kg; lognormal variance with pedigree 5.9504, pedigree (1,1,5,1,1)
  (same comment as for Aluminium III)
- Manganese II [water, surface water]: 4.5456e-8 kg; lognormal variance with pedigree 1.4168, pedigree (1,1,5,1,1)
  (same comment as for Aluminium III)
- Mercury II [water, ground-, long-term]: 3.814e-7 kg; lognormal variance with pedigree 2.8234, pedigree (1,1,5,1,1)
  (same comment as for Aluminium III)
- Mercury II [water, surface water]: 6.3673e-10 kg; lognormal variance with pedigree 1.4798, pedigree (1,1,5,1,1)
  (same comment as for Aluminium III)
- Molybdenum VI [water, ground-, long-term]: 2.1177e-7 kg; lognormal variance with pedigree 0.3411, pedigree (1,1,5,1,1)
  (same comment as for Aluminium III)
- Molybdenum VI [water, surface water]: 4.5914e-5 kg; lognormal variance with pedigree 0.31761, pedigree (1,1,5,1,1)
  (same comment as for Aluminium III)
- Nickel II [water, ground-, long-term]: 8.3281e-6 kg; lognormal variance with pedigree 0.4783, pedigree (1,1,5,1,1)
  (same comment as for Aluminium III)
- Nickel II [water, surface water]: 1.3903e-8 kg; lognormal variance with pedigree 0.93871, pedigree (1,1,5,1,1)
  (same comment as for Aluminium III)
- Nitrate [water, ground-, long-term]: 0.00026287 kg; lognormal variance with pedigree 0.17744, pedigree (1,1,5,1,1)
  (same comment as for Aluminium III)
- Nitrate [water, surface water]: 6.1194e-5 kg; lognormal variance with pedigree 0.24423, pedigree (1,1,5,1,1)
  (same comment as for Aluminium III)
- Phosphate [water, ground-, long-term]: 0.050195 kg; lognormal variance with pedigree 0.66101, pedigree (1,1,5,1,1)
  (same comment as for Aluminium III)
- Phosphate [water, surface water]: 8.3799e-5 kg; lognormal variance with pedigree 0.88155, pedigree (1,1,5,1,1)
  (same comment as for Aluminium III)
- Potassium I [water, ground-, long-term]: 0.042219 kg; lognormal variance with pedigree 0.103088, pedigree (1,1,5,1,1)
  (same comment as for Aluminium III)
- Potassium I [water, surface water]: 0.016573 kg; lognormal variance with pedigree 0.14139, pedigree (1,1,5,1,1)
  (same comment as for Aluminium III)
- Scandium [water, ground-, long-term]: 5.355e-8 kg; lognormal variance with pedigree 0.45583, pedigree (1,1,5,1,1)
  (same comment as for Aluminium III)
- Scandium [water, surface water]: 8.7992e-9 kg; lognormal variance with pedigree 0.5457, pedigree (1,1,5,1,1)
  (same comment as for Aluminium III)
- Selenium IV [water, ground-, long-term]: 5.0583e-5 kg; lognormal variance with pedigree 0.35597, pedigree (1,1,5,1,1)
  (same comment as for Aluminium III)
- Selenium IV [water, surface water]: 2.7557e-5 kg; lognormal variance with pedigree 0.38012, pedigree (1,1,5,1,1)
  (same comment as for Aluminium III)
- Silicon [water, ground-, long-term]: 0.007772 kg; lognormal variance with pedigree 0.10275, pedigree (1,1,5,1,1)
  (same comment as for Aluminium III)
- Silicon [water, surface water]: 1.7518e-5 kg; lognormal variance with pedigree 0.65146, pedigree (1,1,5,1,1)
  (same comment as for Aluminium III)
- Silver I [water, ground-, long-term]: 3.7919e-6 kg; lognormal variance with pedigree 3.0816, pedigree (1,1,5,1,1)
  (same comment as for Aluminium III)
- Silver I [water, surface water]: 6.3304e-9 kg; lognormal variance with pedigree 1.4433, pedigree (1,1,5,1,1)
  (same comment as for Aluminium III)
- Sodium I [water, ground-, long-term]: 0.028248 kg; lognormal variance with pedigree 0.088282, pedigree (1,1,5,1,1)
  (same comment as for Aluminium III)
- Sodium I [water, surface water]: 0.016969 kg; lognormal variance with pedigree 0.108739, pedigree (1,1,5,1,1)
  (same comment as for Aluminium III)
- Strontium II [water, ground-, long-term]: 2.6528e-6 kg; lognormal variance with pedigree 0.45829, pedigree (1,1,5,1,1)
  (same comment as for Aluminium III)
- Strontium II [water, surface water]: 4.4288e-9 kg; lognormal variance with pedigree 0.9187, pedigree (1,1,5,1,1)
  (same comment as for Aluminium III)
- Sulfate [water, ground-, long-term]: 0.09822 kg; lognormal variance with pedigree 0.099397, pedigree (1,1,5,1,1)
  (same comment as for Aluminium III)
- Sulfate [water, surface water]: 0.011804 kg; lognormal variance with pedigree 0.21266, pedigree (1,1,5,1,1)
  (same comment as for Aluminium III)
- TOC, Total Organic Carbon [water, ground-, long-term]: 0.010349 kg; lognormal variance with pedigree 0.14749, pedigree (1,1,5,1,1)
  (same comment as for Aluminium III)
- TOC, Total Organic Carbon [water, surface water]: 1.7277e-5 kg; lognormal variance with pedigree 0.7429, pedigree (1,1,5,1,1)
  (same comment as for Aluminium III)
- Thallium I [water, ground-, long-term]: 1.3917e-6 kg; lognormal variance with pedigree 1.0617, pedigree (1,1,5,1,1)
  (same comment as for Aluminium III)
- Thallium I [water, surface water]: 2.3233e-9 kg; lognormal variance with pedigree 1.5221, pedigree (1,1,5,1,1)
  (same comment as for Aluminium III)
- Tin ion [water, ground-, long-term]: 6.9095e-6 kg; lognormal variance with pedigree 4.2837, pedigree (1,1,5,1,1)
  (same comment as for Aluminium III)
- Tin ion [water, surface water]: 1.1535e-8 kg; lognormal variance with pedigree 1.4593, pedigree (1,1,5,1,1)
  (same comment as for Aluminium III)
- Titanium ion [water, ground-, long-term]: 0.00022991 kg; lognormal variance with pedigree 0.54134, pedigree (1,1,5,1,1)
  (same comment as for Aluminium III)
- Titanium ion [water, surface water]: 3.8383e-7 kg; lognormal variance with pedigree 0.91703, pedigree (1,1,5,1,1)
  (same comment as for Aluminium III)
- Tungsten [water, ground-, long-term]: 6.5019e-6 kg; lognormal variance with pedigree 0.58347, pedigree (1,1,5,1,1)
  (same comment as for Aluminium III)
- Tungsten [water, surface water]: 3.5421e-6 kg; lognormal variance with pedigree 0.60762, pedigree (1,1,5,1,1)
  (same comment as for Aluminium III)
- Vanadium V [water, ground-, long-term]: 0.0002881 kg; lognormal variance with pedigree 0.28175, pedigree (1,1,5,1,1)
  (same comment as for Aluminium III)
- Vanadium V [water, surface water]: 9.1991e-7 kg; lognormal variance with pedigree 0.80213, pedigree (1,1,5,1,1)
  (same comment as for Aluminium III)
- Zinc II [water, ground-, long-term]: 0.0001682 kg; lognormal variance with pedigree 5.0426, pedigree (1,1,5,1,1)
  (same comment as for Aluminium III)
- Zinc II [water, surface water]: 2.808e-7 kg; lognormal variance with pedigree 1.3643, pedigree (1,1,5,1,1)
  (same comment as for Aluminium III)

## Extrapolations
Modelling parameters are based on an average residual material landfill in Switzerland.
