# 4-methyl-2-pentanone production

Dataset: EcoSpold 2, unit process
Geography: RoW
Time period: 1998-01-01 to 2023-12-31
Technology level: current
Classification: ISIC rev.4 ecoinvent: 2011:Manufacture of basic chemicals
Classification: EcoSpold01Categories: chemicals/organics
Synonyms: methyl isobutyl ketone
Tags: ConvertedDataset
Scenario: Business-as-Usual
System model: Allocation, cut-off by classification
Share of production covered: 100 %
Generated by: Jürgen Sutter
Published in: Sutter, J. 2007
Database: ecoinvent
isCopyrightProtected: true
accessRestrictedTo: 1

## General comment
The process "4-methyl-2-pentanone, at plant, RER" is modelled for the production of 4-methyl-2-pentanone from acetone in Europe. Raw materials, auxilliaries, energy consumptions and emissions are modelled with data from US-production. Infrastructure and transports are calculated with standard values.
[This dataset was already contained in the ecoinvent database version 2. It was not individually updated during the transfer to ecoinvent version 3. Life Cycle Impact Assessment results may still have changed, as they are affected by changes in the supply chain, i.e. in other datasets. This dataset was generated following the ecoinvent quality guidelines for version 2. It may have been subject to central changes described in the ecoinvent version 3 change report (http://www.ecoinvent.org/database/ecoinvent-version-3/reports-of-changes/), and the results of the central updates were reviewed extensively. The changes added e.g. consistent water flows and other information throughout the database. The documentation of this dataset can be found in the ecoinvent reports of version 2, which are still available via the ecoinvent website. The change report linked above covers all central changes that were made during the conversion process.]

## Included activities end
Production of 4-methyl-2-pentanone including materials, energy uses, infrastructure and emissions.

## Geography
The inventory is modelled for Europe.

## Technology
Hydrgenation of acetone

## Time period
Time of publications

## Parameters
- fraction, cooling water, cooling pond system, to air: 0.032 dimensionless; name fraction_CW_CP_to_air; lognormal variance with pedigree 0.0413, pedigree (2,3,1,3,1)
  Calculated based on literature value (Scown, C.D., 2011, Water Footprint of U.S. Transportation Fuels and supplying information of the article) (Vionnet, S., Quantis Water Database - Technical Report, 2012).
- fraction, cooling water, once-through system, to air: 0.004 dimensionless; name fraction_CW_OT_to_air; lognormal variance with pedigree 0.0413, pedigree (2,3,1,3,1)
  (same comment as for fraction, cooling water, cooling pond system, to air)
- fraction, cooling water, recirculating system, to air: 0.771 dimensionless; name fraction_CW_R_to_air; lognormal variance with pedigree 0.0413, pedigree (2,3,1,3,1)
  (same comment as for fraction, cooling water, cooling pond system, to air)
- fraction, cooling water, to air: 0.3875 dimensionless; name fraction_CW_to_air; = (0.5*fraction_CW_OT_to_air)+(0.5*fraction_CW_R_to_air); lognormal variance with pedigree 0.092025, pedigree (4,4,3,2,4)
  Calculated value based on literature value (see comments of the other parametres present in this dataset) and expert opinion. In the case when no industry/literature data are available about the type of cooling or directly fraction, cooling water, to air specific for the process a default assumption is applied. It is assumed that the once-through cooling system is used in 50% of all cases and recirculating system is used in another 50% of all cases.
- fraction, process water, to air: 0.205 dimensionless; name fraction_PW_to_air; lognormal variance with pedigree 0.092025, pedigree (4,4,3,2,4)
  Literature value (Statistics Canada, 2007 & Shaffer, K.H., 2008, Consumptive water use in the Great Lakes Basin, USGS) (Vionnet, S., Quantis Water Database - Technical Report, 2012).
- fraction, water, deionised, to air: 0.205 dimensionless; name fraction_WDI_to_air; = fraction_PW_to_air; lognormal variance with pedigree 0.092025, pedigree (4,4,3,2,4)
  Calculated value. See comment in the other parametres present in this dataset. Deionised water is considered to be always used as process water, thus process water fractions to air are applied to all deionised water input flows to calculate the amount of water consumed in the processes.

## Reference product
- 4-methyl-2-pentanone: 1 kg; By-product classification allocatable product; CPC 34170: Ethers, alcohol peroxides, ether peroxides, epoxides, acetals and hemiacetals, and their halogenated, sulphona[…]; HS2017 291419: Ketones; acyclic, without other oxygen function, n.e.c. in item no. 2914.1; CAS 108-10-1
  EcoSpold01Location=RER
  production volume 2.67763 kg
    This is a placeholder value that does not reflect real-world production volumes. This dataset does not currently require a real-world production volume to work in the database framework, and no actual data were collected yet. This has no negative effect on the results of the ecoinvent database.
  property heating value, net 36.32 MJ
    LHV is calculated based on the elemental composition of the substance. Based on the CAS number of the substance (000108-10-1), the chemical formula of the substance is found to be: C6H12O, (PubChem 2020).
    Reference: Kim, S., Chen, J., Cheng, T., Gindulyte, A., He, J., He, S., Li, Q., Shoemaker, B. A., Thiessen, P. A., Yu, B., Zaslavsky, L., Zhang, J., & Bolton, E. E. (2019). PubChem 2019 update: improved access to chemical data. Nucleic acids research, 47(D1), D1102–D1109. https://doi.org/10.1093/nar/gky1033
  property price 1.15 EUR2005
    Calculated value based on data from United Nations Commodity Trade Statistics Database (comtrade.un.org). UN comtrade category: 291413 4-methylpentan-2-one(methyl isobutyl ketone). Year 2005. Using exchange rate of 1EURO = 1.209 USD. Average of price of import into 5 main markets (EU, US, JP, IN and CN).
  properties: carbon allocation 0.72 kg, carbon content 0.72, carbon content, fossil 0.72, carbon content, non-fossil 0, dry mass 1 kg, water content 0, water in wet mass 0 kg, wet mass 1 kg

## Inputs from technosphere
- acetone, liquid: 1.4229 kg; lognormal variance with pedigree 0.0421, pedigree (1,2,5,5,1)
  Overcash 1998 - 2004
  EcoSpold01Location=RER
  Uncertainty: Overcash 1998 - 2004
  properties: carbon content, fossil 0.62069, dry mass 1 kg, heating value, net 31.32 MJ, wet mass 1 kg
- chemical factory, organics: 4e-10 unit; lognormal variance with pedigree 0.448, pedigree (4,5,5,5,5)
  EcoSpold01Location=RER
  Estimation
  Uncertainty: Estimation
- electricity, medium voltage: 0.0252887, 0.504453, 0.169495, 0.00774427, 0.00155001, 0.000332821, 0.0520926 kWh (7 suppliers, which the file names only by identifier); sum of these 0.760956 kWh; lognormal variance with pedigree 0.0421, pedigree (1,2,5,5,1)
  EcoSpold01Location=UCTE
  Overcash 1998 - 2004
  Uncertainty: Overcash 1998 - 2004
- heat, district or industrial, natural gas: 0.0546765, 3.32732 MJ (2 suppliers, which the file names only by identifier); sum of these 3.382 MJ; lognormal variance with pedigree 0.0421, pedigree (1,2,5,5,1)
  Uncertainty: Overcash 1998 - 2004
  properties: heating value, net 1 MJ
- heat, district or industrial, other than natural gas: 1.88682, 0.000874127 MJ (2 suppliers, which the file names only by identifier); sum of these 1.88769 MJ; lognormal variance with pedigree 0.0421, pedigree (1,2,5,5,1)
  Uncertainty: Overcash 1998 - 2004
  properties: heating value, net 1 MJ
- hydrogen, gaseous, medium pressure, merchant: 0.0132686, 0.00833143 kg (2 suppliers, which the file names only by identifier); sum of these 0.0216 kg; lognormal variance with pedigree 0.0421, pedigree (1,2,5,5,1)
  Overcash 1998 - 2004
  EcoSpold01Location=RER
  Uncertainty: Overcash 1998 - 2004
  properties: dry mass 1 kg, heating value, net 120.21 MJ, wet mass 1 kg
- water, deionised: 0.21208 kg; name water_deionised_input; lognormal variance with pedigree 0.0421, pedigree (1,2,5,5,1)
  EcoSpold01Location=CH
  Literature value.
  Uncertainty: Overcash 1998 - 2004
  properties: wet mass 1 kg

## Inputs from nature
- Water, cooling, unspecified natural origin [natural resource, in water]: 0.063392 m3; name water_cooling_UNO_input; lognormal variance with pedigree 0.0421, pedigree (1,2,5,5,1)
  Literature value.
  Uncertainty: Overcash 1998 - 2004

## Emissions to nature
- 4-Methyl-2-pentanone [air, urban air close to ground]: 0.01074 kg; lognormal variance with pedigree 0.0421, pedigree (1,2,5,5,1)
  Overcash 1998 - 2004
  Uncertainty: Overcash 1998 - 2004
- Acetone [air, urban air close to ground]: 0.07578 kg; lognormal variance with pedigree 0.0821, pedigree (1,2,5,5,1)
  Overcash 1998 - 2004
  Uncertainty: Overcash 1998 - 2004
- Hydrogen [air, urban air close to ground]: 0.00025 kg; lognormal variance with pedigree 0.0821, pedigree (1,2,5,5,1)
  Overcash 1998 - 2004
  Uncertainty: Overcash 1998 - 2004
- Isohexane [air, urban air close to ground]: 5e-5 kg; lognormal variance with pedigree 0.0421, pedigree (1,2,5,5,1)
  Overcash 1998 - 2004
  Uncertainty: Overcash 1998 - 2004
- Isopropanol [air, urban air close to ground]: 1e-5 kg; lognormal variance with pedigree 0.0421, pedigree (1,2,5,5,1)
  Overcash 1998 - 2004
  Uncertainty: Overcash 1998 - 2004
- Water [air, unspecified]: 0.0246079 m3; name water_to_air_unspecified; lognormal variance with pedigree 0.0827, pedigree (2,2,5,5,1)
  Calculated value based on literature values and expert opinion. See comments in the parametres' comment field.
  property fraction, origin: fresh water 0.00176677; name fraction_origin_fresh_water
  property fraction, origin: salt water 0; name fraction_origin_salt_water
  property fraction, origin: unspecified 0.998233; name fraction_origin_unspecified
- 4-Methyl-2-pentanol [water, surface water]: 0.00038 kg; lognormal variance with pedigree 0.0421, pedigree (1,2,5,5,1)
  Overcash 1998 - 2004
  Uncertainty: Overcash 1998 - 2004
- 4-Methyl-2-pentanone [water, surface water]: 0.07368 kg; lognormal variance with pedigree 0.0421, pedigree (1,2,5,5,1)
  Overcash 1998 - 2004
  Uncertainty: Overcash 1998 - 2004
- Acetone [water, surface water]: 0.12807 kg; lognormal variance with pedigree 0.3421, pedigree (1,2,5,5,1)
  Overcash 1998 - 2004
  Uncertainty: Overcash 1998 - 2004
- BOD5, Biological Oxygen Demand [water, surface water]: 0.551 kg; lognormal variance with pedigree 0.0821, pedigree (1,2,5,5,1)
  Calculated from the water emissions
  Uncertainty: Calculated from the water emissions
- COD, Chemical Oxygen Demand [water, surface water]: 0.551 kg; lognormal variance with pedigree 0.0821, pedigree (1,2,5,5,1)
  Calculated from the water emissions
  Uncertainty: Calculated from the water emissions
- DOC, Dissolved Organic Carbon [water, surface water]: 0.156 kg; lognormal variance with pedigree 0.0821, pedigree (1,2,5,5,1)
  Calculated from the water emissions
  Uncertainty: Calculated from the water emissions
- Diisobutyl ketone [water, surface water]: 0.02462 kg; lognormal variance with pedigree 0.0421, pedigree (1,2,5,5,1)
  Overcash 1998 - 2004
  Uncertainty: Overcash 1998 - 2004
- Isohexane [water, surface water]: 0.00455 kg; lognormal variance with pedigree 0.0421, pedigree (1,2,5,5,1)
  Overcash 1998 - 2004
  Uncertainty: Overcash 1998 - 2004
- Isopropanol [water, surface water]: 0.00114 kg; lognormal variance with pedigree 0.0421, pedigree (1,2,5,5,1)
  Overcash 1998 - 2004
  Uncertainty: Overcash 1998 - 2004
- TOC, Total Organic Carbon [water, surface water]: 0.156 kg; lognormal variance with pedigree 0.0821, pedigree (1,2,5,5,1)
  Calculated from the water emissions
  Uncertainty: Calculated from the water emissions
- Water [water, unspecified]: 0.0389962 m3; name water_to_water_unspecified; lognormal variance with pedigree 0.0827, pedigree (2,2,5,5,1)
  (same comment as for Water)
  property carbon content, fossil 0; name C_content_fossil
  property carbon content, non-fossil 0; name C_content_non_fossil
  property dry mass 0 kg; name DM
  property fraction, origin: fresh water 0.00432359; name fraction_origin_fresh_water_Ww
  property fraction, origin: salt water 0; name fraction_origin_salt_water_Ww
  property fraction, origin: unspecified 0.995676; name fraction_origin_unspecified_Ww
  property water in wet mass 1000 kg; name WWM
  property wet mass 1000 kg; name WM

## Sampling procedure
Literature data

## Extrapolations
Transports are modelled with standard distances. This dataset has been copied from an original dataset covering the geography RER. The uncertainty has been adjusted accordingly.

## Review by Roland Hischier 2007-09-01
passed.
