# stone wool production

Dataset: EcoSpold 2, unit process
Geography: RoW
Time period: 2000-01-01 to 2023-12-31
Technology level: current
Classification: ISIC rev.4 ecoinvent: 2399:Manufacture of other non-metallic mineral products n.e.c.
Classification: EcoSpold01Categories: insulation materials/production
Tags: ConvertedDataset
Scenario: Business-as-Usual
System model: Allocation, cut-off by classification
Share of production covered: 40 %
Generated by: Hans-Jörg Althaus
Published in: Hischier, R. 2010
Database: ecoinvent
isCopyrightProtected: true
accessRestrictedTo: 1

## General comment
This product is not available on the market as it is not packed. It has been defined for internal use in this database as input for the packaging module. Inputs and outputs are not balanced in the unit process since some are included in the unit proces "rock woll, packed, at plant". This dataset is not to be used to describe rock wool in other inventories.
[This dataset was already contained in the ecoinvent database version 2. It was not individually updated during the transfer to ecoinvent version 3. Life Cycle Impact Assessment results may still have changed, as they are affected by changes in the supply chain, i.e. in other datasets. This dataset was generated following the ecoinvent quality guidelines for version 2. It may have been subject to central changes described in the ecoinvent version 3 change report (http://www.ecoinvent.org/database/ecoinvent-version-3/reports-of-changes/), and the results of the central updates were reviewed extensively. The changes added e.g. consistent water flows and other information throughout the database. The documentation of this dataset can be found in the ecoinvent reports of version 2, which are still available via the ecoinvent website. The change report linked above covers all central changes that were made during the conversion process.]

## Included activities end
Included processes: melting, fiber forming & collecting, hardening & curing furnace, and internal processes (workshop, etc.). Transport of raw materials and energy carrier for furnace are also included. Not included are administration, packing and infrastructure.

## Geography
Data are only from one company in Switzerland (Flumroc AG). For some exchanges RER-modules have been used as proxy

## Technology
The company works on a technically very high level. The fuel for the melting process is coke. The furnace is a cupola melting furnace. The emissions are abated by post-combustion with energy recuperation. The partition of the total dust emission to the categories of particulate sizes is based on an uncontrolled mineral wool cupola (EPA 1998) which only partly represent this case.

## Parameters
- fraction, process water, to air: 0.29 dimensionless; name fraction_PW_to_air; lognormal variance with pedigree 0.092025, pedigree (4,4,3,2,4)
- fraction, tap water, to air: 0.29 dimensionless; name fraction_TW_to_air; lognormal variance with pedigree 0.092025, pedigree (4,4,3,2,4)

## Reference product
- stone wool: 1 kg; By-product classification allocatable product; CPC 37990: Non-metallic mineral products n.e.c. (including mineral wool, expanded mineral materials, worked mica, article[…]; HS2017 680610: Slag wool, rock wool and similar mineral wools (including intermixtures thereof), in bulk, sheets or rolls
  EcoSpold01Location=CH
  production volume 3.96633 kg
    This is a placeholder value that does not reflect real-world production volumes. This dataset does not currently require a real-world production volume to work in the database framework, and no actual data were collected yet. This has no negative effect on the results of the ecoinvent database.
  property carbon content, fossil 0.015401
    The chemical composition of the glass fibres used in the rock wool production is similar to the composition of naturally cooled volcano basalt and has a composition listed in Tab.
    3.1 and 3.2 in ecoinvent v2.2 report 16, part XIV. Rock wool contains: a minimum of 96% mineral fibres,between 0.5 and 3.0 weight percent of phenolic resin depending on the specific product characteristics, and about 0.2 percent mineral oil (ecoinvent v2.2 report 16, part XIV). An average composition of 1.8% phenolic resin, 0.2% mineral oil, and 98% mineral fibres has been assumed and used to calculate C content of the rock wool
  property heating value, net 0 MJ
    Non combustible products are assumed to have an LHV equal to zero (0).
  property price 0.65 EUR2005
    Expert judgement; communication with Georg Schöner from Rockwool International.
  properties: carbon allocation 0.015401 kg, carbon content 0.015401, carbon content, non-fossil 0, dry mass 1 kg, water content 0, water in wet mass 0 kg, wet mass 1 kg

## Inputs from technosphere
- aluminium, wrought alloy: 0.00057409 kg; lognormal variance with pedigree 0.0606, pedigree (1,3,5,5,3)
  EcoSpold01Location=RER
  properties: dry mass 1 kg, wet mass 1 kg
- ammonia, anhydrous, liquid: 9.56246e-5, 0.000185627, 0.00205755, 8.69741e-5, 1.94557e-5, 0.000715032, 6.14656e-5, 0.000189466 kg (8 suppliers, which the file names only by identifier); sum of these 0.0034112 kg; lognormal variance with pedigree 0.0426, pedigree (1,3,5,5,1)
  EcoSpold01Location=RER
  properties: dry mass 1 kg, wet mass 1 kg
- ammonium bicarbonate: 0.0013088 kg; lognormal variance with pedigree 0.0426, pedigree (1,3,5,5,1)
  EcoSpold01Location=RER
  properties: carbon content, fossil 0.151899, dry mass 1 kg, heating value, net 12.27 MJ, wet mass 1 kg
- basalt: 0.70474 kg; lognormal variance with pedigree 0.0426, pedigree (1,3,5,5,1)
  EcoSpold01Location=RER
  properties: dry mass 1 kg, wet mass 1 kg
- bauxite: 0.062271 kg; lognormal variance with pedigree 0.0446, pedigree (3,3,5,5,1)
  EcoSpold01Location=GLO
  properties: dry mass 1 kg, wet mass 1 kg
- cement, Portland: 0.125631, 0.00476075, 0.00635142, 0.0069628, 0.000288287, 0.000262837, 0.00025617, 0.000326736, 0.000170097 kg (9 suppliers, which the file names only by identifier); sum of these 0.14501 kg; lognormal variance with pedigree 0.0426, pedigree (1,3,5,5,1)
  EcoSpold01Location=CH
  properties: dry mass 1 kg, wet mass 1 kg
- coke: 1.68006, 3.56524 MJ (2 suppliers, which the file names only by identifier); sum of these 5.2453 MJ; lognormal variance with pedigree 0.0426, pedigree (1,3,5,5,1)
  EcoSpold01Location=RER
  properties: carbon content, fossil 0.869149, dry mass 0.0328671 kg, heating value, net 28.6 MJ, water content 0.0638298, wet mass 0.034965 kg
  note on carbon content, fossil: 81.7% C and 6% water in wet mass (ecoinvent v2.1 report 6_VI Table 7.1)
- diesel, burned in building machine: 0.049691 MJ; lognormal variance with pedigree 0.0606, pedigree (1,3,5,5,3)
  EcoSpold01Location=GLO
  properties: heating value, net 1 MJ
- dolomite: 0.081983 kg; lognormal variance with pedigree 0.0432, pedigree (1,3,5,5,1)
  EcoSpold01Location=RER
  properties: carbon content, fossil 0.130435, dry mass 1 kg, heating value, net 3.95 MJ, wet mass 1 kg
- electricity, medium voltage: 0.00797727, 0.159129, 0.0534667, 0.00244291, 0.000488946, 0.000104988, 0.0111115, 0.0164325, 0.0344266 kWh (9 suppliers, which the file names only by identifier); sum of these 0.28558 kWh; lognormal variance with pedigree 0.0606, pedigree (1,3,5,5,3)
  EcoSpold01Location=CH
- formaldehyde: 0.060452 kg; lognormal variance with pedigree 0.0426, pedigree (1,3,5,5,1)
  EcoSpold01Location=RER
  properties: carbon content, fossil 0.4, dry mass 1 kg, heating value, net 20.19 MJ, wet mass 1 kg
- glass wool mat: 0.00032929 kg; lognormal variance with pedigree 0.0606, pedigree (1,3,5,5,3)
  EcoSpold01Location=CH
  properties: carbon content, fossil 0.0107327, dry mass 1 kg, wet mass 1 kg
  note on carbon content, fossil: A share of 16 w-% for the binders is taken into account. The binder used in this study is a mixture of phenol, formaldehyde and urea resins (ecoinvent v2.2 report 16_part XIV), and the C content was calculated as a weigthed average of phenol, formaldehyde and urea C content.
- hexamethyldisilazane: 0.00021303 kg; lognormal variance with pedigree 0.0426, pedigree (1,3,5,5,1)
  EcoSpold01Location=GLO
  properties: carbon content, fossil 0.447205, dry mass 1 kg, heating value, net 27.79 MJ, wet mass 1 kg
- kraft paper: 0.0030922 kg; lognormal variance with pedigree 0.0606, pedigree (1,3,5,5,3)
  EcoSpold01Location=RER
  properties: carbon content, fossil 0.0020219, carbon content, non-fossil 0.41662, dry mass 0.945 kg, heating value, net 14.11 MJ, water content 0.0582011, wet mass 1 kg
  note on carbon content, fossil: Fossil C content was calculated after fossil C contents of chemicals used in the production of the paper (in Tab 9.4 ecoinvent v2.2 report 11_III, part 9).
  note on carbon content, non-fossil: Biogenic C content was calculated after biogenic C contents of chemicals used in the production of the paper (in Tab 9.4 ecoinvent v2.2 report 11_III, part 9). The cellulose content in 1 kg of paper (on a wet mas basis) was estimated as (1-chemical content), C content of cellulose was considered 0.44 kgC/kg dry mass (ecoinvent v2.2 report, n 15a, pg 40)
- lime, hydrated, packed: 0.0011426 kg; lognormal variance with pedigree 0.8026, pedigree (1,3,5,5,1)
  EcoSpold01Location=CH
  properties: dry mass 0.997 kg, water content 0.00300903, wet mass 1 kg
- lime, packed: 0.0311418, 0.0622652 kg (2 suppliers, which the file names only by identifier); sum of these 0.093407 kg; lognormal variance with pedigree 0.0446, pedigree (3,3,5,5,1)
  EcoSpold01Location=CH
  properties: carbon content, fossil 0.117492, dry mass 0.998 kg, water content 0.00200401, wet mass 1 kg
  note on carbon content, fossil: Table 3.1, ecoinvent v2.2 report 7, part VII, pg 3. MW CaCO3=100, MW MgCO3=84
- lubricating oil: 0.0028235 kg; lognormal variance with pedigree 0.0426, pedigree (1,3,5,5,1)
  EcoSpold01Location=RER
  properties: carbon content, fossil 0.75, dry mass 1 kg, heating value, net 40.2 MJ, wet mass 1 kg
  note on carbon content, fossil: Lubricating oil is produced from diesel. C-content/dry mass of fats and oils considered 75%, from: ecoinvent v2.2 report, n 15a, pg 40
  note on heating value, net: Literature value, Source: IPCC 2006, 2006 IPCC Guidelines for National Greenhouse Gas Inventories, Prepared by the National Greenhouse Gas Inventories Programme, Eggleston H.S., Buendia L., Miwa K., Ngara T. and Tanabe K. (eds). Published: IGES, Japan
- municipal solid waste: -2.83824e-6, -3.37029e-7, -2.14139e-6, -2.09758e-6, -0.00160133, -5.39452e-5, -2.3584e-7, -7.57003e-8, -1.71103e-7, -7.12309e-6 kg (10 suppliers, which the file names only by identifier); sum of these -0.0016703 kg; lognormal variance with pedigree 0.0206, pedigree (1,3,1,5,3)
  EcoSpold01Location=CH
  production volume
    Calculated from the production volume of rock wool in proportion to the respective output amounts.
  properties: carbon content, fossil 0.171549, carbon content, non-fossil 0.261655, dry mass 0.771 kg, heating value, net 11.74 MJ, water content 0.297017, wet mass 1 kg
  note on carbon content, fossil: MSW composition in tab 4.1, ecoinvent v2.2 report 13_I. C content referred to 1 kg DM
  note on heating value, net: Value taken from the general comment of the treatment dataset.
- natural gas, high pressure: 0.000127042, 0.000214305, 0.000467464, 0.00015644, 3.65595e-5, 0.000217595, 0.000208799, 0.000549041, 0.000211966, 0.000327852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 m3 (39 suppliers, which the file names only by identifier); sum of these 0.0216367 m3; lognormal variance with pedigree 0.0606, pedigree (1,3,5,5,3)
  EcoSpold01Location=CH
  properties: carbon content, fossil 0.602381, dry mass 0.84 kg, heating value, gross 40 MJ, heating value, net 36 MJ, wet mass 0.84 kg
  note on carbon content, fossil: An average C content of 0.506 kg C/ m3 has been assumed (this average has been calculated using data in Tab 3.5, ecoinvent v2.2 report 6_V
  note on heating value, net: Literature value, Source: Christoph Meili;Niels Jungbluth;Maresa Bussa (2021) Life cycle inventories of crude oil and natural gas extraction. ESU-services Ltd. commissioned by BAFU & VSG, Schaffhausen, Switzerland, http://esu-services.ch/data/public-lci-reports/
- oxygen, liquid: 5.8455e-5 kg; lognormal variance with pedigree 0.0606, pedigree (1,3,5,5,3)
  EcoSpold01Location=RER
  properties: dry mass 1 kg, wet mass 1 kg
- phenol: 0.021694 kg; lognormal variance with pedigree 0.0426, pedigree (1,3,5,5,1)
  EcoSpold01Location=RER
  properties: carbon content, fossil 0.765957, dry mass 1 kg, heating value, net 30.93 MJ, wet mass 1 kg
- refractory, fireclay, packed: 0.00079321 kg; lognormal variance with pedigree 0.052, pedigree (1,1,5,5,1)
  EcoSpold01Location=DE
  composite
  properties: dry mass 1 kg, wet mass 1 kg
- sheet rolling, aluminium: 0.00057409 kg; lognormal variance with pedigree 0.0426, pedigree (1,3,5,5,1)
  EcoSpold01Location=RER
- spent solvent mixture: -3.55072e-6, -9.08728e-6 kg (2 suppliers, which the file names only by identifier); sum of these -1.2638e-5 kg; lognormal variance with pedigree 0.0206, pedigree (1,3,1,5,3)
  EcoSpold01Location=CH
  production volume
    (same comment as for municipal solid waste)
  properties: carbon content, fossil 0.571257, dry mass 0.835 kg, heating value, net 21.7 MJ, water content 0.197605, wet mass 1 kg
  note on carbon content, fossil: Tab A.7, ecoinvent v2.2 report 13_I. C content has been calculated after data in the tables, and then referred to 1 kg DM
- stone wool factory: 4.4287e-10 unit; lognormal variance with pedigree 0.3426, pedigree (1,3,5,5,1)
  EcoSpold01Location=CH
- tap water: 0.000154719, 0.000235856, 0.000440096, 0.00118559, 0.000142713, 0.00594736, 0.0680587, 0.050715 kg (8 suppliers, which the file names only by identifier); sum of these 0.12688 kg; lognormal variance with pedigree 2.6626, pedigree (1,3,5,5,1)
  EcoSpold01Location=CH
  properties: carbon content, fossil 0.00178991, dry mass 0.000337476 kg, water content 2962.17, wet mass 1 kg
  note on carbon content, fossil: Bicarbonate content is 2.93 mol/m3. CO2 content is 0.1 mol/m3 (ecoinvent v2.2 report 8, Tab 93.1).
- urea: 0.0144969, 0.00183346, 0.0123794 kg (3 suppliers, which the file names only by identifier); sum of these 0.0287098 kg; lognormal variance with pedigree 0.0426, pedigree (1,3,5,5,1)
  The exchange has been updated from 'urea, as N' into 'urea' and therefore its amount has been scaled (multiplied) from 0.0134 kg by 2.1438 kg of 'urea' per kg of 'urea, as N'.
  EcoSpold01Location=RER
  properties: carbon content, fossil 0.2, dry mass 1 kg, wet mass 1 kg
- waste mineral oil: -4.5727e-5, -1.7464e-5 kg (2 suppliers, which the file names only by identifier); sum of these -6.3191e-5 kg; lognormal variance with pedigree 0.8206, pedigree (1,3,1,5,3)
  EcoSpold01Location=CH
  production volume
    (same comment as for municipal solid waste)
  properties: carbon content, fossil 0.864444, dry mass 0.9 kg, heating value, net 34.7 MJ, water content 0.111111, wet mass 1 kg
  note on carbon content, fossil: Tab A.6, ecoinvent v2.2 report 13_I. C content has been calculated after data in the tables, and then referred to 1 kg DM
- wastewater, average: -0.000618059, -0.000147791, -2.20053e-6 m3 (3 suppliers, which the file names only by identifier); sum of these -0.00076805 m3; lognormal variance with pedigree 0.0206, pedigree (1,3,1,5,3)
  EcoSpold01Location=CH
  production volume
    (same comment as for municipal solid waste)
  properties: carbon content, non-fossil 0.194039, dry mass 0.346837 kg, water content 2882.2, wet mass 1000 kg
  note on carbon content, non-fossil: 0.0673 kg TOC/m3 (Tab A.17, ecoinvent v2.2 report 13_I). TOC was considered as Total Carbon.

## Inputs from nature
- Water, well, in ground [natural resource, in water]: 0.0053366 m3; name water_well_in_ground_input; lognormal variance with pedigree 0.0606, pedigree (1,3,5,5,3)

## Emissions to nature
- Ammonia [air, non-urban air or from high stacks]: 0.00056247 kg; lognormal variance with pedigree 0.0826, pedigree (1,3,5,5,1)
- Cadmium II [air, non-urban air or from high stacks]: 9.1602e-9 kg; lognormal variance with pedigree 0.6926, pedigree (1,3,5,5,1)
- Carbon dioxide, fossil [air, non-urban air or from high stacks]: 0.53847 kg; lognormal variance with pedigree 0.0606, pedigree (1,3,5,5,3)
- Carbon monoxide, fossil [air, non-urban air or from high stacks]: 4.2141e-5 kg; lognormal variance with pedigree 0.6926, pedigree (1,3,5,5,1)
- Chromium III [air, non-urban air or from high stacks]: 4.5712e-9 kg; lognormal variance with pedigree 0.6926, pedigree (1,3,5,5,1)
- Copper ion [air, non-urban air or from high stacks]: 8.6424e-9 kg; lognormal variance with pedigree 0.6926, pedigree (1,3,5,5,1)
- Formaldehyde [air, non-urban air or from high stacks]: 0.00010535 kg; lognormal variance with pedigree 0.1806, pedigree (1,3,5,5,3)
- Hydrochloric acid [air, non-urban air or from high stacks]: 1.7678e-5 kg; lognormal variance with pedigree 0.0826, pedigree (1,3,5,5,1)
- Hydrogen fluoride [air, non-urban air or from high stacks]: 9.2495e-8 kg; lognormal variance with pedigree 0.0826, pedigree (1,3,5,5,1)
- Lead II [air, non-urban air or from high stacks]: 5.6961e-8 kg; lognormal variance with pedigree 0.6926, pedigree (1,3,5,5,1)
- NMVOC, non-methane volatile organic compounds [air, non-urban air or from high stacks]: 0.00038052 kg; lognormal variance with pedigree 0.2326, pedigree (1,3,5,5,4)
- Nitrogen oxides [air, non-urban air or from high stacks]: 0.00088299 kg; lognormal variance with pedigree 0.0826, pedigree (1,3,5,5,1)
- Particulate Matter, < 2.5 um [air, non-urban air or from high stacks]: 0.0001268 kg; lognormal variance with pedigree 0.4126, pedigree (1,3,5,5,4)
- Particulate Matter, > 10 um [air, non-urban air or from high stacks]: 8.4531e-6 kg; lognormal variance with pedigree 0.1526, pedigree (1,3,5,5,4)
- Particulate Matter, > 2.5 um and < 10um [air, non-urban air or from high stacks]: 5.6354e-6 kg; lognormal variance with pedigree 0.2326, pedigree (1,3,5,5,4)
- Phenol [air, non-urban air or from high stacks]: 0.00010535 kg; lognormal variance with pedigree 0.0826, pedigree (1,3,5,5,1)
- Sulfur dioxide [air, non-urban air or from high stacks]: 0.0039623 kg; lognormal variance with pedigree 0.0426, pedigree (1,3,5,5,1)
- Water [air, unspecified]: 0.00158441 m3; name water_to_air_unspecified; lognormal variance with pedigree 0.0827, pedigree (2,2,5,5,1)
  Calculated value based on literature values and expert opinion. See comments in the parametres' comment field.
  property fraction, origin: fresh water 1; name fraction_origin_fresh_water
  property fraction, origin: salt water 0; name fraction_origin_salt_water
  property fraction, origin: unspecified 0; name fraction_origin_unspecified
- Zinc II [air, non-urban air or from high stacks]: 2.4463e-8 kg; lognormal variance with pedigree 0.6926, pedigree (1,3,5,5,1)
- Water [water, unspecified]: 0.00311102 m3; name water_to_water_unspecified; = (tap_water_input/1000)*(1-fraction_TW_to_air)+water_well_in_ground_input*(1-fraction_PW_to_air)-0.00076805; lognormal variance with pedigree 0.0827, pedigree (2,2,5,5,1)
  (same comment as for Water)
  property carbon content, fossil 0; name C_content_fossil
  property carbon content, non-fossil 0; name C_content_non_fossil
  property dry mass 0 kg; name DM
  property fraction, origin: fresh water 1; name fraction_origin_fresh_water_Ww
  property fraction, origin: salt water 0; name fraction_origin_salt_water_Ww
  property fraction, origin: unspecified 0; name fraction_origin_unspecified_Ww
  property water in wet mass 1000 kg; name WWM
  property wet mass 1000 kg; name WM

## Sampling procedure
environmental report

## Extrapolations
see geography and technology This dataset has been copied from an original dataset covering the geography CH. The uncertainty has been adjusted accordingly.

## Review by Daniel Kellenberger (obsolete) 2010-02-07
passed
