# sawmill construction

Dataset: EcoSpold 2, unit process
Geography: RoW
Time period: 2002-01-01 to 2023-12-31
Technology level: current
Classification: ISIC rev.4 ecoinvent: 4290:Construction of other civil engineering projects
Classification: EcoSpold01Categories: wooden materials/extraction
Synonyms: Sägewerk; sawing mill
Scenario: Business-as-Usual
System model: Allocation, cut-off by classification
Generated by: Hans-Jörg Althaus
Published in: Werner F. 2007
Database: ecoinvent
isCopyrightProtected: true
accessRestrictedTo: 1

## General comment
The service life is assumed to be 50 years. Thus the life time output is 2'500'000 m3 sawn timber. This data must only be used to consider the infrastructure needed for sawing wood if this is not relevant.
This dataset was created as a weighted average (by production volumes) of the regional production activities.

## Included activities end
The land area and the material and their transports needed for building and disposal of a sawmill with a yearly output of 50'000 m3 sawn timber is included. Land used for air drying of wood is not included.

## Geography
Activity created as a weighted average (by production volume) of the regional production activities.

## Technology
Sawmill with it's input wood storage place, a lop station, a hall with the saw and a conveyer belt.

## Reference product
- sawmill: 1 unit; name m_sawmill; By-product classification allocatable product; CPC 53269: Other constructions for manufacturing
  EcoSpold01Location=RER
  production volume 2.62833 unit; name PV_sawmill
    This is a placeholder value that does not reflect real-world production volumes. This dataset does not currently require a real-world production volume to work in the database framework, and no actual data were collected yet. This has no negative effect on the results of the ecoinvent database.
  property lifetime 50 year; name m_sawmill_lifetime
    Estimated value.
  property lifetime capacity in m3 2.5e6 m3; name m_sawmill_Lft_capacity_m3; = 50000* m_sawmill_lifetime
    Sawmill with a yearly output of 50'000 m3 sawn timber.
  property price 3.30561e6 EUR2005
    Calculated based on inputs: The price of the product has been calculated as a sum of the values of the material and energy inputs for this product. This value is therefore a rough estimation. It may underestimate the real price since there are additional expenses when producing any product. These expences can include for example labour costs, treatment of waste materials and profit for the producer. Please consider carefully whether this level of data quality is acceptable for your application.
  properties: carbon allocation 0 kg, carbon content 0

## Inputs from technosphere
- building, hall: 7654.17 m2; lognormal variance with pedigree 0.39, pedigree (3,5,5,5,3)
  EcoSpold01Location=CH
  Calculated as a weighted average (by production volume) of the regional production activities.
- cast iron: 803786 kg; name m_cast_iron; lognormal variance with pedigree 0.39, pedigree (3,5,5,5,3)
  Calculated as a weighted average (by production volume) of the regional production activities.
  EcoSpold01Location=RER
  properties: carbon content, fossil 0.04, dry mass 1 kg, wet mass 1 kg
  note on carbon content, fossil: Cast iron is made by remelting pig iron in small furnaces (e.g. cupola furnaces or electric arc furnaces) and poured into moulds to make castings. It usually contains 2% to 6% carbon (ecoinvent v2.2 report 10_partII). An average content of 4% was considered
- concrete, normal strength: 8.8096, 1.93455, 1.25831, 37.3062, 15.6615, 18.5659, 664.174 m3 (7 suppliers, which the file names only by identifier); sum of these 747.71 m3; lognormal variance with pedigree 0.39, pedigree (3,5,5,5,3)
  Calculated as a weighted average (by production volume) of the regional production activities.
  properties: dry mass 2190 kg, water content 0.086758, wet mass 2380 kg
- conveyor belt: 2203.77 m; lognormal variance with pedigree 0.39, pedigree (3,5,5,5,3)
  EcoSpold01Location=RER
  Calculated as a weighted average (by production volume) of the regional production activities.
- reinforcing steel: 1201.86 kg; name m_reinforcing_steel; lognormal variance with pedigree 0.064, pedigree (4,5,5,5,1)
  (same comment as for concrete, normal strength)
  properties: carbon content, fossil 0.004, dry mass 1 kg, wet mass 1 kg
- sheet rolling, steel: 841172 kg; = m_steel_low_alloyed; lognormal variance with pedigree 0.39, pedigree (3,5,5,5,3)
  EcoSpold01Location=RER
  Calculated value.
- steel, low-alloyed, hot rolled: 841172 kg; name m_steel_low_alloyed; lognormal variance with pedigree 0.39, pedigree (3,5,5,5,3)
  (same comment as for conveyor belt)
  properties: carbon content, fossil 0.005, dry mass 1 kg, wet mass 1 kg
  note on carbon content, fossil: Low alloyed steel composition given in Tab. 3.2 ecoinvent v2.2 report 10_partII. Steel assumed to have a C content of 0.5%
- waste bulk iron, excluding reinforcement: -1.64496e6 kg; name w_waste_bulk_iron; = m_cast_iron+m_steel_low_alloyed; lognormal variance with pedigree 0.0072, pedigree (2,3,1,1,1)
  Calculated value.
  production volume; = w_waste_bulk_iron/ m_sawmill* PV_sawmill
    Calculated from production volume of reference product using the relative outputs.
  properties: dry mass 1 kg, wet mass 1 kg
- waste reinforced concrete: -1.6499e6 kg; name w_reinforcing_concrete; = m_concrete*2205+m_reinforcing_steel; lognormal variance with pedigree 0.35, pedigree (3,5,1,5,3)
  EcoSpold01Location=CH
  Calculated value.
  production volume; = w_reinforcing_concrete/ m_sawmill* PV_sawmill
    Calculated from the production volume of sawmill in proportion to the respective output amounts.
  properties: dry mass 0.99418 kg, water content 0.00585407, wet mass 1 kg

## Inputs from nature
- Occupation, industrial area [natural resource, land]: 3.83283e6 m2*year; lognormal variance with pedigree 0.12, pedigree (3,5,5,5,3)
  (same comment as for concrete, normal strength)
- Transformation, from unspecified [natural resource, land]: 76675.9 m2; name transformation_from; lognormal variance with pedigree 0.21, pedigree (3,5,5,5,3)
  (same comment as for concrete, normal strength)
- Transformation, to industrial area [natural resource, land]: 76675.9 m2; name transformation_to; = transformation_from; lognormal variance with pedigree 0.21, pedigree (3,5,5,5,3)
  Calculated value.

## Sampling procedure
This activity is updated for the ecoinvent v3.2. database as a weighted average (by production volume) of all the available regional activities. Uncertainty is adjusted accordingly.

## Review by Roberto Dones 2003-07-04
Passed

## Review by Emilia Moreno Ruiz 2015-03-19
By-products were added, and amounts were corrected.
