# cadmium production, primary

Dataset: EcoSpold 2, unit process
Geography: RoW
Time period: 2000-01-01 to 2023-12-31
Technology level: current
Classification: ISIC rev.4 ecoinvent: 2420:Manufacture of basic precious and other non-ferrous metals
Scenario: Business-as-Usual
System model: Allocation, cut-off by classification
Generated by: Emilia Moreno Ruiz
Published in: Classen M. 2009
Database: ecoinvent
isCopyrightProtected: true
accessRestrictedTo: 1

## General comment
This dataset describes the primary production of 1 kg of cadmium metal (99.9%). As roughly 70% of primary cadmium is produced as by-product by companies that produce refined zinc (in the activity "primary zinc production from concentrate"), this dataset represents the remaining 30% of production of refined cadmium.
No secondary sources of cadmium from post consumer scrap are considered. Only the most important source is taken into account: the cadmium sludges from hydrometallurgical zinc operations (modelled in the activity "primary zinc production from concentrate").
For the use in applications where cadmium is a major constituent – e.g. in NiCd battery systems – the dataset should be complemented with additional specific emission factors and the secondary production process.

## Included activities start
From reception of raw materials, at the factory gate.

## Included activities end
This activity ends with the production of cadmium metal.

The dataset includes the the treatment of cadmium sludge from hydrometallurgical zinc operations, the refining of cadmium by electrolysis, and the infrastructure for the process.

The dataset does not include emissions to air, nor emissions to water.

## Geography
This dataset is meant to represent the average global production of primary cadmium from cadmium sludge.

## Technology
Cadmium sludge formed in hydrometallurgical zinc operations by purification of zinc solution, via subsequent purification and oxidation of the sponge. Cadmium cathodes are formed by electrowinning. Other sources from pyrometallurgical zinc wastes and post consumer scrap (batteries) are disregarded.
OXIDATION & PURIFICATION
Cadmium is extracted by oxidizing the enriched starting materials solutions, remnants of hydrometallurgical zinc refining. In order to oxidize the cadmium, air is blown in . Cadmium is precipitated from the solution as a metal sponge by reduction with zinc dust. The precipitated sponge contains 90 % cadmium and only 2.5 % zinc. No heat is used for drying.
ELECTROWINNING
The cadmium sponge is precipitated directly in the tank with the electrolytic acid. The anode consists of lead, which does not dissolve, whereas the cathode is aluminum sheet. The current yield is ca. 93 %; the energy consumption is 1250 kWh per tonne of cadmium cathode sheet deposited. Typical impurity levels in electrolytic cadmium sheet are 5 – 10 ppm Cu, 15 – 20 ppm Pb, 5 – 10 ppm Tl, and 5 ppm Zn. The zinc dust used for cementation of the cadmium sponge is recovered later in the sludge of the electrolysis and will be returned into the zinc cycle.

## Reference product
- cadmium: 1 kg; By-product classification allocatable product; CPC 41601: Tungsten, molybdenum, tantalum, magnesium, cobalt, cadmium, titanium, zirconium, beryllium, gallium, hafnium, […]; HS2017 810720: Cadmium; unwrought, powders; CAS 7440-43-9
  Due to its toxicity the dissipative use of cadmium has been cut down and regulated.
  Uses: Description of the different uses of Cadmium:
  - Nickel-Cadmium Batteries. Cadmium hydroxide is utilised as one of the two principal electrode materials in Ni-Cd batteries which have extensive applications in the railroad and aircraft industry for starting and emergency power and in consumer applications such as cordless power tools, cellular telephones, camcorders, portable computers, portable household appliances and toys.
  - Cadmium Pigments. Cadmium sulphide and cadmium sulphoselenide are utilised as bright yellow to deep red pigments in plastics, ceramics, glasses, enamels and artists colours. They are used in applications where high temperature or high pressure processing is required.
  - Cadmium Stabilisers. Cadmium-bearing stabilisers retard the degradation processes in polyvinylchloride (PVC) which occur upon exposure to heat and ultraviolet light. These stabilisers contain organic cadmium salts, usually carboxylates such as cadmium laurate or cadmium stearate, which are incorporated into PVC before processing.
  - Cadmium Coatings. Cadmium coatings are utilised on steel, aluminium, and certain other non-ferrous metal fasteners and moving parts to provide the best available combination of corrosion resistance, particularly in salt and alkali media, and lubricity or low coefficient of friction. They are also employed in many electrical or electronic applications where a combination of corrosion resistance and low electrical resistivity are required. In addition, cadmium coatings exhibit excellent plating characteristics on a wide variety of substrates, have good galvanic comparability with aluminium, and are readily solderable.
  - Alloys and Minor Uses. Cadmium alloys include (a) electrical conductivity alloys, (b) heat conductivity alloys, and (c) electrical contact alloys. Other minor uses of cadmium include cadmium telluride and cadmium sulphide in solar cells, and other semiconducting cadmium compounds in a variety of electronic applications.
  Estimation from dataset author.
  production volume 5.64035e6 kg
    Based on a communication from the International Zinc Association (IZA), the global production volume of cadmium is estimated to be around 25000 tonnes as of 2019. 20% of that is estimated to be from secondary sources (USGS 2018). Additionally, roughly 70% of primary cadmium is produced as by-product by companies that produce zinc. As this production is taken into account in the activity "primary zinc production from concentrate", this dataset represents the production of the remaining 30% of refined cadmium metal. The production volume has been calculated taking these aspects into consideration.
    Reference:
    USGS (2018) 2016 Minerals Yearbook - Cadmium. U.S. Geological Survey, Mineral Industry Surveys, July 2018, https://s3-us-west-2.amazonaws.com/prd-wret/assets/palladium/production/mineral-pubs/cadmium/myb1-2016-cadmi.pdf (last accessed on 2019-05-27).
  property price 1.23738 EUR2005
    Price calculated as 5-year market average (2015-2019; USD/kg; USGS [2020]) and converted to EUR2005 (USD2019/EUR2005 exchange rate: 0.62; Official Data Foundation [2020] and Macrotrends [2020]).
    References:
    Official Data Foundation (2020). Inflation Calculator [Online]. Available from: https://www.officialdata.org/us/inflation/2005?endYear=2019&amount=1 [Accessed 28/07/2020]
    USGS (2020). Mineral Commodity Summaries 2020 [Online]. Available from: https://pubs.usgs.gov/periodicals/mcs2020/mcs2020.pdf [Accessed 28/07/2020]
    Macrotrends (2020). Euro Dollar Exchange Rate (EUR USD) - Historical Chart [Online]. Available from: https://www.macrotrends.net/2548/euro-dollar-exchange-rate-historical-chart [Accessed 28/07/2020]
  properties: carbon allocation 0 kg, carbon content 0, carbon content, fossil 0, carbon content, non-fossil 0, dry mass 1 kg, water content 0, water in wet mass 0 kg, wet mass 1 kg

## Inputs from technosphere
- cadmium sludge from zinc electrolysis: 1.87542 kg; name cadmium_sludge; = 1/cadmium_sludge_Cd_content*cadmium; lognormal variance with pedigree 0.2106, pedigree (5,5,5,5,5)
  Calculated based on cadmium content of cadmium sludge. See property comment for more information.
  property concentration, cadmium 0.533214 kg/kg; name cadmium_sludge_Cd_content
  properties: dry mass 1 kg, wet mass 1 kg
  note on concentration, cadmium: Amount taken from the cadmium content reported for this product in the dataset "primary zinc production from concentrate" (GLO), which is based on industry data.
- chemical factory, organics: 8e-10 unit; lognormal variance with pedigree 0.3461, pedigree (4,4,4,3,3)
  Estimation from dataset author: Facilities have an output of 50 000 t/year, and a lifetime of 25 years.
  Proxy: "chemical factory, organics" is used as a proxy for the used facilities.
  EcoSpold01Location=RER
- electricity, medium voltage: 0.0351923, 0.702008, 0.0175738, 0.0107771, 0.151959, 0.00215702, 0.000463161, 0.049019, 0.0724931, 0.208357 kWh (10 suppliers, which the file names only by identifier); sum of these 1.25 kWh; source Schulte-Schrepping K.-H. 2002; lognormal variance with pedigree 0.0408, pedigree (1,2,5,3,1)
  Literature value.
  EcoSpold01Location=UCTE
- sulfuric acid: 0.031836, 0.00416403 kg (2 suppliers, which the file names only by identifier); sum of these 0.036 kg; source Davenport W. G. 2002; lognormal variance with pedigree 0.0361, pedigree (4,4,4,3,3)
  Proxy: "sulfuric acid" is used as a proxy for electrolyte.
  Estimation: Taking copper electrowinning as approximation, 0.2 m3 electrolyte per tonne is bled (drained) and purified for recycling into electrolytic refining. It is assumed that all of this volume is replenished with fresh electrolyte (180 kg H2SO4 per m3), since no process data on the purification of spent electrolyte are available.
  EcoSpold01Location=RER
  properties: dry mass 1 kg, wet mass 1 kg

## Sampling procedure
Dataset based on literature. The input amount of cadmium sludge is calculated based on its cadmium content.

## Extrapolations
See Geography and Technology comments.
