# electricity, high voltage, production mix

Dataset: EcoSpold 2, unit process, production mix
Geography: CN-NCGC
Time period: 2021-01-01 to 2023-12-31
Scenario: Business-as-Usual
System model: Allocation, cut-off by classification
Generated by: [System]
Database: ecoinvent
isCopyrightProtected: true
accessRestrictedTo: 1

## General comment
The shares of electricity technologies on this market are valid for the year 2021. The shares been calculated by the data provider and don't correspond with the production volumes entered in the undefined datasets of the different electricity supplying technologies. The shares have been calculated based on statistics from 2021, except Inter-provincial exchanges are based on data from 2017:
Generation Data:
- National Bureau of Statistics Database Year 2021. Accessible via: https://data.stats.gov.cn/english/adv.htm?m=advquery&cn=E0101
Transmission and distribution losses:
- 2021 electricity & other energy statistics, translated and accessed via: https://chinaenergyportal.org/2021-electricity-other-energy-statistics-preliminary/
Inter-provincial exchanges:
- Li, W., Long, R., Zhang, L., He, Z., Chen, F. and Chen, H., 2020. Greenhouse Gas Emission Transfer of Inter-Provincial Electricity Trade in China. International Journal of Environmental Research and Public Health, 17(22), p.8375.

## Reference product
- electricity, high voltage: 1 kWh; By-product classification allocatable product; CPC 17100: Electrical energy; HS2017 271600: Electrical energy
  production volume 1.34041e12 kWh
    The production volume is valid for the year 2021. See general comment for sources.
  properties: carbon allocation 0 kg, carbon content 0, price 0.0977 EUR2005

## Inputs from technosphere
- electricity, high voltage: 0.00482923, 0.000267889, 0.00130997, 0.000124429, 0.00152416, 0.000138786, 0.000807449, 0.0143495, 0.374954, 0.000410506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 kWh (35 suppliers, which the file names only by identifier); sum of these 0.994083 kWh
  Calculated from electricity generation and trade statistics. See general comment for validity and sources.
  properties: price 0.0977 EUR2005
- electricity, high voltage: 0.00270933, 0.0030968, 0.000110847 kWh (3 suppliers, which the file names only by identifier); sum of these 0.00591698 kWh
  (same comment as for electricity, high voltage)
  properties: exergy 3.6 MJ, price 0.0977 EUR2005
