# treatment of waste paperboard, municipal incineration FAE

Dataset: EcoSpold 2, unit process
Geography: CH
Time period: 2006-01-01 to 2023-12-31
Technology level: current
Classification: ISIC rev.4 ecoinvent: 3821:Treatment and disposal of non-hazardous waste
Scenario: Business-as-Usual
System model: Allocation, cut-off by classification
Generated by: Nikolia Stoikou
Database: ecoinvent
isCopyrightProtected: true
accessRestrictedTo: 1

## General comment
The process represents the treatment of waste paperboard in a municipal solid waste incinerator (MSWI).This dataset represents the activity of waste disposal of 'waste paperboard' in a municipal solid waste incinerator (MSWI). Recommended use of this dataset: for paperboard, which goes to disposal as part of communal waste mixture.Inventoried waste consists of fraction: 100% cardboard; . Waste composition (wet, in ppmw): gross heating value 17.91 MJ/kg; net heating value 15.92 MJ/kg; H2O 104370; O 392680; H 57791; C 433270; S 1776.8; N 2583.5; P na; B na; Cl 7173.3; Br na; F na; I na; Ag na; As 1.168; Ba 57.193; Cd 0.93313; Co 0.91806; Cr 9.2403; Cu 35.113; Hg 0.30131; Mn 95.196; Mo na; Ni 10.64; Pb 28.963; Sb 0.0046044; Se 3.1073; Sn 6.7521; V na; Zn 63.333; Be 1.1299; Sc na; Sr 45.009; Ti na; Tl na; W na; Si na; Fe na; Ca na; Al na; K na; Mg na; Na na. Share of carbon in initial waste input that is biogenic 100%.Share of metals in waste not oxidised and bulk-recyclable (exclude very small or thin parts) Iron: 0%; Alu: 0%; Copper: 0%.Recovery of metal scrap from bottom ash to recycling: 0g iron scrap, 0g aluminium scrap, 0g copper scrap. From this waste, the FLUWA process in the technology mix recovers 0.000607kg (DM) of a hydroxide sludge to be recycled in zinc furnaces. Net energy production: 1.99MJ/kg electric energy and 3.99MJ/kg thermal energy.

## Included activities start
The activity starts with the waste being available at the gate of the treatment facility. Collection and transportation of the waste to the treatment plant is not included.

## Included activities end
The activity ends with the waste being treated and waste-specific emissions from the incineration process and auxiliary material consumption for flue gas cleaning are released to the environment (air and water). Infrastructure and waste-specific energy demands for Municipal Solid Waste Incineration (MSWI) and net energy generation are included.

## Geography
Modelling parameters affecting the treatment technology are specific to this geography and to the technology mix encountered in Switzerland in 2012.

## Technology
The waste is treated in the incineration plant with flue gas cleaning. Incineration is the controlled combustion of a waste and it includes fly ash extraction (FAE) . Auxiliary material consumption for this step of air pollution control (APC) are included in the process. Air polution control includes electrostatic precipitator for fly ash (ESP), wet flue gas scrubber and 25% SNCR , 42.77% SCR-high dust , 32.68% SCR-low dust -DeNOx facilities and 0% without DeNOx (weighted according to mass of burnt waste). Efficiency of iron scrap separation from slag : 58%. Efficiency of aluminium scrap separation from slag : 31%. Efficiency of copper scrap separation from slag : 31%. The technology mix for this dataset includes a filter ash treatment (FLUWA) of a share of 46.22%. Gross electric efficiency technology mix 15.84% and Gross thermal efficiency technology mix 28.51%

## Reference product
- waste paperboard: -1 kg; By-product classification Waste; CPC 39240: Waste and scrap of paper or paperboard; HS2017 470790: Paper or paperboard; waste and scrap, of paper or paperboard n.e.c. in heading no. 4707 and of unsorted was[...]
  main reference product of this activity (supply of disposal service).
  production volume 1.4226e8 kg
    based on corresponding global production volume of MSW fraction in conventional MSWI (wo fly ash extraction) and scaled down to annual Swiss incinerated MSW mass of 3.02 mio. tonnes.
  property price 0 EUR2005
    Waste products are assigned a price of zero as they are assumed to require further treatment.
  properties: antimony content 5.14098e-9, arsenic content 1.30409e-6, barium content 6.38575e-5, beryllium content 1.26159e-6, cadmium content 1.04186e-6, carbon allocation 0.433272 kg, carbon content 0.483761, carbon content, fossil 0, carbon content, non-fossil 0.483761, chlorine content 0.0080092, chromium content 1.0317e-5, cobalt content 1.02504e-6, copper content 3.92044e-5, dry mass 0.895633 kg, heating value, gross 19.9926 MJ, heating value, net 17.7721 MJ, hydrogen content 0.0645251, lead content 3.2338e-5, manganese content 0.000106289, mercury content 3.36424e-7, nickel content 1.188e-5, nitrogen content 0.00288457, oxygen content 0.438436, selenium content 3.46937e-6, strontium content 5.02534e-5, sulfur content 0.00198385, tin content 7.53889e-6, water content 0.116528, water in wet mass 0.104367 kg, wet mass 1 kg, zinc content 7.07128e-5

## Inputs from technosphere
- ammonia, anhydrous, liquid: 0.000677428 kg; lognormal variance with pedigree 0.58307, pedigree (1,1,4,1,1)
  Input to DeNOx stage (100% NH3).
  Uncertainty: uncertainty calculated from uncertainty in average DeNOx input, uncertainty in the share of thermal NOx, uncertainty of nitrogen content in average municipal waste and the uncertainty in nitrogen content in *this* waste.
  properties: dry mass 1 kg, wet mass 1 kg
- bottom ash, MSWI[F], waste paperboard: -0.0140403 kg; lognormal variance with pedigree 0.016673, pedigree (1,1,1,1,1)
  waste-specific bottom ash from the incineration of this waste
  Uncertainty: uncertainty is calculated from uncertainties in waste composition and transfer coefficients in incinerator
  production volume
    calculated in proportion to incinerated waste input
  properties: barium content 0.00419709, carbon content, non-fossil 0.211033, chlorine content 0.0113265, copper content 0.00332434, dry mass 0.707026 kg, manganese content 0.00758679, oxygen content 0.625661, strontium content 0.00453121, sulfur content 0.122269, water content 0.414375, wet mass 1 kg, zinc content 0.00283522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
- cationic resin: 1.5271e-6 kg; lognormal variance with pedigree 1.7305, pedigree (1,1,4,1,1)
  auxiliary input for mercury removal in filter ash treatment (FLUWA).
  Uncertainty: uncertainty calculated from uncertainty in of transfer coefficients in the incinerator, and the uncertainty of the waste composition of this waste
  properties: carbon content, fossil 0.521606, dry mass 0.5 kg, heating value, net 6.68 MJ, water content 1, wet mass 1 kg
- chemical, inorganic: 0.000130308 kg; lognormal variance with pedigree 0.30681, pedigree (1,1,4,1,1)
  auxiliary inputs for the wastewater treatment stage of the incinerator plant. Proxy for Polyelectrolyte.
  Uncertainty: uncertainty calculated from uncertainty in average Polyelectrolyte input, of transfer coefficients in the incinerator, and the uncertainty of the waste composition of this waste
  properties: carbon content, fossil 0.003, dry mass 1 kg, wet mass 1 kg
- chromium trioxide, flakes: 8.66174e-7 kg; lognormal variance with pedigree 0.90884, pedigree (1,1,4,1,1)
  Input to DeNOx stage. Active component in SCR catalyst (vanadium pentoxide, V2O5), here approximated with the available chromium trioxide.
  Uncertainty: uncertainty calculated from uncertainty in average DeNOx input, uncertainty in the share of thermal NOx, uncertainty of nitrogen content in average municipal waste and the uncertainty in nitrogen content in *this* waste.
  properties: dry mass 1 kg, wet mass 1 kg
- heat, district or industrial, natural gas: 0.126679 MJ; lognormal variance with pedigree 0.58307, pedigree (1,1,4,1,1)
  Input to DeNOx stage, to heat up flue gas in low-dust SCR.
  Uncertainty: uncertainty calculated from uncertainty in average DeNOx input, uncertainty in the share of thermal NOx, uncertainty of nitrogen content in average municipal waste and the uncertainty in nitrogen content in *this* waste.
  properties: heating value, net 1 MJ
- hydrochloric acid, without water, in 30% solution state: 0.000129332 kg; lognormal variance with pedigree 0.063399, pedigree (1,1,4,1,1)
  auxiliary inputs for the wastewater treatment stage of the incinerator plant.
  Uncertainty: uncertainty calculated from uncertainty in average HCl input, of transfer coefficients in the incinerator, and the uncertainty of the waste composition of this waste
  properties: dry mass 1 kg, heating value, net 3.32 MJ, wet mass 1 kg
- hydrogen peroxide, without water, in 50% solution state: 0.000241999 kg; lognormal variance with pedigree 0.061589, pedigree (1,1,4,1,1)
  auxiliary oxidising agent for filter ash treatment (FLUWA).
  Uncertainty: uncertainty calculated from uncertainty in of transfer coefficients in the incinerator, and the uncertainty of the waste composition of this waste
  properties: dry mass 1 kg, heating value, net 7.13 MJ, wet mass 1 kg
- iron(III) chloride, without water, in 40% solution state: 4.90037e-6 kg; lognormal variance with pedigree 0.45899, pedigree (1,1,4,1,1)
  auxiliary inputs for the wastewater treatment stage of the incinerator plant.
  Uncertainty: uncertainty calculated from uncertainty in average FeCl3 input, of transfer coefficients in the incinerator, and the uncertainty of the waste composition of this waste
  properties: dry mass 1 kg, wet mass 1 kg
- metalliferous hydroxide sludge: -0.00242785 kg; lognormal variance with pedigree 0.047093, pedigree (1,1,1,1,1)
  Metalliferous hydroxide sludge/zinc concentrate from filter ash leaching (FLUWA).
  Uncertainty: uncertainty is calculated from uncertainties in waste composition and transfer coefficients to filter ash in incinerator and the uncertainty of the transfer coefficients of the FLUWA process.
  production volume
    calculated in proportion to incinerated waste input
  properties: calcium content 0.1045, carbon content, non-fossil 0.0371274, chlorine content 0.284926, dry mass 0.25 kg, oxygen content 0.47769, phosphorus content 0.01557, potassium content 0.0122, sodium content 0.0163, sulfur content 0.18002, water content 3, wet mass 1 kg, zinc content 0.0184028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
  note on calcium content: Calculated as a production volume weighted average of properties of all the metalliferous hydroxide sludge products produced in the database.
- municipal waste incineration facility: 2.5e-10 unit
  Infrastructure demands per kilogram incinerated waste.
- quicklime, milled, packed: 0.00368635 kg; lognormal variance with pedigree 0.4358, pedigree (1,1,4,1,1)
  auxiliary inputs for the flue gas treatment stage of the incinerator plant.
  Uncertainty: uncertainty calculated from uncertainty in average CaO input, of transfer coefficients in the incinerator, and the uncertainty of the waste composition of this waste
  properties: dry mass 0.99 kg, water content 0.010101, wet mass 1 kg
- residues, MSWI[F], waste paperboard: -0.00382936 kg; lognormal variance with pedigree 0.071922, pedigree (1,1,1,1,1)
  waste-specific incineration residues (fly ash + scrubber sludge) from the incineration of this waste
  Uncertainty: uncertainty is calculated from uncertainties in waste composition and transfer coefficients in incinerator
  production volume
    calculated in proportion to incinerated waste input
  properties: barium content 0.0039878, carbon content, non-fossil 0.0916492, chlorine content 0.32488, chromium content 0.000603071, dry mass 1 kg, lead content 0.00211138, manganese content 0.00516014, oxygen content 0.471785, sulfur content 0.0915607, tin content 0.000594693, wet mass 1 kg, zinc content 0.00626034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
- sodium hydroxide, without water, in 50% solution state: 0.00141359 kg; lognormal variance with pedigree 0.20365, pedigree (1,1,4,1,1)
  auxiliary inputs for the flue gas treatment stage of the incinerator plant, and partially in the filter ash treatment (FLUWA).
  Uncertainty: uncertainty calculated from uncertainty in average NaOH input, of transfer coefficients in the incinerator, and the uncertainty of the waste composition of this waste
  properties: dry mass 1 kg, heating value, net 3.03 MJ, wet mass 1 kg
- spent activated carbon with mercury: -1.60747e-6 kg; lognormal variance with pedigree 1.7225, pedigree (1,1,1,1,1)
  Spent ion exchanger charged with mercury, from FLUWA filter ash treatment, approximated here with Spent activated carbon with mercury, deposited undergound in a polyethylene Big Bag.
  Uncertainty: uncertainty calculated from uncertainty in of transfer coefficients in the incinerator, and the uncertainty of the waste composition of this waste.
  production volume
    calculated in proportion to incinerated waste input
  properties: carbon content, fossil 0.6, dry mass 1 kg, heating value, net 18.18 MJ, wet mass 1 kg
- titanium dioxide: 4.24425e-5 kg; lognormal variance with pedigree 0.90884, pedigree (1,1,4,1,1)
  Input to DeNOx stage (TiO2 catalyst carrier)
  Uncertainty: uncertainty calculated from uncertainty in average DeNOx input, uncertainty in the share of thermal NOx, uncertainty of nitrogen content in average municipal waste and the uncertainty in nitrogen content in *this* waste.
  properties: dry mass 1 kg, wet mass 1 kg
- triazine-compound: 2.81465e-6 kg; lognormal variance with pedigree 1.6602, pedigree (1,1,4,1,1)
  auxiliary inputs for the wastewater treatment stage of the incinerator plant. Proxy for (pure) Trisodium-trimercapto-s-triazine (CAS 17766-26-6), used as 15% diluted solution, aka TMT15.
  Uncertainty: uncertainty calculated from uncertainty in average TMT15 input, of transfer coefficients in the incinerator, and the uncertainty of the waste composition of this waste
  properties: carbon content, fossil 0.475616, dry mass 1 kg, wet mass 1 kg
- water, decarbonised: 1.54478 kg; lognormal variance with pedigree 0.45899, pedigree (1,1,4,1,1)
  Incinerator process water used in flue gas scrubber stage.
  Uncertainty: uncertainty calculated from uncertainty in average water input, and the uncertainty of the waste composition of this waste
  properties: wet mass 1 kg

## Inputs from nature
- Oxygen [natural resource, in air]: 2.46481 kg; lognormal variance with pedigree 0.034244, pedigree (1,1,4,1,1)
  oxygen from ambient air needed to combust and oxidise this waste. Net demand, i.e. without O2 leaving the plant in flue gas uncombusted.
  Uncertainty: uncertainty is calculated from uncertainties in waste composition and transfer coefficients to flue gas and solid residues in incinerator

## Emissions to nature
- Ammonia [air, urban air close to ground]: 7.96483e-7 kg; lognormal variance with pedigree 0.63255, pedigree (1,1,4,1,1)
  Nitrogen species emitted to air after DeNOx stage.
  Uncertainty: uncertainty calculated from uncertainty in average N-emissions and uncertainty in the share of thermal NOx and the uncertainty in nitrogen content in *this* waste.
- Antimony ion [air, urban air close to ground]: 3.68842e-15 kg; lognormal variance with pedigree 1.9989, pedigree (1,1,4,1,1)
  Emission to air from waste composition and incinerator transfer coefficients.
  Uncertainty: uncertainty is calculated from uncertainties in waste composition and transfer coefficients in incinerator
- Arsenic ion [air, urban air close to ground]: 9.14916e-9 kg; lognormal variance with pedigree 1.5703, pedigree (1,1,4,1,1)
  (same comment as for Antimony ion)
- Barium II [air, urban air close to ground]: 2.24486e-7 kg; lognormal variance with pedigree 1.0608, pedigree (1,1,4,1,1)
  (same comment as for Antimony ion)
- Benzene [air, urban air close to ground]: 3.21024e-8 kg; lognormal variance with pedigree 0.098548, pedigree (1,1,4,1,1)
  Incomplete combustion product emitted to air.
  Uncertainty: uncertainty calculated from uncertainty in average operation emissions, and the uncertainty of the flue gas volume from this waste.
- Benzo(a)pyrene [air, urban air close to ground]: 7.14382e-13 kg; lognormal variance with pedigree 0.42724, pedigree (1,1,4,1,1)
  (same comment as for Benzene)
- Cadmium II [air, urban air close to ground]: 4.75623e-10 kg; lognormal variance with pedigree 1.6132, pedigree (1,1,4,1,1)
  (same comment as for Antimony ion)
- Carbon dioxide, non-fossil [air, urban air close to ground]: 1.57902 kg; lognormal variance with pedigree 0.027863, pedigree (1,1,4,1,1)
  (same comment as for Antimony ion)
- Carbon monoxide, non-fossil [air, urban air close to ground]: 5.45704e-5 kg; lognormal variance with pedigree 0.82322, pedigree (1,1,4,1,1)
  (same comment as for Benzene)
- Chromium III [air, urban air close to ground]: 8.06869e-9 kg; lognormal variance with pedigree 1.31, pedigree (1,1,4,1,1)
  (same comment as for Antimony ion)
- Cobalt II [air, urban air close to ground]: 1.66966e-9 kg; lognormal variance with pedigree 1.606, pedigree (1,1,4,1,1)
  (same comment as for Antimony ion)
- Copper ion [air, urban air close to ground]: 3.216e-9 kg; lognormal variance with pedigree 1.1416, pedigree (1,1,4,1,1)
  (same comment as for Antimony ion)
- Cyanide [air, urban air close to ground]: 8.27832e-6 kg; lognormal variance with pedigree 1.3172, pedigree (1,1,4,1,1)
  (same comment as for Ammonia)
- Dinitrogen monoxide [air, urban air close to ground]: 3.85324e-5 kg; lognormal variance with pedigree 1.3172, pedigree (1,1,4,1,1)
  (same comment as for Ammonia)
- Dioxins, measured as 2,3,7,8-tetrachlorodibenzo-p-dioxin [air, urban air close to ground]: 6.42005e-14 kg; lognormal variance with pedigree 0.42724, pedigree (1,1,4,1,1)
  (same comment as for Benzene)
- Heat, waste [air, urban air close to ground]: 12.7722 MJ; lognormal variance with pedigree 0.059089, pedigree (1,1,4,1,1)
  Waste heat generated from heating value of this waste plus any electricity required to process it.
  Uncertainty: uncertainty is calculated from uncertainties in waste composition and uncertainties in energy efficiency and the uncertainty in internal energy demand
- Hexachlorobenzene [air, urban air close to ground]: 6.71245e-11 kg; lognormal variance with pedigree 0.098548, pedigree (1,1,4,1,1)
  (same comment as for Benzene)
- Hydrochloric acid [air, urban air close to ground]: 4.09348e-6 kg; lognormal variance with pedigree 0.43886, pedigree (1,1,4,1,1)
  (same comment as for Antimony ion)
- Lead II [air, urban air close to ground]: 2.38612e-9 kg; lognormal variance with pedigree 1.171, pedigree (1,1,4,1,1)
  (same comment as for Antimony ion)
- Manganese II [air, urban air close to ground]: 1.81803e-8 kg; lognormal variance with pedigree 1.0093, pedigree (1,1,4,1,1)
  (same comment as for Antimony ion)
- Mercury II [air, urban air close to ground]: 8.54333e-9 kg; lognormal variance with pedigree 1.7409, pedigree (1,1,4,1,1)
  (same comment as for Antimony ion)
- Methane, non-fossil [air, urban air close to ground]: 4.81537e-7 kg; lognormal variance with pedigree 0.098548, pedigree (1,1,4,1,1)
  (same comment as for Benzene)
- NMVOC, non-methane volatile organic compounds [air, urban air close to ground]: 1.46097e-6 kg; lognormal variance with pedigree 0.098548, pedigree (1,1,4,1,1)
  (same comment as for Benzene)
- Nickel II [air, urban air close to ground]: 1.33663e-8 kg; lognormal variance with pedigree 1.2881, pedigree (1,1,4,1,1)
  (same comment as for Antimony ion)
- Nitrogen oxides [air, urban air close to ground]: 0.00025222 kg; lognormal variance with pedigree 0.63255, pedigree (1,1,4,1,1)
  sum of fuel-NOx and thermal-NOx emitted to air after DeNOx stage.
  Uncertainty: uncertainty calculated from uncertainty in average N-emissions and uncertainty in the share of thermal NOx and the uncertainty in nitrogen content in *this* waste.
- Particulate Matter, < 2.5 um [air, urban air close to ground]: 3.83277e-6 kg; lognormal variance with pedigree 0.42724, pedigree (1,1,4,1,1)
  (same comment as for Benzene)
- Particulate Matter, > 2.5 um and < 10um [air, urban air close to ground]: 1.92602e-8 kg; lognormal variance with pedigree 0.2058, pedigree (1,1,4,1,1)
  (same comment as for Benzene)
- Pentachlorobenzene [air, urban air close to ground]: 1.69608e-10 kg; lognormal variance with pedigree 0.098548, pedigree (1,1,4,1,1)
  (same comment as for Benzene)
- Pentachlorophenol [air, urban air close to ground]: 1.39802e-11 kg; lognormal variance with pedigree 0.098548, pedigree (1,1,4,1,1)
  (same comment as for Benzene)
- Selenium IV [air, urban air close to ground]: 3.70697e-8 kg; lognormal variance with pedigree 1.4407, pedigree (1,1,4,1,1)
  (same comment as for Antimony ion)
- Strontium II [air, urban air close to ground]: 4.50086e-9 kg; lognormal variance with pedigree 1.1122, pedigree (1,1,4,1,1)
  (same comment as for Antimony ion)
- Sulfur dioxide [air, urban air close to ground]: 1.88954e-5 kg; lognormal variance with pedigree 0.60297, pedigree (1,1,4,1,1)
  (same comment as for Antimony ion)
- Tin ion [air, urban air close to ground]: 4.4105e-12 kg; lognormal variance with pedigree 1.4045, pedigree (1,1,4,1,1)
  (same comment as for Antimony ion)
- Toluene [air, urban air close to ground]: 6.42049e-8 kg; lognormal variance with pedigree 0.098548, pedigree (1,1,4,1,1)
  (same comment as for Benzene)
- Water [air, urban air close to ground]: 0.00158015 m3; lognormal variance with pedigree 1.5764, pedigree (1,1,4,1,1)
  water vapour from waste humidity, hydrogen oxidation and part of the process water.
  Uncertainty: Uncertainty calculated from uncertainty in waste composition, process water input and the uncertainty of fraction to air.
- Zinc II [air, urban air close to ground]: 4.24497e-8 kg; lognormal variance with pedigree 1.0534, pedigree (1,1,4,1,1)
  (same comment as for Antimony ion)
- Non-hazardous waste disposed [inventory indicator, waste]: 1 kg
  Inventory indicator for waste mass disposed. To be used in EN15804 "other data" results.
- Antimony ion [water, surface water]: 4.99638e-11 kg; lognormal variance with pedigree 1.8989, pedigree (1,1,4,1,1)
  Emissions to water from waste composition and incinerator transfer coefficients.
  Uncertainty: uncertainty is calculated from uncertainties in waste composition and transfer coefficients in incinerator
- Arsenic ion [water, surface water]: 5.74779e-16 kg; lognormal variance with pedigree 1.5148, pedigree (1,1,4,1,1)
  (same comment as for Antimony ion)
- BOD5, Biological Oxygen Demand [water, surface water]: 0.000318905 kg; lognormal variance with pedigree 0.039562, pedigree (1,1,4,1,1)
  (same comment as for Antimony ion)
- Barium II [water, surface water]: 1.76701e-8 kg; lognormal variance with pedigree 0.65903, pedigree (1,1,4,1,1)
  (same comment as for Antimony ion)
- Beryllium II [water, surface water]: 4.35569e-12 kg; lognormal variance with pedigree 1.2261, pedigree (1,1,4,1,1)
  (same comment as for Antimony ion)
- COD, Chemical Oxygen Demand [water, surface water]: 0.000318905 kg; lognormal variance with pedigree 0.039562, pedigree (1,1,4,1,1)
  (same comment as for Antimony ion)
- Cadmium II [water, surface water]: 8.51741e-11 kg; lognormal variance with pedigree 1.2009, pedigree (1,1,4,1,1)
  (same comment as for Antimony ion)
- Chloride [water, surface water]: 0.00563987 kg; lognormal variance with pedigree 0.18306, pedigree (1,1,4,1,1)
  (same comment as for Antimony ion)
- Chromium III [water, surface water]: 1.19962e-9 kg; lognormal variance with pedigree 0.86027, pedigree (1,1,4,1,1)
  (same comment as for Antimony ion)
- Cobalt II [water, surface water]: 1.0747e-11 kg; lognormal variance with pedigree 0.98632, pedigree (1,1,4,1,1)
  (same comment as for Antimony ion)
- Copper ion [water, surface water]: 1.75743e-9 kg; lognormal variance with pedigree 1.1226, pedigree (1,1,4,1,1)
  (same comment as for Antimony ion)
- DOC, Dissolved Organic Carbon [water, surface water]: 0.000139521 kg; lognormal variance with pedigree 0.039562, pedigree (1,1,4,1,1)
  (same comment as for Antimony ion)
- Heat, waste [water, surface water]: 3.13947 MJ; lognormal variance with pedigree 0.059089, pedigree (1,1,4,1,1)
  (same comment as for Heat, waste)
- Lead II [water, surface water]: 1.53074e-9 kg; lognormal variance with pedigree 0.96493, pedigree (1,1,4,1,1)
  (same comment as for Antimony ion)
- Manganese II [water, surface water]: 7.49964e-9 kg; lognormal variance with pedigree 0.79893, pedigree (1,1,4,1,1)
  (same comment as for Antimony ion)
- Mercury II [water, surface water]: 8.4765e-11 kg; lognormal variance with pedigree 1.7031, pedigree (1,1,4,1,1)
  (same comment as for Antimony ion)
- Nickel II [water, surface water]: 3.46814e-10 kg; lognormal variance with pedigree 0.9887, pedigree (1,1,4,1,1)
  (same comment as for Antimony ion)
- Nitrate [water, surface water]: 1.16212e-5 kg; lognormal variance with pedigree 0.31137, pedigree (1,1,4,1,1)
  (same comment as for Antimony ion)
- Selenium IV [water, surface water]: 3.30016e-8 kg; lognormal variance with pedigree 1.1124, pedigree (1,1,4,1,1)
  (same comment as for Antimony ion)
- Strontium II [water, surface water]: 1.08692e-9 kg; lognormal variance with pedigree 1.1006, pedigree (1,1,4,1,1)
  (same comment as for Antimony ion)
- Sulfate [water, surface water]: 0.000281162 kg; lognormal variance with pedigree 0.45328, pedigree (1,1,4,1,1)
  (same comment as for Antimony ion)
- TOC, Total Organic Carbon [water, surface water]: 0.000139521 kg; lognormal variance with pedigree 0.039562, pedigree (1,1,4,1,1)
  (same comment as for Antimony ion)
- Tin ion [water, surface water]: 5.95999e-9 kg; lognormal variance with pedigree 1.2803, pedigree (1,1,4,1,1)
  (same comment as for Antimony ion)
- Water [water, surface water]: 0.00052876 m3; lognormal variance with pedigree 1.9093, pedigree (1,1,4,1,1)
  process water released to surface water.
  Uncertainty: uncertainty calculated from uncertainty in process water input and the uncertainty of fraction to surface water.
- Zinc II [water, surface water]: 2.54033e-9 kg; lognormal variance with pedigree 0.94102, pedigree (1,1,4,1,1)
  (same comment as for Antimony ion)
