# blower and heat exchange unit production, Twl-700

Dataset: EcoSpold 2, unit process
Geography: RoW
Time period: 2003-01-01 to 2023-12-31
Technology level: current
Classification: ISIC rev.4 ecoinvent: 2819:Manufacture of other general-purpose machinery
Classification: EcoSpold01Categories: ventilation/production of components
Tags: ConvertedDataset
Scenario: Business-as-Usual
System model: Allocation, cut-off by classification
Generated by: Alex Primas
Published in: Hässig, W. 2007
Database: ecoinvent
isCopyrightProtected: true
accessRestrictedTo: 1

## General comment
Production of a typical component used for a central ventilation system in a multi family house. The house considered in the investigation includes 6 flats with 130 m2 floor area each and a ventilation rate of 120 m3/h.
[This dataset was already contained in the ecoinvent database version 2. It was not individually updated during the transfer to ecoinvent version 3. Life Cycle Impact Assessment results may still have changed, as they are affected by changes in the supply chain, i.e. in other datasets. This dataset was generated following the ecoinvent quality guidelines for version 2. It may have been subject to central changes described in the ecoinvent version 3 change report (http://www.ecoinvent.org/database/ecoinvent-version-3/reports-of-changes/), and the results of the central updates were reviewed extensively. The changes added e.g. consistent water flows and other information throughout the database. The documentation of this dataset can be found in the ecoinvent reports of version 2, which are still available via the ecoinvent website. The change report linked above covers all central changes that were made during the conversion process.]

## Included activities end
Materials used for the production. Estimation of electricity use for the different production steps. Energy use for heating of the production building. Transport of raw materials to the plant. Estimation for the Infrastructure of the Production site included.

## Geography
Data for production in Austria used.

## Technology
Ventilation unit for decentral ventilation systems with 700 m3/h maximal air flow. Housing mainly made of galvanised steel insulated with rock wool. Heat recovery element made of aluminium. Total weight of component 120 kg

## Time period
Materials investigated in 2003

## Reference product
- blower and heat exchange unit, Twl-700: 1 unit; By-product classification allocatable product; CPC 43911: Producer gas or water gas generators; acetylene gas generators and similar water process gas generators; disti[…]; HS2017 841950: Heat exchange units; not used for domestic purposes
  EcoSpold01Location=RER
  production volume 2.67763 unit
    This is a placeholder value that does not reflect real-world production volumes. This dataset does not currently require a real-world production volume to work in the database framework, and no actual data were collected yet. This has no negative effect on the results of the ecoinvent database.
  property carbon content, fossil 0.00937235
    C content was calculated as an addition of C content in the product components
  property carbon content, non-fossil 6.11556e-7
    C content was calculated as an addition of C content in the product components
  property price 1498 EUR2005
    Convert from EU 27 price to the world by currency exchange rate.
  properties: carbon allocation 1.12476 kg, carbon content 0.00937297, dry mass 120 kg, water content 0, water in wet mass 0 kg, wet mass 120 kg

## Inputs from technosphere
- aluminium, wrought alloy: 25.1 kg; lognormal variance with pedigree 0.0546, pedigree (2,4,5,5,1)
  EcoSpold01Location=RER
  Questionnaire
  Uncertainty: Questionnaire
  properties: dry mass 1 kg, wet mass 1 kg
- copper, cathode: 1.65 kg; lognormal variance with pedigree 0.056, pedigree (3,4,5,5,1)
  EcoSpold01Location=RER
  Questionnaire, estimations
  Uncertainty: Questionnaire, estimations
  properties: dry mass 1 kg, wet mass 1 kg
- electricity, medium voltage: 1.72811, 34.4718, 11.5824, 0.529205, 0.10592, 0.0227434, 3.55975 kWh (7 suppliers, which the file names only by identifier); sum of these 52 kWh; lognormal variance with pedigree 0.11, pedigree (3,5,5,5,3)
  EcoSpold01Location=UCTE
  Data estimated from related processes
  Uncertainty: Data estimated from related processes
- electronics, for control units: 0.6 kg; lognormal variance with pedigree 0.074, pedigree (3,4,5,5,3)
  EcoSpold01Location=RER
  Questionnaire, approximation for technology
  Uncertainty: Questionnaire, approximation for technology
  properties: carbon content, fossil 0.337146, carbon content, non-fossil 0.00013442, dry mass 1 kg, wet mass 1 kg
  note on carbon content, fossil: The control unit has a composition of 46% steel (housing), 32% plastics, 14% printed wiring boards and 8% cables (various types).;
- heat, district or industrial, natural gas: 3.88572, 236.464 MJ (2 suppliers, which the file names only by identifier); sum of these 240.35 MJ; lognormal variance with pedigree 0.078, pedigree (4,5,5,5,1)
  EcoSpold01Location=RER
  Data estimated from related companies
  Uncertainty: Data estimated from related companies
  properties: heating value, net 1 MJ
- heat, district or industrial, other than natural gas: 240.239, 0.111298 MJ (2 suppliers, which the file names only by identifier); sum of these 240.35 MJ; lognormal variance with pedigree 0.072, pedigree (1,1,5,5,1)
  EcoSpold01Location=RER
  4,5,1,1,1,5; Data estimated from related companies
  properties: heating value, net 1 MJ
- inert waste, for final disposal: -1 kg; lognormal variance with pedigree 0.032, pedigree (4,4,1,5,1)
  Estimations on precentage material disposed
  EcoSpold01Location=CH
  Uncertainty: Estimations on precentage material disposed
  production volume
    Calculated from the production volume of blower and heat exchange unit, Twl-700 in proportion to the respective output amounts.
  properties: dry mass 0.995 kg, water content 0.00502513, wet mass 1 kg
- injection moulding: 0.63 kg; lognormal variance with pedigree 0.0546, pedigree (2,4,5,5,1)
  Questionnaire
  EcoSpold01Location=RER
  Uncertainty: Questionnaire
- laminating service, foil, with acrylic binder: 4 m2; lognormal variance with pedigree 0.074, pedigree (3,4,5,5,3)
  (same comment as for electronics, for control units)
- packaging film, low density polyethylene: 0.408 kg; lognormal variance with pedigree 0.056, pedigree (3,4,5,5,1)
  Questionnaire, estimations
  EcoSpold01Location=RER
  Uncertainty: Questionnaire, estimations
  properties: carbon content, fossil 0.857143, dry mass 1 kg, heating value, net 42.47 MJ, wet mass 1 kg
  note on carbon content, fossil: Polyethylene is formed out of a huge amount of ethylene monomers (C2H4) (ecoinvent v2.2 report 11_II). MW=28 g/mol
- sheet rolling, aluminium: 25.1 kg; lognormal variance with pedigree 0.056, pedigree (3,4,5,5,1)
  Questionnaire, estimations
  EcoSpold01Location=RER
  Uncertainty: Questionnaire, estimations
- sheet rolling, steel: 92.8 kg; lognormal variance with pedigree 0.056, pedigree (3,4,5,5,1)
  EcoSpold01Location=RER
  Questionnaire, estimations
  Uncertainty: Questionnaire, estimations
- steel, low-alloyed: 33.1 kg; lognormal variance with pedigree 0.0546, pedigree (2,4,5,5,1)
  Questionnaire
  EcoSpold01Location=RER
  Uncertainty: Questionnaire
  properties: carbon content, fossil 0.005, dry mass 1 kg, wet mass 1 kg
  note on carbon content, fossil: Low alloyed steel composition given in Tab. 3.2 ecoinvent v2.2 report 10_partII. Steel assumed to have a C content of 0.5%
- steel, unalloyed: 59.8 kg; lognormal variance with pedigree 0.0546, pedigree (2,4,5,5,1)
  EcoSpold01Location=RER
  Questionnaire
  Uncertainty: Questionnaire
  properties: carbon content, fossil 0.0025, dry mass 1 kg, wet mass 1 kg
  note on carbon content, fossil: Unalloyed steels or carbon steels are those in which the level of an individual element in no case reaches or exceeds the limiting concentration given in Tab. 3.1 ecoinvent v2.2 report 10_partII. Assumed to have a C content of 0.25%
- stone wool, packed: 11 kg; lognormal variance with pedigree 0.0546, pedigree (2,4,5,5,1)
  EcoSpold01Location=CH
  Questionnaire
  Uncertainty: Questionnaire
  properties: carbon content, fossil 0.015401, dry mass 1 kg, wet mass 1 kg
  note on carbon content, fossil: The chemical composition of the glass fibres used in the rock wool production is similar to the composition of naturally cooled volcano basalt and has a composition listed in Tab. 3.1 and 3.2 in ecoinvent v2.2 report 16, part XIV. Rock wool contains: a minimum of 96% mineral fibres,between 0.5 and 3.0 weight percent of phenolic resin depending on the specific product characteristics, and about 0.2 percent mineral oil (ecoinvent v2.2 report 16, part XIV). An average composition of 1.8% phenolic resin, 0.2% mineral oil, and 98% mineral fibres has been assumed and used to calculate C content of the rock wool
- synthetic rubber: 0.63 kg; lognormal variance with pedigree 0.0546, pedigree (2,4,5,5,1)
  Questionnaire
  EcoSpold01Location=RER
  Uncertainty: Questionnaire
  properties: carbon content, fossil 0.871949, dry mass 1 kg, heating value, net 26.42 MJ, wet mass 1 kg
  note on carbon content, fossil: EPDM (Ethylene-propene-diene terpolymer) rubber is a terpolymer of ethylene, propene, and a diene with the residual unsaturated portion of the diene in the side chain (ecoinvent v2.2 report 7-part XX & Ullmann). Chemical formula (deduced from Evidences of Solvent-Induced Miscibility in Polychloroprene-co-Ethylene-Propene Diene Terpolymer Blends, Dubey et al., Journal of Applied Polymer Science, 2009, 111:1884–1891): C20H35
- ventilation components factory: 4.81e-7 unit; lognormal variance with pedigree 0.396, pedigree (4,5,5,5,3)
  Calculated with data of a similar company
  EcoSpold01Location=RER
  Uncertainty: Calculated with data of a similar company
- waste polyethylene: -5.08026e-7, -1.29527e-6, -5.34993e-7, -9.79591e-8, -0.00797796, -2.16131e-7, -1.93856e-5 kg (7 suppliers, which the file names only by identifier); sum of these -0.008 kg; lognormal variance with pedigree 0.032, pedigree (4,4,1,5,1)
  (same comment as for inert waste, for final disposal)
  production volume
    (same comment as for inert waste, for final disposal)
  properties: carbon content, fossil 0.825301, dry mass 0.996 kg, heating value, net 42.47 MJ, water content 0.00401606, wet mass 1 kg
  note on carbon content, fossil: C content in 1 kg DM was calculated using data in Tab A.1, ecoinvent v2.2 report 13_I
  note on heating value, net: Value taken from the general comment of the treatment dataset.
- waste rubber, unspecified: -0.03 kg; lognormal variance with pedigree 0.032, pedigree (4,4,1,5,1)
  EcoSpold01Location=CH
  Estimations on precentage material disposed
  Uncertainty: Estimations on precentage material disposed
  production volume
    (same comment as for inert waste, for final disposal)
  properties: carbon content, fossil 0.853, dry mass 1 kg, heating value, net 27.19 MJ, wet mass 1 kg
- wire drawing, copper: 1.65 kg; lognormal variance with pedigree 0.056, pedigree (3,4,5,5,1)
  Questionnaire, estimations
  EcoSpold01Location=RER
  Uncertainty: Questionnaire, estimations
- zinc coat, coils: 21 m2; lognormal variance with pedigree 0.056, pedigree (3,4,5,5,1)
  Questionnaire, estimations
  EcoSpold01Location=RER
  Uncertainty: Questionnaire, estimations

## Sampling procedure
Questionnaire and technical information of producer. Data of one common product used.

## Extrapolations
none This dataset has been copied from an original dataset covering the geography RER. The uncertainty has been adjusted accordingly.

## Review by Rolf Frischknecht 2007-08-16
passed
none
