# nutrient supply from ammonia, anhydrous, liquid

Dataset: EcoSpold 2, unit process
Geography: RU
Time period: 2016-01-01 to 2023-12-31
Technology level: current
Classification: ISIC rev.4 ecoinvent: 0161:Support activities for crop production
Scenario: Business-as-Usual
System model: Allocation, cut-off by classification
Generated by: Avraam Symeonidis
Database: ecoinvent
isCopyrightProtected: true
accessRestrictedTo: 1

## General comment
This inventory describes the supply of nutrients from ''ammonia, anhydrous, liquid'' for fertiliser use.
No machinery expenditures or emissions to the environment are considered related to the actual application of this substance on soil during its agricultural use. The purpose of this activity is to connect the chemical production of ''ammonia, anhydrous, liquid'' with its generic use as fertilizer. The product ''ammonia, anhydrous, liquid'' is connected to the generic market for ''inorganic nitrogen fertiliser, as N'' through this supplying activity. In the agricultural context, ''ammonia, anhydrous, liquid'' can be used directly as a fertilizer input to crop production, eventually with other chemicals; alternatively, a generic input of ''inorganic nitrogen fertiliser, as N'' can be used instead, and this will represent the regional consumption mix for this type of nutrient. A way in between is allowed by using the generic input ''inorganic nitrogen fertiliser, as N'' and link to the activity providing it from a specific chemical.
In all cases, emissions associated to the application of the fertilizer have to be calculated in the crop production activity.

## Technology
Inventory based on composition of ''ammonia, anhydrous, liquid''.

## Reference product
- inorganic nitrogen fertiliser, as N: 1 kg; name RP; By-product classification allocatable product; CPC 34619: Other nitrogenous fertilizers and mixtures, n.e.c.; HS2017 310229: Fertilizers, mineral or chemical; nitrogenous, other than ammonium sulphate
  production volume 2.60913e9 kg; = (51861309+7749391+17487100+5335100+20566100+8857800+9009500+15795400+17194800+1802200+8056500)*1000*0.82245279*0.0193774046572226
    The production volume has been extrapolated from the global production volume of this product in the database by employing GDP scaling. GDP for Russian Federation is calculated to amount circa 1.9% of the global GDP. Original comment of the GLO dataset is: The production volume of ammonia is calculated considering the 2 production activities “ammonia production, partial oxidation, liquid” and “ammonia production, steam reforming, liquid”. Based on the PVs of CN, FSU, RAF, RER, RLA, RME, RNA, SAS, UN-OCEANIA, and UN-SEASIA (Source: International Fertilizers Association (2014)) a global PV is calculated. The nitrogen content is 0.82245279 and thus 134648023005.408 Kg of inorganic nitrogen are produced from ammonia. References: United Nations, Statistics division, 2020, GDP/breakdown at current prices in US Dollars (all countries and regions), All countries and regions/subregions (totals) for all years - sorted by region/subregion,
    Available at: https://unstats.un.org/unsd/snaama/Downloads
  property carbon content, fossil 0
    Carbon content, fossil is calculated based on the chemical formula of the substance.
  property nitrogen content 1
    Nitrogen content (on a dry matter basis) of inorganic nitrogen fertiliser, as N is calculated from the molecular formula of the substance (Nitrogen).
  property price 0.473 EUR2005
    Temporary price data. Calculated as 90% of purchasers price based on: 2004 prices are calculated on basis of Import/Export data (tonnes and US$) from UN Trade Statistics Database (http://data.un.org/Browse.aspx?d=ComTrade, accessed 7/7-2010). N, P2O5, or K2O content (http://www.fertilizer.org/ifa/Home-Page/STATISTICS/Conversions-factors)
  properties: carbon allocation 0 kg, carbon content 0, carbon content, non-fossil 0, dry mass 1 kg, water content 0, water in wet mass 0 kg, wet mass 1 kg

## Inputs from technosphere
- ammonia, anhydrous, liquid: 0.20236, 1.01352 kg (2 suppliers, which the file names only by identifier); sum of these 1.21588 kg; lognormal variance with pedigree 0.172, pedigree (3,5,3,1,4)
  properties: dry mass 1 kg, hydrogen content 0.177547, nitrogen content 0.822453, wet mass 1 kg
  note on hydrogen content: Hydrogen content (on a dry matter basis) of ammonia, anhydrous, liquid is calculated from the molecular formula of the substance (H3N).
  note on nitrogen content: Nitrogen content (on a dry matter basis) of ammonia, anhydrous, liquid is calculated from the molecular formula of the substance (H3N).
