# printed wiring board production, through-hole mounted, unspecified, Pb containing

Dataset: EcoSpold 2, unit process
Geography: GLO
Time period: 2005-01-01 to 2023-12-31
Technology level: current
Classification: ISIC rev.4 ecoinvent: 2610:Manufacture of electronic components and boards
Classification: EcoSpold01Categories: electronics/module
Tags: ConvertedDataset
Scenario: Business-as-Usual
System model: Allocation, cut-off by classification
Generated by: Roland Hischier
Published in: Hischier R. 2007
Database: ecoinvent
isCopyrightProtected: true
accessRestrictedTo: 1

## General comment
This dataset represents 1 kg of an unspecified, through-hole mounted, PWB used in electronic devices. Main data are based on literature and own dismantling activities, for the PWB of a television and of a power supply unit of a Intel PII desktop PC . Infrastructure and production efforts are based on own assumptions.
[This dataset was already contained in the ecoinvent database version 2. It was not individually updated during the transfer to ecoinvent version 3. Life Cycle Impact Assessment results may still have changed, as they are affected by changes in the supply chain, i.e. in other datasets. This dataset was generated following the ecoinvent quality guidelines for version 2. It may have been subject to central changes described in the ecoinvent version 3 change report (http://www.ecoinvent.org/database/ecoinvent-version-3/reports-of-changes/), and the results of the central updates were reviewed extensively. The changes added e.g. consistent water flows and other information throughout the database. The documentation of this dataset can be found in the ecoinvent reports of version 2, which are still available via the ecoinvent website. The change report linked above covers all central changes that were made during the conversion process.]

## Included activities start
From reception of solder materials at the factory gate.

## Included activities end
This dataset includes component input and production efforts (incl. PWB waste due to failure in mounting) for the production of an unspecified, through-hole mounted, PWB, using Pb-containing solder material.

## Geography
Data represent a global valuable example for a unspecified, through-hole mounted, PWB.

## Technology
Average PWB mounting technology (wave soldering)

## Reference product
- printed wiring board, through-hole mounted, unspecified, Pb containing: 1 kg; By-product classification allocatable product; CPC 47130: Printed circuits; HS2017 853400: Circuits; printed
  EcoSpold01Location=GLO
  Typically, a printed wiring board (PWB) consists of a number of electric current conducting and non-conducting layers which are sandwiched together. Printed wiring boards are the interconnective electrical framework and physical structure that hold together the various electronic components.
  production volume 1 kg
    Dummy value to be replaced by measured, estimated or calculated value
  property carbon content, fossil 0.254073
    C content was calculated as the addition of C content in the PWB components
  property carbon content, non-fossil 0.00192028
    C content was calculated as the addition of C content in the PWB components
  property price 43.9253 EUR2005
    Calculated based on inputs: The price of the product has been calculated as a sum of the values of the material and energy inputs for this product. This value is therefore a rough estimation. It may underestimate the real price since there are additional expenses when producing any product. These expences can include for example labour costs, treatment of waste materials and profit for the producer. Please consider carefully whether this level of data quality is acceptable for your application.
  properties: carbon allocation 0.255994 kg, carbon content 0.255994, dry mass 1 kg, water content 0, water in wet mass 0 kg, wet mass 1 kg

## Inputs from technosphere
- aluminium, wrought alloy: 0.16 kg; source Behrendt S 1998; lognormal variance with pedigree 0.0701, pedigree (3,5,5,3,1)
  EcoSpold01Location=RER
  Estimation, based on literature and own dismantling activities.
  Uncertainty: own assumptions - from literature & dismantling
  properties: dry mass 1 kg, wet mass 1 kg
- capacitor, electrolyte type, < 2cm height: 0.021837 kg; source Behrendt S 1998; lognormal variance with pedigree 0.0701, pedigree (3,5,5,3,1)
  EcoSpold01Location=GLO
  Estimation, based on literature and own dismantling activities.
  Uncertainty: own assumptions - from literature & dismantling
  properties: carbon content, fossil 0.189636, carbon content, non-fossil 0.0222053, dry mass 1 kg, wet mass 1 kg
  note on carbon content, fossil: Calculated as the addition of C contents in the product composition, and referred to 1 kg capacitors, and then to 1 kg DM
- capacitor, electrolyte type, > 2cm height: 0.036939 kg; source Behrendt S 1998; lognormal variance with pedigree 0.0701, pedigree (3,5,5,3,1)
  (same comment as for capacitor, electrolyte type, < 2cm height)
  properties: carbon content, fossil 0.16971, carbon content, non-fossil 0.0349727, dry mass 1 kg, wet mass 1 kg
- capacitor, film type, for through-hole mounting: 0.076429 kg; source Behrendt S 1998; lognormal variance with pedigree 0.0701, pedigree (3,5,5,3,1)
  (same comment as for capacitor, electrolyte type, < 2cm height)
  properties: carbon content, fossil 0.278876, dry mass 1 kg, wet mass 1 kg
- capacitor, tantalum-, for through-hole mounting: 0.012551 kg; lognormal variance with pedigree 0.0701, pedigree (3,5,5,3,1)
  Estimation, based on literature and own dismantling activities.
  This flow replaces the old capacitor, production mix
  Uncertainty: own assumptions - from literature & dismantling
  property carbon content, fossil 0.181224; name C_content_fossil
  property carbon content, non-fossil 0; name C_content_non_fossil
  property water content 0; name water_content
  property water in wet mass 0 kg; name WWM
  properties: dry mass 1 kg, wet mass 1 kg
- diode, glass-, for through-hole mounting: 0.0060816 kg; source Behrendt S 1998; lognormal variance with pedigree 0.0701, pedigree (3,5,5,3,1)
  Estimation, based on literature and own dismantling activities.
  EcoSpold01Location=GLO
  Uncertainty: own assumptions - from literature & dismantling
  properties: carbon content, fossil 0.0203273, dry mass 1 kg, wet mass 1 kg
  note on carbon content, fossil: Calculated as the addition of C contents in the product composition
- inductor, ring core choke type: 0.33061 kg; source Behrendt S 1998; lognormal variance with pedigree 0.0701, pedigree (3,5,5,3,1)
  (same comment as for capacitor, electrolyte type, < 2cm height)
  properties: carbon content, fossil 0.445934, dry mass 1 kg, wet mass 1 kg
  note on carbon content, fossil: Calculated as the addition of C contents in the product composition, and referred to 1 kg DM inductor
- integrated circuit, logic type: 0.017959 kg; source Behrendt S 1998; lognormal variance with pedigree 0.0701, pedigree (3,5,5,3,1)
  (same comment as for capacitor, electrolyte type, < 2cm height)
  properties: carbon content, fossil 0.221701, dry mass 1 kg, wet mass 1 kg
- mounting, through-hole technology, Pb-containing solder: 0.058367 m2; source Behrendt S 1998; lognormal variance with pedigree 0.0701, pedigree (3,5,5,3,1)
  (same comment as for diode, glass-, for through-hole mounting)
- printed wiring board, for through-hole mounting, Pb containing surface: 0.058367 m2; source Behrendt S 1998; lognormal variance with pedigree 0.0701, pedigree (3,5,5,3,1)
  (same comment as for diode, glass-, for through-hole mounting)
  properties: carbon content, fossil 0.203154, dry mass 3.08 kg, wet mass 3.08 kg
  note on carbon content, fossil: C content was calculated as the addition of C content in the PWB components, and then referred to 1 kg DM
- resistor, metal film type, through-hole mounting: 0.02051 kg; source Behrendt S 1998; lognormal variance with pedigree 0.0701, pedigree (3,5,5,3,1)
  (same comment as for diode, glass-, for through-hole mounting)
  properties: carbon content, fossil 0.029003, dry mass 1 kg, wet mass 1 kg
  note on carbon content, fossil: Calculated as the addition of C contents in the product composition, and referred to 1 kg DM resistor.
- section bar extrusion, aluminium: 0.16 kg; source Behrendt S 1998; lognormal variance with pedigree 0.0701, pedigree (3,5,5,3,1)
  (same comment as for aluminium, wrought alloy)
- transformer, high voltage use: 0.096735 kg; source Behrendt S 1998; lognormal variance with pedigree 0.0701, pedigree (3,5,5,3,1)
  (same comment as for diode, glass-, for through-hole mounting)
  properties: carbon content, fossil 0.262798, dry mass 1 kg, wet mass 1 kg
- transformer, low voltage use: 0.030714 kg; source Behrendt S 1998; lognormal variance with pedigree 0.0701, pedigree (3,5,5,3,1)
  (same comment as for capacitor, electrolyte type, < 2cm height)
  properties: carbon content, fossil 0.11936, dry mass 1 kg, wet mass 1 kg
- transistor, wired, big size, through-hole mounting: 0.026224 kg; source Behrendt S 1998; lognormal variance with pedigree 0.0701, pedigree (3,5,5,3,1)
  (same comment as for diode, glass-, for through-hole mounting)
  properties: carbon content, fossil 0.0946006, dry mass 1 kg, wet mass 1 kg
  note on carbon content, fossil: Calculated as the addition of C contents in the product composition, and referred to 1 kg DM transistor.
- transistor, wired, small size, through-hole mounting: 0.00089592 kg; source Behrendt S 1998; lognormal variance with pedigree 0.0701, pedigree (3,5,5,3,1)
  (same comment as for diode, glass-, for through-hole mounting)
  properties: carbon content, fossil 0.080338, dry mass 1 kg, wet mass 1 kg
- used printed wiring boards: -0.020408 kg; lognormal variance with pedigree 0.0127, pedigree (3,3,1,3,1)
  Estimation, based on a European PWB mounting company.
  EcoSpold01Location=GLO
  Uncertainty: data from literature plus own assumptions
  production volume
    Calculated from the production volume of printed wiring board, through-hole mounted, unspecified, Pb containing in proportion to the respective output amounts.
  properties: carbon content, fossil 0.193742, carbon content, non-fossil 0.000960142, dry mass 1 kg, wet mass 1 kg
  note on carbon content, fossil: Composition of printed wiring boards used to calculate C content

## Sampling procedure
literature & own estimations

## Review by Rolf Frischknecht 2007-09-21
passed.

## Review by Bo Weidema 2012-09-10
changed inputs of production mixes to specified inputs
