# acrylic varnish production, with water, in 53% solution state

Dataset: EcoSpold 2, unit process
Geography: RoW
Time period: 1995-01-01 to 2023-12-31
Technology level: current
Classification: EcoSpold01Categories: paintings/production
Classification: ISIC rev.4 ecoinvent: 2022:Manufacture of paints, varnishes and similar coatings, printing ink and mas
Tags: ConvertedDataset
Scenario: Business-as-Usual
System model: Allocation, cut-off by classification
Generated by: Maggie Osses
Published in: Althaus H.-J. 2007
Database: ecoinvent
isCopyrightProtected: true
accessRestrictedTo: 1

## General comment
Manufacturing process is considered with consumption of raw materials, energy, as well as infrastructure and land use. Transport of the raw materials is included. No by-product is generated in the process. Auxiliaries, solid wastes and emissions to air and water (excepting emission of waste-heat) are not included due to the lack of data. Transport and storage of the final product are not included. Transient or unstable operations are not considered, but the production during stable operation conditions. Inventory refers to 1 kg 53% acrylic varnish in water. The literature source used is von Däniken et al. 1995

## Geography
The literature source used bases on information provided by manufacturing companies. No further information is available on the location and characteristics of these manufacturers. Therefore, the representativeness of these values for the European acrylic varnish industry is unknown.

## Parameters
- fraction, process water, to air: 0.15 dimensionless; name fraction_PW_to_air; lognormal variance with pedigree 0.092025, pedigree (4,4,3,2,4)

## Reference product
- acrylic varnish, with water, in 53% solution state: 1 kg; By-product classification allocatable product; CPC 35110: Paints and varnishes and related products; HS2017 320820: Paints and varnishes; based on acrylic or vinyl polymers, dispersed or dissolved in a non-aqueous medium
  EcoSpold01Location=RER
  production volume 2.67763 kg
    This is a placeholder value that does not reflect real-world production volumes. This dataset does not currently require a real-world production volume to work in the database framework, and no actual data were collected yet. This has no negative effect on the results of the ecoinvent database.
  property dry mass 0.53 kg; name RP_drymass
  property heating value, net 20.44 MJ
    LHV is calculated based on the Carbon content of the product. More details can be found on the respective documentation.
  property price 3.71 EUR2005
    Calculated value based on data from United Nations Commodity Trade Statistics Database (comtrade.un.org). UN comtrade category: 320890 Polymer based paint, varnish in non-aqueous medium ne. Year 2005. Using exchange rate of 1EURO = 1.209 USD. Average of price of import into 5 main markets (EU, US, JP, IN and CN).
  property water content 0.886792; = RP_waterinwetmass/RP_drymass
  property water in wet mass 0.47 kg; name RP_waterinwetmass
  properties: carbon allocation 0.323202 kg, carbon content 0.609815, carbon content, fossil 0.609815, carbon content, non-fossil 0, wet mass 1 kg

## Inputs from technosphere
- acrylic binder, with water, in 54% solution state: 0.50915 kg; lognormal variance with pedigree 0.102, pedigree (3,5,5,5,1)
  Data from survey in literature (von Däniken et al. 1995)
  EcoSpold01Location=RER
  Uncertainty: data from survey in literature (von Däniken et al. 1995)
  property dry mass 0.54 kg; name drymass
  property water in wet mass 0.46 kg; name waterinwetmass
  properties: carbon content, fossil 0.679919, heating value, net 18.18 MJ, water content 0.851852, wet mass 1 kg
- ammonia, anhydrous, liquid: 3.56013e-5, 6.91094e-5, 0.000766034, 3.23807e-5, 7.24341e-6, 0.000266209, 2.28838e-5, 7.05389e-5 kg (8 suppliers, which the file names only by identifier); sum of these 0.00127 kg; lognormal variance with pedigree 0.102, pedigree (3,5,5,5,1)
  EcoSpold01Location=RER
  Data from survey in literature (von Däniken et al. 1995)
  Uncertainty: data from survey in literature (von Däniken et al. 1995)
  properties: dry mass 1 kg, wet mass 1 kg
- chemical factory, organics: 4e-10 unit; lognormal variance with pedigree 0.6, pedigree (4,1,5,5,5)
  Estimation
  EcoSpold01Location=RER
  Uncertainty: estimation
- electricity, medium voltage: 0.00996984, 0.198876, 0.0668217, 0.00305311, 0.000611076, 0.000131212, 0.020537 kWh (7 suppliers, which the file names only by identifier); sum of these 0.3 kWh; lognormal variance with pedigree 0.102, pedigree (3,5,5,5,1)
  EcoSpold01Location=UCTE
  Data from survey in literature (von Däniken et al. 1995)
  Uncertainty: data from survey in literature (von Däniken et al. 1995)
- ethylene glycol: 0.05092 kg; lognormal variance with pedigree 0.102, pedigree (3,5,5,5,1)
  (same comment as for acrylic binder, with water, in 54% solution state)
  properties: carbon content, fossil 0.387097, dry mass 1 kg, heating value, net 23.44 MJ, wet mass 1 kg
- titanium dioxide: 0.20366 kg; lognormal variance with pedigree 0.102, pedigree (3,5,5,5,1)
  (same comment as for acrylic binder, with water, in 54% solution state)
  properties: dry mass 1 kg, wet mass 1 kg

## Inputs from nature
- Water, unspecified natural origin [natural resource, in water]: 0.000235 m3; name water_UNO_input; lognormal variance with pedigree 0.102, pedigree (3,5,5,5,1)
  Data from survey in literature (von Däniken et al. 1995)
  Uncertainty: data from survey in literature (von Däniken et al. 1995)

## Sampling procedure
see geography

## Extrapolations
Transports based on standard distances of Ecoinvent. Infrastructure: proxy module used (chemical plant, organics) This dataset has been copied from an original dataset covering the geography RER. The uncertainty has been adjusted accordingly.

## Review by Heiko Kunst 2003-07-25
Passed.
