# purse seiner maintenance, steel

Dataset: EcoSpold 2, unit process
Geography: RoW
Time period: 2010-01-01 to 2023-12-31
Technology level: current
Classification: ISIC rev.4 ecoinvent: 0311:Marine fishing
Scenario: Business-as-Usual
System model: Allocation, cut-off by classification
Generated by: [System]
Published in: Avadí, A. 2018
Database: ecoinvent
isCopyrightProtected: true
accessRestrictedTo: 1

## General comment
This dataset represents the maintenance of steel purse seiners, per 1000 kg of light ship weight, based on data from Peru and Ecuador, corresponding to 143+12 vessels for which data was avilable with different levels of detail. Specific data for specific inventory items may be based on sub-samples for which detailed data was available. Vessel dimensions, landings and fuel use were available for roughly 661 purse seiners.
System boundaries and relation between activities

## Included activities start
Maintenance of vessels, including provision of all materials and work

## Included activities end
End of life of replaced materials. Batteries are excluded, as they do not exist in the database

## Geography
Data from Peru, extrapolated to global (GLO)

## Technology
Peru features various shipyards and relevant ship-building and ship-retrofitting expertise.

## Reference product
- purse seiner maintenance, steel: 1 kg; name LSW; = steel+copper+nylon+lead+engine*1000+paint; source Pierre Fréon 2014; By-product classification allocatable product; CPC 8729: Maintenance and repair services of other goods n.e.c.
  Maintenance of a steel purse seiner, per 1000 kg of light ship weight (LSW) over its lifetime. Regressions based on mainly primary data were created to relate the weight of each inventory item to a purse seiner's LSW. The list of inventory items (granularity) contribute >95% of environmental impacts, as described in the reference publication.
  production volume 0.912835 kg; name prod_vol
    Unquantifiable
  property price 1.32679 EUR2005
    Calculated based on inputs: The price of the product has been calculated as a sum of the values of the material and energy inputs for this product. This value is therefore a rough estimation. It may underestimate the real price since there are additional expenses when producing any product. These expences can include for example labour costs, treatment of waste materials and profit for the producer. Please consider carefully whether this level of data quality is acceptable for your application.
  properties: carbon allocation 0 kg, carbon content 0

## Inputs from technosphere
All rows: source Pierre Fréon 2014
- alkyd paint, white, without solvent, in 60% solution state: 0.0562242 kg; triangular min 0.0489167, mostLikely 0.0556244, max 0.0641316, pedigree (1,3,2,5,1)
  Hull and deck paint, including antifouling, maintenance
  Uncertainty: Data from 143 vessels
  properties: carbon content, fossil 0.140367, carbon content, non-fossil 0.199629, dry mass 1 kg, heating value, net 10.3 MJ, wet mass 1 kg
  note on carbon content, fossil: C content was calculated as an addition of C content in the raw materials.
- alkyd paint, white, without solvent, in 60% solution state: 0.0118438 kg; triangular min 0.0103045, mostLikely 0.0117175, max 0.0135096, pedigree (1,3,2,5,1)
  Hull and deck paint, including antifouling, maintenance
  Uncertainty: Data from 143 vessels
- copper scrap, sorted, pressed: -0.0203203 kg; name BP_amount_5; = copper
  Waste copper wire
  production volume; = prod_vol * (BP_amount_5 / LSW)
    Calculated from production volume of reference product using the relative outputs.
  properties: dry mass 1 kg, price 2.84 EUR2005, wet mass 1 kg
- copper, cathode: 0.0203203 kg; = copper
  Copper wire for electric circuit construction, 50% recycled
  properties: dry mass 1 kg, wet mass 1 kg
- iron scrap, unsorted: -0.0871872 kg; name BP_amount_4; = steel
  Waste steel
  production volume; = prod_vol * (BP_amount_4 / LSW)
    Calculated from production volume of reference product using the relative outputs.
  properties: dry mass 1 kg, price 0.149 EUR2005, wet mass 1 kg
- lead: 0.145045 kg; triangular min 0.138262, mostLikely 0.144546, max 0.152327, pedigree (2,3,2,5,1)
  Fishing net maintenance
  Uncertainty: Data from 27 vessels
  properties: dry mass 1 kg, wet mass 1 kg
- lead in car shredder residue: -0.00215867, -0.142886 kg (2 suppliers, which the file names only by identifier); sum of these -0.145045 kg; = lead
  Waste lead
  production volume; = prod_vol * (BP_amount_3 / LSW)
    Calculated from production volume of reference product using the relative outputs.
  properties: dry mass 1 kg, wet mass 1 kg
- marine engine: 3.17317e-5 unit; name engine; triangular min 2.59532e-5, mostLikely 3.17651e-5, max 3.74768e-5, pedigree (3,3,2,5,1)
  Marine diesel engine maintenance
  Uncertainty: Data from 143 vessels, assumptions on replacement/maintenance
  property lifetime 15 year; name engine_lifetime
  property lifetime capacity [h] 8000 hour; name engine_lifetime_capacity_PMH
- nylon 6-6: 0.43354 kg; triangular min 0.413376, mostLikely 0.432005, max 0.455241, pedigree (2,3,2,5,1)
  Fishing net maintenance
  Uncertainty: Data from 27 vessels
  properties: carbon content, fossil 0.637168, dry mass 1 kg, heating value, net 30.9 MJ, wet mass 1 kg
  note on heating value, net: Assumed equal to Nylon-66. Reference: Walters, R. N., Hackett, S. M. and Lyon, R. E. (2000) ‘Heats of combustion of high temperature polymers’, Fire and Materials, 24(5), pp. 245–252. doi: 10.1002/1099-1018(200009/10)24:5<245::AID-FAM744>3.0.CO;2-7.
- nylon 6-6: 0.214107 kg; triangular min 0.204149, mostLikely 0.213349, max 0.224824, pedigree (2,3,2,5,1)
  Fishing net maintenance
  Uncertainty: Data from 27 vessels
- steel, low-alloyed, hot rolled: 0.0871872 kg; name steel; triangular min 0.0844983, mostLikely 0.0878258, max 0.0892375, pedigree (2,3,2,5,1)
  Steel hull + auxiliary skiff maintenance, sheets
  Uncertainty: Data from 143 vessels
  property carbon content, non-fossil 0; name steel_C_content_non_fossil
  properties: carbon content, fossil 0.005, dry mass 1 kg, wet mass 1 kg
  note on carbon content, fossil: Low alloyed steel composition given in Tab. 3.2 ecoinvent v2.2 report 10_partII. Steel assumed to have a C content of 0.5%
  note on carbon content, non-fossil: Low alloyed steel composition given in Tab. 3.2 ecoinvent v2.2 report 10_partII.
- waste paint on metal: -0.0224984, -0.000190974 kg (2 suppliers, which the file names only by identifier); sum of these -0.0226894 kg; = paint*1/3
  Waste paint, 2/3 of solids emitted to ocean
  production volume; = prod_vol * (BP_amount_2 / LSW)
    Calculated from production volume of reference product using the relative outputs.
  properties: carbon content, fossil 0.140367, carbon content, non-fossil 0.199629, dry mass 1 kg, heating value, net 19.7 MJ, wet mass 1 kg
- waste plastic, mixture: -0.000171548, -0.00709796, -0.000162901, -0.640184, -3.14111e-5 kg (5 suppliers, which the file names only by identifier); sum of these -0.647648 kg; = nylon
  Waste nylon
  production volume; = prod_vol * (BP_amount_1 / LSW)
    Calculated from production volume of reference product using the relative outputs.
  properties: carbon content, fossil 0.637168, dry mass 1 kg, heating value, net 30.79 MJ, wet mass 1 kg
  note on heating value, net: Value taken from the general comment of the treatment dataset.
- wire drawing, copper: 0.0203203 kg; name copper; triangular min 0.0173604, mostLikely 0.0202538, max 0.0233468, pedigree (3,3,2,5,1)
  Manufacture of copper wire, 1 replacement over lifetime
  Uncertainty: Assumptions on replacement rates

## Emissions to nature
- Solids, inorganic [water, ocean]: 0.0453787 kg; = paint*2/3; source Avadí, A. 2018
  Waste paint, 2/3 of solids emitted to ocean
