# rice production, non-basmati

Dataset: EcoSpold 2, unit process
Geography: IN
Time period: 2015-01-01 to 2023-12-31
Technology level: current
Classification: ISIC rev.4 ecoinvent: 0112:Growing of rice
Scenario: Business-as-Usual
System model: Allocation, cut-off by classification
Generated by: Eliane Riedener
Database: ecoinvent
isCopyrightProtected: true
accessRestrictedTo: 1

## General comment
This dataset represents the production of 1 kg of Rice Non-Basmati during June-October, 2016 at a farm located in village Village-Gadhera, District- Fatehgarh Sahib of Punjab. In this area, fields are irrigated using electric pump and diesel pump from groundwater for surface irrigation. The farm has a yield of 7750 kg fresh matter per ha for this crop cycle. Sowing date for the crop is 20- June, 2016 and harvesting date is 31-October, 2016. Mineral NP fertilizer input is 84.77-48.53 kg/ha. Herbicides used has active ingredient as Butachlor 1250g/ha (for which Alachlor has been used as proxy). Fungicides used has active ingredients as Propiconazole 156.25g/ha, Insecticides used has active ingredient Chlorpyriphos 125g/ha, Monocrotophos 450g/ha (for which Dichlorovos has been used as proxy), and Cartap Hydrochloride 8750g/ha (for which Carbosulfan has been used as proxy). Machinery is used for soil cultivation with fuel consumption of 43.68 kg/ha using plough, rotary cultivator for soil tillage and for other works. Machines is used for harvesting with fuel consumption of 78kg/ha using Threshing for combine harvesting and hay reaping. For other work process 7.1136 kg/ha is used for laser levelling.

## Included activities start
This activity starts about seven weeks after the harvest of the previous crop. The soil is prepared for cultivation in June and sowing of seeds started about three weeks after soil preparation. Thereafter the crop is mature for harvesting in about 4.5 months.

## Included activities end
The activity ends with the harvesting of the matured non-basmati rice plant. Thereafter the field is prepared for cultivation of the next crop.

## Technology
Cultivation of Non-Basmati Rice follows conventional production standards

## Time period
Soil cultivating date for the main crop: 01-June, 2016; Harvesting date main crop: 31-October, 2016. The soil cultivation, sowing and harvesting dates are taken as the middle date of the week or fortnight told to the data collector by the farmer. Total time from date of sowing to date of harvesting comes to 130 days. The data is collected for one crop cycle. The cycle of one year is considered for entry in ecoeditor.

## Parameters
- LUC_crop_specific: 1 dimensionless
  This parameter allows to switch between a "crop specific" and a "country specific" approach when calculating the LUC of a crop. By default, the chosen approach is "crop specific", so the value of the parameter is 1. If you want to apply a "country specific" approach, turn the parameter to 0.

## Reference product
- rice, non-basmati: 1 kg; By-product classification allocatable product; CPC 0113: Rice; HS2017 1006: Rice
  production volume 1.58757e11 kg
    Production quantity of rice, paddy in India in 2016 as reported in FAOSTAT.
    Reference: Food and Agricultural Organization of the United Nations, 2018, Crops data, available online at: http://www.fao.org/faostat/en/#data/QC
  property price 0.37 EUR2005
    Calculated value based on data from United Nations Commodity Trade Statistics Database (comtrade.un.org). UN comtrade category: 1006 Rice. Year 2005. Using exchange rate of 1EURO = 1.209 USD. Average of price of import into 5 main markets (EU, US, JP, IN and CN).
  properties: carbon allocation 0.403784 kg, carbon content 0.46412, carbon content, fossil 0, carbon content, non-fossil 0.46412, dry mass 0.87 kg, water content 0.149425, water in wet mass 0.13 kg, wet mass 1 kg

## Inputs from technosphere
- [thio]carbamate-compound: 0.00112903 kg; lognormal variance with pedigree 0.0052, pedigree (2,4,3,1,1)
  The data was collected for a hectare area through interview
  properties: carbon content, fossil 0.626349, dry mass 1 kg, wet mass 1 kg
- acetamide-anillide-compound, unspecified: 0.00016129 kg; lognormal variance with pedigree 0.0052, pedigree (2,4,3,1,1)
  The data was collected for a hectare area through interview
  properties: carbon content, fossil 0.659175, dry mass 1 kg, wet mass 1 kg
- combine harvesting: 8.16042e-5 ha; lognormal variance with pedigree 0.0052, pedigree (2,4,3,1,1)
  The data was collected for a hectare area through interview
- cyclic N-compound: 2.01613e-5 kg; lognormal variance with pedigree 0.0052, pedigree (2,4,3,1,1)
  The data was collected for a hectare area through interview
  properties: carbon content, fossil 0.641962, dry mass 1 kg, wet mass 1 kg
- diesel, burned in agricultural machinery: 0.450593 MJ; lognormal variance with pedigree 0.0052, pedigree (2,4,3,1,1)
  Planking.The data was collected for a hectare area through interview
- inorganic nitrogen fertiliser, as N: 0.00240637 kg; lognormal variance with pedigree 0.0052, pedigree (2,4,3,1,1)
  The data was collected for a hectare area through interview
  properties: dry mass 1 kg, wet mass 1 kg
- inorganic phosphorus fertiliser, as P2O5: 0.00626194 kg; lognormal variance with pedigree 0.0052, pedigree (2,4,3,1,1)
  The data was collected for a hectare area through interview
  properties: dry mass 1 kg, wet mass 1 kg
- irrigation: 0.826 m3; lognormal variance with pedigree 0.0052, pedigree (2,4,3,1,1)
  The total water (blue + green) used for the production of 1 kg of paddy rice in India is 1.903 m3, where blue water is 0.826 m3 and green water is 1.077 m3. For irrigation only blue water is considered. Therefore, 0.826 m3/kg paddy rice.
  Source: Chapagain, A.K., Hoekstra, A.Y. (2010). The green, blue and grey water footprint of rice from both a production and consumption perspective. Value of Water Research Report Series No. 40. Accessed on 20231020: https://www.waterfootprint.org/resources/Report40-WaterFootprintRice.pdf
  properties: dry mass 0.11 kg, water content 9089.91, wet mass 1000 kg
- organophosphorus-compound, unspecified: 7.41935e-5 kg; lognormal variance with pedigree 0.0052, pedigree (2,4,3,1,1)
  This exchange is an aggregation of amounts:
  1.6129032258064517E-5. Comment:
  5.806451612903226E-5. Comment:
  properties: carbon content, fossil 0.260898, dry mass 1 kg, wet mass 1 kg
- packaging, for fertilisers: 0.0344 kg; lognormal variance with pedigree 0.0532, pedigree (4,3,3,5,4)
  Total amount of active substance/s of fertilisers needed for the production of 'rice' is calculated to be circa 1.72E-02 kg. Fertiliser/s used in this dataset is/are: 'nitrogen fertiliser, as N', 'phosphate fertiliser, as P2O5', 'urea, as N'. The total amount of active substance/s is doubled in order to account for the packaging of the dilluted product of fertiliser/s that is/are applied. Therefore, 3.44E-02 kg of packaging for fertilisers is justified with this exchange.
  properties: carbon content, fossil 0.825301, dry mass 1 kg, heating value, net 25.01 MJ, wet mass 1 kg
  note on carbon content, fossil: Considering a chemical formula (C2H4)n for polyethylene, carbon content-fossil is calculated to be 0.856286 kg of Carbon per kg of dry mass.
- packaging, for pesticides: 0.00276935 kg; lognormal variance with pedigree 0.0532, pedigree (4,3,3,5,4)
  Total amount of active substance/s of pesticides needed for the production of rice is calculated to be circa 1.38E-03 kg. Pesticide/s used in this dataset is/are: '[thio]carbamate-compound', 'acetamide-anillide-compound, unspecified', 'cyclic N-compound', 'organophosphorus-compound, unspecified'. The total amount of active substance/s is doubled in order to account for the packaging of the dilluted product of pesticide/s that is/are applied. Therefore, 2.77E-03 kg of packaging for pesticides is justified with this exchange.
  properties: carbon content, fossil 0.85714, dry mass 1 kg, heating value, net 25.97 MJ, wet mass 1 kg
- tillage, ploughing: 0.000118769 ha; lognormal variance with pedigree 0.0052, pedigree (2,4,3,1,1)
  The data was collected for a hectare area through interview
- tillage, rotary cultivator: 5.59616e-5 ha; lognormal variance with pedigree 0.0052, pedigree (2,4,3,1,1)
  The data was collected for a hectare area through interview
- urea: 0.0182902 kg; lognormal variance with pedigree 0.0052, pedigree (2,4,3,1,1)
  The exchange has been updated from 'urea, as N' into 'urea' and therefore its amount has been scaled (multiplied) from 0.0085 kg by 2.1438 kg of 'urea' per kg of 'urea, as N'. Original comment of the exchange is: The data was collected for a hectare area through interview
  properties: carbon content, fossil 0.2, dry mass 1 kg, wet mass 1 kg
- wheat seed, for sowing: 0.00177419 kg; lognormal variance with pedigree 0.0052, pedigree (2,4,3,1,1)
  The data was collected for a hectare area through interview
  property carbon content, non-fossil 0.464601; name C_content_non_fossil
  property dry mass 0.85 kg; name DM; = WM- WWM
  property water content 0.176471; name water_content; = WWM/ DM
  property water in wet mass 0.15 kg; name WWM
  property wet mass 1 kg; name WM
  note on carbon content, non-fossil: Composition data obtained from Wheat, soft red winter, in (http://www.nal.usda.gov/fnic/foodcomp/search/). First, composition data were refered to 1 kg dry mass. Then, C-contents were calculated considering a C-content/dry mass of 46% in carbohydrates (including fibres), 53% in proteins and 75% in fats. All data from "Evolutionary and Biochemical Aspects", A.D. Kay and T. Vrede (in Global Ecology, 2010, Elsevier B.V., S.E. Jørgensen Ed.).

## Inputs from nature
- Carbon dioxide, in air [natural resource, in air]: 1.3209 kg; lognormal variance with pedigree 0.0052, pedigree (2,4,3,1,1)
  Calculated Value. This value has been calculated by using the ecoinvent LCI calculation tool for crop production.
- Energy, gross calorific value, in biomass [natural resource, biotic]: 15.3935 MJ; lognormal variance with pedigree 0.0052, pedigree (2,4,3,1,1)
  The data was collected for a hectare area through interview
- Occupation, annual crop, irrigated [natural resource, land]: 0.698925 m2*year; lognormal variance with pedigree 0.0066, pedigree (2,4,3,1,1)
  (same comment as for Carbon dioxide, in air)
- Transformation, from annual crop, irrigated [natural resource, land]: 1.29032 m2; lognormal variance with pedigree 0.0126, pedigree (2,4,3,1,1)
  (same comment as for Carbon dioxide, in air)
- Transformation, to annual crop, irrigated [natural resource, land]: 1.29032 m2; lognormal variance with pedigree 0.0126, pedigree (2,4,3,1,1)
  (same comment as for Carbon dioxide, in air)

## Emissions to nature
- Ammonia [air, non-urban air or from high stacks]: 0.00193107 kg; lognormal variance with pedigree 0.0126, pedigree (2,4,3,1,1)
  Calculated Value. This value has been calculated by using the ecoinvent LCI calculation tool for crop production
- Carbon dioxide, fossil [air, non-urban air or from high stacks]: 0.0134034 kg; lognormal variance with pedigree 0.0052, pedigree (2,4,3,1,1)
  (same comment as for Ammonia)
- Dinitrogen monoxide [air, non-urban air or from high stacks]: 0.000471098 kg; lognormal variance with pedigree 0.0346, pedigree (2,4,3,1,1)
  (same comment as for Ammonia)
- Methane, non-fossil [air, urban air close to ground]: 0.0212299 kg; = 164.53164/7750; lognormal variance with pedigree 0.0066, pedigree (3,4,3,1,1)
  Using a cultivation duration of 133 days and values for SFw, SFp and SFo of 0.78, 1.22, 1, respectively, according to IPCC 2006
- Nitrogen oxides [air, non-urban air or from high stacks]: 0.000670811 kg; lognormal variance with pedigree 0.0446, pedigree (2,4,3,1,1)
  (same comment as for Ammonia)
- Water [air, non-urban air or from high stacks]: 0.42126 m3; = 0.51*0.826; lognormal variance with pedigree 0.0052, pedigree (2,4,3,1,1)
  (same comment as for Ammonia)
- Alachlor [soil, agricultural]: 0.00016129 kg; lognormal variance with pedigree 0.0376, pedigree (2,4,3,1,1)
  Alachlor is used as pesticide
- Cadmium II [soil, agricultural]: 1.8336e-7 kg; lognormal variance with pedigree 0.0446, pedigree (2,4,3,1,1)
  (same comment as for Ammonia)
- Carbosulfan [soil, agricultural]: 0.00112903 kg; lognormal variance with pedigree 0.0376, pedigree (2,4,3,1,1)
  Carbosulfan is used as pesticide
- Chlorpyrifos [soil, agricultural]: 1.6129e-5 kg; lognormal variance with pedigree 0.0376, pedigree (2,4,3,1,1)
  Chlorpyrifos is used as pesticide
- Chromium III [soil, agricultural]: 8.09483e-7 kg; lognormal variance with pedigree 0.0446, pedigree (2,4,3,1,1)
  (same comment as for Ammonia)
- Copper ion [soil, agricultural]: -5.71309e-6 kg
- Dichlorvos [soil, agricultural]: 5.80645e-5 kg; lognormal variance with pedigree 0.0376, pedigree (2,4,3,1,1)
  (same comment as for Carbon dioxide, in air)
- Lead II [soil, agricultural]: -5.49532e-7 kg
  (same comment as for Ammonia)
- Mercury II [soil, agricultural]: -3.12695e-8 kg
  (same comment as for Ammonia)
- Nickel II [soil, agricultural]: -9.89888e-7 kg
  (same comment as for Ammonia)
- Propiconazole [soil, agricultural]: 2.01613e-5 kg; lognormal variance with pedigree 0.0376, pedigree (2,4,3,1,1)
  (same comment as for Carbon dioxide, in air)
- Zinc II [soil, agricultural]: -2.63957e-5 kg
  (same comment as for Ammonia)
- Cadmium II [water, ground-]: 3.03496e-9 kg; lognormal variance with pedigree 0.0946, pedigree (2,4,3,1,1)
  (same comment as for Ammonia)
- Cadmium II [water, surface water]: 7.83935e-9 kg; lognormal variance with pedigree 0.0946, pedigree (2,4,3,1,1)
  (same comment as for Ammonia)
- Chromium III [water, ground-]: 1.38728e-6 kg; lognormal variance with pedigree 0.0946, pedigree (2,4,3,1,1)
  (same comment as for Ammonia)
- Chromium III [water, surface water]: 8.48656e-7 kg; lognormal variance with pedigree 0.0946, pedigree (2,4,3,1,1)
  (same comment as for Ammonia)
- Copper ion [water, ground-]: 2.12546e-7 kg; lognormal variance with pedigree 0.0946, pedigree (2,4,3,1,1)
  (same comment as for Ammonia)
- Copper ion [water, surface water]: 6.38605e-7 kg; lognormal variance with pedigree 0.0946, pedigree (2,4,3,1,1)
  (same comment as for Ammonia)
- Lead II [water, ground-]: 8.71794e-9 kg; lognormal variance with pedigree 0.0946, pedigree (2,4,3,1,1)
  (same comment as for Ammonia)
- Lead II [water, surface water]: 1.52469e-7 kg; lognormal variance with pedigree 0.0946, pedigree (2,4,3,1,1)
  (same comment as for Ammonia)
- Mercury II [water, ground-]: 6.20505e-11 kg; lognormal variance with pedigree 0.0946, pedigree (2,4,3,1,1)
  (same comment as for Ammonia)
- Mercury II [water, surface water]: 1.87504e-9 kg; lognormal variance with pedigree 0.0946, pedigree (2,4,3,1,1)
  (same comment as for Ammonia)
- Nickel II [water, surface water]: 5.61536e-7 kg; lognormal variance with pedigree 0.0946, pedigree (2,4,3,1,1)
  (same comment as for Ammonia)
- Nitrate [water, ground-]: 0.0442558 kg; lognormal variance with pedigree 0.0446, pedigree (2,4,3,1,1)
  (same comment as for Ammonia)
- Phosphate [water, ground-]: 1.50012e-5 kg; lognormal variance with pedigree 0.0446, pedigree (2,4,3,1,1)
  (same comment as for Ammonia)
- Phosphate [water, surface water]: 4.20532e-5 kg; lognormal variance with pedigree 0.0446, pedigree (2,4,3,1,1)
  (same comment as for Ammonia)
- Phosphorus [water, surface water]: 7.72776e-5 kg; lognormal variance with pedigree 0.0446, pedigree (2,4,3,1,1)
  (same comment as for Ammonia)
- Water [water, ground-]: 0.0826 m3; = 0.1*0.826; lognormal variance with pedigree 0.0052, pedigree (2,4,3,1,1)
  (same comment as for Ammonia)
- Water [water, surface water]: 0.32214 m3; = 0.39*0.826; lognormal variance with pedigree 0.0052, pedigree (2,4,3,1,1)
  (same comment as for Ammonia)
- Zinc II [water, ground-]: 1.11187e-6 kg; lognormal variance with pedigree 0.0946, pedigree (2,4,3,1,1)
  (same comment as for Ammonia)
- Zinc II [water, surface water]: 8.99308e-7 kg; lognormal variance with pedigree 0.0946, pedigree (2,4,3,1,1)
  (same comment as for Ammonia)

## Sampling procedure
The farmers were identified and contacted by agriculture science faculty familiar with the local farmers in the region. Data was collected directly from the farmers through semi-structured interview using a questionnaire based on the input requirements of the ecoinvent LCI calculation tool for crop production. The farmers do not maintain any written records and have provided the data from recent memory. In this region, typically farmers are unable to provide exact name of active ingredient in the pesticide they use and the same was noted from details given on the pesticide packet. Individual farmer is not able to calculate fuel consumption for his own farm alone and this information has been collected from farming community of the area.

## Extrapolations
Ecoinvent LCI calculation tool for crop production was used to calculate field emissions from the cultivation process. Number of wet days have been taken for neighboring district (Ludhiana) and rainfall data is Normal rainfall for Punjab State in India where the farm is located. The data has been approximated using Wheat as proxy since the tool at this stage could not support non existing crops in ecoeditor.
