# woven bamboo mat production

Dataset: EcoSpold 2, unit process
Geography: RoW
Time period: 2010-01-01 to 2023-12-31
Technology level: current
Classification: ISIC rev.4 ecoinvent: 162:Manufacture of products of wood, cork, straw and plaiting materials
Scenario: Business-as-Usual
System model: Allocation, cut-off by classification
Generated by: Edwin Zea Escamilla
Database: ecoinvent
isCopyrightProtected: true
accessRestrictedTo: 1

## General comment
This dataset is a weighted average of the existing local datasets (BR, CN, CO, PH). It represents the production of 1 Kg of woven bamboo mat. To produce woven bamboo mats, a bamboo pole is first flattened and then divided into strips with widths between 2 and 4 cm. These strips are then peeled into 1- to 2-mm-thick veneers, which are then woven to form a mat. The entire process is manual and is typically performed in small, rural communities. The woven bamboo mats are usually used as lightweight walls but have also recently been used for industrially produced panels (Xiao, 2009). Both flattened bamboo and woven bamboo mats are commonly manufactured in facilities extremely close to the point of extraction and/or treatment. The input of flattened bamboo is assumed to have a water content of u = 20%. This is a handcrafted process usually done with hatchets and or other simple tools. The figures origin from mainly calculations and literature values. This dataset was developed with the support of the International Organization for Bamboo and Rattan INBAR
References:
Liu, X., et al., Nomenclature for engineered bamboo. BioResources, 2015. 11(1): p. 1141-1161.
Xiao, Y. Development of Prefabricated bamboo Earthquake Relief Shelter. in International conference of modern bamboo structures. 2009. Bogotá, Colombia: Universidad de los Andes.
Zea Escamilla, E. and G. Habert, Environmental impacts from the production of bamboo based construction materials representing the global production diversity. Journal of Cleaner Production, 2013.

## Included activities start
From reception of bamboo pole at the processing facility

## Included activities end
This activity ends with woven bamboo mat (u = 20%) at the processing facility. The dataset includes the inputs for trimming and, processing, as far as they are available. The dataset does not include infrastructure. This process is considered to be handcrafted, no powertools are used.

## Technology
Current production technology

## Reference product
- woven bamboo mat: 1 kg; name RP; By-product classification allocatable product; CPC 31212: Wood, continuously shaped along any of its edges or faces (including strips and friezes for parquet flooring, […]; HS2017 940159: Seats; of cane, osier or similar materials, other than bamboo or rattan
  production volume 4.60978e7 kg; name PV_RP; = 107913509.077026/0.68
    The global PV is a rough estimate which is calculated based on the Chinese PV. China was responsible for 68 % of the global exports of bamboo in 2015. It is thus assumed that 68 % of the global bamboo mat production takes place in China. The global PV is calculated by scaling the Chinese PV accordingly.
    Source: https://www.inbar.int/country/china/
  property heating value, net 17.68 MJ
    Jetsada P. & Panmanas S. (2017),Evaluation of lower heating value and elemental composition of bamboo using near infrared spectroscopy,Energy,Volume 121,Pages 147-158,ISSN 0360-5442,https://doi.org/10.1016/j.energy.2017.01.020.
  property price 0.578991 EUR2005
    Based on expert judgement, price given as 0.7 USD/kg. Converted with an exchange rate of 1EURO = 1.209 USD.
  properties: carbon allocation 0.411667 kg, carbon content 0.494, carbon content, fossil 0, carbon content, non-fossil 0.494, dry mass 0.833333 kg, water content 0.2, water in wet mass 0.166667 kg, wet mass 1 kg

## Inputs from technosphere
- flattened bamboo: 1.0697 kg; lognormal variance with pedigree 0.005, pedigree (2,3,3,4,2)
  Flattened bamboo and woven bamboo mats are commonly manufactured in facilities extremely close to the point of extraction and/or treatment. Therefore, no transport has been assumed for the culm.
  properties: carbon content, non-fossil 0.494, dry mass 0.833333 kg, heating value, net 17.68 MJ, water content 0.2, wet mass 1 kg
  note on heating value, net: Jetsada P. & Panmanas S. (2017),Evaluation of lower heating value and elemental composition of bamboo using near infrared spectroscopy,Energy,Volume 121,Pages 147-158,ISSN 0360-5442,https://doi.org/10.1016/j.energy.2017.01.020.
- waste bamboo residues: -0.0697 kg; name bamboo_residues
  production volume; = PV_RP*(bamboo_residues/RP)
    Calculated from production volume of reference product using the relative outputs.
  properties: carbon content, non-fossil 0.494, dry mass 0.833333 kg, heating value, net 17.68 MJ, water content 0.2, wet mass 1 kg

## Sampling procedure
The dataset is mostly based on literature values and was developed with the support of the International Organization for Bamboo and Rattan INBAR

## Extrapolations
The amounts of flows are weighted averages over all existing local production datasets available for this specific product. The weights are the annual production volumes of the local datasets relative to the sum of all local annual production volumes.
