# transport, passenger train, high-speed

Dataset: EcoSpold 2, unit process
Geography: FR
Time period: 2000-01-01 to 2023-12-31
Technology level: current
Classification: EcoSpold01Categories: transport systems/train
Classification: ISIC rev.4 ecoinvent: 4911:Passenger rail transport, interurban
Scenario: Business-as-Usual
System model: Allocation, cut-off by classification
Generated by: Michael Spielmann (obsolete)
Published in: Spielmann M. 2007
Database: ecoinvent
isCopyrightProtected: true
accessRestrictedTo: 1

## General comment
The dataset represents the entire transport life cycle of high-speed passenger train in France. Data of energy use and operation emissions refers to conditions in Germany (ICE-train): Particulate emissions due to abrasion of rail tracks, wheels, brakes and overhead contact line is included. Emission of sulphur hexafluoride (SF6) occurring during conversion at traction substations are accounted for.

## Included activities start
The dataset starts with the production of a high-speed train.

## Included activities end
The dataset ends with the service of transporting 1 passenger over a distance of 1 km by a high-speed train. The dataset includes the production, the maintenance and the energy use and operation emissions of a high-speed train, the construction of a railway track. The inventory of energy use and operation emissions includes the actual energy consumption due to traction and operations on board.

## Geography
Data refers to operation of a high speed train in France. Specific energy use and operation emissions refers to the operation of a German ICE, the train is operated with the french electricity mix. Airborne emission data is extrapolated from Swiss conditions.

## Technology
Demand factors of various transport components required to fulfill the functional unit of one pkm. In order to account for the fact that the same rail tracks are used for both passenger and goods transportation are applied allocation factors. For the energy use and operation emisisons data, the operation of the highspeed train is assumed with the german ICE high speed train.

## Time period
Not specified

## Reference product
- transport, passenger train: 1 person*km; By-product classification allocatable product; CPC 641: Local transport and sightseeing transportation services of passengers
  EcoSpold01Location=FR
  production volume 4.27e10 person*km
    Unknown
    UIC statistical synopsis 2005 http://www.uic.org/IMG/xls/synth2005-2.xls
  property price 0.0208844 EUR2005
    Calculated based on inputs: The price of the product has been calculated as a sum of the values of the material and energy inputs for this product. This value is therefore a rough estimation. It may underestimate the real price since there are additional expenses when producing any product. These expences can include for example labour costs, treatment of waste materials and profit for the producer. Please consider carefully whether this level of data quality is acceptable for your application.
  properties: carbon allocation 0 kg, carbon content 0

## Inputs from technosphere
- electricity, high voltage: 0.084903 kWh; lognormal variance with pedigree 0.04, pedigree (1,1,5,1,1)
  Energy use and operation emissions
- maintenance, train, passenger, high-speed: 3.24e-10 unit; lognormal variance with pedigree 0.04, pedigree (1,1,5,1,1)
  Calculated value, required to fulfill the functional unit of one pkm.
- railway track, for high-speed train: 0.00013 m*year; lognormal variance with pedigree 0.04, pedigree (1,1,5,1,1)
  Calculated value, required to fulfill the functional unit of one pkm.
  EcoSpold01Location=DE
- train, passenger, high speed: 3.24e-10 unit; lognormal variance with pedigree 0.04, pedigree (1,1,5,1,1)
  EcoSpold01Location=DE
  Calculated value, required to fulfill the functional unit of one pkm.

## Emissions to nature
- Particulate Matter, > 10 um [air, unspecified]: 1.1554e-5 kg; lognormal variance with pedigree 0.04, pedigree (1,1,5,1,1)
  Energy use and operation emissions
- Particulate Matter, > 2.5 um and < 10um [air, unspecified]: 1.0549e-5 kg; lognormal variance with pedigree 0.04, pedigree (1,1,5,1,1)
  Energy use and operation emissions
- Sulfur hexafluoride [air, unspecified]: 3.7357e-9 kg; lognormal variance with pedigree 0.04, pedigree (1,1,5,1,1)
  Energy use and operation emissions
- Iron ion [soil, unspecified]: 2.8132e-5 kg; lognormal variance with pedigree 0.04, pedigree (1,1,5,1,1)
  Energy use and operation emissions

## Sampling procedure
literature studies

## Extrapolations
see Technology and Geography

## Review by Christian Bauer 2010-02-07
passed.

## Review by Roland Hischier 2011-09-28
Transfer of documentation done.

## Review by Carl Vadenbo 2012-06-29
In preparation for the release of ecoinvent v3.0, the datasets 'operation, high speed train FR' and 'transport, high speed train FR' in ecoinvent v2.2 were merged into the dataset 'transport, passenger train, high speed, FR 2000'. The amounts of the exchanges were reviewed and were found to correspond to the disaggregated datasets. The field Included Activities End and the uncertainty information need to be revised before subsequent releases of the database. Despite this shortcoming, the new dataset was accepted for inclusion into the ecoinvent database on 2012.07.04.
