# sodium aluminate production, powder

Dataset: EcoSpold 2, unit process
Geography: GLO
Time period: 2012-01-01 to 2023-12-31
Technology level: current
Classification: ISIC rev.4 ecoinvent: 2011:Manufacture of basic chemicals
Classification: EcoSpold01Categories: chemicals/inorganics
Synonyms: aluminium sodium oxide
Scenario: Business-as-Usual
System model: Allocation, cut-off by classification
Share of production covered: 0 %
Generated by: Marylène Dussault
Database: ecoinvent
isCopyrightProtected: true
accessRestrictedTo: 1

## General comment
This dataset represents the production of sodium aluminate from an ideal chemical reaction of aluminium hydroxide with sodium hydroxide. This is a rough estimation created for the Tap water production dataset. Sodium aluminate is widely used in water treatment as a clarification agent, for pH adjustment and phosphorus removal.

## Included activities start
Starts with the delivery of material and energy inputs on site.

## Included activities end
This activity ends with the production of dried sodium aluminate. This datasets includes raw materials, energy uses, infrastructure and emissions (water produced by chemical reaction is assumed released to surface waters).

## Technology
Idealized reaction of aluminium hydroxide with sodium hydroxide: Al(OH)3 + NaOH => NaAlO2 + 2H2O

## Parameters
- aluminium hydroxide-to-sodium aluminate chemical reaction molar ratio: 1 dimensionless; name Al_OH_3_to_NaAlO2
  Chemical reaction molar ratio based on stoichiometry
- fraction, process water, to air: 0.205 dimensionless; lognormal variance with pedigree 0.092025, pedigree (4,4,3,2,4)
- sodium hydroxide-to-sodium aluminate chemical reaction molar ratio: 1 dimensionless; name NaOH_to_NaAlO2
  Chemical reaction molar ratio based on stoichiometry
- water-to-sodium aluminate chemical reaction molar ration: 2 dimensionless; name H2O_to_NaAlO2
  Chemical reaction molar ratio based on stoichiometry

## Reference product
- sodium aluminate, powder: 1 kg; name RefProd; By-product classification allocatable product; CPC 34270: Cyanides, cyanide oxides and complex cyanides; fulminates, cyanates and thiocyanates; silicates; borates; perb[…]; HS2017 284290: Salts; of inorganic acids or peroxoacids, other than double or complex silicates, including aluminosilicate[...]; CAS 11138-49-1
  NaAlO2
  production volume 4 kg
    This is a placeholder value that does not reflect real-world production volumes. This dataset does not currenlty require a real-world production volume to work in the database framework and no actual data were collected yet. This has no negative effect on the results of the ecoinvent database.
  property molecular weight 81.97 g/mol; name RefProd_mol_weight
    Taken from http://chem.sis.nlm.nih.gov/chemidplus/rn/1302-42-7.
  property price 0.88149 EUR2005
    Calculated based on inputs: The price of the product has been calculated as a sum of the values of the material and energy inputs for this product. This value is therefore a rough estimation. It may underestimate the real price since there are additional expenses when producing any product. These expences can include for example labour costs, treatment of waste materials and profit for the producer. Please consider carefully whether this level of data quality is acceptable for your application.
  properties: carbon allocation 0 kg, carbon content 0, carbon content, fossil 0, carbon content, non-fossil 0, dry mass 1 kg, water content 0, water in wet mass 0 kg, wet mass 1 kg

## Inputs from technosphere
- aluminium hydroxide: 0.951601 kg; = RefProd/RefProd_mol_weight*Al_OH_3_to_NaAlO2*Al_OH_3_mol_weight; lognormal variance with pedigree 0.008, pedigree (1,1,4,1,1)
  EcoSpold01Location=RER
  Stoichiometric calculation.
  Uncertainty: Calculated variable. Uncertainty will be determined from propagation of uncertainty factors of underlying variables. Uncertainty of actual relation between variables not accounted for at this time, although this could be included in a future update.
  property molecular weight 78.0027 g/mol; name Al_OH_3_mol_weight
  properties: dry mass 1 kg, wet mass 1 kg
  note on molecular weight: Taken from http://chem.sis.nlm.nih.gov/chemidplus/rn/21645-51-2.
- chemical factory, organics: 4e-10 unit; lognormal variance with pedigree 0.3526, pedigree (2,4,4,5,4)
  Calculated based on literature data published by the industry. For this activity, no information was readily available concerning infrastructure and land-use. Therefore, the infrastructure is estimated based on data from two chemical factories, the BASF site of Ludwigshafen and the chemical factory in Gendorf (which are both located in Germany), which produce a wide range of chemical substances. Based on this data, the following assumptions are made: the built area amounts to about 4.2 ha, the plant has an average output of 50'000 t/a and a lifespan of fifty years. The estimated infrastructure amount is therefore 4.00 E-10 units per kg of produced chemical.
  References:
  Althaus H.-J., Chudacoff M., Hischier R., Jungbluth N., Osses M. and Primas A. (2007) Life Cycle Inventories of Chemicals. ecoinvent report No. 8, v2.0. EMPA Dübendorf, Swiss Centre for Life Cycle Inventories, Dübendorf, CH.
  Gendorf (2000) Umwelterklärung 2000, Werk Gendorf. Werk Gendorf, Burgkirchen.
  Uncertainty: The uncertainty could not be determined, it has then been maximized.
- electricity, medium voltage: 0.399063 kWh; source Hischier R. 2005; lognormal variance with pedigree 0.0532, pedigree (2,4,4,5,4)
  EcoSpold01Location=UCTE
  Calculated based on literature data published by the GENDORF Chemical Park. The factory produced an average of 2462760 tonnes of chemical substances (including intermediates) per year in the years 2015-2019. The average consumption of electricity in the years 2015-2019 was 982796751 kWh per year. This equals 0.39906 kWh/kg chemical produced.
  References:
  Chemiepark GENDORF, Umwelterklärung 2016, https://www.gendorf.de/Nachbarn/Umweltschutz/Industrie%20und%20Nachhaltigkeit
  Chemiepark GENDORF, Umwelterklärung 2017, https://www.gendorf.de/Nachbarn/Umweltschutz/Industrie%20und%20Nachhaltigkeit
  Chemiepark GENDORF, Umwelterklärung 2020, https://www.gendorf.de/Nachbarn/Umweltschutz/Industrie%20und%20Nachhaltigkeit
  Uncertainty: The uncertainty could not be determined, it has then been maximized.
- heat, from steam, in chemical industry: 8.50114, 1.49886 MJ (2 suppliers, which the file names only by identifier); sum of these 10 MJ; source Hischier R. 2005; lognormal variance with pedigree 0.2106, pedigree (5,5,5,5,5)
  Estimated value. Very rough approximation based on literature and the energy intensive character of the process (the aluminium hydroxyde - sodium hydroxide solution is brought to the boiling point until the chemical reaction is completed).
  Uncertainty: The uncertainty could not be determined, it has then been maximized.
  properties: heating value, net 1 MJ
- sodium hydroxide, without water, in 50% solution state: 0.0434084, 0.444537 kg (2 suppliers, which the file names only by identifier); sum of these 0.487946 kg; = RefProd/RefProd_mol_weight*NaOH_to_NaAlO2*NaOH_mol_weight; lognormal variance with pedigree 0.008, pedigree (1,1,4,1,1)
  Stoichiometric calculation.
  Uncertainty: Calculated variable. Uncertainty will be determined from propagation of uncertainty factors of underlying variables. Uncertainty of actual relation between variables not accounted for at this time, although this could be included in a future update.
  properties: dry mass 1 kg, heating value, net 3.03 MJ, molecular weight 39.9969 g/mol, wet mass 1 kg
  note on molecular weight: Taken from http://chem.sis.nlm.nih.gov/chemidplus/rn/1310-73-2.
- wastewater, average: -2.11538e-6, -0.00035201, -8.41727e-5, -1.25329e-6 m3 (4 suppliers, which the file names only by identifier); sum of these -0.000439551 m3; = (RefProd/RefProd_mol_weight*H2O_to_NaAlO2*18.015)/1000; lognormal variance with pedigree 0.0452, pedigree (2,4,1,5,4)
  Stoichiometric calculation.
  production volume
    based on ratio of reference and byproduct amount
  properties: carbon content, non-fossil 0.194039, dry mass 0.346837 kg, mass concentration, TOC 0.1091 kg/m3, mass concentration, calcium 0.039453 kg/m3, mass concentration, chlorine 0.030031 kg/m3, mass concentration, hydrogen 0.013365 kg/m3, mass concentration, nitrogen 0.031015 kg/m3, mass concentration, oxygen 0.069824 kg/m3, mass concentration, sodium 0.06456 kg/m3, mass concentration, sulfur 0.015602 kg/m3, water content 2882.2, wet mass 1000 kg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
  note on carbon content, non-fossil: 0.0673 kg TOC/m3 (Tab A.17, ecoinvent v2.2 report 13_I). TOC was considered as Total Carbon.

## Inputs from nature
- Water, cooling, unspecified natural origin [natural resource, in water]: 0.014707 m3; lognormal variance with pedigree 0.0532, pedigree (2,4,4,5,4)
  Calculated based on literature data published by the GENDORF Chemical Park. The factory produced an average of 2462760 tonnes of chemical substances (including intermediates) per year in the years 2015-2019. The average amount of cooling water released in the years 2015-2019 was 34408800 t per year. It was assumed that 5% of the cooling water was emitted to air during its use, therefore, to calculate the input of cooling water, the output value reported by GENDORF was scaled up by the factor 1/0.95. This equals 0.014707 m3/kg chemical produced.
  References:
  Chemiepark GENDORF, Umwelterklärung 2016, https://www.gendorf.de/Nachbarn/Umweltschutz/Industrie%20und%20Nachhaltigkeit
  Chemiepark GENDORF, Umwelterklärung 2017, https://www.gendorf.de/Nachbarn/Umweltschutz/Industrie%20und%20Nachhaltigkeit
  Chemiepark GENDORF, Umwelterklärung 2020, https://www.gendorf.de/Nachbarn/Umweltschutz/Industrie%20und%20Nachhaltigkeit
- Water, river [natural resource, in water]: 0.000965426 m3; lognormal variance with pedigree 0.0532, pedigree (2,4,4,5,4)
  Calculated based on literature data published by the GENDORF Chemical Park. The factory produced an average of 2462760 tonnes of chemical substances (including intermediates) per year in the years 2015-2019. The average consumption of river water in the years 2015-2019 was 22000820 t per year. However, since the cooling water is modelled as an input, the amount of river water was adjusted to avoid double counting. 55% of the input amount of cooling water was deducted from the amount of river water, as that is the share of river water versus well water. This equals 0.00096543 m3/kg chemical produced.
  References:
  Chemiepark GENDORF, Umwelterklärung 2016, https://www.gendorf.de/Nachbarn/Umweltschutz/Industrie%20und%20Nachhaltigkeit
  Chemiepark GENDORF, Umwelterklärung 2017, https://www.gendorf.de/Nachbarn/Umweltschutz/Industrie%20und%20Nachhaltigkeit
  Chemiepark GENDORF, Umwelterklärung 2020, https://www.gendorf.de/Nachbarn/Umweltschutz/Industrie%20und%20Nachhaltigkeit
- Water, well, in ground [natural resource, in water]: 0.000816522 m3; lognormal variance with pedigree 0.0532, pedigree (2,4,4,5,4)
  Calculated based on literature data published by the GENDORF Chemical Park. The factory produced an average of 2462760 tonnes of chemical substances (including intermediates) per year in the years 2015-2019. The average consumption of well water in the years 2015-2019 was 18607480 t per year. However, since the cooling water is modelled as an input, the amount of well water was adjusted to avoid double counting. 45% of the input amount of cooling water was deducted from the amount of well water, as that is the share of well water versus river water. This equals 0.00081652 m3/kg chemical produced.
  References:
  Chemiepark GENDORF, Umwelterklärung 2016, https://www.gendorf.de/Nachbarn/Umweltschutz/Industrie%20und%20Nachhaltigkeit
  Chemiepark GENDORF, Umwelterklärung 2017, https://www.gendorf.de/Nachbarn/Umweltschutz/Industrie%20und%20Nachhaltigkeit
  Chemiepark GENDORF, Umwelterklärung 2020, https://www.gendorf.de/Nachbarn/Umweltschutz/Industrie%20und%20Nachhaltigkeit

## Emissions to nature
- Water [air, unspecified]: 0.00147008 m3; lognormal variance with pedigree 0.0926, pedigree (2,4,4,5,4)
  Calculated based on literature data published by the GENDORF Chemical Park. The factory produced an average of 2462760 tonnes of chemical substances (including intermediates) per year in the years 2015-2019. To determine the emissions of water to air, the difference of all water inputs (from river, well, tap water and cooling) and outputs (wastewater, emissions to water) was calculated. The average ouput of water to air in the years 2015-2019 was 3620444 m3 per year. This equals 0.00147 m3/kg chemical produced. For more information on the other water exchanges please consult the respective exchange comment.
  References:
  Chemiepark GENDORF, Umwelterklärung 2016, https://www.gendorf.de/Nachbarn/Umweltschutz/Industrie%20und%20Nachhaltigkeit
  Chemiepark GENDORF, Umwelterklärung 2017, https://www.gendorf.de/Nachbarn/Umweltschutz/Industrie%20und%20Nachhaltigkeit
  Chemiepark GENDORF, Umwelterklärung 2020, https://www.gendorf.de/Nachbarn/Umweltschutz/Industrie%20und%20Nachhaltigkeit
- Water [water, unspecified]: 0.0150391 m3; lognormal variance with pedigree 0.0926, pedigree (2,4,4,5,4)
  Calculated based on literature data published by the GENDORF Chemical Park. The factory produced an average of 2462760 tonnes of chemical substances (including intermediates) per year in the years 2015-2019. The amount of water released back to the environment consists of the sum of the amount of process water treated in the internal WWTP that is then released back to the environment and the amount of cooling water released back to the environment. The average ouput of the internal WWTP in the years 2015-2019 was 2628800 m3 and that of cooling water released back to the environment was 34408800 m3. This gives a yearly average of 37037600 m3 emissions of water to water. This equals 0.01504 m3/kg chemical produced.
  References:
  Chemiepark GENDORF, Umwelterklärung 2016, https://www.gendorf.de/Nachbarn/Umweltschutz/Industrie%20und%20Nachhaltigkeit
  Chemiepark GENDORF, Umwelterklärung 2017, https://www.gendorf.de/Nachbarn/Umweltschutz/Industrie%20und%20Nachhaltigkeit
  Chemiepark GENDORF, Umwelterklärung 2020, https://www.gendorf.de/Nachbarn/Umweltschutz/Industrie%20und%20Nachhaltigkeit

## Sampling procedure
Raw materials and emissions are modelled with a stoichiometric calculation. Energy consumption are modelled based on literature. Infrastructures are calculated with standard values.
