# sodium chloride production, powder

Dataset: EcoSpold 2, unit process
Geography: RoW
Time period: 2000-01-01 to 2023-12-31
Technology level: current
Classification: ISIC rev.4 ecoinvent: 0893:Extraction of salt
Synonyms: Salt; 7647-14-5; Saline; Halite; Sodium chloride; Table salt
Scenario: Business-as-Usual
System model: Allocation, cut-off by classification
Generated by: Roland Hischier
Published in: Althaus H.-J. 2007
Database: ecoinvent
isCopyrightProtected: true
accessRestrictedTo: 1

## General comment
This dataset represents the production of 1 kg of sodium chloride. Sodium chloride (NaCl) forms odorless cubic crystals. Depending on its degree of purity, the color varies between colorless when pure and white to gray when in the form of rock salt.
Sodium chloride has a huge variety of different uses. For example, salt is today the largest mineral feedstock consumed by the chemical industry. It is primarily used as a chemical feedstock for the production of chlorine and caustic soda in the chlor-alkali industry. Salt is also needed for the production of sodium chlorate and metallic sodium by electrolysis, and for the production of sodium sulfate and hydrochloric acid by reacting sodium chloride with sulfuric acid. Another very important area where sodium chloride is used is the human and animal nutrition, since all animals, humans included, need both sodium and chloride. Other relevant areas of use of salt are the maintenance and de-icing of roads as well as the conditioning of water.
In Europe, the possibilities for producing salt by solar evaporation are rather poor and concentrated around the Mediterranean area. Therefore, this dataset represents the production of dry sodium chloride by underground mining (51%) and by solution mining (49%). This dataset is based on data from a European salt producer, as well as literature.
References:
Althaus H.-J., Chudacoff M., Hischier R., Jungbluth N., Osses M. and Primas A. (2007) Life Cycle Inventories of Chemicals. ecoinvent report No. 8, v2.0. EMPA Dübendorf, Swiss Centre for Life Cycle Inventories, Dübendorf, CH,.
Gendorf (2016) Umwelterklärung 2015, Werk Gendorf Industriepark, www.gendorf.de.

## Included activities start
The activity starts when the raw materials enter the process.

## Included activities end
This activity ends with the production of sodium chloride. The dataset includes the solution mining process of sodium chloride, its cleaning to remove impurities, and the drying step. It is sold as bulk and therefore no packaging materials are included.

## Geography
Data from one European solution mining site, used to represent the European mix of 41% solution mining and 59% rock salt. The data is assumed to be representative of the global production. Some values are based on data from a large chemical factory located in Germany. These are assumed to be valid for this geography.

## Technology
For the production of dry salt, three different types of sodium chloride production methods can be distinguished namely, underground mining of halite deposits, solution mining with mechanical evaporation and solar evaporation. Their respective products are rock salt, evaporated salt and solar salt:
- Underground mining: The main characteristic of this technique is the fact that salt is not dissolved during the whole process. Instead underground halite deposits are mined with traditional techniques like undercutting, drilling and blasting or with huge mining machines with cutting heads. In a second step, the salt is crushed and screened to the desired size and then hoisted to the surface.
- Solution mining and mechanical evaporation: In this case, water is injected in a salt deposit, usually in about 150 to 500 m depth. The dissolution of the halite or salt deposits forms a cavern filled with brine. This brine is then pumped from the cavern back to the surface and transported to either an evaporation plant for the production of evaporated salt or transported directly to a chemical processing plant, e.g. a chlor-alkali plant.
- Solar evaporation: In this case salt is produced with the aid of the sun and wind out of seawater or natural brine in lakes. Within a chain of ponds, water is evaporated by sun until salt crystallizes on the floor of the ponds. Due to their natural process drivers, such plants must be located in areas with only small amounts of rain and high evaporation rates - e.g. in the Mediterranean area where the rate between evaporation and rainfall is 3:1, or in Australia, where even a ratio up to 15:1 can be found. There are some impurities due to the fact that seawater contains not only sodium chloride. That leads to impurities of calcium and magnesium sulfate as well as magnesium chloride. With the aid of clean brine from dissolved fine salt, these impurities are washed out.
As a fourth form on the market, the so-called 'salt in brine' may be found, which is especially used for the production of different chemicals. In this case, the solution mining technique without an evaporation step afterwards is used.
This dataset represents the production of dry sodium chloride by underground mining (51%) and by solution mining (49%) with modern solution mining technology (thermo compressing technology).
References:
Althaus H.-J., Chudacoff M., Hischier R., Jungbluth N., Osses M. and Primas A. (2007) Life Cycle Inventories of Chemicals. ecoinvent report No. 8, v2.0. EMPA Dübendorf, Swiss Centre for Life Cycle Inventories, Dübendorf, CH.

## Time period
The data in this dataset come from different years, but overall form the most realistic picture of the production. Some values are based on data published by the Gendorf factory that were collected between 2011 and 2015. The time period has been adjusted accordingly. For more details, see the comments of the exchanges.

## Parameters
- fraction, cooling water, cooling pond system, to air: 0.032 dimensionless; name fraction_CW_CP_to_air; lognormal variance with pedigree 0.0413, pedigree (2,3,1,3,1)
  Calculated based on literature value (Scown, C.D., 2011, Water Footprint of U.S. Transportation Fuels and supplying information of the article) (Vionnet, S., Quantis Water Database - Technical Report, 2012).
- fraction, cooling water, once-through system, to air: 0.004 dimensionless; name fraction_CW_OT_to_air; lognormal variance with pedigree 0.0413, pedigree (2,3,1,3,1)
  (same comment as for fraction, cooling water, cooling pond system, to air)
- fraction, cooling water, recirculating system, to air: 0.771 dimensionless; name fraction_CW_R_to_air; lognormal variance with pedigree 0.0413, pedigree (2,3,1,3,1)
  (same comment as for fraction, cooling water, cooling pond system, to air)
- fraction, cooling water, to air: 0.3875 dimensionless; name fraction_CW_to_air; = (0.5*fraction_CW_OT_to_air)+(0.5*fraction_CW_R_to_air); lognormal variance with pedigree 0.092025, pedigree (4,4,3,2,4)
  Calculated value based on literature value (see comments of the other parametres present in this dataset) and expert opinion. In the case when no industry/literature data are available about the type of cooling or directly fraction, cooling water, to air specific for the process a default assumption is applied. It is assumed that the once-through cooling system is used in 50% of all cases and recirculating system is used in another 50% of all cases.
- fraction, process water, to air: 0.205 dimensionless; name fraction_PW_to_air; lognormal variance with pedigree 0.092025, pedigree (4,4,3,2,4)
  Literature value (Statistics Canada, 2007 & Shaffer, K.H., 2008, Consumptive water use in the Great Lakes Basin, USGS) (Vionnet, S., Quantis Water Database - Technical Report, 2012).

## Reference product
- sodium chloride, powder: 1 kg; name RP; By-product classification allocatable product; CPC 16200: Salt and pure sodium chloride; sea water; HS2017 250100: Salt (including table salt and denatured salt); pure sodium chloride whether or not in aqueous solution; se[...]; CAS 7647-14-5
  Sodium chloride has a huge variety of different uses. For example, salt is today the largest mineral feedstock consumed by the chemical industry. It is primarily used as a chemical feedstock for the production of chlorine and caustic soda in the chlor-alkali industry. Salt is also needed for the production of sodium chlorate and metallic sodium by electrolysis, and for the production of sodium sulfate and hydrochloric acid by reacting sodium chloride with sulfuric acid. Another very important area where sodium chloride is used is the human and animal nutrition, since all animals, humans included, need both sodium and chloride. Other relevant areas of use of salt are the maintenance and de-icing of roads as well as the conditioning of water.
  References:
  Althaus H.-J., Chudacoff M., Hischier R., Jungbluth N., Osses M. and Primas A. (2007) Life Cycle Inventories of Chemicals. ecoinvent report No. 8, v2.0. EMPA Dübendorf, Swiss Centre for Life Cycle Inventories, Dübendorf, CH.
  production volume 2.87201e9 kg; name RP_PV
    Estimated value. The global production volume is extrapolated from the European production volume based on reports from Cefic (European Chemical Industry Council), and the American Chemistry Council.
    According to Cefic (2016a) the global sales of chemicals in the year 2015 was 3 534 billion euros. The reported share of sales per region are: EU28 14.7%; Other Europe (Switzerland, Norway, Turkey, Russia and Ukraine) 2.7%; NAFTA (US, Canada and Mexico) 16.5%; Latin America 3.8%; China 39.9%; Japan 3.9%; Republic of Korea 3.2%; India 2.2%; Rest of Asia 11.9%; Rest of the World 1.3%. Cefic also reports the US total sales, which amount to 518.7 billion euros out of the global 3 534 billion euros (14.7%). The same share is reported by the American Chemistry Council (2016), according to which the USA sales account for 15% of global sales for the year 2016.
    European production volume:
    Estimated value. According to the European Chemical Agency, the consumption of Sodium chloride for the year of 2016 is estimated to be 550000000 kg. The aforementioned value is the average of the range given in the literature. According to the European Chemical Industry Council (Cefic, 2016a), the total sales of chemicals of the European Union in 2016 amounted to 519 billion euros. Chemical imports were valued at 91 billion euros for the first 11 months of 2016. Based on this, the value for the total imports for the year 2016 was extrapolated, yielding a value of 99.3 billion euros. Furthermore, Cefic (2016b) reports a trade surplus (exports-imports) of 46.4 billion euros (once again extrapolated for the whole year using the value of 42 billion euros for the first 11 months of 2016). Considering all the aforementioned information, the total chemical consumption in the EU is calculated to be 472.6 billion euros (total sales-exports+imports). It is therefore calculated that production is 110% of consumption. This value is used to scale the information on chemical consumption to production. The European production volume is therefore 605000000 kg. Since no data were found for the global production this value was scaled accordingly.
    References:
    American Chemistry Council 2016. Outlook: U.S. Chemical Industry Continues to Outpace Industrial Output; Accounts for More Than One-Half of Construction Spending by Manufacturing Sector. Accessible at: https://www.americanchemistry.com/Media/PressReleasesTranscripts/ACC-news-releases/US-Chemical-Industry-Continues-to-Outpace-Industrial-Output.html
    European Chemical Agency, Brief profile of Sodium chloride, Accessible at: https://echa.europa.eu/brief-profile/-/briefprofile/100.028.726
    Cefic 2016a. Facts and figures 2016 of the European chemical industry. Accessible at: http://www.cefic.org/Facts-and-Figures/Chemicals-Industry-Profile/
    Cefic 2016b. 2016: EU chemicals output posts positive growth for third year running. Accessible at: http://www.cefic.org/Documents/RESOURCES/Chemical%20Trends%20Report/March-2017-Cefic-Chemicals-Trends-Report.pdf
  property price 0.0783432 EUR2005
    Calculated value based on data from U.S. Geological Survey (https://www.usgs.gov/) based on an average price from the years 2014-2018. Reports available here: https://d9-wret.s3-us-west-2.amazonaws.com/assets/palladium/production/atoms/files/mcs-2019-salt.pdf (2019) and https://pubs.usgs.gov/periodicals/mcs2022/mcs2022-salt.pdf (2022), last accessed 2022-08-07.
    The prices were converted to EUR based on the annual exchange rates published by the European Central Bank (https://sdw.ecb.europa.eu/quickview.do?SERIES_KEY=120.EXR.A.USD.EUR.SP00.A, last accessed on 2022-02-15) and adjusted for inflation relative to 2005 using the producer price index (PPI) of the euro area, published by eurostat (https://appsso.eurostat.ec.europa.eu/nui/show.do?dataset=sts_inpp_a&lang=en, last accessed on 2022-05-04).
  properties: carbon allocation 0 kg, carbon content 0, carbon content, fossil 0, carbon content, non-fossil 0, dry mass 1 kg, water content 0, water in wet mass 0 kg, wet mass 1 kg

## Inputs from technosphere
- chemical factory, organics: 4e-10 unit; lognormal variance with pedigree 0.31, pedigree (2,3,2,4,3)
  Calculated based on literature data published by the industry. For this activity, no information was readily available concerning infrastructure and land-use. Therefore, the infrastructure is estimated based on data from two chemical factories, the BASF site of Ludwigshafen and the chemical factory in Gendorf (which are both located in Germany), which produce a wide range of chemical substances. Based on this data, the following assumptions are made: the built area amounts to about 4.2 ha, the plant has an average output of 50'000 t/a and a lifespan of fifty years. The estimated infrastructure amount is therefore 4.00 E-10 units per kg of produced chemical.
  References:
  Althaus H.-J., Chudacoff M., Hischier R., Jungbluth N., Osses M. and Primas A. (2007) Life Cycle Inventories of Chemicals. ecoinvent report No. 8, v2.0. EMPA Dübendorf, Swiss Centre for Life Cycle Inventories, Dübendorf, CH.
  Gendorf (2000) Umwelterklärung 2000, Werk Gendorf. Werk Gendorf, Burgkirchen.
- decarbonising waste: -0.03 kg; name BP_decarbonising_waste; lognormal variance with pedigree 0.094, pedigree (1,4,1,5,4)
  Based on data from one solution mining site
  Uncertainty: b
  production volume; = RP_PV*BP_decarbonising_waste/ABS(RP)
    Calculated from the production volume of sodium chloride, powder in proportion to the respective output amounts.
  properties: dry mass 0.7 kg, water content 0.428571, wet mass 1 kg
- diesel, burned in building machine: 0.00428 MJ; lognormal variance with pedigree 0.0942, pedigree (1,4,2,5,4)
  Based on data from one solution mining site
  Uncertainty: b
  properties: heating value, net 1 MJ
- electricity, medium voltage: 0.00564958, 0.112696, 0.0378656, 0.00173009, 0.000346276, 7.43533e-5, 0.0116376 kWh (7 suppliers, which the file names only by identifier); sum of these 0.17 kWh; lognormal variance with pedigree 0.0942, pedigree (1,4,2,5,4)
  Based on data from one solution mining site
  Uncertainty: b
- heat, district or industrial, other than natural gas: 0.196909, 9.12242e-5 MJ (2 suppliers, which the file names only by identifier); sum of these 0.197 MJ; lognormal variance with pedigree 0.0942, pedigree (1,4,2,5,4)
  Based on data from one solution mining site
  Uncertainty: b
  properties: heating value, net 1 MJ
- quicklime, milled, loose: 0.0139 kg; lognormal variance with pedigree 0.0942, pedigree (1,4,2,5,4)
  Based on data from one solution mining site
  Uncertainty: b
  properties: dry mass 0.99 kg, water content 0.010101, wet mass 1 kg
- soda ash, light: 0.0127 kg; lognormal variance with pedigree 0.0942, pedigree (1,4,2,5,4)
  Based on data from one solution mining site
  Uncertainty: b
  properties: carbon content, fossil 0.0517241, dry mass 1 kg, heating value, net 3.43 MJ, wet mass 1 kg
- wastewater, average: -0.00380645, -1.35524e-5 m3 (2 suppliers, which the file names only by identifier); sum of these -0.00382 m3; lognormal variance with pedigree 0.094, pedigree (1,4,1,5,4)
  Based on data from one solution mining site
  Uncertainty: b
  production volume; = RP_PV*BP_wastewater_average/ABS(RP)
    (same comment as for decarbonising waste)
  properties: carbon content, non-fossil 0.194039, dry mass 0.346837 kg, water content 2882.2, wet mass 1000 kg
  note on carbon content, non-fossil: 0.0673 kg TOC/m3 (Tab A.17, ecoinvent v2.2 report 13_I). TOC was considered as Total Carbon.

## Inputs from nature
- Sodium chloride [natural resource, in ground]: 1 kg; lognormal variance with pedigree 0.0942, pedigree (1,4,2,5,4)
  Based on data from one solution mining site
  Uncertainty: b
- Water, cooling, unspecified natural origin [natural resource, in water]: 0.00269 m3; name water_cooling_UNO_input; lognormal variance with pedigree 0.088, pedigree (3,4,3,5,4)
  Based on former information of one solution mining site
  Uncertainty: b
- Water, unspecified natural origin [natural resource, in water]: 0.00382 m3; name water_UNO_input; lognormal variance with pedigree 0.088, pedigree (3,4,3,5,4)
  Based on former information of one solution mining site
  Uncertainty: b

## Emissions to nature
- Water [air, unspecified]: 0.00182548 m3; = (water_cooling_UNO_input*fraction_CW_to_air)+(water_UNO_input*fraction_PW_to_air); lognormal variance with pedigree 0.0429, pedigree (2,2,2,5,1)
  Calculated as a fraction of the input of water. For more details, refer to the mathematical relation and the parameters.
  property fraction, origin: fresh water 0; name fraction_origin_fresh_water
  property fraction, origin: salt water 0; name fraction_origin_salt_water
  property fraction, origin: unspecified 1; name fraction_origin_unspecified
- Water [water, unspecified]: 0.000864525 m3; = water_cooling_UNO_input*(1-fraction_CW_to_air)+water_UNO_input*(1-fraction_PW_to_air)-0.00382; lognormal variance with pedigree 0.0429, pedigree (2,2,2,5,1)
  (same comment as for Water)
  property carbon content, fossil 0; name C_content_fossil
  property carbon content, non-fossil 0; name C_content_non_fossil
  property dry mass 0 kg; name DM
  property fraction, origin: fresh water 0; name fraction_origin_fresh_water_Ww
  property fraction, origin: salt water 0; name fraction_origin_salt_water_Ww
  property fraction, origin: unspecified 1; name fraction_origin_unspecified_Ww
  property water in wet mass 1000 kg; name WWM
  property wet mass 1000 kg; name WM

## Sampling procedure
Questionnaire from one European solution mining site. Some values are calculated based on data from a large chemical factory located in Germany. For more details, see the comments of the exchanges.

## Extrapolations
This dataset has been copied from an original dataset covering the geography RER. The uncertainty has been adjusted accordingly.

## Review by Emilia Moreno Ruiz 2017-08-10
This dataset was additionally reviewed in a separate review process by Eric Johnson of Atlantic Consulting as well as Emilia Moreno Ruiz and Gregor Wernet of ecoinvent.
