# heat pump production, diffusion absorption, 4kW, future

Dataset: EcoSpold 2, unit process
Geography: RoW
Time period: 2000-01-01 to 2023-12-31
Technology level: current
Classification: EcoSpold01Categories: heat pumps/production of components
Classification: ISIC rev.4 ecoinvent: 2815:Manufacture of ovens, furnaces and furnace burners
Synonyms: DAWP; DAHP
Tags: ConvertedDataset
Scenario: Business-as-Usual
System model: Allocation, cut-off by classification
Generated by: Alex Primas
Published in: Primas A. 2007
Database: ecoinvent
isCopyrightProtected: true
accessRestrictedTo: 1

## General comment
The module reflects a diffusion absorption heat pump with peak load gas-boiler and a short borehole heat exchanger. Inventory based on information from literature for future production based on manufacturer data. Life time for the total system assumed with 20 years or 42'000 h full load operation.
[This dataset was already contained in the ecoinvent database version 2. It was not individually updated during the transfer to ecoinvent version 3. Life Cycle Impact Assessment results may still have changed, as they are affected by changes in the supply chain, i.e. in other datasets. This dataset was generated following the ecoinvent quality guidelines for version 2. It may have been subject to central changes described in the ecoinvent version 3 change report (http://www.ecoinvent.org/database/ecoinvent-version-3/reports-of-changes/), and the results of the central updates were reviewed extensively. The changes added e.g. consistent water flows and other information throughout the database. The documentation of this dataset can be found in the ecoinvent reports of version 2, which are still available via the ecoinvent website. The change report linked above covers all central changes that were made during the conversion process.]

## Included activities end
The module includes the most important materials used for production, the energy needed for production, planning and engineering. Also included is the transport of the raw materials.

## Geography
Process applicable in central European conditions.

## Technology
Diffusion absorption heat pump with 4 kWth nominal thermal power connected to a short borehole heat exchanger. The unit includes a peak load boiler which allows a maximal output power of 11 kWth. Operation with connection to low pressure gas network. Seasonal performance factor (SPF) of 1.32. Supply temperature of the heating system 50°C.

## Parameters
- fraction, process water, to air: 0.15 dimensionless; name fraction_PW_to_air; lognormal variance with pedigree 0.092025, pedigree (4,4,3,2,4)
- fraction, water, completely softened, to air: 0.15 dimensionless; name fraction_WCS_to_air; lognormal variance with pedigree 0.092025, pedigree (4,4,3,2,4)

## Reference product
- heat pump, diffusion absorption, 4kW, future: 1 unit; By-product classification allocatable product; CPC 43913: Refrigerating and freezing equipment and heat pumps, except household type equipment; HS2017 841861: Heat pumps; other than air conditioning machines of heading no. 8415
  EcoSpold01Location=CH
  production volume 3.96633 unit
    This is a placeholder value that does not reflect real-world production volumes. This dataset does not currently require a real-world production volume to work in the database framework, and no actual data were collected yet. This has no negative effect on the results of the ecoinvent database.
  property price 1782 EUR2005
    EU27 I/O database-68 Electronic machinery (4.02 EURO2003/kg dry soilds) in the 'EU & DK Input Output Database' (available in SimaPro); 446.5 kg
  properties: carbon allocation 0 kg, carbon content 0

## Inputs from technosphere
- aluminium, wrought alloy: 22 kg; lognormal variance with pedigree 0.072, pedigree (4,4,5,5,1)
  Estimation based on few references
  EcoSpold01Location=RER
  Uncertainty: estimation based on few references
  properties: dry mass 1 kg, wet mass 1 kg
- ammonia, anhydrous, liquid: 0.0420488, 0.0816253, 0.904764, 0.038245, 0.00855521, 0.31442, 0.0270281, 0.0833136 kg (8 suppliers, which the file names only by identifier); sum of these 1.5 kg; lognormal variance with pedigree 0.072, pedigree (4,4,5,5,1)
  Estimation based on few references
  EcoSpold01Location=CH
  Uncertainty: estimation based on few references
  properties: dry mass 1 kg, wet mass 1 kg
- building, hall, steel construction: 0.0089 m2; lognormal variance with pedigree 0.372, pedigree (4,4,5,5,1)
  Rough estimation based on company data of similar branch
  EcoSpold01Location=CH
  Uncertainty: rough estimation based on company data of similar branch
- building, multi-storey: 0.053 m3; lognormal variance with pedigree 0.372, pedigree (4,4,5,5,1)
  Rough estimation based on company data of similar branch
  EcoSpold01Location=RER
  Uncertainty: rough estimation based on company data of similar branch
- copper, cathode: 5 kg; lognormal variance with pedigree 0.072, pedigree (4,4,5,5,1)
  (same comment as for aluminium, wrought alloy)
  properties: dry mass 1 kg, wet mass 1 kg
- electricity, low voltage: 1.51912, 0.0678111, 1.06638, 22.134, 2.18473, 0.0136083, 5.01643, 7.62041, 0.37752 kWh (9 suppliers, which the file names only by identifier); sum of these 40 kWh; lognormal variance with pedigree 0.064, pedigree (3,4,5,5,3)
  Estimation based on specific energy demand of engineering hours
  EcoSpold01Location=CH
  Uncertainty: estimation based on specific energy demand of engineering hours
- electricity, medium voltage: 3.71516, 74.1092, 24.9005, 1.13771, 0.227712, 0.0488948, 5.17482, 7.65292, 16.0331 kWh (9 suppliers, which the file names only by identifier); sum of these 133 kWh; lognormal variance with pedigree 0.1246, pedigree (2,4,5,5,4)
  EcoSpold01Location=UCTE
  Approximation with company data of similar branch
  Uncertainty: approximation with company data of similar branch
- electronics scrap from control units: -4 kg; lognormal variance with pedigree 0.034, pedigree (4,4,3,5,1)
  Disposal of electronic parts material
  EcoSpold01Location=RER
  Uncertainty: disposal of electronic parts material
  production volume
    Calculated from the production volume of heat pump, diffusion absorption, 4kW, future in proportion to the respective output amounts.
  properties: carbon content, fossil 0.337146, carbon content, non-fossil 0.00013442, dry mass 1 kg, wet mass 1 kg
- electronics, for control units: 4 kg; lognormal variance with pedigree 0.072, pedigree (4,4,5,5,1)
  Estimation for control electronic based on few references
  EcoSpold01Location=RER
  Uncertainty: estimation for control electronic based on few references
  properties: carbon content, fossil 0.337146, carbon content, non-fossil 0.00013442, dry mass 1 kg, wet mass 1 kg
  note on carbon content, fossil: The control unit has a composition of 46% steel (housing), 32% plastics, 14% printed wiring boards and 8% cables (various types).;
- heat, central or small-scale, other than natural gas: 3.82081, 278.179 MJ (2 suppliers, which the file names only by identifier); sum of these 282 MJ; lognormal variance with pedigree 0.064, pedigree (3,4,5,5,3)
  (same comment as for electricity, low voltage)
  properties: heating value, net 1 MJ
- heat, district or industrial, natural gas: 10.7022, 651.278, 240.52 MJ (3 suppliers, which the file names only by identifier); sum of these 902.5 MJ; lognormal variance with pedigree 0.1246, pedigree (2,4,5,5,4)
  EcoSpold01Location=RER
  Approximation with company data of similar branch
  Uncertainty: approximation with company data of similar branch
  properties: heating value, net 1 MJ
- helium: 0.1 kg; lognormal variance with pedigree 0.078, pedigree (4,5,5,5,1)
  EcoSpold01Location=GLO
  Rough estimation
  Uncertainty: rough estimation
  properties: dry mass 1 kg, wet mass 1 kg
- injection moulding: 4 kg; lognormal variance with pedigree 0.072, pedigree (4,4,5,5,1)
  Based on material input
  EcoSpold01Location=RER
  Uncertainty: based on material input
- polyethylene, high density, granulate: 4 kg; lognormal variance with pedigree 0.072, pedigree (4,4,5,5,1)
  EcoSpold01Location=RER
  Estimation for plastic material based on few references
  Uncertainty: estimation for plastic material based on few references
  properties: carbon content, fossil 0.857143, dry mass 1 kg, heating value, net 42.47 MJ, wet mass 1 kg
  note on carbon content, fossil: Polyethylene is formed out of a huge amount of ethylene monomers (C2H4) (ecoinvent v2.2 report 11_II). MW=28 g/mol
- reinforcing steel: 165 kg; lognormal variance with pedigree 0.072, pedigree (4,4,5,5,1)
  (same comment as for aluminium, wrought alloy)
  properties: carbon content, fossil 0.004, dry mass 1 kg, wet mass 1 kg
- sheet rolling, chromium steel: 32 kg; lognormal variance with pedigree 0.072, pedigree (4,4,5,5,1)
  EcoSpold01Location=RER
  Based on material input
  Uncertainty: based on material input
- sheet rolling, steel: 165 kg; lognormal variance with pedigree 0.072, pedigree (4,4,5,5,1)
  Based on material input
  EcoSpold01Location=RER
  Uncertainty: based on material input
- steel, chromium steel 18/8, hot rolled: 32 kg; lognormal variance with pedigree 0.072, pedigree (4,4,5,5,1)
  (same comment as for aluminium, wrought alloy)
  properties: carbon content, fossil 0.0008, dry mass 1 kg, wet mass 1 kg
  note on carbon content, fossil: Stainless steel model is the grade 304 steel (18/8 stainless, 18% chromium 8% nickel; max. 0.08% C)
- stone wool, packed: 8 kg; lognormal variance with pedigree 0.072, pedigree (4,4,5,5,1)
  EcoSpold01Location=CH
  Estimation for insulation based on few references
  Uncertainty: estimation for insulation based on few references
  properties: carbon content, fossil 0.015401, dry mass 1 kg, wet mass 1 kg
  note on carbon content, fossil: The chemical composition of the glass fibres used in the rock wool production is similar to the composition of naturally cooled volcano basalt and has a composition listed in Tab. 3.1 and 3.2 in ecoinvent v2.2 report 16, part XIV. Rock wool contains: a minimum of 96% mineral fibres,between 0.5 and 3.0 weight percent of phenolic resin depending on the specific product characteristics, and about 0.2 percent mineral oil (ecoinvent v2.2 report 16, part XIV). An average composition of 1.8% phenolic resin, 0.2% mineral oil, and 98% mineral fibres has been assumed and used to calculate C content of the rock wool
- transport, passenger car: 200 km; lognormal variance with pedigree 0.2, pedigree (4,4,5,5,3)
  Estimation
  EcoSpold01Location=CH
  Uncertainty: estimation
- tube insulation, elastomere: 4 kg; lognormal variance with pedigree 0.072, pedigree (4,4,5,5,1)
  EcoSpold01Location=DE
  Estimation based on few references
  Uncertainty: estimation based on few references
  properties: carbon content, fossil 0.837817, dry mass 1 kg, heating value, net 25.39 MJ, wet mass 1 kg
  note on carbon content, fossil: The main raw material (93%) is synthetic rubber (Ethylene propylene diene monomer (EPDM)), that is used together with PVC (ecoinvent v2.2 report 7_XV), C2H3Cl
- waste mineral wool: -2.32654, -5.67346 kg (2 suppliers, which the file names only by identifier); sum of these -8 kg; lognormal variance with pedigree 0.034, pedigree (4,4,3,5,1)
  EcoSpold01Location=CH
  Disposal of insulation material
  Uncertainty: disposal of insulation material
  production volume
    (same comment as for electronics scrap from control units)
  properties: dry mass 1 kg, wet mass 1 kg
- waste polyethylene/polypropylene product: -2.263, -5.737 kg (2 suppliers, which the file names only by identifier); sum of these -8 kg; lognormal variance with pedigree 0.034, pedigree (4,4,3,5,1)
  EcoSpold01Location=CH
  Disposal of plastic material
  Uncertainty: disposal of plastic material
  production volume
    (same comment as for electronics scrap from control units)
  properties: carbon content, fossil 0.748045, dry mass 0.847 kg, heating value, net 42.47 MJ, water content 0.180638, wet mass 1 kg
  note on carbon content, fossil: Mixed various plastics was used to estimate the C content of this waste (Tab A.2, ecoinvent v2.2 report 13_I)
- wastewater, average: -0.245437, -0.058689, -0.00087385 m3 (3 suppliers, which the file names only by identifier); sum of these -0.305 m3; lognormal variance with pedigree 0.102, pedigree (4,4,1,5,4)
  EcoSpold01Location=CH
  Approximation for waste water treatment
  Uncertainty: approximation for waste water treatment
  production volume
    (same comment as for electronics scrap from control units)
  properties: carbon content, non-fossil 0.194039, dry mass 0.346837 kg, mass concentration, TOC 0.1091 kg/m3, mass concentration, calcium 0.039453 kg/m3, mass concentration, chlorine 0.030031 kg/m3, mass concentration, hydrogen 0.013365 kg/m3, mass concentration, nitrogen 0.031015 kg/m3, mass concentration, oxygen 0.069824 kg/m3, mass concentration, sodium 0.06456 kg/m3, mass concentration, sulfur 0.015602 kg/m3, water content 2882.2, wet mass 1000 kg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
  note on carbon content, non-fossil: 0.0673 kg TOC/m3 (Tab A.17, ecoinvent v2.2 report 13_I). TOC was considered as Total Carbon.
- water, completely softened: 2.14049, 2.85951 kg (2 suppliers, which the file names only by identifier); sum of these 5 kg; lognormal variance with pedigree 0.072, pedigree (4,4,5,5,1)
  EcoSpold01Location=RER
  Estimation based on few references
  Uncertainty: estimation based on few references
  properties: wet mass 1 kg
- zinc coat, coils: 15 m2; lognormal variance with pedigree 0.072, pedigree (4,4,5,5,1)
  Based on material input
  EcoSpold01Location=RER
  Uncertainty: based on material input

## Inputs from nature
- Occupation, industrial area [natural resource, land]: 1.6 m2*year; lognormal variance with pedigree 0.112, pedigree (4,4,5,5,1)
  Rough estimation based on company data of similar branch
  Uncertainty: rough estimation based on company data of similar branch
- Transformation, from unspecified [natural resource, land]: 0.032 m2; lognormal variance with pedigree 0.192, pedigree (4,4,5,5,1)
  (same comment as for Occupation, industrial area)
- Transformation, to industrial area [natural resource, land]: 0.032 m2; lognormal variance with pedigree 0.192, pedigree (4,4,5,5,1)
  (same comment as for Occupation, industrial area)
- Water, unspecified natural origin [natural resource, in water]: 0.305 m3; name water_UNO_input; lognormal variance with pedigree 0.1246, pedigree (2,4,5,5,4)
  Approximation with company data of similar branch
  Uncertainty: approximation with company data of similar branch

## Emissions to nature
- Water [air, unspecified]: 0.0465 m3; name water_to_air_unspecified; lognormal variance with pedigree 0.0827, pedigree (2,2,5,5,1)
  Calculated value based on literature values and expert opinion. See comments in the parametres' comment field.
  property fraction, origin: fresh water 0.016129; name fraction_origin_fresh_water
  property fraction, origin: salt water 0; name fraction_origin_salt_water
  property fraction, origin: unspecified 0.983871; name fraction_origin_unspecified

## Sampling procedure
Literature data and manufacturer information

## Extrapolations
none This dataset has been copied from an original dataset covering the geography CH. The uncertainty has been adjusted accordingly.

## Review by Rolf Frischknecht 2010-03-21
passed
none
