# heat production, at hard coal industrial furnace 1-10MW

Dataset: EcoSpold 2, unit process
Geography: Europe without Switzerland
Time period: 1988-01-01 to 2023-12-31
Technology level: current
Classification: EcoSpold01Categories: hard coal/heating systems
Classification: ISIC rev.4 ecoinvent: 3530:Steam and air conditioning supply
Tags: ConvertedDataset
Scenario: Business-as-Usual
System model: Allocation, cut-off by classification
Generated by: Christian Bauer
Published in: Röder, A. 2004
Database: ecoinvent
isCopyrightProtected: true
accessRestrictedTo: 1

## General comment
This dataset represents the production of heat from a 1-10 MW hard coal industrial furnace filled with 1 MJ of egg coal. The stoker-boiler furnace fires egg coals with hard coal quality between long-flame coal and fat coal. As there is no module for egg coal, the hard coal supply mix is used. The lifetime of the furnace is 20 years, which corresponds to 5000 fully load hours per year. The heating value is 28.9 MJ/kg and the efficiency factor is 80%.
[This dataset was already contained in the ecoinvent database version 2. It was not individually updated during the transfer to ecoinvent version 3. Life Cycle Impact Assessment results may still have changed, as they are affected by changes in the supply chain, i.e. in other datasets. This dataset was generated following the ecoinvent quality guidelines for version 2. It may have been subject to central changes described in the ecoinvent version 3 change report (http://www.ecoinvent.org/database/ecoinvent-version-3/reports-of-changes/), and the results of the central updates were reviewed extensively. The changes added e.g. consistent water flows and other information throughout the database. The documentation of this dataset can be found in the ecoinvent reports of version 2, which are still available via the ecoinvent website. The change report linked above covers all central changes that were made during the conversion process.]

## Included activities start
From reception of egg coal (hard coal supply mix).

## Included activities end
This activity ends with produced heat at the hard coal industrial furnace with 1 MJ of egg coal (hard coal supply mix). The dataset includes transport, all requirements for the combustion process as well as all emissions to air and the ash disposal. The dataset doesn’t include emissions to water.

## Technology
Average technology installed in early 1990s. The stoker-boiler furnace is used as reference technology. The efficiency factor of an industrial hard coal furnace is between 84% and 90%. Taking into account the less favorable part-load behavior and the losses through storage, a net efficiency of 80% is assumed.
Reference:
DGMK-Arbeitskreis (1992) Ansatzpunkte und Potentiale zur Minderung des Treibhauseffektes aus Sicht der fossilen Energieträger. Hamburg.
Fritsche U., Rausch L., Simon K.-H. (1989) Umweltwirkungsanalyse von Energiesystemen: Gesamt-Emissions-Modell Integrierter Systeme (GEMIS). Darmstadt/Kassel, Deutschland.
Jensch W. (1988) Vergleich von Energiesystemen unterschiedlicher Zentralisierung. IfE-Schriftenreihe Heft 22, München.
Menke C., Leithner R. (1990) Auswirkung der Energieversorgung auf die Luftqualität in der Region Braunschweig. In: BWK, Band 42, Nr.7/8, s.446-456.
Braun H., Angrüner B., Ecker P., Gschaider R., Sorger A., Wurst F., Ellinger R. (1991) Emissionen bei der Verbrennung. Wien.
Ratajczak E.-A. (1987) Emissionsmessungen an kohlegefeuerten Hausbrandfeuerstätten, insbesondere im Hinblick auf gesundheitsgefährdende Abgasbestandteile. Band 1-3, Im Auftrag des UBA Berlin, Essen.

## Parameters
- fraction, process water, to air: 0.15 dimensionless; name fraction_PW_to_air; lognormal variance with pedigree 0.092025, pedigree (4,4,3,2,4)
  Literature value. In case when no industry/process specific data are available, default evaporation fraction value is used. This value is 15% and is based on literature (Statistics Canada, 2007 & Shaffer, K.H., 2008, Consumptive water use in the Great Lakes Basin, USGS & Shiklomanov, 2003, World Water Resources at the Beginning of the 21st Century) and has been approved by an expert.
- fraction, water, completely softened, to air: 0.15 dimensionless; name fraction_WCS_to_air; = fraction_PW_to_air; lognormal variance with pedigree 0.092025, pedigree (4,4,3,2,4)
  Calculated value. See comment in the other parametres present in this dataset. Water, completely softened is considered to be always used as process water, thus process water fractions to air are applied to all water, completely softened input flows to calculate the amount of water consumed in the processes.
- scaling factor: 1.25 dimensionless; name scaling_factor

## Reference product
- heat, district or industrial, other than natural gas: 1 MJ; = 0.8 * scaling_factor; By-product classification allocatable product; CPC 17300: Steam and hot water
  EcoSpold01Location=RER
  Amount was scaled to 1.
  production volume 1.23825e12 MJ; name heat_apv
    Assumption. The original value from this dataset was altered in order to model the correct shares of district/industrial heat producing datasets on the market for heat, district or industrial, other than natural gas according to http://www.iea.org/statistics/statisticssearch/report/?country=EU28&product=electricityandheat&year=2012. See talk pages for further discussion.
    //Original comment and value for the global dataset//
    IEA coal and Peat statistics for 2007 (http://www.iea.org/stats/coaldata.asp?COUNTRY_CODE=29), industry. All bituminous coal in kg converted to MJ heat out by multiplying with 0.76 (conversion efficiency on a gross heating value basis) and dividing by 0.0294 (kg/MJ gross heating value).
    2.19E+13
  property price 0.0106 EUR2005
    Average European district heat price from Ecoheatcool and Euroheat 2005-2006, Ecoheat Work package 1: The European heat market. Final report. 10.6 EUR/GJ i s the price of district heat. http://www.solarthermalworld.org/files/Ecoheatcool%20WP1%20Web.pdf?download
  properties: Corresponding fuel use 1.25 MJ, carbon allocation 0 kg, carbon content 0, heating value, net 1 MJ

## Inputs from technosphere
- electricity, medium voltage: 0.005225 kWh; = 0.00418 * scaling_factor; source Heizwerk Bern 1993; lognormal variance with pedigree 0.066125, pedigree (4,2,5,2,3)
  Estimation. To estimate the electricity consumption, data of the heating plant in Bern is evaluated. At full load 1.13% of the input energy is consumed as electricity. The installed capacity in auxiliary units is divided into induced draft fan (31%), primary air fan (13%), feed pump (39%), electric filter (11.8%), rust (0.8%), feeding (1.8%), slag chain (0.2%), oil supply control (0.9%) and secondary air (1.4%). It is assumed that the electricity consumption increases through part load operation. Additionally it must be considered that the observed heating plant has a capacity of about 38 MW. Therefore, it is assumed that 1.5% of the input energy is consumed as electricity.
  Amount was scaled to the amount of reference product.
  EcoSpold01Location=UCTE
  Uncertainty: generic electricity consumption
- hard coal: 0.0241175, 0.0191325 kg (2 suppliers, which the file names only by identifier); sum of these 0.04325 kg; = 0.0346 * scaling_factor; source Fritsche U. 1992; lognormal variance with pedigree 0.0582, pedigree (4,2,5,3,1)
  Estimation. As there is no module for egg coal, the hard coal supply mix is assumed. The caloric value is 28.9 MJ/kg, the bulk density is 720-800 kg/m3, the water content is 8.7% and the ash content is 7.5%. Further values are 73.2% of carbonate, 0.8% of nitrogen, 0.8% of sulfur, 0.15% of chlorine, 0.005% of flour.
  Further references:
  Fritsche U., Matthes F.C. (1992) Analyse von Datenbasen zu klimarelevanten Emissionen in der Bundesrepublik Deutschland. Berlin/Darmstadt/Freiburg.
  Ruhrkohlen Handbuch (1987) Verlag Glückauf GmbH, 7. Auflage, Essen.
  Amount was scaled to the amount of reference product.
  EcoSpold01Location=UCTE
  Uncertainty: fuel input
  properties: carbon content, fossil 0.845, dry mass 0.94 kg, heating value, net 28.9 MJ, water content 0.0638298, wet mass 1 kg
  note on carbon content, fossil: C content 75-94% (specified in Tab 1.1, report 6, part VI). A mean content of 0.845 kg C/ kg dry hard coal was considered
  note on heating value, net: The heating value (28.9 MJ/kg) and the composition of the coal are average values available from the literature.
- hard coal ash: -1.05613e-5, -1.66711e-5, -2.34573e-5, -1.65017e-5, -3.50043e-6, -2.45741e-5, -0.000144585, -0.00111583, -9.79464e-5, -0.00207591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 kg (12 suppliers, which the file names only by identifier); sum of these -0.003625 kg; = 0.0029 * scaling_factor; source Vernon J.L. 1991; lognormal variance with pedigree 0.0703, pedigree (5,1,2,3,1)
  EcoSpold01Location=PL
  Estimation. Stoker-boiler furnaces emit between 300kg and 1000kg of particles per TJin if there is no particle separation. With an average of 650kg per TJin, 600kg of fly ash and 2300kg of bottom ash occurs. It is assumed that 100% of the ash is disposed (worst-case-scenario). In individual cases a 100% recycling rate is possible as well.
  Amount was scaled to the amount of reference product.
  Uncertainty: assumption: no reuse
  production volume; = hard_coal_ash*heat_apv
    Calculated from the production volume of hard coal, burned in industrial furnace 1-10MW in proportion to the respective output amounts.
  properties: dry mass 1 kg, wet mass 1 kg
- industrial furnace, coal, 1-10MW: 6.95e-10 unit; = 5.56E-10 * scaling_factor; lognormal variance with pedigree 0.3513, pedigree (2,3,5,3,1)
  Amount was scaled to the amount of reference product.
  EcoSpold01Location=RER
  Uncertainty: infrastructure
- water, completely softened: 0.009375 kg; name water_softened_input; = 0.0075 * scaling_factor; source Kamberger W. 1993; lognormal variance with pedigree 0.0706, pedigree (2,5,5,5,1)
  EcoSpold01Location=RER
  Estimation. It is assumed that 2% of the feed water is additionally required as decarbonised water (6t per TJin). For wet purification 1.5t per TJin of water is needed. Due to the lack of information the water used for cleaning can not be considered.
  Amount was scaled to the amount of reference product.
  Estimation. It is assumed that 2% of the feed water is additionally required as decarbonised water (6t per TJin). For wet purification 1.5t per TJin of water is needed. Due to the lack of information the water used for cleaning can not be considered.
  Amount was scaled to the amount of reference product.
  Uncertainty: rough estimate
  properties: wet mass 1 kg

## Emissions to nature
- Acetylene [air, urban air close to ground]: 6.25e-7 kg; = 5E-07 * scaling_factor; lognormal variance with pedigree 0.0913, pedigree (2,3,5,3,1)
  Modeled, based on “heat production, coal, emissions to air” - pdf-document on the dedicated talk page of ecoinvent (www.ecoinvent.org/documentation). The emission data are taken from the literature reporting measurements performed at the end of the 1980s in Germany and are based on the composition of the coal.
  Amount was scaled to the amount of reference product.
  Uncertainty: total NMVOC and profile estimate
- Aluminium III [air, urban air close to ground]: 1.3375e-5 kg; = 1.07E-05 * scaling_factor; lognormal variance with pedigree 0.7261, pedigree (4,5,5,3,1)
  Modeled, based on “heat production, coal, emissions to air” - pdf-document on the dedicated talk page of ecoinvent (www.ecoinvent.org/documentation). Emissions of trace elements were calculated using the ash content in the coal and average transfer coefficients for coal power plants with ash retention of 98 %.
  Amount was scaled to the amount of reference product.
  Uncertainty: from trace element balance; see report for details
- Antimony ion [air, urban air close to ground]: 1.975e-9 kg; = 1.58E-09 * scaling_factor; lognormal variance with pedigree 0.7261, pedigree (4,5,5,3,1)
  (same comment as for Aluminium III)
- Arsenic ion [air, urban air close to ground]: 3.1625e-8 kg; = 2.53E-08 * scaling_factor; lognormal variance with pedigree 0.7261, pedigree (4,5,5,3,1)
  (same comment as for Aluminium III)
- Barium II [air, urban air close to ground]: 1.575e-7 kg; = 1.26E-07 * scaling_factor; lognormal variance with pedigree 0.7261, pedigree (4,5,5,3,1)
  (same comment as for Aluminium III)
- Benzene [air, urban air close to ground]: 6.25e-7 kg; = 5E-07 * scaling_factor; lognormal variance with pedigree 0.0913, pedigree (2,3,5,3,1)
  (same comment as for Acetylene)
- Benzo(a)pyrene [air, urban air close to ground]: 1.25e-11 kg; = 1E-11 * scaling_factor; lognormal variance with pedigree 0.0913, pedigree (2,3,5,3,1)
  (same comment as for Acetylene)
- Beryllium II [air, urban air close to ground]: 1.575e-9 kg; = 1.26E-09 * scaling_factor; lognormal variance with pedigree 0.0913, pedigree (2,3,5,3,1)
  (same comment as for Acetylene)
- Boron [air, urban air close to ground]: 5.925e-7 kg; = 4.74E-07 * scaling_factor; lognormal variance with pedigree 0.7261, pedigree (4,5,5,3,1)
  (same comment as for Aluminium III)
- Bromine [air, urban air close to ground]: 1.185e-8 kg; = 9.48E-09 * scaling_factor; lognormal variance with pedigree 0.7261, pedigree (4,5,5,3,1)
  (same comment as for Aluminium III)
- Cadmium II [air, urban air close to ground]: 1.975e-9 kg; = 1.58E-09 * scaling_factor; lognormal variance with pedigree 0.7261, pedigree (4,5,5,3,1)
  (same comment as for Aluminium III)
- Calcium II [air, urban air close to ground]: 1.575e-6 kg; = 1.26E-06 * scaling_factor; lognormal variance with pedigree 0.7261, pedigree (4,5,5,3,1)
  (same comment as for Aluminium III)
- Carbon dioxide, fossil [air, urban air close to ground]: 0.114375 kg; = 0.0915 * scaling_factor; lognormal variance with pedigree 0.0408, pedigree (2,2,5,3,1)
  Modeled, based on “heat production, coal, emissions to air” - pdf-document on the dedicated talk page of ecoinvent (www.ecoinvent.org/documentation). The emission data are taken from the literature reporting measurements performed at the end of the 1980s in Germany and are based on the composition of the coal.
  Amount was scaled to the amount of reference product.
  Uncertainty: from carbon balance
- Carbon monoxide, fossil [air, urban air close to ground]: 0.000125 kg; = 0.0001 * scaling_factor; lognormal variance with pedigree 0.6913, pedigree (2,3,5,3,1)
  Modeled, based on “heat production, coal, emissions to air” - pdf-document on the dedicated talk page of ecoinvent (www.ecoinvent.org/documentation). The emission data are taken from the literature reporting measurements performed at the end of the 1980s in Germany and are based on the composition of the coal.
  Amount was scaled to the amount of reference product.
  Uncertainty: typical value
- Chromium III [air, urban air close to ground]: 2.8125e-8 kg; = 2.25E-08 * scaling_factor; lognormal variance with pedigree 0.7261, pedigree (4,5,5,3,1)
  (same comment as for Aluminium III)
- Chromium VI [air, urban air close to ground]: 3.475e-9 kg; = 2.78E-09 * scaling_factor; lognormal variance with pedigree 0.52, pedigree (1,1,5,1,1)
  Modeled, based on “heat production, coal, emissions to air” - pdf-document on the dedicated talk page of ecoinvent (www.ecoinvent.org/documentation). The emission data are taken from the literature reporting measurements performed at the end of the 1980s in Germany and are based on the composition of the coal.
  Amount was scaled to the amount of reference product.
- Cobalt II [air, urban air close to ground]: 3.95e-9 kg; = 3.16E-09 * scaling_factor; lognormal variance with pedigree 0.7261, pedigree (4,5,5,3,1)
  (same comment as for Aluminium III)
- Copper ion [air, urban air close to ground]: 2.075e-8 kg; = 1.66E-08 * scaling_factor; lognormal variance with pedigree 0.7261, pedigree (4,5,5,3,1)
  (same comment as for Aluminium III)
- Dinitrogen monoxide [air, urban air close to ground]: 1.25e-6 kg; = 1E-06 * scaling_factor; lognormal variance with pedigree 0.0913, pedigree (2,3,5,3,1)
  (same comment as for Carbon monoxide, fossil)
- Dioxins, measured as 2,3,7,8-tetrachlorodibenzo-p-dioxin [air, urban air close to ground]: 2.5e-14 kg; = 2E-14 * scaling_factor; lognormal variance with pedigree 0.3513, pedigree (2,3,5,3,1)
  (same comment as for Chromium VI)
- Ethane [air, urban air close to ground]: 1.875e-6 kg; = 1.5E-06 * scaling_factor; lognormal variance with pedigree 0.0913, pedigree (2,3,5,3,1)
  (same comment as for Acetylene)
- Ethylene [air, urban air close to ground]: 3.75e-6 kg; = 3E-06 * scaling_factor; lognormal variance with pedigree 0.0913, pedigree (2,3,5,3,1)
  (same comment as for Acetylene)
- Formaldehyde [air, urban air close to ground]: 1e-7 kg; = 8E-08 * scaling_factor; lognormal variance with pedigree 0.0913, pedigree (2,3,5,3,1)
  (same comment as for Acetylene)
- Hydrocarbons, aliphatic, alkanes, unspecified [air, urban air close to ground]: 6.25e-7 kg; = 5E-07 * scaling_factor; lognormal variance with pedigree 0.0913, pedigree (2,3,5,3,1)
  (same comment as for Acetylene)
- Hydrocarbons, aliphatic, unsaturated [air, urban air close to ground]: 6.25e-7 kg; = 5E-07 * scaling_factor; lognormal variance with pedigree 0.0913, pedigree (2,3,5,3,1)
  (same comment as for Acetylene)
- Hydrochloric acid [air, urban air close to ground]: 5.0625e-5 kg; = 4.05E-05 * scaling_factor; lognormal variance with pedigree 0.1161, pedigree (4,5,5,3,1)
  (same comment as for Aluminium III)
- Hydrogen fluoride [air, urban air close to ground]: 1.575e-6 kg; = 1.26E-06 * scaling_factor; lognormal variance with pedigree 0.1161, pedigree (4,5,5,3,1)
  (same comment as for Aluminium III)
- Iodine [air, urban air close to ground]: 1.425e-8 kg; = 1.14E-08 * scaling_factor; lognormal variance with pedigree 0.7261, pedigree (4,5,5,3,1)
  (same comment as for Aluminium III)
- Iron ion [air, urban air close to ground]: 5.525e-6 kg; = 4.42E-06 * scaling_factor; lognormal variance with pedigree 0.7261, pedigree (4,5,5,3,1)
  (same comment as for Aluminium III)
- Lead II [air, urban air close to ground]: 9.475e-8 kg; = 7.58E-08 * scaling_factor; lognormal variance with pedigree 0.7261, pedigree (4,5,5,3,1)
  (same comment as for Aluminium III)
- Lead-210 [air, urban air close to ground]: 5.8125e-5 kBq; = 4.65E-05 * scaling_factor; lognormal variance with pedigree 0.7261, pedigree (4,5,5,3,1)
  Modeled, based on “heat production, coal, emissions to air” - pdf-document on the dedicated talk page of ecoinvent (www.ecoinvent.org/documentation). From radioactivity of the elements.
  Amount was scaled to the amount of reference product.
  Uncertainty: from radioactivity of the elements; see report for details
- Magnesium [air, urban air close to ground]: 4.7375e-6 kg; = 3.79E-06 * scaling_factor; lognormal variance with pedigree 0.7261, pedigree (4,5,5,3,1)
  (same comment as for Aluminium III)
- Manganese II [air, urban air close to ground]: 2.7625e-8 kg; = 2.21E-08 * scaling_factor; lognormal variance with pedigree 0.7261, pedigree (4,5,5,3,1)
  (same comment as for Aluminium III)
- Mercury II [air, urban air close to ground]: 3.55e-9 kg; = 2.84E-09 * scaling_factor; lognormal variance with pedigree 0.7261, pedigree (4,5,5,3,1)
  (same comment as for Aluminium III)
- Methane, fossil [air, urban air close to ground]: 1.25e-5 kg; = 1E-05 * scaling_factor; lognormal variance with pedigree 0.0913, pedigree (2,3,5,3,1)
  (same comment as for Carbon monoxide, fossil)
- Molybdenum VI [air, urban air close to ground]: 5.925e-9 kg; = 4.74E-09 * scaling_factor; lognormal variance with pedigree 0.7261, pedigree (4,5,5,3,1)
  (same comment as for Aluminium III)
- NMVOC, non-methane volatile organic compounds [air, urban air close to ground]: 2.15e-6 kg; = 1.72E-06 * scaling_factor; lognormal variance with pedigree 0.0913, pedigree (2,3,5,3,1)
  (same comment as for Acetylene)
- Nickel II [air, urban air close to ground]: 2.375e-8 kg; = 1.9E-08 * scaling_factor; lognormal variance with pedigree 0.7261, pedigree (4,5,5,3,1)
  (same comment as for Aluminium III)
- Nitrogen oxides [air, urban air close to ground]: 0.00025 kg; = 0.0002 * scaling_factor; lognormal variance with pedigree 0.0913, pedigree (2,3,5,3,1)
  (same comment as for Carbon monoxide, fossil)
- Particulate Matter, < 2.5 um [air, urban air close to ground]: 2.5e-5 kg; = 2E-05 * scaling_factor; lognormal variance with pedigree 0.3761, pedigree (4,5,5,3,1)
  Modeled, based on “heat production, coal, emissions to air” - pdf-document on the dedicated talk page of ecoinvent (www.ecoinvent.org/documentation). Size distribution of particles has been estimated on the basis of recent information from U.S. Environmental Protection Agency (EPA).
  Amount was scaled to the amount of reference product.
  Uncertainty: total PM and profile estimates
- Particulate Matter, > 10 um [air, urban air close to ground]: 1.25e-5 kg; = 1E-05 * scaling_factor; lognormal variance with pedigree 0.1161, pedigree (4,5,5,3,1)
  (same comment as for Particulate Matter, < 2.5 um)
- Particulate Matter, > 2.5 um and < 10um [air, urban air close to ground]: 2.5e-5 kg; = 2E-05 * scaling_factor; lognormal variance with pedigree 0.1961, pedigree (4,5,5,3,1)
  (same comment as for Particulate Matter, < 2.5 um)
- Phosphorus [air, urban air close to ground]: 7.9e-8 kg; = 6.32E-08 * scaling_factor; lognormal variance with pedigree 0.7261, pedigree (4,5,5,3,1)
  (same comment as for Aluminium III)
- Polonium-210 [air, urban air close to ground]: 0.00010625 kBq; = 8.5E-05 * scaling_factor; lognormal variance with pedigree 0.7261, pedigree (4,5,5,3,1)
  (same comment as for Lead-210)
- Potassium I [air, urban air close to ground]: 1.575e-6 kg; = 1.26E-06 * scaling_factor; lognormal variance with pedigree 0.7261, pedigree (4,5,5,3,1)
  (same comment as for Aluminium III)
- Potassium-40 [air, urban air close to ground]: 1.6875e-5 kBq; = 1.35E-05 * scaling_factor; lognormal variance with pedigree 0.7261, pedigree (4,5,5,3,1)
  (same comment as for Lead-210)
- Propane [air, urban air close to ground]: 1.25e-6 kg; = 1E-06 * scaling_factor; lognormal variance with pedigree 0.0913, pedigree (2,3,5,3,1)
  (same comment as for Acetylene)
- Propylene [air, urban air close to ground]: 6.25e-7 kg; = 5E-07 * scaling_factor; lognormal variance with pedigree 0.0913, pedigree (2,3,5,3,1)
  (same comment as for Acetylene)
- Radium-226 [air, urban air close to ground]: 1.5e-5 kBq; = 1.2E-05 * scaling_factor; lognormal variance with pedigree 0.7261, pedigree (4,5,5,3,1)
  (same comment as for Lead-210)
- Radium-228 [air, urban air close to ground]: 8.125e-5 kBq; = 6.5E-05 * scaling_factor; lognormal variance with pedigree 0.7261, pedigree (4,5,5,3,1)
  (same comment as for Lead-210)
- Radon-220 [air, urban air close to ground]: 1.25e-6 kBq; = 1E-06 * scaling_factor; lognormal variance with pedigree 0.7261, pedigree (4,5,5,3,1)
  (same comment as for Lead-210)
- Radon-222 [air, urban air close to ground]: 1.25e-6 kBq; = 1E-06 * scaling_factor; lognormal variance with pedigree 0.7261, pedigree (4,5,5,3,1)
  (same comment as for Lead-210)
- Scandium [air, urban air close to ground]: 1.575e-9 kg; = 1.26E-09 * scaling_factor; lognormal variance with pedigree 0.7261, pedigree (4,5,5,3,1)
  (same comment as for Aluminium III)
- Selenium IV [air, urban air close to ground]: 1.185e-8 kg; = 9.48E-09 * scaling_factor; lognormal variance with pedigree 0.7261, pedigree (4,5,5,3,1)
  (same comment as for Aluminium III)
- Silicon [air, urban air close to ground]: 1.975e-5 kg; = 1.58E-05 * scaling_factor; lognormal variance with pedigree 0.7261, pedigree (4,5,5,3,1)
  (same comment as for Aluminium III)
- Sodium I [air, urban air close to ground]: 7.9e-7 kg; = 6.32E-07 * scaling_factor; lognormal variance with pedigree 0.7261, pedigree (4,5,5,3,1)
  (same comment as for Aluminium III)
- Strontium II [air, urban air close to ground]: 2.375e-7 kg; = 1.9E-07 * scaling_factor; lognormal variance with pedigree 0.7261, pedigree (4,5,5,3,1)
  (same comment as for Aluminium III)
- Sulfur dioxide [air, urban air close to ground]: 0.000625 kg; = 0.0005 * scaling_factor; lognormal variance with pedigree 0.0761, pedigree (4,5,5,3,1)
  Modeled, based on “heat production, coal, emissions to air” - pdf-document on the dedicated talk page of ecoinvent (www.ecoinvent.org/documentation). The emission data are taken from the literature reporting measurements performed at the end of the 1980s in Germany and are based on the composition of the coal.
  Amount was scaled to the amount of reference product.
  Uncertainty: from S-balance
- Thallium I [air, urban air close to ground]: 1.975e-9 kg; = 1.58E-09 * scaling_factor; lognormal variance with pedigree 0.7261, pedigree (4,5,5,3,1)
  (same comment as for Aluminium III)
- Thorium [air, urban air close to ground]: 2.375e-9 kg; = 1.9E-09 * scaling_factor; lognormal variance with pedigree 0.7261, pedigree (4,5,5,3,1)
  (same comment as for Aluminium III)
- Thorium-228 [air, urban air close to ground]: 6.875e-6 kBq; = 5.5E-06 * scaling_factor; lognormal variance with pedigree 0.7261, pedigree (4,5,5,3,1)
  (same comment as for Lead-210)
- Thorium-232 [air, urban air close to ground]: 4.375e-6 kBq; = 3.5E-06 * scaling_factor; lognormal variance with pedigree 0.7261, pedigree (4,5,5,3,1)
  (same comment as for Lead-210)
- Tin ion [air, urban air close to ground]: 7.9e-10 kg; = 6.32E-10 * scaling_factor; lognormal variance with pedigree 0.7261, pedigree (4,5,5,3,1)
  (same comment as for Aluminium III)
- Titanium ion [air, urban air close to ground]: 4.7375e-7 kg; = 3.79E-07 * scaling_factor; lognormal variance with pedigree 0.7261, pedigree (4,5,5,3,1)
  (same comment as for Aluminium III)
- Toluene [air, urban air close to ground]: 1.25e-7 kg; = 1E-07 * scaling_factor; lognormal variance with pedigree 0.0913, pedigree (2,3,5,3,1)
  (same comment as for Acetylene)
- Uranium [air, urban air close to ground]: 3.1625e-9 kg; = 2.53E-09 * scaling_factor; lognormal variance with pedigree 0.7261, pedigree (4,5,5,3,1)
  (same comment as for Aluminium III)
- Uranium-238 [air, urban air close to ground]: 1.25e-5 kBq; = 1E-05 * scaling_factor; lognormal variance with pedigree 0.7261, pedigree (4,5,5,3,1)
  (same comment as for Lead-210)
- Vanadium V [air, urban air close to ground]: 4.7375e-8 kg; = 3.79E-08 * scaling_factor; lognormal variance with pedigree 0.7261, pedigree (4,5,5,3,1)
  (same comment as for Aluminium III)
- Water [air, unspecified]: 1.40625e-6 m3; name water_to_air_unspecified; = (((water_softened_input/scaling_factor)/1000*fraction_WCS_to_air)) * scaling_factor; lognormal variance with pedigree 0.0807, pedigree (2,2,5,1,1)
  Calculated value based on literature values and expert opinion. See comments in the parametres' comment field.
  Amount was scaled to the amount of reference product.
  Calculated value based on literature values and expert opinion. See comments in the parametres' comment field.
  Amount was scaled to the amount of reference product.
  property fraction, origin: fresh water 1; name fraction_origin_fresh_water
  property fraction, origin: salt water 0; name fraction_origin_salt_water
  property fraction, origin: unspecified 0; name fraction_origin_unspecified
- Xylenes, unspecified [air, urban air close to ground]: 1.25e-7 kg; = 1E-07 * scaling_factor; lognormal variance with pedigree 0.0913, pedigree (2,3,5,3,1)
  (same comment as for Acetylene)
- Zinc II [air, urban air close to ground]: 3.95e-9 kg; = 3.16E-09 * scaling_factor; lognormal variance with pedigree 0.7261, pedigree (4,5,5,3,1)
  (same comment as for Aluminium III)
- Water [water, unspecified]: 7.96875e-6 m3; name water_to_water_unspecified; = (((water_softened_input/scaling_factor)/1000)*(1-fraction_WCS_to_air)) * scaling_factor; lognormal variance with pedigree 0.0807, pedigree (2,2,5,1,1)
  (same comment as for Water)
  property carbon content, fossil 0; name C_content_fossil
  property carbon content, non-fossil 0; name C_content_non_fossil
  property dry mass 0 kg; name DM
  property fraction, origin: fresh water 1; name fraction_origin_fresh_water_Ww
  property fraction, origin: salt water 0; name fraction_origin_salt_water_Ww
  property fraction, origin: unspecified 0; name fraction_origin_unspecified_Ww
  property water in wet mass 1000 kg; name WWM
  property wet mass 1000 kg; name WM

## Sampling procedure
Based on literature data.

## Review by Hans-Jörg Althaus 2005-07-19
passed

## Review by Roland Hischier 2011-09-23
Tansfer of documentation done.
