# natural gas, burned in polymer electrolyte membrane fuel cell 2kWe, future

Dataset: EcoSpold 2, unit process
Geography: RoW
Time period: 2000-01-01 to 2023-12-31
Technology level: current
Classification: ISIC rev.4 ecoinvent: 3510:Electric power generation, transmission and distribution
Classification: EcoSpold01Categories: natural gas/cogeneration
Synonyms: proton exchange membrane fuel cell; PEMFC; Polymer Elektrolyt Membran Brennstoffzelle; PEFC; polymer electrolyte fuel cell; Membran Brennstoffzelle
Tags: with true value; ConvertedDataset
Scenario: Business-as-Usual
System model: Allocation, cut-off by classification
Generated by: Alex Primas
Published in: Primas A. 2007
Database: ecoinvent
isCopyrightProtected: true
accessRestrictedTo: 1

## General comment
The multioutput-process 'natural gas, burned in PEM fuel cell 2kWe delivers the coproducts 'heat, natural gas, allocation exergy, at PEM fuel cell 2kWe' and 'electricity, natural gas, allocation exergy, at PEM fuel cell 2kWe'. The exergy allocation is the allocation scheme suggested to be used within the ecoinvent database (e.g. in electricity mixes).
[This dataset was already contained in the ecoinvent database version 2. It was not individually updated during the transfer to ecoinvent version 3. Life Cycle Impact Assessment results may still have changed, as they are affected by changes in the supply chain, i.e. in other datasets. This dataset was generated following the ecoinvent quality guidelines for version 2. It may have been subject to central changes described in the ecoinvent version 3 change report (http://www.ecoinvent.org/database/ecoinvent-version-3/reports-of-changes/), and the results of the central updates were reviewed extensively. The changes added e.g. consistent water flows and other information throughout the database. The documentation of this dataset can be found in the ecoinvent reports of version 2, which are still available via the ecoinvent website. The change report linked above covers all central changes that were made during the conversion process.]

## Included activities end
The module includes fuel input, infrastructure and emissions to air.

## Geography
Natural gas input modelled for Switzerland. Process applicable in central European conditions.

## Technology
polymer electrolyte membrane (PEM) fuel cell for stationary cogeneration. Performance, stack lifetime and catalyst use according to expected future values for a serial product. Operation with connection to low pressure gas network. Electrical efficiency 32%, total efficiency 87%.

## Reference product
- heat, future: 1 MJ; By-product classification allocatable product; CPC 17300: Steam and hot water
  EcoSpold01Location=CH
  production volume 0 MJ
    Future technology, not available today.
  property Corresponding fuel use 1.6565 MJ; name fuel_use; = 0.04662*35.532/1
    Lower heating value of the fuel input related to the heat/electricity output
  property exergy 0.1393 MJ
    allocation factor for electricity (=1) vs. heat, where heat is calculated as the termodynamic mean temperature Tm = (Tfeed-Treturn)/ln(Tfeed/Treturn), relative to the application temperature (Tu, typically = 293 K), i.e. (Tm-Tu)/Tm
  property price 0.0106 EUR2005
    Average European district heat price from Ecoheatcool and Euroheat 2005-2006, Ecoheat Work package 1: The European heat market. Final report. 10.6 EUR/GJ i s the price of district heat. http://www.solarthermalworld.org/files/Ecoheatcool%20WP1%20Web.pdf?download
  properties: allocation factor 0.193172, carbon allocation 0 kg, carbon content 0, heating value, net 1 MJ, true value 0.00538814, true value relation 0.1393

## Inputs from technosphere
- fuel cell, polymer electrolyte membrane, 2kW electrical, future: 2.9123e-7 unit; lognormal variance with pedigree 0.3532, pedigree (2,3,5,5,1)
  Uncertainty of life time
  EcoSpold01Location=CH
  Uncertainty: uncertainty of life time
- maintenance, polymer electrolyte membrane fuel cell, 2kW electrical: 4.07734e-6 unit; lognormal variance with pedigree 0.0432, pedigree (2,3,5,5,1)
  Uncertainty of maintenance cycle
  EcoSpold01Location=CH
  Uncertainty: uncertainty of maintenance cycle
- natural gas, low pressure: 8.63936e-5, 0.000161885, 0.000239161, 0.000292125, 0.000455657, 0.000337346, 7.05548e-5, 0.000129315, 0.0011773, 0.000396216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 m3 (16 suppliers, which the file names only by identifier); sum of these 0.0090057 m3; lognormal variance with pedigree 0.2106, pedigree (5,5,5,5,5)
  Input
  EcoSpold01Location=CH
  Uncertainty: input
  properties: carbon content, fossil 0.695187, dry mass 1 kg, heating value, gross 40 MJ, heating value, net 36 MJ, wet mass 1 kg
  note on carbon content, fossil: C content considered the same as in high pressure (consumption mix)
  note on heating value, net: Literature value, Source: Christoph Meili;Niels Jungbluth;Maresa Bussa (2021) Life cycle inventories of crude oil and natural gas extraction. ESU-services Ltd. commissioned by BAFU & VSG, Schaffhausen, Switzerland, http://esu-services.ch/data/public-lci-reports/
- storage, 650 l mini CHP plant: 2.05026e-7 unit; lognormal variance with pedigree 0.3532, pedigree (2,3,5,5,1)
  EcoSpold01Location=CH
  Uncertainty of life time
  Uncertainty: uncertainty of life time

## Emissions to nature
- Carbon dioxide, fossil [air, urban air close to ground]: 0.0196684 kg; lognormal variance with pedigree 0.0512, pedigree (2,5,5,5,1)
  Composition of natural gas
  Uncertainty: composition of natural gas
- Carbon monoxide, fossil [air, urban air close to ground]: 5.97078e-7 kg; lognormal variance with pedigree 0.6932, pedigree (2,3,5,5,1)
  Estimate based on different references
  Uncertainty: estimate based on different references
- Methane, fossil [air, urban air close to ground]: 1.40489e-6 kg; lognormal variance with pedigree 0.1106, pedigree (4,3,5,5,1)
  Estimate based on few references
  Uncertainty: estimate based on few references
- NMVOC, non-methane volatile organic compounds [air, urban air close to ground]: 1.05367e-7 kg; lognormal variance with pedigree 0.1006, pedigree (4,3,5,5,1)
  Estimate based on different references
  Uncertainty: estimate based on different references
- Nitrogen oxides [air, urban air close to ground]: 4.56589e-7 kg; lognormal variance with pedigree 0.0832, pedigree (2,3,5,5,1)
  Estimate based on different references
  Uncertainty: estimate based on different references
- Particulate Matter, < 2.5 um [air, urban air close to ground]: 7.02445e-11 kg; lognormal variance with pedigree 0.39, pedigree (4,4,5,5,3)
  Estimate based on one references
  Uncertainty: estimate based on one references
- Sulfur dioxide [air, urban air close to ground]: 1.93172e-7 kg; lognormal variance with pedigree 0.0512, pedigree (2,5,5,5,1)
  Composition of natural gas
  Uncertainty: composition of natural gas

## Sampling procedure
Literature data and manufacturer information

## Extrapolations
none This dataset has been copied from an original dataset covering the geography CH. The uncertainty has been adjusted accordingly.

## Review by Rolf Frischknecht 2007-08-13
passed
none

## Review by Emilia Moreno Ruiz 2012-04-16
calculation of fuel use property.
