# treatment of used industrial electronic device, manual dismantling

Dataset: EcoSpold 2, unit process
Geography: RoW
Time period: 2005-01-01 to 2023-12-31
Technology level: current
Classification: ISIC rev.4 ecoinvent: 3830:Materials recovery
Scenario: Business-as-Usual
System model: Allocation, cut-off by classification
Share of production covered: 100 %
Generated by: Roland Hischier
Published in: Hischier R. 2007
Database: ecoinvent
isCopyrightProtected: true
accessRestrictedTo: 1

## General comment
The process represents the treatment 'used industrial electronic device' by manual dismantling in various fractions.

## Included activities start
The activity starts with the waste being available at the gate of the treatment facility. Collection and transportation of the waste to the treatment plant is not included.

## Included activities end
This activity ends when the used industrial electronic device has been dismantled manually.

## Geography
Modelling parameters are not specific to this geography.

## Technology
Commonly performed manual dismantling activities

## Reference product
- used industrial electronic device: -1 kg; name RP_amount_1; By-product classification Waste; CPC 39990: Other wastes n.e.c.
  production volume 431250 kg; name RP_PV_1
    calculated as the total PV of the used industrial electronic device generated in the database at the global geography (1875000 kg) and is split based on its market share (23% for manual dismantling)
  property carbon content, fossil 0.0818694
    The composition of an average industrial device was extracted from Tab 4.38 (ecoinvent v2.2 report 18_V). 88% steel, that was considered to have a C content of 0.012 (C content was calculated out of emission factors published in Commission Decision of 18 July 2007 establishing guidelines for the monitoring and reporting of greenhouse gas emissions pursuant to Directive 2003/87/EC of the European Parliament and of the Council (notified under document number C(2007) 3416)); 8% plastics (plastics C content was calculated using data in Tab A.2, ecoinvent v2.2 report 13_I); 3.2% PWB & plugs (C content calculated using PWB composition)
  property carbon content, non-fossil 3.07246e-5
    (same comment as for used industrial electronic device)
  property price 0 EUR2005
    Waste products are assigned a price of zero as they are assumed to require further treatment.
  properties: carbon allocation 0.0819002 kg, carbon content 0.0819002, dry mass 1 kg, water content 0, water in wet mass 0 kg, wet mass 1 kg

## Inputs from technosphere
- manual treatment facility, waste electric and electronic equipment: 1.6e-8 unit; lognormal variance with pedigree 0.578, pedigree (4,5,5,5,5)
  Rough estimation of infrastructure
  Uncertainty: rough estimation of infrastructure
- used cable: -0.008 kg; name BP_amount_1; lognormal variance with pedigree 0.016, pedigree (3,4,1,5,1)
  Calculated - based on composition data
  Uncertainty: calculated - based on composition data
  production volume; = ABS(RP_PV_1 * (BP_amount_1 / RP_amount_1))
    Calculated from production volume of reference product using the relative outputs.
  properties: carbon content, fossil 0.27472, dry mass 1 kg, wet mass 1 kg
  note on carbon content, fossil: According to the European company, 1 kg cable is split up into 0.66 kg of copper and 0.34 kg of plastics (ecoinvent v2.2 report 18_V, pg 97). Plastic C content (0.808) was calculated using data in Tab A.2, ecoinvent v2.2 report 13_I.
- used printed wiring boards: -0.032 kg; lognormal variance with pedigree 0.016, pedigree (3,4,1,5,1)
  Calculated - based on composition data
  Uncertainty: calculated - based on composition data
  production volume
    Calculated from the production volume of used industrial electronic device in proportion to the respective output amounts.
  properties: carbon content, fossil 0.193742, carbon content, non-fossil 0.000960142, dry mass 1 kg, wet mass 1 kg
  note on carbon content, fossil: Composition of printed wiring boards used to calculate C content
- waste plastic, consumer electronics: -0.08 kg; lognormal variance with pedigree 0.016, pedigree (3,4,1,5,1)
  Calculated - based on composition data
  Uncertainty: calculated - based on composition data
  production volume
    (same comment as for used printed wiring boards)
  properties: carbon content, fossil 0.830215, dry mass 0.847 kg, heating value, net 34.78 MJ, water content 0.180638, wet mass 1 kg
  note on carbon content, fossil: C content in 1 kg DM was calculated using data in Tab A.2, ecoinvent v2.2 report 13_I
  note on heating value, net: Assumed equal to "waste plastic, consumer electronics, sorted".

## Sampling procedure
own experiences

## Extrapolations
This dataset has been copied from an original dataset covering the geography CH. The uncertainty and Production Volume (PV) has been adjusted accordingly.

## Review by Jürgen Sutter 2007-08-31
passed.

## Review by Emilia Moreno Ruiz 2012-12-19
correction of exchange "used cable"
