# treatment of waste, electrical and electronic cables, open burning

Dataset: EcoSpold 2, unit process
Geography: RoW
Time period: 2010-01-01 to 2023-12-31
Technology level: current
Classification: ISIC rev.4 ecoinvent: 3821:Treatment and disposal of non-hazardous waste
Synonyms: open; off-burning; uncontrolled burning
Scenario: Business-as-Usual
System model: Allocation, cut-off by classification
Generated by: Avraam Symeonidis
Database: ecoinvent
isCopyrightProtected: true
accessRestrictedTo: 1

## General comment
This dataset represents the activity of waste disposal of 'waste, electrical and electronic cables' in uncontrolled, open burning. Recommended use of this dataset: The process takes place in an informal recycling site in the capital of Ghana, Accra. Copper recovery is a source of income for the informal recyclers and hence is the major motive behind this process. This dataset models emissions from open burning of electrical and electronic cables. Any geographical and temporal distinctions and climate situation are irrelevant for this UPR-LCI. Inventoried waste contains 62% Copper in waste cables; 38% wire insulation for copper cables; . Waste composition (wet, in ppm): upper heating value 10.54 MJ/kg; lower heating value 10.46 MJ/kg; H2O 978.12; O 8817.5; H 28360; C 208470; S 316.9; N 420.08; P n.a.; B n.a.; Cl 119920; Br 19.74; F 5.612; I n.a.; Ag n.a.; As 0.72096; Ba 77.987; Cd 4.7186; Co 8.5942; Cr 12.338; Cu 629510; Hg 0.23135; Mn 24.801; Mo n.a.; Ni 5.588; Pb 6.7106; Sb 12.612; Se 0.79685; Sn 99.065; V 338.07; Zn 55.608; Be 0.18973; Sc n.a.; Sr 33.581; Ti 379.45; Tl 0.15178; W n.a.; Si n.a.; Fe 1172; Ca 306.97; Al 75.89; K n.a.; Mg 11.369; Na 556.09; . Share of metals in waste not oxidised and bulk-recyclable (exclude very small or thin parts) copper: 99.9%. Recycling rates for metallic iron = 95% for metallic aluminium = 0% for metallic copper = 95% . From the burn residues 0.598kg copper, are separated and recycled. A mass of 0.106kg residues are left on ground.
The composition of waste electrical and electronic cables (62% copper and 38% "wire insulation for copper cables") is documented in the respective dataset reference. The fraction "wire insulation for copper cables" is composed by 66.3% PVC, 31.2% PE and Cu 2.5%. Reference: Doka G. (2009) Life Cycle Inventories of Waste Treatment Services. ecoinvent report
No. 13. Swiss Centre for Life Cycle Inventories, St. Gallen
Reference: Amoyaw-Osei, Y & Agyekum, O.O. & Pwamang, John & Thiébaud (-Müller), Esther & Fasko, R & Schluep, Mathias. (2011). Ghana e-waste country assessment. SBC e-waste Africa project.
Picture source: Oeko-Institut

## Included activities start
The activity starts with the waste being available at the location (gate) of the uncontrolled disposal. Collection and transportation of the waste to the uncontrolled disposal location is not included.

## Included activities end
The activity ends with the waste being disposed, in an uncontrolled manner and waste-specific emissions from open burning are released to the environment (air and soil).

## Geography
Modelling parameters representing a generic open burning process, not geographical specific.

## Technology
This is an inventory for open burning of solid waste. Informal or uncontrolled burning. No flue gas treatment. Suitable for informal recycling (e.g. burning of e-waste). Based on Municipal waste incineration without any pollution control. Residues (minus any actually recycled metals) are left on site. Assumption of share of thermal NOx to total NOx in average waste burning process is 30%. Contribution from thermal NOx is 810mg per kg waste. Recycling rates for metallic iron = 95% for metallic aluminium = 0% for metallic copper = 95% .

## Time period
This dataset represents a generic open burning without any temporal distinction.

## Reference product
- waste, electrical and electronic cables: -1 kg; By-product classification Waste; CPC 39361: Waste and scrap of copper
  Main reference product of this activity (supply of disposal service).
  production volume 5.616e6 kg
    This value is estimated based on assumptions. Due to lack of data it is here assumed that the Global production volume of waste, electrical and electronic cables that are driven to open burninng is assumed to be 10 times the respective amount documented in the case of Ghana where: according to surveys circa 200 kg of cables were burned in one hour. Assuming 10 working hours per day, for six working days per week and 52 weeks per year this yield a production volume of 624000 kg of burned cables.
    Reference:
    Amoyaw-Osei, Y & Agyekum, O.O. & Pwamang, John & Thiébaud (-Müller), Esther & Fasko, R & Schluep, Mathias. (2011). Ghana e-waste country assessment. SBC e-waste Africa project.
  property aluminium content 7.5964e-5
    Value is calculated based on the waste composition of this waste. More information are found in the product information of the waste.
  property antimony content 1.2625e-5
    (same comment as for waste, electrical and electronic cables)
  property arsenic content 7.2166e-7
    (same comment as for waste, electrical and electronic cables)
  property barium content 7.8064e-5
    (same comment as for waste, electrical and electronic cables)
  property beryllium content 1.8991e-7
    (same comment as for waste, electrical and electronic cables)
  property bromine content 1.9759e-5
    (same comment as for waste, electrical and electronic cables)
  property cadmium content 4.7232e-6
    (same comment as for waste, electrical and electronic cables)
  property calcium content 0.00030727
    (same comment as for waste, electrical and electronic cables)
  property carbon content, fossil 0.20867
    (same comment as for waste, electrical and electronic cables)
  property chlorine content 0.12003
    (same comment as for waste, electrical and electronic cables)
  property chromium content 1.235e-5
    (same comment as for waste, electrical and electronic cables)
  property cobalt content 8.6026e-6
    (same comment as for waste, electrical and electronic cables)
  property copper content 0.63013
    (same comment as for waste, electrical and electronic cables)
  property fluorine content 5.6175e-6
    (same comment as for waste, electrical and electronic cables)
  property heating value, net 10.46 MJ
    Value taken from the general comment of the treatment dataset.
  property hydrogen content 0.028387
    (same comment as for waste, electrical and electronic cables)
  property iron content 0.0011732
    (same comment as for waste, electrical and electronic cables)
  property lead content 6.7172e-6
    (same comment as for waste, electrical and electronic cables)
  property magnesium content 1.1381e-5
    (same comment as for waste, electrical and electronic cables)
  property manganese content 2.4825e-5
    (same comment as for waste, electrical and electronic cables)
  property mercury content 2.3157e-7
    (same comment as for waste, electrical and electronic cables)
  property nickel content 5.5935e-6
    (same comment as for waste, electrical and electronic cables)
  property nitrogen content 0.0004205
    (same comment as for waste, electrical and electronic cables)
  property oxygen content 0.0088261
    (same comment as for waste, electrical and electronic cables)
  property price 0 EUR2005
    Waste products are assigned a price of zero as they are assumed to require further treatment.
  property selenium content 7.9763e-7
    (same comment as for waste, electrical and electronic cables)
  property sodium content 0.00055663
    (same comment as for waste, electrical and electronic cables)
  property strontium content 3.3614e-5
    (same comment as for waste, electrical and electronic cables)
  property sulfur content 0.00031721
    (same comment as for waste, electrical and electronic cables)
  property thallium content 1.5193e-7
    (same comment as for waste, electrical and electronic cables)
  property tin content 9.9162e-5
    (same comment as for waste, electrical and electronic cables)
  property titanium content 0.00037982
    (same comment as for waste, electrical and electronic cables)
  property vanadium content 0.00033841
    (same comment as for waste, electrical and electronic cables)
  property zinc content 5.5662e-5
    (same comment as for waste, electrical and electronic cables)
  properties: carbon allocation 0.208466 kg, carbon content 0.20867, carbon content, non-fossil 0, dry mass 0.99902 kg, heating value, gross 10.537 MJ, water content 0.000980961, water in wet mass 0.00098 kg, wet mass 1 kg

## Inputs from technosphere
- copper scrap, sorted, pressed: -0.5976 kg; lognormal variance with pedigree 0.0064683, pedigree (1,1,1,1,1)
  Metallic copper scrap removed from ash reamains and recycled.
  Uncertainty: uncertainty is calculated from uncertainties in waste composition and transfer coefficients to soild residues
  production volume; = 0.5976*6240000
    Calculated from production volume of reference product using the relative outputs.
  properties: dry mass 1 kg, price 2.84 EUR2005, wet mass 1 kg

## Inputs from nature
- Oxygen [natural resource, in air]: 0.72414 kg; lognormal variance with pedigree 0.05744, pedigree (1,1,3,1,1)
  oxygen from ambient air needed to combust and oxidise this waste. Net demand, i.e. without air O2 leaving the process uncombusted.
  Uncertainty: uncertainty is calculated from uncertainties in waste composition and transfer coefficients to flue gas and soild residues

## Emissions to nature
- Acetaldehyde [air, urban air close to ground]: 0.0004284 kg; lognormal variance with pedigree 0.0431, pedigree (1,1,3,1,1)
  Process-specific (constant) emissions to air from open burning.
  Uncertainty: uncertainty generic estimate
- Aluminium III [air, urban air close to ground]: 6.2555e-8 kg; lognormal variance with pedigree 1.1081, pedigree (1,1,3,1,1)
  Emissions to air from open burning.
  Uncertainty: Uncertainty calculated depending on waste input and uncertainty of transfer coefficents in incineration model.
- Antimony ion [air, urban air close to ground]: 3.031e-11 kg; lognormal variance with pedigree 1.5248, pedigree (1,1,3,1,1)
  (same comment as for Aluminium III)
- Arsenic ion [air, urban air close to ground]: 6.1446e-9 kg; lognormal variance with pedigree 1.6672, pedigree (1,1,3,1,1)
  (same comment as for Aluminium III)
- Barium II [air, urban air close to ground]: 3.2143e-6 kg; lognormal variance with pedigree 1.0229, pedigree (1,1,3,1,1)
  (same comment as for Aluminium III)
- Benzene [air, urban air close to ground]: 0.00097975 kg; lognormal variance with pedigree 0.0431, pedigree (1,1,3,1,1)
  (same comment as for Acetaldehyde)
- Beryllium II [air, urban air close to ground]: 3.5859e-10 kg; lognormal variance with pedigree 1.8715, pedigree (1,1,3,1,1)
  (same comment as for Aluminium III)
- Bromine [air, urban air close to ground]: 6.3302e-6 kg; lognormal variance with pedigree 1.1835, pedigree (1,1,3,1,1)
  (same comment as for Aluminium III)
- Cadmium II [air, urban air close to ground]: 2.6697e-8 kg; lognormal variance with pedigree 1.4308, pedigree (1,1,3,1,1)
  (same comment as for Aluminium III)
- Calcium II [air, urban air close to ground]: 7.2475e-6 kg; lognormal variance with pedigree 0.84964, pedigree (1,1,3,1,1)
  (same comment as for Aluminium III)
- Carbon dioxide, fossil [air, urban air close to ground]: 0.68367 kg; lognormal variance with pedigree 0.07566, pedigree (1,1,3,1,1)
  Emissions to air from open burning.
  Uncertainty: Uncertainty calculated depending on waste input, uncertainty of transfer coefficents in incineration model,and uncertainty in CO and CH4 emissions.
- Carbon monoxide, fossil [air, urban air close to ground]: 0.0386 kg; lognormal variance with pedigree 0.64957, pedigree (1,1,3,1,1)
  (same comment as for Acetaldehyde)
- Chromium III [air, urban air close to ground]: 1.8398e-8 kg; lognormal variance with pedigree 1.3346, pedigree (1,1,3,1,1)
  (same comment as for Aluminium III)
- Cobalt II [air, urban air close to ground]: 3.4663e-7 kg; lognormal variance with pedigree 1.316, pedigree (1,1,3,1,1)
  (same comment as for Aluminium III)
- Copper ion [air, urban air close to ground]: 1.0455e-5 kg; lognormal variance with pedigree 0.22991, pedigree (1,1,3,1,1)
  (same comment as for Aluminium III)
- Dinitrogen monoxide [air, urban air close to ground]: 0.00011625 kg; lognormal variance with pedigree 0.0431, pedigree (1,1,3,1,1)
  (same comment as for Aluminium III)
- Dioxins, measured as 2,3,7,8-tetrachlorodibenzo-p-dioxin [air, urban air close to ground]: 6.4981e-9 kg; lognormal variance with pedigree 0.58797, pedigree (1,1,3,1,1)
  Process-specific (constant) emissions to air from open burning.
  Uncertainty: Uncertainty calculated from uncetainty in Chlorine content in waste and estimation formula
- Ethyl benzene [air, urban air close to ground]: 0.00032746 kg; lognormal variance with pedigree 0.0431, pedigree (1,1,3,1,1)
  (same comment as for Acetaldehyde)
- Formaldehyde [air, urban air close to ground]: 0.00044365 kg; lognormal variance with pedigree 0.0431, pedigree (1,1,3,1,1)
  (same comment as for Acetaldehyde)
- Hydrochloric acid [air, urban air close to ground]: 0.082254 kg; lognormal variance with pedigree 0.10799, pedigree (1,1,3,1,1)
  (same comment as for Aluminium III)
- Hydrogen fluoride [air, urban air close to ground]: 6.2978e-7 kg; lognormal variance with pedigree 1.3594, pedigree (1,1,3,1,1)
  (same comment as for Aluminium III)
- Iron ion [air, urban air close to ground]: 2.1236e-6 kg; lognormal variance with pedigree 0.72666, pedigree (1,1,3,1,1)
  (same comment as for Aluminium III)
- Lead II [air, urban air close to ground]: 5.6391e-8 kg; lognormal variance with pedigree 1.3763, pedigree (1,1,3,1,1)
  (same comment as for Aluminium III)
- Magnesium [air, urban air close to ground]: 3.4062e-8 kg; lognormal variance with pedigree 1.3289, pedigree (1,1,3,1,1)
  (same comment as for Aluminium III)
- Manganese II [air, urban air close to ground]: 2.1111e-7 kg; lognormal variance with pedigree 1.203, pedigree (1,1,3,1,1)
  (same comment as for Aluminium III)
- Mercury II [air, urban air close to ground]: 1.4021e-7 kg; lognormal variance with pedigree 1.7603, pedigree (1,1,3,1,1)
  (same comment as for Aluminium III)
- Methane, fossil [air, urban air close to ground]: 0.0059 kg; lognormal variance with pedigree 0.0431, pedigree (1,1,3,1,1)
  (same comment as for Acetaldehyde)
- Nickel II [air, urban air close to ground]: 7.9724e-9 kg; lognormal variance with pedigree 1.4402, pedigree (1,1,3,1,1)
  (same comment as for Aluminium III)
- Nitrogen oxides [air, urban air close to ground]: 0.0013208 kg; lognormal variance with pedigree 0.32194, pedigree (1,1,3,1,1)
  (same comment as for Aluminium III)
- PAH, polycyclic aromatic hydrocarbons [air, urban air close to ground]: 0.0003443 kg; lognormal variance with pedigree 0.30374, pedigree (1,1,3,1,1)
  (same comment as for Acetaldehyde)
- Particulate Matter, < 2.5 um [air, urban air close to ground]: 0.060431 kg; lognormal variance with pedigree 0.10772, pedigree (1,1,3,1,1)
  (same comment as for Aluminium III)
- Particulate Matter, > 10 um [air, urban air close to ground]: 0.023243 kg; lognormal variance with pedigree 0.10772, pedigree (1,1,3,1,1)
  (same comment as for Aluminium III)
- Particulate Matter, > 2.5 um and < 10um [air, urban air close to ground]: 0.03254 kg; lognormal variance with pedigree 0.10772, pedigree (1,1,3,1,1)
  (same comment as for Aluminium III)
- Phenol [air, urban air close to ground]: 1.4799e-5 kg; lognormal variance with pedigree 0.0431, pedigree (1,1,3,1,1)
  (same comment as for Acetaldehyde)
- Polychlorinated biphenyls [air, urban air close to ground]: 1.1189e-7 kg; lognormal variance with pedigree 0.0431, pedigree (1,1,3,1,1)
  (same comment as for Acetaldehyde)
- Selenium IV [air, urban air close to ground]: 6.9061e-8 kg; lognormal variance with pedigree 1.6165, pedigree (1,1,3,1,1)
  (same comment as for Aluminium III)
- Sodium I [air, urban air close to ground]: 1.3697e-5 kg; lognormal variance with pedigree 0.77045, pedigree (1,1,3,1,1)
  (same comment as for Aluminium III)
- Strontium II [air, urban air close to ground]: 3.3581e-8 kg; lognormal variance with pedigree 1.2117, pedigree (1,1,3,1,1)
  (same comment as for Aluminium III)
- Styrene [air, urban air close to ground]: 0.0005275 kg; lognormal variance with pedigree 0.0431, pedigree (1,1,3,1,1)
  (same comment as for Acetaldehyde)
- Sulfur dioxide [air, urban air close to ground]: 0.00013649 kg; lognormal variance with pedigree 0.82093, pedigree (1,1,3,1,1)
  (same comment as for Aluminium III)
- Thallium I [air, urban air close to ground]: 3.0356e-10 kg; lognormal variance with pedigree 1.8985, pedigree (1,1,3,1,1)
  (same comment as for Aluminium III)
- Tin ion [air, urban air close to ground]: 1.9413e-10 kg; lognormal variance with pedigree 1.2579, pedigree (1,1,3,1,1)
  (same comment as for Aluminium III)
- Titanium ion [air, urban air close to ground]: 4.0234e-6 kg; lognormal variance with pedigree 0.83612, pedigree (1,1,3,1,1)
  (same comment as for Aluminium III)
- Toluene [air, urban air close to ground]: 0.000372 kg; lognormal variance with pedigree 0.0431, pedigree (1,1,3,1,1)
  (same comment as for Acetaldehyde)
- Vanadium V [air, urban air close to ground]: 2.6102e-5 kg; lognormal variance with pedigree 0.81936, pedigree (1,1,3,1,1)
  (same comment as for Aluminium III)
- Water [air, urban air close to ground]: 0.00022785 m3; lognormal variance with pedigree 0.24728, pedigree (1,1,3,1,1)
  water vapour from waste humidity, hydrogen oxidation.
  Uncertainty: Uncertainty calculated from uncertainty in waste composition and the uncertainty of fraction to air.
- Zinc II [air, urban air close to ground]: 4.1372e-7 kg; lognormal variance with pedigree 1.0984, pedigree (1,1,3,1,1)
  (same comment as for Aluminium III)
- Aluminium III [soil, industrial]: 7.5828e-5 kg; lognormal variance with pedigree 1.00075, pedigree (1,1,3,1,1)
  Emissions from open burning to residues left on ground.
  Uncertainty: Uncertainty calculated depending on waste input and uncertainty of transfer coefficents in incineration model.
- Antimony ion [soil, industrial]: 1.2612e-5 kg; lognormal variance with pedigree 1.2392, pedigree (1,1,3,1,1)
  (same comment as for Aluminium III)
- Arsenic ion [soil, industrial]: 7.1481e-7 kg; lognormal variance with pedigree 1.6137, pedigree (1,1,3,1,1)
  (same comment as for Aluminium III)
- Barium II [soil, industrial]: 7.4773e-5 kg; lognormal variance with pedigree 0.99713, pedigree (1,1,3,1,1)
  (same comment as for Aluminium III)
- Beryllium II [soil, industrial]: 1.8937e-7 kg; lognormal variance with pedigree 1.7848, pedigree (1,1,3,1,1)
  (same comment as for Aluminium III)
- Bromine [soil, industrial]: 1.341e-5 kg; lognormal variance with pedigree 1.1803, pedigree (1,1,3,1,1)
  (same comment as for Aluminium III)
- Cadmium II [soil, industrial]: 4.6919e-6 kg; lognormal variance with pedigree 1.3689, pedigree (1,1,3,1,1)
  (same comment as for Aluminium III)
- Calcium II [soil, industrial]: 0.00029973 kg; lognormal variance with pedigree 0.81501, pedigree (1,1,3,1,1)
  (same comment as for Aluminium III)
- Carbon [soil, industrial]: 0.0010455 kg; lognormal variance with pedigree 0.12888, pedigree (1,1,3,1,1)
  (same comment as for Aluminium III)
- Chloride [soil, industrial]: 0.039919 kg; lognormal variance with pedigree 0.11092, pedigree (1,1,3,1,1)
  (same comment as for Aluminium III)
- Chromium III [soil, industrial]: 1.232e-5 kg; lognormal variance with pedigree 1.2421, pedigree (1,1,3,1,1)
  (same comment as for Aluminium III)
- Cobalt II [soil, industrial]: 8.2476e-6 kg; lognormal variance with pedigree 1.2899, pedigree (1,1,3,1,1)
  (same comment as for Aluminium III)
- Copper ion [soil, industrial]: 0.031927 kg; lognormal variance with pedigree 0.55765, pedigree (1,1,3,1,1)
  (same comment as for Aluminium III)
- Dioxins, measured as 2,3,7,8-tetrachlorodibenzo-p-dioxin [soil, industrial]: 1.805e-9 kg; lognormal variance with pedigree 1.0684, pedigree (1,1,3,1,1)
  (same comment as for Dioxins, measured as 2,3,7,8-tetrachlorodibenzo-p-dioxin)
- Fluoride [soil, industrial]: 5.0137e-6 kg; lognormal variance with pedigree 1.3461, pedigree (1,1,3,1,1)
  (same comment as for Aluminium III)
- Iron ion [soil, industrial]: 0.0011699 kg; lognormal variance with pedigree 0.63893, pedigree (1,1,3,1,1)
  (same comment as for Aluminium III)
- Lead II [soil, industrial]: 6.6542e-6 kg; lognormal variance with pedigree 1.3226, pedigree (1,1,3,1,1)
  (same comment as for Aluminium III)
- Magnesium [soil, industrial]: 1.1335e-5 kg; lognormal variance with pedigree 1.2529, pedigree (1,1,3,1,1)
  (same comment as for Aluminium III)
- Manganese II [soil, industrial]: 2.459e-5 kg; lognormal variance with pedigree 1.1495, pedigree (1,1,3,1,1)
  (same comment as for Aluminium III)
- Mercury II [soil, industrial]: 9.1136e-8 kg; lognormal variance with pedigree 1.762, pedigree (1,1,3,1,1)
  (same comment as for Aluminium III)
- Nickel II [soil, industrial]: 5.5801e-6 kg; lognormal variance with pedigree 1.3467, pedigree (1,1,3,1,1)
  (same comment as for Aluminium III)
- Nitrogen [soil, industrial]: 4.206e-6 kg; lognormal variance with pedigree 0.8238, pedigree (1,1,3,1,1)
  (same comment as for Aluminium III)
- Selenium IV [soil, industrial]: 7.2779e-7 kg; lognormal variance with pedigree 1.6008, pedigree (1,1,3,1,1)
  (same comment as for Aluminium III)
- Sodium I [soil, industrial]: 0.00054239 kg; lognormal variance with pedigree 0.73653, pedigree (1,1,3,1,1)
  (same comment as for Aluminium III)
- Strontium II [soil, industrial]: 3.3548e-5 kg; lognormal variance with pedigree 1.1093, pedigree (1,1,3,1,1)
  (same comment as for Aluminium III)
- Sulfur [soil, industrial]: 0.00027141 kg; lognormal variance with pedigree 0.81086, pedigree (1,1,3,1,1)
  (same comment as for Aluminium III)
- Thallium I [soil, industrial]: 1.5148e-7 kg; lognormal variance with pedigree 1.8131, pedigree (1,1,3,1,1)
  (same comment as for Aluminium III)
- Tin ion [soil, industrial]: 9.9065e-5 kg; lognormal variance with pedigree 0.96528, pedigree (1,1,3,1,1)
  (same comment as for Aluminium III)
- Titanium ion [soil, industrial]: 0.00037543 kg; lognormal variance with pedigree 0.78695, pedigree (1,1,3,1,1)
  (same comment as for Aluminium III)
- Vanadium V [soil, industrial]: 0.00031197 kg; lognormal variance with pedigree 0.80225, pedigree (1,1,3,1,1)
  (same comment as for Aluminium III)
- Zinc II [soil, industrial]: 5.5194e-5 kg; lognormal variance with pedigree 1.0422, pedigree (1,1,3,1,1)
  (same comment as for Aluminium III)

## Sampling procedure
The waste composition was derived from literature. All information are found in the general comment. The UPR-LCI is created with a model for waste-specific life cycle inventories of open burning of waste.

Reference for the model:
Doka G. (2017) A model for waste-specific life cycle inventories of open burning of waste. Doka Life Cycle
Assessments, Zurich, Switzerland. Available at http://www.doka.ch/publications.htm

## Review by Gabor Doka 2018-01-30
passed.
