# planting, potato

Dataset: EcoSpold 2, unit process
Geography: US
Time period: 2021-01-01 to 2023-12-31
Technology level: current
Classification: ISIC rev.4 ecoinvent: 0161:Support activities for crop production
Scenario: Business-as-Usual
System model: Allocation, cut-off by classification
Generated by: Juanita Barrera
Database: ecoinvent
isCopyrightProtected: true
accessRestrictedTo: 1

## General comment
This dataset represents the service of planting potatoes over 1 ha of agricultural land. A four-row potato planter, working width of 3.7 m, is considered.

## Included activities start
The process starts from preliminary work at farm, like attaching the adequate machinery to the tractor.

## Included activities end
This activity ends with potato planting. The dataset includes the diesel fuel consumption and the amount of agricultural machinery and of the shed attributed to the field work. It was also taken into consideration the amount of emissions to the air from combustion and the emission to the soil from tyre abrasion during the work process.

## Geography
The inventory is extrapolated from the geography of Canada without Quebec . Data quality indicators are adjusted accordingly.

## Technology
Fuel consumption and emissions per kg diesel have been extrapolated to the US, but others inputs were taken from the original values.

## Reference product
- planting, potato: 1 ha; By-product classification allocatable product; CPC 86119: Other support services to crop production
  production volume 369930 ha
    FAOSTAT data year 2020: potato area
  property price 25.76 EUR2005
    The price is from the year 2017. The price is estimated as a proxy based on the source: https://farmdoc.illinois.edu/assets/management/machinery-costs/field_operations_2017.pdf. The prices were adjusted for inflation relative to 2005 using the producer price index (PPI) of the euro area, published by eurostat (https://ec.europa.eu/eurostat/databrowser/view/STS_INPP_A__custom_6416181/default/table?lang=en, last accessed on 2023-06-01).
  properties: carbon allocation 0 kg, carbon content 0

## Inputs from technosphere
- agricultural machinery, unspecified: 1.99 kg; lognormal variance with pedigree 0.3042, pedigree (1,4,2,5,1)
  proxy from "planting, potato, CA-QC"
- diesel: 8.8863 kg; lognormal variance with pedigree 0.0028, pedigree (1,4,2,1,1)
  Helsel, 2007 Fuel Requirements and Energy Savings Tips for Field Operations, The State University of New Jersey Available at: https://njaes.rutgers.edu/pubs/publication.php?pid=FS1068
  properties: carbon content, fossil 0.865, dry mass 1 kg, heating value, net 42.8 MJ, wet mass 1 kg
- shed: 0.0132 m2; lognormal variance with pedigree 0.3042, pedigree (1,4,2,5,1)
  proxy from "planting, potato, CA-QC"
- tractor, 4-wheel, agricultural: 2.43 kg; lognormal variance with pedigree 0.3042, pedigree (1,4,2,5,1)
  proxy from "planting, potato, CA-QC"

## Emissions to nature
- Ammonia [air, non-urban air or from high stacks]: 0.000177726 kg; lognormal variance with pedigree 0.058325, pedigree (1,2,2,2,3)
  adapted from "planting, potato, CA-QC" to match the diesel consumption
- Benzene [air, non-urban air or from high stacks]: 6.48999e-5 kg; lognormal variance with pedigree 0.058325, pedigree (1,2,2,2,3)
  adapted from "planting, potato, CA-QC" to match the diesel consumption
- Benzo(a)pyrene [air, non-urban air or from high stacks]: 2.66589e-7 kg; lognormal variance with pedigree 0.658325, pedigree (1,2,2,2,3)
  adapted from "planting, potato, CA-QC" to match the diesel consumption
- Cadmium II [air, non-urban air or from high stacks]: 8.8863e-8 kg; lognormal variance with pedigree 0.658325, pedigree (1,2,2,2,3)
  adapted from "planting, potato, CA-QC" to match the diesel consumption
- Carbon dioxide, fossil [air, non-urban air or from high stacks]: 27.6574 kg; lognormal variance with pedigree 0.018325, pedigree (1,2,2,2,3)
  adapted from "planting, potato, CA-QC" to match the diesel consumption
- Carbon monoxide, fossil [air, non-urban air or from high stacks]: 0.0529184 kg; lognormal variance with pedigree 0.652225, pedigree (1,4,2,2,1)
  adapted from "planting, potato, CA-QC" to match the diesel consumption
- Chromium III [air, non-urban air or from high stacks]: 4.44315e-7 kg; lognormal variance with pedigree 0.658325, pedigree (1,2,2,2,3)
  adapted from "planting, potato, CA-QC" to match the diesel consumption
- Copper ion [air, non-urban air or from high stacks]: 1.50768e-5 kg; lognormal variance with pedigree 0.658325, pedigree (1,2,2,2,3)
  adapted from "planting, potato, CA-QC" to match the diesel consumption
- Dinitrogen monoxide [air, non-urban air or from high stacks]: 0.00106835 kg; lognormal variance with pedigree 0.058325, pedigree (1,2,2,2,3)
  adapted from "planting, potato, CA-QC" to match the diesel consumption
- Methane, fossil [air, non-urban air or from high stacks]: 0.00114823 kg; lognormal variance with pedigree 0.058325, pedigree (1,2,2,2,3)
  adapted from "planting, potato, CA-QC" to match the diesel consumption
- NMVOC, non-methane volatile organic compounds [air, non-urban air or from high stacks]: 0.0358447 kg; lognormal variance with pedigree 0.042225, pedigree (1,4,2,2,1)
  adapted from "planting, potato, CA-QC" to match the diesel consumption
- Nickel II [air, non-urban air or from high stacks]: 6.22041e-7 kg; lognormal variance with pedigree 0.658325, pedigree (1,2,2,2,3)
  adapted from "planting, potato, CA-QC" to match the diesel consumption
- Nitrogen oxides [air, non-urban air or from high stacks]: 0.40238 kg; lognormal variance with pedigree 0.042225, pedigree (1,4,2,2,1)
  adapted from "planting, potato, CA-QC" to match the diesel consumption
- PAH, polycyclic aromatic hydrocarbons [air, non-urban air or from high stacks]: 2.92549e-5 kg; lognormal variance with pedigree 0.318325, pedigree (1,2,2,2,3)
  adapted from "planting, potato, CA-QC" to match the diesel consumption
- Particulate Matter, < 2.5 um [air, non-urban air or from high stacks]: 0.00481258 kg; lognormal variance with pedigree 0.318325, pedigree (1,2,2,2,3)
  adapted from "planting, potato, CA-QC" to match the diesel consumption
- Selenium IV [air, non-urban air or from high stacks]: 8.8863e-8 kg; lognormal variance with pedigree 0.058325, pedigree (1,2,2,2,3)
  adapted from "planting, potato, CA-QC" to match the diesel consumption
- Sulfur dioxide [air, non-urban air or from high stacks]: 0.00896618 kg; lognormal variance with pedigree 0.018325, pedigree (1,2,2,2,3)
  adapted from "planting, potato, CA-QC" to match the diesel consumption
- Zinc II [air, non-urban air or from high stacks]: 8.8863e-6 kg; lognormal variance with pedigree 0.658325, pedigree (1,2,2,2,3)
  adapted from "planting, potato, CA-QC" to match the diesel consumption
- Cadmium II [soil, agricultural]: 1.25e-6 kg; lognormal variance with pedigree 0.0442, pedigree (1,4,2,5,1)
  proxy from "planting, potato, CA-QC"
- Lead II [soil, agricultural]: 5.5e-6 kg; lognormal variance with pedigree 0.0442, pedigree (1,4,2,5,1)
  proxy from "planting, potato, CA-QC"
- Zinc II [soil, agricultural]: 0.00328 kg; lognormal variance with pedigree 0.0442, pedigree (1,4,2,5,1)
  proxy from "planting, potato, CA-QC"

## Extrapolations
The dataset is modeled for agricultural production system in US. Data Quality indicators are adjusted accordingly.
