# treatment of waste concrete, inert material landfill

Dataset: EcoSpold 2, unit process
Geography: Europe without Switzerland
Time period: 1995-01-01 to 2023-12-31
Technology level: current
Classification: ISIC rev.4 ecoinvent: 3821:Treatment and disposal of non-hazardous waste
Scenario: Business-as-Usual
System model: Allocation, cut-off by classification
Generated by: [System]
Database: ecoinvent
isCopyrightProtected: true
accessRestrictedTo: 1

## General comment
This dataset represents the activity of waste disposal of 'waste concrete' in an inert material landfill.

## Included activities start
The activity starts with the waste being available at the gate of the treatment facility. Collection and transportation of the waste to the treatment plant is not included.

## Included activities end
The activity ends with the waste being treated and no direct emissions from inert material landfill (leachate) are inventoried, as they are considered negligible. The dataset contains only exchanges to process-specific burdens (energy, land use) and infrastructure.

## Geography
Modelling parameters affecting the treatment technology are not specific to this geography.

## Technology
Inert material landfill with leachate collection system and renaturation after closure. 50% of the sites is equipped with a base seal.

## Reference product
- waste concrete: -1 kg; name RP; By-product classification Waste; CPC 39990: Other wastes n.e.c.
  production volume 2.45125e10 kg; name RP_PV; = 2.50E+13*0.106*0.15/3*0.37*0.5
    Estimated value. Word production of concrete amounts to 25 billion tonnes of which 10.6% are produced in EU (WBCSD 2009). The waste generation is estimated to be 15% (taken from the estimated value for gypsum, source: WRAP "International practice in plasterboard recycling: Canada", n.d). 1/3 of total waste is assumed to be concrete not reinforced, 1/3 concrete reinforced, and 1/3 concrete. Eurostat reports treatment methods for municipal waste for EU 27 in 2010 to be: 23% incineration; 37% landfilling; 25% recycling; 14% compost / digestion. The shares sent to landfill and recycling are divided to include sorting. It is assumed that half the product is sent directly to recycling and half goes through sorting; knowing that 40% of the waste sent to sorting is landfilled, while 60% is recycled the corresponding shares are calculated. References: Eurostat. Municipal waste generation & treatment, by treatment method. Retrieved from: <http://ec.europa.eu/eurostat/web/waste/municipal-waste-generation-and-treatment-by-treatment-method>, accessed 7th July 2016 WBCSD (2009) Recycling concrete. The Cement Sustainability Initiative. Retrieved from: http://www.wbcsdcement.org/index.php/en/publications, accessed 3 May 2016 WRAP(n.d.) International practice in plasterboard recycling: Canada. Retrieved from: http://www.wrap.org.uk/sites/files/wrap/Case%20study%20-%20Plasterboard%20recycling%20in%20Canada.pdf, accessed 3 May 2016
  property price 0 EUR2005
    Waste products are assigned a price of zero as they are assumed to require further treatment.
  properties: carbon allocation 0 kg, carbon content 0, carbon content, fossil 0, carbon content, non-fossil 0, dry mass 0.5 kg, water content 1, water in wet mass 0.5 kg, wet mass 1 kg

## Inputs from technosphere
- inert material landfill: 1.48e-9 unit; lognormal variance with pedigree 0.042, pedigree (1,1,5,5,1)
  landfill infrastructure per kg waste, uncertainty heeded in module.
- process-specific burdens, inert material landfill: 1 kg; lognormal variance with pedigree 0.042, pedigree (1,1,5,5,1)
  process-specific burdens per kg waste, uncertainty heeded in module.

## Extrapolations
This dataset has been copied from an original dataset covering the geography CH. The uncertainty has been adjusted accordingly.

## Review by Niels Jungbluth 2003-05-28
Passed.
