# indium rich leaching residues, from zinc production stockpiling

Dataset: EcoSpold 2, unit process
Geography: US
Time period: 2012-01-01 to 2023-12-31
Technology level: current
Classification: ISIC rev.4 ecoinvent: 2420:Manufacture of basic precious and other non-ferrous metals
Classification: EcoSpold01Categories: metals/extraction
Scenario: Business-as-Usual
System model: Allocation, cut-off by classification
Generated by: Emilia Moreno Ruiz
Database: ecoinvent
isCopyrightProtected: true
accessRestrictedTo: 1

## General comment
Stockpiling is a way of assuring provision and control over supplies, and is systematically applied with some commodities by several countries.
The United States has a known and well documented national stockpiling service. Indium can be found as one of the commodities that is stockpiled, as it is considered of strategic importance.
This dataset describes the stockpiling of indium rich leaching residues following zinc production. The stockpiling is considered to happen in the geographical sourroundings of the zinc production site.
Sources:
-US Department of defense, 2013, Strategic and Critical Materials - Report on Stockpile Requirements.
-Reconfiguration of the National Defense Stockpile Report to Congress, April 2009.

## Included activities start
Activity starts with the arrival of indium rich leaching residues to the stockpile

## Included activities end
The activity ends with the provision of the service of stockpiling the indium rich leaching residues.

## Reference product
- indium rich leaching residues, from zinc production stockpiling: 1 kg; By-product classification allocatable product; CPC 41601: Tungsten, molybdenum, tantalum, magnesium, cobalt, cadmium, titanium, zirconium, beryllium, gallium, hafnium, […]; HS2017 811292: Gallium, germanium, hafnium, indium, niobium (columbium), rhenium and vanadium; articles thereof, unwrought[...]
  production volume 1.35367e7 kg; = 4.925E7*0.27485688
    Estimated. The US production volume is extrapolated from the GLO production volume using the nominal GDP of 2005 (source: United Nations, http://data.un.org/Glossary.aspx?q=GDP+%28current+US%24%29, accessed 20130726 and 20130312).
    Gross domestic product (GDP) at current prices is GDP at prices of the current reporting period. Also known as nominal GDP.
  property price 0.0043 EUR2005
    Temporary price data.The price of zinc is 1.04 Euro (calculated as 90% of purchasers price based on: Source: ecoinvent v2 report 10-part IX, Tab 5.10 & 2.5). When producing 1kg of zinc, 0.33939kg of indium rich leaching residues, from zinc production is produced as a by-product. The economic allocation factor in eiv2.2 was 99.86% for zinc and 0.17% for the indium rich leaching residues, from zinc production. Following this assumption the price of the indium rich leaching residues, from zinc production is calculated to be ((0.0014*1*1.04)/(0.33939-0.0014*0.33939)=) 0.0043 Euro.
  properties: carbon allocation 0 kg, carbon content 0

## Inputs from technosphere
- gravel, crushed: 0.00267855 kg; = 3.5714E-06*50E-2*1500; lognormal variance with pedigree 0.2106, pedigree (5,5,5,5,5)
  Estimation. It is estimated a ground sealing with 50 cm gravel bed, 3 mm plastic geo-sealing sheet and 20 cm of asphalt cover.
  The density of gravel is 1500 kg/m3 (http://www.substech.com/dokuwiki/doku.php?id=thermoplastic_low_density_polyethylene_ldpe)
  properties: dry mass 1 kg, wet mass 1 kg
- indium rich leaching residues, from zinc production: 1 kg
  properties: dry mass 1 kg, wet mass 1 kg
- mastic asphalt: 0.00142856 kg; = 3.5714E-06*20E-2*2000; lognormal variance with pedigree 0.2106, pedigree (5,5,5,5,5)
  Estimation. It is estimated a ground sealing with 50 cm gravel bed, 3 mm plastic geo-sealing sheet and 20 cm of asphalt cover.
  The density of asphalt concrete is 2000 kg/m3.(http://www.substech.com/dokuwiki/doku.php?id=thermoplastic_low_density_polyethylene_ldpe)
  properties: carbon content, fossil 0.0968869, dry mass 1 kg, heating value, net 2.94 MJ, wet mass 1 kg
- packaging film, low density polyethylene: 9.85706e-6 kg; = 3.5714E-06*3E-3*920; lognormal variance with pedigree 0.2106, pedigree (5,5,5,5,5)
  Estimation. It is estimated a ground sealing with 50 cm gravel bed, 3 mm plastic geo-sealing sheet and 20 cm of asphalt cover.
  The density of low density polyethylene is 920 kg/m3. (http://www.substech.com/dokuwiki/doku.php?id=thermoplastic_low_density_polyethylene_ldpe)
  properties: carbon content, fossil 0.857143, dry mass 1 kg, heating value, net 42.47 MJ, wet mass 1 kg
- steel, unalloyed: 3.45e-6 kg; = (122.5*1*2 + 25*2*2)/100000000; lognormal variance with pedigree 0.2106, pedigree (5,5,5,5,5)
  Adapted from steel use in sulfur storage, due to lack of specific data. The amount of steel is estimated from a picture of a typical sulfur storage area (see link below)
  http://www.kwhconstructors.com/services.bulk.maintenance.php?gallery=pacificcoastterminalssulfurstack-rake
  There are two main parts containing steel:
  - 1 steel structure and conveyor. The estimated dimensions are 25m*2m*2m
  - 1 steel track that has the lenght of the storage area. It is assumed a rectangular storage area with dimension of122.5m*40.8 m. The dimensions of the track are 122.5m*2m*1m
  properties: carbon content, fossil 0.0025, dry mass 1 kg, wet mass 1 kg

## Inputs from nature
- Occupation, dump site [natural resource, land]: 0.00025 m2*year; name occupation_area; = 5*5000*70/(100000000*70); source Keystone Environmental LTD. 2007; lognormal variance with pedigree 0.0526, pedigree (2,4,4,5,1)
  Adapted from storage of sulfur, due to lack of specific data. For sulfur, the data is obtained from a storage project in Port Ridley, Alberta, Canada,
  The planned area for dry bulk sulfur storage is 5,000 m2.
  The max. capacity is 100,000 tonnes.The lifetime of the stockpile is estimated as 70 years.
  It is estimated that the average storage time of 1 kg of lead for stockpiling is 5 years. This is considered a reasonable time period to assure proper storage and retrievability. Thus, after 5 years the stocked material will be retrieved or changed to a new placement, in order to ensure proper access and keep the shafts accessible.
  The occupation is calculated:
  5 (kg*years) *5000 (m2) *70 years /((100000000 (kg) * 70 (years) )
- Transformation, from unspecified [natural resource, land]: 3.57143e-6 m2; = 0.00025/70; source Keystone Environmental LTD. 2007; lognormal variance with pedigree 0.1326, pedigree (2,4,4,5,1)
  Adapted from storage of sulfur, due to lack of specific data. For sulfur, the data is obtained from a storage project in Port Ridley, Alberta, Canada,
  The planned area for dry bulk sulfur storage is 5,000 m2.
  The max. capacity is 100,000 tonnes.The lifetime of the stockpile is estimated as 70 years.
  It is estimated that the average storage time of 1 kg of lead for stockpiling is 5 years. This is considered a reasonable time period to assure proper storage and retrievability. Thus, after 5 years the stocked material will be retrieved or changed to a new placement, in order to ensure proper access and keep the shafts accessible.
  The transformation is calculated as:
  occupation area / lifetime of stockpile
- Transformation, to dump site [natural resource, land]: 3.57143e-6 m2; name transformation_area; = 0.00025/70; source Keystone Environmental LTD. 2007; lognormal variance with pedigree 0.1326, pedigree (2,4,4,5,1)
  Adapted from storage of sulfur, due to lack of specific data. For sulfur, the data is obtained from a storage project in Port Ridley, Alberta, Canada,
  The planned area for dry bulk sulfur storage is 5,000 m2.
  The max. capacity is 100,000 tonnes. The lifetime of the stockpile is estimated as 70 years.
  It is estimated that the average storage time of 1 kg of lead for stockpiling is 5 years. This is considered a reasonable time period to assure proper storage and retrievability. Thus, after 5 years the stocked material will be retrieved or changed to a new placement, in order to ensure proper access and keep the shafts accessible.
  The transformation is calculated as:
  occupation area / lifetime of stockpile

## Extrapolations
land occupation is adapted from sulfur storage

## Review by Emilia Moreno Ruiz 2015-10-15
PV adjusted
