# sweet corn production

Dataset: EcoSpold 2, unit process
Geography: RoW
Time period: 2006-01-01 to 2023-12-31
Technology level: current
Classification: ISIC rev.4 ecoinvent: 0111:Growing of cereals (except rice), leguminous crops and oil seeds
Tags: WFLDB
Scenario: Business-as-Usual
System model: Allocation, cut-off by classification
Generated by: [System]
Database: ecoinvent
isCopyrightProtected: true
accessRestrictedTo: 1

## General comment
This dataset is a weighted average of the regional datasets, with weights based on production volume of the reference product. Detailed comments and sources about the exchanges can be found in the regional datasets.
The geographicalCorrelation score of every pedigree matrix of was changed to '5'.
Sum of regional production volumes: 8.493e+8 kg
US: PV = 5.480e+8 kg; weight = 0.6452
TH: PV = 1.726e+8 kg; weight = 0.2032
HU: PV = 1.287e+8 kg; weight = 0.1516
Yield of the global dataset = 14308.1712429 kg/ha, calculated as a weighted average of the regional yields.
The comments below were part of the US regional dataset.
This dataset represents the production of 1 kg of sweet corn. The average yield from 2006 - 2007 is 13.9 t/ha. The data are representative for sweet production in the United States in Washington state, that is used for the export market. Mineral NPK fertiliser input is 100-40-130 kg/ha. Organic fertilisers applied amount to 3 m3/ha of liquid manure and 3 t/ha of solid manure. Total active ingredients (a.i.) applied as pesticides amount to 6.3 kg a.i./ha.
The dataset was modelled within the project 'World Food LCA database (WFLDB)'. The aim of this project was to provide inventories of a broad variety of agricultural products and processes and to cover for each product at least 50% of the global export market. The export share of sweet corn produced in the United States amounts to 17% of the global export (tonnage exported in 2010). The production system regarded in this dataset aimed at representing sweet corn produced in the United States for the export market.
PEF-Quality: data quality rating (DQR) = 1.3 (i.e. excellent quality). This dataset refers to an average situation; for specific situations exchanges might differ substantially due to site specific parameters

## Included activities start
This activity starts with soil cultivation after the harvest of the previous crop.

## Included activities end
This activity ends with the harvest of sweet corn at farm gate. The dataset includes all machine operations, corresponding infrastructure, fuel use and sheds. Machine operations are: soil cultivation, sowing, fertilisation, pesticide application, harvesting, and on-farm transport. Further, direct field emissions and land use change are included. Heavy metal uptake by the crop is considered. The inputs of seeds, fertilisers and pesticides as well as packaging of fertilisers and pesticides are considered. The dataset doesn't include emissions from manure storage because these are within the system boundary of animal production.

## Reference product
- sweet corn: 1 kg; By-product classification allocatable product; CPC 01290: Vegetables, fresh, n.e.c.; HS2017 070999: Vegetables; edible, n.e.c. in chapter 07, fresh or chilled
  production volume 8.60484e8 kg
    Source: FAOSTAT. Average, 2009-2012
  property carbon content, non-fossil 0.435017
    calculation: C-content of components according to ecoinvent report No. 15a. Source of composition: Souci, S.W., Fachmann, W., Kraut, H. (Hg.: Bundesminsiterium fur Ernahrung, Landwirtschaft und Forsten, Bonn) 'Die Zusammensetzung der Lebensmittel - Nahrwerttabellen', medpharm Scientific Publishers Stuttgart, CRC Press; 2000.
  property price 0.88 EUR2005
    Calculated value based on data from United Nations Commodity Trade Statistics Database (comtrade.un.org). UN comtrade category: 200580 Sweet corn, prepared or preserved, not frozen/vinegar. Year: 2005. Using exchange rate of 1EURO = 1.209 USD. Average of price of import into 5 main markets (EU, US, JP, IN and CN).
  properties: carbon allocation 0.252917 kg, carbon content 0.435017, carbon content, fossil 0, dry mass 0.581395 kg, water content 0.72, water in wet mass 0.418605 kg, wet mass 1 kg

## Inputs from technosphere
- acetamide-anillide-compound, unspecified: 0.000131836 kg; lognormal variance with pedigree 0.0158498, pedigree (2,2,4,5,1)
  29ef97ec-9586-410008-b287-611892c0f310; Literature value or expert estimation (Williams II 2008).
  properties: carbon content, fossil 0.659175, dry mass 1 kg, wet mass 1 kg
- ammonia, anhydrous, liquid: 4.57772e-6, 8.88629e-6, 9.84988e-5, 9.31379e-7, 3.42299e-5, 2.94247e-6 kg (6 suppliers, which the file names only by identifier); sum of these 0.000150067 kg; lognormal variance with pedigree 0.126177, pedigree (2,1,4,5,1)
  Calculated based on literature values or expert estimation: The total amount of nutrient (Orosz et al. 2009) multiplied by the country-share of fertiliser type (IFA 2014). See supporting documentation 'WFLDB-Documentation.pdf' chapter 'Fertiliser application' for L3 and L4 data (https://ecoquery.ecoinvent.org/File/Reports).
  Corresponds to 17.6 kg/ha
  properties: dry mass 1 kg, wet mass 1 kg
- ammonium nitrate: 0.00103597, 0.00351682 kg (2 suppliers, which the file names only by identifier); sum of these 0.00455279 kg; lognormal variance with pedigree 0.126177, pedigree (2,1,4,5,1)
  The exchange has been updated from 'ammonium nitrate, as N' into 'ammonium nitrate' and therefore its amount has been scaled (multiplied) from 0.0016 kg by 2.8573 kg of 'ammonium nitrate' per kg of 'ammonium nitrate, as N'. Original comment of the exchange is: Calculated based on literature values or expert estimation: The total amount of nutrient (Personal written communication, Bill Easterwood , Yara, 2015) multiplied by the share of fertiliser type (Personal written communication, Bill Easterwood , Yara, 2015). See supporting documentation 'WFLDB-Documentation.pdf' chapter 'Fertiliser application' for L3 and L4 data (https://ecoquery.ecoinvent.org/File/Reports).
  Corresponds to 20.0 kg/ha
  properties: dry mass 1 kg, wet mass 1 kg
- ammonium sulfate: 0.000483861 kg; lognormal variance with pedigree 0.126177, pedigree (2,1,4,5,1)
  Calculated based on literature values or expert estimation: The total amount of nutrient (Personal written communication, Bill Easterwood , Yara, 2015) multiplied by the share of fertiliser type (Personal written communication, Bill Easterwood , Yara, 2015). See supporting documentation 'WFLDB-Documentation.pdf' chapter 'Fertiliser application' for L3 and L4 data (https://ecoquery.ecoinvent.org/File/Reports).
  Corresponds to 10.0 kg/ha
  properties: dry mass 1 kg, wet mass 1 kg
- application of plant protection product, by field sprayer: 0.000368461 ha; lognormal variance with pedigree 0.126664, pedigree (2,2,4,5,1)
  Literature value or expert estimation (Nawanich et al. 2014).
- atrazine: 0.000162943 kg; lognormal variance with pedigree 0.0158498, pedigree (2,2,4,5,1)
  (same comment as for acetamide-anillide-compound, unspecified)
  properties: carbon content, fossil 0.446512, dry mass 1 kg, wet mass 1 kg
- chopping, maize: 7.05657e-5 ha; lognormal variance with pedigree 0.126177, pedigree (2,1,4,5,1)
  Literature value or expert estimation (Nawanich et al. 2014).
- cyclic N-compound: 1.43818e-6 kg; lognormal variance with pedigree 0.0158498, pedigree (2,2,4,5,1)
  Literature value or expert estimation (Nawanich et al. 2014).
  properties: carbon content, fossil 0.641962, dry mass 1 kg, wet mass 1 kg
- fertilising, by broadcaster: 0.000103227 ha; lognormal variance with pedigree 0.126177, pedigree (2,1,4,5,1)
  Literature value or expert estimation (Nawanich et al. 2014).
- inorganic nitrogen fertiliser, as N: 1.18049e-7, 3.24193e-6, 2.16716e-6, 5.76148e-7, 2.77009e-5, 3.28598e-6, 2.1425e-6, 4.17575e-7, 3.5286e-5, 1.80597e-6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 kg (61 suppliers, which the file names only by identifier); sum of these 0.00330794 kg; lognormal variance with pedigree 0.126177, pedigree (2,1,4,5,1)
  Calculated based on literature values or expert estimation: The total amount of nutrient (Personal written communication, Bill Easterwood , Yara, 2015) multiplied by the share of fertiliser type (Personal written communication, Bill Easterwood , Yara, 2015). See supporting documentation 'WFLDB-Documentation.pdf' chapter 'Fertiliser application' for L3 and L4 data (https://ecoquery.ecoinvent.org/File/Reports).
  Corresponds to 15.0 kg/ha
  properties: dry mass 1 kg, wet mass 1 kg
- inorganic phosphorus fertiliser, as P2O5: 8.94494e-7, 2.42951e-7, 6.61286e-7, 1.61328e-6, 2.01293e-5, 4.468e-5, 6.13367e-6, 7.50736e-7, 9.35065e-6, 4.15301e-7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 kg (61 suppliers, which the file names only by identifier); sum of these 0.00267317 kg; lognormal variance with pedigree 0.126177, pedigree (2,1,4,5,1)
  Calculated based on literature values or expert estimation: The total amount of nutrient (Personal written communication, Miles Harriman, Yara, 2015) multiplied by the share of fertiliser type (Personal written communication, Miles Harriman, Yara, 2015). See supporting documentation 'WFLDB-Documentation.pdf' chapter 'Fertiliser application' for L3 and L4 data (https://ecoquery.ecoinvent.org/File/Reports).
  Corresponds to 40.0 kg/ha
  properties: dry mass 1 kg, wet mass 1 kg
- inorganic potassium fertiliser, as K2O: 2.15745e-8, 1.14011e-7, 2.71873e-8, 8.2439e-8, 1.53477e-9, 1.22782e-8, 4.91126e-8, 7.23183e-7, 7.34935e-7, 2.38547e-7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 kg (61 suppliers, which the file names only by identifier); sum of these 0.000117831 kg; lognormal variance with pedigree 0.126177, pedigree (2,1,4,5,1)
  Calculated based on literature values or expert estimation: The total amount of nutrient (Orosz et al. 2009) multiplied by the country-share of fertiliser type (IFA 2014). See supporting documentation 'WFLDB-Documentation.pdf' chapter 'Fertiliser application' for L3 and L4 data (https://ecoquery.ecoinvent.org/File/Reports).
  properties: dry mass 1 kg, wet mass 1 kg
- irrigation: 8.27439e-6, 0.0194045, 0.000165474, 0.0100977, 0.000127483, 0.000341807, 0.000469841, 0.0364259, 7.4572e-5, 1.91789e-6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 m3 (16 suppliers, which the file names only by identifier); sum of these 0.0708983 m3; lognormal variance with pedigree 0.126177, pedigree (2,1,4,5,1)
  Calculated value: The total amount of water used for irrigation (calculated from evapotranspiration, Pfister et al. 2011) multiplied by the country-share of irrigation technique (WFLDB-Guidelines.pdf, Appendix 6.1). See supporting documentation 'WFLDB-Documentation.pdf' chapter 'Water use for irrigation' for L2 data (https://ecoquery.ecoinvent.org/File/Reports).
  properties: dry mass 0.11 kg, water content 9089.91, wet mass 1000 kg
- liquid manure spreading, by vacuum tanker: 0.000170521 m3; lognormal variance with pedigree 0.126177, pedigree (2,1,4,5,1)
  This amount corresponds to the input of liquid manure.
- maize seed, Swiss integrated production, for sowing: 0.00153831 kg; lognormal variance with pedigree 0.126177, pedigree (2,1,4,5,1)
  Literature value or expert estimation (Nordby et al. 2004). Sowing density: 16kg/ha.
  properties: carbon content, non-fossil 0.46957, dry mass 0.88 kg, water content 0.136364, wet mass 1 kg
- manure, liquid, cattle: 0.130345 kg; lognormal variance with pedigree 0.126177, pedigree (2,1,4,5,1)
  Calculated based on literature values: The total amount of manure (Personal written communication, Miles Harriman, Yara, 2015) multiplied by the country-share of manure per animal category (FAOSTAT 2015). See supporting documentation 'WFLDB-Documentation.pdf' chapter 'Fertiliser application' (https://ecoquery.ecoinvent.org/File/Reports).
  Corresponds to 1.51 m3/ha
  properties: carbon content, non-fossil 0.68, dry mass 0.075 kg, water content 12.333, wet mass 1 kg
- manure, liquid, swine: 0.0339887 kg; lognormal variance with pedigree 0.126177, pedigree (2,1,4,5,1)
  Calculated based on literature values: The total amount of manure (Personal written communication, Miles Harriman, Yara, 2015) multiplied by the country-share of manure per animal category (FAOSTAT 2015). See supporting documentation 'WFLDB-Documentation.pdf' chapter 'Fertiliser application' (https://ecoquery.ecoinvent.org/File/Reports).
  Corresponds to 0.392 m3/ha
  properties: carbon content, non-fossil 0.64, dry mass 0.05 kg, water content 19, wet mass 1 kg
- manure, solid, cattle: 0.0941185 kg; lognormal variance with pedigree 0.126177, pedigree (2,1,4,5,1)
  Calculated based on literature values: The total amount of manure (Personal written communication, Miles Harriman, Yara, 2015) multiplied by the country-share of manure per animal category (FAOSTAT 2015). See supporting documentation 'WFLDB-Documentation.pdf' chapter 'Fertiliser application' (https://ecoquery.ecoinvent.org/File/Reports).
  Corresponds to 780.0 kg/ha
  properties: carbon content, non-fossil 0.441, dry mass 0.22 kg, water content 3.5454, wet mass 1 kg
- nitrile-compound: 4.50214e-7 kg; lognormal variance with pedigree 0.0158498, pedigree (2,2,4,5,1)
  Literature value or expert estimation (Nawanich et al. 2014).
  properties: carbon content, fossil 0.344995, dry mass 1 kg, wet mass 1 kg
- organophosphorus-compound, unspecified: 3.48106e-5 kg; lognormal variance with pedigree 0.0158498, pedigree (2,2,4,5,1)
  (same comment as for acetamide-anillide-compound, unspecified)
  properties: carbon content, fossil 0.260898, dry mass 1 kg, wet mass 1 kg
- packaging, for fertilisers: 0.0361035 kg; lognormal variance with pedigree 0.0592, pedigree (4,3,4,5,4)
  Total amount of active substance/s of fertilisers needed for the production of 'sweet corn' is calculated to be circa 1.81E-02 kg. Fertiliser/s used in this dataset is/are: 'ammonia, liquid', 'ammonium nitrate, as N', 'ammonium sulfate, as N', 'nitrogen fertiliser, as N', 'phosphate fertiliser, as P2O5', 'phosphate rock, as P2O5, beneficiated, dry', 'potassium chloride, as K2O', 'potassium fertiliser, as K2O', 'potassium sulfate, as K2O', 'urea, as N'. The total amount of active substance/s is doubled in order to account for the packaging of the dilluted product of fertiliser/s that is/are applied. Therefore, 3.61E-02 kg of packaging for fertilisers is justified with this exchange.
  properties: carbon content, fossil 0.825301, dry mass 1 kg, heating value, net 25.01 MJ, price 0.0642 EUR2005, wet mass 1 kg
  note on carbon content, fossil: Considering a chemical formula (C2H4)n for polyethylene, carbon content-fossil is calculated to be 0.856286 kg of Carbon per kg of dry mass.
- packaging, for pesticides: 0.000662957 kg; lognormal variance with pedigree 0.0592, pedigree (4,3,4,5,4)
  Total amount of active substance/s of pesticides needed for the production of sweet corn is calculated to be circa 3.31E-04 kg. Pesticide/s used in this dataset is/are: 'acetamide-anillide-compound, unspecified', 'atrazine', 'cyclic N-compound', 'nitrile-compound', 'organophosphorus-compound, unspecified'. The total amount of active substance/s is doubled in order to account for the packaging of the dilluted product of pesticide/s that is/are applied. Therefore, 6.63E-04 kg of packaging for pesticides is justified with this exchange.
  properties: carbon content, fossil 0.85714, dry mass 1 kg, heating value, net 25.97 MJ, price 0.0642 EUR2005, wet mass 1 kg
- phosphate rock, beneficiated: 1.84383e-8, 1.38886e-6 kg (2 suppliers, which the file names only by identifier); sum of these 1.4073e-6 kg; lognormal variance with pedigree 0.126177, pedigree (2,1,4,5,1)
  The exchange has been updated from 'phosphate rock, as P2O5, beneficiated, dry' into 'phosphate rock, beneficiated' and therefore its amount has been scaled (multiplied) from 0 kg by 3.125 kg of 'phosphate rock, beneficiated' per kg of 'phosphate rock, as P2O5, beneficiated, dry'. Original comment of the exchange is: Calculated based on literature values or expert estimation: The total amount of nutrient (Orosz et al. 2009) multiplied by the country-share of fertiliser type (IFA 2014). See supporting documentation 'WFLDB-Documentation.pdf' chapter 'Fertiliser application' for L3 and L4 data (https://ecoquery.ecoinvent.org/File/Reports).
  Corresponds to 0.0529 kg/ha
  properties: dry mass 1 kg, wet mass 1 kg
- potassium chloride: 0.00886331 kg; lognormal variance with pedigree 0.126177, pedigree (2,1,4,5,1)
  The exchange has been updated from 'potassium chloride, as K2O' into 'potassium chloride' and therefore its amount has been scaled (multiplied) from 0.0056 kg by 1.5829 kg of 'potassium chloride' per kg of 'potassium chloride, as K2O'. Original comment of the exchange is: Calculated based on literature values or expert estimation: The total amount of nutrient (Personal written communication, Bill Easterwood , Yara, 2015) multiplied by the share of fertiliser type (Personal written communication, Bill Easterwood , Yara, 2015). See supporting documentation 'WFLDB-Documentation.pdf' chapter 'Fertiliser application' for L3 and L4 data (https://ecoquery.ecoinvent.org/File/Reports).
  Corresponds to 97.5 kg/ha
  properties: dry mass 1 kg, wet mass 1 kg
- potassium sulfate: 0.00283932 kg; lognormal variance with pedigree 0.126177, pedigree (2,1,4,5,1)
  The exchange has been updated from 'potassium sulfate, as K2O' into 'potassium sulfate' and therefore its amount has been scaled (multiplied) from 0.0015 kg by 1.85 kg of 'potassium sulfate' per kg of 'potassium sulfate, as K2O'. Original comment of the exchange is: Calculated based on literature values or expert estimation: The total amount of nutrient (Personal written communication, Bill Easterwood , Yara, 2015) multiplied by the share of fertiliser type (Personal written communication, Bill Easterwood , Yara, 2015). See supporting documentation 'WFLDB-Documentation.pdf' chapter 'Fertiliser application' for L3 and L4 data (https://ecoquery.ecoinvent.org/File/Reports).
  Corresponds to 32.5 kg/ha
  properties: dry mass 1 kg, wet mass 1 kg
- poultry manure, dried: 0.0607705 kg; lognormal variance with pedigree 0.126177, pedigree (2,1,4,5,1)
  Calculated based on literature values: The total amount of manure (Personal written communication, Miles Harriman, Yara, 2015) multiplied by the country-share of manure per animal category (FAOSTAT 2015). See supporting documentation 'WFLDB-Documentation.pdf' chapter 'Fertiliser application' (https://ecoquery.ecoinvent.org/File/Reports).
  Corresponds to 220.0 kg/ha
  properties: cadmium content 2.92e-7, carbon content, non-fossil 0.33389, copper content 4.38e-5, dry mass 0.865 kg, lead content 2.92e-6, mercury content 2e-7, nickel content 4e-5, nitrogen content 0.532, phosphorus content 0.0167, potassium content 0.024, water content 0.156069, wet mass 1 kg, zinc content 0.000349
- poultry manure, fresh: 0.0030939 kg; lognormal variance with pedigree 0.126177, pedigree (2,1,4,5,1)
  Calculated based on literature values: The total amount of manure (Personal written communication, Miles Harriman, Yara, 2015) multiplied by the country-share of manure per animal category (FAOSTAT 2015). See supporting documentation 'WFLDB-Documentation.pdf' chapter 'Fertiliser application' (https://ecoquery.ecoinvent.org/File/Reports).
  Corresponds to 0.0969 m3/ha
  properties: carbon content, non-fossil 0.33389, dry mass 0.38 kg, water content 1.63158, wet mass 1 kg
- solid manure loading and spreading, by hydraulic loader and spreader: 0.154889 kg; lognormal variance with pedigree 0.126177, pedigree (2,1,4,5,1)
  This amount corresponds the input of solid manure.
- sowing: 7.05657e-5 ha; lognormal variance with pedigree 0.126177, pedigree (2,1,4,5,1)
  Literature value or expert estimation (Nawanich et al. 2014).
- tillage, cultivating, chiselling: 4.64189e-5 ha; lognormal variance with pedigree 0.126177, pedigree (2,1,4,5,1)
  (same comment as for acetamide-anillide-compound, unspecified)
- tillage, harrowing, by rotary harrow: 1.56324e-5 ha; lognormal variance with pedigree 0.126177, pedigree (2,1,4,5,1)
  Literature value or expert estimation (Nawanich et al. 2014).
- tillage, ploughing: 2.41468e-5 ha; lognormal variance with pedigree 0.126177, pedigree (2,1,4,5,1)
  Literature value or expert estimation (Nawanich et al. 2014).
- tillage, rotary cultivator: 0.000101352 ha; lognormal variance with pedigree 0.126177, pedigree (2,1,4,5,1)
  (same comment as for acetamide-anillide-compound, unspecified)
- transport, tractor and trailer, agricultural: 0.0019919, 8.1e-6 metric ton*km (2 suppliers, which the file names only by identifier); sum of these 0.002 metric ton*km; lognormal variance with pedigree 0.164439, pedigree (4,1,4,5,1)
  On-farm transport: Yield (in tonnes) multiplied by the average distance from field to farm. The distance was assumed to be 2 km (proxy).
- urea: 0.00299591, 0.00255829 kg (2 suppliers, which the file names only by identifier); sum of these 0.0055542 kg; lognormal variance with pedigree 0.126177, pedigree (2,1,4,5,1)
  The exchange has been updated from 'urea, as N' into 'urea' and therefore its amount has been scaled (multiplied) from 0.0026 kg by 2.1438 kg of 'urea' per kg of 'urea, as N'. Original comment of the exchange is: Calculated based on literature values or expert estimation: The total amount of nutrient (Personal written communication, Miles Harriman, Yara, 2015) multiplied by the share of fertiliser type (Personal written communication, Miles Harriman, Yara, 2015). See supporting documentation 'WFLDB-Documentation.pdf' chapter 'Fertiliser application' for L3 and L4 data (https://ecoquery.ecoinvent.org/File/Reports).
  Corresponds to 100.0 kg/ha
  properties: carbon content, fossil 0.2, dry mass 1 kg, wet mass 1 kg

## Inputs from nature
- Carbon dioxide, in air [natural resource, in air]: 0.44593 kg; lognormal variance with pedigree 0.0158498, pedigree (2,2,4,5,1)
  CO2 uptake by biomass
- Energy, gross calorific value, in biomass [natural resource, biotic]: 5.17847 MJ; lognormal variance with pedigree 0.0158498, pedigree (2,2,4,5,1)
  Gross energy content is related to MJ/kg dry matter of product. Source: ecoinvent data.
- Occupation, annual crop [natural resource, land]: 0.214672 m2*year; lognormal variance with pedigree 0.0220616, pedigree (2,1,4,5,1)
  Related to the duration from harvest date of previous crop to harvest date of main crop: 123 days.
- Transformation, from arable land, unspecified use [natural resource, land]: 0.705657 m2; lognormal variance with pedigree 0.0462144, pedigree (2,1,4,5,1)
  10000 m2 divided by the life time of the crop.
- Transformation, to arable land, unspecified use [natural resource, land]: 0.705657 m2; lognormal variance with pedigree 0.0462144, pedigree (2,1,4,5,1)
  10000 m2 divided by the life time of the crop.

## Emissions to nature
- Ammonia [air, non-urban air or from high stacks]: 0.00171576 kg; lognormal variance with pedigree 0.0467216, pedigree (2,2,4,5,1)
  Calculated value - EMEP/EEA (2013). See 'WFLDB-Guidelines.pdf', available at https://ecoquery.ecoinvent.org/File/Reports.
- Carbon dioxide, fossil [air, non-urban air or from high stacks]: 0.00505644 kg; lognormal variance with pedigree 0.0158498, pedigree (2,2,4,5,1)
  Calculated value - CO2 emissions from urea and lime. See 'WFLDB-Guidelines.pdf', available at https://ecoquery.ecoinvent.org/File/Reports.
- Carbon dioxide, from soil or biomass stock [air, non-urban air or from high stacks]: 0.104171 kg; normal variance with pedigree 0.5, pedigree (3,3,5,5,2)
  Global average LUC emissions according 2nd edition of the Quantis-modified tool developed by Blonk Consultants 'WFLDB-adapted-Blonk 2014 direct-land-use-change-assessment-tool_2015-05-18a.xlsx', tab. 'Country & land use unknown'. The emission are based on the relative change in production areas in all countries for a given crop. The weighted average is used which takes into acount relative difference in crop expansion into primary forest, secondary forest, grassland, perennial and annual land.
  Uncertainty: Uncertainty estimated based on IPCC guidlines 2006.
- Dinitrogen monoxide [air, non-urban air or from high stacks]: 0.000190213 kg; lognormal variance with pedigree 0.126664, pedigree (2,2,4,5,1)
  Calculated value - IPCC (2006). See 'WFLDB-Guidelines.pdf', available at https://ecoquery.ecoinvent.org/File/Reports.
- Nitrogen oxides [air, non-urban air or from high stacks]: 0.000348647 kg; lognormal variance with pedigree 0.126664, pedigree (2,2,4,5,1)
  Calculated value - EEA/EMEP (2013). See 'WFLDB-Guidelines.pdf', available at https://ecoquery.ecoinvent.org/File/Reports.
- Water [air, non-urban air or from high stacks]: 0.04454 m3; lognormal variance with pedigree 0.126177, pedigree (2,1,4,5,1)
  Calculated value - Emission calculated from water balance. See 'WFLDB-Guidelines.pdf', available at https://ecoquery.ecoinvent.org/File/Reports.
- Atrazine [soil, agricultural]: 0.000162943 kg; lognormal variance with pedigree 0.0467216, pedigree (2,2,4,5,1)
  Calculated value - 100% emission in soil. See 'WFLDB-Guidelines.pdf', available at https://ecoquery.ecoinvent.org/File/Reports.
- Cadmium II [soil, agricultural]: 1.67415e-7 kg
  Comment on mathematicalRelation:
  1.61130769231e-07 from Calculated value - Freiermuth (2006). See 'WFLDB-Guidelines.pdf', available at https://ecoquery.ecoinvent.org/File/Reports.
  -2.58e-08 from Maize grains, heavy metals uptake model
  Heavy metal uptake can be excluded by setting the parameter heavyMetalUptakeSwitch to zero.
- Chromium III [soil, agricultural]: 1.40554e-6 kg
  Comment on mathematicalRelation:
  1.23569230769e-06 from Calculated value - Freiermuth (2006). See 'WFLDB-Guidelines.pdf', available at https://ecoquery.ecoinvent.org/File/Reports.
  -2.752e-07 from Maize grains, heavy metals uptake model
  Heavy metal uptake can be excluded by setting the parameter heavyMetalUptakeSwitch to zero.
- Copper ion [soil, agricultural]: 1.6331e-7 kg
  Comment on mathematicalRelation:
  1.36453846154e-06 from Calculated value - Freiermuth (2006). See 'WFLDB-Guidelines.pdf', available at https://ecoquery.ecoinvent.org/File/Reports.
  -2.15e-06 from Maize grains, heavy metals uptake model
  Heavy metal uptake can be excluded by setting the parameter heavyMetalUptakeSwitch to zero.
- Fipronil [soil, agricultural]: 2.25107e-7 kg; lognormal variance with pedigree 0.0467216, pedigree (2,2,4,5,1)
  (same comment as for Atrazine)
- Glufosinate [soil, agricultural]: 3.48106e-5 kg; lognormal variance with pedigree 0.0467216, pedigree (2,2,4,5,1)
  (same comment as for Atrazine)
- Imidacloprid [soil, agricultural]: 1.43818e-6 kg; lognormal variance with pedigree 0.0467216, pedigree (2,2,4,5,1)
  (same comment as for Atrazine)
- Lead II [soil, agricultural]: 8.86613e-8 kg
  Comment on mathematicalRelation:
  2.09476923077e-07 from Calculated value - Freiermuth (2006). See 'WFLDB-Guidelines.pdf', available at https://ecoquery.ecoinvent.org/File/Reports.
  -2.58e-07 from Maize grains, heavy metals uptake model
  Heavy metal uptake can be excluded by setting the parameter heavyMetalUptakeSwitch to zero.
- Mercury II [soil, agricultural]: 2.26452e-8 kg; lognormal variance with pedigree 0.177866, pedigree (2,2,4,5,1)
  Calculated value - Freiermuth (2006). See 'WFLDB-Guidelines.pdf', available at https://ecoquery.ecoinvent.org/File/Reports.
- Metolachlor [soil, agricultural]: 0.000131836 kg; lognormal variance with pedigree 0.0467216, pedigree (2,2,4,5,1)
  (same comment as for Atrazine)
- Nickel II [soil, agricultural]: 2.12863e-8 kg
  Comment on mathematicalRelation:
  4.793e-07 from Calculated value - Freiermuth (2006). See 'WFLDB-Guidelines.pdf', available at https://ecoquery.ecoinvent.org/File/Reports.
  -9.976e-07 from Maize grains, heavy metals uptake model
  Heavy metal uptake can be excluded by setting the parameter heavyMetalUptakeSwitch to zero.
- Zinc II [soil, agricultural]: -2.01303e-6 kg
  Comment on mathematicalRelation:
  1.05776923077e-05 from Calculated value - Freiermuth (2006). See 'WFLDB-Guidelines.pdf', available at https://ecoquery.ecoinvent.org/File/Reports.
  -1.849e-05 from Maize grains, heavy metals uptake model
  Heavy metal uptake can be excluded by setting the parameter heavyMetalUptakeSwitch to zero.
- Cadmium II [water, ground-]: 8.48509e-10 kg; lognormal variance with pedigree 0.358938, pedigree (2,2,4,5,1)
  (same comment as for Mercury II)
- Cadmium II [water, surface water]: 1.53315e-9 kg; lognormal variance with pedigree 0.358938, pedigree (2,2,4,5,1)
  (same comment as for Mercury II)
- Chromium III [water, ground-]: 4.06916e-7 kg; lognormal variance with pedigree 0.358938, pedigree (2,2,4,5,1)
  (same comment as for Mercury II)
- Chromium III [water, surface water]: 1.75139e-7 kg; lognormal variance with pedigree 0.358938, pedigree (2,2,4,5,1)
  (same comment as for Mercury II)
- Copper ion [water, ground-]: 7.09749e-8 kg; lognormal variance with pedigree 0.358938, pedigree (2,2,4,5,1)
  (same comment as for Mercury II)
- Copper ion [water, surface water]: 1.4907e-7 kg; lognormal variance with pedigree 0.358938, pedigree (2,2,4,5,1)
  (same comment as for Mercury II)
- Lead II [water, ground-]: 2.82771e-9 kg; lognormal variance with pedigree 0.358938, pedigree (2,2,4,5,1)
  (same comment as for Mercury II)
- Lead II [water, surface water]: 3.3373e-8 kg; lognormal variance with pedigree 0.358938, pedigree (2,2,4,5,1)
  (same comment as for Mercury II)
- Mercury II [water, ground-]: 2.16664e-10 kg; lognormal variance with pedigree 0.358938, pedigree (2,2,4,5,1)
  (same comment as for Mercury II)
- Mercury II [water, surface water]: 4.95909e-10 kg; lognormal variance with pedigree 0.358938, pedigree (2,2,4,5,1)
  (same comment as for Mercury II)
- Nickel II [water, ground-]: 3.51685e-11 kg; lognormal variance with pedigree 0.358938, pedigree (2,2,4,5,1)
  (same comment as for Mercury II)
- Nickel II [water, surface water]: 1.32199e-7 kg; lognormal variance with pedigree 0.358938, pedigree (2,2,4,5,1)
  (same comment as for Mercury II)
- Nitrate [water, ground-]: 0.0113573 kg; lognormal variance with pedigree 0.177866, pedigree (2,2,4,5,1)
- Phosphate [water, ground-]: 4.61862e-6 kg; lognormal variance with pedigree 0.177866, pedigree (2,2,4,5,1)
  Calculated value - Prasuhn (2006). See 'WFLDB-Guidelines.pdf', available at https://ecoquery.ecoinvent.org/File/Reports.
- Phosphate [water, surface water]: 1.29377e-5 kg; lognormal variance with pedigree 0.177866, pedigree (2,2,4,5,1)
  (same comment as for Phosphate)
- Phosphorus [water, surface water]: 1.97259e-6 kg; lognormal variance with pedigree 0.177866, pedigree (2,2,4,5,1)
  Calculated value - Prasuhn (2006) and SQCB-Erosion. See 'WFLDB-Guidelines.pdf', available at https://ecoquery.ecoinvent.org/File/Reports.
- Water [water, ground-]: 0.00527152 m3; lognormal variance with pedigree 0.126177, pedigree (2,1,4,5,1)
  (same comment as for Water)
- Water [water, surface water]: 0.021086 m3; lognormal variance with pedigree 0.126177, pedigree (2,1,4,5,1)
  (same comment as for Water)
- Zinc II [water, ground-]: 4.88473e-7 kg; lognormal variance with pedigree 0.358938, pedigree (2,2,4,5,1)
  (same comment as for Mercury II)
- Zinc II [water, surface water]: 2.72225e-7 kg; lognormal variance with pedigree 0.358938, pedigree (2,2,4,5,1)
  (same comment as for Mercury II)

## Sampling procedure
WFLDB Methodological Guidelines for the Life Cycle Inventory of Agricultural Products in the latest version, available at: (Report section: https://v30.ecoquery.ecoinvent.org/File/Reports). Data sources: Data were categorised from level 0 (L0) to level (L4) as follows: L0 = estimate, proxy; L1 = statistical data (e.g. FAOSTAT); L2 = L1 adapted to crop and country;L3 = literature data or L1 resp. L2 data approved by experts; medium detailing (i.e. kg of total N-fertiliser); L4 = L3 data of high detailing (i.e. portion N-fertiliser types).In this dataset data were obtained for yield: L3; Fertilisers: L4; Pesticides: L4; Machinery: L4; Irrigation: L3. For information regarding the calculation of individual exchanges see supporting documentation WFLDB-Documentation.pdf.

## Extrapolations
The amount of the exchanges are weighted average of regional datasets.

## Review by Assumpció ANTON 2016-05-30
Be aware that the use of statistics in input calculations could provide some specific inputs not common for specific crops, this should be corrected if better information is available and better reflexed in DQR . Currently, I would dissent for some of good marks provided, being a revision of criteria applied advisable.
Pesticides will need to be amended periodically checking for update of pesticides' ban.
