# industrial machine production, heavy, unspecified

Dataset: EcoSpold 2, unit process
Geography: RER
Time period: 1999-01-01 to 2023-12-31
Technology level: current
Classification: ISIC rev.4 ecoinvent: 2824:Manufacture of machinery for mining, quarrying and construction
Classification: EcoSpold01Categories: construction processes/machinery
Tags: ConvertedDataset
Scenario: Business-as-Usual
System model: Allocation, cut-off by classification
Generated by: Daniel Kellenberger (obsolete)
Published in: Kellenberger D. 2007
Database: ecoinvent
isCopyrightProtected: true
accessRestrictedTo: 1

## General comment
This infrastructure is based on the materialization of a rock crusher . The transportation distances are estimated and the transportation requirements added. This module should not be used if its relative importance would be high in a certain environmental inventory. Service life declared by the producer: 25 years. The functional unit is one kilogram.
[This dataset was already contained in the ecoinvent database version 2. It was not individually updated during the transfer to ecoinvent version 3. Life Cycle Impact Assessment results may still have changed, as they are affected by changes in the supply chain, i.e. in other datasets. This dataset was generated following the ecoinvent quality guidelines for version 2. It may have been subject to central changes described in the ecoinvent version 3 change report (http://www.ecoinvent.org/database/ecoinvent-version-3/reports-of-changes/), and the results of the central updates were reviewed extensively. The changes added e.g. consistent water flows and other information throughout the database. The documentation of this dataset can be found in the ecoinvent reports of version 2, which are still available via the ecoinvent website. The change report linked above covers all central changes that were made during the conversion process.]

## Included activities end
Includes the most important materials and the transportation of the new parts to the assembly plant. No disposal is included as it is assumed that all materials are recycled. No energy for assembling is included.

## Geography
Certain elementary flows or intermediate product flows are extrapolated from Swiss conditions.

## Technology
Rock crusher type Nordberg HP400 SX produced in the USA in 1999, used as basis

## Reference product
- industrial machine, heavy, unspecified: 1 kg; By-product classification allocatable product; CPC 444: Machinery for mining, quarrying and construction, and parts thereof; HS2017 84: Nuclear reactors, boilers, machinery and mechanical appliances; parts thereof
  EcoSpold01Location=RER
  production volume 1.32237 kg
    This is a placeholder value that does not reflect real-world production volumes. This dataset does not currently require a real-world production volume to work in the database framework, and no actual data were collected yet. This has no negative effect on the results of the ecoinvent database. The placeholder value of this activity was scaled according to the nominal GDP of 2005 (source: United Nations, http://data.un.org/Glossary.aspx?q=GDP+%28current+US%24%29, accessed 20130726) to reflect an appropriate share of the global production volume, which is also a placeholder value.
  property price 0.547615 EUR2005
    Calculated based on inputs: The price of the product has been calculated as a sum of the values of the material and energy inputs for this product. This value is therefore a rough estimation. It may underestimate the real price since there are additional expenses when producing any product. These expences can include for example labour costs, treatment of waste materials and profit for the producer. Please consider carefully whether this level of data quality is acceptable for your application.
  properties: carbon allocation 0 kg, carbon content 0

## Inputs from technosphere
All rows: lognormal variance with pedigree 0.0761, pedigree (1,5,5,3,3)
- aluminium, cast alloy: 0.00023808 kg
  EcoSpold01Location=RER
  properties: dry mass 1 kg, wet mass 1 kg
- aluminium, wrought alloy: 0.00050592 kg
  EcoSpold01Location=RER
  properties: dry mass 1 kg, wet mass 1 kg
- brass: 2.8e-5 kg
  EcoSpold01Location=CH
  properties: dry mass 1 kg, wet mass 1 kg
- bronze: 0.0148 kg
  EcoSpold01Location=CH
  properties: dry mass 1 kg, wet mass 1 kg
- cast iron: 0.0758 kg
  EcoSpold01Location=RER
  properties: carbon content, fossil 0.04, dry mass 1 kg, wet mass 1 kg
  note on carbon content, fossil: Cast iron is made by remelting pig iron in small furnaces (e.g. cupola furnaces or electric arc furnaces) and poured into moulds to make castings. It usually contains 2% to 6% carbon (ecoinvent v2.2 report 10_partII). An average content of 4% was considered
- epoxy resin, liquid: 0.0035 kg
  EcoSpold01Location=RER
  properties: carbon content, fossil 0.42325, dry mass 1 kg, heating value, net 12.82 MJ, wet mass 1 kg
- section bar rolling, steel: 0.905 kg
  activityLink introduced to establish a direct link to the corresponding regional supply of this product
  EcoSpold01Location=RER
- steel, low-alloyed, hot rolled: 0.905 kg
  EcoSpold01Location=RER
  properties: carbon content, fossil 0.005, dry mass 1 kg, wet mass 1 kg
  note on carbon content, fossil: Low alloyed steel composition given in Tab. 3.2 ecoinvent v2.2 report 10_partII. Steel assumed to have a C content of 0.5%

## Sampling procedure
most data from LCA study

## Extrapolations
See geography

## Review by Roberto Dones 2003-07-30
passed
