# sowing

Dataset: EcoSpold 2, unit process
Geography: BR
Time period: 2012-01-01 to 2023-12-31
Technology level: current
Classification: ISIC rev.4 ecoinvent: 0161:Support activities for crop production
Classification: EcoSpold01Categories: agricultural means of production/work processes
Synonyms: broadcast seeding
Scenario: Business-as-Usual
System model: Allocation, cut-off by classification
Generated by: Marília I. S. Folegatti Matsuura
Published in: Folegatti-Matsuura M. 2018
Database: ecoinvent
isCopyrightProtected: true
accessRestrictedTo: 1

## General comment
This dataset represents an example of a typical Seeder, working width 3m. The functional unit (FU) is one ha seeded. The operation time is 0.23 h/FU and the fuel consumption is 5.0 liters per hour.
This is a common operation in pasture cultivation in Brazil.

## Included activities start
From agricultural field foreseen to be processed.

## Included activities end
The dataset includes the diesel fuel consumption and the amount of agricultural machinery and of the shed, which has to be attributed to the seeding. Also taken into consideration is the amount of emissions to the air from combustion and the emission to the soil from tyre abrasion during the work process. The dataset doesn't include the seed, dust other than from combustion and noise. This activity ends with sowing, transfer back to the shed and uncoupling of the implement from the tractor.

## Geography
The inventory is modelled for farming processes in Brazil.

## Technology
Current technology about sowing operation during agricultural processes.
This activity is performed with a tractor (power 80 hp; weight 3740 kg) and a lancer (weight 150 kg; width 3 m). Life spam of the tractor is considered as 6000 hours and of the implement as 2000 hours. Machinery used, fuel consumption and operation efficiencies were based on expert's informations and unpublished data.

## Time period
Most of the data used to modelling this activity were collected in the last few years (2012-2016).

## Reference product
- sowing: 1 ha; By-product classification allocatable product; CPC 86119: Other support services to crop production
  production volume 2.79998e7 ha; = 195998383/7
    Area of permanent meadows and pasture in Brazil, year 2014, according to the FAOSTAT data. See more in: http://www.fao.org/faostat/en/#data/RL.
  property price 7.16583 EUR2005
    Calculated based on inputs: The price of the product has been calculated as a sum of the values of the material and energy inputs for this product. This value is therefore a rough estimation. It may underestimate the real price since there are additional expenses when producing any product. These expences can include for example labour costs, treatment of waste materials and profit for the producer. Please consider carefully whether this level of data quality is acceptable for your application.
  properties: carbon allocation 0 kg, carbon content 0

## Inputs from technosphere
- agricultural machinery, unspecified: 0.0173 kg; source Nemecek, T. 2007; lognormal variance with pedigree 0.004, pedigree (1,4,3,1,1)
  Proxy, based on 'Agricultural Field Work Processes' - pdf-document on the dedicated talk page of ecoinvent (www.ecoinvent.org/talk-pages).
- diesel: 0.985 kg; name diesel_consumption; source Dias, F. R. T. 2017; lognormal variance with pedigree 0.004, pedigree (1,4,3,1,1)
  Amount for typical system from Dias et al. (2017).
  properties: carbon content, fossil 0.865, dry mass 1 kg, heating value, net 42.8 MJ, wet mass 1 kg
  note on carbon content, fossil: C-content of diesel is 86.5% (ecoinvent v2.2 report 6_IV, Tab 3.14)
- shed: 0.00205 m2; lognormal variance with pedigree 0.304, pedigree (1,4,3,1,1)
  (same comment as for agricultural machinery, unspecified)
- tractor, 4-wheel, agricultural: 0.144 kg; source Nemecek, T. 2007; lognormal variance with pedigree 0.004, pedigree (1,4,3,1,1)
  (same comment as for agricultural machinery, unspecified)

## Emissions to nature
All rows: source Nemecek, T. 2007
- Ammonia [air, non-urban air or from high stacks]: 1.97e-5 kg; = 2,00E-05* diesel_consumption; lognormal variance with pedigree 0.0601, pedigree (1,2,3,1,3)
  Emissions from diesel combustion were based on the emissions factor described in Nemecek and Kagi (2007).
- Benzene [air, non-urban air or from high stacks]: 7.1905e-6 kg; = 7,30E-06* diesel_consumption; lognormal variance with pedigree 0.0601, pedigree (1,2,3,1,3)
  (same comment as for Ammonia)
- Benzo(a)pyrene [air, non-urban air or from high stacks]: 2.955e-8 kg; = 3,00E-08* diesel_consumption; lognormal variance with pedigree 0.6601, pedigree (1,2,3,1,3)
  (same comment as for Ammonia)
- Cadmium II [air, non-urban air or from high stacks]: 9.85e-9 kg; = 1,00E-08* diesel_consumption; lognormal variance with pedigree 0.6601, pedigree (1,2,3,1,3)
  (same comment as for Ammonia)
- Carbon dioxide, fossil [air, non-urban air or from high stacks]: 3.0732 kg; = 3,12E+00* diesel_consumption; lognormal variance with pedigree 0.0201, pedigree (1,2,3,1,3)
  (same comment as for Ammonia)
- Carbon monoxide, fossil [air, non-urban air or from high stacks]: 0.0025413 kg; = 2,58E-03* diesel_consumption; lognormal variance with pedigree 0.654, pedigree (1,4,3,1,1)
  (same comment as for Ammonia)
- Chromium III [air, non-urban air or from high stacks]: 4.925e-8 kg; = 5,00E-08* diesel_consumption; lognormal variance with pedigree 0.6601, pedigree (1,2,3,1,3)
  (same comment as for Ammonia)
- Copper ion [air, non-urban air or from high stacks]: 1.6745e-6 kg; = 1,70E-06* diesel_consumption; lognormal variance with pedigree 0.6601, pedigree (1,2,3,1,3)
  (same comment as for Ammonia)
- Dinitrogen monoxide [air, non-urban air or from high stacks]: 0.0001182 kg; = 1,20E-04* diesel_consumption; lognormal variance with pedigree 0.0601, pedigree (1,2,3,1,3)
  (same comment as for Ammonia)
- Methane, fossil [air, non-urban air or from high stacks]: 0.000127065 kg; = 1,29E-04* diesel_consumption; lognormal variance with pedigree 0.0601, pedigree (1,2,3,1,3)
  (same comment as for Ammonia)
- NMVOC, non-methane volatile organic compounds [air, non-urban air or from high stacks]: 0.0023049 kg; = 2,34E-03* diesel_consumption; lognormal variance with pedigree 0.044, pedigree (1,4,3,1,1)
  (same comment as for Ammonia)
- Nickel II [air, non-urban air or from high stacks]: 6.895e-8 kg; = 7,00E-08* diesel_consumption; lognormal variance with pedigree 0.6601, pedigree (1,2,3,1,3)
  (same comment as for Ammonia)
- Nitrogen oxides [air, non-urban air or from high stacks]: 0.0302395 kg; = 3,07E-02* diesel_consumption; lognormal variance with pedigree 0.044, pedigree (1,4,3,1,1)
  (same comment as for Ammonia)
- PAH, polycyclic aromatic hydrocarbons [air, non-urban air or from high stacks]: 3.24065e-6 kg; = 3,29E-06* diesel_consumption; lognormal variance with pedigree 0.3201, pedigree (1,2,3,1,3)
  (same comment as for Ammonia)
- Particulate Matter, < 2.5 um [air, non-urban air or from high stacks]: 0.026398 kg; = 2,68E-02* diesel_consumption; lognormal variance with pedigree 0.3201, pedigree (1,2,3,1,3)
  (same comment as for Ammonia)
- Selenium IV [air, non-urban air or from high stacks]: 9.85e-9 kg; = 1,00E-08* diesel_consumption; lognormal variance with pedigree 0.0601, pedigree (1,2,3,1,3)
  (same comment as for Ammonia)
- Sulfur dioxide [air, non-urban air or from high stacks]: 0.00099485 kg; = 1,01E-03* diesel_consumption; lognormal variance with pedigree 0.0201, pedigree (1,2,3,1,3)
  (same comment as for Ammonia)
- Zinc II [air, non-urban air or from high stacks]: 9.85e-7 kg; = 1,00E-06* diesel_consumption; lognormal variance with pedigree 0.6601, pedigree (1,2,3,1,3)
  (same comment as for Ammonia)
- Cadmium II [soil, agricultural]: 3.19e-6 kg; lognormal variance with pedigree 0.044, pedigree (1,4,3,1,1)
  Emissions of heavy metals from tyre abrasion were based on Nemecek and Kagi (2007).
- Lead II [soil, agricultural]: 1.38e-5 kg; lognormal variance with pedigree 0.044, pedigree (1,4,3,1,1)
  Emissions of heavy metals from tyre abrasion were based on Nemecek and Kagi (2007).
- Zinc II [soil, agricultural]: 8.51e-5 kg; lognormal variance with pedigree 0.044, pedigree (1,4,3,1,1)
  Emissions of heavy metals from tyre abrasion were based on Nemecek and Kagi (2007).

## Sampling procedure
The main source of data for the inputs are projects conducted by Embrapa Pantanal (CPAP) and Embrapa Gado de Corte (CNPGC). Data are also provided by relevant experts related to agricultural sector in Brazil.
Emissions from burning of fossil fuels are estimated according to Nemecek and Kagi (2007).

## Extrapolations
Values given in the reference are representative for the chosen work processes. Processes are typical procedures for Brazil around the year 2016, they are not statistical average processes.

## Review by Jens Lansche 2017-11-29
Based on an existing dataset. Diesel input and related combustion emissions adapted for BR.
