# tillage, cultivating, by strip tiller

Dataset: EcoSpold 2, unit process
Geography: US
Time period: 2021-01-01 to 2023-12-31
Technology level: current
Classification: ISIC rev.4 ecoinvent: 0161:Support activities for crop production
Scenario: Business-as-Usual
System model: Allocation, cut-off by classification
Generated by: Juanita Barrera
Database: ecoinvent
isCopyrightProtected: true
accessRestrictedTo: 1

## General comment
This dataset models the service of tillage by strip tiller. Functional Unit is one ha harrowed.

## Included activities start
The activity starts from the agricultural field foreseen to be processed.

## Included activities end
This activity ends with chiseling. The inventory takes into account the diesel fuel consumption and the amount of agricultural machinery and of the shed, which has to be attributed to the harrowing. Also taken into consideration is the amount of emissions to the air from combustion and the emission to the soil from tyre abrasion during the work process. The following activities were considered part of the work process: preliminary work at the farm, like attaching the adequate machine to the tractor; transfer to field (with an assumed distance of 1 km); field work (for a parcel of land of 1 ha surface); transfer to farm and concluding work, like uncoupling the machine. The overlapping during the field work is considered. Not included are dust other than from combustion and noise.

## Geography
The inventory is extrapolated from the Global geography. Data quality indicators from adjusted accordingly.

## Technology
Fuel consumption and emissions per kg diesel have been extrapolated to the US, but others inputs were taken from the original values.

## Reference product
- tillage, cultivating, by strip tiller: 1 ha; By-product classification allocatable product; CPC 86119: Other support services to crop production
  production volume 7.88684e7 ha
    FAOSTAT data year 2020: area of arable land, 0.5 passes/year assumed (own estimation)
  property price 44.3645 EUR2005
    The price is from the year 2017. The price is estimated as a proxy based on the source: https://farmdoc.illinois.edu/assets/management/machinery-costs/field_operations_2017.pdf. The prices were adjusted for inflation relative to 2005 using the producer price index (PPI) of the euro area, published by eurostat (https://ec.europa.eu/eurostat/databrowser/view/STS_INPP_A__custom_6416181/default/table?lang=en, last accessed on 2023-06-01).
  properties: carbon allocation 0 kg, carbon content 0

## Inputs from technosphere
- agricultural machinery, tillage: 0.996 kg; lognormal variance with pedigree 0.3042, pedigree (1,4,2,5,1)
  proxy from "tillage, harrowing, by spring tine harrow, GLO"
- diesel: 8.8958 kg; lognormal variance with pedigree 0.0028, pedigree (1,4,2,1,1)
  Purdue university - ENERGY REQUIREMENTS FOR VARIOUS TILLAGE- PLANTING SYSTEMS Available at: https://www.extension.purdue.edu/extmedia/NCR/NCR-202-W.html
  properties: carbon content, fossil 0.865, dry mass 1 kg, heating value, net 42.8 MJ, wet mass 1 kg
- shed: 0.00584 m2; lognormal variance with pedigree 0.3042, pedigree (1,4,2,5,1)
  proxy from "tillage, harrowing, by spring tine harrow, GLO"
- tractor, 4-wheel, agricultural: 0.411 kg; lognormal variance with pedigree 0.3042, pedigree (1,4,2,5,1)
  proxy from "tillage, harrowing, by spring tine harrow, GLO"

## Emissions to nature
- Ammonia [air, non-urban air or from high stacks]: 0.000177716 kg; lognormal variance with pedigree 0.058325, pedigree (1,2,2,2,3)
  adapted from "tillage, harrowing, by spring tine harrow, GLO" to match the diesel consumption
- Benzene [air, non-urban air or from high stacks]: 6.49153e-5 kg; lognormal variance with pedigree 0.058325, pedigree (1,2,2,2,3)
  (same comment as for Ammonia)
- Benzo(a)pyrene [air, non-urban air or from high stacks]: 2.66473e-7 kg; lognormal variance with pedigree 0.658325, pedigree (1,2,2,2,3)
  (same comment as for Ammonia)
- Cadmium II [air, non-urban air or from high stacks]: 8.8958e-8 kg; lognormal variance with pedigree 0.658325, pedigree (1,2,2,2,3)
  (same comment as for Ammonia)
- Carbon dioxide, fossil [air, non-urban air or from high stacks]: 27.6491 kg; lognormal variance with pedigree 0.018325, pedigree (1,2,2,2,3)
  (same comment as for Ammonia)
- Carbon monoxide, fossil [air, non-urban air or from high stacks]: 0.0528939 kg; lognormal variance with pedigree 0.652225, pedigree (1,4,2,2,1)
  (same comment as for Ammonia)
- Chromium III [air, non-urban air or from high stacks]: 4.4479e-7 kg; lognormal variance with pedigree 0.658325, pedigree (1,2,2,2,3)
  (same comment as for Ammonia)
- Copper ion [air, non-urban air or from high stacks]: 1.51068e-5 kg; lognormal variance with pedigree 0.658325, pedigree (1,2,2,2,3)
  (same comment as for Ammonia)
- Dinitrogen monoxide [air, non-urban air or from high stacks]: 0.00106589 kg; lognormal variance with pedigree 0.058325, pedigree (1,2,2,2,3)
  (same comment as for Ammonia)
- Methane, fossil [air, non-urban air or from high stacks]: 0.00114604 kg; lognormal variance with pedigree 0.058325, pedigree (1,2,2,2,3)
  (same comment as for Ammonia)
- NMVOC, non-methane volatile organic compounds [air, non-urban air or from high stacks]: 0.0228406 kg; lognormal variance with pedigree 0.042225, pedigree (1,4,2,2,1)
  (same comment as for Ammonia)
- Nickel II [air, non-urban air or from high stacks]: 6.21103e-7 kg; lognormal variance with pedigree 0.658325, pedigree (1,2,2,2,3)
  (same comment as for Ammonia)
- Nitrogen oxides [air, non-urban air or from high stacks]: 0.396705 kg; lognormal variance with pedigree 0.042225, pedigree (1,4,2,2,1)
  (same comment as for Ammonia)
- PAH, polycyclic aromatic hydrocarbons [air, non-urban air or from high stacks]: 2.9252e-5 kg; lognormal variance with pedigree 0.318325, pedigree (1,2,2,2,3)
  (same comment as for Ammonia)
- Particulate Matter, < 2.5 um [air, non-urban air or from high stacks]: 0.0418744 kg; lognormal variance with pedigree 0.318325, pedigree (1,2,2,2,3)
  (same comment as for Ammonia)
- Selenium IV [air, non-urban air or from high stacks]: 8.8958e-8 kg; lognormal variance with pedigree 0.058325, pedigree (1,2,2,2,3)
  (same comment as for Ammonia)
- Sulfur dioxide [air, non-urban air or from high stacks]: 0.00895591 kg; lognormal variance with pedigree 0.018325, pedigree (1,2,2,2,3)
  (same comment as for Ammonia)
- Zinc II [air, non-urban air or from high stacks]: 8.8958e-6 kg; lognormal variance with pedigree 0.658325, pedigree (1,2,2,2,3)
  (same comment as for Ammonia)
- Cadmium II [soil, agricultural]: 1.97e-7 kg; lognormal variance with pedigree 0.0442, pedigree (1,4,2,5,1)
  proxy from "tillage, harrowing, by spring tine harrow, GLO"
- Lead II [soil, agricultural]: 8.63e-7 kg; lognormal variance with pedigree 0.0442, pedigree (1,4,2,5,1)
  proxy from "tillage, harrowing, by spring tine harrow, GLO"
- Zinc II [soil, agricultural]: 0.000523 kg; lognormal variance with pedigree 0.0442, pedigree (1,4,2,5,1)
  proxy from "tillage, harrowing, by spring tine harrow, GLO"

## Extrapolations
The dataset is modeled for agricultural production system in US. Data Quality indicators are adjusted accordingly.
