# packaging production for liquid fertiliser or pesticide, per kilogram of packed product

Dataset: EcoSpold 2, unit process
Geography: GLO
Time period: 2009-01-01 to 2023-12-31
Technology level: current
Classification: ISIC rev.4 ecoinvent: 2220:Manufacture of plastics products
Tags: WFLDB
Scenario: Business-as-Usual
System model: Allocation, cut-off by classification
Generated by: [System]
Database: ecoinvent
isCopyrightProtected: true
accessRestrictedTo: 1

## General comment
This dataset represents the production and disposal of packaging material needed to pack 1 kg of liquid fertilisers or pesticides used at the farm.
1.160 kg of plastic is needed for a 20 liter container of liquid pesticides or fertiliser (mesured data, Agroscope).

## Included activities start
This activity starts with the production of the plastic container for packaging liquid fertilisers or pesticides.

## Included activities end
Included processes: Production of HDPE and injection moulding into plastic container for packing liquid fertiliser or pesticide. This activity ends with the disposal of waste packaging.

## Reference product
- packaging, for fertilisers or pesticides: 1 kg; By-product classification allocatable product; CPC 36410: Sacks and bags, of plastics; HS2017 392321: Ethylene polymers; sacks and bags (including cones), for the conveyance or packing of goods
  The reference product represents the production of the packaging material that is needed to store 1 kg of liquid pesticides (or fertilisers) in a 20 liter plastic container.
  production volume 1.71189e15 kg
    Source: www.fertilizer.org & DOI: 10.1007/978-81-322-1689-6_2. Assumption: 90% of fertilizer is solid, 10% liquid and 90% of pesticide is liquid, 10% solid
  property dry mass 0.0583501 kg; = PE_amount
  property heating value, net 27.31 MJ
    LHV is calculated based on the Carbon content of the product. More details can be found on the respective documentation.
  property price 0.0761185 EUR2005
    Calculated based on inputs: The price of the product has been calculated as a sum of the values of the material and energy inputs for this product. This value is therefore a rough estimation. It may underestimate the real price since there are additional expenses when producing any product. These expences can include for example labour costs, treatment of waste materials and profit for the producer. Please consider carefully whether this level of data quality is acceptable for your application.
  property wet mass 0.0583501 kg; = PE_amount
  properties: carbon allocation 0.0500142 kg, carbon content 0.85714, carbon content, fossil 0.85714, carbon content, non-fossil 0, water content 0, water in wet mass 0 kg

## Inputs from technosphere
- injection moulding: 0.0583501 kg
  A plastic container to store 20 liter of liquide pesticides (or fertilisers) weights 1.160 kg (mesured data) which is 0.0058 kg packaging per kg stored liquor. The injection moulding process requiers 0.0583501 kg of HDPE since 1.0 kg product of this process equals 0.994 kg of injection moulded plastics.
- polyethylene, high density, granulate: 0.0583501 kg; name PE_amount
  (same comment as for injection moulding)
  properties: carbon content, fossil 0.857143, dry mass 1 kg, heating value, net 42.47 MJ, wet mass 1 kg
- waste polyethylene: -3.69466e-6, -0.000169422, -9.41996e-6, -3.89078e-6, -7.12416e-7, -0.0580204, -1.57183e-6, -0.000140983 kg (8 suppliers, which the file names only by identifier); sum of these -0.0583501 kg
  Waste treatment scenario is not to be decided here.
  production volume
    Calculated from reference product production volume, reference product amount and byproduct amount.
  properties: carbon content, fossil 0.825301, dry mass 0.996 kg, heating value, net 42.47 MJ, water content 0.00401606, wet mass 1 kg
  note on heating value, net: Value taken from the general comment of the treatment dataset.

## Sampling procedure
Measured values (Agroscope)
