# tillage, harrowing, by offset leveling disc harrow

Dataset: EcoSpold 2, unit process
Geography: US
Time period: 2021-01-01 to 2023-12-31
Technology level: current
Classification: ISIC rev.4 ecoinvent: 0161:Support activities for crop production
Scenario: Business-as-Usual
System model: Allocation, cut-off by classification
Generated by: Juanita Barrera
Database: ecoinvent
isCopyrightProtected: true
accessRestrictedTo: 1

## General comment
This dataset represents the leveling harrowing operation, by offset leveling disc harrow in one hectare (ha). This operation is performed during soil preparation phase. Its objective is to smooth up the surface of the soil for planting. Functional Unit (FU) is one hectare of tillage harrowing. The operation time is about 0.6 hours per ha (62.5% of this time is effectively worked, discounting time for maintenance, waiting in the field and re-allocations between the plots).

## Included activities start
The activity starts from the agricultural field foreseen to be processed.

## Included activities end
This activity ends when soil surface is levelled. The dataset includes the diesel fuel consumption and the amount of agricultural machinery and shed. Also taken into consideration is the amount of emissions to the air from diesel combustion and the emission to the soil from tyre abrasion during the work process.

## Geography
The inventory is extrapolated from the Global geography. Data quality indicators from adjusted accordingly.

## Technology
Fuel consumption and emissions per kg diesel have been extrapolated to the US, but others inputs were taken from the original values.

## Reference product
- tillage, harrowing, by offset leveling disc harrow: 1 ha; By-product classification allocatable product; CPC 86119: Other support services to crop production
  production volume 269486 ha
    Area of sugarcane, arable crops, permanent meadows and pasture, year 2020, according to the FAOSTAT data. This operation is assumed to occur every 5 year in sugarcane and every 7 years in permanent meadows and pasture.
  property price 34.8335 EUR2005
    The price is from the year 2020. Price information has been directly provided by the data provider based on the following reference: University of Minnesota, Machinery cost estimates, W.F. Lazarus, 2020. The prices were adjusted for inflation relative to 2005 using the producer price index (PPI) of the euro area, published by eurostat (https://ec.europa.eu/eurostat/databrowser/view/STS_INPP_A__custom_6416181/default/table?lang=en, last accessed on 2023-06-01).
  properties: carbon allocation 0 kg, carbon content 0

## Inputs from technosphere
- agricultural machinery, tillage: 0.0882132 kg; lognormal variance with pedigree 0.3034, pedigree (2,3,2,5,1)
  proxy from "tillage, harrowing, by offset leveling disc harrow, GLO"
- diesel: 5.94762 kg; lognormal variance with pedigree 0.002, pedigree (2,3,2,1,1)
  2022 Nebraska Crop budget projections, Robert Klein and Glennis McClure, UNL Extension
  properties: carbon content, fossil 0.865, dry mass 1 kg, heating value, net 42.8 MJ, wet mass 1 kg
  note on carbon content, fossil: C-content of diesel is 86.5% (ecoinvent v2.2 report 6_IV, Tab 3.14)
- shed: 0.002 m2; lognormal variance with pedigree 0.3128, pedigree (3,3,2,5,3)
  proxy from "tillage, harrowing, by offset leveling disc harrow, GLO"
- tractor, 4-wheel, agricultural: 0.244329 kg; lognormal variance with pedigree 0.3034, pedigree (2,3,2,5,1)
  proxy from "tillage, harrowing, by offset leveling disc harrow, GLO"

## Emissions to nature
- Ammonia [air, non-urban air or from high stacks]: 0.000118913 kg; lognormal variance with pedigree 0.060325, pedigree (3,2,2,2,3)
  adapted from "tillage, harrowing, by offset leveling disc harrow, GLO" to match the diesel consumption
- Benzene [air, non-urban air or from high stacks]: 4.33667e-5 kg; lognormal variance with pedigree 0.060325, pedigree (3,2,2,2,3)
  (same comment as for Ammonia)
- Benzo(a)pyrene [air, non-urban air or from high stacks]: 1.78495e-7 kg; lognormal variance with pedigree 0.660325, pedigree (3,2,2,2,3)
  (same comment as for Ammonia)
- Cadmium II [air, non-urban air or from high stacks]: 5.94564e-8 kg; lognormal variance with pedigree 0.660325, pedigree (3,2,2,2,3)
  (same comment as for Ammonia)
- Carbon dioxide, fossil [air, non-urban air or from high stacks]: 18.6037 kg; lognormal variance with pedigree 0.020325, pedigree (3,2,2,2,3)
  (same comment as for Ammonia)
- Carbon monoxide, fossil [air, non-urban air or from high stacks]: 0.0321794 kg; lognormal variance with pedigree 0.660325, pedigree (3,2,2,2,3)
  (same comment as for Ammonia)
- Chromium III [air, non-urban air or from high stacks]: 2.97911e-7 kg; lognormal variance with pedigree 0.660325, pedigree (3,2,2,2,3)
  (same comment as for Ammonia)
- Copper ion [air, non-urban air or from high stacks]: 1.01063e-5 kg; lognormal variance with pedigree 0.660325, pedigree (3,2,2,2,3)
  (same comment as for Ammonia)
- Dinitrogen monoxide [air, non-urban air or from high stacks]: 0.00071398 kg; lognormal variance with pedigree 0.060325, pedigree (3,2,2,2,3)
  (same comment as for Ammonia)
- Methane, fossil [air, non-urban air or from high stacks]: 0.000766774 kg; lognormal variance with pedigree 0.060325, pedigree (3,2,2,2,3)
  (same comment as for Ammonia)
- NMVOC, non-methane volatile organic compounds [air, non-urban air or from high stacks]: 0.0178495 kg; lognormal variance with pedigree 0.060325, pedigree (3,2,2,2,3)
  (same comment as for Ammonia)
- Nickel II [air, non-urban air or from high stacks]: 4.16069e-7 kg; lognormal variance with pedigree 0.660325, pedigree (3,2,2,2,3)
  (same comment as for Ammonia)
- Nitrogen oxides [air, non-urban air or from high stacks]: 0.252658 kg; lognormal variance with pedigree 0.050325, pedigree (3,2,2,2,3)
  (same comment as for Ammonia)
- PAH, polycyclic aromatic hydrocarbons [air, non-urban air or from high stacks]: 1.96093e-5 kg; lognormal variance with pedigree 0.328225, pedigree (3,5,2,2,3)
  (same comment as for Ammonia)
- Particulate Matter, < 2.5 um [air, non-urban air or from high stacks]: 0.0668727 kg; lognormal variance with pedigree 0.060325, pedigree (3,2,2,2,3)
  (same comment as for Ammonia)
- Selenium IV [air, non-urban air or from high stacks]: 5.94564e-8 kg; lognormal variance with pedigree 0.060325, pedigree (3,2,2,2,3)
  (same comment as for Ammonia)
- Sulfur dioxide [air, non-urban air or from high stacks]: 0.00600849 kg; lognormal variance with pedigree 0.020325, pedigree (3,2,2,2,3)
  (same comment as for Ammonia)
- Zinc II [air, non-urban air or from high stacks]: 5.94564e-6 kg; lognormal variance with pedigree 0.660325, pedigree (3,2,2,2,3)
  (same comment as for Ammonia)
- Cadmium II [soil, agricultural]: 1.3219e-5 kg; lognormal variance with pedigree 0.0462, pedigree (3,4,2,5,1)
  proxy from "tillage, harrowing, by offset leveling disc harrow, GLO"
- Lead II [soil, agricultural]: 5.72825e-5 kg; lognormal variance with pedigree 0.0462, pedigree (3,4,2,5,1)
  proxy from "tillage, harrowing, by offset leveling disc harrow, GLO"
- Zinc II [soil, agricultural]: 0.000352507 kg; lognormal variance with pedigree 0.0462, pedigree (3,4,2,5,1)
  proxy from "tillage, harrowing, by offset leveling disc harrow, GLO"

## Extrapolations
The dataset is modeled for agricultural production system in US. Data Quality indicators are adjusted accordingly.
