# heat production, wood pellet, at furnace 300kW

Dataset: EcoSpold 2, unit process
Geography: RoW
Time period: 2000-01-01 to 2023-01-31
Technology level: current
Classification: EcoSpold01Categories: wood energy/heating systems
Classification: ISIC rev.4 ecoinvent: 3530:Steam and air conditioning supply
Scenario: Business-as-Usual
System model: Allocation, cut-off by classification
Share of production covered: 0.1 %
Generated by: Christian Bauer
Published in: Bauer, C. 2007
Database: ecoinvent
isCopyrightProtected: true
accessRestrictedTo: 1

## General comment
Activity represents combustion of wood pellets in average wood pellet furnaces in Switzerland in 2014. Only uncertainty factors were adjusted in order to provide a GLO activity. The inventory shall be considered valid for boilers with nominal capacities in the approximate range of 100 to 500 kW. The activity represents average annual operation including start/stop (warm up and cool down), which reduces the efficiency compared to rated values provided by boiler manufacturers and increases some emission factors such as CO. Air emission factors as well as other exchanges correspond to v2.2 except of PM, CO, NOx, CH4 and NMVOC. These key emission factors were updated based on latest available information.
[This dataset was already contained in the ecoinvent database version 2. It was not individually updated during the transfer to ecoinvent version 3. Life Cycle Impact Assessment results may still have changed, as they are affected by changes in the supply chain, i.e. in other datasets. This dataset was generated following the ecoinvent quality guidelines for version 2. It may have been subject to central changes described in the ecoinvent version 3 change report (http://www.ecoinvent.org/database/ecoinvent-version-3/reports-of-changes/), and the results of the central updates were reviewed extensively. The changes added e.g. consistent water flows and other information throughout the database. The documentation of this dataset can be found in the ecoinvent reports of version 2, which are still available via the ecoinvent website. The change report linked above covers all central changes that were made during the conversion process.]

## Included activities start
From reception of wood pellets.

## Included activities end
This activity represents the combustion of wood pellets until heat production at the boiler outlet. Included are the infrastructure, the wood requirements (average pellets, u=10%), the emissions to air, the electricity needed for operation, and the disposal of the ashes.

## Geography
based on data from Switzerland

## Technology
Boiler of average technology installed in CH in 2014

## Time period
Some emission data are from the second half of the 1990´s. However, key emission factors (PM, CO, NOx, CH4 and NMVOC) are updated in 2014

## Parameters
- scaling factor: 1.33333 dimensionless; name scaling_factor; = 1/0.75
  the scaling factor corresponds to the inverse of the annual use efficiency. This efficiency represents an average annual value including start/stop operation (warm-up and cool down), which reduces the efficiency compared to rated values of the manufacturer. Source: Thomas Nussbaumer, Verenum, January 2014, personal communication.

## Reference product
- heat, central or small-scale, other than natural gas: 1 MJ; = 0.75 * scaling_factor; source T. Nussbaumer 2014; By-product classification allocatable product; CPC 17300: Steam and hot water
  Original dataset referred to 1MJ energy input (end energy). Amount was scaled to 1 using annual use efficiency of 0.75 (according to source).
  EcoSpold01Location=CH
  production volume 1.20738e10 MJ; = 26500000000*0.4+1740960000
    Literature value / calculation.
    Data taken from BFE (2012) and extrapolated to global conditions with a factor 1:10 between CH:GLO.
    Total energy input from wood in different types of plants in 2009 in Switzerland amounts to 36800 TJ. Out of it, only a certain share is turned into heat due to efficiencies lower than 1. These efficiencies could be calculated with data present for the year 2012, which were taken over for calculating the heat output for 2009. The resulting output of 23852 TJ was evenly distributed between the six 9 datasets modelling heat production with wood in the database (3 datasets for heat production with mixed logs, 2 datasets for heat production with hardwood, softwood and wood pellets each). 40% of the total APV in this category are assumed to correspond to "current" technology according to data from Switzerland.
    BFE. 2012. Schweizerische Gesamtenergiestatistik 2012. Bundesamt für Energie, Bern, Switzerland.
    This production volume has been adjusted due to activity links in the database in order to ensure the correct share of heat from wood on the market for heat, central or small-scale, other than natural gas according to http://www.iea.org/statistics/statisticssearch/report/?country=WORLD&product=electricityandheat&year=2012
  property price 0.0106 EUR2005
    Average European district heat price from Ecoheatcool and Euroheat 2005-2006, Ecoheat Work package 1: The European heat market. Final report. 10.6 EUR/GJ i s the price of district heat. http://www.solarthermalworld.org/files/Ecoheatcool%20WP1%20Web.pdf?download
  properties: Corresponding fuel use 1.17647 MJ, carbon allocation 0 kg, carbon content 0, heating value, net 1 MJ

## Inputs from technosphere
- electricity, low voltage: 0.000211158, 9.42575e-6, 0.000148226, 0.00307663, 0.000303678, 1.89155e-6, 0.000697284, 0.00105924, 5.24753e-5 kWh (9 suppliers, which the file names only by identifier); sum of these 0.00556 kWh; = 0.00417 * scaling_factor; source Bauer, C. 2007; lognormal variance with pedigree 0.5127, pedigree (2,2,5,5,4)
  EcoSpold01Location=CH
  general assuption
  Amount was scaled to the amount of reference product.
- furnace, pellets, with silo, 300kW: 3.08642e-8 unit; = 1/(20*2000*300*3.6) * scaling_factor; lognormal variance with pedigree 0.5127, pedigree (2,2,5,5,4)
  Calculated value. Assuming 20 years lifetime, 2000 operational hours per year, 300kW capactiy.
- wood ash mixture, pure: -0.000196592, -0.000120741 kg (2 suppliers, which the file names only by identifier); sum of these -0.000317333 kg; = 0.000238 * scaling_factor; source Bauer, C. 2007
  EcoSpold01Location=CH
  homogeneous fuel
  Amount was scaled to the amount of reference product.
  production volume
    Calculated from the production volume of wood pellet, mixed, burned in furnace 50kW in proportion to the respective output amounts.
  properties: carbon content, non-fossil 0.012, dry mass 1 kg, wet mass 1 kg
- wood pellet, measured as dry mass: 0.0711533 kg; = 0.053365 * scaling_factor; source Bauer, C. 2007; lognormal variance with pedigree 0.5127, pedigree (2,2,5,5,4)
  EcoSpold01Location=RER
  Literature value. Original amount (from the source, ecoinvent v2.2) was scaled to the amount of the new reference product using the annual efficiency. Corresponds to a LHV of 18.7 MJ/kg.
  properties: carbon content, non-fossil 0.494, dry mass 1 kg, heating value, net 13.38 MJ, water content 0.1, wet mass 1.1 kg
  note on carbon content, non-fossil: C content of dry mass is 0.494 kgC/kg dry wood (ecoinvent v2.2 report 9).

## Emissions to nature
- Acetaldehyde [air, urban air close to ground]: 8.13333e-8 kg; = 6.1E-08 * scaling_factor; source Bauer, C. 2007; lognormal variance with pedigree 0.5127, pedigree (2,2,5,5,4)
  extrapolation, based on measuring data of other emissions
  Amount was scaled to the amount of reference product.
- Ammonia [air, urban air close to ground]: 2.30667e-6 kg; = 1.73E-06 * scaling_factor; source Bauer, C. 2007; lognormal variance with pedigree 0.5127, pedigree (2,2,5,5,4)
  (same comment as for Acetaldehyde)
- Arsenic ion [air, urban air close to ground]: 1.33333e-9 kg; = 1E-09 * scaling_factor; source Bauer, C. 2007; lognormal variance with pedigree 0.5127, pedigree (2,2,5,5,4)
  (same comment as for Acetaldehyde)
- Benzene [air, urban air close to ground]: 1.21333e-6 kg; = 9.1E-07 * scaling_factor; source Bauer, C. 2007; lognormal variance with pedigree 0.5127, pedigree (2,2,5,5,4)
  (same comment as for Acetaldehyde)
- Benzo(a)pyrene [air, urban air close to ground]: 6.66667e-10 kg; = 5E-10 * scaling_factor; source Bauer, C. 2007; lognormal variance with pedigree 0.5127, pedigree (2,2,5,5,4)
  (same comment as for Acetaldehyde)
- Bromine [air, urban air close to ground]: 8e-8 kg; = 6E-08 * scaling_factor; source Bauer, C. 2007; lognormal variance with pedigree 0.5127, pedigree (2,2,5,5,4)
  (same comment as for Acetaldehyde)
- Cadmium II [air, urban air close to ground]: 9.33333e-10 kg; = 7E-10 * scaling_factor; source Bauer, C. 2007; lognormal variance with pedigree 0.5127, pedigree (2,2,5,5,4)
  (same comment as for Acetaldehyde)
- Calcium II [air, urban air close to ground]: 7.8e-6 kg; = 5.85E-06 * scaling_factor; source Bauer, C. 2007; lognormal variance with pedigree 0.5127, pedigree (2,2,5,5,4)
  (same comment as for Acetaldehyde)
- Carbon dioxide, non-fossil [air, urban air close to ground]: 0.128667 kg; = 0.0965 * scaling_factor; source Bauer, C. 2007; lognormal variance with pedigree 0.5127, pedigree (2,2,5,5,4)
  uncertainty of carbon content in the wood
  Amount was scaled to the amount of reference product.
- Carbon monoxide, non-fossil [air, urban air close to ground]: 0.0002 kg; = 1.5E-04 * scaling_factor; source T. Nussbaumer 2014; lognormal variance with pedigree 0.0807, pedigree (2,2,4,5,4)
  estimation
- Chlorine [air, urban air close to ground]: 2.4e-7 kg; = 1.8E-07 * scaling_factor; source Bauer, C. 2007; lognormal variance with pedigree 0.5127, pedigree (2,2,5,5,4)
  (same comment as for Acetaldehyde)
- Chromium III [air, urban air close to ground]: 5.28e-9 kg; = 3.96E-09 * scaling_factor; source Bauer, C. 2007; lognormal variance with pedigree 0.5127, pedigree (2,2,5,5,4)
  (same comment as for Acetaldehyde)
- Chromium VI [air, urban air close to ground]: 5.33333e-11 kg; = 4E-11 * scaling_factor; source Bauer, C. 2007; lognormal variance with pedigree 0.5127, pedigree (2,2,5,5,4)
  (same comment as for Acetaldehyde)
- Copper ion [air, urban air close to ground]: 2.93333e-8 kg; = 2.2E-08 * scaling_factor; source Bauer, C. 2007; lognormal variance with pedigree 0.5127, pedigree (2,2,5,5,4)
  (same comment as for Acetaldehyde)
- Dinitrogen monoxide [air, urban air close to ground]: 3.33333e-6 kg; = 2.5E-06 * scaling_factor; source Bauer, C. 2007; lognormal variance with pedigree 0.5127, pedigree (2,2,5,5,4)
  (same comment as for Acetaldehyde)
- Dioxins, measured as 2,3,7,8-tetrachlorodibenzo-p-dioxin [air, urban air close to ground]: 4.13333e-14 kg; = 3.1E-14 * scaling_factor; source Bauer, C. 2007; lognormal variance with pedigree 0.5127, pedigree (2,2,5,5,4)
  (same comment as for Acetaldehyde)
- Ethyl benzene [air, urban air close to ground]: 4e-8 kg; = 3E-08 * scaling_factor; source Bauer, C. 2007; lognormal variance with pedigree 0.5127, pedigree (2,2,5,5,4)
  (same comment as for Acetaldehyde)
- Fluorine [air, urban air close to ground]: 6.66667e-8 kg; = 5E-08 * scaling_factor; source Bauer, C. 2007; lognormal variance with pedigree 0.5127, pedigree (2,2,5,5,4)
  (same comment as for Acetaldehyde)
- Formaldehyde [air, urban air close to ground]: 1.73333e-7 kg; = 1.3E-07 * scaling_factor; source Bauer, C. 2007; lognormal variance with pedigree 0.5127, pedigree (2,2,5,5,4)
  (same comment as for Acetaldehyde)
- Hexachlorobenzene [air, urban air close to ground]: 9.6e-15 kg; = 7.2E-15 * scaling_factor; source Bauer, C. 2007; lognormal variance with pedigree 0.5127, pedigree (2,2,5,5,4)
  (same comment as for Acetaldehyde)
- Hydrocarbons, aliphatic, alkanes, unspecified [air, urban air close to ground]: 1.21333e-6 kg; = 9.1E-07 * scaling_factor; source Bauer, C. 2007; lognormal variance with pedigree 0.5127, pedigree (2,2,5,5,4)
  (same comment as for Acetaldehyde)
- Hydrocarbons, aliphatic, unsaturated [air, urban air close to ground]: 4.13333e-6 kg; = 3.1E-06 * scaling_factor; source Bauer, C. 2007; lognormal variance with pedigree 0.5127, pedigree (2,2,5,5,4)
  (same comment as for Acetaldehyde)
- Lead II [air, urban air close to ground]: 3.33333e-8 kg; = 2.5E-08 * scaling_factor; source Bauer, C. 2007; lognormal variance with pedigree 0.5127, pedigree (2,2,5,5,4)
  (same comment as for Acetaldehyde)
- Magnesium [air, urban air close to ground]: 4.8e-7 kg; = 3.6E-07 * scaling_factor; source Bauer, C. 2007; lognormal variance with pedigree 0.5127, pedigree (2,2,5,5,4)
  (same comment as for Acetaldehyde)
- Manganese II [air, urban air close to ground]: 2.26667e-7 kg; = 1.7E-07 * scaling_factor; source Bauer, C. 2007; lognormal variance with pedigree 0.5127, pedigree (2,2,5,5,4)
  (same comment as for Acetaldehyde)
- Mercury II [air, urban air close to ground]: 4e-10 kg; = 3E-10 * scaling_factor; source Bauer, C. 2007; lognormal variance with pedigree 0.5127, pedigree (2,2,5,5,4)
  (same comment as for Acetaldehyde)
- Methane, non-fossil [air, urban air close to ground]: 4e-6 kg; = 3E-06 * scaling_factor; source Bauer, C. 2007; lognormal variance with pedigree 0.5127, pedigree (2,2,5,5,4)
  (same comment as for Acetaldehyde)
- NMVOC, non-methane volatile organic compounds [air, urban air close to ground]: 9.33333e-6 kg; = 7E-06 * scaling_factor; source T. Nussbaumer 2014; lognormal variance with pedigree 0.0807, pedigree (2,2,4,5,4)
  estimation
- Nickel II [air, urban air close to ground]: 8e-9 kg; = 6E-09 * scaling_factor; source Bauer, C. 2007; lognormal variance with pedigree 0.5127, pedigree (2,2,5,5,4)
  (same comment as for Acetaldehyde)
- Nitrogen oxides [air, urban air close to ground]: 9.33333e-5 kg; = 7E-05 * scaling_factor; source T. Nussbaumer 2014; lognormal variance with pedigree 0.0807, pedigree (2,2,4,5,4)
  estimation
- PAH, polycyclic aromatic hydrocarbons [air, urban air close to ground]: 1.48e-8 kg; = 1.11E-08 * scaling_factor; source Bauer, C. 2007; lognormal variance with pedigree 0.5127, pedigree (2,2,5,5,4)
  (same comment as for Acetaldehyde)
- Particulate Matter, < 2.5 um [air, urban air close to ground]: 6e-5 kg; = 4.5E-05 * scaling_factor; source T. Nussbaumer 2014; lognormal variance with pedigree 0.0807, pedigree (2,2,4,5,4)
  estimation
- Particulate Matter, > 2.5 um and < 10um [air, urban air close to ground]: 3.33333e-6 kg; = 2.5E-06 * scaling_factor; source T. Nussbaumer 2014; lognormal variance with pedigree 0.0807, pedigree (2,2,4,5,4)
  estimation
- Pentachlorophenol [air, urban air close to ground]: 1.08e-11 kg; = 8.1E-12 * scaling_factor; source Bauer, C. 2007; lognormal variance with pedigree 0.5127, pedigree (2,2,5,5,4)
  (same comment as for Acetaldehyde)
- Phosphorus [air, urban air close to ground]: 4e-7 kg; = 3E-07 * scaling_factor; source Bauer, C. 2007; lognormal variance with pedigree 0.5127, pedigree (2,2,5,5,4)
  (same comment as for Acetaldehyde)
- Potassium I [air, urban air close to ground]: 3.12e-5 kg; = 2.34E-05 * scaling_factor; source Bauer, C. 2007; lognormal variance with pedigree 0.5127, pedigree (2,2,5,5,4)
  (same comment as for Acetaldehyde)
- Sodium I [air, urban air close to ground]: 1.73333e-6 kg; = 1.3E-06 * scaling_factor; source Bauer, C. 2007; lognormal variance with pedigree 0.5127, pedigree (2,2,5,5,4)
  (same comment as for Acetaldehyde)
- Sulfur dioxide [air, urban air close to ground]: 3.33333e-6 kg; = 2.5E-06 * scaling_factor; source Bauer, C. 2007; lognormal variance with pedigree 0.5127, pedigree (2,2,5,5,4)
  (same comment as for Acetaldehyde)
- Toluene [air, urban air close to ground]: 4e-7 kg; = 3E-07 * scaling_factor; source Bauer, C. 2007; lognormal variance with pedigree 0.5127, pedigree (2,2,5,5,4)
  (same comment as for Acetaldehyde)
- Water [air, urban air close to ground]: 7.12e-5 m3; lognormal variance with pedigree 0.0143, pedigree (2,2,4,1,2)
  calculated value, supposed to ensure correct water balance
- Zinc II [air, urban air close to ground]: 4e-7 kg; = 3E-07 * scaling_factor; source Bauer, C. 2007; lognormal variance with pedigree 0.5127, pedigree (2,2,5,5,4)
  (same comment as for Acetaldehyde)
- m-Xylene [air, urban air close to ground]: 1.6e-7 kg; = 1.2E-07 * scaling_factor; source Bauer, C. 2007; lognormal variance with pedigree 0.5127, pedigree (2,2,5,5,4)
  (same comment as for Acetaldehyde)

## Sampling procedure
extrapolation

## Extrapolations
inventory data representative for Switzerland. Uncertainty factors adjusted accordingly
