# transport, freight, lorry >32 metric ton, EURO3

Dataset: EcoSpold 2, unit process
Geography: BR
Time period: 2020-03-01 to 2023-02-28
Technology level: current
Classification: ISIC rev.4 ecoinvent: 4923:Freight transport by road
Scenario: Business-as-Usual
System model: Allocation, cut-off by classification
Share of production covered: 100 %
Generated by: F. Valebona; T. B. Rocha; F. L. Motta
Published in: Valebona, F. 2021
Database: ecoinvent
isCopyrightProtected: true
accessRestrictedTo: 1

## General comment
This dataset is an adaptation of “transport, freight, lorry >32 metric ton, EURO3” in Europe, as available in version 3.6 of the ecoinvent database to reflect the situation in Brazil. It represents the service of 1tkm freight transport in a lorry of the size class >32 metric tons gross vehicle weight (GVW) and Euro 3 emissions class.
The Brazilian lorry fleet is regulated under the Vehicles Air Pollution Control Program – Proconve, which phases are equivalent to the European control program – EURO. Since 2012, the Proconve P7 (EURO 5) phase is in practice, while the P8 phase (EURO 6) will start in 2023. Before that, the Proconve P6 phase (EURO 4) was not implemented because of the unavailability of low-sulphur diesel, therefore recontextualized datasets do not consider this phase. The P5 (EURO 3), P4 (EURO 2) and P3 (EURO 1) phases started in 2005, 2000 and 1996, respectively. Prior technologies are classified as unregulated.
For the dataset recontextualization to the Brazilian reality, an updated average freight load and the diesel with 500 ppm of sulfur and 12% biodiesel blend are considered. Moreover, data from emission tests of the national vehicle production and import (CETESB, 2019) is used to update regulated emissions (carbon monoxide, particulate matter and nitrogen oxides). Furthermore, correction factors are used to consider the impact of biodiesel blend on exhaust emissions (USEPA 2002), and the fuel composition is considered to account for carbon dioxide and sulphur dioxide emission.
The vehicle mass category classification considered in Brazilian national statistics is approximated to the one adopted in ecoinvent datasets. The larger than 32 metric ton lorry is representing the Brazilian heavy-duty lorry with gross vehicle weight (GVW) larger than 15 metric tons and combined gross vehicle weight (CGVW) larger than 40-ton category classification. For the Brazilian classification, CGVW refers to the total weight of the combinations of vehicles, i.e. trailers. The average capacity utilization factor (including empty trips) for this category is 65.2 % according to the Road Freight Transport Model from the Brazilian Energy Research Enterprise – EPE (Stukart, 2018). Whereas, the average payload capacity for this category is 27.2 ton (Novo, 2016), resulting in an average freight load of 17.7 ton. GWV is estimated by assuming the same empty vehicle weight as for the RER region for the respective matching categories and accounting for the updated freight load. This resulted in a GWV of 35 ton. Vehicle mass dependent non-exhaust emissions (i.e. tyre, brake and road wear) are adjusted accordingly.
The emissions of carbon monoxide (CO), nitrogen oxides (NOx) and Particulate Matter (PM) were updated with data from (CETESB, 2019), which uses data from emission testing of the national vehicle fleet production and imports, weighted by sales amounts. Those tests are run with a reference fuel, which is not blended with biodiesel (ANP, 2018), therefore, those emission factors are adjusted for emissions from burning biodiesel.
The impact of the 12% biodiesel blend in exhaust emissions is accounted for by correction factors derived from USEPA (2002). Correction factors were calculated for the emissions of nitrogen oxides, particulate matter, hydrocarbons, carbon monoxide, acetaldehyde, ethylbenzene, formaldehyde, naphthalene and xylene. Moreover, fuel consumption was corrected with energy content values. For conventional diesel, it was considered energy content of 129.500 Btu/gal, animal-based biodiesel 115.720 Btu/gal and plant-based biodiesel 119.216 Btu/gal (USEPA 2002).
Fuel dependent emissions were updated as well. In Brazil, diesel containing 10 ppm (S10) of sulphur was introduced to attend to the demand of EURO V lorries, as its post-treatment technologies require the use of ultra-low sulphur diesel. Diesel containing 500 ppm (S500) of sulphur is also commercialized for the remaining lorry emission categories. For these cases, the use of S500 is assumed as no information on the share of S500 and S10 diesel used by these categories was available and because the price of S500 is lower than for the S10 (CNT, 2021). Therefore, sulphur dioxide emissions derived from S500 combustion were corrected assuming that all sulphur is emitted as SO2 (0.001 kg SO2/kg fossil diesel) and to account for the blend of biodiesel (12 %), which does not contain sulphur. Carbon dioxide emission is dependent on the fuel carbon content, which was considered as 77.8% for plant-based biodiesel and 76.1 % for animal-based biodiesel, resulting in a Brazilian average of 77.5%, while conventional diesel has 86.7% of carbon (USEPA, 2002). This results in emissions of 3.18 kg of fossil CO2/kg diesel and 2.84 biogenic CO2/kg biodiesel.
This dataset was developed under the Cornerstone project, an initiative from the Brazilian Business Network on Life cycle Assessment (Rede ACV) in collaboration with ecoinvent to increase the quantity and quality of inventories that represent Brazil, through a thorough adaptation of the datasets. More information about this project is available in redeacv.org.br/en/wg-database/. Technical background is provided in Valebona F.; Rocha T.B.; Motta F. L. Cornerstone Project. Recontextualization of Datasets: Methodology. ACV Brasil, Brazil.
Main data sources for the recontextualization:
ANP, 2018. Agência Nacional do Petróleo, Gás Natural e Biocombustíveis (2018). RANP 764. RESOLUÇÃO ANP Nº 764, DE 20.12.2018 - DOU 21.12.2018.
EPE, 2020. Energy Research Enterprise (2020). Integrated Transport Model. Consultation through Information to Citizen System. Federal Government of Brazil.
Stukart, B., Lima, C., Pacheco, C., Silva, F., Antoniasse, G., Cavalcanti, M., Souza, M., Stelling, P. (2018). Transporte Rodoviário Brasileiro, Transição para Óleo Diesel S10 e Desafios para o Refino Nacional. Rio Oil&Gas. Available at: https://stt.ibp.org.br/eventos/2018/riooil2018/pdfs/Riooil2018_1654_201806222325ibp1654_1 8_transic.pdf. Acessed in: 06/06/2020.
CETESB (2019). Companhia Ambiental do Estado de São Paulo (2019). Emissões Veiculares no Estado de São Paulo. Governo do Estado de São Paulo. Available at: https://cetesb.sp.gov.br/veicular/relatoriose-publicacoes/. Accessed in 15/06/2020.
USEPA, 2002. United States Environmental Protection Agency (2002). A Comprehensive Analysis of Biodiesel Impacts on Exhaust Emissions. Draft Technical Report.
Novo, A. L. (2016). PERSPECTIVAS PARA O CONSUMO DE COMBUSTÍVEL NO TRANSPORTE DE CARGA NO BRASIL: UMA COMPARAÇÃO ENTRE OS EFEITOS ESTRUTURA E INTENSIDADE NO USO FINAL DE ENERGIA DO SETOR. Available at: http://www.ppe.ufrj.br/images/publica%C3%A7%C3%B5es/mestrado/Ana_Luiza_Andrade_Novo.pdf
CNT (2021). CNT acompanha, com atenção, a alta histórica do diesel. Available at: cnt.org.br/agencia-cnt/cnt-acompanha-alta-historica-do-diesel

## Included activities start
From combustion of fuel in the engine. The dataset takes as input the infrastructure of the lorry and road network, the materials and efforts needed for maintenance of these and the fuel consumed in the vehicle for the journey.

## Included activities end
The activity ends with the transport service of 1tkm and the emissions of exhaust and non-exhaust emissions into air, water and soil.

## Geography
Recontextualization from 'transport, freight, lorry >32 metric ton, EURO3, RER'. Fuel type, freight load factor, regulated and fuel-dependent emissions were updated for the Brazilian situation. The environmental interventions due to vehicle transport are modelled by linking the environmental interventions due to vehicle operation with impacts due to vehicle manufacturing, vehicle maintenance, vehicle disposal, road construction, operation and maintenance of roads and road disposal.

## Technology
Diesel and diesel engine. Lorry transport is further differentiated with respect to vehicle weight and emission technology standard (EURO-standard).
Technology classifications are based on those used widely within the works of the European Environment Agency, particularly in the Emissions Inventory Guidebook.

## Time period
Validity period of the 12% biodiesel blend regulation. The regulation foresees incremental increases in the biodiesel content in the Brazilian market fuel (it started with a 2% blend in 2008, reached 12% in 2020 and will increase 1% a year, until it reaches 15% in 2023).

## Reference product
- transport, freight, lorry >32 metric ton, EURO3: 1 metric ton*km; By-product classification allocatable product; CPC 6511: Road transport services of freight
  production volume 3.89399e11 metric ton*km; name transport_RP_PV; = 1548000000000*0.645*0.39
    Production volume retrieved from the Brazilian National Logistic Plan -2025 (EPL, 2018), which reports the amount of 1,548 billion tonne.km of freight transported by lorries in 2015. The split among lorry size categories has been calculated according to fleet sizes, annual mileages and freight loads. The average annual mileage accounts for the annual mileage decay according to the fleet age of each size class (CETESB, 2019). Furthermore, the shares of emission regulation classes are estimated according to their respective fleet size reported for the state of São Paulo in 2018 (CETESB, 2019).
    References:
    CETESB (2019). Companhia Ambiental do Estado de São Paulo (2019). Emissões Veiculares no Estado de São Paulo. Governo do Estado de São Paulo. Available at: cetesb.sp.gov.br/veicular/relatoriose-publicacoes/. [Accessed on 15/06/2020]
    EPL (2018). Plano Nacional de Logística. PNL - 2025. Relatório Executivo. Available at: epl.gov.br/transporte-inter-regional-de-carga-no-brasil-panorama-2015 [Accessed on 24/05/2021]
  property price 0.0158328 EUR2005
    Calculated based on inputs: The price of the product has been calculated as a sum of the values of the material and energy inputs for this product. This value is therefore a rough estimation. It may underestimate the real price since there are additional expenses when producing any product. These expences can include for example labour costs, treatment of waste materials and profit for the producer. Please consider carefully whether this level of data quality is acceptable for your application.
  properties: carbon allocation 0 kg, carbon content 0

## Inputs from technosphere
- brake wear emissions, lorry: -1.60299e-5 kg; name brake_emissions; = (8.13e-9*34981.9)/17.742; source Ntziachristos, L. 2013; lognormal variance with pedigree 0.0207, pedigree (3,2,4,5,3)
  Road freight specific non-exhaust emissions.
  Brake wear emissions calculation was updated with Brazilian Gross Vehicle Weight (GVW). The linear relation 8.13E-9 kg/kg GVW*km was considered as in the original dataset for the RER region.
  The GVW of the Brazilian >32t lorries using an average load factor is 34982 kg. The GVW was calculated from the original RER value according to the updated load factor from EPE (2020). The calculated emission is normalized by the average payload, according to the reference flow.
  References:
  EPE, 2020. Energy Research Enterprise (2020). Integrated Transport Model. Consultation through Information to Citizen System. Federal Government of Brazil.
  Ntziachristos, L., et al. (2013) EMEP/EEA air pollutant emissions inventory guidebook 2009: Exhaust emissions from road transport. European Environment Agency, Copenhagen, DK.
  production volume; = brake_emissions*transport_RP_PV
    Calculated from production volume of reference product using the relative outputs.
  property dry mass 1 kg; name brake_emissions_DM
  property wet mass 1 kg; name brake_emissions_WM
  properties: carbon content, fossil 0.149
  note on carbon content, fossil: This amount equates to the amout for organic carbon reported in the Emissions Inventory Guidebook (Ntziachristos et al., 2013).
- diesel: 0.0156693 kg; source Keller, M. 2010; lognormal variance with pedigree 0.0513, pedigree (2,2,5,5,3)
  Literature value. Derived from HBEFA database (Keller, 2010).
  Data extrapolated from the original dataset covering the RER region. Corrected to account for 12% biodiesel blend accordind to fuels energy content. Type of diesel represents the Brazilian diesel with 500 ppm of sulphur concentration. For conventional diesel, it was considered energy content of 129.500 Btu/gal, for animal-based biodiesel 115.720 Btu/gal and for plant-based biodiesel 119.216 Btu/gal (USEPA, 2002). Final value is influenced by the updated freight load factor form EPE (2020).
  References:
  EPE, 2020. Energy Research Enterprise (2020). Integrated Transport Model. Consultation through Information to Citizen System. Federal Government of Brazil.
  Keller, M. et al. (2010) Handbook emission factors for road transport v3.1, HBEFA. INFRAS, Berne, CH.
  USEPA, 2002. United States Environmental Protection Agency (2002). A Comprehensive Analysis of Biodiesel Impacts on Exhaust Emissions. Draft Technical Report.
  properties: carbon content, fossil 0.865, dry mass 1 kg, heating value, net 42.8 MJ, wet mass 1 kg
  note on carbon content, fossil: C-content of diesel is 86.5% (ecoinvent v2.2 report 6_IV, Tab 3.14)
- fatty acid methyl ester: 0.00213672 kg; source ANP 2013; lognormal variance with pedigree 0.0513, pedigree (2,2,5,5,3)
  Fuel consumption data extrapolated from the original dataset covering the RER region. Corrected to account for 12% biodiesel blend accordind to fuels energy content. For conventional diesel, it was considered energy content of 129.500 Btu/gal, for animal-based biodiesel 115.720 Btu/gal and for plant-based biodiesel 119.216 Btu/gal (USEPA, 2002). Final value is influenced by the updated freight load factor form EPE (2020).
  References:
  EPE, 2020. Energy Research Enterprise (2020). Integrated Transport Model. Consultation through Information to Citizen System. Federal Government of Brazil.
  Keller, M. et al. (2010) Handbook emission factors for road transport v3.1, HBEFA. INFRAS, Berne, CH.
  USEPA, 2002. United States Environmental Protection Agency (2002). A Comprehensive Analysis of Biodiesel Impacts on Exhaust Emissions. Draft Technical Report.
  properties: carbon content, fossil 0.041, carbon content, non-fossil 0.732, dry mass 1 kg, wet mass 1 kg
- lorry, 40 metric ton: 8.6808e-8 unit; lognormal variance with pedigree 0.352, pedigree (3,1,5,5,3)
  Calculated value based on lifetime vkm (540 000 for all lorry sizes) and average load factors (see Activity Description).
  Data extrapolated from the original dataset covering the RER region. Final value is influenced by the updated freight load factor form EPE (2020).
  References:
  EPE, 2020. Energy Research Enterprise (2020). Integrated Transport Model. Consultation through Information to Citizen System. Federal Government of Brazil.
  Spielmann, M., et al. (2007) Transport Services. ecoinvent report No. 14., Swiss Centre for Life Cycle Inventories, Dübendorf, CH.
- maintenance, lorry 40 metric ton: 8.6808e-8 unit; lognormal variance with pedigree 0.36, pedigree (3,5,5,5,3)
  (same comment as for lorry, 40 metric ton)
- road: 0.00109 m*year; source Spielmann M. 2007; lognormal variance with pedigree 0.352, pedigree (3,1,5,5,3)
  Calculated value based demand factors and underlying assumptions for European road transport services. Values are based on total tkm of all road transport services (RER) and the relative shares of each specific form (i.e. 3.5-7.5t lorry). The value per tkm is then based on the net vehicle weight plus averge load factor (see Activity Description). Transport performance data is derived from TREMOVE (2009).
  Data extrapolated from the original dataset covering the RER region.
  References:
  Spielmann, M., et al. (2007) Transport Services. ecoinvent report No. 14., Swiss Centre for Life Cycle Inventories, Dübendorf, CH.
- road maintenance: 7.27903e-5 m*year; lognormal variance with pedigree 0.36, pedigree (3,5,5,5,3)
  Calculated value based demand factors and underlying assumptions for European road transport services. Values are based on total vkm of all road transport services (RER) and the relative shares of each specific form (e.g. 3.5-7.5t lorry). The value per tkm is then based on the average load factor (see Activity Description). Transport performance data is derived from TREMOVE (2009).
  Data extrapolated from the original dataset covering the RER region. Final value is influenced by the updated freight load factor form EPE (2020).
  References:
  EPE, 2020. Energy Research Enterprise (2020). Integrated Transport Model. Consultation through Information to Citizen System. Federal Government of Brazil.
  De Ceuster, G., et al. (2009) TREMOVE: Final Report. Model code v2.7b, 2009. European Commission, Brussels.
- road wear emissions, lorry: -1.38019e-5 kg; name road_emissions; = (7.0e-9*34981.9)/17.742; source Ntziachristos, L. 2013; lognormal variance with pedigree 0.0527, pedigree (3,2,5,5,3)
  Road freight specific non-exhaust emissions.
  Road wear emissions calculation was updated with Brazilian Gross Vehicle Weight (GVW). The linear relation 7.0E-9 kg/kg GVW*km was considered as in the original dataset for the RER region.
  The GVW of the Brazilian >32t lorries using an average load factor is 34982 kg. The GVW was calculated from the original RER value according to the updated load factor from EPE (2020). The calculated emission is normalized by the average payload, according to the reference flow.
  References:
  EPE, 2020. Energy Research Enterprise (2020). Integrated Transport Model. Consultation through Information to Citizen System. Federal Government of Brazil.
  Ntziachristos, L., et al. (2013) EMEP/EEA air pollutant emissions inventory guidebook 2009: Exhaust emissions from road transport. European Environment Agency, Copenhagen, DK.
  production volume; = road_emissions*transport_RP_PV
    Calculated from production volume of reference product using the relative outputs.
  property dry mass 1 kg; name road_emissions_DM
  property wet mass 1 kg; name road_emissions_WM
  properties: carbon content, fossil 0.75
  note on carbon content, fossil: The amount of carbon released due to road wear is not given in theEmissions Inventory Guidebook (Ntziachristos et al., 2013). For road wear there are no individual substances reported. Here we assume that 75% of the particle emissions are carbon, fossil in their nature due to the bitumen road surfacing.
- tyre wear emissions, lorry: -0.00015882 kg; name tyre_emissions; = (8.055e-8*34981.9)/17.742; source Ntziachristos, L. 2013; lognormal variance with pedigree 0.0207, pedigree (3,2,4,5,3)
  Road freight specific non-exhaust emissions.
  Tyre wear emissions calculation was updated with Brazilian Gross Vehicle Weight (GVW). The linear relation 8.055E-8 kg/kg GVW*km was considered as in the original dataset for the RER region.
  The GVW of the Brazilian >32t lorries using an average load factor is 34982 kg. The GVW was calculated from the original RER value according to the updated load factor from EPE (2020). The calculated emission is normalized by the average payload, according to the reference flow.
  References:
  EPE, 2020. Energy Research Enterprise (2020). Integrated Transport Model. Consultation through Information to Citizen System. Federal Government of Brazil.
  Ntziachristos, L., et al. (2013) EMEP/EEA air pollutant emissions inventory guidebook 2009: Exhaust emissions from road transport. European Environment Agency, Copenhagen, DK.
  production volume; = tyre_emissions*transport_RP_PV
    Calculated from production volume of reference product using the relative outputs.
  property dry mass 1 kg; name tyre_emissions_DM
  property wet mass 1 kg; name tyre_emissions_WM
  properties: carbon content, fossil 0.675

## Emissions to nature
- Acetaldehyde [air, unspecified]: 6.75782e-7 kg; source Ntziachristos, L. 2013; lognormal variance with pedigree 0.0513, pedigree (2,2,5,5,3)
  Data extrapolated from the original dataset covering the RER region. Correction factor applied to account the impact of the biodiesel blend on exhaust emission according to USEPA (2002). Final value is influenced by the updated freight load factor form EPE (2020).
  References:
  EPE, 2020. Energy Research Enterprise (2020). Integrated Transport Model. Consultation through Information to Citizen System. Federal Government of Brazil.
  USEPA, 2002. United States Environmental Protection Agency (2002). A Comprehensive Analysis of Biodiesel Impacts on Exhaust Emissions. Draft Technical Report.
- Acrolein [air, unspecified]: 2.61736e-7 kg; source Ntziachristos, L. 2013; lognormal variance with pedigree 0.0513, pedigree (2,2,5,5,3)
  (same comment as for Acetaldehyde)
- Ammonia [air, unspecified]: 1.69091e-7 kg; source Keller, M. 2010; lognormal variance with pedigree 0.0513, pedigree (2,2,5,5,3)
  Literature value. Derived from HBEFA database (Keller, 2010).
  Data extrapolated from the original dataset covering the RER region. Final value is influenced by the updated freight load factor form EPE (2020).
  References:
  EPE, 2020. Energy Research Enterprise (2020). Integrated Transport Model. Consultation through Information to Citizen System. Federal Government of Brazil.
  Keller, M. et al. (2010) Handbook emission factors for road transport v3.1, HBEFA. INFRAS, Berne, CH.
- Arsenic ion [air, unspecified]: 1.7627e-12 kg; source Ntziachristos, L. 2013; lognormal variance with pedigree 0.0513, pedigree (2,2,5,5,3)
  Literature value. Fuel dependant emissions - heavy metal in fuel. Literature value. EMEP/EEA (2013) Tab. 3-100.
  Data extrapolated from the original dataset covering the RER region. Final value is influenced by the updated freight load factor form EPE (2020).
  References:
  EPE, 2020. Energy Research Enterprise (2020). Integrated Transport Model. Consultation through Information to Citizen System. Federal Government of Brazil.
  Ntziachristos, L., et al. (2013) EMEP/EEA air pollutant emissions inventory guidebook 2009: Exhaust emissions from road transport. European Environment Agency, Copenhagen, DK.
- Benzaldehyde [air, unspecified]: 2.02587e-7 kg; source Ntziachristos, L. 2013; lognormal variance with pedigree 0.0513, pedigree (2,2,5,5,3)
  (same comment as for Acetaldehyde)
- Benzene [air, unspecified]: 1.03511e-8 kg; source Ntziachristos, L. 2013; lognormal variance with pedigree 0.0513, pedigree (2,2,5,5,3)
  (same comment as for Acetaldehyde)
- Butane [air, unspecified]: 2.2181e-8 kg; source Ntziachristos, L. 2013; lognormal variance with pedigree 0.0513, pedigree (2,2,5,5,3)
  (same comment as for Acetaldehyde)
- Cadmium II [air, unspecified]: 1.53355e-10 kg; source Ntziachristos, L. 2013; lognormal variance with pedigree 0.7507, pedigree (2,2,5,5,3)
  (same comment as for Arsenic ion)
- Carbon dioxide, fossil [air, unspecified]: 0.0497437 kg; source U. S, Environmental Protection Agency 2002; lognormal variance with pedigree 0.0606, pedigree (3,5,5,5,3)
  Calculated value based on the fuel carbon content, which was considered as 77.8% for plant-based biodiesel and 76.1 % for animal-based biodiesel, resulting in a Brazilian average of 77.5%, while conventional diesel has 86.7% of carbon (USEPA, 2002). This results in emissions of 3.18 kg fossil CO2/kg diesel and 2.84 biogenic CO2/kg biodiesel.
- Carbon dioxide, non-fossil [air, unspecified]: 0.00606437 kg; source U. S, Environmental Protection Agency 2002; lognormal variance with pedigree 0.0606, pedigree (3,5,5,5,3)
  (same comment as for Carbon dioxide, fossil)
- Carbon monoxide, fossil [air, unspecified]: 4.38468e-5 kg; source CETESB 2019; lognormal variance with pedigree 0.0015, pedigree (2,2,2,1,1)
  Measured data from emission testing of the national vehicle fleet production and imports, weighted by sales amounts (CETESB, 2019). Correction factor applied to account the impact of the biodiesel blend on exhaust emission according to USEPA (2002). Value representing the fossil emission share. Final value is influenced by the updated freight load factor form EPE (2020).
  References:
  CETESB (2019). Companhia Ambiental do Estado de São Paulo (2019). Emissões Veiculares no Estado de São Paulo. Governo do Estado de São Paulo. Available at: https://cetesb.sp.gov.br/veicular/relatoriose-publicacoes/. Accessed in 15/06/2020.
  EPE, 2020. Energy Research Enterprise (2020). Integrated Transport Model. Consultation through Information to Citizen System. Federal Government of Brazil.
  USEPA, 2002. United States Environmental Protection Agency (2002). A Comprehensive Analysis of Biodiesel Impacts on Exhaust Emissions. Draft Technical Report.
- Carbon monoxide, non-fossil [air, unspecified]: 5.97911e-6 kg; source CETESB 2019; lognormal variance with pedigree 0.0015, pedigree (2,2,2,1,1)
  Measured data from emission testing of the national vehicle fleet production and imports, weighted by sales amounts (CETESB, 2019). Correction factor applied to account the impact of the biodiesel blend on exhaust emission according to USEPA (2002). Value representing the biogenic emission share. Final value is influenced by the updated freight load factor form EPE (2020).
  References:
  CETESB (2019). Companhia Ambiental do Estado de São Paulo (2019). Emissões Veiculares no Estado de São Paulo. Governo do Estado de São Paulo. Available at: https://cetesb.sp.gov.br/veicular/relatoriose-publicacoes/. Accessed in 15/06/2020.
  EPE, 2020. Energy Research Enterprise (2020). Integrated Transport Model. Consultation through Information to Citizen System. Federal Government of Brazil.
  USEPA, 2002. United States Environmental Protection Agency (2002). A Comprehensive Analysis of Biodiesel Impacts on Exhaust Emissions. Draft Technical Report.
- Chromium III [air, unspecified]: 5.28809e-10 kg; source Ntziachristos, L. 2013; lognormal variance with pedigree 0.7507, pedigree (2,2,5,5,3)
  (same comment as for Arsenic ion)
- Chromium VI [air, unspecified]: 1.05762e-12 kg; source Ntziachristos, L. 2013; lognormal variance with pedigree 0.7507, pedigree (2,2,5,5,3)
  Estimated value. Fuel dependant emissions - heavy metal in fuel. Estimated using the underlying assumption that 0.2% of the emitted Cr is emitted as Cr(IV). Fuel dependant emissions - heavy metal in fuel. Literature value for Cr. EMEP/EEA (2013) Tab. 3-100.
  Data extrapolated from the original dataset covering the RER region. Final value is influenced by the updated freight load factor form EPE (2020).
  References:
  EPE, 2020. Energy Research Enterprise (2020). Integrated Transport Model. Consultation through Information to Citizen System. Federal Government of Brazil.
  Ntziachristos, L., et al. (2013) EMEP/EEA air pollutant emissions inventory guidebook 2009: Exhaust emissions from road transport. European Environment Agency, Copenhagen, DK.
- Copper ion [air, unspecified]: 3.73691e-10 kg; source Ntziachristos, L. 2013; lognormal variance with pedigree 0.7507, pedigree (2,2,5,5,3)
  (same comment as for Arsenic ion)
- Dinitrogen monoxide [air, unspecified]: 4.01826e-7 kg; source Keller, M. 2010; lognormal variance with pedigree 0.0592, pedigree (2,5,5,5,3)
  (same comment as for Ammonia)
- Ethane [air, unspecified]: 4.43621e-9 kg; source Ntziachristos, L. 2013; lognormal variance with pedigree 0.0513, pedigree (2,2,5,5,3)
  (same comment as for Acetaldehyde)
- Formaldehyde [air, unspecified]: 1.24214e-6 kg; source Ntziachristos, L. 2013; lognormal variance with pedigree 0.0592, pedigree (2,5,5,5,3)
  (same comment as for Acetaldehyde)
- Heptane [air, unspecified]: 4.43621e-8 kg; source Ntziachristos, L. 2013; lognormal variance with pedigree 0.0513, pedigree (2,2,5,5,3)
  (same comment as for Acetaldehyde)
- Lead II [air, unspecified]: 9.18364e-10 kg; source Ntziachristos, L. 2013; lognormal variance with pedigree 0.7507, pedigree (2,2,5,5,3)
  (same comment as for Arsenic ion)
- Mercury II [air, unspecified]: 9.34229e-11 kg; source Ntziachristos, L. 2013; lognormal variance with pedigree 0.7507, pedigree (2,2,5,5,3)
  (same comment as for Arsenic ion)
- Methane, fossil [air, unspecified]: 3.63624e-7 kg; source Keller, M. 2010; lognormal variance with pedigree 0.0592, pedigree (2,5,5,5,3)
  (same comment as for Acetaldehyde)
- NMVOC, non-methane volatile organic compounds [air, unspecified]: 1.20118e-5 kg; source Keller, M. 2010; lognormal variance with pedigree 0.0513, pedigree (2,2,5,5,3)
  (same comment as for Acetaldehyde)
- Nickel II [air, unspecified]: 1.55117e-10 kg; source Ntziachristos, L. 2013; lognormal variance with pedigree 0.7507, pedigree (2,2,5,5,3)
  (same comment as for Arsenic ion)
- Nitrogen oxides [air, unspecified]: 0.000393123 kg; source CETESB 2019; lognormal variance with pedigree 0.0015, pedigree (2,2,2,1,1)
  Measured data from emission testing of the national vehicle fleet production and imports, weighted by sales amounts (CETESB, 2019). Correction factor applied to account the impact of the biodiesel blend on exhaust emission according to USEPA (2002). Final value is influenced by the updated freight load factor form EPE (2020).
  References:
  CETESB (2019). Companhia Ambiental do Estado de São Paulo (2019). Emissões Veiculares no Estado de São Paulo. Governo do Estado de São Paulo. Available at: https://cetesb.sp.gov.br/veicular/relatoriose-publicacoes/. Accessed in 15/06/2020.
  EPE, 2020. Energy Research Enterprise (2020). Integrated Transport Model. Consultation through Information to Citizen System. Federal Government of Brazil.
  USEPA, 2002. United States Environmental Protection Agency (2002). A Comprehensive Analysis of Biodiesel Impacts on Exhaust Emissions. Draft Technical Report.
- PAH, polycyclic aromatic hydrocarbons [air, unspecified]: 1.37843e-9 kg; source Ntziachristos, L. 2013; lognormal variance with pedigree 0.7507, pedigree (2,2,5,5,3)
  Literature value. PAH's per kg fuel use provided by the EMEP/EEA (2013) guidebook.
  Data extrapolated from the original dataset covering the RER region. Final value is influenced by the updated freight load factor form EPE (2020).
  References:
  EPE, 2020. Energy Research Enterprise (2020). Integrated Transport Model. Consultation through Information to Citizen System. Federal Government of Brazil.
  Ntziachristos, L., et al. (2013) EMEP/EEA air pollutant emissions inventory guidebook 2009: Exhaust emissions from road transport. European Environment Agency, Copenhagen, DK.
- Particulate Matter, < 2.5 um [air, unspecified]: 5.23707e-6 kg; source CETESB 2019; lognormal variance with pedigree 0.0015, pedigree (2,2,2,1,1)
  (same comment as for Nitrogen oxides)
- Pentane [air, unspecified]: 8.87241e-9 kg; source Ntziachristos, L. 2013; lognormal variance with pedigree 0.0513, pedigree (2,2,5,5,3)
  (same comment as for Acetaldehyde)
- Propane [air, unspecified]: 1.47874e-8 kg; source Ntziachristos, L. 2013; lognormal variance with pedigree 0.0513, pedigree (2,2,5,5,3)
  (same comment as for Acetaldehyde)
- Selenium IV [air, unspecified]: 1.7627e-12 kg; source Ntziachristos, L. 2013; lognormal variance with pedigree 0.7507, pedigree (2,2,5,5,3)
  (same comment as for Arsenic ion)
- Styrene [air, unspecified]: 8.28092e-8 kg; source Ntziachristos, L. 2013; lognormal variance with pedigree 0.0513, pedigree (2,2,5,5,3)
  (same comment as for Acetaldehyde)
- Sulfur dioxide [air, unspecified]: 1.56693e-5 kg; source ANP 2013; lognormal variance with pedigree 0.0028, pedigree (3,1,2,1,1)
  Calculated value based on fuel sulphur content. EURO3 lorries are fuelled with 500 ppm sulphur content fossil diesel blended with 12% biodiesel, which does not contribute to sulphur emissions.
  References:
  MMA, 2014. Ministry of Environment (2014). Inventário Nacional de Emissões Atmosféricas por Veículos
  Automotores Rodoviários. Available at:
  http://www.antt.gov.br/backend/galeria/arquivos/inventario_de_emissoes_por_veiculos_rodov
  iarios_2013.pdf. Accessed in: 10/06/2020.
- Toluene [air, unspecified]: 1.47874e-9 kg; source Ntziachristos, L. 2013; lognormal variance with pedigree 0.0513, pedigree (2,2,5,5,3)
  (same comment as for Acetaldehyde)
- Zinc II [air, unspecified]: 3.06357e-8 kg; source Ntziachristos, L. 2013; lognormal variance with pedigree 0.7507, pedigree (2,2,5,5,3)
  (same comment as for Arsenic ion)
- m-Xylene [air, unspecified]: 1.44916e-7 kg; source Ntziachristos, L. 2013; lognormal variance with pedigree 0.0513, pedigree (2,2,5,5,3)
  (same comment as for Acetaldehyde)
- o-Xylene [air, unspecified]: 5.91494e-8 kg; source Ntziachristos, L. 2013; lognormal variance with pedigree 0.0592, pedigree (2,5,5,5,3)
  (same comment as for Acetaldehyde)

## Sampling procedure
Literatura data is used to update regulated exhaust emissions and freight load factors. Furthermore, correction factors are used to consider the impact of biodiesel blend on exhaust emissions. Refer to General Comment section for detailed recontextualization methodology.

## Extrapolations
Apart from particulate matter, carbon monoxide, sulfur dioxide, and carbon dioxide, exhaust emissions are extrapolated from an original dataset covering the geography RER. Infrastructure and maintenance information are also extrapolated from the geography RER. Fuel use and emission factors were adapted considering the 12% biodiesel blend, however original emission factors references are from earlier periods. The uncertainty has been adjusted accordingly.

## Review by Christian Bauer 2021-03-29
passed
