# barium carbonate production

Dataset: EcoSpold 2, unit process
Geography: GLO
Time period: 2015-01-01 to 2023-12-31
Technology level: current
Classification: ISIC rev.4 ecoinvent: 2011:Manufacture of basic chemicals
Synonyms: Carbonic acid, barium salt (1:1); Barium carbonate (1:1); Barium monocarbonate; Carbonic acid, barium salt
Scenario: Business-as-Usual
System model: Allocation, cut-off by classification
Generated by: Lucia Valsasina
Database: ecoinvent
isCopyrightProtected: true
accessRestrictedTo: 1

## General comment
Barium carbonate appears as white powder, which is soluble in most acids (except sulfuric acid), but not in water. About half of the produced barium carbonate is used in the manufacture of glass. Other uses comprise the production of clay and bricks, barium chemicals and ferrites as well as photographical paper.
Reference(s): Dibello PM et al; Barium Compounds. Kirk-Othmer Encyclopedia of Chemical Technology (2003). John Wiley & Sons, Inc. Online Posting Date: July 18, 2003
For more information on the model please refer to the dedicate ecoinvent report, access it in the Report section of ecoQuery (http://www.ecoinvent.org/login-databases.html)

## Included activities start
The activity starts when the raw materials enter the process.

## Included activities end
Materials entering the process are included as well as energy uses, infrastructure and emissions.

## Geography
The inputs to the process are calculated based on stoichiometry and literature data, they are therefore considered to be valid for the chosen geography. The inputs of heat, electricity, water, factory and nitrogen are mostly taken as average of industry data. Industry data values are a 5-year average of data (2011 - 2015) published by the Gendorf factory (Gendorf, 2016, Umwelterklärung, www.gendorf.de), (Gendorf, 2015, Umwelterklärung, www.gendorf.de), (Gendorf, 2014, Umwelterklärung, www.gendorf.de). The Gendorf factory is based in Germany, it produces a wide range of chemical substances. The factory produced 1657400 tonnes of chemical substances in the year 2015 (Gendorf, 2016, Umwelterklärung, www.gendorf.de) and 740000 tonnes of intermediate products. Given the range of chemicals produced by the german site, the values are used for the GLO geography, with uncertainty adjusted accordingly.

## Technology
Barium carbonate is manufactured in two reaction steps from barium sulfate (barite). Barite is treated with coal from coke to deliver barium sulfide. There are two main routes to receive barium carbonate: precipitation with carbon dioxide and precipitation with soda (Kresse et al., 2007). The main producers (e.g. Solvay) are using the carbon dioxide method, this is modelled here. In this reaction the barium sulfide is treated with carbon dioxide, which was formed in the first reactions step, which produces barium carbonate and hydrogen sulfide. Hydrogen sulfide is assumed to be neutralised in waste water treatment and turned into Sulfate The reaction temperature is between 60 and 70 degree C. It is followed by filtering of the resulting slurry, washing, drying, grinding and packaging of barium carbonate. The assumed process efficiency is 90% per reaction step.
BaSO4 + 2 C --> BaS + 2 CO2
BaS + CO2 --> BaCO3 + H2S
This inventory representing production of a particular chemical compound is at least partially based on a generic model on the production of chemicals. The data generated by this model have been improved by compound-specific data when available.
The model on production of chemicals is using specific industry or literature data wherever possible and more generic data on chemical production processes to fill compound-specific data gaps when necessary. The model has been updated and extended with newly available data from the chemical industry.
In the model, unreacted fractions are treated in a waste treatment process, and emissions reported are after a waste treatment process that is included in the scope of this dataset. For volatile reactants, a small level of evaporation is assumed. Solvents and catalysts are mostly recycled in closed-loop systems within the scope of the dataset and reported flows are for losses from this system.
In the model, unreacted fractions are treated in a waste treatment process, and emissions reported are after a waste treatment process that is included in the scope of this dataset. For volatile reactants, a small level of evaporation is assumed. Solvents and catalysts are mostly recycled in closed-loop systems within the scope of the dataset and reported flows are for losses from this system.
The main source of information for the values for heat, electricity, water (process and cooling), nitrogen, chemical factory is industry data from Gendorf. The values are a 5-year average of data (2011 - 2015) published by the Gendorf factory (Gendorf, 2016, Umwelterklärung, www.gendorf.de), (Gendorf, 2015, Umwelterklärung, www.gendorf.de), (Gendorf, 2014, Umwelterklärung, www.gendorf.de). The Gendorf factory is based in Germany, it produces a wide range of chemical substances. The factory produced 1657400 tonnes of chemical substances in the year 2015 (Gendorf, 2016, Umwelterklärung, www.gendorf.de) and 740000 tonnes of intermediate products.
References:
Hischier, R. (2005) Establishing Life Cycle Inventories of Chemicals Based on Differing Data Availability (9 pp). The International Journal of Life Cycle Assessment, Volume 10, Issue 1, pp 59–67. 10.1065/lca2004.10.181.7
Gendorf (2020) Umwelterklärung 2019, Werk Gendorf Industriepark, www.gendorf.de
Kirk-Othmer Encyclopedia of Chemical Technology. 3rd ed., Volumes 1-26. New York, NY: John Wiley and Sons, 1978-1984., p. V3: 466 (1978)
Kresse, R., Baudis, U., Jäger, P., Riechers, H. H., Wagner, H., Winkler, J. and Wolf, H. U. 2007. Barium and Barium Compounds. Ullmann's Encyclopedia of Industrial Chemistry. pp. 15-16. Wiley-VCH, Weinheim.

## Time period
The activity is based on stoichiometry and literature data, it is therefore considered not to change significantly over time in terms of inputs. The inputs of heat, electricity, water, factory and nitrogen are mostly taken as average of industry data. Industry data values are a 5-year average of data (2011 - 2015) published by the Gendorf factory (Gendorf, 2016, Umwelterklärung, www.gendorf.de), (Gendorf, 2015, Umwelterklärung, www.gendorf.de), (Gendorf, 2014, Umwelterklärung, www.gendorf.de). The Gendorf factory is based in Germany, it produces a wide range of chemical substances. The factory produced 1657400 tonnes of chemical substances in the year 2015 (Gendorf, 2016, Umwelterklärung, www.gendorf.de) and 740000 tonnes of intermediate products. The time period is therefore set based on the years from Gendorf reference.

## Reference product
- barium carbonate: 1 kg; name RP; By-product classification allocatable product; CPC 34240: Phosphates of triammonium; salts and peroxysalts of inorganic acids and metals n.e.c.; HS2017 283660: Carbonates; barium carbonate; CAS 513-77-9
  Barium carbonate appears as white powder, which is soluble in most acids (except sulfuric acid), but not in water. About half of the produced barium carbonate is used in the manufacture of glass. Other uses comprise the production of clay and bricks, barium chemicals and ferrites as well as photographical paper. Reference(s): Dibello PM et al; Barium Compounds. Kirk-Othmer Encyclopedia of Chemical Technology (2003). John Wiley & Sons, Inc. Online Posting Date: July 18, 2003
  production volume 5.42e8 kg; name RP_PV
    Literature value. The total global production of 2001 as reported by OECD. 2005. Barium carbonate, CAS No. 513-77-9, SIDS Initial Assessment Profile. Online from http://www.chemicals.moew.government.bg/chemical/site/File/registers/profile/513779p.pdf, accessed 29 June 2017
  property price 2.70383 EUR2005
    Calculated based on inputs: The price of the product has been calculated as a sum of the values of the material and energy inputs for this product. This value is therefore a rough estimation. It may underestimate the real price since there are additional expenses when producing any product. These expences can include for example labour costs, treatment of waste materials and profit for the producer. Please consider carefully whether this level of data quality is acceptable for your application.
  properties: carbon allocation 0.0608657 kg, carbon content 0.0608657, carbon content, fossil 0.0608657, carbon content, non-fossil 0, dry mass 1 kg, water content 0, water in wet mass 0 kg, wet mass 1 kg

## Inputs from technosphere
- barite: 1.46018 kg; lognormal variance with pedigree 0.010025, pedigree (2,3,2,2,3)
  Calculated value based on stoichiometric calculations and literature data. 203.47488g/mol is the molar mass of barium sulfide (BaH2S2). 197.3362g/mol is the molar mass of barium carbonate (BaCO3). There are two main routes of manufacturing: precipitation with carbon dioxide and precipitation with soda (Kresse et al., 2007). The soda ash method is used by about half the industry and is modelled here. In this reaction the barium sulfide is treated with dissolved or solid sodium carbonate, which produces barium carbonate and sodium sulfide. Sodium sulfide is assumed to be neutralised in waste water treatment and turned into Sulfate The reaction temperature is between 60 and 70 degree C. It is followed by filtering of the resulting slurry, washing, drying, grinding and packaging of barium carbonate. The assumed process efficiency is 95%. Chemical Reaction: BaS + CNa2O3 → BaCO3
  properties: dry mass 1 kg, wet mass 1 kg
- chemical factory, organics: 4e-10 unit; lognormal variance with pedigree 0.31, pedigree (2,3,2,4,3)
  Calculated based on literature data published by the industry. For this activity, no information was readily available concerning infrastructure and land-use. Therefore, the infrastructure is estimated based on data from two chemical factories, the BASF site of Ludwigshafen and the chemical factory in Gendorf (which are both located in Germany), which produce a wide range of chemical substances. Based on this data, the following assumptions are made: the built area amounts to about 4.2 ha, the plant has an average output of 50'000 t/a and a lifespan of fifty years. The estimated infrastructure amount is therefore 4.00 E-10 units per kg of produced chemical. References: Althaus H.-J., Chudacoff M., Hischier R., Jungbluth N., Osses M. and Primas A. (2007) Life Cycle Inventories of Chemicals. ecoinvent report No. 8, v2.0. EMPA Dübendorf, Swiss Centre for Life Cycle Inventories, Dübendorf, CH. Gendorf (2000) Umwelterklärung 2000, Werk Gendorf. Werk Gendorf, Burgkirchen.
- coke: 1.6836, 3.57274 MJ (2 suppliers, which the file names only by identifier); sum of these 5.25634 MJ; lognormal variance with pedigree 0.0022, pedigree (1,1,2,5,1)
  Literature source. This exchange has been copied from the activity 'heat production, at coal coke industrial furnace 1-10MW, GLO' to represent the coke 0.1501 kg. It has been sclaed for the amount of 4.205 MJ. Calculated value based in corresponding fuel use of heat production, at hard coal industrial furnace, GLO
  Uncertainty: Calculated variable. Uncertainty will be determined from propagation of uncertainty factors of underlying variables.
  properties: Corresponding fuel use 1.24992 MJ, carbon content, fossil 0.869149, dry mass 0.0328671 kg, heating value, net 28.6 MJ, water content 0.0638298, wet mass 0.034965 kg
  note on Corresponding fuel use: Lower heating value of the fuel input related to the heat/electricity output. Calculated from heat production, at hard coal industrial furnace, based on hard coal NHV and fuel input. fuel input: 0,04325 kg/Mj of output Hard coal NHV= 28,9 MJ/kg Corresponding fuel use= 28,9* 0,04325
- electricity, medium voltage: 0.577528 kWh; lognormal variance with pedigree 0.010025, pedigree (2,3,2,2,3)
  Literature data. Value taken from 'Anticipatory Life-cycle Assessment of Supercritical Fluid Synthesis of Barium Strontium Titanate Nanoparticles' Michael Tsang, Gilles Philippot, Cyril Aymonier, Guido Sonnemann Electronic Supplementary Material (ESI) for Green Chemistry. The Royal Society of Chemistry 2016
- hard coal ash: -3.11427e-6, -4.91587e-6, -6.91695e-6, -4.86593e-6, -1.03219e-6, -7.24628e-6, -4.26345e-5, -0.0141674, -0.00032903, -2.88819e-5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 kg (14 suppliers, which the file names only by identifier); sum of these -0.0152443 kg; source Röder, A. 2004; lognormal variance with pedigree 0.24, pedigree (5,5,5,5,5)
  Literature source. This exchange has been copied from the activity 'heat production, at coal coke industrial furnace 1-10MW, GLO' to represent the coke 0.1501 kg. It has been sclaed for the amount of 4.205 MJ. Assumption: no reuse
  Uncertainty: Completeness, temporal, geographical and technological indicators adapted considering differences with original dataset.
  production volume; = BP_hard_coal_ash*RP_PV/ABS(RP)
    Calculated from production volume of reference product using the relative outputs.
  properties: dry mass 1 kg, wet mass 1 kg
- heat, district or industrial, natural gas: 2.15 MJ; lognormal variance with pedigree 0.0106, pedigree (2,3,2,4,3)
  Calculated based on literature data published by the industry. This value is a 5-year average of data (2011 - 2015) published by the Gendorf factory (Gendorf, 2016, Umwelterklärung, www.gendorf.de), (Gendorf, 2015, Umwelterklärung, www.gendorf.de), (Gendorf, 2014, Umwelterklärung, www.gendorf.de). The amount of heat used per kg of chemical substance produced is calculated using literature data published by the Gendorf factory based in Germany, which produces a wide range of chemical substances. The factory produced 1657400 tonnes of chemical substances in the year 2015 (Gendorf, 2016, Umwelterklärung, www.gendorf.de) and 740000 tonnes of intermediate products. The amount of heat in the year 2015 was 523500 GJ (Gendorf, 2016, Umwelterklärung, www.gendorf.de) of which 90% was obtained from natural gas and 10% from steam. The resulting amount of heat from natural gas is 2.02 MJ/kg of chemical product produced. The 5-year average (2011 - 2015, weighted by production volume) is 2.15 MJ/kg. Cross-reference: the amount of chemicals produced (excluding intermediate products) in the EU-28 in the year 2011 was 327 million tonnes (Eurostat, http://ec.europa.eu/eurostat/statistics-explained/index.php/Chemicals_production_statistics, accessed 20170126). The chemical and petrochemical industry sector consumed 2.33 EJ of energy in 2011 (European Commission - Joint Research Centre, 2014, BAT on Common Waste water and Waste Gas Treatment/Management Systems in the Chemical Sector). The resulting energy (both heat and electricity) consumed per kg of chemicals produced in 2011 is thus 7.13 MJ/kg. This is higher than the value calculated using data published by Gendorf – 3.85 MJ/kg, but that is to be expected as the intermediate products are not accounted for.
  properties: heating value, net 1 MJ
- heat, from steam, in chemical industry: 0.170023, 0.0299772 MJ (2 suppliers, which the file names only by identifier); sum of these 0.2 MJ; lognormal variance with pedigree 0.0106, pedigree (2,3,2,4,3)
  Calculated based on literature data published by the industry. This value is a 5-year average of data (2011 - 2015) published by the Gendorf factory (Gendorf, 2016, Umwelterklärung, www.gendorf.de), (Gendorf, 2015, Umwelterklärung, www.gendorf.de), (Gendorf, 2014, Umwelterklärung, www.gendorf.de). The amount of heat used per kg of chemical substance produced is calculated using literature data published by the Gendorf factory based in Germany, which produces a wide range of chemical substances. The factory produced 1657400 tonnes of chemical substances in the year 2015 (Gendorf, 2016, Umwelterklärung, www.gendorf.de) and 740000 tonnes of intermediate products. The amount of heat in the year 2015 was 523500 GJ (Gendorf, 2016, Umwelterklärung, www.gendorf.de) of which 90% was obtained from natural gas and 10% from steam. The resulting amount of heat from steam is 0.22 MJ/kg of chemical product produced. The 5-year average (2011 - 2015, weighted by production volume) is 0.20 MJ/kg. Cross-reference: the amount of chemicals produced (excluding intermediate products) in the EU-28 in the year 2011 was 327 million tonnes (Eurostat, http://ec.europa.eu/eurostat/statistics-explained/index.php/Chemicals_production_statistics, accessed 20170126). The chemical and petrochemical industry sector consumed 2.33 EJ of energy in 2011 (European Commission - Joint Research Centre, 2014, BAT on Common Waste water and Waste Gas Treatment/Management Systems in the Chemical Sector). The resulting energy (both heat and electricity) consumed per kg of chemicals produced in 2011 is thus 7.13 MJ/kg. This is higher than the value calculated using data published by Gendorf – 3.85 MJ/kg, but that is to be expected as the intermediate products are not accounted for.
  properties: heating value, net 1 MJ
- industrial furnace, coal, 1-10MW: 2.9227e-9 unit; lognormal variance with pedigree 0.4806, pedigree (2,5,5,5,5)
  Literature source. This exchange has been copied from the activity 'heat production, at coal coke industrial furnace 1-10MW, GLO' to represent the coke 0.1501 kg. It has been sclaed for the amount of 4.205 MJ. Infrastructure
  Uncertainty: Completeness, temporal, geographical and technological indicators adapted considering differences with original dataset.
- nitrogen, liquid: 0.0149079, 0.00409211 kg (2 suppliers, which the file names only by identifier); sum of these 0.019 kg; lognormal variance with pedigree 0.0106, pedigree (2,3,2,4,3)
  Calculated based on literature data published by the industry. This value is a 5-year average of data (2011 - 2015) published by the Gendorf factory (Gendorf, 2016, Umwelterklärung, www.gendorf.de), (Gendorf, 2015, Umwelterklärung, www.gendorf.de), (Gendorf, 2014, Umwelterklärung, www.gendorf.de). The amount of nitrogen used per kg of chemical substance produced is calculated using literature data published by the Gendorf factory based in Germany, which produces a wide range of chemical substances. The factory produced 1657400 tonnes of chemical substances in the year 2015 (Gendorf, 2016, Umwelterklärung, www.gendorf.de) and 740000 tonnes of intermediate products. The reported amount of nitrogen used in 2015 was 33512400 Nm3 (Gendorf, 2016, Umwelterklärung, www.gendorf.de). One Nm3 of nitrogen is equal to 1.2506 kg. The resulting amount of nitrogen - the 5-year average (2011 - 2015, weighted by production volume) is 0.019 kg/kg. Nitrogen is mainly used during the production of chemicals for 'blanketing', which is the process of applying gas to the vapour space of a container or vessel in order to control its composition.
  properties: dry mass 1 kg, wet mass 1 kg
- tap water: 0.026 kg; lognormal variance with pedigree 0.0106, pedigree (2,3,2,4,3)
  Calculated based on literature data published by the industry. This value is a 5-year average of data (2011 - 2015) published by the Gendorf factory (Gendorf, 2016, Umwelterklärung, www.gendorf.de), (Gendorf, 2015, Umwelterklärung, www.gendorf.de), (Gendorf, 2014, Umwelterklärung, www.gendorf.de). The amount of tap water per kg of chemical substance produced is calculated using literature data published by the Gendorf factory based in Germany, which produces a wide range of chemical substances. The factory produced 1657400 tonnes of chemical substances in the year 2015 (Gendorf, 2016, Umwelterklärung, www.gendorf.de) and 740000 tonnes of intermediate products. The amount of tap water consumed in the year 2015 was 55100 tonnes (Gendorf, 2016, Umwelterklärung, www.gendorf.de). The resulting amount of tap water is 0.023 kg/kg of chemical product produced. The 5-year average (2011 - 2015, weighted by production volume) is 0.026 kg/kg.
  properties: carbon content, fossil 0.00178991, dry mass 0.000337476 kg, water content 2962.17, wet mass 1 kg
  note on carbon content, fossil: Bicarbonate content is 2.93 mol/m3. CO2 content is 0.1 mol/m3 (ecoinvent v2.2 report 8, Tab 93.1).
- wastewater, average: -1.2994e-8, -2.16227e-6, -5.17042e-7, -7.69849e-9 m3 (4 suppliers, which the file names only by identifier); sum of these -2.7e-6 m3; lognormal variance with pedigree 0.0104, pedigree (2,3,1,4,3)
  Calculated based on literature data published by the industry. This value is a 5-year average of data (2011 - 2015) published by the Gendorf factory (Gendorf, 2016, Umwelterklärung, www.gendorf.de), (Gendorf, 2015, Umwelterklärung, www.gendorf.de), (Gendorf, 2014, Umwelterklärung, www.gendorf.de). The amount of wastewater (which is later on treated in the municipal WWTP) per kg of chemical substance produced is calculated using literature data published by the Gendorf factory based in Germany, which produces a wide range of chemical substances. The factory produced 1657400 tonnes of chemical substances in the year 2015 (Gendorf, 2016, Umwelterklärung, www.gendorf.de) and 740000 tonnes of intermediate products. The amount of wastewater which is later on treated in the municipal WWTP in the year 2015 was 1200 tonnes (Gendorf, 2016, Umwelterklärung, www.gendorf.de). The resulting amount of wastewater is 2.7E-06 m3/kg of chemical product produced.
  production volume; = BP_wastewater_average*RP_PV/ABS(RP)
    Calculated from production volume of reference product using the relative outputs.
  properties: carbon content, non-fossil 0.194039, dry mass 0.346837 kg, water content 2882.2, wet mass 1000 kg
  note on carbon content, non-fossil: 0.0673 kg TOC/m3 (Tab A.17, ecoinvent v2.2 report 13_I). TOC was considered as Total Carbon.
- water, completely softened: 0.0129064, 0.0172418, 0.00927663 kg (3 suppliers, which the file names only by identifier); sum of these 0.0394249 kg; source Kamberger W. 1993; lognormal variance with pedigree 0.1906, pedigree (2,5,5,5,5)
  Literature source. This exchange has been copied from the activity 'heat production, at coal coke industrial furnace 1-10MW, GLO' to represent the coke 0.1501 kg. It has been sclaed for the amount of 4.205 MJ. Estimation. It is assumed that 2% of the feed water is additionally required as decarbonised water (6t per TJin). For wet purification 1.5t per TJin of water is needed. Due to the lack of information the water used for cleaning can not be considered.
  Uncertainty: Completeness, temporal, geographical and technological indicators adapted considering differences with original dataset.
  properties: wet mass 1 kg

## Inputs from nature
- Water, cooling, unspecified natural origin [natural resource, in water]: 0.0164 m3; lognormal variance with pedigree 0.0106, pedigree (2,3,2,4,3)
  Calculated based on literature data published by the industry. This value is a 5-year average of data (2011 - 2015) published by the Gendorf factory (Gendorf, 2016, Umwelterklärung, www.gendorf.de), (Gendorf, 2015, Umwelterklärung, www.gendorf.de), (Gendorf, 2014, Umwelterklärung, www.gendorf.de). The amount of water for cooling extracted per kg of chemical substance produced is calculated using literature data published by the Gendorf factory based in Germany, which produces a wide range of chemical substances. The factory produced 1657400 tonnes of chemical substances in the year 2015 (Gendorf, 2016, Umwelterklärung, www.gendorf.de) and 740000 tonnes of intermediate products. The reported amounts of water extracted as groundwater and surface water (river) are assumed to be used entirely for cooling purposes.
- Water, river [natural resource, in water]: 0.00086 m3; lognormal variance with pedigree 0.0106, pedigree (2,3,2,4,3)
  Calculated based on literature data published by the industry. This value is a 5-year average of data (2011 - 2015) published by the Gendorf factory (Gendorf, 2016, Umwelterklärung, www.gendorf.de), (Gendorf, 2015, Umwelterklärung, www.gendorf.de), (Gendorf, 2014, Umwelterklärung, www.gendorf.de). The amount of groundwater and surface water (river) extracted per kg of chemical substance produced is calculated using literature data published by the Gendorf factory based in Germany, which produces a wide range of chemical substances. The factory produced 1657400 tonnes of chemical substances in the year 2015 (Gendorf, 2016, Umwelterklärung, www.gendorf.de) and 740000 tonnes of intermediate products. The amount of groundwater and surface water (river) extracted in the year 2015 was 19950000 tonnes and 21488100 tonnes respectively (Gendorf, 2016, Umwelterklärung, www.gendorf.de).
- Water, well, in ground [natural resource, in water]: 0.00083 m3; lognormal variance with pedigree 0.0106, pedigree (2,3,2,4,3)
  Literature source. This exchange has been copied from the activity 'heat production, at coal coke industrial furnace 1-10MW, GLO' to represent the coke 0.1501 kg. It has been sclaed for the amount of 4.205 MJ.

## Emissions to nature
- Acetylene [air, urban air close to ground]: 2.62833e-6 kg; source Röder, A. 2004; lognormal variance with pedigree 0.2206, pedigree (2,5,5,5,5)
  Literature source. This exchange has been copied from the activity 'heat production, at coal coke industrial furnace 1-10MW, GLO' to represent the coke 0.1501 kg. It has been sclaed for the amount of 4.205 MJ. Total NMVOC and profile estimate
  Uncertainty: Completeness, temporal, geographical and technological indicators adapted considering differences with original dataset.
- Aluminium III [air, urban air close to ground]: 5.62462e-5 kg; source Röder, A. 2004; lognormal variance with pedigree 0.848, pedigree (4,5,5,5,5)
  Literature source. This exchange has been copied from the activity 'heat production, at coal coke industrial furnace 1-10MW, GLO' to represent the coke 0.1501 kg. It has been sclaed for the amount of 4.205 MJ. From trace element balance; see report for details
  Uncertainty: Completeness, temporal, geographical and technological indicators adapted considering differences with original dataset.
- Antimony ion [air, urban air close to ground]: 8.30551e-9 kg; source Röder, A. 2004; lognormal variance with pedigree 0.848, pedigree (4,5,5,5,5)
  (same comment as for Aluminium III)
- Arsenic ion [air, urban air close to ground]: 1.32993e-7 kg; source Röder, A. 2004; lognormal variance with pedigree 0.848, pedigree (4,5,5,5,5)
  Literature source. This exchange has been copied from the activity 'heat production, at coal coke industrial furnace 1-10MW, GLO' to represent the coke 0.1501 kg. It has been sclaed for the amount of 4.205 MJ. From trace element balance; see report for details
  Uncertainty: from trace element balance; see report for details
- Barium II [air, urban air close to ground]: 6.62338e-7 kg; source Röder, A. 2004; lognormal variance with pedigree 0.848, pedigree (4,5,5,5,5)
  (same comment as for Aluminium III)
- Benzene [air, urban air close to ground]: 2.62833e-6 kg; source Röder, A. 2004; lognormal variance with pedigree 0.2206, pedigree (2,5,5,5,5)
  (same comment as for Acetylene)
- Benzo(a)pyrene [air, urban air close to ground]: 5.25665e-11 kg; source Röder, A. 2004; lognormal variance with pedigree 0.2206, pedigree (2,5,5,5,5)
  (same comment as for Acetylene)
- Beryllium II [air, urban air close to ground]: 6.62338e-9 kg; source Röder, A. 2004; lognormal variance with pedigree 0.2206, pedigree (2,5,5,5,5)
  (same comment as for Acetylene)
- Boron [air, urban air close to ground]: 2.49165e-6 kg; source Röder, A. 2004; lognormal variance with pedigree 0.848, pedigree (4,5,5,5,5)
  (same comment as for Aluminium III)
- Bromine [air, urban air close to ground]: 4.98331e-8 kg; source Röder, A. 2004; lognormal variance with pedigree 0.848, pedigree (4,5,5,5,5)
  (same comment as for Aluminium III)
- Cadmium II [air, urban air close to ground]: 8.30551e-9 kg; source Röder, A. 2004; lognormal variance with pedigree 0.848, pedigree (4,5,5,5,5)
  (same comment as for Aluminium III)
- Calcium II [air, urban air close to ground]: 6.62338e-6 kg; source Röder, A. 2004; lognormal variance with pedigree 0.848, pedigree (4,5,5,5,5)
  (same comment as for Aluminium III)
- Carbon dioxide, fossil [air, urban air close to ground]: 0.233228 kg; source Röder, A. 2004; lognormal variance with pedigree 0.1706, pedigree (2,5,5,5,5)
  Literature source. This exchange has been copied from the activity 'heat production, at coal coke industrial furnace 1-10MW, GLO' to represent the coke 0.1501 kg. It has been sclaed for the amount of 4.205 MJ. From carbon balance
  Uncertainty: Completeness, temporal, geographical and technological indicators adapted considering differences with original dataset.
- Carbon monoxide, fossil [air, urban air close to ground]: 0.000525665 kg; source Röder, A. 2004; lognormal variance with pedigree 0.8206, pedigree (2,5,5,5,5)
  Literature source. This exchange has been copied from the activity 'heat production, at coal coke industrial furnace 1-10MW, GLO' to represent the coke 0.1501 kg. It has been sclaed for the amount of 4.205 MJ. Typical value
  Uncertainty: Completeness, temporal, geographical and technological indicators adapted considering differences with original dataset.
- Chromium III [air, urban air close to ground]: 1.18275e-7 kg; source Röder, A. 2004; lognormal variance with pedigree 0.848, pedigree (4,5,5,5,5)
  (same comment as for Aluminium III)
- Chromium VI [air, urban air close to ground]: 1.46135e-8 kg; source Röder, A. 2004; lognormal variance with pedigree 0.65, pedigree (1,5,5,5,5)
  Literature source. This exchange has been copied from the activity 'heat production, at coal coke industrial furnace 1-10MW, GLO' to represent the coke 0.1501 kg. It has been sclaed for the amount of 4.205 MJ. based on range of data
  Uncertainty: Completeness, temporal, geographical and technological indicators adapted considering differences with original dataset.
- Cobalt II [air, urban air close to ground]: 1.6611e-8 kg; source Röder, A. 2004; lognormal variance with pedigree 0.848, pedigree (4,5,5,5,5)
  (same comment as for Aluminium III)
- Copper ion [air, urban air close to ground]: 8.72604e-8 kg; source Röder, A. 2004; lognormal variance with pedigree 0.848, pedigree (4,5,5,5,5)
  (same comment as for Aluminium III)
- Dinitrogen monoxide [air, urban air close to ground]: 5.25665e-6 kg; source Röder, A. 2004; lognormal variance with pedigree 0.2206, pedigree (2,5,5,5,5)
  (same comment as for Carbon monoxide, fossil)
- Dioxins, measured as 2,3,7,8-tetrachlorodibenzo-p-dioxin [air, urban air close to ground]: 1.05133e-13 kg; source Röder, A. 2004; lognormal variance with pedigree 0.4806, pedigree (2,5,5,5,5)
  Literature source. This exchange has been copied from the activity 'heat production, at coal coke industrial furnace 1-10MW, GLO' to represent the coke 0.1501 kg. It has been sclaed for the amount of 4.205 MJ.
  Uncertainty: Completeness, temporal, geographical and technological indicators adapted considering differences with original dataset.
- Ethane [air, urban air close to ground]: 7.88498e-6 kg; source Röder, A. 2004; lognormal variance with pedigree 0.2206, pedigree (2,5,5,5,5)
  (same comment as for Acetylene)
- Ethylene [air, urban air close to ground]: 1.577e-5 kg; source Röder, A. 2004; lognormal variance with pedigree 0.2206, pedigree (2,5,5,5,5)
  (same comment as for Acetylene)
- Formaldehyde [air, urban air close to ground]: 4.20532e-7 kg; source Röder, A. 2004; lognormal variance with pedigree 0.2206, pedigree (2,5,5,5,5)
  (same comment as for Acetylene)
- Hydrocarbons, aliphatic, alkanes, unspecified [air, urban air close to ground]: 2.62833e-6 kg; source Röder, A. 2004; lognormal variance with pedigree 0.2206, pedigree (2,5,5,5,5)
  (same comment as for Acetylene)
- Hydrocarbons, aliphatic, unsaturated [air, urban air close to ground]: 2.62833e-6 kg; source Röder, A. 2004; lognormal variance with pedigree 0.2206, pedigree (2,5,5,5,5)
  (same comment as for Acetylene)
- Hydrochloric acid [air, urban air close to ground]: 0.000212894 kg; source Röder, A. 2004; lognormal variance with pedigree 0.238, pedigree (4,5,5,5,5)
  (same comment as for Aluminium III)
- Hydrogen fluoride [air, urban air close to ground]: 6.62338e-6 kg; source Röder, A. 2004; lognormal variance with pedigree 0.238, pedigree (4,5,5,5,5)
  (same comment as for Aluminium III)
- Iodine [air, urban air close to ground]: 5.99258e-8 kg; source Röder, A. 2004; lognormal variance with pedigree 0.848, pedigree (4,5,5,5,5)
  (same comment as for Aluminium III)
- Iron ion [air, urban air close to ground]: 2.32344e-5 kg; source Röder, A. 2004; lognormal variance with pedigree 0.848, pedigree (4,5,5,5,5)
  (same comment as for Aluminium III)
- Lead II [air, urban air close to ground]: 3.98454e-7 kg; source Röder, A. 2004; lognormal variance with pedigree 0.848, pedigree (4,5,5,5,5)
  (same comment as for Aluminium III)
- Lead-210 [air, urban air close to ground]: 0.000244434 kBq; source Röder, A. 2004; lognormal variance with pedigree 0.848, pedigree (4,5,5,5,5)
  Literature source. This exchange has been copied from the activity 'heat production, at coal coke industrial furnace 1-10MW, GLO' to represent the coke 0.1501 kg. It has been sclaed for the amount of 4.205 MJ. From radioactivity of the elements; see report for details
  Uncertainty: Completeness, temporal, geographical and technological indicators adapted considering differences with original dataset.
- Magnesium [air, urban air close to ground]: 1.99227e-5 kg; source Röder, A. 2004; lognormal variance with pedigree 0.848, pedigree (4,5,5,5,5)
  (same comment as for Aluminium III)
- Manganese II [air, urban air close to ground]: 1.16172e-7 kg; source Röder, A. 2004; lognormal variance with pedigree 0.848, pedigree (4,5,5,5,5)
  (same comment as for Aluminium III)
- Mercury II [air, urban air close to ground]: 1.49289e-8 kg; source Röder, A. 2004; lognormal variance with pedigree 0.848, pedigree (4,5,5,5,5)
  (same comment as for Aluminium III)
- Methane, fossil [air, urban air close to ground]: 5.25665e-5 kg; source Röder, A. 2004; lognormal variance with pedigree 0.2206, pedigree (2,5,5,5,5)
  (same comment as for Carbon monoxide, fossil)
- Molybdenum VI [air, urban air close to ground]: 2.49165e-8 kg; source Röder, A. 2004; lognormal variance with pedigree 0.848, pedigree (4,5,5,5,5)
  (same comment as for Arsenic ion)
- NMVOC, non-methane volatile organic compounds [air, urban air close to ground]: 9.04144e-6 kg; source Röder, A. 2004; lognormal variance with pedigree 0.2206, pedigree (2,5,5,5,5)
  Literature source. This exchange has been copied from the activity 'heat production, at coal coke industrial furnace 1-10MW, GLO' to represent the coke 0.1501 kg. It has been sclaed for the amount of 4.205 MJ. Total NMVOC and profile estimate
  Uncertainty: total NMVOC and profile estimate
- Nickel II [air, urban air close to ground]: 9.98764e-8 kg; source Röder, A. 2004; lognormal variance with pedigree 0.848, pedigree (4,5,5,5,5)
  (same comment as for Aluminium III)
- Nitrogen [air, unspecified]: 0.019 kg; lognormal variance with pedigree 0.0106, pedigree (2,3,2,4,3)
  Calculated value. The amount of nitrogen released to air is equal to the amount of nitrogen entering the activity.
- Nitrogen oxides [air, urban air close to ground]: 0.00105133 kg; source Röder, A. 2004; lognormal variance with pedigree 0.2206, pedigree (2,5,5,5,5)
  (same comment as for Carbon monoxide, fossil)
- Particulate Matter, < 2.5 um [air, urban air close to ground]: 0.000105133 kg; source Röder, A. 2004; lognormal variance with pedigree 0.498, pedigree (4,5,5,5,5)
  Literature source. This exchange has been copied from the activity 'heat production, at coal coke industrial furnace 1-10MW, GLO' to represent the coke 0.1501 kg. It has been sclaed for the amount of 4.205 MJ. Total PM and profile estimates
  Uncertainty: Completeness, temporal, geographical and technological indicators adapted considering differences with original dataset.
- Particulate Matter, > 10 um [air, urban air close to ground]: 5.25665e-5 kg; source Röder, A. 2004; lognormal variance with pedigree 0.238, pedigree (4,5,5,5,5)
  (same comment as for Particulate Matter, < 2.5 um)
- Particulate Matter, > 2.5 um and < 10um [air, urban air close to ground]: 0.000105133 kg; source Röder, A. 2004; lognormal variance with pedigree 0.318, pedigree (4,5,5,5,5)
  (same comment as for Particulate Matter, < 2.5 um)
- Phosphorus [air, urban air close to ground]: 3.3222e-7 kg; source Röder, A. 2004; lognormal variance with pedigree 0.848, pedigree (4,5,5,5,5)
  (same comment as for Aluminium III)
- Polonium-210 [air, urban air close to ground]: 0.000446815 kBq; source Röder, A. 2004; lognormal variance with pedigree 0.848, pedigree (4,5,5,5,5)
  (same comment as for Lead-210)
- Potassium I [air, urban air close to ground]: 6.62338e-6 kg; source Röder, A. 2004; lognormal variance with pedigree 0.848, pedigree (4,5,5,5,5)
  (same comment as for Aluminium III)
- Potassium-40 [air, urban air close to ground]: 7.09648e-5 kBq; source Röder, A. 2004; lognormal variance with pedigree 0.848, pedigree (4,5,5,5,5)
  (same comment as for Lead-210)
- Propane [air, urban air close to ground]: 5.25665e-6 kg; source Röder, A. 2004; lognormal variance with pedigree 0.2206, pedigree (2,5,5,5,5)
  (same comment as for Acetylene)
- Propylene [air, urban air close to ground]: 2.62833e-6 kg; source Röder, A. 2004; lognormal variance with pedigree 0.2206, pedigree (2,5,5,5,5)
  (same comment as for Acetylene)
- Radium-226 [air, urban air close to ground]: 6.30798e-5 kBq; source Röder, A. 2004; lognormal variance with pedigree 0.848, pedigree (4,5,5,5,5)
  (same comment as for Lead-210)
- Radium-228 [air, urban air close to ground]: 0.000341682 kBq; source Röder, A. 2004; lognormal variance with pedigree 0.848, pedigree (4,5,5,5,5)
  (same comment as for Lead-210)
- Radon-220 [air, urban air close to ground]: 5.25665e-6 kBq; source Röder, A. 2004; lognormal variance with pedigree 0.848, pedigree (4,5,5,5,5)
  (same comment as for Lead-210)
- Radon-222 [air, urban air close to ground]: 5.25665e-6 kBq; source Röder, A. 2004; lognormal variance with pedigree 0.848, pedigree (4,5,5,5,5)
  (same comment as for Lead-210)
- Scandium [air, urban air close to ground]: 6.62338e-9 kg; source Röder, A. 2004; lognormal variance with pedigree 0.848, pedigree (4,5,5,5,5)
  (same comment as for Aluminium III)
- Selenium IV [air, urban air close to ground]: 4.98331e-8 kg; source Röder, A. 2004; lognormal variance with pedigree 0.848, pedigree (4,5,5,5,5)
  (same comment as for Aluminium III)
- Silicon [air, urban air close to ground]: 8.30551e-5 kg; source Röder, A. 2004; lognormal variance with pedigree 0.848, pedigree (4,5,5,5,5)
  (same comment as for Aluminium III)
- Sodium I [air, urban air close to ground]: 3.3222e-6 kg; source Röder, A. 2004; lognormal variance with pedigree 0.848, pedigree (4,5,5,5,5)
  (same comment as for Aluminium III)
- Strontium II [air, urban air close to ground]: 9.98764e-7 kg; source Röder, A. 2004; lognormal variance with pedigree 0.848, pedigree (4,5,5,5,5)
  (same comment as for Aluminium III)
- Sulfur dioxide [air, urban air close to ground]: 0.00262833 kg; source Röder, A. 2004; lognormal variance with pedigree 0.198, pedigree (4,5,5,5,5)
  Literature source. This exchange has been copied from the activity 'heat production, at coal coke industrial furnace 1-10MW, GLO' to represent the coke 0.1501 kg. It has been sclaed for the amount of 4.205 MJ. From S-balance
  Uncertainty: Completeness, temporal, geographical and technological indicators adapted considering differences with original dataset.
- Thallium I [air, urban air close to ground]: 8.30551e-9 kg; source Röder, A. 2004; lognormal variance with pedigree 0.848, pedigree (4,5,5,5,5)
  (same comment as for Aluminium III)
- Thorium [air, urban air close to ground]: 9.98764e-9 kg; source Röder, A. 2004; lognormal variance with pedigree 0.848, pedigree (4,5,5,5,5)
  (same comment as for Aluminium III)
- Thorium-228 [air, urban air close to ground]: 2.89116e-5 kBq; source Röder, A. 2004; lognormal variance with pedigree 0.848, pedigree (4,5,5,5,5)
  (same comment as for Lead-210)
- Thorium-232 [air, urban air close to ground]: 1.83983e-5 kBq; source Röder, A. 2004; lognormal variance with pedigree 0.848, pedigree (4,5,5,5,5)
  (same comment as for Lead-210)
- Tin ion [air, urban air close to ground]: 3.3222e-9 kg; source Röder, A. 2004; lognormal variance with pedigree 0.848, pedigree (4,5,5,5,5)
  (same comment as for Aluminium III)
- Titanium ion [air, urban air close to ground]: 1.99227e-6 kg; source Röder, A. 2004; lognormal variance with pedigree 0.848, pedigree (4,5,5,5,5)
  (same comment as for Aluminium III)
- Toluene [air, urban air close to ground]: 5.25665e-7 kg; source Röder, A. 2004; lognormal variance with pedigree 0.2206, pedigree (2,5,5,5,5)
  (same comment as for Acetylene)
- Uranium [air, urban air close to ground]: 1.32993e-8 kg; source Röder, A. 2004; lognormal variance with pedigree 0.848, pedigree (4,5,5,5,5)
  (same comment as for Aluminium III)
- Uranium-238 [air, urban air close to ground]: 5.25665e-5 kBq; source Röder, A. 2004; lognormal variance with pedigree 0.848, pedigree (4,5,5,5,5)
  (same comment as for Lead-210)
- Vanadium V [air, urban air close to ground]: 1.99227e-7 kg; source Röder, A. 2004; lognormal variance with pedigree 0.848, pedigree (4,5,5,5,5)
  (same comment as for Aluminium III)
- Water [air, unspecified]: 0.00140473 m3; lognormal variance with pedigree 0.0106, pedigree (2,3,2,4,3)
  Calculated to ensure the water balance. In general, in the case of recirculating cooling systems, 77% of the water input evaporates to air. In case of once-through cooling systems, 4% of the water input evaporates to air. The process water has in the chemical industry an average evaporation rate of 20.5%. In the specific case of the Gendorf factory, the calculated evaporation rate based on the data published is 6.3%. This matches the qualitative information, that the majority of the cooling systems in Gendorf are once-through and that the amount of cooling water used is significantly higher than the amount of process water used (Gendorf, 2016, Umwelterklärung, www.gendorf.de).
- Xylenes, unspecified [air, urban air close to ground]: 5.25665e-7 kg; source Röder, A. 2004; lognormal variance with pedigree 0.2206, pedigree (2,5,5,5,5)
  (same comment as for NMVOC, non-methane volatile organic compounds)
- Zinc II [air, urban air close to ground]: 1.6611e-8 kg; source Röder, A. 2004; lognormal variance with pedigree 0.848, pedigree (4,5,5,5,5)
  (same comment as for Aluminium III)
- Barium II [water, unspecified]: 0.163244 kg; lognormal variance with pedigree 0.0106, pedigree (2,3,2,4,3)
  Calculated value. The values is based on a generic model. The basic principles of the model have been published in literature (Hischier 2005, Establishing Life Cycle Inventories of Chemicals Based on Differing Data Availability). The model has been updated and extended with newly available data from the chemical industry. Find more information in the dedicated report on the ecoinvent website. Reference(s): Hischier, R. (2005) Establishing Life Cycle Inventories of Chemicals Based on Differing Data Availability (9 pp). The International Journal of Life Cycle Assessment, Volume 10, Issue 1, pp 59–67. 10.1065/lca2004.10.181.7
- Sulfate [water, unspecified]: 0.1601 kg; lognormal variance with pedigree 0.0106, pedigree (2,3,2,4,3)
  (same comment as for Barium II)
- Sulfur [water, unspecified]: 0.0180524 kg; lognormal variance with pedigree 0.0106, pedigree (2,3,2,4,3)
  (same comment as for Barium II)
- Water [water, unspecified]: 0.0167369 m3; lognormal variance with pedigree 0.0106, pedigree (2,3,2,4,3)
  Calculated based on literature data published by the industry (Gendorf, 2016, Umwelterklärung, www.gendorf.de). The amount of water released back to the environment consists of the amount of process water treated in the internal WWTP and then released back to the environment and the amount of cooling water released back to the environment.
  property carbon content, fossil 0; name C_content_fossil
  property carbon content, non-fossil 0; name C_content_non_fossil
  property dry mass 0 kg; name DM
  property water in wet mass 1000 kg; name WWM
  property wet mass 1000 kg; name WM

## Sampling procedure
Literature data and stochiometric calculation.
