# sesame seed production

Dataset: EcoSpold 2, unit process
Geography: RoW
Time period: 2015-01-01 to 2023-12-31
Technology level: current
Classification: ISIC rev.4 ecoinvent: 0111:Growing of cereals (except rice), leguminous crops and oil seeds
Scenario: Business-as-Usual
System model: Allocation, cut-off by classification
Generated by: Sanjeevan Bajaj
Database: ecoinvent
isCopyrightProtected: true
accessRestrictedTo: 1

## General comment
This dataset represents the production of 1 kg of Sesame during May-September, 2016 at a farm located in village Lilapar, District Rajkot of Gujarat. The farm has a yield of 865 kg fresh matter per ha for this crop cycle. Sowing date for the crop is 24-June, 2016 and harvesting date is 11-September, 2016. Mineral NPK fertilizer input is 234.65-44.46 kg/ha. Organic fertilizer applied amounts to 10,800 kg of manure from cattle dung. Only insecticide used has active ingredient as Organochlorine 120g/ha, Organophosphate 280g/ha. Machinery is used for soil cultivation with fuel consumption of 70 kg/ha for land preparation. For other work process like transport, tractor and trailer fuel consumption of 10 kg/ha.

## Included activities start
This activity starts about three weeks after the harvest of the previous crop. The soil is prepared for cultivation in third week of May and sowing of seeds started about four weeks after soil preparation. Thereafter the crop is mature for harvesting in about 2.5 months.

## Included activities end
The activity ends with the harvesting of the mature Sesame from the Sesame plant. Thereafter the field is prepared for cultivation of the next crop

## Technology
Cultivation of Sesame follows conventional production standards

## Time period
Soil cultivating date for the main crop: 21-May, 2016; Harvesting date main crop: 11-September, 2016. The soil cultivation, sowing and harvesting dates are taken as the middle date of the week or fortnight told to the data collector by the farmer. Total time from date of sowing to date of harvesting comes to 80 days. The data is collected for one crop cycle. The cycle of one year is considered for entry in ecoeditor.

## Parameters
- LUC_crop_specific: 1 dimensionless
  This parameter allows to switch between a "crop specific" and a "country specific" approach when calculating the LUC of a crop. By default, the chosen approach is "crop specific", so the value of the parameter is 1. If you want to apply a "country specific" approach, turn the parameter to 0.

## Reference product
- sesame seed: 1 kg; By-product classification allocatable product; CPC 01444: Sesame seed; HS2017 120600: Oil seeds; sunflower seeds, whether or not broken
  production volume 5.24155e9 kg; = 6111548*1000
    http://www.fao.org/faostat/en/#data/QC 2016 production volume of sesame seed
  property carbon content, non-fossil 0.475
    biogenic carbon content on a dry matter basis.
    Reference: http://www.fao.org/forestry/17111/en
  property price 0.824555 EUR2005
    Literature value. Price from FAOSTAT data Producer Prices - Annual (retrieved from: http://www.fao.org/faostat/en/#data/PP, accessed 15Feb2018). Data from 2005.
  properties: carbon allocation 0.452722 kg, carbon content 0.475, carbon content, fossil 0, dry mass 0.9531 kg, water content 0.0492078, water in wet mass 0.0469 kg, wet mass 1 kg

## Inputs from technosphere
- compost: 0.0153333 kg; lognormal variance with pedigree 0.0052, pedigree (2,4,3,1,1)
  The data was collected for a hectare area through interview
  property cadmium content 3.6e-7; name Cd_content
  property chromium content 2.23e-5; name Cr_content
  property copper content 5.77e-5; name Cu_content
  property dry mass 0.5 kg; name DM
  property lead content 4.9e-5; name Pb_content
  property mercury content 1.2e-7; name Hg_content
  property nickel content 1.63e-5; name Ni_content
  property nitrogen content 0.014; name N_content
  property phosphorus content 0.0035; name P_content
  property potassium content 0.01; name K_content
  property zinc content 0.000184; name Zn_content
  properties: carbon content, non-fossil 0.183645, water content 1, wet mass 1 kg
- inorganic nitrogen fertiliser, as N: 2.28249e-7, 5.35603e-5, 6.35351e-6, 6.82261e-5, 1.56061e-5, 6.60901e-6, 6.09119e-5, 5.71986e-6, 4.01276e-5, 4.10508e-6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 kg (29 suppliers, which the file names only by identifier); sum of these 0.00631111 kg; lognormal variance with pedigree 0.0052, pedigree (2,4,3,1,1)
  The data was collected for a hectare area through interview
  properties: dry mass 1 kg, wet mass 1 kg
- inorganic phosphorus fertiliser, as P2O5: 0.000117154, 0.000260041, 0.00224978, 7.26054e-5, 1.78306e-5, 2.52492e-5, 6.29929e-5, 8.27386e-6, 4.05512e-5, 9.66833e-7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 kg (29 suppliers, which the file names only by identifier); sum of these 0.0153333 kg; lognormal variance with pedigree 0.0052, pedigree (2,4,3,1,1)
  The data was collected for a hectare area through interview
  properties: dry mass 1 kg, wet mass 1 kg
- irrigation: 3.29939e-5, 0.000659825, 0.0402643, 0.000508336, 0.00136295, 0.00187348, 0.145247, 0.000297354, 7.64753e-6, 0.0178697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 m3 (16 suppliers, which the file names only by identifier); sum of these 0.2232 m3; lognormal variance with pedigree 0.0052, pedigree (2,4,3,1,1)
  The data was collected for a hectare area through interview
  properties: dry mass 0.11 kg, water content 9089.91, wet mass 1000 kg
- packaging, for fertilisers: 0.0937778 kg; lognormal variance with pedigree 0.0532, pedigree (4,3,3,5,4)
  Total amount of active substance/s of fertilisers needed for the production of 'sesame seed' is calculated to be circa 4.69E-02 kg. Fertiliser/s used in this dataset is/are: 'nitrogen fertiliser, as N', 'phosphate fertiliser, as P2O5', 'urea, as N'. The total amount of active substance/s is doubled in order to account for the packaging of the dilluted product of fertiliser/s that is/are applied. Therefore, 9.38E-02 kg of packaging for fertilisers is justified with this exchange.
  properties: carbon content, fossil 0.825301, dry mass 1 kg, heating value, net 25.01 MJ, price 0.0642 EUR2005, wet mass 1 kg
  note on carbon content, fossil: Considering a chemical formula (C2H4)n for polyethylene, carbon content-fossil is calculated to be 0.856286 kg of Carbon per kg of dry mass.
- packaging, for pesticides: 0.0306667 kg; lognormal variance with pedigree 0.0532, pedigree (4,3,3,5,4)
  Total amount of active substance/s of pesticides needed for the production of sesame seed is calculated to be circa 1.53E-02 kg. Pesticide/s used in this dataset is/are: 'pesticide, unspecified'. The total amount of active substance/s is doubled in order to account for the packaging of the dilluted product of pesticide/s that is/are applied. Therefore, 3.07E-02 kg of packaging for pesticides is justified with this exchange.
  properties: carbon content, fossil 0.85714, dry mass 1 kg, heating value, net 25.97 MJ, price 0.0642 EUR2005, wet mass 1 kg
- pesticide, unspecified: 0.0153333 kg; lognormal variance with pedigree 0.0078, pedigree (3,3,3,5,2)
  The data was collected for a hectare area through interview
  properties: carbon content, fossil 0.486978, dry mass 1 kg, wet mass 1 kg
- tillage, ploughing: 0.0153333 ha; lognormal variance with pedigree 0.0052, pedigree (2,4,3,1,1)
  Calculated Value. This value has been calculated by using the ecoinvent LCI calculation tool for crop production.
- transport, tractor and trailer, agricultural: 0.26408, 0.00107387 metric ton*km (2 suppliers, which the file names only by identifier); sum of these 0.265154 metric ton*km; lognormal variance with pedigree 0.1246, pedigree (2,4,3,1,1)
  (same comment as for tillage, ploughing)
- urea: 0.0253226, 0.0032026, 0.00397016, 0.0216237 kg (4 suppliers, which the file names only by identifier); sum of these 0.054119 kg; lognormal variance with pedigree 0.0052, pedigree (2,4,3,1,1)
  The exchange has been updated from 'urea, as N' into 'urea' and therefore its amount has been scaled (multiplied) from 0.0252 kg by 2.1438 kg of 'urea' per kg of 'urea, as N'. Original comment of the exchange is: The data was collected for a hectare area through interview
  properties: carbon content, fossil 0.2, dry mass 1 kg, wet mass 1 kg

## Inputs from nature
- Carbon dioxide, in air [natural resource, in air]: 1.3209 kg; lognormal variance with pedigree 0.0078, pedigree (3,3,3,5,2)
  (same comment as for tillage, ploughing)
- Energy, gross calorific value, in biomass [natural resource, biotic]: 15.3935 MJ; lognormal variance with pedigree 0.0078, pedigree (3,3,3,5,2)
  The data was collected for a hectare area through interview
- Occupation, annual crop, irrigated [natural resource, land]: 0.814815 m2*year; lognormal variance with pedigree 0.0092, pedigree (3,3,3,5,2)
  (same comment as for tillage, ploughing)
- Transformation, from annual crop, irrigated [natural resource, land]: 1.77778 m2; lognormal variance with pedigree 0.0152, pedigree (3,3,3,5,2)
  (same comment as for tillage, ploughing)
- Transformation, to annual crop, irrigated [natural resource, land]: 1.77778 m2; lognormal variance with pedigree 0.0152, pedigree (3,3,3,5,2)
  (same comment as for tillage, ploughing)

## Emissions to nature
- Ammonia [air, non-urban air or from high stacks]: 0.00564008 kg; lognormal variance with pedigree 0.0286, pedigree (4,5,3,5,2)
  (same comment as for tillage, ploughing)
- Carbon dioxide, fossil [air, non-urban air or from high stacks]: 0.0396593 kg; lognormal variance with pedigree 0.0212, pedigree (4,5,3,5,2)
  (same comment as for tillage, ploughing)
- Dinitrogen monoxide [air, non-urban air or from high stacks]: 0.000800171 kg; lognormal variance with pedigree 0.0506, pedigree (4,5,3,5,2)
  (same comment as for tillage, ploughing)
- Nitrogen oxides [air, non-urban air or from high stacks]: 0.00193524 kg; lognormal variance with pedigree 0.0606, pedigree (4,5,3,5,2)
  (same comment as for tillage, ploughing)
- Water [air, non-urban air or from high stacks]: 0.113832 m3; lognormal variance with pedigree 0.0212, pedigree (4,5,3,5,2)
  (same comment as for tillage, ploughing)
- Cadmium II [soil, agricultural]: 6.33652e-7 kg; lognormal variance with pedigree 0.0606, pedigree (4,5,3,5,2)
  (same comment as for tillage, ploughing)
- Chromium III [soil, agricultural]: 5.06025e-6 kg; lognormal variance with pedigree 0.0606, pedigree (4,5,3,5,2)
  (same comment as for tillage, ploughing)
- Copper ion [soil, agricultural]: 5.06025e-6 kg; lognormal variance with pedigree 0.0606, pedigree (4,5,3,5,2)
  (same comment as for tillage, ploughing)
- Lead II [soil, agricultural]: 5.06025e-6 kg; lognormal variance with pedigree 0.0606, pedigree (4,5,3,5,2)
  (same comment as for tillage, ploughing)
- Mercury II [soil, agricultural]: 5.06025e-6 kg; lognormal variance with pedigree 0.0606, pedigree (4,5,3,5,2)
  (same comment as for tillage, ploughing)
- Nickel II [soil, agricultural]: 5.06025e-6 kg; lognormal variance with pedigree 0.0606, pedigree (4,5,3,5,2)
  (same comment as for tillage, ploughing)
- Zinc II [soil, agricultural]: 5.06025e-6 kg; lognormal variance with pedigree 0.0606, pedigree (4,5,3,5,2)
  (same comment as for tillage, ploughing)
- Cadmium II [water, ground-]: 3.80085e-9 kg; lognormal variance with pedigree 0.1106, pedigree (4,5,3,5,2)
  (same comment as for tillage, ploughing)
- Cadmium II [water, surface water]: 1.64718e-8 kg; lognormal variance with pedigree 0.1106, pedigree (4,5,3,5,2)
  (same comment as for tillage, ploughing)
- Chromium III [water, ground-]: 1.67333e-6 kg; lognormal variance with pedigree 0.1106, pedigree (4,5,3,5,2)
  (same comment as for tillage, ploughing)
- Chromium III [water, surface water]: 1.71744e-6 kg; lognormal variance with pedigree 0.1106, pedigree (4,5,3,5,2)
  (same comment as for tillage, ploughing)
- Copper ion [water, ground-]: 2.70918e-7 kg; lognormal variance with pedigree 0.1106, pedigree (4,5,3,5,2)
  (same comment as for tillage, ploughing)
- Copper ion [water, surface water]: 1.36568e-6 kg; lognormal variance with pedigree 0.1106, pedigree (4,5,3,5,2)
  (same comment as for tillage, ploughing)
- Lead II [water, ground-]: 1.75673e-8 kg; lognormal variance with pedigree 0.1106, pedigree (4,5,3,5,2)
  (same comment as for tillage, ploughing)
- Lead II [water, surface water]: 5.15474e-7 kg; lognormal variance with pedigree 0.1106, pedigree (4,5,3,5,2)
  (same comment as for tillage, ploughing)
- Mercury II [water, ground-]: 8.84326e-11 kg; lognormal variance with pedigree 0.1106, pedigree (4,5,3,5,2)
  (same comment as for tillage, ploughing)
- Mercury II [water, surface water]: 4.48343e-9 kg; lognormal variance with pedigree 0.1106, pedigree (4,5,3,5,2)
  (same comment as for tillage, ploughing)
- Nickel II [water, surface water]: 1.3504e-6 kg; lognormal variance with pedigree 0.1106, pedigree (4,5,3,5,2)
  (same comment as for tillage, ploughing)
- Nitrate [water, ground-]: 0.0251206 kg; lognormal variance with pedigree 0.0606, pedigree (4,5,3,5,2)
  (same comment as for tillage, ploughing)
- Phosphate [water, ground-]: 1.74886e-5 kg; lognormal variance with pedigree 0.0606, pedigree (4,5,3,5,2)
  (same comment as for tillage, ploughing)
- Phosphate [water, surface water]: 5.3149e-5 kg; lognormal variance with pedigree 0.0606, pedigree (4,5,3,5,2)
  (same comment as for tillage, ploughing)
- Phosphorus [water, surface water]: 0.000151153 kg; lognormal variance with pedigree 0.0606, pedigree (4,5,3,5,2)
  (same comment as for tillage, ploughing)
- Water [water, ground-]: 0.087048 m3; lognormal variance with pedigree 0.0212, pedigree (4,5,3,5,2)
  (same comment as for tillage, ploughing)
- Water [water, surface water]: 0.02232 m3; lognormal variance with pedigree 0.0212, pedigree (4,5,3,5,2)
  (same comment as for tillage, ploughing)
- Zinc II [water, ground-]: 1.82013e-6 kg; lognormal variance with pedigree 0.1106, pedigree (4,5,3,5,2)
  (same comment as for tillage, ploughing)
- Zinc II [water, surface water]: 2.46995e-6 kg; lognormal variance with pedigree 0.1106, pedigree (4,5,3,5,2)
  (same comment as for tillage, ploughing)

## Sampling procedure
The farmer was identified and contacted by agriculture science faculty familiar with the local farmers in the region. Data was collected directly from the farmer through semi-structured interview using a questionnaire based on the input requirements of the ecoinvent LCI calculation tool for crop production. The farmer does not maintain any written records and has provided the data from recent memory. In this region, typically farmers are unable to provide exact name of active ingredient in the pesticide they use and the same was noted from details given on the pesticide packet. Individual farmer is not able to calculate fuel consumption for his own farm alone and this information has been collected from farming community of the area.

## Extrapolations
Ecoinvent LCI calculation tool for crop production was used to calculate field emissions from the cultivation process.
