# gravel and sand quarry operation

Dataset: EcoSpold 2, unit process
Geography: RoW
Time period: 1997-01-01 to 2023-12-31
Technology level: current
Classification: ISIC rev.4 ecoinvent: 0810:Quarrying of stone, sand and clay
Classification: EcoSpold01Categories: construction materials/additives
Synonyms: Rundkies; Zuschlagstoff; gravel round; Sand; sand; aggregate
Tags: combined production; ConvertedDataset
Scenario: Business-as-Usual
System model: Allocation, cut-off by classification
Share of production covered: 100 %
Generated by: Tina Künniger
Published in: Kellenberger D. 2004
Database: ecoinvent
isCopyrightProtected: true
accessRestrictedTo: 1

## General comment
The multioutput-process 'mining, gravel / sand' delivers the co-products 'sand, at mine' and 'gravel, round, at mine'. The typical production mix in Switzerland is: sand 35% and round gravel 65%. From the total sectoral production volume (100%) of mined gravel round, crushed and sand, about 85% is gravel round and sand.
[This dataset was already contained in the ecoinvent database version 2. It was not individually updated during the transfer to ecoinvent version 3. Life Cycle Impact Assessment results may still have changed, as they are affected by changes in the supply chain, i.e. in other datasets. This dataset was generated following the ecoinvent quality guidelines for version 2. It may have been subject to central changes described in the ecoinvent version 3 change report (http://www.ecoinvent.org/database/ecoinvent-version-3/reports-of-changes/), and the results of the central updates were reviewed extensively. The changes added e.g. consistent water flows and other information throughout the database. The documentation of this dataset can be found in the ecoinvent reports of version 2, which are still available via the ecoinvent website. The change report linked above covers all central changes that were made during the conversion process.]

## Included activities end
Includes the whole manufacturing process for digging of gravel round and sand (no crushed gravel), internal processes (transport, etc.), and infrastructure for the operation (machinery). The land-use of the mine (incl. unpaved roads) is included directly, while the land-use of the paved roads and buildings are included in the module "mine, gravel/sand". Recultivation of closed mines is taken into account. No environmental burdens from administration are included. No dust included because it is mostly a "wet" process and no wastewater included because process water is not polluted (only sand and gravel) and therefore directly seeped.

## Geography
For some exchanges RER-modules have been used as proxy

## Technology
typical technology for Swiss production

## Parameters
- sum of reference products: 1.5385 kg; name sum_RP
  It's the addition of the different reference product's amount

## Reference product
- gravel, round: 1 kg; name gravel; = gravel_PV/( gravel_PV+ sand_PV); By-product classification allocatable product; CPC 15320: Pebbles, gravel, broken or crushed stone, macadam; granules, chippings and powder of stone; HS2017 251710: Pebbles, gravel, broken or crushed stone; of a kind commonly used for concrete aggregates, for road metalli[...]
  EcoSpold01Location=CH
  The amounts of reference products were expressed relative to the production volumes.
  production volume 2.76178e13 kg; name gravel_PV; = 50*0.65*0.85*1E12
    Estimated value. Information regarding production volume and mining technology for sand and aggregates is very scarce (Peduzzia, et al. 2014). It is estimated that around 50 billion tonnes of sand and gravel are mined each year (WWF, 2018).
    According to the WWF (2018), the demand of sand and aggregated in general has and is increasing, the demand comes in particular from developing countries, for example, “China consumed more sand between 2011-2013 than the US did in the whole of the 20th Century.”. This has contributed to the, today’s significant, illegal sand market. Most of illegal sand comes from rivers and coastal areas (WWF 2018; The Third Pole, 2017). Lai et al. (2014) report the estimated amount of sand mined from the biggest sand mine in the world, the Poyang Lake, China. The estimate is of 448 billion kg of sand (De Leeuw 2010). As a frame of reference, the country of Brazil as whole mines 266 billion kg of sand per year.
    The demand of sand has also increased in the US in the past 15 years as the it was found that sand could be used in fracking in order to increase yield (Edwards, 2015). Sand is also used by cities to enlarge their territory “517 million metric tons of sand in the past 20 years” (Edwards, 2015) citing UNEP (2014).
    Of the estimated 50 billion tonnes of sand and gravel, it is assumed that 35% is sand, following ecoinvent v2 report 7. This results in 17.5 billion tonnes. Double check with Tweedie (2018), which reports a world consumption of sand between 15 and 20 billion tonnes, and Peduzzia, P. et al. (2014). The production of gravel is therefore set to 50*0.65 billion tonnes. Of which 85% is considered to be gravel, round and 15% is considered to be crushed (see general comment of the activity “gravel production, gravel, CH” in date 12th October 2018).
    No information was found regarding the technologies used for sand mining. The WWF (2018) refers to Europe as the region where no sand is mined from rivers. On the other hand we know that 70% of sand mined in Brazil comes from rivers (see the dataset “sand quarry operation, extraction from river bed, BR, in date 12th October 2012). Some report quarry as the most prominent mining technology (n.d. 2017), others highlight how the growing illegal market source sand from rivers and coastal areas. ecoinvent does not report data regarding illegal mining. It is therefore estimated that 70% of sand is produced via quarry.
    References:
    UNEP, 2014. Sand, Rarer Than One Thinks. In: Bruce Edwards, 2015. The Insatiable Demand for Sand. FINANCE & DEVELOPMENT, December 2015, Vol. 52, No. 4. Retrieved from: https://www.imf.org/external/pubs/ft/fandd/2015/12/edwards.htm, accessed 12th October 2018
    Edwards, B. 2015. The Insatiable Demand for Sand. FINANCE & DEVELOPMENT, December 2015, Vol. 52, No. 4. Retrieved from: https://www.imf.org/external/pubs/ft/fandd/2015/12/edwards.htm, accessed 12th October 2018
    De Leeuw, et al. 2010. Strategic assessment of the magnitude and impacts of sand mining in Poyang Lake, China. Reg. Environ. Change 10, 95-102. In: Lai et al. 2014. Sand mining and increasing Poyang Lake’s discharge ability: A reassessment of causes for lake decline in China. Journal of Hydrology. Retrieved from: <https://www.researchgate.net/publication/277575909_Sand_mining_and_increasing_Poyang_Lake's_discharge_ability_A_reassessment_of_causes_for_lake_decline_in_China>, accessed 12th October 2018
    Lai et al. 2014. Sand mining and increasing Poyang Lake’s discharge ability: A reassessment of causes for lake decline in China. Journal of Hydrology. Retrieved from: <https://www.researchgate.net/publication/277575909_Sand_mining_and_increasing_Poyang_Lake's_discharge_ability_A_reassessment_of_causes_for_lake_decline_in_China>, accessed 12th October 2018
    n.d. 2017. What Is Sand Mining? Environmental Technology. Retrieved from: <https://www.envirotech-online.com/news/water-wastewater/9/breaking-news/what-is-sand-mining/42070>, accessed 12th October 2018.
    Peduzzia, P. et al. 2014. Sand, rarer than one thinks. UNEP. Retrieved from: <https://na.unep.net/geas/archive/pdfs/GEAS_Mar2014_Sand_Mining.pdf>, accessed 12th October 2018
    The Third Pole, 2017. Sandmining is destroying Asia’s rivers. Retrieved from: <https://www.thethirdpole.net/en/2017/05/05/sandmining-is-destroying-asias-rivers/>, accessed 12th October 2018
    Tweedie, N. 2018. Is the world running out of sand? The truth behind stolen beaches and dredged islands. The Guardian. Retrieved from: <https://www.theguardian.com/global/2018/jul/01/riddle-of-the-sands-the-truth-behind-stolen-beaches-and-dredged-islands>, accessed 12th October 2018
    Vince Beiser, 2017. Sand mining: the global environmental crisis you’ve probably never heard of. The Guardian. Retrieved from: <https://www.theguardian.com/cities/2017/feb/27/sand-mining-global-environmental-crisis-never-heard>, accessed 12th October 2018
    WWF, 2018. Uncovering sand mining’s impacts on the world’s rivers. Retrieved from: <https://wwf.panda.org/our_work/water/?333451/Uncovering-sand-minings-impacts-on-the-worlds-rivers>, accessed 12th October 2018
  property price 0.00651133 EUR2005
    Price, average unit value, dollars per metric ton in 2022 of construction sand and gravel of 11 USD/metric ton. Same price for the products "sand" and "gravel, round", since they are quarried together. The price is the annual average free-on-board plant prices, usually at the first point of sale or captive use, as reported by construction-sand-and-gravel-producing companies. This value does not include transportation from the plant or yard to the consumer. it does, however, include all costs of mining, processing, in-plant transportation, overhead, and profit. Value retrieved from USGS, Mineral Commodity Summaries 2023, accessed on 20230918: https://pubs.usgs.gov/periodicals/mcs2023/mcs2023-sand-gravel.pdf from https://www.usgs.gov/centers/national-minerals-information-center/construction-sand-and-gravel-statistics-and
    The price was converted to EUR based on the annual exchange rates published by the European Central Bank (https://sdw.ecb.europa.eu/quickview.do?SERIES_KEY=120.EXR.A.USD.EUR.SP00.A, last accessed on 2023-06-01) and adjusted for inflation relative to 2005 using the producer price index (PPI) of the euro area, published by eurostat (https://ec.europa.eu/eurostat/databrowser/view/STS_INPP_A__custom_6416181/default/table?lang=en, last accessed on 2023-06-01).
  properties: carbon allocation 0 kg, carbon content 0, carbon content, fossil 0, carbon content, non-fossil 0, dry mass 1 kg, water content 0, water in wet mass 0 kg, wet mass 1 kg

## Inputs from technosphere
- building, hall, steel construction: 5.0299e-7 m2; = (7.7385E-07/ sum_RP)*(sand+gravel); lognormal variance with pedigree 0.372, pedigree (3,5,5,5,1)
  EcoSpold01Location=CH
  Reference: 2004, Kellenberger D., Althaus H.-J., Jungbluth N., Künniger T., Life Cycle Inventories of Building Products, Final report ecoinvent 2000, 7, Dübendorf, CH, Swiss Centre for LCI, EMPA-DU, 4 - MeasurementOnSite, CD-ROM
- conveyor belt: 9.50991e-8 m; = (1.4631E-07/ sum_RP)*(sand+gravel); lognormal variance with pedigree 0.424, pedigree (5,4,5,5,1)
  Reference: 2004, Kellenberger D., Althaus H.-J., Jungbluth N., Künniger T., Life Cycle Inventories of Building Products, Final report ecoinvent 2000, 7, Dübendorf, CH, Swiss Centre for LCI, EMPA-DU, 4 - MeasurementOnSite, CD-ROM
  EcoSpold01Location=RER
- diesel, burned in building machine: 0.0146994 MJ; = (0.022615/ sum_RP)*(sand+gravel); lognormal variance with pedigree 0.0432, pedigree (2,3,5,5,1)
  EcoSpold01Location=GLO
  Reference: 2004, Kellenberger D., Althaus H.-J., Jungbluth N., Künniger T., Life Cycle Inventories of Building Products, Final report ecoinvent 2000, 7, Dübendorf, CH, Swiss Centre for LCI, EMPA-DU, 4 - MeasurementOnSite, CD-ROM
  properties: heating value, net 1 MJ
- electricity, medium voltage: 7.59771e-5, 0.00151557, 0.000509228, 2.32668e-5, 4.65682e-6, 9.99925e-7, 0.000105828, 0.000156506, 0.000327886 kWh (9 suppliers, which the file names only by identifier); sum of these 0.00271992 kWh; = (0.0041846/ sum_RP)*(sand+gravel); lognormal variance with pedigree 0.0432, pedigree (2,3,5,5,1)
  (same comment as for building, hall, steel construction)
- gravel/sand quarry infrastructure: 4.74989e-11 unit; = (7.3077E-11/ sum_RP)*(sand+gravel); lognormal variance with pedigree 0.3526, pedigree (1,3,5,5,1)
  Reference: 2004, Kellenberger D., Althaus H.-J., Jungbluth N., Künniger T., Life Cycle Inventories of Building Products, Final report ecoinvent 2000, 7, Dübendorf, CH, Swiss Centre for LCI, EMPA-DU, 4 - MeasurementOnSite, CD-ROM
  EcoSpold01Location=CH
- heat, central or small-scale, other than natural gas: 3.30583e-5, 0.00240685 MJ (2 suppliers, which the file names only by identifier); sum of these 0.00243991 MJ; = (0.0037538/ sum_RP)*(sand+gravel); lognormal variance with pedigree 0.0432, pedigree (2,3,5,5,1)
  (same comment as for building, hall, steel construction)
  properties: heating value, net 1 MJ
- industrial machine, heavy, unspecified: 1.11999e-5 kg; = (1.7231E-05/ sum_RP)*(sand+gravel); lognormal variance with pedigree 0.372, pedigree (3,5,5,5,1)
  (same comment as for conveyor belt)
- lubricating oil: 1.84998e-6 kg; = (2.8462E-06/ sum_RP)*(sand+gravel); lognormal variance with pedigree 0.0432, pedigree (2,3,5,5,1)
  (same comment as for conveyor belt)
  properties: carbon content, fossil 0.75, dry mass 1 kg, heating value, net 40.2 MJ, wet mass 1 kg
  note on carbon content, fossil: Lubricating oil is produced from diesel. C-content/dry mass of fats and oils considered 75%, from: ecoinvent v2.2 report, n 15a, pg 40
  note on heating value, net: Literature value, Source: IPCC 2006, 2006 IPCC Guidelines for National Greenhouse Gas Inventories, Prepared by the National Greenhouse Gas Inventories Programme, Eggleston H.S., Buendia L., Miwa K., Ngara T. and Tanabe K. (eds). Published: IGES, Japan
- municipal solid waste: -4.70674e-9, -5.58905e-10, -3.55112e-9, -3.47848e-9, -2.65554e-6, -8.94589e-8, -3.911e-10, -1.25536e-10, -2.83746e-10, -1.18124e-8 kg (10 suppliers, which the file names only by identifier); sum of these -2.76991e-6 kg; = (4.2615E-06/ sum_RP)*(sand+gravel); lognormal variance with pedigree 0.0032, pedigree (2,3,1,5,1)
  (same comment as for gravel/sand quarry infrastructure)
  production volume; = ( gravel_PV+ sand_PV)*MSW/sum_RP
    calculated using the relative PV of the reference products
  properties: carbon content, fossil 0.171549, carbon content, non-fossil 0.261655, dry mass 0.771 kg, heating value, net 11.74 MJ, water content 0.297017, wet mass 1 kg
  note on carbon content, fossil: MSW composition in tab 4.1, ecoinvent v2.2 report 13_I. C content referred to 1 kg DM
  note on heating value, net: Value taken from the general comment of the treatment dataset.
- recultivation, limestone mine: 8.47969e-6 m2; = (1.3046E-05/ sum_RP)*(sand+gravel); lognormal variance with pedigree 0.1926, pedigree (3,3,5,5,3)
  (same comment as for gravel/sand quarry infrastructure)
- steel, low-alloyed, hot rolled: 1.29997e-5 kg; = (2E-05/ sum_RP)*(sand+gravel); lognormal variance with pedigree 0.0432, pedigree (2,3,5,5,1)
  EcoSpold01Location=RER
  Reference: 2004, Kellenberger D., Althaus H.-J., Jungbluth N., Künniger T., Life Cycle Inventories of Building Products, Final report ecoinvent 2000, 7, Dübendorf, CH, Swiss Centre for LCI, EMPA-DU, 4 - MeasurementOnSite, CD-ROM
  properties: carbon content, fossil 0.005, dry mass 1 kg, wet mass 1 kg
  note on carbon content, fossil: Low alloyed steel composition given in Tab. 3.2 ecoinvent v2.2 report 10_partII. Steel assumed to have a C content of 0.5%
- synthetic rubber: 1.99994e-6 kg; = (3.0769E-06/ sum_RP)*(sand+gravel); lognormal variance with pedigree 0.0432, pedigree (2,3,5,5,1)
  (same comment as for steel, low-alloyed, hot rolled)
  properties: carbon content, fossil 0.871949, dry mass 1 kg, heating value, net 26.42 MJ, wet mass 1 kg
  note on carbon content, fossil: EPDM (Ethylene-propene-diene terpolymer) rubber is a terpolymer of ethylene, propene, and a diene with the residual unsaturated portion of the diene in the side chain (ecoinvent v2.2 report 7-part XX & Ullmann). Chemical formula (deduced from Evidences of Solvent-Induced Miscibility in Polychloroprene-co-Ethylene-Propene Diene Terpolymer Blends, Dubey et al., Journal of Applied Polymer Science, 2009, 111:1884–1891): C20H35
- tap water: 1.23154e-5, 1.87738e-5, 3.50309e-5, 9.43708e-5, 1.13597e-5, 0.000473401, 0.00541736, 0.00403683 kg (8 suppliers, which the file names only by identifier); sum of these 0.0100994 kg; = (0.015538/ sum_RP)*(sand+gravel); source Künniger T. 2001; lognormal variance with pedigree 0.0432, pedigree (2,3,5,5,1)
  EcoSpold01Location=RER
  Literature value.
  properties: carbon content, fossil 0.00178991, dry mass 0.000337476 kg, water content 2962.17, wet mass 1 kg
  note on carbon content, fossil: Bicarbonate content is 2.93 mol/m3. CO2 content is 0.1 mol/m3 (ecoinvent v2.2 report 8, Tab 93.1).
- waste mineral oil: -1.33871e-6, -5.11279e-7 kg (2 suppliers, which the file names only by identifier); sum of these -1.84998e-6 kg; = (2.8462E-06/ sum_RP)*(sand+gravel); lognormal variance with pedigree 0.0032, pedigree (2,3,1,5,1)
  (same comment as for building, hall, steel construction)
  production volume; = ( gravel_PV+ sand_PV)* mineral_oil/sum_RP
    calculated using the relative PV of the reference products
  properties: carbon content, fossil 0.864444, dry mass 0.9 kg, heating value, net 34.7 MJ, water content 0.111111, wet mass 1 kg
  note on carbon content, fossil: Tab A.6, ecoinvent v2.2 report 13_I. C content has been calculated after data in the tables, and then referred to 1 kg DM

## Inputs from nature
- Gravel [natural resource, in ground]: 1.03997 kg; = (1.6/ sum_RP)*(sand+gravel); lognormal variance with pedigree 0.0432, pedigree (2,3,5,5,1)
  Reference: 2004, Kellenberger D., Althaus H.-J., Jungbluth N., Künniger T., Life Cycle Inventories of Building Products, Final report ecoinvent 2000, 7, Dübendorf, CH, Swiss Centre for LCI, EMPA-DU, 4 - MeasurementOnSite, CD-ROM
- Occupation, lake, artificial [natural resource, land]: 6.26987e-5 m2*year; = (9.6462E-05/ sum_RP)*(sand+gravel); lognormal variance with pedigree 0.1732, pedigree (2,3,5,5,1)
  (same comment as for Gravel)
- Occupation, mineral extraction site [natural resource, land]: 0.000287995 m2*year; = (0.00044308/ sum_RP)*(sand+gravel); lognormal variance with pedigree 0.0932, pedigree (2,3,5,5,1)
  (same comment as for Gravel)
- Transformation, from unspecified [natural resource, land]: 3.4999e-5 m2; = (5.3846E-05/ sum_RP)*(sand+gravel); lognormal variance with pedigree 0.1732, pedigree (2,3,5,5,1)
  (same comment as for Gravel)
- Transformation, to lake, artificial [natural resource, land]: 6.26987e-6 m2; = (9.6462E-06/ sum_RP)*(sand+gravel); lognormal variance with pedigree 0.0932, pedigree (2,3,5,5,1)
  (same comment as for Gravel)
- Transformation, to mineral extraction site [natural resource, land]: 2.87995e-5 m2; = (4.4308E-05/ sum_RP)*(sand+gravel); lognormal variance with pedigree 0.1732, pedigree (2,3,5,5,1)
  (same comment as for Gravel)
- Water, unspecified natural origin [natural resource, in water]: 0.00137998 m3; = (0.0021231/ sum_RP)*(sand+gravel); source Künniger T. 2001; lognormal variance with pedigree 0.0432, pedigree (2,3,5,5,1)
  Literature value. The water used in the process is considered.

## Sampling procedure
Measured data of four Swiss plants

## Extrapolations
See geography This dataset has been copied from an original dataset covering the geography CH. The uncertainty has been adjusted accordingly.

## Review by Roberto Dones 2010-02-07
passed

## Review by Bo Weidema 2012-05-31
Passed. Formulas have been added to enable automatic sub-division of this combined production dataset, following ecoinvent v3 procedures (thus avoiding allocation).
