# glycerine production, from epichlorohydrin

Dataset: EcoSpold 2, unit process
Geography: RoW
Time period: 1998-01-01 to 2023-12-31
Technology level: current
Classification: EcoSpold01Categories: chemicals/organics
Classification: ISIC rev.4 ecoinvent: 2011:Manufacture of basic chemicals
Tags: ConvertedDataset
Scenario: Business-as-Usual
System model: Allocation, cut-off by classification
Generated by: Mike Chudacoff
Published in: Jungbluth N. 2007
Database: ecoinvent
isCopyrightProtected: true
accessRestrictedTo: 1

## General comment
Glycerine is produced by reacting epichlorohydrin with a 10% sodium hydroxide aqueous solution
[This dataset was already contained in the ecoinvent database version 2. It was not individually updated during the transfer to ecoinvent version 3. Life Cycle Impact Assessment results may still have changed, as they are affected by changes in the supply chain, i.e. in other datasets. This dataset was generated following the ecoinvent quality guidelines for version 2. It may have been subject to central changes described in the ecoinvent version 3 change report (http://www.ecoinvent.org/database/ecoinvent-version-3/reports-of-changes/), and the results of the central updates were reviewed extensively. The changes added e.g. consistent water flows and other information throughout the database. The documentation of this dataset can be found in the ecoinvent reports of version 2, which are still available via the ecoinvent website. The change report linked above covers all central changes that were made during the conversion process.]

## Included activities end
cradle-to-gate, including all precursors, ancillary materials and transports

## Geography
RER

## Technology
based on industry data in the US and Europe

## Parameters
- fraction, process water, to air: 0.205 dimensionless; name fraction_PW_to_air; lognormal variance with pedigree 0.092025, pedigree (4,4,3,2,4)
- fraction, water, completely softened, to air: 0.205 dimensionless; name fraction_WCS_to_air; lognormal variance with pedigree 0.092025, pedigree (4,4,3,2,4)

## Reference product
- glycerine: 1 kg; By-product classification allocatable product; CPC 34570: Glycerol; HS2017 152000: Glycerol, crude; glycerol waters and glycerol lyes; CAS 56-81-5
  EcoSpold01Location=RER
  production volume 3.2e8 kg
    Residual when by-product glycerine is subtracted from global production of 900 million kg (source: McCoy M. 2005. An Unlikely Impact. Growth of biodiesel has big implications for the oleochemical industry. Chemical and Engineering News. http://pubs.acs.org/cen/news/83/i07/8307earlybus.html). When biodiesel production is increased, this activity is foreseen to remain only for pharmaceutical uses, estimated to be 18% of global applications or 162 million kg (from data in Zheng-Xiang W, Zhugea J, Fanga H, Prior B A. 2001. Glycerol production by microbial fermentation: A review. Biotechnology Advances 19:201-223.)
  property heating value, net 18 MJ
    Based on literature, Report 17: Jungbluth, N., Chudacoff, M., Dauriat, A., Dinkel, F., Doka, G., Faist Emmenegger, M., Gnansounou, E., Kljun, N., Schleiss, K., Spielmann, M., Stettler, C., Sutter, J. 2007: Life Cycle Inventories of Bioenergy. ecoinvent report No. 17, Swiss Centre for Life Cycle Inventories, Dübendorf, CH.
  property price 0.792 EUR2005
    Temporary price data. Calculated as 90% of purchasers price based on: 2004 import and export prices (total trades (USD) divided by total weight (kg) in EU27, USA, China, Japan and India) from UN data - Glycerol (glycerine), nes including synthetic glycerol (http://data.un.org/Data.aspx?q=glycerine&d=ComTrade&f=_l1Code%3a16%3bcmdCode%3a152090; accessed 1 July 10)
  properties: carbon allocation 0.391304 kg, carbon content 0.391304, carbon content, fossil 0.391304, carbon content, non-fossil 0, dry mass 1 kg, water content 0, water in wet mass 0 kg, wet mass 1 kg

## Inputs from technosphere
- chemical factory, organics: 4e-10 unit; lognormal variance with pedigree 0.1786, pedigree (4,5,5,5,5)
  EcoSpold01Location=RER
  Infrastructure of a typical plant
  Uncertainty: infrastructure of a typical plant
- electricity, medium voltage: 0.00270853, 0.054029, 0.0181536, 0.000829444, 0.000166012, 3.56466e-5, 0.00557933 kWh (7 suppliers, which the file names only by identifier); sum of these 0.0815016 kWh; lognormal variance with pedigree 0.0427, pedigree (2,2,5,5,1)
  EcoSpold01Location=UCTE
  Literature
  Uncertainty: literature
- epichlorohydrin: 1.015 kg; lognormal variance with pedigree 0.0427, pedigree (2,2,5,5,1)
  EcoSpold01Location=RER
  Literature
  Uncertainty: literature
  properties: carbon content, fossil 0.391304, dry mass 1 kg, heating value, net 18.35 MJ, wet mass 1 kg
- heat, district or industrial, natural gas: 0.113899, 6.9313 MJ (2 suppliers, which the file names only by identifier); sum of these 7.0452 MJ; lognormal variance with pedigree 0.0427, pedigree (2,2,5,5,1)
  Uncertainty: industry source
  properties: heating value, net 1 MJ
- heat, district or industrial, other than natural gas: 3.93051, 0.00182093 MJ (2 suppliers, which the file names only by identifier); sum of these 3.93233 MJ; lognormal variance with pedigree 0.0427, pedigree (2,2,5,5,1)
  Uncertainty: industry source
  properties: heating value, net 1 MJ
- sodium hydroxide, without water, in 50% solution state: 0.44 kg; lognormal variance with pedigree 0.0427, pedigree (2,2,5,5,1)
  EcoSpold01Location=RER
  Literature
  Uncertainty: literature
  properties: dry mass 1 kg, heating value, net 3.03 MJ, wet mass 1 kg
- wastewater, average: -0.0037367, -1.33041e-5 m3 (2 suppliers, which the file names only by identifier); sum of these -0.00375 m3; lognormal variance with pedigree 0.0201, pedigree (4,2,1,5,1)
  EcoSpold01Location=CH
  Approximation
  Uncertainty: approximation
  production volume
    Calculated from the production volume of glycerine in proportion to the respective output amounts.
  properties: carbon content, non-fossil 0.194039, dry mass 0.346837 kg, water content 2882.2, wet mass 1000 kg
  note on carbon content, non-fossil: C3H8O3 0.0673 kg TOC/m3 (Tab A.17, ecoinvent v2.2 report 13_I). TOC was considered as Total Carbon.
- water, completely softened: 1.66958, 2.23042 kg (2 suppliers, which the file names only by identifier); sum of these 3.9 kg; lognormal variance with pedigree 0.0427, pedigree (2,2,5,5,1)
  Literature
  EcoSpold01Location=RER
  Uncertainty: literature
  properties: wet mass 1 kg

## Emissions to nature
- Water [air, unspecified]: 0.0007995 m3; name water_to_air_unspecified; lognormal variance with pedigree 0.0827, pedigree (2,2,5,5,1)
  Calculated value based on literature values and expert opinion. See comments in the parametres' comment field.
  property fraction, origin: fresh water 1; name fraction_origin_fresh_water
  property fraction, origin: salt water 0; name fraction_origin_salt_water
  property fraction, origin: unspecified 0; name fraction_origin_unspecified
- AOX, Adsorbable Organic Halides [water, surface water]: 0.00078 kg; lognormal variance with pedigree 0.0427, pedigree (2,2,5,5,1)
  Calculated
  Uncertainty: calculated
- BOD5, Biological Oxygen Demand [water, surface water]: 0.00192 kg; lognormal variance with pedigree 0.0427, pedigree (2,2,5,5,1)
  Literature
  Uncertainty: literature
- COD, Chemical Oxygen Demand [water, surface water]: 0.00192 kg; lognormal variance with pedigree 0.0427, pedigree (2,2,5,5,1)
  Literature
  Uncertainty: literature
- Chloride [water, surface water]: 0.382 kg; lognormal variance with pedigree 0.0601, pedigree (4,2,5,5,1)
  Calculation
  Uncertainty: calculation
- DOC, Dissolved Organic Carbon [water, surface water]: 0.0006 kg; lognormal variance with pedigree 0.0601, pedigree (4,2,5,5,1)
  Calculation
  Uncertainty: calculation
- Sodium I [water, surface water]: 0.023 kg; lognormal variance with pedigree 0.0601, pedigree (4,2,5,5,1)
  Approximation
  Uncertainty: approximation
- TOC, Total Organic Carbon [water, surface water]: 0.0006 kg; lognormal variance with pedigree 0.0427, pedigree (2,2,5,5,1)
  Literature
  Uncertainty: literature

## Extrapolations
This dataset has been copied from an original dataset covering the geography RER. The uncertainty has been adjusted accordingly.

## Review by Niels Jungbluth 2005-12-02
Passed.
