# yarn production, jute

Dataset: EcoSpold 2, unit process
Geography: IN
Time period: 2015-04-01 to 2023-03-31
Technology level: current
Classification: EcoSpold01Categories: textiles/processing
Classification: ISIC rev.4 ecoinvent: 1311:Preparation and spinning of textile fibres
Scenario: Business-as-Usual
System model: Allocation, cut-off by classification
Generated by: Madhuri Nigam
Published in: Faist Emmenegger, M. 2018
Database: ecoinvent
isCopyrightProtected: true
accessRestrictedTo: 1

## General comment
This dataset represents the production of 1 kg of Jute yarn from Jute fibre
The inventory includes batching, softening, damping, carding, drawing and spinning of jute fibre. The processing chain starts with softener machine which is used to Soften and Split up raw jute at the initial stage. Water and castor oil is added as emulsion. Then the extraneous matter is removed from the jute fibre by carding machine in 2 carding operations. In the next step drawing machines are used to blend and equalize sliver of the fibre in three stages. Spinning machines are used then to elongate slivers and fibres are twisted into yarn. Then windings machines wrap the yarn on spools and cops to prepare the yarns for warping and weaving respectively.
The inventory is mainly based on industrial data collected from a jute spinning mill in Belur district, West Bengal. The main inputs are jute fibre, castor oil, water and energy. The waste of yarn is minimised using many preventive measures, some fibre converts into caddies and dust which is being reused in the same production process. Hence no waste/by-products are mentioned separately. It is important to note here that the energy data is calculated based on available secondary data for energy requirement of a jute processing machines.
we deemed the impact of machinery to be minimum therefore we deliberately excluded machinery from the dataset

## Included activities start
The activity starts with reception of retted and dried reeds of Jute.

## Included activities end
This activity ends with 1 kg jute yarn as the final product of the spinning process.

## Geography
West Bengal is the main centre of jute production and processing in India. Jute is an important natural fibre crop in India next to cotton.

## Technology
The processing chain starts with softener machine which is used to soften and split up raw jute at the initial stage. Water and castor oil is added as emulsion. Then the extraneous matter is removed from the jute fibre by carding machine in 2 carding operations. In the next step drawing machines are used to blend and equalize sliver of the fibre in three stages. Spinning machines are used then to elongate slivers and fibres are twisted into yarn. Then windings machines wrap the yarn on spools and cops to prepare the yarns for warping and weaving respectively.

## Reference product
- yarn, jute: 1 kg; name RP_amount_1; By-product classification allocatable product; CPC 26380: Yarn of vegetable textile fibres other than cotton (including flax, jute, coir and true hemp); paper yarn; HS2017 530710: Yarn; of jute or of other textile bast fibres, single
  production volume 6.2784e8 kg; name pv; = 3488000*180
    It is considered that entire yarn is converted to raw jute fabric. Source: http://texmin.nic.in/sites/default/files/finalrawjute_dec2016.pdf
  property heating value, net 14.87 MJ
    LHV is calculated based on the Carbon content of the product. More details can be found on the respective documentation.
  property price 0.712 EUR2005
    Average 2005 prices for EU27, USA, China, Japan and India from Import/Export data (US$ and tonnes) in UN Commodity Trade Statistics Database; Commodity: Yarn of jute or of other textile bast fibres of heading 264.0
  properties: carbon allocation 0.490909 kg, carbon content 0.490909, carbon content, fossil 0, carbon content, non-fossil 0.490909, dry mass 1 kg, water content 0, water in wet mass 0 kg, wet mass 1 kg

## Inputs from technosphere
- building, hall: 3.88681e-5 m2; = 20000/(857601*12*50); lognormal variance with pedigree 0.3026, pedigree (2,1,3,1,1)
  square meters of building divided by production per year and life time of the plant
- electricity, low voltage: 0.611 kWh; lognormal variance with pedigree 0.0046, pedigree (1,4,3,1,1)
  sum of electricity used for drawing, carding and spinning
- fibre, jute: 1.05 kg; lognormal variance with pedigree 0.0046, pedigree (1,4,3,1,1)
  properties: carbon content, non-fossil 0.46, dry mass 0.879121 kg, heating value, net 11.96 MJ, water content 0.1375, wet mass 1 kg
- vegetable oil, refined: 0.03 kg; lognormal variance with pedigree 0.0046, pedigree (1,4,3,1,1)
  Castor oil is used for conditioning (batching) of yarn
  properties: carbon content, non-fossil 0.768, dry mass 1 kg, heating value, net 38.4 MJ, wet mass 1 kg
  note on heating value, net: Values is approximated from HHV from "vegetable oil, crude". Source: Radovanovic,M.; Zivanovic,T.; Stojiljkovic,D.; Jovanovic,V.; Jerinic,N.; Knezevic,S. et.al. Utilization of sunflower husk as a fuel for industrial boilers - 20 years experience. Proc. 5th Eur. Conf. on Industrial Furnaces&Boilers 2000,vol.2,p.221-233. Available at: https://phyllis.nl/Biomass/View/2152
- waste yarn and waste textile: -0.05 kg; name BP_amount_1; lognormal variance with pedigree 0.0132, pedigree (4,4,1,5,2)
  This is the final waste that is ultimatelly landfilled. expert judgement based on company data
  production volume; = pv * (BP_amount_1 / RP_amount_1)
    Calculated from production volume of reference product using the relative outputs.
  properties: carbon content, non-fossil 0.44455, dry mass 0.97917 kg, heating value, net 13.14 MJ, water content 0.0212731, wet mass 1 kg
- wastewater from textile production: -0.00016 m3; name ww; = water*.8; lognormal variance with pedigree 0.0106, pedigree (4,4,1,1,1)
  considering default value of 80% wastewater generation.
  production volume; = pv*ww
    Calculated from production volume of reference product using the relative outputs.
  properties: BOD5, mass per volume 0.495 kg/m3, COD, mass per volume 0.501 kg/m3, carbon content, non-fossil 0.216883, dry mass 0.238473 kg, mass concentration, aluminium 0.0007758 kg/m3, mass concentration, copper 0.0001091 kg/m3, mass concentration, iron 0.0005904 kg/m3, mass concentration, magnesium 0.003219 kg/m3, mass concentration, potassium 0.01647 kg/m3, mass concentration, zinc 0.0001075 kg/m3, water content 4192.34, wet mass 1000 kg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
  note on carbon content, non-fossil: COD is 7.79e-4 kg/kg (Tab 12.11, ecoinvent v2.2 report 18_III). COD was converted to TOC, using conversion factors in Tab 4.10 (ecoinvent v2.2 report 13_IV). TOC was considered as Total Carbon.

## Inputs from nature
- Water, well, in ground [natural resource, in water]: 0.0002 m3; name water; = 0.2/1000; lognormal variance with pedigree 0.0046, pedigree (1,4,3,1,1)
  used for damping purpose

## Emissions to nature
- Water [air, urban air close to ground]: 4e-5 m3; = water*.2; lognormal variance with pedigree 0.0126, pedigree (4,4,3,1,1)
  considering default value of 20% evaporation rate

## Sampling procedure
Field visit and interviews from representative mills in West Bengal (East India) was chosen to provide data based on its technical representativeness of the current state of business and their willingness to participate.
