# selective coating, copper sheet, black majic

Dataset: EcoSpold 2, unit process
Geography: RoW
Time period: 2001-01-01 to 2023-12-31
Technology level: current
Classification: ISIC rev.4 ecoinvent: 2592:Treatment and coating of metals; machining
Classification: EcoSpold01Categories: metals/refinement
Tags: ConvertedDataset
Scenario: Business-as-Usual
System model: Allocation, cut-off by classification
Share of production covered: 100 %
Generated by: Niels Jungbluth
Published in: Classen M. 2009
Database: ecoinvent
isCopyrightProtected: true
accessRestrictedTo: 1

## General comment
Inventory for selective coatings of solar absorbers.
[This dataset was already contained in the ecoinvent database version 2. It was not individually updated during the transfer to ecoinvent version 3. Life Cycle Impact Assessment results may still have changed, as they are affected by changes in the supply chain, i.e. in other datasets. This dataset was generated following the ecoinvent quality guidelines for version 2. It may have been subject to central changes described in the ecoinvent version 3 change report (http://www.ecoinvent.org/database/ecoinvent-version-3/reports-of-changes/), and the results of the central updates were reviewed extensively. The changes added e.g. consistent water flows and other information throughout the database. The documentation of this dataset can be found in the ecoinvent reports of version 2, which are still available via the ecoinvent website. The change report linked above covers all central changes that were made during the conversion process.]

## Included activities start
The activity starts with the sheet entering the process. The material on which this activity is applied it is not included as input.

## Included activities end
Gate to gate inventory for the process including infrastructure, wastes. No information for packages.

## Geography
Production plant data for US.

## Technology
Black Majic crystal coating with nickel underlay.

## Time period
Date of information.

## Parameters
- fraction, process water, to air: 0.15 dimensionless; lognormal variance with pedigree 0.092025, pedigree (4,4,3,2,4)
- fraction, tap water, to air: 0.15 dimensionless; lognormal variance with pedigree 0.092025, pedigree (4,4,3,2,4)

## Reference product
- selective coat, copper sheet, black majic: 1 m2; By-product classification allocatable product; CPC 88731: Metal treatment and coating services
  EcoSpold01Location=US
  production volume 483174 m2
    Upscaled with a factor 3.18 from the EU production volume of 1.2 Mio. m2 per year according to Ecoinvent v.2 report 10, section 8.2. Equally distributed over the 6 types of 'selective coating'.
  property price 0.537924 EUR2005
    Calculated based on inputs: The price of the product has been calculated as a sum of the values of the material and energy inputs for this product. This value is therefore a rough estimation. It may underestimate the real price since there are additional expenses when producing any product. These expences can include for example labour costs, treatment of waste materials and profit for the producer. Please consider carefully whether this level of data quality is acceptable for your application.
  properties: carbon allocation 0 kg, carbon content 0

## Inputs from technosphere
- ammonia, anhydrous, liquid: 0.000446067, 0.00191636, 0.000865907, 0.00959802, 0.000405714, 9.07563e-5, 0.00333546, 0.000286723 kg (8 suppliers, which the file names only by identifier); sum of these 0.016945 kg; lognormal variance with pedigree 0.7621, pedigree (5,2,5,5,1)
  EcoSpold01Location=RER
  Rough estimation, basic uncertainity = 5
  Uncertainty: Rough estimation, basic uncertainity = 5
  properties: dry mass 1 kg, wet mass 1 kg
- electricity, medium voltage: 0.0213223, 0.425332, 0.0106476, 0.00652962, 0.0920691, 0.0013069, 0.00028062, 0.0296996, 0.0439221 kWh (9 suppliers, which the file names only by identifier); sum of these 0.63111 kWh; lognormal variance with pedigree 0.0601, pedigree (4,2,5,5,1)
  Questionnaire, 1000kWh/week
  EcoSpold01Location=US
  Uncertainty: Questionnaire, 1000kWh/week
- fatty alcohol: 0.0060517 kg; lognormal variance with pedigree 0.7621, pedigree (5,2,5,5,1)
  Rough estimation, basic uncertainity = 5
  EcoSpold01Location=RER
  Uncertainty: Rough estimation, basic uncertainity = 5
  properties: carbon content, fossil 0.0408973, carbon content, non-fossil 0.743434, dry mass 1 kg, heating value, net 41.01 MJ, wet mass 1 kg
  note on carbon content, fossil: Fatty alcohols have chain lengths between C6 and C22, their chemical formula is CH3(CH2)nCH2OH (ecoinvent v2.2 report 12, pg 16). As an average, C14 was used. The dataset represents a mix of 27% produced from fatty acid splitting and 73% produced from methyl ester (ecoinvent v2.2 report 12, pg 21). In the methyl esterification, methanol (CH3OH) has a fossil origin
- hazardous waste, for incineration: -0.115242, -0.0554194, -0.00144863 kg (3 suppliers, which the file names only by identifier); sum of these -0.17211 kg; lognormal variance with pedigree 0.0027, pedigree (2,2,1,5,1)
  Nickel sludge from waste water, estimation
  EcoSpold01Location=CH
  Uncertainty: Nickel sludge from waste water, estimation
  production volume
    Calculated from the production volume of selective coat, copper sheet, black majic in proportion to the respective output amounts.
  properties: carbon content, fossil 0.554667, dry mass 0.75 kg, heating value, net 17 MJ, water content 0.333333, wet mass 1 kg
  note on carbon content, fossil: Tab A.6, ecoinvent v2.2 report 13_I. C content has been calculated after data in the tables, and then referred to 1 kg DM
  note on heating value, net: Value taken from the general comment of the treatment dataset.
- hydrochloric acid, without water, in 30% solution state: 0.0182579, 0.0834121 kg (2 suppliers, which the file names only by identifier); sum of these 0.10167 kg; lognormal variance with pedigree 0.7621, pedigree (5,2,5,5,1)
  (same comment as for fatty alcohol)
  properties: dry mass 1 kg, heating value, net 3.32 MJ, wet mass 1 kg
- hydrogen fluoride: 0.00344607, 0.0101099 kg (2 suppliers, which the file names only by identifier); sum of these 0.013556 kg; lognormal variance with pedigree 0.7621, pedigree (5,2,5,5,1)
  Rough estimation, basic uncertainity = 5
  EcoSpold01Location=GLO
  Uncertainty: Rough estimation, basic uncertainity = 5
  properties: dry mass 1 kg, heating value, net 6.06 MJ, wet mass 1 kg
- metal coating facility: 3.3333e-7 unit; lognormal variance with pedigree 0.562, pedigree (3,5,5,5,5)
  Estimation
  EcoSpold01Location=RER
  Uncertainty: Estimation
- nickel, class 1: 0.023723 kg; lognormal variance with pedigree 0.7621, pedigree (5,2,5,5,1)
  EcoSpold01Location=GLO
  Rough estimation, basic uncertainity = 5
  Uncertainty: Rough estimation, basic uncertainity = 5
  properties: dry mass 1 kg, wet mass 1 kg
- tap water: 0.00882622, 0.0134548, 0.025106, 0.0676338, 0.339278, 3.88253, 2.89918 kg (7 suppliers, which the file names only by identifier); sum of these 7.236 kg; source NREL - National Renewable Energy Laborat 2005; lognormal variance with pedigree 0.0546, pedigree (3,3,5,5,1)
  EcoSpold01Location=RER
  Questionnaire
  Calculated based on literature, (Vionnet, S., Quantis Water Database - Technical Report, 2012). The process starts when untreated surface enters the coating plant. It includes the processes: pre-treatment (cleaning) and coating itself. The source presents data on general "Automotive painting, electrocoating, per m2", without specification of what kind of surface is being coated and what kind of coat is used. It is assumed (expert opinion) that this data are more likely to be right then the original - ecoivent values.
  Uncertainty: Questionnaire
  properties: carbon content, fossil 0.00178991, dry mass 0.000337476 kg, water content 2962.17, wet mass 1 kg
  note on carbon content, fossil: Bicarbonate content is 2.93 mol/m3. CO2 content is 0.1 mol/m3 (ecoinvent v2.2 report 8, Tab 93.1).
- tin: 0.010167 kg; lognormal variance with pedigree 0.7621, pedigree (5,2,5,5,1)
  (same comment as for fatty alcohol)
  properties: dry mass 1 kg, wet mass 1 kg
- wastewater, unpolluted: -3.32022e-6, -0.00068658 m3 (2 suppliers, which the file names only by identifier); sum of these -0.0006899 m3; lognormal variance with pedigree 0.0027, pedigree (2,2,1,5,1)
  Questionnaire, estimation that emitted substances are not reduced
  EcoSpold01Location=CH
  Uncertainty: Questionnaire, estimation that emitted substances are not reduced
  production volume
    (same comment as for hazardous waste, for incineration)
  properties: carbon content, fossil 0.00178991, carbon content, non-fossil 0.00178991, dry mass 0.337476 kg, fossil share of carbon 1, water content 2962.17, wet mass 1000 kg
  note on carbon content, fossil: Assumed to be like in tap water. Bicarbonate content is 2.93 mol/m3. CO2 content is 0.1 mol/m3 (ecoinvent v2.2 report 8, Tab 93.1).

## Emissions to nature
- Water [air, unspecified]: 0.0010854 m3; lognormal variance with pedigree 0.0827, pedigree (2,2,5,5,1)
  Calculated value based on literature values and expert opinion. See comments in the parametres' comment field.
- Ammonium [water, surface water]: 1.6945e-5 kg; lognormal variance with pedigree 0.12, pedigree (5,5,5,5,1)
  Estimation 0.1%of use as emission to river
  Uncertainty: Estimation 0.1%of use as emission to river
- Chloride [water, surface water]: 0.00010167 kg; lognormal variance with pedigree 0.12, pedigree (5,5,5,5,1)
  (same comment as for Ammonium)
- Fluoride [water, surface water]: 1.3556e-5 kg; lognormal variance with pedigree 0.12, pedigree (5,5,5,5,1)
  (same comment as for Ammonium)
- Nickel II [water, surface water]: 2.3723e-5 kg; lognormal variance with pedigree 0.12, pedigree (5,5,5,5,1)
  (same comment as for Ammonium)
- Tin ion [water, surface water]: 1.0167e-5 kg; lognormal variance with pedigree 0.12, pedigree (5,5,5,5,1)
  (same comment as for Ammonium)
- Water [water, unspecified]: 0.0061506 m3; lognormal variance with pedigree 0.0827, pedigree (2,2,5,5,1)
  (same comment as for Water)
  property carbon content, fossil 0; name C_content_fossil
  property carbon content, non-fossil 0; name C_content_non_fossil
  property dry mass 0 kg; name DM
  property water in wet mass 1000 kg; name WWM
  property wet mass 1000 kg; name WM

## Sampling procedure
Personal communication and public information

## Extrapolations
None This dataset has been copied from an original dataset covering the geography US. The uncertainty has been adjusted accordingly.

## Review by Hans-Jörg Althaus 2007-09-20
Passed.
none
