# fibreboard production, soft, from wet & dry processes

Dataset: EcoSpold 2, unit process
Geography: RoW
Time period: 2012-01-01 to 2023-12-31
Technology level: current
Classification: EcoSpold01Categories: wooden materials/processing
Classification: ISIC rev.4 ecoinvent: 1621:Manufacture of veneer sheets and wood-based panels
Synonyms: wood insulation board; softboard
Scenario: Business-as-Usual
System model: Allocation, cut-off by classification
Generated by: Frank Werner
Database: ecoinvent
isCopyrightProtected: true
accessRestrictedTo: 1

## General comment
This dataset represents soft wood fibreboard production as the weighted average of soft wood fibreboards produced by the members of the European Panel Federation (EPF)
Soft fibreboard, also called softboard or wood insulation board is an engineered wood product in conformity with the standard EN 13171.
Soft fibreboard consists of up to 85% of wood fibres which have been produced in either the dry or the wet process from wood residues from sawmills (e.g. sidings) and from wood chips. When pro-duced in the dry process, it is also called low density fibre board.
Softwood is preferred due to its higher fibre quality.
Typical thickness is in a range 4 - 32 mm.
The composition of the inventoried softboard is as follows:
The dataset covers both products produced in the wet process (roughly 69% of the covered production volume) and in the dry process (roughly 31% of the covered production volume); due to the limited number of data sources, no distinction of the different production technologies could be made for the reason of data confidentiality.
Softboard is applied for building shell like roofs, walls and floors, acting as thermal and acoustic insu-lating material. Softboard regulates moisture balance permitting fully vapour permeable construction which avoids the risk of interstitial condensation or rot without the use of membranes or vented cavities.

## Included activities start
From the reception at the factory gate of all materials and fuels used.

## Included activities end
Activity ends with the soft wood fibreboard at the factory gate.

## Geography
Representation of the production of the member companies of the European Panel Federation (EPF).

## Technology
In the wet process, the raw material is grinded and then mixed into a mash with up to 98% water. This mash is then formed into a so-called fibre cake. After pressing most water out of the mat, the fibre cake is the cut and dried in the drying channel with temperatures between 160 to 220 °C. The addition of binders is usually not required, as the heating of the liquid lignin as part of the wood bonds the fibres during cooling. For special purposes (higher strength, hydrophobic properties), resins or bitumen-containing agents can be added. Thicker board are produced from gluing together several standard boards.
In the dry process, the fibres are dried directly after grinding and mixed with up to 4% resin, (e.g. PUR resin). For the production of flexible insulation boards, synthetic textile fibres or fibres from corn starch are added to the wood fibres. Subsequently, the fibres are sprinkled in desired thickness, pressed, hardened with a mixture of vapour and air and then cut, stacked and packed.
Production is subject to the regulations of the Industrial Emissions Directive (EU-IED, 2011) if the production capacity exceeds 600 m3 per day where one or more of the following wood-based panels are produced: fibreboard, particleboard or oriented strand board.

## Parameters
- input wood fuel: 575.612 MJ; name wood_fuel; = 30.2*19.06
  input of wood fuel used in production, i.e. wood fuel from forestry, internal wood residues, post-consumer wood used for energy purposes, etc; expressed in MJ of absolutely dry mass (lower heating value at humidity u=0%)

## Reference product
- residual wood, dry: 1 m3; name w_chips; By-product classification allocatable product; CPC 39283: Non-agglomerated wood waste and scrap; HS2017 440140: Wood; for fuel, sawdust and wood waste and scrap, not agglomerated
  Emission factor from DS on heat generation from industrial residual wood mulitplied by the input of wood fuel (direct wood fuel plus production residues)
  production volume 228229 m3; = p_board * (w_chips / RP_amount_1)
    Calculated from production volume of reference product using the relative outputs.
  property heating value, net 8030.06 MJ
    LHV is calculated based on the Carbon content of the product. More details can be found on the respective documentation.The property is based on a value of 12.7MJ/kg
  property price 26.9 EUR2005
    Temporary price data. Calculated as 90% of purchasers price based on: 2004 prices for World Import/Export (USD/cubicmeter) from FaoStat (http://faostat.fao.org/site/626/default.aspx#ancor, [accessed 10th June 2010]) Commodity: 'Chips and Particles' assuming this is for air-dry chips (10% water on a dry matter basis at 650 kg/m3) and no price difference for water content (i.e. assuming air-drying).
  properties: allocation factor 0.00618188, carbon allocation 271.7 kg, carbon content 0.494, carbon content, fossil 0, carbon content, non-fossil 0.494, dry mass 550 kg, true value 0.920948, water content 0.15, water in wet mass 82.5 kg, wet mass 632.5 kg

## Inputs from technosphere
- aluminium sulfate, powder: 0.138296 kg; = 0.709+0.0569; lognormal variance with pedigree 0.043, pedigree (1,5,4,5,1)
  aluminium sulfate plus input of unspecified hardeners
  properties: dry mass 1 kg, wet mass 1 kg
- ammonia, anhydrous, liquid: 0.000127554, 0.000247609, 0.00274458, 0.000116015, 2.59521e-5, 0.000953785, 8.19893e-5 kg (7 suppliers, which the file names only by identifier); sum of these 0.00429749 kg; = 0.119*0.2; lognormal variance with pedigree 0.043, pedigree (1,5,4,5,1)
  20% concentration
  properties: dry mass 1 kg, wet mass 1 kg
- biowaste: -0.00493287, -0.0059673, -0.0177233 kg (3 suppliers, which the file names only by identifier); sum of these -0.0286234 kg; lognormal variance with pedigree 0.0356, pedigree (2,5,1,5,1)
  sludges from chip washing etc.
  production volume; = w_biowaste*p_board
    Calculated from production volume of reference product using the relative outputs.
  properties: carbon content, non-fossil 0.1624, dry mass 0.4 kg, heating value, net 4.29 MJ, water content 1.5, wet mass 1 kg
  note on heating value, net: Value taken from the general comment of the treatment dataset.
- chemical, organic: 0.417922 kg; lognormal variance with pedigree 0.043, pedigree (1,5,4,5,1)
  input of unspecified additives, dyes, flame redardants, etc.
  properties: carbon content, fossil 0.628, dry mass 1 kg, heating value, net 19.03 MJ, wet mass 1 kg
  note on carbon content, fossil: This dataset is an unweighted average of 20 organic substances (listed in Tab 88.1, ecoinvent v2.2 report 8, part II), being part of the top100 chemicals included in this database. The C-content has also been calculated as an unweighted average of the C content of the substances composing this dataset.
- diesel, burned in building machine: 1.46259 MJ; lognormal variance with pedigree 0.043, pedigree (1,5,4,5,1)
  for internal transport
  properties: heating value, net 1 MJ
- electricity, medium voltage: 0.483358, 0.00115281, 9.64192, 0.241373, 0.148021, 0.0296262, 0.00636142, 0.995677, 2.86174 kWh (9 suppliers, which the file names only by identifier); sum of these 14.4092 kWh; lognormal variance with pedigree 0.043, pedigree (1,5,4,5,1)
- furnace, wood chips, with silo, 1000kW: 6.8702e-7 unit; = 6.61E-09*wood_fuel; lognormal variance with pedigree 0.5586, pedigree (1,3,4,1,1)
  Infrastructure factor from DS 'Heat, district or industrial, other than natural gas {CH}| heat production, wood chips from industry, at furnace 1000kW | Cut-off, U', multiplied by the input of wood fuel (direct wood fuel plus production residues); correction for assumed efficiency as original value refers to heat output
- glass wool mat: 0.119716 kg; lognormal variance with pedigree 0.043, pedigree (1,5,4,5,1)
  glass fibres used as reinforcement
  properties: carbon content, fossil 0.0107327, dry mass 1 kg, wet mass 1 kg
  note on carbon content, fossil: A share of 16 w-% for the binders is taken into account. The binder used in this study is a mixture of phenol, formaldehyde and urea resins (ecoinvent v2.2 report 16_part XIV), and the C content was calculated as a weigthed average of phenol, formaldehyde and urea C content.
- hazardous waste, for incineration: -0.00594839, -7.47733e-5 kg (2 suppliers, which the file names only by identifier); sum of these -0.00602317 kg; lognormal variance with pedigree 0.035, pedigree (1,5,1,5,1)
  Output of minor quantities of waste resins, oily filters and rags
  production volume; = w_HW*p_board
    Calculated from production volume of reference product using the relative outputs.
  properties: carbon content, fossil 0.554667, dry mass 0.75 kg, heating value, net 17 MJ, water content 0.333333, wet mass 1 kg
  note on carbon content, fossil: Tab A.6, ecoinvent v2.2 report 13_I. C content has been calculated after data in the tables, and then referred to 1 kg DM
- heat, district or industrial, natural gas: 25.9672 MJ; = 151/1.05; lognormal variance with pedigree 0.043, pedigree (1,5,4,5,1)
  input of natural gas, converted to heat output
  properties: heating value, net 1 MJ
- heat, district or industrial, other than natural gas: 3.43937 MJ; = 20/1.05; lognormal variance with pedigree 0.043, pedigree (1,5,4,5,1)
  Fuel input, converted to heat output; proxy for animal grease
  properties: heating value, net 1 MJ
- heat, district or industrial, other than natural gas: 4.59156 MJ; = 26.7/1.05; lognormal variance with pedigree 0.043, pedigree (1,5,4,5,1)
  Fuel input, converted to heat output
- heat, district or industrial, other than natural gas: 71.7108 MJ; = 417/1.05; lognormal variance with pedigree 0.043, pedigree (1,5,4,5,1)
  Fuel input, converted to heat output
- latex: 0.141203 kg; lognormal variance with pedigree 0.043, pedigree (1,5,4,5,1)
  additive
  properties: carbon content, fossil 0.872983, dry mass 1 kg, heating value, net 26.45 MJ, wet mass 1 kg
  note on carbon content, fossil: The Styrene-butadiene dispersion is based on styrene and 1,3-butadiene plus co-monomers like i.e. ac-rylonitrile or (meth-)acrylic acid (ecoinvent v2.2 report 11_III). Following specifications in US Patent 3,875,101 (1971), the dispersion was considered as: 52.5% 1.3-butadiene (0.8571 kg C/kg dry mass); 43% styrene (0.9231 kg C/kg dry mass); 2% acrylic acid (0.5 kg C/kg dry mass); 2.5% acrolein (C3H4O, MW=56; 0.6429 kg C/kg dry mass)
- lubricating oil: 0.0124013 kg; = 0.00278+0.0659; lognormal variance with pedigree 0.043, pedigree (1,5,4,5,1)
  input of lubricating oils plus mineral oils, incl. thermooil
  properties: carbon content, fossil 0.75, dry mass 1 kg, heating value, net 40.2 MJ, wet mass 1 kg
  note on carbon content, fossil: Lubricating oil is produced from diesel. C-content/dry mass of fats and oils considered 75%, from: ecoinvent v2.2 report, n 15a, pg 40
  note on heating value, net: Literature value, Source: IPCC 2006, 2006 IPCC Guidelines for National Greenhouse Gas Inventories, Prepared by the National Greenhouse Gas Inventories Programme, Eggleston H.S., Buendia L., Miwa K., Ngara T. and Tanabe K. (eds). Published: IGES, Japan
- methylene diphenyl diisocyanate: 0.0516421 kg; lognormal variance with pedigree 0.043, pedigree (1,5,4,5,1)
  part of glueing system (inventoried as averaged production average in Europe)
  properties: carbon content, fossil 0.72, dry mass 1 kg, heating value, net 26.66 MJ, wet mass 1 kg
- nylon 6: 0.118271 kg; lognormal variance with pedigree 0.043, pedigree (1,5,4,5,1)
  reinforcement
  properties: carbon content, fossil 0.637168, dry mass 1 kg, heating value, net 30.9 MJ, wet mass 1 kg
  note on carbon content, fossil: It is a chain of caprolactam molecules, originating from aminocarboxylic acids - here caproic acid or caprolactam. The structure of nylon 6 is -(NH-(CH2)5-CO)n-, C6H11NO (ecoinvent v2.2 report 11_II). MW=113 g/mol
  note on heating value, net: Assumed equal to Nylon-66. Reference: Walters, R. N., Hackett, S. M. and Lyon, R. E. (2000) ‘Heats of combustion of high temperature polymers’, Fire and Materials, 24(5), pp. 245–252. doi: 10.1002/1099-1018(200009/10)24:5<245::AID-FAM744>3.0.CO;2-7.
- paraffin: 0.330437 kg; lognormal variance with pedigree 0.043, pedigree (1,5,4,5,1)
  hydrophobing agent
  properties: carbon content, fossil 0.847059, dry mass 1 kg, heating value, net 41.5 MJ, wet mass 1 kg
  note on heating value, net: Indicative value. Reference: Fuels - Higher and Lower Calorific Values, available at: https://www.engineeringtoolbox.com/fuels-higher-calorific-values-d_169.html
- phenolic resin: 0.0801717 kg; lognormal variance with pedigree 0.043, pedigree (1,5,4,5,1)
  part of glueing system (inventoried as averaged production average in Europe)
  properties: carbon content, fossil 0.772277, dry mass 1 kg, heating value, net 33.57 MJ, wet mass 1 kg
- potato starch: 0.231125 kg; lognormal variance with pedigree 0.043, pedigree (1,5,4,5,1)
  additive
  properties: carbon content, non-fossil 0.46, dry mass 0.8 kg, heating value, net 10.66 MJ, water content 0.25, wet mass 1 kg
  note on carbon content, non-fossil: C-content of starch is considered 46% on dry mass basis (from "Evolutionary and Biochemical Aspects", A.D. Kay and T. Vrede (in Global Ecology, 2010, Elsevier B.V., S.E. Jørgensen Ed.)).
- pulpwood, hardwood, measured as solid wood under bark: 4.28344e-8, 0.00012749 m3 (2 suppliers, which the file names only by identifier); sum of these 0.000127533 m3; = 0.404/572; lognormal variance with pedigree 0.043, pedigree (1,5,4,5,1)
  input in kg divided by the basic wood density of 572 kg/m3
  properties: carbon content, non-fossil 0.494, dry mass 625.778 kg, dry mass under bark 563.2 kg, heating value, net 6071.3 MJ, water content 0.8, wet mass 1126.4 kg
  note on heating value, net: Value based on "hardwood forestry, mixed species, sustainable forest management"The property is based on a value of 11.58MJ/kg
- pulpwood, softwood, measured as solid wood under bark: 0.0410286, 4.96614e-6 m3 (2 suppliers, which the file names only by identifier); sum of these 0.0410336 m3; = 85.9/378; lognormal variance with pedigree 0.043, pedigree (1,5,4,5,1)
  input in kg divided by the basic wood density of 378 kg/m3
  properties: carbon content, non-fossil 0.494, dry mass 440 kg, dry mass under bark 387.2 kg, heating value, net 4483.78 MJ, water content 1.4, wet mass 1056 kg
  note on heating value, net: Value based on "softwood forestry, mixed species, sustainable forest management"The property is based on a value of 11.58MJ/kg
- slab and siding, softwood, wet, measured as dry mass: 6.80086, 0.096787 kg (2 suppliers, which the file names only by identifier); sum of these 6.89765 kg; lognormal variance with pedigree 0.0146, pedigree (1,3,4,5,1)
  input of industrial residual wood
  properties: carbon content, non-fossil 0.494, dry mass 1 kg, heating value, net 7.79 MJ, water content 0.7, wet mass 1.7 kg
- sodium hydroxide, without water, in 50% solution state: 0.00492044 kg; = 0.0545*0.5; lognormal variance with pedigree 0.043, pedigree (1,5,4,5,1)
  50% concentration
  properties: dry mass 1 kg, heating value, net 3.03 MJ, wet mass 1 kg
- tap water: 0.0763306, 0.11636, 0.217121, 0.584908, 2.93413, 0.0523269, 33.5767 kg (7 suppliers, which the file names only by identifier); sum of these 37.5579 kg; lognormal variance with pedigree 0.043, pedigree (1,5,4,5,1)
  properties: carbon content, fossil 0.00178991, dry mass 0.000337476 kg, water content 2962.17, wet mass 1 kg
  note on carbon content, fossil: Bicarbonate content is 2.93 mol/m3. CO2 content is 0.1 mol/m3 (ecoinvent v2.2 report 8, Tab 93.1).
- vinyl acetate: 0.140481 kg; lognormal variance with pedigree 0.043, pedigree (1,5,4,5,1)
  for the glueing of several layers of mats
  properties: carbon content, fossil 0.55814, dry mass 1 kg, heating value, net 25.35 MJ, wet mass 1 kg
- waste paper, sorted: 0.107618 kg; lognormal variance with pedigree 0.043, pedigree (1,5,4,5,1)
  fibre input
  properties: carbon content, non-fossil 0.448889, dry mass 0.9 kg, heating value, net 14.11 MJ, water content 0.111111, wet mass 1 kg
- wastewater from soft fibreboard production: -6.59568e-5, -0.0136391 m3 (2 suppliers, which the file names only by identifier); sum of these -0.013705 m3; lognormal variance with pedigree 0.035, pedigree (1,5,1,5,1)
  production volume; = w_WW*p_board
    Calculated from production volume of reference product using the relative outputs.
  properties: carbon content, non-fossil 0.999914, dry mass 43.2938 kg, water content 22.098, wet mass 1000 kg
- wood ash mixture, pure: -0.0647721, -0.00121926 kg (2 suppliers, which the file names only by identifier); sum of these -0.0659914 kg; = 0.000666666666666667*wood_fuel/1.05; lognormal variance with pedigree 0.035, pedigree (1,5,1,5,1)
  Emission factor from DS on heat generation from industrial residual wood mulitplied by the input of wood fuel (direct wood fuel plus production residues), scaled to convert wood input to resulting heat.
  EcoSpold01Location=CH
  production volume; = w_wood_ash*p_board
    Calculated from production volume of reference product using the relative outputs.
  properties: carbon content, non-fossil 0.012, dry mass 1 kg, wet mass 1 kg
- wood chips, dry, measured as dry mass: 5.16421 kg; lognormal variance with pedigree 0.043, pedigree (1,5,4,5,1)
  input of chips from sawmills
  properties: carbon content, non-fossil 0.494, dry mass 1 kg, heating value, net 9.99 MJ, water content 0.4, wet mass 1.4 kg
  note on carbon content, non-fossil: C content of dry mass is 0.494 kgC/kg dry wood (ecoinvent v2.2 report 9).
- wood chips, wet, measured as dry mass: 0.00400831, 5.1602 kg (2 suppliers, which the file names only by identifier); sum of these 5.16421 kg; lognormal variance with pedigree 0.268, pedigree (1,5,4,5,1)
  input of wood chips from forestry
  properties: carbon content, non-fossil 0.494, dry mass 1 kg, heating value, net 10.84 MJ, water content 1.1, wet mass 2.1 kg
  note on heating value, net: Value based on the dataset 'softwood forestry, mixed species, sustainable forest management'
- wooden board factory, organic bonded boards: 6.87873e-9 unit; = 1/(525000*50); lognormal variance with pedigree 0.043, pedigree (1,5,4,5,1)
  estimated based on an assumed yearly production volume o 525,000 m3/year and a life time of infrastructure of 50 years

## Inputs from nature
- Carbon dioxide, non-fossil, resource correction [natural resource, in air]: 880.339 kg
- Water, cooling, unspecified natural origin [natural resource, in water]: 0.0722267 m3; lognormal variance with pedigree 0.042, pedigree (1,5,4,5,1)
- Water, river [natural resource, in water]: 0.0087936 m3; lognormal variance with pedigree 0.043, pedigree (1,5,4,5,1)

## Emissions to nature
- Acetaldehyde [air, urban air close to ground]: 2.40672e-5 kg; = 8.13333333333333E-08*wood_fuel/1.05+0.0000887; lognormal variance with pedigree 0.4806, pedigree (2,5,5,5,1)
  Emission factor from DS 'Heat, district or industrial, other than natural gas {CH}| heat production, wood chips from industry, at furnace 1000kW | Cut-off, U' on heat generation from industrial residual wood per MJ, multiplied by the input of wood fuel (direct wood fuel plus production residues ) scaled to reflect wood input per generated heat plus estimated emissions from wood and glue drying processes (based on Albrecht et al. 2009).
- Ammonia [air, urban air close to ground]: 0.00022833 kg; = 2.30666666666667E-06*wood_fuel/1.05; lognormal variance with pedigree 0.4806, pedigree (2,5,5,5,1)
  Emission factor from DS 'Heat, district or industrial, other than natural gas {CH}| heat production, wood chips from industry, at furnace 1000kW | Cut-off, U' on heat generation from industrial residual wood per MJ, multiplied by the input of wood fuel (direct wood fuel plus production residues ) scaled to reflect wood input per generated heat.
- Arsenic ion [air, urban air close to ground]: 1.31983e-7 kg; = 1.33333333333333E-09*wood_fuel/1.05; lognormal variance with pedigree 0.4806, pedigree (2,5,5,5,1)
  (same comment as for Ammonia)
- Benzene [air, urban air close to ground]: 0.000120104 kg; = 1.21333333333333E-06*wood_fuel/1.05; lognormal variance with pedigree 0.4806, pedigree (2,5,5,5,1)
  (same comment as for Ammonia)
- Benzo(a)pyrene [air, urban air close to ground]: 6.59914e-8 kg; = 6.66666666666667E-10*wood_fuel/1.05; lognormal variance with pedigree 0.4806, pedigree (2,5,5,5,1)
  (same comment as for Ammonia)
- Bromine [air, urban air close to ground]: 7.91896e-6 kg; = 0.00000008*wood_fuel/1.05; lognormal variance with pedigree 0.4806, pedigree (2,5,5,5,1)
  (same comment as for Ammonia)
- Cadmium II [air, urban air close to ground]: 9.23879e-8 kg; = 9.33333333333334E-10*wood_fuel/1.05; lognormal variance with pedigree 0.4806, pedigree (2,5,5,5,1)
  (same comment as for Ammonia)
- Calcium II [air, urban air close to ground]: 0.000772099 kg; = 0.0000078*wood_fuel/1.05; lognormal variance with pedigree 0.4806, pedigree (2,5,5,5,1)
  (same comment as for Ammonia)
- Carbon dioxide, non-fossil [air, urban air close to ground]: 14.1222 kg; = 0.142666666666666*wood_fuel/1.05; lognormal variance with pedigree 0.0506, pedigree (2,5,5,5,1)
  (same comment as for Ammonia)
- Carbon monoxide, non-fossil [air, urban air close to ground]: 0.0395948 kg; = 0.0004*wood_fuel/1.05; lognormal variance with pedigree 0.0706, pedigree (2,5,5,5,1)
  (same comment as for Ammonia)
- Chlorine [air, urban air close to ground]: 2.37569e-5 kg; = 0.00000024*wood_fuel/1.05; lognormal variance with pedigree 0.4806, pedigree (2,5,5,5,1)
  (same comment as for Ammonia)
- Chromium III [air, urban air close to ground]: 5.22652e-7 kg; = 5.28000000000001E-09*wood_fuel/1.05; lognormal variance with pedigree 0.4806, pedigree (2,5,5,5,1)
  (same comment as for Ammonia)
- Chromium VI [air, urban air close to ground]: 5.27931e-9 kg; = 5.33333333333334E-11*wood_fuel/1.05; lognormal variance with pedigree 0.5306, pedigree (2,5,5,5,1)
  (same comment as for Ammonia)
- Copper ion [air, urban air close to ground]: 2.90362e-6 kg; = 2.93333333333334E-08*wood_fuel/1.05; lognormal variance with pedigree 0.4806, pedigree (2,5,5,5,1)
  (same comment as for Ammonia)
- Dinitrogen monoxide [air, urban air close to ground]: 0.00030356 kg; = 3.06666666666667E-06*wood_fuel/1.05; lognormal variance with pedigree 0.4806, pedigree (2,5,5,5,1)
  (same comment as for Ammonia)
- Dioxins, measured as 2,3,7,8-tetrachlorodibenzo-p-dioxin [air, urban air close to ground]: 4.09147e-12 kg; = 4.13333333333333E-14*wood_fuel/1.05; lognormal variance with pedigree 0.4806, pedigree (2,5,5,5,1)
  (same comment as for Ammonia)
- Ethyl benzene [air, urban air close to ground]: 3.95948e-6 kg; = 0.00000004*wood_fuel/1.05; lognormal variance with pedigree 0.4806, pedigree (2,5,5,5,1)
  (same comment as for Ammonia)
- Fluorine [air, urban air close to ground]: 6.59914e-6 kg; = 6.66666666666667E-08*wood_fuel/1.05; lognormal variance with pedigree 0.4806, pedigree (2,5,5,5,1)
  (same comment as for Ammonia)
- Formaldehyde [air, urban air close to ground]: 0.000681644 kg; = 1.73333333333334E-07*wood_fuel/1.05+0.00368; lognormal variance with pedigree 0.4806, pedigree (2,5,5,5,1)
  (same comment as for Acetaldehyde)
- Hexachlorobenzene [air, urban air close to ground]: 9.50276e-13 kg; = 9.60000000000001E-15*wood_fuel/1.05; lognormal variance with pedigree 0.4806, pedigree (2,5,5,5,1)
  (same comment as for Ammonia)
- Hydrocarbons, aliphatic, alkanes, unspecified [air, urban air close to ground]: 0.000120104 kg; = 1.21333333333333E-06*wood_fuel/1.05; lognormal variance with pedigree 0.4806, pedigree (2,5,5,5,1)
  (same comment as for Ammonia)
- Hydrocarbons, aliphatic, unsaturated [air, urban air close to ground]: 0.000409147 kg; = 4.13333333333333E-06*wood_fuel/1.05; lognormal variance with pedigree 0.4806, pedigree (2,5,5,5,1)
  (same comment as for Ammonia)
- Lead II [air, urban air close to ground]: 3.29957e-6 kg; = 3.33333333333333E-08*wood_fuel/1.05; lognormal variance with pedigree 0.4806, pedigree (2,5,5,5,1)
  (same comment as for Ammonia)
- Magnesium [air, urban air close to ground]: 4.75138e-5 kg; = 0.00000048*wood_fuel/1.05; lognormal variance with pedigree 0.4806, pedigree (2,5,5,5,1)
  (same comment as for Ammonia)
- Manganese II [air, urban air close to ground]: 2.24371e-5 kg; = 2.26666666666667E-07*wood_fuel/1.05; lognormal variance with pedigree 0.4806, pedigree (2,5,5,5,1)
  (same comment as for Ammonia)
- Mercury II [air, urban air close to ground]: 3.95948e-8 kg; = 0.0000000004*wood_fuel/1.05; lognormal variance with pedigree 0.4806, pedigree (2,5,5,5,1)
  (same comment as for Ammonia)
- Methane, non-fossil [air, urban air close to ground]: 0.000395948 kg; = 0.000004*wood_fuel/1.05; lognormal variance with pedigree 0.4806, pedigree (2,5,5,5,1)
  (same comment as for Ammonia)
- Methanol [air, non-urban air or from high stacks]: 0.000839636 kg; lognormal variance with pedigree 0.482, pedigree (3,5,5,5,1)
  Estimated emissions from wood and glue drying processes
- NMVOC, non-methane volatile organic compounds [air, urban air close to ground]: 0.0227601 kg; = 9.33333333333334E-06*wood_fuel/1.05 + 0.134 - (0.00368+0.0000887+0.00465+0.00465); lognormal variance with pedigree 0.2106, pedigree (2,5,5,5,1)
  Emission factor from DS 'Heat, district or industrial, other than natural gas {CH}| heat production, wood chips from industry, at furnace 1000kW | Cut-off, U' on heat generation from industrial residual wood per MJ, multiplied by the input of wood fuel (direct wood fuel plus production residues ) scaled to reflect wood input per generated heat plus estimated emissions from wood and glue drying processes (based on Albrecht et al. 2009), minus VOC emissions that are inventoried specifically.
- Nickel II [air, urban air close to ground]: 7.91896e-7 kg; = 0.000000008*wood_fuel/1.05; lognormal variance with pedigree 0.4806, pedigree (2,5,5,5,1)
  (same comment as for Ammonia)
- Nitrogen oxides [air, urban air close to ground]: 0.0296961 kg; = 0.0003*wood_fuel/1.05; lognormal variance with pedigree 0.1206, pedigree (2,5,5,5,1)
  (same comment as for Ammonia)
- PAH, polycyclic aromatic hydrocarbons [air, urban air close to ground]: 1.46501e-6 kg; = 0.0000000148*wood_fuel/1.05; lognormal variance with pedigree 0.4806, pedigree (2,5,5,5,1)
  (same comment as for Ammonia)
- Particulate Matter, < 2.5 um [air, urban air close to ground]: 0.00593922 kg; = 0.0000600000000000001*wood_fuel/1.05; lognormal variance with pedigree 0.1206, pedigree (2,5,5,5,1)
  (same comment as for Ammonia)
- Particulate Matter, > 10 um [air, unspecified]: 0.00125133 kg; lognormal variance with pedigree 0.45, pedigree (3,5,4,5,1)
  dust emissions
- Particulate Matter, > 2.5 um and < 10um [air, unspecified]: 0.000329957 kg; = 3.33333333333334E-06*wood_fuel/1.05
  (same comment as for Ammonia)
- Pentachlorophenol [air, urban air close to ground]: 1.06906e-9 kg; = 0.0000000000108*wood_fuel/1.05; lognormal variance with pedigree 0.4806, pedigree (2,5,5,5,1)
  (same comment as for Ammonia)
- Phosphorus [air, urban air close to ground]: 3.95948e-5 kg; = 0.0000004*wood_fuel/1.05; lognormal variance with pedigree 0.4806, pedigree (2,5,5,5,1)
  (same comment as for Ammonia)
- Potassium I [air, urban air close to ground]: 0.0030884 kg; = 0.0000312*wood_fuel/1.05; lognormal variance with pedigree 0.4786, pedigree (2,5,5,1,1)
  (same comment as for Ammonia)
- Sodium I [air, urban air close to ground]: 0.000171578 kg; = 1.73333333333334E-06*wood_fuel/1.05; lognormal variance with pedigree 0.4806, pedigree (2,5,5,5,1)
  (same comment as for Ammonia)
- Sulfur dioxide [air, urban air close to ground]: 0.000329957 kg; = 3.33333333333334E-06*wood_fuel/1.05; lognormal variance with pedigree 0.4806, pedigree (2,5,5,5,1)
  (same comment as for Ammonia)
- Toluene [air, urban air close to ground]: 3.95948e-5 kg; = 0.0000004*wood_fuel/1.05; lognormal variance with pedigree 0.4806, pedigree (2,5,5,5,1)
  (same comment as for Ammonia)
- Zinc II [air, urban air close to ground]: 3.95948e-5 kg; = 0.0000004*wood_fuel/1.05; lognormal variance with pedigree 0.4806, pedigree (2,5,5,5,1)
  (same comment as for Ammonia)
- m-Xylene [air, urban air close to ground]: 1.58379e-5 kg; = 0.00000016*wood_fuel/1.05; lognormal variance with pedigree 0.4806, pedigree (2,5,5,5,1)
  (same comment as for Ammonia)

## Sampling procedure
Survey among member companies of the European Panel Federation; emissions profile per MJ wood input from PSI (2014)

## Review by Emilia Moreno Ruiz 2014-06-12
AL in heat input corrected to the most recent activity
