# cement production, CEM II/A

Dataset: EcoSpold 2, unit process
Geography: CH
Time period: 2017-01-01 to 2023-12-31
Technology level: current
Classification: ISIC rev.4 ecoinvent: 2394:Manufacture of cement, lime and plaster
Synonyms: CEM II/A; Portland composite cement
Tags: combined production
Scenario: Business-as-Usual
System model: Allocation, cut-off by classification
Share of production covered: 100 %
Generated by: Frank Werner
Published in: Werner F. 2022
Database: ecoinvent
isCopyrightProtected: true
accessRestrictedTo: 1

## General comment
The dataset describes the production of cement (CEM II/A) in Switzerland and covers the representative production mix of CEM II/A-D, CEM II/A-LL, CEM II/A-M(D-LL), CEM II/A-M(V-LL) and CEM II/A-S according to SN EN 197-1.
In Switzerland, according to the Swiss standard SN EN 197-1:2011, cement CEM II, also known as Portland composite cement, has 65-94% of clinker and is mixed with different materials, such as limestone, ground granulated blast furnace slag, fly ash, pozzolan, burnt shale, silica fume, among others.

## Included activities start
The activity starts with the clinker in the silo to be used for cement production and with the additional ingredients of the cement at the gate of the cement plant. The dataset includes energy use, input of grinding aids and input of infrastructure.

## Included activities end
The activity ends with the cement produced in the cement mill. The dataset does not include particulate emission, packaging and administration.

## Geography
This dataset represents production of cement CEM II/A for Switzerland.

## Technology
In this dataset, the production of CEM II/A is described, where clinker (77.7%) is ground together with gypsum (4.9%) and mixed with limestone (15%), silica fume, blast furnace slag and ground granulated blast furnace slag (GGBFS). The activity includes also the input of electricity used for the grinding of the clinker, grinding aids (ethylene glycol and iron sulfate) and heat (heavy fuel oil) for the drying of additions.

## Time period
Time period corresponds to data collection (2017-2021).

## Reference product
- cement, CEM II/A: 1 kg; name cement; source Werner F. 2022; By-product classification allocatable product; CPC 37440: Portland cement, aluminous cement, slag cement and similar hydraulic cements, except in the form of clinkers; HS2017 252329: Cement; portland, other than white, whether or not artificially coloured
  Value provided by cemsuisse as an average from all cement producing plants in Switzerland.
  production volume 1.30322e9 kg; name APV_cement; = 4177*10^6*0.312
    Total production volume of cement in Switzerland in 2021: 4'177'000 metric ton. Market share of cement, CEM II/A is 31.2%. Source: cemsuisse (2022), Jahresbericht cemsuisse 2022, page 9. Available at: https://www.cemsuisse.ch/jahresberichte/, accessed on 20.06.2023.
  property price 0.0615 EUR2005
    2005 import and export prices (total trades (USD) divided by total weight (kg) in China, India, USA, Japan, Russia and Europe, major producers and consumers (http://www.cementchina.net/freport/showfre.asp?id=749) from UN Commodity Trade Statistics Database (http://data.un.org/Explorer.aspxDatabase [Accessed 2 July 2010]). Commodity: Cement (portland, aluminious, slag or hydraulic)
  properties: carbon allocation 0 kg, carbon content 0, carbon content, fossil 0, carbon content, non-fossil 0, dry mass 1 kg, water content 0, water in wet mass 0 kg, wet mass 1 kg

## Inputs from technosphere
All rows: source Werner F. 2022
- cement factory: 5.31e-11 unit; = 5.31E-11*cement+0*silica_fume+0*ggbfs; lognormal variance with pedigree 0.308, pedigree (1,1,4,1,1)
  Value provided by cemsuisse as an average from all cement producing plants in Switzerland.
  This exchange has an activity link directly to the producing activity because the product is primarily consumed in the same geographical area where it is produced.
- clinker: 0.777 kg; = 0.777*cement+0*silica_fume+0*ggbfs; lognormal variance with pedigree 0.0086, pedigree (1,1,4,1,1)
  Value provided by cemsuisse as an average from all cement producing plants in Switzerland. An activity-link was added to this exchange to "clinker production / CH", since clinker is produced in the same factory as the cement is produced.
  properties: dry mass 1 kg, wet mass 1 kg
- electricity, medium voltage: 0.0268 kWh; = 0.0268*cement+0*silica_fume+0*ggbfs; lognormal variance with pedigree 0.0086, pedigree (1,1,4,1,1)
  Value provided by cemsuisse as an average from all cement producing plants in Switzerland.
- ethylene glycol: 5.49e-5 kg; = 0.0000549*cement+0*silica_fume+0*ggbfs; lognormal variance with pedigree 0.0086, pedigree (1,1,4,1,1)
  Ancillary product for grinding; value provided by cemsuisse as an average from all cement producing plants in Switzerland.
  properties: carbon content, fossil 0.387097, dry mass 1 kg, heating value, net 23.44 MJ, wet mass 1 kg
- ground granulated blast furnace slag: 0.00094 kg; = 0.00188*0.5*cement+0*silica_fume+0*ggbfs; lognormal variance with pedigree 0.0086, pedigree (1,1,4,1,1)
  Value provided by cemsuisse as an average from all cement producing plants in Switzerland; assuming that 50% of the slag comes grinded and does not need further drying.
  properties: dry mass 1 kg, wet mass 1 kg
- gypsum, mineral: 0.0491 kg; = 0.0491*cement+0*silica_fume+0*ggbfs; lognormal variance with pedigree 0.0086, pedigree (1,1,4,1,1)
  Value provided by cemsuisse as an average from all cement producing plants in Switzerland.
  properties: dry mass 1 kg, wet mass 1 kg
- heat, district or industrial, other than natural gas: 0.002774 MJ; = 0.00292*0,95*cement+0*silica_fume+0*ggbfs; lognormal variance with pedigree 0.0086, pedigree (1,1,4,1,1)
  Value provided by cemsuisse as an average from all cement producing plants in Switzerland; assuming an efficiency of 95% to cover fuel input to heat. An activity-link was added to this exchange to "heat production, heavy fuel oil, at industrial furnace 1 MW / CH", since heavy fuel oil is used in the production process.
  properties: heating value, net 1 MJ
- iron sulfate: 0.00415 kg; = 4.15E-3*cement+0*silica_fume+0*ggbfs; lognormal variance with pedigree 0.0086, pedigree (1,1,4,1,1)
  (same comment as for cement factory)
  properties: dry mass 1 kg, wet mass 1 kg
- limestone, crushed, for mill: 0.15 kg; name limestone; = 0.15*cement+0*silica_fume+0*ggbfs; lognormal variance with pedigree 0.0086, pedigree (1,1,4,1,1)
  Value provided by cemsuisse as an average from all cement producing plants in Switzerland.
  properties: carbon content, fossil 0.117492, dry mass 0.998 kg, water content 0.00200401, wet mass 1 kg
- steel, low-alloyed: 4.07e-5 kg; name steel; = 4.07E-05*cement+0*silica_fume+0*ggbfs; lognormal variance with pedigree 0.0086, pedigree (1,1,4,1,1)
  Value provided by cemsuisse as an average from all cement producing plants in Switzerland.
  properties: carbon content, fossil 0.005, dry mass 1 kg, wet mass 1 kg

## Sampling procedure
Data represents the average Swiss production of the 6 cement plants for the years 2017 to 2021 that were operational in 2021.
