# treatment of residues, MSWI, waste textile, soiled, residual material landfill

Dataset: EcoSpold 2, unit process
Geography: GLO
Time period: 1994-01-01 to 2023-12-31
Technology level: current
Classification: ISIC rev.4 ecoinvent: 3822:Treatment and disposal of hazardous waste
Scenario: Business-as-Usual
System model: Allocation, cut-off by classification
Generated by: Mattia Clementi
Database: ecoinvent
isCopyrightProtected: true
accessRestrictedTo: 1

## General comment
The process represents the treatment of controlled landfilling in residual material landfill of a waste (residues) that is exclusively produced in another waste treatment. Residues are a by-product that is generated during the municipal solid waste incineration (MSWI) of 'waste textile, soiled'. Recommended use of this dataset: to be used within the specific chain of treatments for 'waste textile, soiled'. Share of biogenic carbon in the sludge: 72.071%.

## Included activities start
The activity starts with the waste being available at the gate of the treatment facility. Collection and transportation of the waste to the treatment plant is not included.

## Included activities end
The activity ends with the waste being treated and waste-specific emissions from the landfill are released to water (short-term emissions to river water and long-term emissions to ground water).

## Geography
Modelling parameters affecting the treatment technology are not specific to this geography.

## Technology
Residual material landfill for polluted, inorganic waste with base seal and leachate collection system (landfill type C). Recultivation after closure.

## Reference product
- residues, MSWI, waste textile, soiled: -1 kg; By-product classification Waste; CPC 3932: Ash and residue (except from the manufacture of iron or steel), containing metals or metallic compounds, except[…]; HS2017 262110: Slag and ash; ash and residues from the incineration of municipal waste
  main reference product of this activity (supply of disposal service).
  production volume 4.75893e7 kg
    calculated in proportion to incinerated waste reference product
  property price 0 EUR2005
    Waste products are assigned a price of zero as they are assumed to require further treatment.
  properties: arsenic content 2.61838e-6, cadmium content 2.35204e-6, carbon allocation 0.0327686 kg, carbon content 0.0327686, carbon content, fossil 0.00915208, carbon content, non-fossil 0.0236165, chlorine content 0.0364122, chromium content 1.6404e-5, copper content 0.000311864, dry mass 1 kg, lead content 0.000837691, mercury content 3.60033e-9, nickel content 6.04282e-7, nitrogen content 0.000269604, oxygen content 0.588475, phosphorus content 0.000343233, sulfur content 0.335896, thallium content 1.231e-6, water content 0, water in wet mass 0 kg, wet mass 1 kg, zinc content 0.00466184

## Inputs from technosphere
- cement, unspecified: 0.4 kg; lognormal variance with pedigree 0.049084, pedigree (1,1,5,1,1)
  cement required for solidification of landfilled residual material
  Uncertainty: Uncertainty calculated from uncertainty of composition of incinerated waste, and incinerator model uncertainty and residual material landfill transfer coefficient uncertainty.
  properties: dry mass 1 kg, wet mass 1 kg
- process-specific burdens, residual material landfill: 0.71109, 0.00841689, 0.280494 kg (3 suppliers, which the file names only by identifier); sum of these 1 kg
  mass-specific expenditures required for landfilling of residual material
- residual material landfill: 2.0833e-9 unit
  residual material landfill infrastructure required for landfilling of residual material
- waste cement, hydrated: -4.81263e-5, -0.998037, -0.00191494 kg (3 suppliers, which the file names only by identifier); sum of these -1 kg
  hydrated cement output for solidification of landfilled residual material
  production volume
    calculated in proportion to incineration residues landfilled
  properties: dry mass 1 kg, wet mass 1 kg

## Inputs from nature
- Organic carbon, placed in landfill [inventory indicator, waste]: 0.032769 kg
  Mass of organic carbon in waste (without inorganic carbon), initially put in residual material landfill. The exchange represents a flow that is within the technosphere. This exchange should only be used to apply ecofactors for the Swiss LCIA method of Ecological Scarcity and not any other purpose.
- Waste mass, total, placed in landfill [inventory indicator, waste]: 1 kg
  Mass of waste initially put in a residual material landfill. The exchange represents a flow that is within the technosphere. This exchange should only be used to apply ecofactors for the Swiss LCIA method of Ecological Scarcity and not any other purpose.

## Emissions to nature
- Hazardous waste disposed [inventory indicator, waste]: 1 kg
  Inventory indicator for waste mass disposed. To be used in EN15804 "other data" results.
- Arsenic ion [water, ground-, long-term]: 2.6184e-15 kg; lognormal variance with pedigree 1.8148, pedigree (1,1,5,1,1)
  complement of long-term emissions from residual material in residual material landfill
  Uncertainty: Uncertainty calculated from uncertainty of composition of incinerated waste, and incinerator model uncertainty and residual material landfill transfer coefficient uncertainty.
- Arsenic ion [water, surface water]: 2.6184e-6 kg; lognormal variance with pedigree 1.7911, pedigree (1,1,5,1,1)
  short-term emissions from residual material in residual material landfill
  Uncertainty: Uncertainty calculated from uncertainty of composition of incinerated waste, and incinerator model uncertainty and residual material landfill transfer coefficient uncertainty.
- BOD5, Biological Oxygen Demand [water, ground-, long-term]: 0.017505 kg; lognormal variance with pedigree 0.070569, pedigree (1,1,5,1,1)
  (same comment as for Arsenic ion)
- BOD5, Biological Oxygen Demand [water, surface water]: 2.9224e-5 kg; lognormal variance with pedigree 0.66598, pedigree (1,1,5,1,1)
  (same comment as for Arsenic ion)
- COD, Chemical Oxygen Demand [water, ground-, long-term]: 0.053517 kg; lognormal variance with pedigree 0.070569, pedigree (1,1,5,1,1)
  (same comment as for Arsenic ion)
- COD, Chemical Oxygen Demand [water, surface water]: 8.9344e-5 kg; lognormal variance with pedigree 0.66598, pedigree (1,1,5,1,1)
  (same comment as for Arsenic ion)
- Cadmium II [water, ground-, long-term]: 1.5968e-8 kg; lognormal variance with pedigree 8.1375, pedigree (1,1,5,1,1)
  (same comment as for Arsenic ion)
- Cadmium II [water, surface water]: 2.6657e-11 kg; lognormal variance with pedigree 3.1497, pedigree (1,1,5,1,1)
  (same comment as for Arsenic ion)
- Chloride [water, ground-, long-term]: 0.025998 kg; lognormal variance with pedigree 0.57894, pedigree (1,1,5,1,1)
  (same comment as for Arsenic ion)
- Chloride [water, surface water]: 0.010414 kg; lognormal variance with pedigree 0.61629, pedigree (1,1,5,1,1)
  (same comment as for Arsenic ion)
- Chromium VI [water, ground-, long-term]: 3.1149e-6 kg; lognormal variance with pedigree 1.5373, pedigree (1,1,5,1,1)
  (same comment as for Arsenic ion)
- Chromium VI [water, surface water]: 9.8609e-7 kg; lognormal variance with pedigree 1.6983, pedigree (1,1,5,1,1)
  (same comment as for Arsenic ion)
- Copper ion [water, ground-, long-term]: 1.2005e-5 kg; lognormal variance with pedigree 3.707, pedigree (1,1,5,1,1)
  (same comment as for Arsenic ion)
- Copper ion [water, surface water]: 2.0042e-8 kg; lognormal variance with pedigree 2.0687, pedigree (1,1,5,1,1)
  (same comment as for Arsenic ion)
- DOC, Dissolved Organic Carbon [water, ground-, long-term]: 0.021177 kg; lognormal variance with pedigree 0.070569, pedigree (1,1,5,1,1)
  (same comment as for Arsenic ion)
- DOC, Dissolved Organic Carbon [water, surface water]: 3.5354e-5 kg; lognormal variance with pedigree 0.66598, pedigree (1,1,5,1,1)
  (same comment as for Arsenic ion)
- Lead II [water, ground-, long-term]: 4.3452e-6 kg; lognormal variance with pedigree 8.0369, pedigree (1,1,5,1,1)
  (same comment as for Arsenic ion)
- Lead II [water, surface water]: 7.2541e-9 kg; lognormal variance with pedigree 2.3946, pedigree (1,1,5,1,1)
  (same comment as for Arsenic ion)
- Mercury II [water, ground-, long-term]: 1.6994e-10 kg; lognormal variance with pedigree 3.7206, pedigree (1,1,5,1,1)
  (same comment as for Arsenic ion)
- Mercury II [water, surface water]: 2.8371e-13 kg; lognormal variance with pedigree 2.377, pedigree (1,1,5,1,1)
  (same comment as for Arsenic ion)
- Nickel II [water, ground-, long-term]: 2.1877e-7 kg; lognormal variance with pedigree 1.5723, pedigree (1,1,5,1,1)
  (same comment as for Arsenic ion)
- Nickel II [water, surface water]: 3.6523e-10 kg; lognormal variance with pedigree 2.0327, pedigree (1,1,5,1,1)
  (same comment as for Arsenic ion)
- Nitrate [water, ground-, long-term]: 0.0009685 kg; lognormal variance with pedigree 0.18664, pedigree (1,1,5,1,1)
  (same comment as for Arsenic ion)
- Nitrate [water, surface water]: 0.00022546 kg; lognormal variance with pedigree 0.25343, pedigree (1,1,5,1,1)
  (same comment as for Arsenic ion)
- Phosphate [water, ground-, long-term]: 0.00023512 kg; lognormal variance with pedigree 1.3562, pedigree (1,1,5,1,1)
  (same comment as for Arsenic ion)
- Phosphate [water, surface water]: 3.9252e-7 kg; lognormal variance with pedigree 1.5767, pedigree (1,1,5,1,1)
  (same comment as for Arsenic ion)
- Sulfate [water, ground-, long-term]: 0.89958 kg; lognormal variance with pedigree 0.24163, pedigree (1,1,5,1,1)
  (same comment as for Arsenic ion)
- Sulfate [water, surface water]: 0.10811 kg; lognormal variance with pedigree 0.35488, pedigree (1,1,5,1,1)
  (same comment as for Arsenic ion)
- TOC, Total Organic Carbon [water, ground-, long-term]: 0.021177 kg; lognormal variance with pedigree 0.070569, pedigree (1,1,5,1,1)
  (same comment as for Arsenic ion)
- TOC, Total Organic Carbon [water, surface water]: 3.5354e-5 kg; lognormal variance with pedigree 0.66598, pedigree (1,1,5,1,1)
  (same comment as for Arsenic ion)
- Thallium I [water, ground-, long-term]: 4.4567e-7 kg; lognormal variance with pedigree 2.1712, pedigree (1,1,5,1,1)
  (same comment as for Arsenic ion)
- Thallium I [water, surface water]: 7.4402e-10 kg; lognormal variance with pedigree 2.6316, pedigree (1,1,5,1,1)
  (same comment as for Arsenic ion)
- Zinc II [water, ground-, long-term]: 5.7136e-5 kg; lognormal variance with pedigree 5.7815, pedigree (1,1,5,1,1)
  (same comment as for Arsenic ion)
- Zinc II [water, surface water]: 9.5385e-8 kg; lognormal variance with pedigree 2.1032, pedigree (1,1,5,1,1)
  (same comment as for Arsenic ion)
