# treatment of used cathode ray tube display, manual dismantling

Dataset: EcoSpold 2, unit process
Geography: RoW
Time period: 2005-01-01 to 2023-12-31
Technology level: current
Classification: ISIC rev.4 ecoinvent: 3830:Materials recovery
Scenario: Business-as-Usual
System model: Allocation, cut-off by classification
Share of production covered: 100 %
Generated by: Roland Hischier
Published in: Hischier R. 2007
Database: ecoinvent
isCopyrightProtected: true
accessRestrictedTo: 1

## General comment
The process represents the treatment 'used cathode ray tube display' by manual dismantling in various fractions.

## Included activities start
The activity starts with the waste being available at the gate of the treatment facility. Collection and transportation of the waste to the treatment plant is not included.

## Included activities end
This activity ends when the used cathode ray tube has been dismantled manually.

## Geography
Modelling parameters are not specific to this geography.

## Technology
Commonly performed manual dismantling activities

## Reference product
- used cathode ray tube display: -1 kg; name used_CRT_RP; By-product classification Waste; CPC 39990: Other wastes n.e.c.
  production volume 47.5612 kg; name RP_PV_1
    calculated from the swiss PV and scaled up based on swiss GDP (0.23/0.481%)
  property carbon content, fossil 0.163203
    Composition data from CRT screen, divided by its weight, 19.86 kg (Tab 4.12, ecoinvent v2.2 report 18_V)
  property carbon content, non-fossil 0.00235652
    (same comment as for used cathode ray tube display)
  property price 0 EUR2005
    Waste products are assigned a price of zero as they are assumed to require further treatment.
  properties: carbon allocation 0.16556 kg, carbon content 0.16556, dry mass 1 kg, water content 0, water in wet mass 0 kg, wet mass 1 kg

## Inputs from technosphere
- glass from used cathode ray tube: -0.5336 kg; name glass_BP; lognormal variance with pedigree 0.016, pedigree (3,4,1,5,1)
  Calculated - based on composition data
  Uncertainty: calculated - based on composition data
  production volume
    Calculated from the production volume of used cathode ray tube display in proportion to the respective output amounts.
  properties: carbon content, fossil 0.00299576, dry mass 1 kg, wet mass 1 kg
- manual treatment facility, waste electric and electronic equipment: 1.6e-8 unit; lognormal variance with pedigree 0.578, pedigree (4,5,5,5,5)
  Rough estimation of infrastructure
  Uncertainty: rough estimation of infrastructure
- scrap steel: -0.148653, -0.0710471 kg (2 suppliers, which the file names only by identifier); sum of these -0.2197 kg; = ABS(used_CRT_RP)- used_cable_BP- used_PWB_BP- shredder_fraction_BP- glass_BP- waste_plastic_BP; lognormal variance with pedigree 0.014, pedigree (3,4,1,1,1)
  Calculated value; the scrap steel as an exchange was not present in ecoinvent v2 due to cut-off rules.
  Uncertainty: calculated - based on composition data
  production volume; = ABS(RP_PV_1 * (BP_amount_1 / used_CRT_RP))
    Calculated from production volume of reference product using the relative outputs.
  properties: dry mass 1 kg, wet mass 1 kg
- shredder fraction after manual dismantling of used electronic product: -0.0362 kg; name shredder_fraction_BP; lognormal variance with pedigree 0.016, pedigree (3,4,1,5,1)
  Calculated - based on composition data
  Uncertainty: calculated - based on composition data
  production volume
    (same comment as for glass from used cathode ray tube)
  properties: carbon content, fossil 0.287536, dry mass 1 kg, heating value, net 8.71 MJ, wet mass 1 kg
  note on carbon content, fossil: C content calculated out of (input) shredder fraction composition in Tab 4.47 (ecoinvent v2.2 report 18_V). Carbon content in plastic was calculated using data in Tab A.2, ecoinvent v2.2 report 13_I. Others was also considered plastic, and calculated the same way (from pg 70, ecoinvent v2.2 report 18_V). Ferro was assumed to have a C content of 0.012 kg C/ kg (C content of steel, calculated out of emission factors published in Commission Decision of 18 July 2007 establishing guidelines for the monitoring and reporting of greenhouse gas emissions pursuant to Directive 2003/87/EC of the European Parliament and of the Council (notified under document number C(2007) 3416)). The other component of the fraction were considered to content no C.
- used cable: -0.0231 kg; name used_cable_BP; lognormal variance with pedigree 0.016, pedigree (3,4,1,5,1)
  Calculated - based on composition data
  Uncertainty: calculated - based on composition data
  production volume; = ABS(RP_PV_1 * (used_cable_BP / used_CRT_RP))
    Calculated from production volume of reference product using the relative outputs.
  properties: carbon content, fossil 0.27472, dry mass 1 kg, wet mass 1 kg
  note on carbon content, fossil: According to the European company, 1 kg cable is split up into 0.66 kg of copper and 0.34 kg of plastics (ecoinvent v2.2 report 18_V, pg 97). Plastic C content (0.808) was calculated using data in Tab A.2, ecoinvent v2.2 report 13_I.
- used printed wiring boards: -0.0235 kg; name used_PWB_BP; lognormal variance with pedigree 0.016, pedigree (3,4,1,5,1)
  Calculated - based on composition data
  Uncertainty: calculated - based on composition data
  production volume
    (same comment as for glass from used cathode ray tube)
  properties: carbon content, fossil 0.193742, carbon content, non-fossil 0.000960142, dry mass 1 kg, wet mass 1 kg
  note on carbon content, fossil: Composition of printed wiring boards used to calculate C content
- waste plastic, consumer electronics: -0.1639 kg; name waste_plastic_BP; lognormal variance with pedigree 0.016, pedigree (3,4,1,5,1)
  Calculated - based on composition data
  Uncertainty: calculated - based on composition data
  production volume
    (same comment as for glass from used cathode ray tube)
  properties: carbon content, fossil 0.830215, dry mass 0.847 kg, heating value, net 34.78 MJ, water content 0.180638, wet mass 1 kg
  note on carbon content, fossil: C content in 1 kg DM was calculated using data in Tab A.2, ecoinvent v2.2 report 13_I
  note on heating value, net: Assumed equal to "waste plastic, consumer electronics, sorted".

## Sampling procedure
own experiences

## Extrapolations
This dataset has been copied from an original dataset covering the geography CH. The uncertainty and Production Volume (PV) has been adjusted accordingly.

## Review by Jürgen Sutter 2007-08-31
passed.

## Review by Emilia Moreno Ruiz 2012-12-19
correction of exchange "used cable"
