# calcium chloride to generic market for de-icer

Dataset: EcoSpold 2, unit process
Geography: RoW
Time period: 2012-01-01 to 2023-12-31
Technology level: current
Classification: ISIC rev.4 ecoinvent: 2011:Manufacture of basic chemicals
Classification: EcoSpold01Categories: chemicals/organics
Scenario: Business-as-Usual
System model: Allocation, cut-off by classification
Generated by: Sofia Parada Tur
Database: ecoinvent
isCopyrightProtected: true
accessRestrictedTo: 1

## General comment
This activity links the byproduct calcium chloride to the generic market for de-icer.
All chemicals that enter this market provide the function of a de-icer.
When the use of methanol is mandatory, this will be obtained from the market for methanol. In such case, the user will be accessing a niche market, because it defines specific product features aimed at satisfying specific market needs. When there are no specific product attributes to be fulfilled, these will be satisfied in the generic market. In the generic market the consumption of one product over another wil only be driven by best available price and not by the product attributes.

## Technology
non applicable

## Reference product
- de-icer: 1 kg; By-product classification allocatable product; CPC 34231: Chemical elements n.e.c.; inorganic acids except phosphoric, nitric and sulphonitric; inorganic oxygen compoun[…]; HS2017 281290: Halides and halide oxides of non-metals; excluding chloride
  production volume 5.6994e8 kg; = 0.3*2.3E9
    The Ullmann encyclopedia identifies calcium chloride application as de-icing to be 30% of the total calcium chloride applications in the USA (Ullmann encyclopedia, calcium chloride 2012). The same relative amount is assumed for the global consumption of calcium chloride.
    ICIS states that the amount consumed of calcium chloride is 2.3 E9 kg. This represents 70% of the available capacity, which is 3.4E9 kg, and is not fully utilised.
    (ICIS petrochemical and chemical information provider, 2005. URL: http://www.icis.com/Articles/2005/04/15/669096/product-profile-calcium-chloride.html)
  property price 0.13 EUR2005
    Temporary price data. Calculated as 90% of purchasers price based on: 2004 import and export prices (total trades (USD) divided by total weight (kg) in EU27, USA, China, Japan and India) from UN data - Calcium chloride (http://data.un.org/Data.aspx?q=calcium+chloride&d=ComTrade&f=_l1Code%3a29%3bcmdCode%3a282720; accessed 1 June 10).
  properties: carbon allocation 0 kg, carbon content 0, carbon content, fossil 0, carbon content, non-fossil 0, dry mass 1 kg, water content 0, water in wet mass 0 kg, wet mass 1 kg

## Inputs from technosphere
- calcium chloride: 1 kg; lognormal variance with pedigree 0.0166, pedigree (4,1,4,1,1)
  properties: dry mass 1 kg, wet mass 1 kg
