# phosphate rock beneficiation

Dataset: EcoSpold 2, unit process
Geography: US
Time period: 1986-01-01 to 2023-12-31
Technology level: current
Classification: ISIC rev.4 ecoinvent: 0891:Mining of chemical and fertilizer minerals
Tags: ConvertedDataset
Scenario: Business-as-Usual
System model: Allocation, cut-off by classification
Share of production covered: 15 %
Generated by: Alex Primas
Published in: Althaus H.-J. 2007
Database: ecoinvent
isCopyrightProtected: true
accessRestrictedTo: 1

## General comment
Large uncertainties exist for data on particle emissions from transfer and storage. Also data of emissions to water and soil are uncertain due to missing data of uncontrolled run off which was estimated. Energy consumption data related to mass of rock moved.
The datasets was updated from producing 'phosphate rock, as P2O5, beneficiated, wet' into 'phosphate rock, beneficiated' and therefore the dataset has been scaled with a factor of 0.29 kg of phosphate rock, beneficiated per kg of phosphate rock, as P2O5, beneficiated, wet.

## Included activities end
Mining process, transport to beneficiation plant, wet processing including screening, washing and flotation. No drying of calcination included. Land use for mining and reclamation.

## Geography
Assumption for production in U.S. based mainly on data from Florida. Various processes with location RER used.

## Technology
U.S. technology for wet rock processing. No specific age of technology modelled

## Time period
Time of literature publication. Measurements took place partly before this period.

## Parameters
- fraction, process water, to air: 0.34 dimensionless; name fraction_PW_to_air; lognormal variance with pedigree 0.092025, pedigree (4,4,3,2,4)
  Literature value (Statistics Canada, 2007 & Shaffer, K.H., 2008, Consumptive water use in the Great Lakes Basin, USGS) (Vionnet, S., Quantis Water Database - Technical Report, 2012).

## Reference product
- phosphate rock, beneficiated: 1 kg; By-product classification allocatable product; CPC 34629: Other phosphatic fertilizers, n.e.c.; HS2017 2510: Natural calcium phosphates; natural aluminium calcium phosphates and phosphatic chalk; CAS 1306-05-4
  Uncertainty not applicable for output
  production volume 2.5365e9 kg
    11.2 Mt as P2O5 in 2000, 38.6 Mt as Rock in 2000 Source: IFA production and trade statistics http://www.fertilizer.org/ifa/Home-Page/STATISTICS/Production-and-trade divided evenly between wet and dry product
  property oxygen content 0.180345
    Oxygen content (on a dry matter basis) of phosphate rock, beneficiated is calculated from the molecular formula of the substance (32% P2O5).
  property phosphorus content 0.139655
    Phosphorus content (on a dry matter basis) of phosphate rock, beneficiated is calculated from the molecular formula of the substance (32% P2O5).
  property price 0.049 EUR2005
    Calculated value based on data from United Nations Commodity Trade Statistics Database (comtrade.un.org). UN comtrade category: 251010 Natural calcium phosphates, unground. Year 2005. Using exchange rate of 1EURO = 1.209 USD. Average of price of import into 5 main markets (EU, US, JP, IN and CN).
  properties: carbon allocation 0 kg, carbon content 0, carbon content, fossil 0, carbon content, non-fossil 0, dry mass 1 kg, water content 0, water in wet mass 0 kg, wet mass 1 kg

## Inputs from technosphere
- diesel, burned in building machine: 0.0551 MJ; lognormal variance with pedigree 0.059225, pedigree (2,3,5,2,3)
  61% of world production 1994
  Uncertainty: 6
  properties: heating value, net 1 MJ
- electricity, medium voltage: 0.08062 kWh; lognormal variance with pedigree 0.1232, pedigree (2,3,5,5,4)
  61% of world production 1994, European mix
  Uncertainty: 6
- ethylene diamine: 0.000812 kg; lognormal variance with pedigree 0.2532, pedigree (2,3,5,5,5)
  Average data from U.S study; proxy used
  Uncertainty: A
  properties: carbon content, fossil 0.5, dry mass 1 kg, heating value, net 28.24 MJ, wet mass 1 kg
- light fuel oil: 0.002987 kg; lognormal variance with pedigree 0.1232, pedigree (2,3,5,5,4)
  Average data from U.S study, Location RER
  Uncertainty: A
  properties: carbon content, fossil 0.862, dry mass 1 kg, heating value, net 42.6 MJ, wet mass 1 kg
- mine infrastructure, phosphate rock: 1.0005e-11 unit; lognormal variance with pedigree 0.448, pedigree (4,5,5,5,4)
  Estimated with weak data from 2 sites;activityLink introduced to establish a direct link to the corresponding regional supply of this product
  Uncertainty: E
- palm oil, crude: 0.002001 kg; lognormal variance with pedigree 0.2532, pedigree (2,3,5,5,5)
  Average data from U.S study; proxy used
  Uncertainty: A
  properties: carbon content, non-fossil 0.752881, dry mass 1 kg, heating value, net 37 MJ, wet mass 1 kg
  note on carbon content, non-fossil: C49H97O6. Palm oil (tab 17.4, ecoinvent v2.2 report 17-part 17)
  note on heating value, net: Literature value, Source: Biograce, Condensed list of standard values, version 2 - Public. Available at: https://biograce.net/app/webroot/files/file/BioGrace_condensed_list_of_standard_values_-_version_2_-_Public.doc
- soda ash, light: 0.002001 kg; lognormal variance with pedigree 0.1232, pedigree (2,3,5,5,4)
  Average data from U.S study, Location RER
  Uncertainty: A
  properties: carbon content, fossil 0.0517241, dry mass 1 kg, heating value, net 3.43 MJ, wet mass 1 kg
- sodium silicate, spray powder, 80%: 0.000609 kg; lognormal variance with pedigree 0.1232, pedigree (2,3,5,5,4)
  Average data from U.S study, Location RER
  Uncertainty: A
  properties: dry mass 1 kg, wet mass 1 kg
- sulfuric acid: 0.002987 kg; lognormal variance with pedigree 0.1232, pedigree (2,3,5,5,4)
  Average data from U.S study, Location RER
  Uncertainty: A
  properties: dry mass 1 kg, wet mass 1 kg

## Inputs from nature
- Fluorine [natural resource, in ground]: 0.04495 kg; lognormal variance with pedigree 0.0527, pedigree (3,3,5,3,1)
  4.5% F in apatite; 1% F in ore; Data for process loss estimated
  Uncertainty: D
- Occupation, construction site [natural resource, land]: 0.003161 m2*year; lognormal variance with pedigree 0.1367, pedigree (4,3,5,3,3)
  Reclamation time for clay ponds may vary largely
  Uncertainty: R
- Occupation, mineral extraction site [natural resource, land]: 0.012789 m2*year; lognormal variance with pedigree 0.1113, pedigree (2,3,5,3,1)
  Data from 1970-1989 for Florida
  Uncertainty: D
- Phosphorus [natural resource, in ground]: 0.1798 kg; lognormal variance with pedigree 0.0402, pedigree (1,2,5,3,1)
  18% P in apatite; 4% in ore; Data of year 2001 from Florida used
  Uncertainty: D
- Transformation, from forest, unspecified [natural resource, land]: 0.0001914 m2; lognormal variance with pedigree 0.1913, pedigree (2,3,5,3,1)
  Data from 1970-1989 for Florida
  Uncertainty: D
- Transformation, from mineral extraction site [natural resource, land]: 0.0006409 m2; lognormal variance with pedigree 0.1913, pedigree (2,3,5,3,1)
  Data from 1970-1989 for Florida
  Uncertainty: D
- Transformation, from pasture, man made [natural resource, land]: 0.0004466 m2; lognormal variance with pedigree 0.1913, pedigree (2,3,5,3,1)
  Data from 1970-1989 for Florida
  Uncertainty: D
- Transformation, to forest, unspecified [natural resource, land]: 9.57e-5 m2; lognormal variance with pedigree 0.1913, pedigree (2,3,5,3,1)
  Data from 1970-1989 for Florida
  Uncertainty: D
- Transformation, to mineral extraction site [natural resource, land]: 0.0006409 m2; lognormal variance with pedigree 0.1913, pedigree (2,3,5,3,1)
  Data from 1970-1989 for Florida
  Uncertainty: D
- Transformation, to pasture, man made [natural resource, land]: 0.0005452 m2; lognormal variance with pedigree 0.1913, pedigree (2,3,5,3,1)
  Data from 1970-1989 for Florida
  Uncertainty: D
- Water, well, in ground [natural resource, in water]: 0.0029 m3; name water_well_in_ground_input; lognormal variance with pedigree 0.0407, pedigree (1,3,5,3,1)
  Average data of 7 mines from 1991-2000
  Uncertainty: A

## Emissions to nature
- Lead-210 [air, non-urban air or from high stacks]: 0.0006786 kBq; lognormal variance with pedigree 0.4241, pedigree (4,5,5,3,3)
  Calculated from dust emissions
  Uncertainty: C
- Particulate Matter, < 2.5 um [air, non-urban air or from high stacks]: 0.0001189 kg; lognormal variance with pedigree 0.4081, pedigree (3,5,5,3,3)
  U.S. data from 1970 and data of coal mining
  Uncertainty: U
- Particulate Matter, > 10 um [air, non-urban air or from high stacks]: 0.00058 kg; lognormal variance with pedigree 0.1481, pedigree (3,5,5,3,3)
  U.S. data from 1970 and data of coal mining
  Uncertainty: U
- Particulate Matter, > 2.5 um and < 10um [air, non-urban air or from high stacks]: 0.0002987 kg; lognormal variance with pedigree 0.2281, pedigree (3,5,5,3,3)
  U.S. data from 1970 and data of coal mining
  Uncertainty: U
- Polonium-210 [air, non-urban air or from high stacks]: 0.0006786 kBq; lognormal variance with pedigree 0.4241, pedigree (4,5,5,3,3)
  Calculated from dust emissions
  Uncertainty: C
- Radium-226 [air, non-urban air or from high stacks]: 0.0016994 kBq; lognormal variance with pedigree 0.4241, pedigree (4,5,5,3,3)
  Calculated from dust emissions
  Uncertainty: C
- Thorium-230 [air, non-urban air or from high stacks]: 0.0016994 kBq; lognormal variance with pedigree 0.4241, pedigree (4,5,5,3,3)
  Calculated from dust emissions
  Uncertainty: C
- Thorium-232 [air, non-urban air or from high stacks]: 2.987e-5 kBq; lognormal variance with pedigree 0.4241, pedigree (4,5,5,3,3)
  Calculated from dust emissions
  Uncertainty: C
- Uranium-234 [air, non-urban air or from high stacks]: 0.0016994 kBq; lognormal variance with pedigree 0.4241, pedigree (4,5,5,3,3)
  Calculated from dust emissions
  Uncertainty: C
- Uranium-238 [air, non-urban air or from high stacks]: 0.0016994 kBq; lognormal variance with pedigree 0.4241, pedigree (4,5,5,3,3)
  Calculated from dust emissions
  Uncertainty: C
- Water [air, unspecified]: 0.000986 m3; name water_to_air_unspecified; = (water_well_in_ground_input*fraction_PW_to_air); lognormal variance with pedigree 0.0807, pedigree (2,2,5,1,1)
  Calculated value based on literature values and expert opinion. See comments in the parametres' comment field.
  property fraction, origin: fresh water 1; name fraction_origin_fresh_water
  property fraction, origin: salt water 0; name fraction_origin_salt_water
  property fraction, origin: unspecified 0; name fraction_origin_unspecified
- Oils, unspecified [soil, industrial]: 0.001479 kg; lognormal variance with pedigree 0.2481, pedigree (5,5,5,3,4)
  Estimation from data of chemical demand
  Uncertainty: E
- BOD5, Biological Oxygen Demand [water, surface water]: 0.00019372 kg; lognormal variance with pedigree 0.1341, pedigree (4,5,5,3,3)
  Calculated from measured data
  Uncertainty: C
- COD, Chemical Oxygen Demand [water, surface water]: 0.00019372 kg; lognormal variance with pedigree 0.1341, pedigree (4,5,5,3,3)
  Calculated from measured data
  Uncertainty: C
- DOC, Dissolved Organic Carbon [water, surface water]: 1.4297e-7 kg; lognormal variance with pedigree 0.1341, pedigree (4,5,5,3,3)
  Calculated from measured data
  Uncertainty: C
- Fluoride [water, surface water]: 1.2992e-5 kg; lognormal variance with pedigree 0.1121, pedigree (3,4,5,3,3)
  Data from 1 site measured in 1990 and estimates
  Uncertainty: D
- Nitrogen [water, surface water]: 1.015e-5 kg; lognormal variance with pedigree 0.1121, pedigree (3,4,5,3,3)
  Data from 1 site measured in 1990 and estimates
  Uncertainty: D
- Phosphorus [water, surface water]: 2.6013e-5 kg; lognormal variance with pedigree 0.1121, pedigree (3,4,5,3,3)
  Data from 1 site measured in 1990 and estimates
  Uncertainty: D
- Radioactive species, alpha emitters [water, surface water]: 0.0012557 kBq; lognormal variance with pedigree 0.3721, pedigree (3,4,5,3,3)
  Data from 1 site measured in 1990 and estimates
  Uncertainty: D
- Sulfate [water, surface water]: 0.0008584 kg; lognormal variance with pedigree 0.1121, pedigree (3,4,5,3,3)
  Data from 1 site measured in 1990 and estimates
  Uncertainty: D
- Suspended solids, unspecified [water, surface water]: 6.496e-5 kg; lognormal variance with pedigree 0.1121, pedigree (3,4,5,3,3)
  Data from 1 site measured in 1990 and estimates
  Uncertainty: D
- TOC, Total Organic Carbon [water, surface water]: 5.191e-5 kg; lognormal variance with pedigree 0.1341, pedigree (4,5,5,3,3)
  Calculated from measured data
  Uncertainty: C
- Toluene [water, surface water]: 1.5602e-7 kg; lognormal variance with pedigree 0.3721, pedigree (3,4,5,3,3)
  Data from 1 site measured in 1990 and estimates
  Uncertainty: D
- Water [water, unspecified]: 0.001914 m3; name water_to_water_unspecified; = water_well_in_ground_input*(1-fraction_PW_to_air); lognormal variance with pedigree 0.0807, pedigree (2,2,5,1,1)
  (same comment as for Water)
  property carbon content, fossil 0; name C_content_fossil
  property carbon content, non-fossil 0; name C_content_non_fossil
  property dry mass 0 kg; name DM
  property fraction, origin: fresh water 1; name fraction_origin_fresh_water_Ww
  property fraction, origin: salt water 0; name fraction_origin_salt_water_Ww
  property fraction, origin: unspecified 0; name fraction_origin_unspecified_Ww
  property water in wet mass 1000 kg; name WWM
  property wet mass 1000 kg; name WM

## Sampling procedure
Data for emissions and land use based on various studies from Florida. Energy data based on a world-wide survey and some assumptions. Further data from literature and estimations.

## Extrapolations
Extrapolation from 1 producer having 15% market share for emission data. Therefore representativeness set to 15%. No extrapolation for energy and land use data. Representativeness of those data is much higher, estimated to be about by 80%.
