# formaldehyde production, methanol oxidation

Dataset: EcoSpold 2, unit process
Geography: RoW
Time period: 1997-01-01 to 2023-12-31
Technology level: current
Classification: ISIC rev.4 ecoinvent: 2011:Manufacture of basic chemicals
Synonyms: Methanal; Formalin; Oxomethane; Methylene oxide; Formol
Scenario: Business-as-Usual
System model: Allocation, cut-off by classification
Generated by: Mike Chudacoff
Published in: Althaus H.-J. 2007
Database: ecoinvent
isCopyrightProtected: true
accessRestrictedTo: 1

## General comment
This dataset represents the production of 1 kg of formaldehyde by oxidation of methanol. This process also produces steam, which carries part of the total environmental burdens. Formaldehyde is an organic chemical, which is a colorless gas at ambient temperature that has
a pungent, suffocating odor and polymerizes in the presence of acids or alkali agents. Formaldehyde is used for the production of:
- a large variety of resins generated through reaction with other compounds such as phenol or urea. These resins are used as adhesives, bonding agents, glues, paints, coating and other applications;
- MDI (methyl diisocyanate), for polyurethanes;
- polyoxymethylene, a formaldehyde polymer used as an engineering plastic;
- polyols for water-soluble paints and coatings;
- hydraulic fluids and lubricants, etc.
Formaldehyde is produced industrially by the oxidation/dehydrogenation of methanol (silver catalyst process) or by oxidation of methanol with air (Formox process). This dataset represents an average of these two processes. It is based on literature data.
References:
Althaus H.-J., Chudacoff M., Hischier R., Jungbluth N., Osses M. and Primas A. (2007) Life Cycle Inventories of Chemicals. Final report ecoinvent data v2.0 No. 8. Swiss Centre for Life Cycle Inventories, Dübendorf, CH.
Gendorf (2016) Umwelterklärung 2015, Werk Gendorf Industriepark, www.gendorf.de.

## Included activities start
The activity starts when the raw materials enter the process.

## Included activities end
This activity ends with the production of formaldehyde. It includes the processing of methanol, energy consumption, estimated infrastructure use, as well as emissions to water and air.

## Geography
The data in this dataset are not geography-specific. Some values are based on data from a large chemical factory located in Germany. These are assumed to be valid for this geography.

## Technology
Represents a current cross-section of actual plants in Europe. The inventory is based on 100% formaldehyde production. The inputs and outputs are an average of the Silver and Formox processes.
Silver process:
Initially, methanol is dehydrogenated and subsequently there is combustion of hydrogen overall resulting in the production of formaldehyde and water. The raction takes place with air over a crystalline silver catalyst.
Formox process:
Methanol is directly oxidized by air over a metal oxide catalyst at a temperature of 470 °C. excess heat is removed with an oil-transfer medium. The product gases are cooled, absorbed in water, and an aqueous 37% formaldehyde solution is obtained. (Wells, 1999)
References:
G. Margaret Wells, “Handbook of Petrochemicals and Processes”, 2nd edition, Ashgate, 1999
Althaus H.-J., Chudacoff M., Hischier R., Jungbluth N., Osses M. and Primas A. (2007) Life Cycle Inventories of Chemicals. Final report ecoinvent data v2.0 No. 8. Swiss Centre for Life Cycle Inventories, Dübendorf, CH.

## Time period
The data in this dataset come from different years, but overall form the most realistic picture of the production. Some values are based on data published by the Gendorf factory that were collected between 2011 and 2015. The time period has been adjusted accordingly. For more details, see the comments of the exchanges.

## Reference product
- formaldehyde: 1 kg; name RP; By-product classification allocatable product; CPC 34170: Ethers, alcohol peroxides, ether peroxides, epoxides, acetals and hemiacetals, and their halogenated, sulphona[…]; HS2017 291211: Aldehydes; acyclic, without other oxygen function, methanal (formaldehyde); CAS 50-00-0
  Formaldehyde is an organic chemical, which is a colorless gas at ambient temperature that has a pungent, suffocating odor and polymerizes in the presence of acids or alkali agents. Formaldehyde is used for the production of:
  - a large variety of resins generated through reaction with other compounds such as phenol or urea. These resins are used as adhesives, bonding agents, glues, paints, coating and other applications;
  - MDI (methyl diisocyanate), for polyurethanes;
  - polyoxymethylene, a formaldehyde polymer used as an engineering plastic;
  - polyols for water-soluble paints and coatings;
  - hydraulic fluids and lubricants, etc.
  production volume 1.6943e10 kg; name RP_PV
    Formaldehyde, 2-Butoxyethanol and 1-tert-Butoxypropan-2-ol. Summary of Data Reported and Evaluation. IARC Monographs on the Evaluation of Carcinogenic Risks to Humans. Volume 88. Geneve: WHO. (http://monographs.iarc.fr/ENG/Monographs/vol88/volume88.pdf)
  property heating value, net 20.19 MJ
    LHV is calculated based on the elemental composition of the substance. Based on the CAS number of the substance (000050-00-0), the chemical formula of the substance is found to be: CH2O, (PubChem 2020).
    Reference: Kim, S., Chen, J., Cheng, T., Gindulyte, A., He, J., He, S., Li, Q., Shoemaker, B. A., Thiessen, P. A., Yu, B., Zaslavsky, L., Zhang, J., & Bolton, E. E. (2019). PubChem 2019 update: improved access to chemical data. Nucleic acids research, 47(D1), D1102–D1109. https://doi.org/10.1093/nar/gky1033
  property price 0.239 EUR2005
    Temporary price data. Calculated as 90% of purchasers price based on: 2004 import/export prices (total trades (USD) divided by total weight (kg) in EU27, USA, China, Japan and India) from UN data - Methanal (formaldehyde) (http://data.un.org/Data.aspx?q=Formaldehyde&d=ComTrade&f=_l1Code%3a30%3bcmdCode%3a291211; accessed 1 June 10).
  properties: allocation factor 0.873857, carbon allocation 0.4 kg, carbon content 0.4, carbon content, fossil 0.4, carbon content, non-fossil 0, dry mass 1 kg, true value 0.239, water content 0, water in wet mass 0 kg, wet mass 1 kg

## Inputs from technosphere
- chemical factory, organics: 3.49543e-10 unit; lognormal variance with pedigree 0.31, pedigree (2,3,2,4,3)
  Calculated based on literature data published by the industry. For this activity, no information was readily available concerning infrastructure and land-use. Therefore, the infrastructure is estimated based on data from two chemical factories, the BASF site of Ludwigshafen and the chemical factory in Gendorf (which are both located in Germany), which produce a wide range of chemical substances. Based on this data, the following assumptions are made: the built area amounts to about 4.2 ha, the plant has an average output of 50'000 t/a and a lifespan of fifty years. The estimated infrastructure amount is therefore 4.00 E-10 units per kg of produced chemical.
  References:
  Althaus H.-J., Chudacoff M., Hischier R., Jungbluth N., Osses M. and Primas A. (2007) Life Cycle Inventories of Chemicals. ecoinvent report No. 8, v2.0. EMPA Dübendorf, Swiss Centre for Life Cycle Inventories, Dübendorf, CH.
  Gendorf (2000) Umwelterklärung 2000, Werk Gendorf. Werk Gendorf, Burgkirchen.
- electricity, medium voltage: 0.00435611, 0.0868946, 0.0291963, 0.00133399, 0.000266997, 5.73302e-5, 0.00897322 kWh (7 suppliers, which the file names only by identifier); sum of these 0.131079 kWh; lognormal variance with pedigree 0.0129, pedigree (2,2,2,5,1)
  Electricity
  Uncertainty: e
- methanol: 0.335774, 0.651181, 0.0616739 kg (3 suppliers, which the file names only by identifier); sum of these 1.04863 kg; lognormal variance with pedigree 0.0129, pedigree (2,2,2,5,1)
  Precursor
  Uncertainty: p
  properties: carbon content, fossil 0.375, dry mass 1 kg, heating value, net 20 MJ, wet mass 1 kg
  note on heating value, net: Based on literature, page 533, Report 17: Jungbluth, N., Chudacoff, M., Dauriat, A., Dinkel, F., Doka, G., Faist Emmenegger, M., Gnansounou, E., Kljun, N., Schleiss, K., Spielmann, M., Stettler, C., Sutter, J. 2007: Life Cycle Inventories of Bioenergy. ecoinvent report No. 17, Swiss Centre for Life Cycle Inventories, Dübendorf, CH.
- nitrogen, liquid: 0.0166033 kg; lognormal variance with pedigree 0.0106, pedigree (2,3,2,4,3)
  Calculated based on literature data published by the industry. This value is a 5-year average of data (2011 - 2015) published by the Gendorf factory (Gendorf, 2016, Umwelterklärung, www.gendorf.de), (Gendorf, 2015, Umwelterklärung, www.gendorf.de), (Gendorf, 2014, Umwelterklärung, www.gendorf.de). The amount of nitrogen used per kg of chemical substance produced is calculated using literature data published by the Gendorf factory based in Germany, which produces a wide range of chemical substances. The factory produced 1657400 tonnes of chemical substances in the year 2015 (Gendorf, 2016, Umwelterklärung, www.gendorf.de) and 740000 tonnes of intermediate products. The reported amount of nitrogen used in 2015 was 33512400 Nm3 (Gendorf, 2016, Umwelterklärung, www.gendorf.de). One Nm3 of nitrogen is equal to 1.2506 kg. The resulting amount of nitrogen - the 5-year average (2011 - 2015, weighted by production volume) is 0.019 kg/kg. Nitrogen is mainly used during the production of chemicals for 'blanketing', which is the process of applying gas to the vapour space of a container or vessel in order to control its composition.
  properties: dry mass 1 kg, wet mass 1 kg
- spent Formox catalyst base from formaldehyde production: -0.0436929 kg; name BP_spent_Formox_catalyst_base_from_forma; lognormal variance with pedigree 0.0601, pedigree (4,2,1,5,1)
  Disposal of catalyst base material.
  Uncertainty: d
  production volume; = RP_PV*BP_spent_Formox_catalyst_base_from_forma/ABS(RP)
    Calculated from the production volume of formaldehyde in proportion to the respective output amounts.
  properties: dry mass 1 kg, wet mass 1 kg

## Emissions to nature
- Carbon dioxide, fossil [air, urban air close to ground]: 0.0961243 kg; lognormal variance with pedigree 0.0129, pedigree (2,2,2,5,1)
  Emissions
  Uncertainty: e
- Carbon monoxide, fossil [air, urban air close to ground]: 8.73857e-5 kg; lognormal variance with pedigree 0.0129, pedigree (2,2,2,5,1)
  Emissions
  Uncertainty: e
- Formaldehyde [air, urban air close to ground]: 2.18464e-5 kg; lognormal variance with pedigree 0.0129, pedigree (2,2,2,5,1)
  Emissions
  Uncertainty: e
- Methanol [air, urban air close to ground]: 2.70896e-5 kg; lognormal variance with pedigree 0.0129, pedigree (2,2,2,5,1)
  Emissions
  Uncertainty: e
- NMVOC, non-methane volatile organic compounds [air, urban air close to ground]: 2.62157e-6 kg; lognormal variance with pedigree 0.0129, pedigree (2,2,2,5,1)
  Emissions
  Uncertainty: e
- Nitrogen [air, unspecified]: 0.0166033 kg; lognormal variance with pedigree 0.0106, pedigree (2,3,2,4,3)
  Calculated value. The amount of nitrogen released to air is equal to the amount of nitrogen entering the activity.
- Nitrogen oxides [air, urban air close to ground]: 0.000332066 kg; lognormal variance with pedigree 0.0129, pedigree (2,2,2,5,1)
  Emissions
  Uncertainty: e
- Particulate Matter, > 2.5 um and < 10um [air, urban air close to ground]: 4.36929e-6 kg; lognormal variance with pedigree 0.0129, pedigree (2,2,2,5,1)
  Emissions
  Uncertainty: e

## Sampling procedure
Data based on literature and estimations. Some values are calculated based on data from a large chemical factory located in Germany. For more details, see the comments of the exchanges.

## Extrapolations
This dataset has been copied from an original dataset covering the geography RER. The uncertainty has been adjusted accordingly.

## Review by Gregor Wernet 2017-08-04
This dataset was additionally reviewed in a separate review process by Eric Johnson of Atlantic Consulting as well as Emilia Moreno Ruiz and Gregor Wernet of ecoinvent.
