# wheat grain production

Dataset: EcoSpold 2, unit process
Geography: AU-WA
Time period: 2011-01-01 to 2023-01-01
Technology level: current
Classification: ISIC rev.4 ecoinvent: 0111:Growing of cereals (except rice), leguminous crops and oil seeds
Scenario: Business-as-Usual
System model: Allocation, cut-off by classification
Generated by: Timothy Grant
Database: ecoinvent
isCopyrightProtected: true
accessRestrictedTo: 1

## General comment
This datasets represents the priduction of 1 kg of wheat in Western Australia. This inventory has been developed with support from the Australian Commonwealth Government through the National Landcare Programme Innovation Grant and the Grains Research and Development Corporation (GRDC). The inventory was developed by CSIRO, the Department of Primary Industries NSW and Lifecycles. More detail on inventory development can be found in the Methodology for Developing Life Cycle Inventory' documents located at http://auslci.com.au/index.php/AusAgLCI. ;

## Included activities start
The inventory includes the processes for growing wheat without irrigation on arable land in Western Australia, Australia. Inputs of fertilisers, pesticides as well as the transports to the farm are considered. All tractor operations, fuel supply and machine infrastructure is included. The direct and indirect emissions on the field from nitrogen application and stubble retention are included. Stubble/straw removed from the field is included in the nitrogen balance but allocation to straw product has been ignored as the fraction of stubble removed on average is low 11%,- and the economic value is generally low. The nitrogen balance also includes leaching of N in different parts of the state based on the ratio of evapouration/ precipitation ratio which results in 30% Nitrogen leaching in 1.5% of the state of WA. Inventory refers to the production of 1 kg of grain. Source inventory refers to 1 ha of crop over 1 year, with an average yield value of 1560 kg (dry matter content = 1326 kg), from the end of the previous crop to the point of harvesting of the next crop.

## Included activities end
The system boundary ends at the field gate with all further processes such as transport, storage, packaging are excluded.

## Geography
Average production in Western Australia.

## Technology
all agricultural steps included from soil preparation to harvesting

## Time period
Average Data collected for 2011-2016.

## Reference product
- wheat grain: 1 kg; By-product classification allocatable product; CPC 01112: Wheat, other; HS2017 100199: Cereals; wheat and meslin, other than durum wheat, other than seed
  This inventory has been developed with support from the Australian Commonwealth Government through the National Landcare Programme Innovation Grant and the Grains Research and Development Corporation (GRDC). The inventory was developed by CSIRO, the Department of Primary Industries NSW and Lifecycles. More detail on inventory development can be found in the Methodology for Developing Life Cycle Inventory' documents located at http://auslci.com.au/index.php/AusAgLCI. ;
  production volume 8.79271e9 kg
    Australian Bureau of Statistics 2021-22, Agricultural Commodities, Australia, ABS, viewed 17 July 2023, <https://www.abs.gov.au/statistics/industry/agriculture/agricultural-commodities-australia/2021-22>.
  property price 0.179722 EUR2005
    The price was calculated based on data on gross value (AUD) [1] divided by the production quantity [2] of wheat grain for the years 2017-2021 for the Western Australia region in Australia from the Australian Bureau of Statistics (ABS). Data was available per financial year, so that the first year of the financial year was assumed to be the year analysed. References: [1] Value of Agricultural Commodities Produced, Australia; accessed on 24.08.23, available at: https://www.abs.gov.au/statistics/industry/agriculture/value-agricultural-commodities-produced-australia [2] Agricultural Commodities, Australia; accessed on 24.08.2023, available at: https://www.abs.gov.au/statistics/industry/agriculture/agricultural-commodities-australia
    The prices were converted to EUR based on the annual exchange rates published by the European Central Bank (https://sdw.ecb.europa.eu/quickview.do?SERIES_KEY=120.EXR.A.AUD.EUR.SP00.A, last accessed on 2023-06-01) and adjusted for inflation relative to 2005 using the producer price index (PPI) of the euro area, published by eurostat (https://ec.europa.eu/eurostat/databrowser/view/STS_INPP_A__custom_6416181/default/table?lang=en, last accessed on 2023-06-01).
  properties: carbon allocation 0.394911 kg, carbon content 0.464601, carbon content, fossil 0, carbon content, non-fossil 0.464601, dry mass 0.85 kg, water content 0.176471, water in wet mass 0.15 kg, wet mass 1 kg

## Inputs from technosphere
- ammonium nitrate: 0.0201923 kg; lognormal variance with pedigree 0.0046, pedigree (1,4,3,1,1)
  mass ammonium nitrate |) divided by kg yield per ha
  properties: dry mass 1 kg, wet mass 1 kg
- application of plant protection product, by field sprayer: 0.00366026 ha; lognormal variance with pedigree 0.0038, pedigree (2,3,3,1,1)
  nb of times ha is processed x surface |) divided by kg yield per ha
  properties: dry mass 1 kg, wet mass 1 kg
- combine harvesting: 0.000641026 ha; lognormal variance with pedigree 0.0046, pedigree (1,4,3,1,1)
  nb of times ha is processed x surface |) divided by kg yield per ha
  properties: dry mass 1 kg, wet mass 1 kg
- fertilising, by broadcaster: 0.000695897 ha; lognormal variance with pedigree 0.0038, pedigree (2,3,3,1,1)
  6.41E-04 units --- nb of times ha is processed x surface |plus| 5.49E-05 units --- nb of times ha is processed x surface |) divided by kg yield per ha
  properties: dry mass 1 kg, wet mass 1 kg
- glyphosate: 0.0009 kg; lognormal variance with pedigree 0.0446, pedigree (3,3,3,1,1)
  4.38E-04 units --- Mass glyphosate |plus| 4.62E-04 units --- Mass glyphosate |) divided by kg yield per ha
  properties: carbon content, fossil 0.214286, dry mass 1 kg, wet mass 1 kg
- limestone, crushed, for mill: 0.0987179 kg; lognormal variance with pedigree 0.043825, pedigree (3,3,5,2,2)
  mass limestone |) divided by kg yield per ha
  properties: carbon content, fossil 0.117492, dry mass 0.998 kg, water content 0.00200401, wet mass 1 kg
- monoammonium phosphate: 0.0262821 kg; lognormal variance with pedigree 0.0126, pedigree (3,1,3,1,3)
  mass monoammonium phosphate |) divided by kg yield per ha
  properties: dry mass 1 kg, nitrogen content 0.084, phosphorus content 0.226939, wet mass 1 kg
- pesticide, unspecified: 0.00223846 kg; lognormal variance with pedigree 0.0446, pedigree (3,3,3,1,1)
  6.01E-04 units --- mass 2,4-D |plus| 3.85E-05 units --- mass triclopyr |plus| 1.15E-05 units --- mass oxyfluorfen |plus| 9.62E-04 units --- mass tri-allate |plus| 5.12E-04 units --- mass MCPA |plus| 4.81E-05 units --- mass clopyralid |plus| 1.92E-06 units --- mass metsulfuron-methyl |plus| 6.41E-05 units --- mass flutriafol |) divided by kg yield per ha
  properties: carbon content, fossil 0.486978, dry mass 1 kg, wet mass 1 kg
- planting with starter fertiliser, by no till planter: 0.000641026 ha; lognormal variance with pedigree 0.0046, pedigree (1,4,3,1,1)
  5.49E-04 units number of times ha is processed times surface plus 9.23E-05 units number of times ha is processed times surface) divided by kg yield per ha
  properties: dry mass 1 kg, wet mass 1 kg
- tillage, cultivating, chiselling: 8.69231e-5 ha; lognormal variance with pedigree 0.0046, pedigree (3,1,3,1,1)
  3.21E-05 units Surface times number of times ha is processed, plus 5.49E-05 units number of times ha is processed times surfacedivided by kg yield per ha
  properties: dry mass 1 kg, wet mass 1 kg
- transport, tractor and trailer, agricultural: 0.005 metric ton*km; lognormal variance with pedigree 0.124, pedigree (3,1,3,1,1)
  grain collection (Yield/1000)*0.005 metric ton*km |) divided by kg yield per ha
- urea: 0.0338462 kg; lognormal variance with pedigree 0.0126, pedigree (3,1,3,1,3)
  sum of mass urea |) divided by kg yield per ha
  properties: carbon content, fossil 0.2, dry mass 1 kg, wet mass 1 kg

## Inputs from nature
- Carbon dioxide, in air [natural resource, in air]: 3.32051 kg; lognormal variance with pedigree 0.0412, pedigree (1,3,5,1,1)
  atmospheric CO2 absorbed by the plant yield * drymatter content of crop * carbon content of crop + plant residue x dry matter content of residue x carbon content of residue all multiplied by carbon to carbon dioxide conversion factor |) divided by kg yield per ha
- Occupation, annual crop, non-irrigated [natural resource, land]: 6.41026 m2*year; lognormal variance with pedigree 0.0427, pedigree (2,2,3,1,1)
  Actual land used for the cropping |) divided by kg yield per ha
- Occupation, cropland fallow (non-use) [natural resource, land]: 0.35641 m2*year; lognormal variance with pedigree 0.044, pedigree (3,1,3,1,1)
  Crop fallow as a part of crop rotation allocated across all crops in the rotation |) divided by kg yield per ha

## Emissions to nature
- 2,4-D [air, non-urban air or from high stacks]: 6.00641e-6 kg; lognormal variance with pedigree 1.514, pedigree (1,4,3,1,1)
  mass of active ingredient 2,4-D applied x fraction released in air - Primary partitioning from PESTLCI |) divided by kg yield per ha
- Ammonia [air, non-urban air or from high stacks]: 0.00302564 kg; lognormal variance with pedigree 1.504, pedigree (1,4,3,1,1)
  Direct emissions from fertilizers. Nitrogen applied per ha x fraction of nitrogen volatilized x N to NH4 coversion factor divided by kg yield per ha
- Antimony ion [air, non-urban air or from high stacks]: 1.53205e-8 kg; lognormal variance with pedigree 0.654, pedigree (1,4,3,1,1)
  emissions from burning residues = yield x quantity of plant residue x fraction of residues remaining at time of burning x dry matter content x burning efficiency x fraction burnt* emission factor from NPI workbook/1000. (pg 13 Environment Australia, Aggregated Emmissions from Prescribed burning and Wildfires.1999) |) divided by kg yield per ha
- Arsenic ion [air, non-urban air or from high stacks]: 1e-9 kg; lognormal variance with pedigree 0.654, pedigree (1,4,3,1,1)
  (same comment as for Antimony ion)
- Butadiene [air, non-urban air or from high stacks]: 1.92308e-6 kg; lognormal variance with pedigree 0.044, pedigree (1,4,3,1,1)
  (same comment as for Antimony ion)
- Cadmium II [air, non-urban air or from high stacks]: 2.0641e-8 kg; lognormal variance with pedigree 0.654, pedigree (1,4,3,1,1)
  (same comment as for Antimony ion)
- Carbon dioxide, fossil [air, non-urban air or from high stacks]: 0.0682615 kg; lognormal variance with pedigree 0.004, pedigree (1,4,3,1,1)
  2.48E-02 units --- emissions from urea application Carbon applied with urea x conversion factor |plus| Emissions from lime application - Carbon applied with lime and dolomite x Emission factor x Conversion factor |) divided by kg yield per ha
- Carbon dioxide, from soil or biomass stock [air, non-urban air or from high stacks]: 1.77565 kg; lognormal variance with pedigree 0.004, pedigree (1,4,3,1,1)
  2.48E-02 units --- emissions from urea application - reported as biogenic due to the ecoinvent background process used. Carbon applied with urea x conversion factor |plus| 0.00E+00 units --- emissions from burning residues = yield x quantity of plant residue x fraction of residues remaining at time of burning x dry matter content x burning efficiency x carbon content x CH4 emission factor x conversion factor |plus| 1.78E+00 units --- emissions from burning residues - Residue which is not removed, and not burnt is assumed to degrade to biogenic carbon dioxide. |plus| 0.00E+00 units --- By default land-use change is not included in the inventory due to high uncertainties in the calculation. However a value from the land-use change calculator developed by Blonk consultants has been included and can be switched on by changing the value of DLUC_switch to 1 calculated average LUC emissions if included |) divided by kg yield per ha
- Carbon dioxide, non-fossil [air, non-urban air or from high stacks]: 0.000215385 kg; lognormal variance with pedigree 0.0046, pedigree (1,4,3,1,1)
  (same comment as for Antimony ion)
- Carbon monoxide, from soil or biomass stock [air, non-urban air or from high stacks]: 0.00284615 kg; lognormal variance with pedigree 0.654, pedigree (1,4,3,1,1)
  emissions from burning residues = yield x quantity of plant residue x fraction of residues remaining at time of burning x dry matter content x burning efficiency x carbon content x CO emission factor x conversion factor |) divided by kg yield per ha
- Carbon monoxide, non-fossil [air, non-urban air or from high stacks]: 0.00230769 kg; lognormal variance with pedigree 0.654, pedigree (1,4,3,1,1)
  (same comment as for Antimony ion)
- Chromium VI [air, non-urban air or from high stacks]: 1.03205e-8 kg; lognormal variance with pedigree 0.654, pedigree (1,4,3,1,1)
  (same comment as for Antimony ion)
- Clopyralid [air, non-urban air or from high stacks]: 4.80769e-7 kg; lognormal variance with pedigree 1.514, pedigree (1,4,3,1,1)
  mass of active ingredient clopyralid applied x fraction released in air - Primary partitioning from PESTLCI |) divided by kg yield per ha
- Cobalt II [air, non-urban air or from high stacks]: 3.66026e-9 kg; lognormal variance with pedigree 0.654, pedigree (1,4,3,1,1)
  (same comment as for Antimony ion)
- Copper ion [air, non-urban air or from high stacks]: 7.30769e-9 kg; lognormal variance with pedigree 0.654, pedigree (1,4,3,1,1)
  (same comment as for Antimony ion)
- Dinitrogen monoxide [air, non-urban air or from high stacks]: 0.000200288 kg; lognormal variance with pedigree 0.034, pedigree (1,4,3,1,1)
  0.00E+00 units --- Emissions from Mineralisation of N is loss of soil organic matter |plus| 1.97E-05 units --- Direct emissions from fertilizers - Nitrous oxide emissions Nitrogen applied x emission factor x conversion factor |plus| 1.97E-06 units --- Indirect emissions from fertilizers - Nitrous oxide emissions Nitrogen applied x fraction of nitrogen volatilized x emission factor x conversion factor |plus| 7.82E-06 units --- Fertilizers leaching - Nitrous oxide emissions Nitrogen applied x fraction of nitrogen available for leaching x fraction of nitrogen leaching x emission factor x conversion factor |plus| 1.68E-04 units --- emissions from residues above ground nitrogen yield x quantity of plant residue x dry matter content x carbon content x nitrogen content x (1-fraction of residues burnt - fraction of residues removed) x emission factor x conversion factor |plus| 2.80E-06 units --- emissions from burning residues = yield x quantity of plant residue x fraction of residues remaining at time of burning x dry matter content x burning efficiency x nitrogen content above ground x N2O emission factor x conversion factor |) divided by kg yield per ha
- Fungicides, unspecified [air, non-urban air or from high stacks]: 6.41026e-7 kg; lognormal variance with pedigree 0.004, pedigree (1,4,3,1,1)
  mass of active ingredient flutriafol applied x fraction released in air - Primary partitioning from PESTLCI |) divided by kg yield per ha
- Herbicides, unspecified [air, non-urban air or from high stacks]: 9.61538e-6 kg; lognormal variance with pedigree 0.004, pedigree (1,4,3,1,1)
  mass of active ingredient tri-allate applied x fraction released in air - Primary partitioning from PESTLCI |) divided by kg yield per ha
- Lead II [air, non-urban air or from high stacks]: 1.69872e-8 kg; lognormal variance with pedigree 0.654, pedigree (1,4,3,1,1)
  (same comment as for Antimony ion)
- MCPA [air, non-urban air or from high stacks]: 5.11538e-6 kg; lognormal variance with pedigree 1.514, pedigree (1,4,3,1,1)
  mass of active ingredient MCPA applied x fraction released in air - Primary partitioning from PESTLCI |) divided by kg yield per ha
- Manganese II [air, non-urban air or from high stacks]: 4.1859e-8 kg; lognormal variance with pedigree 0.654, pedigree (1,4,3,1,1)
  (same comment as for Antimony ion)
- Mercury II [air, non-urban air or from high stacks]: 4.33974e-9 kg; lognormal variance with pedigree 0.654, pedigree (1,4,3,1,1)
  (same comment as for Antimony ion)
- Methane, from soil or biomass stock [air, non-urban air or from high stacks]: 7.30769e-5 kg; lognormal variance with pedigree 0.004, pedigree (1,4,3,1,1)
  emissions from burning residues = yield x quantity of plant residue x fraction of residues remaining at time of burning x dry matter content x burning efficiency x carbon content x CH4 emission factor x conversion factor |) divided by kg yield per ha
- Metsulfuron-methyl [air, unspecified]: 1.92308e-8 kg; lognormal variance with pedigree 0.004, pedigree (1,4,3,1,1)
  mass of active ingredient metsulfuron-methyl applied x fraction released in air - Primary partitioning from PESTLCI |) divided by kg yield per ha
- NMVOC, non-methane volatile organic compounds [air, non-urban air or from high stacks]: 0.000166026 kg; lognormal variance with pedigree 5.004, pedigree (1,4,3,1,1)
  emissions from burning residues = yield x quantity of plant residue x fraction of residues remaining at time of burning x dry matter content x burning efficiency x carbon content x NMVOC emission factor x conversion factor |) divided by kg yield per ha
- Nickel II [air, non-urban air or from high stacks]: 5.98718e-9 kg; lognormal variance with pedigree 0.654, pedigree (1,4,3,1,1)
  (same comment as for Antimony ion)
- Nitrogen [air, non-urban air or from high stacks]: 0.00161538 kg; lognormal variance with pedigree 0.004, pedigree (1,4,3,1,1)
  Amount calculated from APSIM runs for full rotation in region and divided by kg yield per ha.
- Nitrogen oxides [air, non-urban air or from high stacks]: 0.000248718 kg; lognormal variance with pedigree 0.034, pedigree (1,4,3,1,1)
  1.62E-04 units --- emissions from burning residues = yield x quantity of plant residue x fraction of residues remaining at time of burning x dry matter content x burning efficiency x nitrogen content above ground x NOx emission factor x conversion factor |plus| 8.65E-05 units --- emissions from burning residues = yield x quantity of plant residue x fraction of residues remaining at time of burning x dry matter content x burning efficiency x fraction burnt* emission factor from NPI workbook/1000. (pg 13 Environment Australia, Aggregated Emmissions from Prescribed burning and Wildfires.1999) |) divided by kg yield per ha
- Oxyfluorfen [air, non-urban air or from high stacks]: 1.15385e-7 kg; lognormal variance with pedigree 0.004, pedigree (1,4,3,1,1)
  mass of active ingredient oxyfluorfen applied x fraction released in air - Primary partitioning from PESTLCI |) divided by kg yield per ha
- Particulate Matter, > 2.5 um and < 10um [air, non-urban air or from high stacks]: 0.000332692 kg; lognormal variance with pedigree 0.304, pedigree (1,4,3,1,1)
  (same comment as for Antimony ion)
- Selenium IV [air, non-urban air or from high stacks]: 1.66026e-9 kg; lognormal variance with pedigree 0.654, pedigree (1,4,3,1,1)
  (same comment as for Antimony ion)
- Triclopyr [air, non-urban air or from high stacks]: 3.84615e-7 kg; lognormal variance with pedigree 0.004, pedigree (1,4,3,1,1)
  mass of active ingredient triclopyr applied x fraction released in air - Primary partitioning from PESTLCI |) divided by kg yield per ha
- Zinc II [air, non-urban air or from high stacks]: 2.79487e-8 kg; lognormal variance with pedigree 0.654, pedigree (1,4,3,1,1)
  (same comment as for Antimony ion)
- 2,4-D [soil, agricultural]: 0.000594295 kg; lognormal variance with pedigree 0.037, pedigree (1,4,3,1,1)
  5.54E-04 units --- mass of active ingredient 2,4-D applied x fraction released off field and redeposited to other agricultural land and fraction reaching soil - Primary partitioning from PestLCI |plus| 4.04E-05 units --- mass of active ingredient 2,4-D applied x fraction released off field and redeposited to natural land - Primary partitioning from PestLCI |) divided by kg yield per ha
- Cadmium II [soil, agricultural]: 1.24359e-7 kg; lognormal variance with pedigree 0.094, pedigree (1,4,3,1,1)
  mass of metal Cadmium contained in fertilizer x fraction released in soil |) divided by kg yield per ha
- Clopyralid [soil, agricultural]: 4.75641e-5 kg; lognormal variance with pedigree 0.037, pedigree (1,4,3,1,1)
  4.44E-05 units --- mass of active ingredient clopyralid applied x fraction released off field and redeposited to other agricultural land and fraction reaching soil - Primary partitioning from PestLCI |plus| 3.21E-06 units --- mass of active ingredient clopyralid applied x fraction released off field and redeposited to natural land - Primary partitioning from PestLCI |) divided by kg yield per ha
- Fungicides, unspecified [soil, agricultural]: 6.33654e-5 kg; lognormal variance with pedigree 0.037, pedigree (1,4,3,1,1)
  5.94E-05 units --- mass of active ingredient flutriafol applied x fraction released off field and redeposited to other agricultural land and fraction reaching soil - Primary partitioning from PestLCI |plus| 4.01E-06 units --- mass of active ingredient flutriafol applied x fraction released off field and redeposited to natural land - Primary partitioning from PestLCI |) divided by kg yield per ha
- Glyphosate [soil, agricultural]: 0.0009 kg; lognormal variance with pedigree 0.0376, pedigree (3,3,3,1,1)
  (same comment as for glyphosate)
- Herbicides, unspecified [soil, agricultural]: 0.000949359 kg; lognormal variance with pedigree 0.037, pedigree (1,4,3,1,1)
  8.85E-04 units --- mass of active ingredient tri-allate applied x fraction released off field and redeposited to other agricultural land and fraction reaching soil - Primary partitioning from PestLCI |plus| 6.47E-05 units --- mass of active ingredient tri-allate applied x fraction released off field and redeposited to natural land - Primary partitioning from PestLCI |) divided by kg yield per ha
- Lead II [soil, agricultural]: 8.20513e-8 kg; lognormal variance with pedigree 0.094, pedigree (1,4,3,1,1)
  mass of metal Lead contained in fertilizer x fraction released in soil |) divided by kg yield per ha
- MCPA [soil, agricultural]: 0.000505577 kg; lognormal variance with pedigree 0.037, pedigree (1,4,3,1,1)
  4.71E-04 units --- mass of active ingredient MCPA applied x fraction released off field and redeposited to other agricultural land and fraction reaching soil - Primary partitioning from PestLCI |plus| 3.44E-05 units --- mass of active ingredient MCPA applied x fraction released off field and redeposited to natural land - Primary partitioning from PestLCI |) divided by kg yield per ha
- Mercury II [soil, agricultural]: 2.91667e-10 kg; lognormal variance with pedigree 5.004, pedigree (1,4,3,1,1)
  mass of metal Mercury contained in fertilizer x fraction released in soil |) divided by kg yield per ha
- Metsulfuron-methyl [soil, agricultural]: 1.90385e-6 kg; lognormal variance with pedigree 0.037, pedigree (1,4,3,1,1)
  1.78E-06 units --- mass of active ingredient metsulfuron-methyl applied x fraction released off field and redeposited to other agricultural land and fraction reaching soil - Primary partitioning from PestLCI |plus| 1.28E-07 units --- mass of active ingredient metsulfuron-methyl applied x fraction released off field and redeposited to natural land - Primary partitioning from PestLCI |) divided by kg yield per ha
- Oxyfluorfen [soil, agricultural]: 1.14167e-5 kg; lognormal variance with pedigree 0.037, pedigree (1,4,3,1,1)
  1.06E-05 units --- mass of active ingredient oxyfluorfen applied x fraction released off field and redeposited to other agricultural land and fraction reaching soil - Primary partitioning from PestLCI |plus| 7.76E-07 units --- mass of active ingredient oxyfluorfen applied x fraction released off field and redeposited to natural land - Primary partitioning from PestLCI |) divided by kg yield per ha
- Triclopyr [soil, agricultural]: 3.80385e-5 kg; lognormal variance with pedigree 0.037, pedigree (1,4,3,1,1)
  3.54E-05 units --- mass of active ingredient triclopyr applied x fraction released off field and redeposited to other agricultural land and fraction reaching soil - Primary partitioning from PestLCI |plus| 2.59E-06 units --- mass of active ingredient triclopyr applied x fraction released off field and redeposited to natural land - Primary partitioning from PestLCI |) divided by kg yield per ha
- 2,4-D [water, surface water]: 7.5e-7 kg; lognormal variance with pedigree 0.044, pedigree (1,4,3,1,1)
  7.50E-07 units --- mass of active ingredient 2,4-D applied x fraction released off field and redeposited to freshwater - Primary partitioning from PestLCI |plus| 0.00E+00 units --- mass of active ingredient 2,4-D applied x fraction released off field and redeposited to freshwater - Primary partitioning from PestLCI |) divided by kg yield per ha
- Clopyralid [water, surface water]: 5.92949e-8 kg; lognormal variance with pedigree 0.044, pedigree (1,4,3,1,1)
  5.93E-08 units --- mass of active ingredient clopyralid applied x fraction released off field and redeposited to freshwater - Primary partitioning from PestLCI |plus| 0.00E+00 units --- mass of active ingredient clopyralid applied x fraction released off field and redeposited to freshwater - Primary partitioning from PestLCI |) divided by kg yield per ha
- Fungicides, unspecified [water, surface water]: 7.4359e-8 kg; lognormal variance with pedigree 0.044, pedigree (1,4,3,1,1)
  7.44E-08 units --- mass of active ingredient flutriafol applied x fraction released off field and redeposited to freshwater - Primary partitioning from PestLCI |plus| 0.00E+00 units --- mass of active ingredient flutriafol applied x fraction released off field and redeposited to freshwater - Primary partitioning from PestLCI |) divided by kg yield per ha
- Herbicides, unspecified [water, surface water]: 1.19872e-6 kg; lognormal variance with pedigree 0.044, pedigree (1,4,3,1,1)
  1.20E-06 units --- mass of active ingredient tri-allate applied x fraction released off field and redeposited to freshwater - Primary partitioning from PestLCI |plus| 0.00E+00 units --- mass of active ingredient tri-allate applied x fraction released off field and redeposited to freshwater - Primary partitioning from PestLCI |) divided by kg yield per ha
- MCPA [water, surface water]: 6.36538e-7 kg; lognormal variance with pedigree 0.044, pedigree (1,4,3,1,1)
  6.37E-07 units --- mass of active ingredient MCPA applied x fraction released off field and redeposited to freshwater - Primary partitioning from PestLCI |plus| 0.00E+00 units --- mass of active ingredient MCPA applied x fraction released off field and redeposited to freshwater - Primary partitioning from PestLCI |) divided by kg yield per ha
- Metsulfuron-methyl [water, surface water]: 2.37179e-9 kg; lognormal variance with pedigree 0.044, pedigree (1,4,3,1,1)
  2.37E-09 units --- mass of active ingredient metsulfuron-methyl applied x fraction released off field and redeposited to freshwater - Primary partitioning from PestLCI |plus| 0.00E+00 units --- mass of active ingredient metsulfuron-methyl applied x fraction released off field and redeposited to freshwater - Primary partitioning from PestLCI |) divided by kg yield per ha
- Nitrate [water, ground-]: 0.00291026 kg; lognormal variance with pedigree 0.044, pedigree (1,4,3,1,1)
  Fertilizers leaching - Nitrous oxide emissions Nitrogen applied x fraction of nitrogen available for leaching x fraction of nitrogen leaching from NIR x (1-nitrogen reemitted to air) x conversion factor divided by kg yield per ha
- Oxyfluorfen [water, surface water]: 1.4359e-8 kg; lognormal variance with pedigree 0.044, pedigree (1,4,3,1,1)
  1.44E-08 units --- mass of active ingredient oxyfluorfen applied x fraction released off field and redeposited to freshwater - Primary partitioning from PestLCI |plus| 0.00E+00 units --- mass of active ingredient oxyfluorfen applied x fraction released off field and redeposited to freshwater - Primary partitioning from PestLCI |) divided by kg yield per ha
- Phosphate [water, ground-]: 1.6e-5 kg; lognormal variance with pedigree 0.044, pedigree (1,4,3,1,1)
  1.60E-05 kg - Phosphorus leaching to ground water 0.07kg P per ha.a as phosphate PO4 - Ecoinvent report on agriculture divided by kg yield per ha
- Phosphate [water, surface water]: 1.4e-5 kg; lognormal variance with pedigree 0.044, pedigree (1,4,3,1,1)
  1.40E-05 kg - P run-off to surface waters ecoinvent report on agriculture divided by kg yield per ha
- Phosphorus [water, surface water]: 2.25641e-6 kg; lognormal variance with pedigree 0.044, pedigree (1,4,3,1,1)
  P emissions through erosion by water to surface waters ecoinvent report on agriculture |) divided by kg yield per ha
- Triclopyr [water, surface water]: 4.78205e-8 kg; lognormal variance with pedigree 0.044, pedigree (1,4,3,1,1)
  4.78E-08 units --- mass of active ingredient triclopyr applied x fraction released off field and redeposited to freshwater - Primary partitioning from PestLCI |plus| 0.00E+00 units --- mass of active ingredient triclopyr applied x fraction released off field and redeposited to freshwater - Primary partitioning from PestLCI |) divided by kg yield per ha

## Sampling procedure
Face-to-face interviews with regional experts
