# petroleum slack wax production, petroleum refinery operation

Dataset: EcoSpold 2, unit process
Geography: RoW
Time period: 2014-01-01 to 2023-12-31
Technology level: current
Classification: ISIC rev.4 ecoinvent: 1920:Manufacture of refined petroleum products
Scenario: Business-as-Usual
System model: Allocation, cut-off by classification
Generated by: Florentine Brunner
Database: ecoinvent
isCopyrightProtected: true
accessRestrictedTo: 1

## General comment
This global (GLO) activity for petroleum refinery operation was created as a copy of the corresponding activity in Europe without Switzerland rather than as a production volume weighted average of all available regional activities. According to expert judgement, a production volume-weighted average including the regional activities available in ecoinvent v3.6 (BR, CH, CO, Europe without Switzerland, IN, PE, ZA) would overestimate the share of refinery complexity type IV in the global petroleum refinery sector. The mix of refinery complexity types used for the European activity was, therefore, found to be a more appropriate proxy for this GLO dataset. This limitation in representativeness of the GLO dataset should be kept in mind when using it.
The describes the operation of a petroleum oil refinery of representative configuration and quality of crude oil input for European conditions. Since petroleum refineries are very complex the actual unit process modeling is done in a separate refinery tool, developed by ifeu (Institute for Energy and Environmental Research, Heidelberg, Germany) and this is a subdivided product-specific dataset.
The ifeu petroleum refinery life cycle inventory (LCI) tool is based on the outputs of a complex refinery model that reproduces the complexity of petroleum refinery plants in which the combination and sequence of processes are usually very specific to the characteristics of the raw materials (i.e. the close relation between the composition of the crude oil and the products to be produced). Refineries differ not only in their configurations, process integration, feedstocks, product mixes, unit sizes, designs, and control systems but also the market situations, locations and ages of the refinery or environmental regulations can result in a wide variety of refinery concepts. It represents the current European state-of-the-art. The basic setting of the model reflects the technical characteristics of European refineries as described in the Best Available Techniques (BAT) Reference Document (BREF) for the Refining of Mineral Oil and Gas (European Commission, 2015). Further specific data was collected from companies and production plants and was incorporated in order to elaborate a comprehensive and robust model of a refinery.
The BREF (European Commission, 2015) contains not only aggregated numbers or weighted averages of emission and energy or water consumptions, but also encompasses primary data of the majority of refineries in Europe in anonymous form. This data source has been complemented by various specific confidential refinery datasets, by values from Eurostat (e.g. in the case of the energy source mix or process energy), and by literature data. In the case of the BREF, a range of values were mentioned as process parameters for which the arithmetic averages were applied. After adapting the model to the up-to-date mass and energy flows within the European refineries, it has been validated and calibrated by comparing the results to the dataset of the BREF, the Eurostat and the European Pollutant Release and Transfer Register (E-PRTR).
The simplified LCI tool can be adjusted to average conditions of a specific geography through the following parameters: refinery complexity (according to the complexity classes defined in the BREF document, type I-IV), crude oil sulfur content and American Petroleum Institute (API) gravity classification. To create this dataset, the above parameters were set to represent the average situation in Europe without Switzerland:
Crude quality – API and sulfur content: Crude imports to Europe by country of origin were taken from BP Statistical Review of World Energy 2017 (Oil: Inter-area movements 2016) (BP, 2017) and matched with the crude quality reported for these regions in ENI World Oil Review 2018 (ENI, 2018). The resulting weighted average API grade of crude imports to Europe is 35, and the weighted average sulfur content 1.03%.
Refinery complexity: The 2018 World Refining Survey (OGJ, 2018) reports the configuration of 107 refineries in Europe. According to their configuration each refinery was assigned a refinery type (I-IV) as defined in the BREF document. Weighted by the annual throughput volume, 62% of European refineries classify as type II, 29% as type II and 9% as type IV.
LCIs were generated for BREF type II, III and IV for API 35 and sulfur content 1.03% (applying linear interpolation between sulfur content of 1% and 3%). This dataset was created as weighted average of types II-IV according to the above shares.

## Included activities start
Activity starts with crude oil entering the petroleum refinery. Waste water treatment, freshwater supply (from nature), refinery infrastructure, crude oil and product storage on refinery grounds and energy provision is included. Electricity requirements are assumed to be met by on-site generation, regardless whether this electricity is purchased or supplied internally.

## Included activities end
Activity ends with refined petroleum products (and surplus electricity and/or hydrogen, where relevant) leaving the refinery.

## Allocation
Petroleum oil refineries are highly integrated multi-output production plants where nearly each process step creates a few co-products. The procedure for subdividing and allocating the burden per refinery process step among the product outputs is described in detail in Fehrenbach et al. (2018).

## Geography
Global model calibrated with geography-specific information.

## Technology
This dataset represents the prevailing technology level in Europe, this is a weighted average of BREF complexity types II (62%), III (29%), IV (9%) refineries (see BREF document, European Commission, 2015); API 35; sulfur content 1.03%.
Reference(s):
European Commission (2015) Best Available Techniques (BAT) Reference Document (BREF) for the Refining of Mineral Oil and Gas, Industrial Emissions Directive 2010/75/EU Integrated Pollution Prevention and control, accessible online at http://eippcb.jrc.ec.europa.eu/reference/BREF/REF_BREF_2015.pdf, February 2019

## Reference product
- petroleum slack wax: 1 kg; name a_RP; By-product classification allocatable product; CPC 33500: Petroleum jelly; paraffin wax, micro- crystalline petroleum wax, slack wax, ozokerite, lignite wax, peat wax, […]; HS2017 271390: Residues; of petroleum oils or of oils obtained from bituminous minerals
  According to the applied model, on average 3.51 kg petroleum slack wax are produced per tonne of crude oil intake.
  production volume 9.18525e9 kg; name PV_RP; = 4011037347979*a_RP/1000
    Calculated value. The production volume was calculated based on the total global refinery intake in 2016 and the proportionate product output modelled in the ifeu tool. According to the applied model, on average 3.51 kg petroleum slack wax are produced per tonne of crude oil intake. The total global refinery intake in 2016 was 4.01E+12kg of crude oil (BP, 2017).
    Mind that this calculated value may differ from the actual production volume reported in statistics.
    Reference(s):
    BP, 2017, BP Statistical Review 2017, accessed online at https://www.bp.com/content/dam/bp-country/de_ch/PDF/bp-statistical-review-of-world-energy-2017-full-report.pdf, February 2019
  property carbon content, fossil 0.85; name a_RP_C_content_fossil
    fossil carbon content on a dry matter basis
  property carbon content, non-fossil 0; name a_RP_C_content_non_fossil
    biogene carbon content on a dry matter basis
  property heating value, net 43.2 MJ
    Assumed equal to "petroleum". LHV for petroleum: Based on literature, page 7, Report6, part 4
  property price 0.888592 EUR2005
    Literature data. Data from Eurostat. More information can be found in "Petroleum refinery industry and liquid fuels – Description of the ifeu refinery model and the calculation of LCI datasets for refinery products in Brazil, India, South Africa, Peru and Colombia" available on the ecoinvent website.
  properties: carbon allocation 0 kg, carbon content 0.85

## Inputs from technosphere
- N-methyl-2-pyrrolidone: 0.000146507 kg; lognormal variance with pedigree 0.0444, pedigree (3,3,5,4,2)
  properties: heating value, net 29.36 MJ
- aluminium oxide, non-metallurgical: 5.43062e-6 kg; lognormal variance with pedigree 0.0444, pedigree (3,3,5,4,2)
- ammonia, anhydrous, liquid: 2.36953e-5, 1.00162e-6, 2.24057e-7, 8.23449e-6, 2.18194e-6 kg (5 suppliers, which the file names only by identifier); sum of these 3.53374e-5 kg; lognormal variance with pedigree 0.0444, pedigree (3,3,5,4,2)
- cobalt: 1.13138e-7 kg; lognormal variance with pedigree 0.0444, pedigree (3,3,5,4,2)
- fibre, viscose: 0.000586027 kg; lognormal variance with pedigree 0.0444, pedigree (3,3,5,4,2)
  properties: heating value, net 7.29 MJ
- hazardous waste, for incineration: -0.000344646, -4.33232e-6 kg (2 suppliers, which the file names only by identifier); sum of these -0.000348979 kg
  production volume; = a_hwi/a_RP*PV_RP
    Calculated from the production volume of the reference product in proportion to the respective output amounts.
  properties: heating value, net 17 MJ
  note on heating value, net: Value taken from the general comment of the treatment dataset.
- hazardous waste, for underground deposit: -1.11116e-5 kg; name a_hwud
  production volume; = a_hwud/a_RP*PV_RP
    (same comment as for hazardous waste, for incineration)
- hydrochloric acid, without water, in 30% solution state: 0.00121034 kg; lognormal variance with pedigree 0.0444, pedigree (3,3,5,4,2)
  properties: heating value, net 3.32 MJ
- kaolin: 1.13138e-6 kg; lognormal variance with pedigree 0.0444, pedigree (3,3,5,4,2)
- lanthanum oxide: 1.13138e-7 kg; lognormal variance with pedigree 0.0444, pedigree (3,3,5,4,2)
- lime, hydrated, packed: 0.00380056 kg; lognormal variance with pedigree 0.0444, pedigree (3,3,5,4,2)
- methyl ethyl ketone: 0.000510429 kg; lognormal variance with pedigree 0.0444, pedigree (3,3,5,4,2)
  properties: heating value, net 33.63 MJ
- molybdenum trioxide: 1.13138e-7 kg; lognormal variance with pedigree 0.0444, pedigree (3,3,5,4,2)
- natural gas, high pressure: 8.80623e-6, 3.24033e-5, 1.0844e-5, 2.53421e-6, 1.50831e-5, 1.44734e-5, 3.80581e-5, 1.28998e-6, 1.46929e-5, 2.27258e-5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 m3 (34 suppliers, which the file names only by identifier); sum of these 0.00109649 m3; lognormal variance with pedigree 0.0444, pedigree (3,3,5,4,2)
  properties: heating value, net 36 MJ
  note on heating value, net: Literature value, Source: Christoph Meili;Niels Jungbluth;Maresa Bussa (2021) Life cycle inventories of crude oil and natural gas extraction. ESU-services Ltd. commissioned by BAFU & VSG, Schaffhausen, Switzerland, http://esu-services.ch/data/public-lci-reports/
- nickel, class 1: 1.13138e-7 kg; lognormal variance with pedigree 0.0444, pedigree (3,3,5,4,2)
- petroleum: 0.84265, 0.000875317, 0.384102 kg (3 suppliers, which the file names only by identifier); sum of these 1.22763 kg; lognormal variance with pedigree 0.0444, pedigree (3,3,5,4,2)
  properties: heating value, net 43.4 MJ
- petroleum refinery: 6.69571e-12 unit; lognormal variance with pedigree 0.3438, pedigree (3,3,5,4,2)
  activityLink introduced to establish a direct link to the corresponding regional supply of this product
- platinum: 1.69707e-9 kg; lognormal variance with pedigree 0.0444, pedigree (3,3,5,4,2)
- quicklime, milled, packed: 0.000849815 kg; lognormal variance with pedigree 0.0444, pedigree (3,3,5,4,2)
- refinery sludge: -2.76889e-5, -0.00583081 kg (2 suppliers, which the file names only by identifier); sum of these -0.0058585 kg
  production volume; = a_rs/a_RP*PV_RP
    (same comment as for hazardous waste, for incineration)
  properties: heating value, net 2.45 MJ
- silicone product: 1.13138e-6 kg; lognormal variance with pedigree 0.0444, pedigree (3,3,5,4,2)
  properties: heating value, net 9.83 MJ
- sodium hydroxide, without water, in 50% solution state: 0.000605172 kg; lognormal variance with pedigree 0.0444, pedigree (3,3,5,4,2)
  properties: heating value, net 3.03 MJ
- toluene, liquid: 0.000274847 kg; lognormal variance with pedigree 0.0444, pedigree (3,3,5,4,2)
  properties: heating value, net 38.17 MJ
- waste gypsum: -4.38464e-5, -0.00301998 kg (2 suppliers, which the file names only by identifier); sum of these -0.00306383 kg
  production volume; = a_wg/a_RP*PV_RP
    (same comment as for hazardous waste, for incineration)
- zeolite, powder: 3.16786e-6 kg; lognormal variance with pedigree 0.0444, pedigree (3,3,5,4,2)

## Inputs from nature
- Water, cooling, unspecified natural origin [natural resource, in water]: 0.0286969 m3; lognormal variance with pedigree 0.0444, pedigree (3,3,5,4,2)
- Water, unspecified natural origin [natural resource, in water]: 0.00535996 m3; lognormal variance with pedigree 0.0444, pedigree (3,3,5,4,2)

## Emissions to nature
- Ammonia [air, unspecified]: 5.87402e-7 kg; lognormal variance with pedigree 0.0838, pedigree (3,3,5,4,2)
- Antimony ion [air, unspecified]: 7.42757e-8 kg; lognormal variance with pedigree 0.0838, pedigree (3,3,5,4,2)
- Arsenic ion [air, unspecified]: 1.14366e-7 kg; lognormal variance with pedigree 0.0838, pedigree (3,3,5,4,2)
- Benzene [air, unspecified]: 4.30238e-6 kg; lognormal variance with pedigree 0.0838, pedigree (3,3,5,4,2)
- Benzo(a)pyrene [air, unspecified]: 3.55699e-10 kg; lognormal variance with pedigree 0.0838, pedigree (3,3,5,4,2)
- Beryllium II [air, unspecified]: 1.6304e-9 kg; lognormal variance with pedigree 0.0838, pedigree (3,3,5,4,2)
- Cadmium II [air, unspecified]: 1.18401e-7 kg; lognormal variance with pedigree 0.6938, pedigree (3,3,5,4,2)
- Carbon dioxide, fossil [air, unspecified]: 0.736933 kg; lognormal variance with pedigree 0.0444, pedigree (3,3,5,4,2)
- Carbon dioxide, non-fossil [air, unspecified]: 0.00115991 kg; lognormal variance with pedigree 0.0444, pedigree (3,3,5,4,2)
- Carbon monoxide, fossil [air, unspecified]: 0.000203002 kg; lognormal variance with pedigree 0.6938, pedigree (3,3,5,4,2)
- Carbonyl sulfide [air, unspecified]: 1.84351e-9 kg; lognormal variance with pedigree 0.0838, pedigree (3,3,5,4,2)
- Chromium III [air, unspecified]: 1.5962e-7 kg; lognormal variance with pedigree 0.6938, pedigree (3,3,5,4,2)
- Cobalt II [air, unspecified]: 3.19241e-7 kg; lognormal variance with pedigree 0.6938, pedigree (3,3,5,4,2)
- Copper ion [air, unspecified]: 4.92899e-7 kg; lognormal variance with pedigree 0.6938, pedigree (3,3,5,4,2)
- Cyanide [air, unspecified]: 3.92532e-10 kg; lognormal variance with pedigree 0.0838, pedigree (3,3,5,4,2)
- Dinitrogen monoxide [air, unspecified]: 2.65362e-5 kg; lognormal variance with pedigree 0.0838, pedigree (3,3,5,4,2)
- Dioxins, measured as 2,3,7,8-tetrachlorodibenzo-p-dioxin [air, unspecified]: 3.12839e-14 kg; lognormal variance with pedigree 0.0838, pedigree (3,3,5,4,2)
- Formaldehyde [air, unspecified]: 3.50178e-6 kg; lognormal variance with pedigree 0.0838, pedigree (3,3,5,4,2)
- Furfural [air, unspecified]: 5.86027e-6 kg; lognormal variance with pedigree 0.0838, pedigree (3,3,5,4,2)
- Heat, waste [air, unspecified]: 1.7251 MJ; lognormal variance with pedigree 0.0838, pedigree (3,3,5,4,2)
- Hydrogen fluoride [air, unspecified]: 1.29606e-6 kg; lognormal variance with pedigree 0.0838, pedigree (3,3,5,4,2)
- Hydrogen sulfide [air, unspecified]: 3.84346e-7 kg; lognormal variance with pedigree 0.0838, pedigree (3,3,5,4,2)
- Lead II [air, unspecified]: 5.98458e-7 kg; lognormal variance with pedigree 0.6938, pedigree (3,3,5,4,2)
- Manganese II [air, unspecified]: 7.95441e-8 kg; lognormal variance with pedigree 0.6938, pedigree (3,3,5,4,2)
- Mercury II [air, unspecified]: 7.7292e-9 kg; lognormal variance with pedigree 0.6938, pedigree (3,3,5,4,2)
- Methane, fossil [air, unspecified]: 3.92455e-5 kg; lognormal variance with pedigree 0.0838, pedigree (3,3,5,4,2)
- Methyl ethyl ketone [air, unspecified]: 5.10429e-7 kg; lognormal variance with pedigree 0.0838, pedigree (3,3,5,4,2)
- NMVOC, non-methane volatile organic compounds [air, unspecified]: 0.000336821 kg; lognormal variance with pedigree 0.0838, pedigree (3,3,5,4,2)
- Nickel II [air, unspecified]: 6.57199e-6 kg; lognormal variance with pedigree 0.6938, pedigree (3,3,5,4,2)
- Nitrogen oxides [air, unspecified]: 0.000895044 kg; lognormal variance with pedigree 0.0838, pedigree (3,3,5,4,2)
- PAH, polycyclic aromatic hydrocarbons [air, unspecified]: 4.01623e-8 kg; lognormal variance with pedigree 0.3438, pedigree (3,3,5,4,2)
- Palladium II [air, unspecified]: 1.53767e-9 kg; lognormal variance with pedigree 0.6938, pedigree (3,3,5,4,2)
- Particulate Matter, < 2.5 um [air, unspecified]: 0.000203045 kg; lognormal variance with pedigree 0.3438, pedigree (3,3,5,4,2)
- Particulate Matter, > 10 um [air, unspecified]: 0.00029616 kg; lognormal variance with pedigree 0.0838, pedigree (3,3,5,4,2)
- Particulate Matter, > 2.5 um and < 10um [air, unspecified]: 4.79994e-5 kg; lognormal variance with pedigree 0.1638, pedigree (3,3,5,4,2)
- Platinum [air, unspecified]: 1.53767e-9 kg; lognormal variance with pedigree 0.6938, pedigree (3,3,5,4,2)
- Rhodium III [air, unspecified]: 1.53767e-9 kg; lognormal variance with pedigree 0.6938, pedigree (3,3,5,4,2)
- Selenium IV [air, unspecified]: 1.63364e-7 kg; lognormal variance with pedigree 0.0838, pedigree (3,3,5,4,2)
- Sulfur dioxide [air, unspecified]: 0.00405787 kg; lognormal variance with pedigree 0.0498, pedigree (3,3,5,4,2)
- Tellurium [air, unspecified]: 2.17819e-9 kg; lognormal variance with pedigree 0.0838, pedigree (3,3,5,4,2)
- Thallium I [air, unspecified]: 4.38172e-8 kg; lognormal variance with pedigree 0.6938, pedigree (3,3,5,4,2)
- Tin ion [air, unspecified]: 1.67017e-7 kg; lognormal variance with pedigree 0.6938, pedigree (3,3,5,4,2)
- Vanadium V [air, unspecified]: 1.40861e-5 kg; lognormal variance with pedigree 0.6938, pedigree (3,3,5,4,2)
- Water [air, unspecified]: 0.00164399 m3; lognormal variance with pedigree 0.0838, pedigree (3,3,5,4,2)
- Xylenes, unspecified [air, unspecified]: 4.69326e-6 kg; lognormal variance with pedigree 0.0838, pedigree (3,3,5,4,2)
- Zinc II [air, unspecified]: 3.98785e-7 kg; lognormal variance with pedigree 0.0838, pedigree (3,3,5,4,2)
- AOX, Adsorbable Organic Halides [water, unspecified]: 6.99083e-7 kg; lognormal variance with pedigree 0.0838, pedigree (3,3,5,4,2)
- Aluminium III [water, unspecified]: 2.95275e-7 kg; lognormal variance with pedigree 0.0838, pedigree (3,3,5,4,2)
- Ammonium [water, unspecified]: 7.34037e-6 kg; lognormal variance with pedigree 0.0838, pedigree (3,3,5,4,2)
- Arsenic ion [water, unspecified]: 1.04862e-8 kg; lognormal variance with pedigree 0.0838, pedigree (3,3,5,4,2)
- BOD5, Biological Oxygen Demand [water, unspecified]: 3.49541e-5 kg; lognormal variance with pedigree 0.0838, pedigree (3,3,5,4,2)
- Barium II [water, unspecified]: 7.02275e-7 kg; lognormal variance with pedigree 0.0838, pedigree (3,3,5,4,2)
- Benzene [water, unspecified]: 3.49541e-9 kg; lognormal variance with pedigree 0.0838, pedigree (3,3,5,4,2)
- Boron [water, unspecified]: 1.39817e-6 kg; lognormal variance with pedigree 0.0838, pedigree (3,3,5,4,2)
- COD, Chemical Oxygen Demand [water, unspecified]: 0.000230697 kg; lognormal variance with pedigree 0.6938, pedigree (3,3,5,4,2)
- Cadmium II [water, unspecified]: 3.49541e-9 kg; lognormal variance with pedigree 0.0838, pedigree (3,3,5,4,2)
- Chloride [water, unspecified]: 0.00259819 kg; lognormal variance with pedigree 0.0838, pedigree (3,3,5,4,2)
- Chromium III [water, unspecified]: 3.49541e-9 kg; lognormal variance with pedigree 0.6938, pedigree (3,3,5,4,2)
- Chromium VI [water, unspecified]: 6.99083e-9 kg; lognormal variance with pedigree 0.6938, pedigree (3,3,5,4,2)
- Cobalt II [water, unspecified]: 3.49541e-9 kg; lognormal variance with pedigree 0.0838, pedigree (3,3,5,4,2)
- Copper ion [water, unspecified]: 1.74771e-7 kg; lognormal variance with pedigree 0.0838, pedigree (3,3,5,4,2)
- Cyanide [water, unspecified]: 5.24312e-8 kg; lognormal variance with pedigree 0.0838, pedigree (3,3,5,4,2)
- DOC, Dissolved Organic Carbon [water, unspecified]: 4.79571e-5 kg; lognormal variance with pedigree 0.0838, pedigree (3,3,5,4,2)
- Fluoride [water, unspecified]: 2.79633e-6 kg; lognormal variance with pedigree 0.0838, pedigree (3,3,5,4,2)
- Heat, waste [water, unspecified]: 0.487035 MJ
- Hydrocarbons, unspecified [water, unspecified]: 5.24312e-6 kg; lognormal variance with pedigree 0.3438, pedigree (3,3,5,4,2)
- Iron ion [water, unspecified]: 1.39817e-6 kg; lognormal variance with pedigree 0.0838, pedigree (3,3,5,4,2)
- Lead II [water, unspecified]: 3.49541e-9 kg; lognormal variance with pedigree 0.6938, pedigree (3,3,5,4,2)
- Manganese II [water, unspecified]: 2.79633e-7 kg; lognormal variance with pedigree 0.6938, pedigree (3,3,5,4,2)
- Mercury II [water, unspecified]: 6.99083e-10 kg; lognormal variance with pedigree 0.6938, pedigree (3,3,5,4,2)
- Molybdenum VI [water, unspecified]: 3.49541e-8 kg; lognormal variance with pedigree 0.6938, pedigree (3,3,5,4,2)
- Nickel II [water, unspecified]: 3.49541e-8 kg; lognormal variance with pedigree 0.6938, pedigree (3,3,5,4,2)
- Nitrate [water, unspecified]: 1.34179e-6 kg; lognormal variance with pedigree 0.0838, pedigree (3,3,5,4,2)
- Nitrite [water, unspecified]: 2.12764e-7 kg; lognormal variance with pedigree 0.0838, pedigree (3,3,5,4,2)
- Nitrogen [water, unspecified]: 1.90684e-5 kg; lognormal variance with pedigree 0.0838, pedigree (3,3,5,4,2)
- PAH, polycyclic aromatic hydrocarbons [water, unspecified]: 2.44679e-9 kg; lognormal variance with pedigree 0.3438, pedigree (3,3,5,4,2)
- Phenol [water, unspecified]: 3.49541e-7 kg; lognormal variance with pedigree 0.0838, pedigree (3,3,5,4,2)
- Phosphorus [water, unspecified]: 2.09725e-6 kg; lognormal variance with pedigree 0.0838, pedigree (3,3,5,4,2)
- Selenium IV [water, unspecified]: 1.39817e-7 kg; lognormal variance with pedigree 0.6938, pedigree (3,3,5,4,2)
- Sodium I [water, unspecified]: 0.000347844 kg; lognormal variance with pedigree 0.0838, pedigree (3,3,5,4,2)
- Sulfate [water, unspecified]: 0.00182192 kg; lognormal variance with pedigree 0.0838, pedigree (3,3,5,4,2)
- Sulfide [water, unspecified]: 1.74771e-7 kg; lognormal variance with pedigree 0.0838, pedigree (3,3,5,4,2)
- Suspended solids, unspecified [water, unspecified]: 5.24312e-5 kg; lognormal variance with pedigree 0.0838, pedigree (3,3,5,4,2)
- TOC, Total Organic Carbon [water, unspecified]: 4.89358e-5 kg; lognormal variance with pedigree 0.0838, pedigree (3,3,5,4,2)
- Tin ion [water, unspecified]: 3.49541e-8 kg; lognormal variance with pedigree 0.6938, pedigree (3,3,5,4,2)
- Vanadium V [water, unspecified]: 6.99083e-8 kg; lognormal variance with pedigree 0.6938, pedigree (3,3,5,4,2)
- Water [water, unspecified]: 0.0320847 m3; lognormal variance with pedigree 0.0838, pedigree (3,3,5,4,2)
- Xylenes, unspecified [water, unspecified]: 3.49541e-9 kg; lognormal variance with pedigree 0.6938, pedigree (3,3,5,4,2)
- Zinc II [water, unspecified]: 1.04862e-7 kg; lognormal variance with pedigree 0.6938, pedigree (3,3,5,4,2)
- t-Butyl methyl ether [water, unspecified]: 6.99083e-8 kg; lognormal variance with pedigree 0.0838, pedigree (3,3,5,4,2)
