# silicon production, electronics grade

Dataset: EcoSpold 2, unit process
Geography: RoW
Time period: 1992-01-01 to 2023-12-31
Technology level: current
Classification: ISIC rev.4 ecoinvent: 2011:Manufacture of basic chemicals
Synonyms: Silicon metal; EG-Si; Silicone; Monosilane; Silicon tetrahydride; 7440-21-3
Scenario: Business-as-Usual
System model: Allocation, cut-off by classification
Share of production covered: 75 %
Generated by: [System]
Published in: Jungbluth, N. 2007
Database: ecoinvent
isCopyrightProtected: true
accessRestrictedTo: 1

## General comment
This dataset represents the multi-output process that delivers the co-products 'silicon, electronics grade' (EG-silicon), 'silicon, solar grade' and 'silicon tetrachloride'. EG-silicon is mainly used for the production of semiconductors in electronics. This dataset is based on literature data.
References:
Jungbluth N., Stucki M, and Frischknecht R. (2009) Photovoltaics. In Dones, R. (Ed.) et al., Sachbilanzen von Energiesystemen: Grundlagen für den ökologischen Vergleich von Energiesystemen und den Einbezug von Energiesystemen in Ökobilanzen für die Schweiz. ecoinvent report No. 6-XII, Swiss Centre for Life Cycle Inventories, Dübendorf, CH, 2009.

## Included activities start
The activity starts when the raw materials enter the process.

## Included activities end
This activity ends with the production of electronic-grade silicon. The dataset includes the purification of MG-silicon, including materials, energy use, wastes and air emissions.

## Geography
The inventory is modelled for the largest European production plant. For the second plant in IT, data were not available. The data are assumed to be representative of the global production.

## Technology
In practice, EG-silicon is a product from complex chemical production plants. The conventional route for production of EG-silicon comprises three process steps:
1) the MG-silicon is converted into a gas, either trichlorosilane (SiHCl3) or silane (SiH4),
2) this gas is purified by means of distillation,
3) silicon in solid form is deposited in a Siemens reactor.
Reference:
Jungbluth N., Stucki M, and Frischknecht R. (2009) Photovoltaics. In Dones, R. (Ed.) et al., Sachbilanzen von Energiesystemen: Grundlagen für den ökologischen Vergleich von Energiesystemen und den Einbezug von Energiesystemen in Ökobilanzen für die Schweiz. ecoinvent report No. 6-XII, Swiss Centre for Life Cycle Inventories, Dübendorf, CH, 2009.

## Time period
Time of publications.

## Parameters
- fraction, cooling water, cooling pond system, to air: 0.032 dimensionless; name fraction_CW_CP_to_air; lognormal variance with pedigree 0.0413, pedigree (2,3,1,3,1)
  Calculated based on literature value (Scown, C.D., 2011, Water Footprint of U.S. Transportation Fuels and supplying information of the article) (Vionnet, S., Quantis Water Database - Technical Report, 2012).
- fraction, cooling water, once-through system, to air: 0.004 dimensionless; name fraction_CW_OT_to_air; lognormal variance with pedigree 0.0413, pedigree (2,3,1,3,1)
  (same comment as for fraction, cooling water, cooling pond system, to air)
- fraction, cooling water, recirculating system, to air: 0.771 dimensionless; name fraction_CW_R_to_air; lognormal variance with pedigree 0.0413, pedigree (2,3,1,3,1)
  (same comment as for fraction, cooling water, cooling pond system, to air)
- fraction, cooling water, to air: 0.3875 dimensionless; name fraction_CW_to_air; = (0.5*fraction_CW_OT_to_air)+(0.5*fraction_CW_R_to_air); lognormal variance with pedigree 0.092025, pedigree (4,4,3,2,4)
  Calculated value based on literature value (see comments of the other parametres present in this dataset) and expert opinion. In the case when no industry/literature data are available about the type of cooling or directly fraction, cooling water, to air specific for the process a default assumption is applied. It is assumed that the once-through cooling system is used in 50% of all cases and recirculating system is used in another 50% of all cases.
- fraction, process water, to air: 0.15 dimensionless; name fraction_PW_to_air; lognormal variance with pedigree 0.092025, pedigree (4,4,3,2,4)
  Literature value. In case when no industry/process specific data are available, default evaporation fraction value is used. This value is 15% and is based on literature (Statistics Canada, 2007 & Shaffer, K.H., 2008, Consumptive water use in the Great Lakes Basin, USGS & Shiklomanov, 2003, World Water Resources at the Beginning of the 21st Century) and has been approved by an expert.
- fraction, water, completely softened, to air: 0.15 dimensionless; name fraction_WCS_to_air; lognormal variance with pedigree 0.092025, pedigree (4,4,3,2,4)

## Reference product
- silicon tetrachloride: 1 kg; name BP_silicon_tetrachloride; By-product classification allocatable product; CPC 34231: Chemical elements n.e.c.; inorganic acids except phosphoric, nitric and sulphonitric; inorganic oxygen compoun[…]; HS2017 281119: Inorganic acids; other than hydrogen fluoride; CAS 10026-04-7
  production volume 1.56315e7 kg; = RP_PV*BP_silicon_tetrachloride/ABS(RP)
    Calculated from the production volume of silicon, electronics grade in proportion to the respective output amounts.
  property price 0.5 EUR2005
    Calculated based on several resellers (available here: https://connect2india.com/amp/products/silicon-tetrachloride.html, https://kns-2021.en.made-in-china.com/product/rZLTnzRdsgYi/China-Silicon-Tetrachloride-Stc.html, all last accessed 2022-07-29).
    The price was converted to EUR based on the annual exchange rates published by the European Central Bank (https://sdw.ecb.europa.eu/quickview.do?SERIES_KEY=120.EXR.A.USD.EUR.SP00.A, last accessed on 2022-02-15) and adjusted for inflation relative to 2005 using the producer price index (PPI) of the euro area, published by eurostat (https://appsso.eurostat.ec.europa.eu/nui/show.do?dataset=sts_inpp_a&lang=en, last accessed on 2022-05-04).
  properties: allocation factor 0.0123204, carbon allocation 0 kg, carbon content 0, carbon content, fossil 0, carbon content, non-fossil 0, dry mass 1 kg, true value 0.888152, water content 0, water in wet mass 0 kg, wet mass 1 kg

## Inputs from technosphere
- electricity, high voltage: 0.0016082, 0.000282522, 0.00207674, 0.000177978, 0.00154683, 0.00152052, 0.00176367, 0.00238148, 0.0352421, 0.00118077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 kWh (48 suppliers, which the file names only by identifier); sum of these 1.17043 kWh; lognormal variance with pedigree 0.094, pedigree (3,1,5,5,1)
  Literature 1997, basic uncertainty = 1.5
  Uncertainty: L
- graphite: 6.8337e-6 kg; lognormal variance with pedigree 0.142, pedigree (4,4,5,5,4)
  Hagedorn 1992, graphite
  Uncertainty: H
  properties: carbon content, fossil 1, dry mass 1 kg, heating value, net 30.3 MJ, wet mass 1 kg
- heat, district or industrial, natural gas: 0.0201777, 1.22791, 0.000379461 MJ (3 suppliers, which the file names only by identifier); sum of these 1.24846 MJ; lognormal variance with pedigree 0.094, pedigree (3,1,5,5,1)
  Literature 1997, basic uncertainty = 1.5
  Uncertainty: L
  properties: heating value, net 1 MJ
- hydrochloric acid, without water, in 30% solution state: 0.0205339 kg; lognormal variance with pedigree 0.0526, pedigree (3,5,5,5,1)
  Estimation, produced on site
  Uncertainty: E
  properties: dry mass 1 kg, heating value, net 3.32 MJ, wet mass 1 kg
- hydrogen, gaseous, medium pressure, merchant: 0.000394866, 0.000247939 kg (2 suppliers, which the file names only by identifier); sum of these 0.000642805 kg; lognormal variance with pedigree 0.072, pedigree (4,4,5,5,1)
  Literature 1997, produced on site
  Uncertainty: L
  properties: dry mass 1 kg, heating value, net 120.21 MJ, wet mass 1 kg
- polyethylene, high density, granulate: 6.53842e-6 kg; lognormal variance with pedigree 0.142, pedigree (4,4,5,5,4)
  Literature, Hagedorn, different plastics
  Uncertainty: L
  properties: carbon content, fossil 0.857143, dry mass 1 kg, heating value, net 42.47 MJ, wet mass 1 kg
  note on carbon content, fossil: Polyethylene is formed out of a huge amount of ethylene monomers (C2H4) (ecoinvent v2.2 report 11_II). MW=28 g/mol
- silicon, metallurgical grade: 0.010267 kg; lognormal variance with pedigree 0.054, pedigree (3,1,5,5,1)
  Literature 1997
  Uncertainty: L
  properties: dry mass 1 kg, wet mass 1 kg
- silicone factory: 1.0267e-13 unit; lognormal variance with pedigree 0.36, pedigree (1,1,5,5,3)
  Estimation
  Uncertainty: E
- sodium hydroxide, without water, in 50% solution state: 0.00446387 kg; lognormal variance with pedigree 0.072, pedigree (4,4,5,5,1)
  Literature 1997, neutralization of wastes
  Uncertainty: L
  properties: dry mass 1 kg, heating value, net 3.03 MJ, wet mass 1 kg
- tetrafluoroethylene: 6.1571e-6 kg; lognormal variance with pedigree 0.142, pedigree (4,4,5,5,4)
  Hagedorn 1992, fittings
  Uncertainty: H
  properties: carbon content, fossil 0.24, dry mass 1 kg, heating value, net 7.27 MJ, wet mass 1 kg
- waste plastic, mixture: -9.14733e-9, -3.33283e-9, -5.87623e-10, -3.46629e-10, -2.29984e-9, -2.07302e-10, -2.14062e-10, -5.54799e-10, -1.98293e-10, -2.39385e-10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 kg (42 suppliers, which the file names only by identifier); sum of these -1.26951e-5 kg; lognormal variance with pedigree 0.11, pedigree (4,4,4,5,4)
  Hagedorn 1992
  Uncertainty: H
  production volume; = RP_PV*BP_waste_plastic_mixture/ABS(RP)
    (same comment as for silicon tetrachloride)
  properties: carbon content, fossil 0.747344, dry mass 0.847 kg, heating value, net 30.79 MJ, water content 0.180638, wet mass 1 kg
  note on carbon content, fossil: C content in 1 kg DM was calculated using data in Tab A.2, ecoinvent v2.2 report 13_I
  note on heating value, net: Value taken from the general comment of the treatment dataset.
- water, completely softened: 0.056787, 0.0758623 kg (2 suppliers, which the file names only by identifier); sum of these 0.132649 kg; lognormal variance with pedigree 0.0607, pedigree (2,2,5,5,3)
  Environmental report 2002
  Uncertainty: E
  properties: wet mass 1 kg

## Inputs from nature
- Water, cooling, unspecified natural origin [natural resource, in water]: 0.446387 m3; name water_cooling_UNO_input; lognormal variance with pedigree 0.072, pedigree (4,4,5,5,1)
  Literature 1997
  Uncertainty: L

## Emissions to nature
- Water [air, unspecified]: 0.172995 m3; = (water_softened_input/1000*fraction_WCS_to_air)+(water_cooling_UNO_input*fraction_CW_to_air); lognormal variance with pedigree 0.0827, pedigree (2,2,5,5,1)
  Calculated as a fraction of the input of water. For more details, refer to the mathematical relation and the parameters.
  property fraction, origin: fresh water 0.000115017; name fraction_origin_fresh_water
  property fraction, origin: salt water 0; name fraction_origin_salt_water
  property fraction, origin: unspecified 0.999885; name fraction_origin_unspecified
- AOX, Adsorbable Organic Halides [water, surface water]: 9.04428e-8 kg; lognormal variance with pedigree 0.1001, pedigree (1,2,5,5,3)
  Environmental report 2002, average Si product
  Uncertainty: E
- BOD5, Biological Oxygen Demand [water, surface water]: 1.46715e-6 kg; lognormal variance with pedigree 0.1001, pedigree (1,2,5,5,3)
  Environmental report 2002, average Si product
  Uncertainty: E
- COD, Chemical Oxygen Demand [water, surface water]: 1.44775e-5 kg; lognormal variance with pedigree 0.1001, pedigree (1,2,5,5,3)
  Environmental report 2002, average Si product
  Uncertainty: E
- Chloride [water, surface water]: 0.000257958 kg; lognormal variance with pedigree 0.3601, pedigree (1,2,5,5,3)
  Environmental report 2002, average Si product
  Uncertainty: E
- Copper ion [water, surface water]: 7.33596e-10 kg; lognormal variance with pedigree 0.7001, pedigree (1,2,5,5,3)
  Environmental report 2002, average Si product
  Uncertainty: E
- DOC, Dissolved Organic Carbon [water, surface water]: 6.52189e-6 kg; lognormal variance with pedigree 0.092, pedigree (3,5,5,5,1)
  Extrapolation for sum parameter
  Uncertainty: E
- Iron ion [water, surface water]: 4.01972e-8 kg; lognormal variance with pedigree 0.7001, pedigree (1,2,5,5,3)
  Environmental report 2002, average Si product
  Uncertainty: E
- Nitrogen [water, surface water]: 1.48727e-6 kg; lognormal variance with pedigree 0.1001, pedigree (1,2,5,5,3)
  Environmental report 2002, average Si product
  Uncertainty: E
- Phosphate [water, surface water]: 2.00986e-8 kg; lognormal variance with pedigree 0.1001, pedigree (1,2,5,5,3)
  Environmental report 2002, average Si product
  Uncertainty: E
- Sodium I [water, surface water]: 0.000242177 kg; lognormal variance with pedigree 0.1001, pedigree (1,2,5,5,3)
  Environmental report 2002, average Si product
  Uncertainty: E
- TOC, Total Organic Carbon [water, surface water]: 6.52189e-6 kg; lognormal variance with pedigree 0.1001, pedigree (1,2,5,5,3)
  Environmental report 2002, average Si product
  Uncertainty: E
- Water [water, unspecified]: 0.273525 m3; = (water_softened_input/1000)*(1-fraction_WCS_to_air)+water_cooling_UNO_input*(1-fraction_CW_to_air); lognormal variance with pedigree 0.0827, pedigree (2,2,5,5,1)
  (same comment as for Water)
  property carbon content, fossil 0; name C_content_fossil
  property carbon content, non-fossil 0; name C_content_non_fossil
  property dry mass 0 kg; name DM
  property fraction, origin: fresh water 0.000412218; name fraction_origin_fresh_water_Ww
  property fraction, origin: salt water 0; name fraction_origin_salt_water_Ww
  property fraction, origin: unspecified 0.999588; name fraction_origin_unspecified_Ww
  property water in wet mass 1000 kg; name WWM
  property wet mass 1000 kg; name WM
- Zinc II [water, surface water]: 1.40688e-8 kg; lognormal variance with pedigree 0.7001, pedigree (1,2,5,5,3)
  Environmental report 2002, average Si product
  Uncertainty: E

## Sampling procedure
Literature data.

## Extrapolations
This dataset has been copied from an original dataset covering the geography DE. The uncertainty has been adjusted accordingly.

## Review by Gregor Wernet 2017-08-04
This dataset was additionally reviewed in a separate review process by Eric Johnson of Atlantic Consulting as well as Emilia Moreno Ruiz and Gregor Wernet of ecoinvent.
