# tree seedling production, in heated greenhouse

Dataset: EcoSpold 2, unit process
Geography: RER
Time period: 2002-01-01 to 2023-12-31
Technology level: current
Classification: ISIC rev.4 ecoinvent: 0130:Plant propagation
Tags: Swiss brush-up completed
Scenario: Business-as-Usual
System model: Allocation, cut-off by classification
Generated by: Frank Werner
Database: ecoinvent
isCopyrightProtected: true
accessRestrictedTo: 1

## General comment
The dataset refers to the production of 1000 tree seedling The dataset contains the production of tree seedlings in a tree nursery for plantation in forests. The seedlings are produced in a heated greenhouse and packed for transport.
The seedlings go with a packaging of 1.05 kg of growing dras (HDPE), 3.65 kg of plant boxes from cardboard and 0.0525 kg of strech wrap (LLDPE), to be recycled or disposed of after planting

## Included activities start
The activity starts with the establishment of the greenhouse with HDPE film and considers soil improvement, fertilization, transport of inputs and transport packaging materials.The dataset also contains the disposal of the transport packaging (after plantation of the seedling).

## Included activities end
The activity ends with the seedlings packed for transportation. The dataset does not contain data on water use, frame infrastructure of the greenhouse and on the use of fungicides, insecticides etc. as source does not provide this information.

## Reference product
- tree seedling, for planting: 1 unit; source Alexandrido, S. 2000; By-product classification allocatable product; CPC 01961: Live plants; bulbs, tubers and roots; cuttings and slips; mushroom spawn; HS2017 060290: Plants, live; n.e.c. in heading no. 0602
  production volume 1e12 unit
    Unqualified guess, no information available
  property price 0.0627493 EUR2005
    Calculated based on inputs: The price of the product has been calculated as a sum of the values of the material and energy inputs for this product. This value is therefore a rough estimation. It may underestimate the real price since there are additional expenses when producing any product. These expences can include for example labour costs, treatment of waste materials and profit for the producer. Please consider carefully whether this level of data quality is acceptable for your application.
  properties: carbon allocation 0.0988 kg, carbon content 0.494, carbon content, non-fossil 0.494, dry mass 0.2 kg, water content 0.5, water in wet mass 0.1 kg, wet mass 0.3 kg

## Inputs from technosphere
All rows: source Alexandrido, S. 2000
- compost: 1.5 kg; = 1000*1.5
  assumed 1 l of compost per seedling at 1.5 kg/l
  properties: UVEK_link_1 527, UVEK_relative_amount_1 1, carbon content, non-fossil 0.183645, copper content 5.77e-5, dry mass 0.5 kg, lead content 4.9e-5, nitrogen content 0.014, phosphorus content 0.0035, potassium content 0.01, water content 1, wet mass 1 kg, zinc content 0.000184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
  note on UVEK_link_1: to be used only in special submissions in coordination with ecoinvent and the Swiss FOEN
- diesel, burned in building machine: 0.0184 MJ; lognormal variance with pedigree 0.235, pedigree (5,5,5,5,5)
  properties: UVEK_link_1 732, UVEK_relative_amount_1 1, heating value, net 1 MJ
- electricity, medium voltage: 0.0704 kWh; lognormal variance with pedigree 0.235, pedigree (5,5,5,5,5)
  properties: UVEK_link_1 1779, UVEK_relative_amount_1 1
- extrusion, plastic film: 0.00116 kg; = 0.11+1.05; lognormal variance with pedigree 0.235, pedigree (5,5,5,5,5)
  for greenhouse film and growing trays
  properties: UVEK_link_1 2107, UVEK_relative_amount_1 1
- heat, central or small-scale, other than natural gas: 0.801 MJ; lognormal variance with pedigree 0.235, pedigree (5,5,5,5,5)
  Kipelainen et al 2001: Life cycle assessment tool for estimating net CO2 exchange of forest production. Bionenergy 2011, report 237.5 MJ/1000 seedlings
  properties: UVEK_link_1 2554, UVEK_relative_amount_1 1, heating value, net 1 MJ
- inorganic nitrogen fertiliser, as N: 0.000609 kg; = 2.03*0.3; lognormal variance with pedigree 0.235, pedigree (5,5,5,5,5)
  assuming and N content of 30%
  properties: UVEK_link_1 174, UVEK_relative_amount_1 1, dry mass 1 kg, wet mass 1 kg
- packaging film, low density polyethylene: 0.0001655 kg; name m_packaging_film; = 0.0525+0.113; lognormal variance with pedigree 0.235, pedigree (5,5,5,5,5)
  strech wrap and packaging of other inputs
  properties: UVEK_link_1 3323, UVEK_relative_amount_1 1, carbon content, fossil 0.857143, dry mass 1 kg, heating value, net 42.47 MJ, wet mass 1 kg
- polyethylene, high density, granulate: 0.00116 kg; name m_PE; = 0.11+1.05; lognormal variance with pedigree 0.235, pedigree (5,5,5,5,5)
  for greenhouse film (based on an estimated service life of the greenhouse of 3.5 years) and growing trays
  properties: UVEK_link_1 3540, UVEK_relative_amount_1 1, carbon content, fossil 0.857143, dry mass 1 kg, heating value, net 42.47 MJ, wet mass 1 kg
  note on carbon content, fossil: Polyethylene is formed out of a huge amount of ethylene monomers (C2H4) (ecoinvent v2.2 report 11_II). MW=28 g/mol
- polystyrene, extruded: 4.5e-5 kg; lognormal variance with pedigree 0.235, pedigree (5,5,5,5,5)
  for soil improvement
  properties: UVEK_link_1 3555, UVEK_relative_amount_1 1, carbon content, fossil 0.873427, dry mass 1 kg, heating value, net 38.67 MJ, wet mass 1 kg
- waste polyethylene: -0.0013255 kg; = m_packaging_film+m_PE; lognormal variance with pedigree 0.0262, pedigree (2,3,1,1,1)
  disposal of greenhouse film and packaging of other inputs
  production volume
    Calculated from production volume of reference product using the relative outputs.
  properties: UVEK_link_1 1040, UVEK_relative_amount_1 -1, carbon content, fossil 0.825301, dry mass 0.996 kg, heating value, net 42.47 MJ, water content 0.00401606, wet mass 1 kg
  note on carbon content, fossil: C content in 1 kg DM was calculated using data in Tab A.1, ecoinvent v2.2 report 13_I
  note on heating value, net: Value taken from the general comment of the treatment dataset.

## Inputs from nature
- Occupation, industrial area [natural resource, land]: 0.00133333 m2*year; = 1/0.75; lognormal variance with pedigree 0.2406, pedigree (1,1,5,1,2)
  assumed growing density of 750 seedlings/m2, based on Aldentun 2002
- Transformation, from industrial area [natural resource, land]: 0.00133333 m2; = 1/0.75; lognormal variance with pedigree 0.3906, pedigree (1,3,5,1,1)
  assumed growing density of 750 seedlings/m2, based on Aldentun 2002
- Transformation, to industrial area [natural resource, land]: 0.00133333 m2; = 1/0.75; lognormal variance with pedigree 0.3906, pedigree (1,3,5,1,1)
  assumed growing density of 750 seedlings/m2, based on Aldentun 2002

## Sampling procedure
Sample from 4 nurseries in
