# concrete, all types to generic market for concrete, normal strength

Dataset: EcoSpold 2, unit process
Geography: RNA
Time period: 2019-01-01 to 2023-12-31
Technology level: current
Classification: ISIC rev.4 ecoinvent: 2395:Manufacture of articles of concrete, cement and plaster
Scenario: Business-as-Usual
System model: Allocation, cut-off by classification
Generated by: Lucia Valsasina
Database: ecoinvent
isCopyrightProtected: true
accessRestrictedTo: 1

## General comment
This is a linking (transfering) activity which links the specific concrete types to the generic market for concrete, normal.
The shares of the different types of concrete are set based on production volumes of the respective activities and geographies.

## Included activities start
The activity starts with the reception of a specific concrete.

## Included activities end
The activity ends with concrete, normal which is supplied to the generic market for concrete, normal.

## Reference product
- concrete, normal strength: 1 m3; By-product classification allocatable product; CPC 37510: Non-refractory mortars and concretes; HS2017 6810: Cement, concrete or artificial stone; whether or not reinforced, articles thereof
  production volume 2.80127e7 m3
    PV is calculated assuming that 20% of the regional PV is redirected to the generic market.
  property carbon content, fossil 0
    cement and gravel. Tab 6.2, ecoinvent v2.2 report 7, part III
  property carbon content, non-fossil 0
    cement and gravel. Tab 6.2, ecoinvent v2.2 report 7, part III
  property price 185 EUR2005
    Data are not easily available. Therefore, an average price of products supplied by the activities in the same ISIC 3 code has been applied.This price is obtained as '_49 Concrete, asphalt and other mineral products, EU27 virgin, EU27' in the 'EU & DK Input Output Database' (available in SimaPro). The price is assumed to be valid for both RER2003, RER 2004, world 2003 and world 2004. Multiplied by density.
  properties: carbon allocation 0 kg, carbon content 0, dry mass 2190 kg, water content 0.086758, water in wet mass 190 kg, wet mass 2380 kg

## Inputs from technosphere
- concrete, 20MPa: 0.202 m3
  Shares calculated based on the regional production volumes.
- concrete, 25MPa: 0.404 m3
  Shares calculated based on the regional production volumes.
- concrete, 30-32MPa: 0.152 m3
  Shares calculated based on the regional production volumes.
- concrete, 35MPa: 0.242 m3
  Shares calculated based on the regional production volumes.
