# grass silage production, Swiss integrated production, intensive

Dataset: EcoSpold 2, unit process
Geography: CH
Time period: 1995-01-01 to 2023-12-31
Technology level: current
Classification: ISIC rev.4 ecoinvent: 0119:Growing of other non-perennial crops
Scenario: Business-as-Usual
System model: Allocation, cut-off by classification
Generated by: Fredy Dinkel
Published in: Jungbluth N. 2007
Database: ecoinvent
isCopyrightProtected: true
accessRestrictedTo: 1

## General comment
This dataset represents the production of 1 kg of grass silage (dry matter). The dry matter yield is 13500 kg/ha. Moisture content at storage is 65%.
[This dataset was already contained in the ecoinvent database version 2. It was not individually updated during the transfer to ecoinvent version 3. Life Cycle Impact Assessment results may still have changed, as they are affected by changes in the supply chain, i.e. in other datasets. This dataset was generated following the ecoinvent quality guidelines for version 2. It may have been subject to central changes described in the ecoinvent version 3 change report (http://www.ecoinvent.org/database/ecoinvent-version-3/reports-of-changes/), and the results of the central updates were reviewed extensively. The changes added e.g. consistent water flows and other information throughout the database. The documentation of this dataset can be found in the ecoinvent reports of version 2, which are still available via the ecoinvent website. The change report linked above covers all central changes that were made during the conversion process.]

## Included activities start
Grass silage is assumed to be composed of grass from 'grass production, Swiss integrated production, intensive' (35%) and from 'grass production, permanent grassland, Swiss integrated production, intensive' (65%). In the former case the process starts with the establishment of a temporary meadow, in the latter case an established grassland is the starting point. Find details in the respective datasets.

## Included activities end
The dataset includes all machine operations of the contributing grass production systems in fractions as shown in 'included activities start'. Additionally, the processes of swathing, haying, baling, loading of bales and transport to the farm (1 km) are included. This activity ends after loading of bales at the farm gate.

## Geography
Refers to a production in the Swiss plateau (lowlands <700m).

## Technology
Intensive IP production.

## Parameters
- fraction, irrigation water to surface water: 0.2 dimensionless; name fraction_IW_to_surface_water; lognormal variance with pedigree 0.0886, pedigree (4,3,1,1,4)
  Literature value (Döll, 2011) cross referenced with expert opinion.
- fraction, irrigation water, to air: 0.3353 dimensionless; name fraction_IW_to_air; lognormal variance with pedigree 0.0409, pedigree (2,2,2,1,1)
  Literature value (Siebert, 2010) (Vionnet, S., Quantis Water Database - Technical Report, 2012).
- fraction, irrigation water, to ground water: 0.8 dimensionless; name fraction_IW_to_ground_water; lognormal variance with pedigree 0.0886, pedigree (4,3,1,1,4)
  Literature value (Döll, 2011) cross referenced with expert opinion.

## Reference product
- grass silage, Swiss integrated production: 1 kg; name REF_PRODUCT; By-product classification allocatable product; CPC 01919: Forage products, n.e.c.; HS2017 0604: Foliage, branches and other parts of plants, without flowers or flower buds, and grasses, mosses and lichens;[...]
  production volume 1.89744e8 kg
    65% assumed to be corresponding to 1/3 of fresh grass from permanent, integrated grassland, the rest from temporary grasslands.
  property carbon content, non-fossil 0.44076; name REF_PRODUCT_C_content_non_fossil
    biogene carbon content on a dry matter basis
    Composition data obtained from Grass Silage, in (http://beefmagazine.com/images/2009%20feed%20table.pdf). First, composition data were refered to 1 kg dry mass. Then, C-contents were calculated considering a C-content/dry mass of 46% in carbohydrates (including fibres), 53% in proteins and 75% in fats. All data from 'Evolutionary and Biochemical Aspects', A.D. Kay and T. Vrede (in Global Ecology, 2010, Elsevier B.V., S.E. Jørgensen Ed.).
  property dry mass 1 kg; name REF_PRODUCT_DM
  property energy content 17.9 MJ; name REF_PRODUCT_energy_content
    Calculated as average of inventories of 'grass production, permanent grassland, Swiss integrated production, intensive' (portion 65%) and 'grass production, Swiss integrated production, intensive' (temporary grassland; portion 35%).
  property price 0.129 EUR2005
    Calculated from price of the activity '_4 Grain crops, dk' in EU & DK Input Output database'. Conversion from basic price to purchaser price with factor 1.20.
  properties: carbon allocation 0.44076 kg, carbon content 0.44076, carbon content, fossil 0, water content 1.85714, water in wet mass 1.85714 kg, wet mass 2.85714 kg

## Inputs from technosphere
- [thio]carbamate-compound: 1.07e-5 kg; source LBL 2004; lognormal variance with pedigree 0.0587, pedigree (2,2,5,1,3)
  Calculated as average of inventories of 'grass production, permanent grassland, Swiss integrated production, intensive' (portion 65%) and 'grass production, Swiss integrated production, intensive' (temporary grassland; portion 35%). Silage loss about 10% (LBL 2004).
  properties: carbon content, fossil 0.626349, dry mass 1 kg, wet mass 1 kg
  note on carbon content, fossil: Approximated as an unweighted average of the C-content of the [thio]carbamate-compounds (Tab 2.25 Sutter, 2010) carbofuran,orbencarb, prosulfocarb
- ammonium nitrate: 0.007055 kg; source LBL 2004; lognormal variance with pedigree 0.0587, pedigree (2,2,5,1,3)
  The exchange has been updated from 'ammonium nitrate, as N' into 'ammonium nitrate' and therefore its amount has been scaled (multiplied) from 0.0025 kg by 2.8573 kg of 'ammonium nitrate' per kg of 'ammonium nitrate, as N'. Original comment of the exchange is: Calculated as average of inventories of 'grass production, permanent grassland, Swiss integrated production, intensive' (portion 65%) and 'grass production, Swiss integrated production, intensive' (temporary grassland; portion 35%). Silage loss about 10% (LBL 2004).
  properties: dry mass 1 kg, wet mass 1 kg
- application of plant protection product, by field sprayer: 2.8807e-5 ha; source LBL 2004; lognormal variance with pedigree 0.0587, pedigree (2,2,5,1,3)
  Calculated as average of inventories of 'grass production, permanent grassland, Swiss integrated production, intensive' (portion 65%) and 'grass production, Swiss integrated production, intensive' (temporary grassland; portion 35%). Silage loss about 10% (LBL 2004).
  This exchange has an activity link directly to the producing activity because the product is primarily consumed in the same geographical area where it is produced.
- bale loading: 0.0057143 unit; lognormal variance with pedigree 0.0693, pedigree (2,3,5,3,3)
  Amount of bales calculated from the hectare yield assuming 175 kg DM per bale.
  This exchange has an activity link directly to the producing activity because the product is primarily consumed in the same geographical area where it is produced.
- baling: 0.0057143 unit; lognormal variance with pedigree 0.0693, pedigree (2,3,5,3,3)
  (same comment as for bale loading)
- fertilising, by broadcaster: 8.2305e-5 ha; source LBL 2004; lognormal variance with pedigree 0.0587, pedigree (2,2,5,1,3)
  (same comment as for application of plant protection product, by field sprayer)
- grass seed, Swiss integrated production, for sowing: 0.00037449 kg; name SEED; source LBL 2004; lognormal variance with pedigree 0.0507, pedigree (2,2,5,1,1)
  (same comment as for [thio]carbamate-compound)
  property carbon content, non-fossil 0.464601; name SEED_C_content_non_fossil
  property dry mass 0.9 kg; name SEED_DM
  property energy content 16.299 MJ; name SEED_energy_content
  properties: water content 0.111111, wet mass 1 kg
  note on carbon content, non-fossil: biogene carbon content on a dry matter basis wheat grains values are used
  note on energy content: See chapter 'Product Properties' in '01_crop production - yields & inputs CH & Europe_v1.0.pdf', section 'AGRICULTURAL PRODUCTION IN SWITZERLAND' - pdf-document on the dedicated talk page of ecoinvent (www.ecoinvent.org/documentation).
- haying, by rotary tedder: 0.00041152 ha; source LBL 2004; lognormal variance with pedigree 0.0506, pedigree (2,1,5,1,1)
  Short drying to reduce water content from 85% to 65% for silage production (4-5 cuts per year for intensive grassland, 1 cut for extensive grassland)
  This exchange has an activity link directly to the producing activity because the product is primarily consumed in the same geographical area where it is produced.
- irrigation: 0.000127176 m3; name water_irrigation_input; source Siebert, S. 2010; lognormal variance with pedigree 0.0427, pedigree (2,2,5,1,1)
  Calculated based on literature values (Döll, 2010) and partially modelled at ETH (Pfister, S.).
  property carbon content, fossil 0; name C_content_fossil
  property carbon content, non-fossil 0; name C_content_non_fossil
  property dry mass 0.11 kg; name DM
  property water content 9089.91; name water_content
  property water in wet mass 999.89 kg; name WWM
  property wet mass 1000 kg; name WM
- liquid manure spreading, by vacuum tanker: 0.0068724 m3; source LBL 2004; lognormal variance with pedigree 0.0587, pedigree (2,2,5,1,3)
  (same comment as for application of plant protection product, by field sprayer)
- mowing, by rotary mower: 0.00041152 ha; source LBL 2004; lognormal variance with pedigree 0.0587, pedigree (2,2,5,1,3)
  (same comment as for application of plant protection product, by field sprayer)
- packaging, for fertilisers: 0.0049382 kg; lognormal variance with pedigree 0.0912, pedigree (4,3,5,5,4)
  Total amount of active substance/s of fertilisers needed for the production of 'grass silage, Swiss integrated production' is calculated to be circa 2.47E-03 kg. Fertiliser/s used in this dataset is/are: 'ammonium nitrate, as N'. The total amount of active substance/s is doubled in order to account for the packaging of the dilluted product of fertiliser/s that is/are applied. Therefore, 4.94E-03 kg of packaging for fertilisers is justified with this exchange.
  properties: carbon content, fossil 0.825301, dry mass 1 kg, heating value, net 25.01 MJ, price 0.0642 EUR2005, wet mass 1 kg
  note on carbon content, fossil: Considering a chemical formula (C2H4)n for polyethylene, carbon content-fossil is calculated to be 0.856286 kg of Carbon per kg of dry mass.
- packaging, for pesticides: 0.000117422 kg; lognormal variance with pedigree 0.0912, pedigree (4,3,5,5,4)
  Total amount of active substance/s of pesticides needed for the production of grass silage, Swiss integrated production is calculated to be circa 5.87E-05 kg. Pesticide/s used in this dataset is/are: '[thio]carbamate-compound', 'phenoxy-compound'. The total amount of active substance/s is doubled in order to account for the packaging of the dilluted product of pesticide/s that is/are applied. Therefore, 1.17E-04 kg of packaging for pesticides is justified with this exchange.
  properties: carbon content, fossil 0.85714, dry mass 1 kg, heating value, net 25.97 MJ, price 0.0642 EUR2005, wet mass 1 kg
- phenoxy-compound: 4.8011e-5 kg; source LBL 2004; lognormal variance with pedigree 0.0587, pedigree (2,2,5,1,3)
  (same comment as for [thio]carbamate-compound)
  properties: carbon content, fossil 0.532559, dry mass 1 kg, wet mass 1 kg
  note on carbon content, fossil: An unweighted average of the C content in mCPA, mCPB, mecoprop, fluazifop-P-butyl, and 2,4-D. Those substances are classified as phenoxy-compounds in Tab 2.25, Sutter 2010
- sowing: 9.6022e-6 ha; source LBL 2004; lognormal variance with pedigree 0.0587, pedigree (2,2,5,1,3)
  (same comment as for application of plant protection product, by field sprayer)
- swath, by rotary windrower: 0.00041152 ha; source LBL 2004; lognormal variance with pedigree 0.0506, pedigree (2,1,5,1,1)
  (same comment as for haying, by rotary tedder)
- tillage, cultivating, chiselling: 9.6022e-6 ha; source LBL 2004; lognormal variance with pedigree 0.0587, pedigree (2,2,5,1,3)
  (same comment as for application of plant protection product, by field sprayer)
- tillage, harrowing, by rotary harrow: 9.6022e-6 ha; source LBL 2004; lognormal variance with pedigree 0.0587, pedigree (2,2,5,1,3)
  (same comment as for application of plant protection product, by field sprayer)
- tillage, rolling: 9.6022e-6 ha; source LBL 2004; lognormal variance with pedigree 0.0587, pedigree (2,2,5,1,3)
  (same comment as for application of plant protection product, by field sprayer)
- transport, tractor and trailer, agricultural: 0.0015 metric ton*km; lognormal variance with pedigree 0.0507, pedigree (2,2,5,1,1)
  Transport of bales to the farm, about 1.5 km.

## Inputs from nature
- Carbon dioxide, in air [natural resource, in air]: 1.61555 kg; = 44/12 * (REF_PRODUCT_C_content_non_fossil * REF_PRODUCT * REF_PRODUCT_DM - SEED_C_content_non_fossil * SEED * SEED_DM); source LBL 2004; lognormal variance with pedigree 0.0408, pedigree (2,2,5,3,1)
  (same comment as for [thio]carbamate-compound)
- Energy, gross calorific value, in biomass [natural resource, biotic]: 17.9 MJ; lognormal variance with pedigree 0.041981, pedigree (2,2,5,3,1)
  Calculated from inventories of intensive natural meadows (portion 65%) and intensive temporary meadows (portion 35%)
- Occupation, pasture, man made, intensive [natural resource, land]: 0.74074 m2*year; source LBL 2004; lognormal variance with pedigree 0.0807, pedigree (2,2,5,1,1)
  (same comment as for [thio]carbamate-compound)
- Transformation, from annual crop, non-irrigated, intensive [natural resource, land]: 0.060494 m2; source LBL 2004; lognormal variance with pedigree 0.1781, pedigree (4,2,5,1,1)
  (same comment as for [thio]carbamate-compound)
- Transformation, from pasture, man made, intensive [natural resource, land]: 0.05 m2; source LBL 2004; lognormal variance with pedigree 0.1781, pedigree (4,2,5,1,1)
  (same comment as for [thio]carbamate-compound)
- Transformation, to pasture, man made, intensive [natural resource, land]: 0.110493 m2; source LBL 2004; lognormal variance with pedigree 0.1781, pedigree (4,2,5,1,1)
  (same comment as for [thio]carbamate-compound)

## Emissions to nature
- Ammonia [air, non-urban air or from high stacks]: 0.00396743 kg; source LBL 2004; lognormal variance with pedigree 0.1208, pedigree (2,2,5,3,4)
  (same comment as for [thio]carbamate-compound)
- Dinitrogen monoxide [air, non-urban air or from high stacks]: 0.000278 kg; name N2O; source LBL 2004; lognormal variance with pedigree 0.1608, pedigree (2,2,5,3,4)
  (same comment as for [thio]carbamate-compound)
- Nitrogen oxides [air, non-urban air or from high stacks]: 5.838e-5 kg; = 0.21 * N2O; source LBL 2004; lognormal variance with pedigree 0.1608, pedigree (2,2,5,3,4)
  (same comment as for [thio]carbamate-compound)
- Water [air, unspecified]: 4.26421e-5 m3; name water_to_air_unspecified; = (water_irrigation_input*fraction_IW_to_air); lognormal variance with pedigree 0.0807, pedigree (2,2,5,1,1)
  Calculated value based on literature values and expert opinion. See comments in the parametres' comment field.
  property fraction, origin: fresh water 1; name fraction_origin_fresh_water
  property fraction, origin: salt water 0; name fraction_origin_salt_water
  property fraction, origin: unspecified 0; name fraction_origin_unspecified
- Asulam [soil, agricultural]: 1.07e-5 kg; source LBL 2004; lognormal variance with pedigree 0.0608, pedigree (2,2,5,3,1)
  (same comment as for [thio]carbamate-compound)
- Cadmium II [soil, agricultural]: -8.8971e-8 kg; source LBL 2004
  (same comment as for [thio]carbamate-compound)
- Chromium III [soil, agricultural]: 3.1221e-8 kg; source LBL 2004; lognormal variance with pedigree 0.1087, pedigree (2,1,5,3,3)
  (same comment as for [thio]carbamate-compound)
- Copper ion [soil, agricultural]: 1.9877e-6 kg; source LBL 2004; lognormal variance with pedigree 0.1087, pedigree (2,1,5,3,3)
  (same comment as for [thio]carbamate-compound)
- Lead II [soil, agricultural]: -2.4835e-6 kg; source LBL 2004
  (same comment as for [thio]carbamate-compound)
- MCPB [soil, agricultural]: 4.8011e-5 kg; source LBL 2004; lognormal variance with pedigree 0.0613, pedigree (2,3,5,3,1)
  (same comment as for [thio]carbamate-compound)
- Mercury II [soil, agricultural]: -4.2905e-8 kg; source LBL 2004
  (same comment as for [thio]carbamate-compound)
- Nickel II [soil, agricultural]: -4.1942e-7 kg; source LBL 2004
  (same comment as for [thio]carbamate-compound)
- Zinc II [soil, agricultural]: 6.189e-6 kg; source LBL 2004; lognormal variance with pedigree 0.1087, pedigree (2,1,5,3,3)
  (same comment as for [thio]carbamate-compound)
- Nitrate [water, ground-]: 0.00408 kg; source LBL 2004; lognormal variance with pedigree 0.1608, pedigree (2,2,5,3,4)
  (same comment as for [thio]carbamate-compound)
- Phosphate [water, ground-]: 1.4229e-5 kg; source LBL 2004; lognormal variance with pedigree 0.1608, pedigree (2,2,5,3,4)
  (same comment as for [thio]carbamate-compound)
- Phosphate [water, surface water]: 7.2822e-5 kg; source LBL 2004; lognormal variance with pedigree 0.1608, pedigree (2,2,5,3,4)
  (same comment as for [thio]carbamate-compound)
- Phosphorus [water, surface water]: 9.1419e-6 kg; source LBL 2004; lognormal variance with pedigree 0.1608, pedigree (2,2,5,3,4)
  (same comment as for [thio]carbamate-compound)
- Water [water, ground-]: 6.76271e-5 m3; name water_to_water_ground; = water_irrigation_input*(1-fraction_IW_to_air)*fraction_IW_to_ground_water; lognormal variance with pedigree 0.1286, pedigree (4,3,5,1,4)
  Calculated value. See the parameters and their comments to understand the calculation.
  property fraction, origin: fresh water 1; name fraction_origin_fresh_water_Wgw
  property fraction, origin: salt water 0; name fraction_origin_salt_water_Wgw
  property fraction, origin: unspecified 0; name fraction_origin_unspecified_Wgw
- Water [water, surface water]: 1.69068e-5 m3; name water_to_water_surface; = water_irrigation_input*(1-fraction_IW_to_air)*fraction_IW_to_surface_water; lognormal variance with pedigree 0.1286, pedigree (4,3,5,1,4)
  Calculated value. See the parameters and their comments to understand the calculation.
  property fraction, origin: fresh water 1; name fraction_origin_fresh_water_Wsw
  property fraction, origin: salt water 0; name fraction_origin_salt_water_Wsw

## Sampling procedure
Data were compiled from statistics, fertilising recommendations, documents from extension services and expert knowledge.

## Review by Niels Jungbluth 2005-12-02
Passed.
