# treatment of used window frame, wood, collection for final disposal

Dataset: EcoSpold 2, unit process
Geography: RoW
Time period: 1996-01-01 to 2023-12-31
Technology level: current
Classification: EcoSpold01Categories: waste management/building demolition
Classification: ISIC rev.4 ecoinvent: 3821:Treatment and disposal of non-hazardous waste
Tags: ConvertedDataset; Treatment
Scenario: Business-as-Usual
System model: Allocation, cut-off by classification
Generated by: Martin Lehmann
Published in: Kellenberger D. 2007
Database: ecoinvent
isCopyrightProtected: true
accessRestrictedTo: 1

## General comment
This dataset describes the disposal of a wooden window frame with 1 m2 visible area via a municipal incineration plant. Distance to incineration site is assumed to be 50 km.
[This dataset was already contained in the ecoinvent database version 2. It was not individually updated during the transfer to ecoinvent version 3. Life Cycle Impact Assessment results may still have changed, as they are affected by changes in the supply chain, i.e. in other datasets. This dataset was generated following the ecoinvent quality guidelines for version 2. It may have been subject to central changes described in the ecoinvent version 3 change report (http://www.ecoinvent.org/database/ecoinvent-version-3/reports-of-changes/), and the results of the central updates were reviewed extensively. The changes added e.g. consistent water flows and other information throughout the database. The documentation of this dataset can be found in the ecoinvent reports of version 2, which are still available via the ecoinvent website. The change report linked above covers all central changes that were made during the conversion process.]

## Included activities end
Included processes are the disposal of wood, paint, rubber, plastic, steel, aluminium, copper and zinc parts, and the transport to the incineration site. Metal parts are too small to be efficiently collected and recycled.

## Geography
Swiss practice of waste management of window frames.

## Technology
Waste management includes incineration of wood, paint, rubber, plastic, steel, aluminium, copper and zinc parts, and the transport to the incineration site by average 28t lorry.

## Reference product
- used window frame, wood: -1 m2; By-product classification Waste; CPC 39282: Agglomerated wood waste and scrap in forms other than pellets; HS2017 440139: Wood; for fuel, sawdust and wood waste and scrap, agglomerated in logs, briquettes, pellets or similar form[...]
  EcoSpold01Location=CH
  production volume 3.96633 m2
    This is a placeholder value that does not reflect real-world production volumes. This dataset does not currently require a real-world production volume to work in the database framework, and no actual data were collected yet. This has no negative effect on the results of the ecoinvent database.
  property price 0 EUR2005
    Waste products are assigned a price of zero as they are assumed to require further treatment.
  properties: carbon allocation 49.3303 kg, carbon content 0.647464, carbon content, fossil 0.0315533, carbon content, non-fossil 0.615911, dry mass 76.19 kg, water content 0.0526316, water in wet mass 4.01 kg, wet mass 80.2 kg

## Inputs from technosphere
All rows: lognormal variance with pedigree 0.0126, pedigree (1,3,1,5,1)
- scrap aluminium: -0.0105768, -0.0050232 kg (2 suppliers, which the file names only by identifier); sum of these -0.0156 kg
  EcoSpold01Location=CH
  production volume
    Calculated from the production volume of used window frame, wood in proportion to the respective output amounts.
  properties: dry mass 1 kg, wet mass 1 kg
- scrap copper: -0.00422394, -0.00200606 kg (2 suppliers, which the file names only by identifier); sum of these -0.00623 kg
  EcoSpold01Location=CH
  production volume
    (same comment as for scrap aluminium)
  properties: dry mass 1 kg, wet mass 1 kg
- scrap steel: -3.33572, -1.59428 kg (2 suppliers, which the file names only by identifier); sum of these -4.93 kg
  EcoSpold01Location=CH
  production volume
    (same comment as for scrap aluminium)
  properties: dry mass 1 kg, wet mass 1 kg
- waste paint: -0.566168, -4.66383 kg (2 suppliers, which the file names only by identifier); sum of these -5.23 kg
  EcoSpold01Location=CH
  production volume
    (same comment as for scrap aluminium)
  properties: carbon content, fossil 0.65, dry mass 1 kg, heating value, net 19.7 MJ, wet mass 1 kg
  note on carbon content, fossil: Tab A.5, ecoinvent v2.2 report 13_I. C content has been calculated after data in the tables, and then referred to 1 kg DM
- waste plastic, mixture: -9.17488e-5, -8.71241e-5, -0.342388, -0.00332454, -0.00283266, -0.000222133, -3.70655e-5, -1.67995e-5 kg (8 suppliers, which the file names only by identifier); sum of these -0.349 kg
  EcoSpold01Location=CH
  production volume
    (same comment as for scrap aluminium)
  properties: carbon content, fossil 0.747344, dry mass 0.847 kg, heating value, net 30.79 MJ, water content 0.180638, wet mass 1 kg
  note on carbon content, fossil: C content in 1 kg DM was calculated using data in Tab A.2, ecoinvent v2.2 report 13_I
  note on heating value, net: Value taken from the general comment of the treatment dataset.
- waste polyethylene: -1.62233e-5, -4.13632e-5, -1.70845e-5, -3.12823e-6, -0.254769, -0.000527468, -6.90194e-6, -0.00061906 kg (8 suppliers, which the file names only by identifier); sum of these -0.256 kg
  EcoSpold01Location=CH
  production volume
    (same comment as for scrap aluminium)
  properties: carbon content, fossil 0.825301, dry mass 0.996 kg, heating value, net 42.47 MJ, water content 0.00401606, wet mass 1 kg
  note on carbon content, fossil: C content in 1 kg DM was calculated using data in Tab A.1, ecoinvent v2.2 report 13_I
- waste rubber, unspecified: -0.68728, -0.43272 kg (2 suppliers, which the file names only by identifier); sum of these -1.12 kg
  EcoSpold01Location=CH
  production volume
    (same comment as for scrap aluminium)
  properties: carbon content, fossil 0.853, dry mass 1 kg, heating value, net 27.19 MJ, wet mass 1 kg
- waste wood, untreated: -2.28758, -0.0595464, -44.3737, -0.814463, -0.345598, -10.2132, -0.546362, -6.55952 kg (8 suppliers, which the file names only by identifier); sum of these -65.2 kg
  EcoSpold01Location=CH
  production volume
    (same comment as for scrap aluminium)
  properties: carbon content, non-fossil 0.48632, dry mass 0.8 kg, heating value, net 13.99 MJ, water content 0.25, wet mass 1 kg
  note on carbon content, non-fossil: Tab A.4, ecoinvent v2.2 report 13_I. C content has been referred to 1 kg DM,
- zinc in car shredder residue: -0.29 kg
  EcoSpold01Location=CH
  production volume
    (same comment as for scrap aluminium)
  properties: dry mass 1 kg, wet mass 1 kg

## Sampling procedure
Calculation from window frame material composition

## Extrapolations
see Geography This dataset has been copied from an original dataset covering the geography CH. The uncertainty has been adjusted accordingly.

## Review by Rolf Frischknecht 2007-11-07
passed
