# flax production

Dataset: EcoSpold 2, unit process
Geography: IN
Time period: 2016-03-09 to 2023-03-24
Technology level: current
Classification: ISIC rev.4 ecoinvent: 0116:Growing of fibre crops
Classification: EcoSpold01Categories: agricultural production/plant production
Scenario: Business-as-Usual
System model: Allocation, cut-off by classification
Generated by: Archana Datta
Published in: Faist Emmenegger, M. 2018
Database: ecoinvent
isCopyrightProtected: true
accessRestrictedTo: 1

## General comment
This inventory dataset covers the field activity for the production of 1 kg of Flax plant in India in 2016-17 through Flax cultivation. The transformation of Flax from the Flax plant (green matter) - the Flax retting and dressing process - is covered in a separate dataset.
Sunnhemp Research Station (CRIJAF), Pratapgarh, Uttar Predesh has developed Indias first and, improved strains (tall type) of flax fibre variety, called Tiara (JRF-2), released in 2015. Flax is primarily a rabi season crop and ideal sowing time for flax in India is last week of October to first week of November, before the temperature becomes too low and affects the seed germination and fibre yield and fibre quality. The farming dataset, covers soil preparation (fall tillage), inputs of seeds, application of mineral and organic fertilizers, spraying pesticides, irrigation water and ends with the harvesting of Flax plant.
Insects-pest and diseases are not major constraint in the flax crop. Flax cultivation does not require use of pesticides. They can be applied when required. First hand weeding at 21-25 days and second hand weeding at 40-45 days should be done after sowing. For better crop , manuring with farm yard manure or cakes @ of 5 tonne/ha is recommended. Application of fertilizers is recommended at combination of 60 kg N, 40 kg P and 40 kg K per has been optimised for best results. Usually, Flax crop can be grown in rain-fed and irrigated conditions both, but in irrigated condition, higher production can be obtained. Two irrigations favour the production of good quality fibre. So first irrigation is applied at 35 days after sowing and second irrigation can be applied at 65 days.
The Flax fibre crop matures in around 120-125 days. It is harvested before capsules mature i.e. when 2/3rd of the plants portion turn yellow, and 2/3rd leaves of plants are fallen. The fiber qualty degrades once the plant gets brown colour. Harvesting is done by pulling out the plants from the ground. Plants are tied in small bundles of 15-20cm diameter for retting. Early harvesting may result in tender and fine fibre but low yield, and late harvesting may result in higher yield with poor quality of fibre.
Machinery and fixed overhead are excluded from life cycle inventory for the activity, since the machineries and fixed overheads provide services over several years, and their impacts per kg of Flax plant is very low.
The inventory dataset is based on data collected from Sunnhemp Research Station, Pratapgarh in state of Uttar Pradesh (North India). The result of this activity is 1 kg Flax green matter.

## Included activities start
This activity begins from land preparation for sowing.

## Included activities end
This activity ends with harvesting of mature flax plant.

## Technology
Cultivation of flax from conventional production standards

## Reference product
- flax plant, harvested: 1 kg; name RP_amount_1; By-product classification allocatable product; CPC 01929: Other fibre crops, raw, n.e.c.; HS2017 530110: Flax; raw or retted, but not spun
  production volume 1.725e8 kg; name RP_PV_1
    Source: http://agropedia.iitk.ac.in/content/flax-fibre
  property price 5.285 EUR2005
    Estimated value. Various souces report values corresponding to approximately 7 USD per kg of flax fibre (indiamart.com. Retrieved from: https://dir.indiamart.com/impcat/flax-yarn.html, accessed 1Feb2018; Alibaba.com, 2018. Retrieved from: https://www.alibaba.com/showroom/flax-fiber.html, accessed 1Feb2018).
  properties: carbon allocation 0.437 kg, carbon content 0.475, carbon content, fossil 0, carbon content, non-fossil 0.475, dry mass 0.92 kg, water content 0.0869565, water in wet mass 0.08 kg, wet mass 1 kg

## Inputs from technosphere
- ammonia, anhydrous, liquid: 4.11768e-7 kg; lognormal variance with pedigree 0.0046, pedigree (1,4,3,1,1)
  The data was collected for a hectare area through interview.
  properties: dry mass 1 kg, wet mass 1 kg
- ammonium nitrate: 9.67651e-7 kg; lognormal variance with pedigree 0.2106, pedigree (5,5,5,5,5)
  The exchange has been updated from 'ammonium nitrate, as N' into 'ammonium nitrate' and therefore its amount has been scaled (multiplied) from 0 kg by 2.8573 kg of 'ammonium nitrate' per kg of 'ammonium nitrate, as N'. Original comment of the exchange is: The data was collected for a hectare area through interview.
  properties: dry mass 1 kg, wet mass 1 kg
- ammonium sulfate: 3.1707e-5 kg; lognormal variance with pedigree 0.0046, pedigree (1,4,3,1,1)
  The data was collected for a hectare area through interview.
  properties: dry mass 1 kg, wet mass 1 kg
- inorganic nitrogen fertiliser, as N: 0.00286201 kg; lognormal variance with pedigree 0.0046, pedigree (1,4,3,1,1)
  This exchange is an aggregation of amounts:
  0.0019056058024469616. Comment:
  2.914733548943054E-4. Comment:
  2.914733548943054E-4. Comment:
  2.9556621698507567E-4. Comment:
  7.5554958595991515E-6. Comment:
  7.033565392979665E-5. Comment:
  properties: dry mass 1 kg, wet mass 1 kg
- inorganic phosphorus fertiliser, as P2O5: 0.0032 kg; lognormal variance with pedigree 0.0046, pedigree (1,4,3,1,1)
  The data was collected for a hectare area through interview.
  properties: dry mass 1 kg, wet mass 1 kg
- inorganic potassium fertiliser, as K2O: 0.000935071 kg; lognormal variance with pedigree 0.0046, pedigree (1,4,3,1,1)
  The data was collected for a hectare area through interview.
  properties: dry mass 1 kg, wet mass 1 kg
- irrigation: 0.12 m3; lognormal variance with pedigree 0.0046, pedigree (1,4,3,1,1)
  2 irrigations per crop. The data was collected for a hectare area through interview.
  properties: dry mass 0.11 kg, water content 9089.91, wet mass 1000 kg
- land use change, annual crop: 2.56651e-7 ha; lognormal variance with pedigree 0.0126, pedigree (4,4,3,1,1)
  The data was collected for a hectare area through interview.
- linseed seed, at farm: 0.0048 kg; lognormal variance with pedigree 0.0046, pedigree (1,4,3,1,1)
  The data was collected for a hectare area through interview.
  properties: carbon content, non-fossil 1, dry mass 1 kg, wet mass 1 kg
- mancozeb: 0.00012 kg; lognormal variance with pedigree 0.0046, pedigree (1,4,3,1,1)
  The data was collected for a hectare area through interview.
  properties: carbon content, fossil 0.17759, dry mass 1 kg, wet mass 1 kg
- manure, solid, cattle: 0.4 kg; lognormal variance with pedigree 0.0046, pedigree (1,4,3,1,1)
  The data was collected for a hectare area through interview.
  properties: carbon content, non-fossil 0.441, dry mass 0.22 kg, water content 3.5454, wet mass 1 kg
- packaging, for fertilisers: 0.0224001 kg; lognormal variance with pedigree 0.0532, pedigree (4,3,3,5,4)
  Total amount of active substance/s of fertilisers needed for the production of 'flax' is calculated to be circa 1.12E-02 kg. Fertiliser/s used in this dataset is/are: 'ammonia, liquid', 'ammonium nitrate, as N', 'ammonium sulfate, as N', 'nitrogen fertiliser, as N', 'phosphate fertiliser, as P2O5', 'potassium chloride, as K2O', 'potassium fertiliser, as K2O', 'potassium sulfate, as K2O', 'urea, as N'. The total amount of active substance/s is doubled in order to account for the packaging of the dilluted product of fertiliser/s that is/are applied. Therefore, 2.24E-02 kg of packaging for fertilisers is justified with this exchange.
  properties: carbon content, fossil 0.825301, dry mass 1 kg, heating value, net 25.01 MJ, price 0.0642 EUR2005, wet mass 1 kg
  note on carbon content, fossil: Considering a chemical formula (C2H4)n for polyethylene, carbon content-fossil is calculated to be 0.856286 kg of Carbon per kg of dry mass.
- packaging, for pesticides: 0.00056 kg; lognormal variance with pedigree 0.0532, pedigree (4,3,3,5,4)
  Total amount of active substance/s of pesticides needed for the production of flax is calculated to be circa 2.80E-04 kg. Pesticide/s used in this dataset is/are: 'mancozeb', 'pendimethalin', 'pesticide, unspecified'. The total amount of active substance/s is doubled in order to account for the packaging of the dilluted product of pesticide/s that is/are applied. Therefore, 5.60E-04 kg of packaging for pesticides is justified with this exchange.
  properties: carbon content, fossil 0.85714, dry mass 1 kg, heating value, net 25.97 MJ, price 0.0642 EUR2005, wet mass 1 kg
- pendimethalin: 8e-5 kg; lognormal variance with pedigree 0.0046, pedigree (1,4,3,1,1)
  The data was collected for a hectare area through interview.
  properties: carbon content, fossil 0.55516, dry mass 1 kg, wet mass 1 kg
- pesticide, unspecified: 8e-5 kg; lognormal variance with pedigree 0.0046, pedigree (1,4,3,1,1)
  Bavistin used a insecticide. The data was collected for a hectare area through interview.
  properties: carbon content, fossil 0.486978, dry mass 1 kg, wet mass 1 kg
- potassium chloride: 0.00356052 kg; lognormal variance with pedigree 0.0046, pedigree (1,4,3,1,1)
  The exchange has been updated from 'potassium chloride, as K2O' into 'potassium chloride' and therefore its amount has been scaled (multiplied) from 0.0022 kg by 1.5829 kg of 'potassium chloride' per kg of 'potassium chloride, as K2O'. Original comment of the exchange is: The data was collected for a hectare area through interview.
  properties: dry mass 1 kg, wet mass 1 kg
- potassium sulfate: 2.87856e-5 kg; lognormal variance with pedigree 0.0046, pedigree (1,4,3,1,1)
  The exchange has been updated from 'potassium sulfate, as K2O' into 'potassium sulfate' and therefore its amount has been scaled (multiplied) from 0 kg by 1.85 kg of 'potassium sulfate' per kg of 'potassium sulfate, as K2O'. Original comment of the exchange is: The data was collected for a hectare area through interview.
  properties: dry mass 1 kg, wet mass 1 kg
- tillage, harrowing, by rotary harrow: 0.000122713 ha; lognormal variance with pedigree 0.0046, pedigree (1,4,3,1,1)
  The data was collected for a hectare area through interview. The tillage activity was scaled based on the diesel used for tillage in the ecoinvent dataset and the diesel consumption data collected in the project
- urea: 0.00408524 kg; lognormal variance with pedigree 0.0066, pedigree (1,4,3,5,1)
  The exchange has been updated from 'urea, as N' into 'urea' and therefore its amount has been scaled (multiplied) from 0.0019 kg by 2.1438 kg of 'urea' per kg of 'urea, as N'. Original comment of the exchange is: The data was collected for a hectare area through interview.
  properties: carbon content, fossil 0.2, dry mass 1 kg, wet mass 1 kg
- waste wood, untreated: -0.138 kg; name BP_amount_1
  Used in burning as fuelwood. The data was collected for a hectare area through interview.
  production volume; = RP_PV_1* BP_amount_1/ RP_amount_1
    Calculated from production volume of main product using relative values.
  properties: heating value, net 13.99 MJ
  note on heating value, net: Value taken from the general comment of the treatment dataset.

## Inputs from nature
- Carbon dioxide, in air [natural resource, in air]: 1.50012 kg; lognormal variance with pedigree 0.0046, pedigree (1,4,3,1,1)
  Calculated Value. This value has been calculated by using the Ecoinvent LCI calculation tool for crop production.
- Energy, gross calorific value, in biomass [natural resource, biotic]: 17.0791 MJ; lognormal variance with pedigree 0.0046, pedigree (1,4,3,1,1)
  (same comment as for Carbon dioxide, in air)
- Occupation, annual crop, irrigated [natural resource, land]: 0.0333333 m2*year; lognormal variance with pedigree 0.006, pedigree (1,4,3,1,1)
  (same comment as for Carbon dioxide, in air)
- Transformation, from annual crop, irrigated [natural resource, land]: 0.8 m2; lognormal variance with pedigree 0.012, pedigree (1,4,3,1,1)
  (same comment as for Carbon dioxide, in air)
- Transformation, to annual crop, irrigated [natural resource, land]: 0.8 m2; lognormal variance with pedigree 0.012, pedigree (1,4,3,1,1)
  (same comment as for Carbon dioxide, in air)

## Emissions to nature
- Ammonia [air, non-urban air or from high stacks]: 0.00110913 kg; lognormal variance with pedigree 0.012, pedigree (1,4,3,1,1)
  (same comment as for Carbon dioxide, in air)
- Carbon dioxide, fossil [air, non-urban air or from high stacks]: 0.00449059 kg; lognormal variance with pedigree 0.0046, pedigree (1,4,3,1,1)
  (same comment as for Carbon dioxide, in air)
- Dinitrogen monoxide [air, non-urban air or from high stacks]: 0.000148597 kg; lognormal variance with pedigree 0.034, pedigree (1,4,3,1,1)
  (same comment as for Carbon dioxide, in air)
- Nitrogen oxides [air, non-urban air or from high stacks]: 0.000419485 kg; lognormal variance with pedigree 0.044, pedigree (1,4,3,1,1)
  (same comment as for Carbon dioxide, in air)
- Water [air, non-urban air or from high stacks]: 0.0612 m3; lognormal variance with pedigree 0.0046, pedigree (1,4,3,1,1)
  (same comment as for Carbon dioxide, in air)
- Cadmium II [soil, agricultural]: -8.63889e-8 kg
  (same comment as for Carbon dioxide, in air)
- Chromium III [soil, agricultural]: 3.855e-5 kg; lognormal variance with pedigree 0.044, pedigree (1,4,3,1,1)
  (same comment as for Carbon dioxide, in air)
- Copper ion [soil, agricultural]: -5.05707e-6 kg
  (same comment as for Carbon dioxide, in air)
- Lead II [soil, agricultural]: -3.01812e-7 kg
  (same comment as for Carbon dioxide, in air)
- Mancozeb [soil, agricultural]: 0.00012 kg; lognormal variance with pedigree 0.037, pedigree (1,4,3,1,1)
  (same comment as for Carbon dioxide, in air)
- Mercury II [soil, agricultural]: -3.26344e-8 kg
  (same comment as for Carbon dioxide, in air)
- Nickel II [soil, agricultural]: -5.6719e-7 kg
  (same comment as for Carbon dioxide, in air)
- Pendimethalin [soil, agricultural]: 8e-5 kg; lognormal variance with pedigree 0.037, pedigree (1,4,3,1,1)
  (same comment as for Carbon dioxide, in air)
- Zinc II [soil, agricultural]: -1.30566e-5 kg
  (same comment as for Carbon dioxide, in air)
- Cadmium II [water, ground-]: 1.22106e-10 kg; lognormal variance with pedigree 0.094, pedigree (1,4,3,1,1)
  (same comment as for Carbon dioxide, in air)
- Cadmium II [water, surface water]: 5.80658e-10 kg; lognormal variance with pedigree 0.094, pedigree (1,4,3,1,1)
  (same comment as for Carbon dioxide, in air)
- Chromium III [water, ground-]: 7.06447e-8 kg; lognormal variance with pedigree 0.094, pedigree (1,4,3,1,1)
  (same comment as for Carbon dioxide, in air)
- Chromium III [water, surface water]: 7.95612e-8 kg; lognormal variance with pedigree 0.1, pedigree (1,5,3,1,1)
  (same comment as for Carbon dioxide, in air)
- Copper ion [water, ground-]: 1.18973e-8 kg; lognormal variance with pedigree 0.094, pedigree (1,4,3,1,1)
  (same comment as for Carbon dioxide, in air)
- Copper ion [water, surface water]: 6.58084e-8 kg; lognormal variance with pedigree 0.094, pedigree (1,4,3,1,1)
  (same comment as for Carbon dioxide, in air)
- Lead II [water, ground-]: 1.64119e-9 kg; lognormal variance with pedigree 0.094, pedigree (1,4,3,1,1)
  (same comment as for Carbon dioxide, in air)
- Lead II [water, surface water]: 5.28423e-8 kg; lognormal variance with pedigree 0.094, pedigree (1,4,3,1,1)
  (same comment as for Carbon dioxide, in air)
- Mercury II [water, ground-]: 4.15377e-12 kg; lognormal variance with pedigree 0.094, pedigree (1,4,3,1,1)
  (same comment as for Carbon dioxide, in air)
- Mercury II [water, surface water]: 2.3108e-10 kg; lognormal variance with pedigree 0.094, pedigree (1,4,3,1,1)
  (same comment as for Carbon dioxide, in air)
- Nickel II [water, surface water]: 7.30123e-8 kg; lognormal variance with pedigree 0.094, pedigree (1,4,3,1,1)
  (same comment as for Carbon dioxide, in air)
- Nitrate [water, ground-]: 0.00931402 kg; lognormal variance with pedigree 0.008, pedigree (1,4,3,1,1)
  (same comment as for Carbon dioxide, in air)
- Phosphate [water, ground-]: 7.15444e-7 kg; lognormal variance with pedigree 0.044, pedigree (1,4,3,1,1)
  (same comment as for Carbon dioxide, in air)
- Phosphate [water, surface water]: 2.0882e-6 kg; lognormal variance with pedigree 0.044, pedigree (1,4,3,1,1)
  (same comment as for Carbon dioxide, in air)
- Phosphorus [water, surface water]: 6.78512e-6 kg; lognormal variance with pedigree 0.044, pedigree (1,4,3,1,1)
  (same comment as for Carbon dioxide, in air)
- Water [water, ground-]: 0.0468 m3; lognormal variance with pedigree 0.0046, pedigree (1,4,3,1,1)
  (same comment as for Carbon dioxide, in air)
- Water [water, surface water]: 0.012 m3; lognormal variance with pedigree 0.0046, pedigree (1,4,3,1,1)
  (same comment as for Carbon dioxide, in air)
- Zinc II [water, ground-]: 1.07968e-7 kg; lognormal variance with pedigree 0.094, pedigree (1,4,3,1,1)
  (same comment as for Carbon dioxide, in air)
- Zinc II [water, surface water]: 1.60769e-7 kg; lognormal variance with pedigree 0.094, pedigree (1,4,3,1,1)
  (same comment as for Carbon dioxide, in air)

## Sampling procedure
Data has been collected through field visit and interview. Data has been obtained from a Sunnhemp Research Station in Uttar Pradesh (North India) as they have pioneered the introduction and promoted the cultivation of Flax in India as per optimised technology and expressed willingness to share the data.

## Extrapolations
The data on inputs to the field activites are collected directly from the farmers and farming experts. However, the emission data were not readily available for India. Hence, Ecoinvent LCI calculation tool for crop production was used to calculate field emissions from the cultivation process.
