# hydrogen sulfide production

Dataset: EcoSpold 2, unit process
Geography: RoW
Time period: 2005-01-01 to 2023-12-31
Technology level: current
Classification: ISIC rev.4 ecoinvent: 2011:Manufacture of basic chemicals
Synonyms: Stink DAMP; Sulfane; Sulfur; Sulfureted hydrogen; Hydrosulfuric acid
Scenario: Business-as-Usual
System model: Allocation, cut-off by classification
Generated by: Roland Hischier
Published in: Hischier R. 2007
Database: ecoinvent
isCopyrightProtected: true
accessRestrictedTo: 1

## General comment
This dataset represents the production of 1 kg of gaseous hydrogen sulfide, obtained by processing molten sulfur recovered from refinery gases. Hydrogen sulfide (H2S) is a colourless, but smelling (rotten-egg odour) gas that is heavier than air. Hydrogen sulfide that is recovered from natural gas or refinery gases is mostly converted into sulfur. Other applications include the use of H2S in the production of metal sulfides, purification of ores by flotation processes and catalyst activation.
The inventory is based on literature data and estimations.
References:
Hischier R., Classen M., Lehmann M. and Scharnhorst W. (2007) Life cycle inventories of Electric and Electronic Equipment: Production, Use and Disposal. ecoinvent report No. 18. Empa / Technology & Society Lab, Swiss Centre for Life Cycle Inventories, Dübendorf, 2007.
Pouliquen, F., Blanc, C., Arretz, E., Labat, I., Tournier-Lasserve, J., Ladousse, A., Nougayrede, J., Savin, G., Ivaldi, R., Nicolas, M., Fialaire, J., Millischer, R., Azema, C., Espagno, L., Hemmer, H. and Perrot, J. 2000. Hydrogen Sulfide. Ullmann's Encyclopedia of Industrial Chemistry.
Unitel Technologies (2015) Hydrogen Sulfide (H2S) Production Technology, http://www.uniteltech.com/tech-library (accessed on 2017-08-10).

## Included activities start
From reception of raw materials at the factory gate.

## Included activities end
This activity ends with the production of hydrogen sulfide. The dataset includes the consumption of raw materials and chemicals used for production, as well as the energy use and infrastructure use of the plant. Solid wastes and emissions to air and water are omitted.

## Geography
Data used has no specific geographical origin.

## Technology
Hydrogen sulfide can be either produced by a chemical reaction – e.g. between sulfur and hydrogen, sulfur and hydrocarbons or sulfides and dilute acid – but it can also be recovered from natural gas or refinery gases. This inventory models the use of sulfur recovered from refinery gases, which is melted and then processed into hydrogen sufide.
Reference:
Hischier R., Classen M., Lehmann M. and Scharnhorst W. (2007) Life cycle inventories of Electric and Electronic Equipment: Production, Use and Disposal. ecoinvent report No. 18. Empa / Technology & Society Lab, Swiss Centre for Life Cycle Inventories, Dübendorf, 2007.
Pouliquen, F., Blanc, C., Arretz, E., Labat, I., Tournier-Lasserve, J., Ladousse, A., Nougayrede, J., Savin, G., Ivaldi, R., Nicolas, M., Fialaire, J., Millischer, R., Azema, C., Espagno, L., Hemmer, H. and Perrot, J. 2000. Hydrogen Sulfide. Ullmann's Encyclopedia of Industrial Chemistry.

## Time period
The time period is based on the dates of the literature sources.

## Parameters
- fraction, cooling water, once-through system, to air: 0.004 dimensionless; name fraction_CW_OT_to_air; lognormal variance with pedigree 0.0413, pedigree (2,3,1,3,1)
  Calculated based on literature value (Scown, C.D., 2011, Water Footprint of U.S. Transportation Fuels and supplying information of the article) (Vionnet, S., Quantis Water Database - Technical Report, 2012).
- fraction, cooling water, recirculating system, to air: 0.771 dimensionless; name fraction_CW_R_to_air; lognormal variance with pedigree 0.0413, pedigree (2,3,1,3,1)
  (same comment as for fraction, cooling water, once-through system, to air)
- fraction, cooling water, to air: 0.3875 dimensionless; name fraction_CW_to_air; = (0.5*fraction_CW_OT_to_air)+(0.5*fraction_CW_R_to_air); lognormal variance with pedigree 0.092025, pedigree (4,4,3,2,4)
  Calculated value based on literature value (see comments of the other parametres present in this dataset) and expert opinion. In the case when no industry/literature data are available about the type of cooling or directly fraction, cooling water, to air specific for the process a default assumption is applied. It is assumed that the once-through cooling system is used in 50% of all cases and recirculating system is used in another 50% of all cases.

## Reference product
- hydrogen sulfide: 1 kg; name RP; source Pouliquen F. 2005; By-product classification allocatable product; CPC 34231: Chemical elements n.e.c.; inorganic acids except phosphoric, nitric and sulphonitric; inorganic oxygen compoun[…]; HS2017 281390: Sulphides of non-metals, (excluding carbon); commercial phosphorus trisulphide; CAS 7783-06-4
  Hydrogen sulfide, also called monosulfane, is a colourless, but smelling (rotten-egg odour) gas that is heavier than air. Hydrogen sulfide occurs naturally in a variety of systems - resulting in natural releases in the order of 1 to 3x108 tonnes, originating from e.g. oceans (about 50% of releases), volcanos, flooded grounds and further hydrogeological sources. In addition this substance can be found in natural gas, for which hydrogen sulfide has been regarded until the late 1950s as a toxic, corrosive component that has to be eliminated.
  The most important use of hydrogen sulfide is in the production of sulphur – especially from the one recovered from natural gas. Furthermore it can be used for the production of metal sulfides, purification of ores by flotation processes or for catalyst activation.
  production volume 287201 kg; name RP_PV
    Estimated value. The global production volume is extrapolated from the European production volume based on reports from Cefic (European Chemical Industry Council), and the American Chemistry Council.
    According to Cefic (2016a) the global sales of chemicals in the year 2015 was 3 534 billion euros. The reported share of sales per region are: EU28 14.7%; Other Europe (Switzerland, Norway, Turkey, Russia and Ukraine) 2.7%; NAFTA (US, Canada and Mexico) 16.5%; Latin America 3.8%; China 39.9%; Japan 3.9%; Republic of Korea 3.2%; India 2.2%; Rest of Asia 11.9%; Rest of the World 1.3%. Cefic also reports the US total sales, which amount to 518.7 billion euros out of the global 3 534 billion euros (14.7%). The same share is reported by the American Chemistry Council (2016), according to which the USA sales account for 15% of global sales for the year 2016.
    European production volume:
    Estimated value. According to the European Chemical Agency, the consumption of hydrogen sulfide for the year of 2016 is estimated to be 55000 kg. The aforementioned value is the average of the range given in the literature. According to the European Chemical Industry Council (Cefic, 2016a), the total sales of chemicals of the European Union in 2016 amounted to 519 billion euros. Chemical imports were valued at 91 billion euros for the first 11 months of 2016. Based on this, the value for the total imports for the year 2016 was extrapolated, yielding a value of 99.3 billion euros. Furthermore, Cefic (2016b) reports a trade surplus (exports-imports) of 46.4 billion euros (once again extrapolated for the whole year using the value of 42 billion euros for the first 11 months of 2016). Considering all the aforementioned information, the total chemical consumption in the EU is calculated to be 472.6 billion euros (total sales-exports+imports). It is therefore calculated that production is 110% of consumption. This value is used to scale the information on chemical consumption to production. The European production volume is therefore 60500 kg. Since no data were found for the global production this value was scaled accordingly.
    References:
    American Chemistry Council 2016. Outlook: U.S. Chemical Industry Continues to Outpace Industrial Output; Accounts for More Than One-Half of Construction Spending by Manufacturing Sector. Accessible at: https://www.americanchemistry.com/Media/PressReleasesTranscripts/ACC-news-releases/US-Chemical-Industry-Continues-to-Outpace-Industrial-Output.html
    European Chemical Agency, Brief profile of Hydrogen sulfide, Accessible at: https://echa.europa.eu/brief-profile/-/briefprofile/100.029.070
    Cefic 2016a. Facts and figures 2016 of the European chemical industry. Accessible at: http://www.cefic.org/Facts-and-Figures/Chemicals-Industry-Profile/
    Cefic 2016b. 2016: EU chemicals output posts positive growth for third year running. Accessible at: http://www.cefic.org/Documents/RESOURCES/Chemical%20Trends%20Report/March-2017-Cefic-Chemicals-Trends-Report.pdf
  property heating value, net 7.11 MJ
    LHV is calculated based on the elemental composition of the substance. Based on the CAS number of the substance (007783-06-4), the chemical formula of the substance is found to be: H2S, (PubChem 2020).
    Reference: Kim, S., Chen, J., Cheng, T., Gindulyte, A., He, J., He, S., Li, Q., Shoemaker, B. A., Thiessen, P. A., Yu, B., Zaslavsky, L., Zhang, J., & Bolton, E. E. (2019). PubChem 2019 update: improved access to chemical data. Nucleic acids research, 47(D1), D1102–D1109. https://doi.org/10.1093/nar/gky1033
  property price 0.577645 EUR2005
    Calculated based on inputs: The price of the product has been calculated as a sum of the values of the material and energy inputs for this product. This value is therefore a rough estimation. It may underestimate the real price since there are additional expenses when producing any product. These expences can include for example labour costs, treatment of waste materials and profit for the producer. Please consider carefully whether this level of data quality is acceptable for your application.
  properties: carbon allocation 0 kg, carbon content 0, carbon content, fossil 0, carbon content, non-fossil 0, dry mass 1 kg, water content 0, water in wet mass 0 kg, wet mass 1 kg

## Inputs from technosphere
- chemical factory, organics: 4e-10 unit; lognormal variance with pedigree 0.3178, pedigree (2,3,4,4,3)
  Calculated based on literature data published by the industry. For this activity, no information was readily available concerning infrastructure and land-use. Therefore, the infrastructure is estimated based on data from two chemical factories, the BASF site of Ludwigshafen and the chemical factory in Gendorf (which are both located in Germany), which produce a wide range of chemical substances. Based on this data, the following assumptions are made: the built area amounts to about 4.2 ha, the plant has an average output of 50'000 t/a and a lifespan of fifty years. The estimated infrastructure amount is therefore 4.00 E-10 units per kg of produced chemical.
  References:
  Althaus H.-J., Chudacoff M., Hischier R., Jungbluth N., Osses M. and Primas A. (2007) Life Cycle Inventories of Chemicals. ecoinvent report No. 8, v2.0. EMPA Dübendorf, Swiss Centre for Life Cycle Inventories, Dübendorf, CH.
  Gendorf (2000) Umwelterklärung 2000, Werk Gendorf. Werk Gendorf, Burgkirchen.
- electricity, medium voltage: 0.00930519, 0.185618, 0.0623669, 0.00284957, 0.000570338, 0.000122464, 0.0191679 kWh (7 suppliers, which the file names only by identifier); sum of these 0.28 kWh; = 266/1000/0.95; source Pouliquen F. 2005; lognormal variance with pedigree 0.1786, pedigree (4,5,5,5,5)
  Literature value. 266 kWh of electricity is consumed to produce 1 tonne of H2S (95% purity) (Pouliquen et al. 2000).
  Reference:
  Pouliquen, F., Blanc, C., Arretz, E., Labat, I., Tournier-Lasserve, J., Ladousse, A., Nougayrede, J., Savin, G., Ivaldi, R., Nicolas, M., Fialaire, J., Millischer, R., Azema, C., Espagno, L., Hemmer, H. and Perrot, J. 2000. Hydrogen Sulfide. Ullmann's Encyclopedia of Industrial Chemistry.
- heat, district or industrial, natural gas: 0.00263231, 0.160188 MJ (2 suppliers, which the file names only by identifier); sum of these 0.162821 MJ; = 70*0.00105506/0.45359237; lognormal variance with pedigree 0.1786, pedigree (4,5,5,5,5)
  Approximately 70 BTU of heat is required to convert one pound of solid sulfur at about 60°F (16°C) to one kg of liquid sulfur at about 280°F (138°C).
  Reference:
  sulphuric-acid.com (2010), Sulphur Systems - Sulphur Melting, http://sulphuric-acid.com/TechManual/Sulphur/melting.htm (accessed on the 2017-08-09).
  properties: heating value, net 1 MJ
- heat, from steam, in chemical industry: 0.4125 MJ; = 150*2.75/1000; lognormal variance with pedigree 0.1786, pedigree (4,5,5,5,5)
  Literature value. Approximately 150 kg of steam (at 4 bar) is consumed to produce 1 tonne of H2S (Unitel Technologies 2015). It is assumed that the energy content of steam is 2.75 MJ/kg (Althaus et al. 2007).
  Reference:
  Unitel Technologies (2015) Hydrogen Sulfide (H2S) Production Technology, http://www.uniteltech.com/tech-library (accessed on 2017-08-10).
  Althaus H.-J., Chudacoff M., Hischier R., Jungbluth N., Osses M. and Primas A. (2007) Life Cycle Inventories of Chemicals. ecoinvent report No. 8, v2.0. EMPA Dübendorf, Swiss Centre for Life Cycle Inventories, Dübendorf, CH.
  properties: heating value, net 1 MJ
- hydrogen, gaseous, medium pressure, merchant: 0.0424568, 0.0266589 kg (2 suppliers, which the file names only by identifier); sum of these 0.0691158 kg; = 67/1000*0.98/0.95; source Pouliquen F. 2005; lognormal variance with pedigree 0.1786, pedigree (4,5,5,5,5)
  Literature value. 67 kg of hydrogen (98% purity) is required to produce 1 tonne of H2S (95% purity) (Pouliquen et al. 2000).
  Reference:
  Pouliquen, F., Blanc, C., Arretz, E., Labat, I., Tournier-Lasserve, J., Ladousse, A., Nougayrede, J., Savin, G., Ivaldi, R., Nicolas, M., Fialaire, J., Millischer, R., Azema, C., Espagno, L., Hemmer, H. and Perrot, J. 2000. Hydrogen Sulfide. Ullmann's Encyclopedia of Industrial Chemistry.
  Uncertainty: d
  properties: dry mass 1 kg, heating value, net 120.21 MJ, wet mass 1 kg
- sulfur: 1.11088 kg; = 1066/1000*0.99/0.95; source Pouliquen F. 2005; lognormal variance with pedigree 0.1786, pedigree (4,5,5,5,5)
  Literature value. 1066 kg of molten sulfur (99% purity) is required to produce 1 tonne of H2S (95% purity) (Pouliquen et al. 2000).
  Reference:
  Pouliquen, F., Blanc, C., Arretz, E., Labat, I., Tournier-Lasserve, J., Ladousse, A., Nougayrede, J., Savin, G., Ivaldi, R., Nicolas, M., Fialaire, J., Millischer, R., Azema, C., Espagno, L., Hemmer, H. and Perrot, J. 2000. Hydrogen Sulfide. Ullmann's Encyclopedia of Industrial Chemistry.
  properties: dry mass 1 kg, wet mass 1 kg

## Inputs from nature
- Water, cooling, unspecified natural origin [natural resource, in water]: 0.04 m3; name water_cooling_UNO_input; = 40/1000; lognormal variance with pedigree 0.1786, pedigree (4,5,5,5,5)
  Literature value. Approximately 40 m3 of cooling water is consumed to produce 1 tonne of H2S (Unitel Technologies 2015).
  Reference:
  Unitel Technologies (2015) Hydrogen Sulfide (H2S) Production Technology, http://www.uniteltech.com/tech-library (accessed on 2017-08-10).

## Emissions to nature
- Water [air, unspecified]: 0.0155 m3; = (water_cooling_UNO_input*fraction_CW_to_air); lognormal variance with pedigree 0.0507, pedigree (2,2,4,5,1)
  Calculated as a fraction of the input of water. For more details, refer to the mathematical relation and the parameters.
  property fraction, origin: fresh water 0; name fraction_origin_fresh_water
  property fraction, origin: salt water 0; name fraction_origin_salt_water
  property fraction, origin: unspecified 1; name fraction_origin_unspecified
- Water [water, unspecified]: 0.0245 m3; = water_cooling_UNO_input*(1-fraction_CW_to_air); lognormal variance with pedigree 0.0507, pedigree (2,2,4,5,1)
  (same comment as for Water)
  property carbon content, fossil 0; name C_content_fossil
  property carbon content, non-fossil 0; name C_content_non_fossil
  property dry mass 0 kg; name DM
  property fraction, origin: fresh water 0; name fraction_origin_fresh_water_Ww
  property fraction, origin: salt water 0; name fraction_origin_salt_water_Ww
  property fraction, origin: unspecified 1; name fraction_origin_unspecified_Ww
  property water in wet mass 1000 kg; name WWM
  property wet mass 1000 kg; name WM

## Sampling procedure
The data is based on literature.

## Review by Emilia Moreno Ruiz 2017-09-01
This dataset was additionally reviewed in a separate review process by Eric Johnson of Atlantic Consulting as well as Emilia Moreno Ruiz and Gregor Wernet of ecoinvent.
