# zinc coating, pieces

Dataset: EcoSpold 2, unit process
Geography: RER
Time period: 1996-01-01 to 2023-12-31
Technology level: current
Classification: ISIC rev.4 ecoinvent: 2592:Treatment and coating of metals; machining
Classification: EcoSpold01Categories: metals/processing
Synonyms: hot dip coating; galvanising
Tags: ConvertedDataset
Scenario: Business-as-Usual
System model: Allocation, cut-off by classification
Share of production covered: 0 %
Generated by: Silvio Blaser
Published in: Classen M. 2009
Database: ecoinvent
isCopyrightProtected: true
accessRestrictedTo: 1

## General comment
This module is applicable, if batch zinc coating of semifinished steel products, that's shape doesn't change anymore, has to be balanced. Data given per tonne of coated product had to be transformed dividing it by the mean surface area of 60 m2/t. For the chemicals and the zinc, 100 km of 32t lorry transport were balanced. The softened industrial water is assumed to be produced at the coating plant. The coating layer is 65um thick, if the surface is coated on both sides and 130 um thick, if coating is done on one side only. Due to the fact, that data are given per square meter and not per kg, the energy inventoried for heavy pieces is to low and for light pieces to high. If the data would have been given per kg, the error would have been the contrary.
[This dataset was already contained in the ecoinvent database version 2. It was not individually updated during the transfer to ecoinvent version 3. Life Cycle Impact Assessment results may still have changed, as they are affected by changes in the supply chain, i.e. in other datasets. This dataset was generated following the ecoinvent quality guidelines for version 2. It may have been subject to central changes described in the ecoinvent version 3 change report (http://www.ecoinvent.org/database/ecoinvent-version-3/reports-of-changes/), and the results of the central updates were reviewed extensively. The changes added e.g. consistent water flows and other information throughout the database. The documentation of this dataset can be found in the ecoinvent reports of version 2, which are still available via the ecoinvent website. The change report linked above covers all central changes that were made during the conversion process.]

## Included activities start
The activity starts with the pieces entering the process.

## Included activities end
Includes the process steps degreasing, pickling, fluxing, galvanising (melt zinc coating) and finishing. Does not include the fabricates being coated.

## Geography
Data-set is representive for European Union

## Technology
Average technique for EU.

## Parameters
- fraction, process water, to air: 0.15 dimensionless; name fraction_PW_to_air; lognormal variance with pedigree 0.092025, pedigree (4,4,3,2,4)
  Literature value. In case when no industry/process specific data are available, default evaporation fraction value is used. This value is 15% and is based on literature (Statistics Canada, 2007 & Shaffer, K.H., 2008, Consumptive water use in the Great Lakes Basin, USGS & Shiklomanov, 2003, World Water Resources at the Beginning of the 21st Century) and has been approved by an expert.
- fraction, water, deionised, to air: 0.15 dimensionless; name fraction_WDI_to_air; = fraction_PW_to_air; lognormal variance with pedigree 0.092025, pedigree (4,4,3,2,4)
  Calculated value. See comment in the other parametres present in this dataset. Deionised water is considered to be always used as process water, thus process water fractions to air are applied to all deionised water input flows to calculate the amount of water consumed in the processes.

## Reference product
- zinc coat, pieces: 1 m2; By-product classification allocatable product; CPC 39365: Waste and scrap of zinc
  EcoSpold01Location=RER
  production volume 1.32237 m2
    This is a placeholder value that does not reflect real-world production volumes. This dataset does not currently require a real-world production volume to work in the database framework, and no actual data were collected yet. This has no negative effect on the results of the ecoinvent database. The placeholder value of this activity was scaled according to the nominal GDP of 2005 (source: United Nations, http://data.un.org/Glossary.aspx?q=GDP+%28current+US%24%29, accessed 20130726) to reflect an appropriate share of the global production volume, which is also a placeholder value.
  property price 1.5865 EUR2005
    Calculated based on inputs: The price of the product has been calculated as a sum of the values of the material and energy inputs for this product. This value is therefore a rough estimation. It may underestimate the real price since there are additional expenses when producing any product. These expences can include for example labour costs, treatment of waste materials and profit for the producer. Please consider carefully whether this level of data quality is acceptable for your application.
  properties: carbon allocation 0 kg, carbon content 0

## Inputs from technosphere
- aluminium sulfate, powder: 1.51e-5 kg; lognormal variance with pedigree 0.0586, pedigree (2,5,5,1,1)
  EcoSpold01Location=RER
  properties: dry mass 1 kg, wet mass 1 kg
- ammonia, anhydrous, liquid: 0.00051 kg; lognormal variance with pedigree 0.058, pedigree (1,5,5,1,1)
  EcoSpold01Location=RER
  properties: dry mass 1 kg, wet mass 1 kg
- chemical, inorganic: 0.025 kg; lognormal variance with pedigree 0.16, pedigree (1,1,5,1,1)
  EcoSpold01Location=GLO
  calculated from max value assuming lognormal distribution
  properties: carbon content, fossil 0.003, dry mass 1 kg, wet mass 1 kg
  note on carbon content, fossil: This dataset is an unweighted average of 20 inorganic substances (listed in Tab 88.1, ecoinvent v2.2 report 8, part II), being part of the top100 chemicals included in this database. The C-content has also been calculated as an unweighted average of the C content of the substances composing this dataset.
- chemical, organic: 0.00167 kg; lognormal variance with pedigree 0.16, pedigree (1,1,5,1,1)
  EcoSpold01Location=GLO
  calculated from max value assuming lognormal distribution
  properties: carbon content, fossil 0.628, dry mass 1 kg, heating value, net 19.03 MJ, wet mass 1 kg
  note on carbon content, fossil: This dataset is an unweighted average of 20 organic substances (listed in Tab 88.1, ecoinvent v2.2 report 8, part II), being part of the top100 chemicals included in this database. The C-content has also been calculated as an unweighted average of the C content of the substances composing this dataset.
- electric arc furnace dust: -0.244963, -3.67074e-5 kg (2 suppliers, which the file names only by identifier); sum of these -0.245 kg; lognormal variance with pedigree 0.21, pedigree (1,1,1,1,1)
  calculated from max value assuming lognormal distribution
  EcoSpold01Location=CH
  production volume
    Calculated from the production volume of zinc coat, pieces in proportion to the respective output amounts.
  properties: carbon content, fossil 0.01339, dry mass 0.846 kg, water content 0.182033, wet mass 1 kg
- electricity, medium voltage: 0.341707 kWh; lognormal variance with pedigree 0.16, pedigree (1,1,5,1,1)
  calculated from max value assuming lognormal distribution
  EcoSpold01Location=UCTE
- heat, district or industrial, natural gas: 12.4146 MJ; lognormal variance with pedigree 0.16, pedigree (1,1,5,1,1)
  EcoSpold01Location=RER
  calculated from max value assuming lognormal distribution
  properties: heating value, net 1 MJ
- heat, district or industrial, other than natural gas: 12.9421 MJ; lognormal variance with pedigree 0.16, pedigree (1,1,5,1,1)
  calculated from max value assuming lognormal distribution
  EcoSpold01Location=RER
  properties: heating value, net 1 MJ
- hydrochloric acid, without water, in 30% solution state: 0.37 kg; lognormal variance with pedigree 0.18, pedigree (1,1,5,1,1)
  EcoSpold01Location=RER
  calculated from max value assuming lognormal distribution
  properties: dry mass 1 kg, heating value, net 3.32 MJ, wet mass 1 kg
- rolling mill: 2.71e-12 unit; lognormal variance with pedigree 0.3941, pedigree (4,5,5,3,3)
  EcoSpold01Location=RER
  activityLink introduced to establish a direct link to the corresponding regional supply of this product
- sludge from steel rolling: -0.00151 kg; lognormal variance with pedigree 0.0186, pedigree (2,5,1,1,1)
  EcoSpold01Location=CH
  production volume
    (same comment as for electric arc furnace dust)
  properties: carbon content, fossil 0.0123943, dry mass 0.8 kg, water content 0.25, wet mass 1 kg
- soda ash, light: 0.00167 kg; lognormal variance with pedigree 0.188, pedigree (1,5,5,1,1)
  EcoSpold01Location=RER
  properties: carbon content, fossil 0.0517241, dry mass 1 kg, heating value, net 3.43 MJ, wet mass 1 kg
- sodium hydroxide, without water, in 50% solution state: 0.00633 kg; lognormal variance with pedigree 0.16, pedigree (1,1,5,1,1)
  calculated from max value assuming lognormal distribution
  EcoSpold01Location=RER
  properties: dry mass 1 kg, heating value, net 3.03 MJ, wet mass 1 kg
- waste mineral oil: -6.45018e-5, -0.0026055 kg (2 suppliers, which the file names only by identifier); sum of these -0.00267 kg; lognormal variance with pedigree 0.058, pedigree (1,5,1,1,1)
  EcoSpold01Location=CH
  production volume
    (same comment as for electric arc furnace dust)
  properties: carbon content, fossil 0.864444, dry mass 0.9 kg, heating value, net 34.7 MJ, water content 0.111111, wet mass 1 kg
  note on carbon content, fossil: Tab A.6, ecoinvent v2.2 report 13_I. C content has been calculated after data in the tables, and then referred to 1 kg DM
  note on heating value, net: Value taken from the general comment of the treatment dataset.
- water, deionised: 3.31806, 0.0119442 kg (2 suppliers, which the file names only by identifier); sum of these 3.33 kg; lognormal variance with pedigree 0.0586, pedigree (2,5,5,1,1)
  EcoSpold01Location=CH
  properties: wet mass 1 kg
- zinc: 1.05 kg; lognormal variance with pedigree 0.38, pedigree (1,1,5,1,1)
  EcoSpold01Location=RER
  calculated from max value assuming lognormal distribution
  properties: dry mass 1 kg, wet mass 1 kg

## Inputs from nature
- Water, unspecified natural origin [natural resource, in water]: 0.00085 m3; name water_UNO_input; lognormal variance with pedigree 0.16, pedigree (1,1,5,1,1)
  calculated from max value assuming lognormal distribution

## Emissions to nature
- Ammonia [air, unspecified]: 0.000727 kg; lognormal variance with pedigree 0.188, pedigree (1,5,5,1,1)
- Arsenic ion [air, unspecified]: 3.16e-9 kg; lognormal variance with pedigree 0.098, pedigree (1,5,5,1,1)
- Cadmium II [air, unspecified]: 2.18e-8 kg; lognormal variance with pedigree 0.098, pedigree (1,5,5,1,1)
- Hydrochloric acid [air, unspecified]: 0.000305 kg; lognormal variance with pedigree 0.188, pedigree (1,5,5,1,1)
- Iron ion [air, unspecified]: 2.33e-5 kg; lognormal variance with pedigree 0.098, pedigree (1,5,5,1,1)
- Lead II [air, unspecified]: 5.67e-8 kg; lognormal variance with pedigree 0.098, pedigree (1,5,5,1,1)
- Particulate Matter, > 10 um [air, unspecified]: 0.00261 kg; lognormal variance with pedigree 0.5, pedigree (1,1,5,1,1)
  calculated from max value assuming lognormal distribution
- Particulate Matter, > 2.5 um and < 10um [air, unspecified]: 0.000127 kg; lognormal variance with pedigree 0.188, pedigree (1,5,5,1,1)
- Water [air, unspecified]: 0.000627 m3; name water_to_air_unspecified; = (water_deionised_input/1000*fraction_WDI_to_air)+(water_UNO_input*fraction_PW_to_air); lognormal variance with pedigree 0.0807, pedigree (2,2,5,1,1)
  Calculated value based on literature values and expert opinion. See comments in the parametres' comment field.
  property fraction, origin: fresh water 0.796651; name fraction_origin_fresh_water
  property fraction, origin: salt water 0; name fraction_origin_salt_water
  property fraction, origin: unspecified 0.203349; name fraction_origin_unspecified
- Zinc II [air, unspecified]: 0.000458 kg; lognormal variance with pedigree 0.38, pedigree (1,1,5,1,1)
  calculated from max value assuming lognormal distribution
- BOD5, Biological Oxygen Demand [water, unspecified]: 0.00022 kg; lognormal variance with pedigree 0.37, pedigree (5,5,5,5,5)
- COD, Chemical Oxygen Demand [water, unspecified]: 0.00022 kg; lognormal variance with pedigree 0.0986, pedigree (2,5,5,1,1)
- Chloride [water, unspecified]: 3.13e-5 kg; lognormal variance with pedigree 0.098, pedigree (1,5,5,1,1)
- Chromium III [water, unspecified]: 1.1e-7 kg; lognormal variance with pedigree 0.7086, pedigree (2,5,5,1,1)
- Chromium VI [water, unspecified]: 1.67e-8 kg; lognormal variance with pedigree 0.7086, pedigree (2,5,5,1,1)
- DOC, Dissolved Organic Carbon [water, unspecified]: 4.95e-6 kg; lognormal variance with pedigree 0.37, pedigree (5,5,5,5,5)
- Hydrocarbons, unspecified [water, unspecified]: 1.98e-6 kg; lognormal variance with pedigree 0.3686, pedigree (2,5,5,1,1)
- Iron ion [water, unspecified]: 9.42e-5 kg; lognormal variance with pedigree 0.098, pedigree (1,5,5,1,1)
- Lead II [water, unspecified]: 2.51e-8 kg; lognormal variance with pedigree 0.7086, pedigree (2,5,5,1,1)
- Nickel II [water, unspecified]: 1.67e-8 kg; lognormal variance with pedigree 0.7086, pedigree (2,5,5,1,1)
- Oils, unspecified [water, unspecified]: 1.73e-6 kg; lognormal variance with pedigree 0.0986, pedigree (2,5,5,1,1)
- Phosphorus [water, unspecified]: 1.5e-6 kg; lognormal variance with pedigree 0.0986, pedigree (2,5,5,1,1)
- Suspended solids, unspecified [water, unspecified]: 3.74e-6 kg; lognormal variance with pedigree 0.0986, pedigree (2,5,5,1,1)
- TOC, Total Organic Carbon [water, unspecified]: 4.95e-6 kg; lognormal variance with pedigree 0.0986, pedigree (2,5,5,1,1)
- Water [water, unspecified]: 0.003553 m3; name water_to_water_unspecified; = (water_deionised_input/1000)*(1-fraction_WDI_to_air)+water_UNO_input*(1-fraction_PW_to_air); lognormal variance with pedigree 0.0807, pedigree (2,2,5,1,1)
  (same comment as for Water)
  property carbon content, fossil 0; name C_content_fossil
  property carbon content, non-fossil 0; name C_content_non_fossil
  property dry mass 0 kg; name DM
  property fraction, origin: fresh water 0.796651; name fraction_origin_fresh_water_Ww
  property fraction, origin: salt water 0; name fraction_origin_salt_water_Ww
  property fraction, origin: unspecified 0.203349; name fraction_origin_unspecified_Ww
  property water in wet mass 1000 kg; name WWM
  property wet mass 1000 kg; name WM
- Zinc II [water, unspecified]: 3.16e-5 kg; lognormal variance with pedigree 0.098, pedigree (1,5,5,1,1)

## Sampling procedure
Literature

## Extrapolations
see technology

## Review by Roland Hischier 2003-06-17
Passed.
