# dewatering of ethanol from biomass, from 95% to 99.7% solution state

Dataset: EcoSpold 2, unit process
Geography: RoW
Time period: 1990-01-01 to 2023-12-31
Technology level: current
Classification: ISIC rev.4 ecoinvent: 2011:Manufacture of basic chemicals
Classification: EcoSpold01Categories: biomass/fuels
Synonyms: grain alcohol; fermentation alcohol; ethyl hydrate; Ethyl alcohol; bio-ethanol; algrain; Ethanol; bioethanol; Anhydrol; ethyl hydroxide; Denatured alcohol; ethanol 200 proof; Alkohol; Ethanol absolute; cologne spirit; cologne spirits (alcohol); alcohol dehydrated
Tags: ConvertedDataset
Scenario: Business-as-Usual
System model: Allocation, cut-off by classification
Share of production covered: 0 %
Generated by: Edgard Gnansounou
Published in: Jungbluth N. 2007
Database: ecoinvent
isCopyrightProtected: true
accessRestrictedTo: 1

## General comment
Inventory refers to the production of 1 kg anhydrous ethanol 99.7% (dry basis, i.e. 1.003 kg anhydrous ethanol wet basis). Dehydration is carried out by molecular sieve technology. Ethanol is produced from corn, in the average US context.
[This dataset was already contained in the ecoinvent database version 2. It was not individually updated during the transfer to ecoinvent version 3. Life Cycle Impact Assessment results may still have changed, as they are affected by changes in the supply chain, i.e. in other datasets. This dataset was generated following the ecoinvent quality guidelines for version 2. It may have been subject to central changes described in the ecoinvent version 3 change report (http://www.ecoinvent.org/database/ecoinvent-version-3/reports-of-changes/), and the results of the central updates were reviewed extensively. The changes added e.g. consistent water flows and other information throughout the database. The documentation of this dataset can be found in the ecoinvent reports of version 2, which are still available via the ecoinvent website. The change report linked above covers all central changes that were made during the conversion process.]

## Included activities end
This dataset includes the dehydration of hydrated ethanol (95%) to anhydrous ethanol (99.7%). Hydrated ethanol input is corn-based ethanol, produced in the US context. Treatment of waste streams is included.

## Geography
Data is from the etha+ project (Alcosuisse, CH), adapted to US context

## Technology
Dehydration is done by molecular sieve technology.

## Time period
Data from 1990 to 2006, current dry-mill technology for the production of ethanol from corn

## Reference product
- ethanol, without water, in 99.7% solution state, from fermentation: 1 kg; By-product classification allocatable product; CPC 35491: Biodiesel; HS2017 290511: Alcohols; saturated monohydric, methanol (methyl alcohol); CAS 64-17-5
  EcoSpold01Location=US
  production volume 6.8256e9 kg
    44875 million litres; 0.79kg/l; Source: F. O. Licht World Ethanol and Biofuels Report, vol. 4, no. 17 (9 May 2006), p. 395.
  property heating value, net 28.1 MJ
    Based on literature, page 275, Report 17: Jungbluth, N., Chudacoff, M., Dauriat, A., Dinkel, F., Doka, G., Faist Emmenegger, M., Gnansounou, E., Kljun, N., Schleiss, K., Spielmann, M., Stettler, C., Sutter, J. 2007: Life Cycle Inventories of Bioenergy. ecoinvent report No. 17, Swiss Centre for Life Cycle Inventories, Dübendorf, CH.
  property price 0.436 EUR2005
    Calculated using world prices in FAPRI2007, 2009. Agricultural outlook. The prices in 2003 and 2004 were assumed to be the same as the most recent year (2005). (http://www.fapri.missouri.edu/outreach/publications/ag_outlook.asp?current_page=outreach; accessed 22/06/10). Unit conversion from US gallon to kg - 1 gallon = 3.7856 liter * 0.789 kg/liter (ethanol density) = 2.9868 kg (from http://www.peteducation.com/category.cfm?c=0+1305 and http://en.wikipedia.org/wiki/Ethanol accessed 25/6/10).
  properties: carbon allocation 0.521739 kg, carbon content 0.521739, carbon content, fossil 0, carbon content, non-fossil 0.521739, dry mass 1 kg, water content 0, water in wet mass 0 kg, wet mass 1 kg

## Inputs from technosphere
- electricity, high voltage: 3.28514e-7, 3.04455e-7, 3.04299e-8, 7.62849e-9, 2.01971e-7, 4.49798e-8, 3.13266e-8, 3.80866e-6, 5.16788e-8, 7.08141e-8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 kWh (67 suppliers, which the file names only by identifier); sum of these 3.69146e-5 kWh; lognormal variance with pedigree 0.042, pedigree (1,1,5,5,1)
  EcoSpold01Location=BR
  Galitsky 2003
  Uncertainty: Galitsky 2003
- electricity, medium voltage: 1.07864e-5, 1.37545e-5, 4.81263e-7, 1.22335e-6, 1.12147e-5, 0.000106663, 0.000139771, 0.000148018, 5.68581e-6, 7.53931e-5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 kWh (67 suppliers, which the file names only by identifier); sum of these 0.00496761 kWh; lognormal variance with pedigree 0.0521, pedigree (1,2,5,5,1)
  EcoSpold01Location=US
  Etha+ project Alcosuisse, industrial data, cross checking with literature survey for US conditions
  Uncertainty: etha+ project Alcosuisse, industrial data, cross checking with literature survey for US conditions
- ethanol fermentation plant: 2.95735e-11 unit; lognormal variance with pedigree 0.3521, pedigree (1,2,5,5,1)
  EcoSpold01Location=CH
  Etha+ project Alcosuisse, industrial data, cross checking with literature survey for US conditions
  Uncertainty: etha+ project Alcosuisse, industrial data, cross checking with literature survey for US conditions
- ethanol, without water, in 95% solution state, from fermentation: 1 kg; lognormal variance with pedigree 0.042, pedigree (1,1,5,5,1)
  Product, calculation
  EcoSpold01Location=US
  Uncertainty: Product, calculation
  properties: carbon content, non-fossil 0.521739, dry mass 1 kg, heating value, net 28.1 MJ, wet mass 1 kg
  note on heating value, net: Based on literature, page 275, Report 17: Jungbluth, N., Chudacoff, M., Dauriat, A., Dinkel, F., Doka, G., Faist Emmenegger, M., Gnansounou, E., Kljun, N., Schleiss, K., Spielmann, M., Stettler, C., Sutter, J. 2007: Life Cycle Inventories of Bioenergy. ecoinvent report No. 17, Swiss Centre for Life Cycle Inventories, Dübendorf, CH.
- heat, district or industrial, natural gas: 0.00908384, 0.552795 MJ (2 suppliers, which the file names only by identifier); sum of these 0.561879 MJ; lognormal variance with pedigree 0.0521, pedigree (1,2,5,5,1)
  EcoSpold01Location=RER
  Etha+ project Alcosuisse, industrial data, cross checking with literature survey for US conditions
  Uncertainty: etha+ project Alcosuisse, industrial data, cross checking with literature survey for US conditions
  properties: heating value, net 1 MJ
- wastewater, average: -2.75967e-5, -9.82547e-8 m3 (2 suppliers, which the file names only by identifier); sum of these -2.76949e-5 m3; lognormal variance with pedigree 0.0121, pedigree (1,2,1,5,1)
  Etha+ project Alcosuisse, industrial data, cross checking with literature survey for US conditions
  EcoSpold01Location=CH
  Uncertainty: etha+ project Alcosuisse, industrial data, cross checking with literature survey for US conditions
  production volume
    Calculated from the production volume of ethanol, without water, in 99.7% solution state, from fermentation in proportion to the respective output amounts.
  properties: carbon content, non-fossil 0.194039, dry mass 0.346837 kg, mass concentration, TOC 0.1091 kg/m3, mass concentration, calcium 0.039453 kg/m3, mass concentration, chlorine 0.030031 kg/m3, mass concentration, hydrogen 0.013365 kg/m3, mass concentration, nitrogen 0.031015 kg/m3, mass concentration, oxygen 0.069824 kg/m3, mass concentration, sodium 0.06456 kg/m3, mass concentration, sulfur 0.015602 kg/m3, water content 2882.2, wet mass 1000 kg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
  note on carbon content, non-fossil: 0.0673 kg TOC/m3 (Tab A.17, ecoinvent v2.2 report 13_I). TOC was considered as Total Carbon.

## Sampling procedure
Data is from the etha+ project (Alcosuisse, CH), technology by French ethanol plant supplier, modelling by ENERS (CH)

## Extrapolations
none This dataset has been copied from an original dataset covering the geography US. The uncertainty has been adjusted accordingly.

## Review by Niels Jungbluth 2006-08-15
Passed.
none
