# transport, freight train, diesel

Dataset: EcoSpold 2, unit process
Geography: RoW
Time period: 1999-01-01 to 2023-12-31
Technology level: current
Classification: ISIC rev.4 ecoinvent: 4912:Freight rail transport
Scenario: Business-as-Usual
System model: Allocation, cut-off by classification
Share of production covered: 100 %
Generated by: Frédéric Gindroz
Published in: Spielmann M. 2007
Database: ecoinvent
isCopyrightProtected: true
accessRestrictedTo: 1

## General comment
Based on Chinese, European and American diesel freight train.The dataset represents the entire transport life cycle of a diesel freight train. The data of the energy used and operation emissions are based on "transport, freight train, diesel" dataset for RER and represents a diesel goods train with a weight of 1000 Gt. Variation in the geography of different countries have been taken into account by classifying 15 European countries into 3 regions (flat, hilly, mountain).
[This dataset is meant to replace the following datasets:]

## Included activities start
The dataset starts with the production of a locomotive.

## Included activities end
Based on Chinese, European and American diesel freight train; it includes operation of diesel freight train only. This dataset calls the modules 'production, maintenance of vehicles'; 'construction of railway track'.

## Geography
Extrapolated from "transport, freight train, diesel, CN 2004", "transport, freight train, diesel, RER 2000" and "transport, freight train, diesel, US 2000"

## Technology
Average technology

## Reference product
- transport, freight train: 1 metric ton*km; By-product classification allocatable product; CPC 6512: Railway transport services of freight
  production volume 2.27417e12 metric ton*km
    Literature data. Total production volume for the country is taken from 2019 Railway Statistics Synopsis (https://uic.org/IMG/pdf/uic-statistics-synopsis-2019.pdf). The technology share in calculated based on the weighted average of the technology of all geographies available in the ecoinvent database.
  properties: carbon allocation 0 kg, carbon content 0, price 0.026 EUR2005

## Inputs from technosphere
- diesel: 2.1432e-5, 0.00888456, 6.34796e-14, 6.30237e-5, 0.000445811 kg (5 suppliers, which the file names only by identifier); sum of these 0.00941482 kg; lognormal variance with pedigree 0.0438, pedigree (2,3,5,5,1)
  Weighted average of the datasets "transport, freight train, diesel, CN 2004", "transport, freight train, diesel, RER 2000" and "transport, freight train, diesel, US 2000".
  Uncertainty: Pedigree matrix set according to expert judgment and variance of log-transformed data set to default value
  properties: carbon content, fossil 0.865, dry mass 1 kg, heating value, net 42.8 MJ, wet mass 1 kg
  note on carbon content, fossil: C-content of diesel is 86.5% (ecoinvent v2.2 report 6_IV, Tab 3.14)
- goods wagon: 4.59e-8 unit; lognormal variance with pedigree 0.342, pedigree (1,1,5,5,1)
  (same comment as for diesel)
- locomotive: 7.11e-10 unit; lognormal variance with pedigree 0.342, pedigree (1,1,5,5,1)
  (same comment as for diesel)
- maintenance, goods wagon: 4.59e-8 unit; lognormal variance with pedigree 0.342, pedigree (1,1,5,5,1)
  (same comment as for diesel)
- maintenance, locomotive: 7.11e-10 unit; lognormal variance with pedigree 0.342, pedigree (1,1,5,5,1)
  (same comment as for diesel)
- railway track: 9.3e-5 m*year; lognormal variance with pedigree 0.344, pedigree (3,1,5,5,1)
  (same comment as for diesel)

## Emissions to nature
- Ammonia [air, unspecified]: 1.88233e-7 kg; lognormal variance with pedigree 0.0912, pedigree (2,3,5,5,3)
  (same comment as for diesel)
- Benzene [air, unspecified]: 9.41482e-7 kg; lognormal variance with pedigree 0.0912, pedigree (2,3,5,5,3)
  (same comment as for diesel)
- Cadmium II [air, unspecified]: 9.42e-11 kg; lognormal variance with pedigree 0.708, pedigree (4,5,5,5,1)
  (same comment as for diesel)
- Carbon dioxide, fossil [air, unspecified]: 0.0296 kg; lognormal variance with pedigree 0.0438, pedigree (2,3,5,5,1)
  (same comment as for diesel)
- Carbon monoxide, fossil [air, unspecified]: 0.000149 kg; lognormal variance with pedigree 0.6932, pedigree (2,3,5,5,1)
  (same comment as for diesel)
- Chromium III [air, unspecified]: 4.7e-10 kg; lognormal variance with pedigree 0.708, pedigree (4,5,5,5,1)
  (same comment as for diesel)
- Copper ion [air, unspecified]: 1.6005e-8 kg; lognormal variance with pedigree 0.708, pedigree (4,5,5,5,1)
  (same comment as for diesel)
- Dinitrogen monoxide [air, unspecified]: 9.41482e-7 kg; lognormal variance with pedigree 0.0912, pedigree (2,3,5,5,3)
  (same comment as for diesel)
- Lead II [air, unspecified]: 1.03e-12 kg; lognormal variance with pedigree 0.708, pedigree (4,5,5,5,1)
  (same comment as for diesel)
- Mercury II [air, unspecified]: 1.88233e-13 kg; lognormal variance with pedigree 0.708, pedigree (4,5,5,5,1)
  (same comment as for diesel)
- Methane, fossil [air, unspecified]: 1.22331e-6 kg; lognormal variance with pedigree 0.0912, pedigree (2,3,5,5,3)
  (same comment as for diesel)
- NMVOC, non-methane volatile organic compounds [air, unspecified]: 4.76e-5 kg; lognormal variance with pedigree 0.0912, pedigree (2,3,5,5,3)
  (same comment as for diesel)
- Nickel II [air, unspecified]: 6.57292e-10 kg; lognormal variance with pedigree 0.708, pedigree (4,5,5,5,1)
  (same comment as for diesel)
- Nitrogen oxides [air, unspecified]: 0.000517 kg; lognormal variance with pedigree 0.0832, pedigree (2,3,5,5,1)
  (same comment as for diesel)
- Particulate Matter, < 2.5 um [air, unspecified]: 1.21e-5 kg; lognormal variance with pedigree 0.3446, pedigree (3,3,5,5,1)
  (same comment as for diesel)
- Particulate Matter, > 10 um [air, unspecified]: 1.73e-5 kg; lognormal variance with pedigree 0.0846, pedigree (3,3,5,5,1)
  (same comment as for diesel)
- Particulate Matter, > 2.5 um and < 10um [air, unspecified]: 1.35e-5 kg; lognormal variance with pedigree 0.1646, pedigree (3,3,5,5,1)
  (same comment as for diesel)
- Selenium IV [air, unspecified]: 9.42e-11 kg; lognormal variance with pedigree 0.708, pedigree (4,5,5,5,1)
  (same comment as for diesel)
- Sulfur dioxide [air, unspecified]: 5.64e-6 kg; lognormal variance with pedigree 0.0438, pedigree (2,3,5,5,1)
  (same comment as for diesel)
- Toluene [air, unspecified]: 3.76e-7 kg; lognormal variance with pedigree 0.0926, pedigree (3,3,5,5,3)
  (same comment as for diesel)
- Xylenes, unspecified [air, unspecified]: 3.76e-7 kg; lognormal variance with pedigree 0.0926, pedigree (3,3,5,5,3)
  (same comment as for diesel)
- Zinc II [air, unspecified]: 9.42e-9 kg; lognormal variance with pedigree 0.708, pedigree (4,5,5,5,1)
  (same comment as for diesel)
- Iron ion [soil, unspecified]: 5.3e-5 kg; lognormal variance with pedigree 0.25, pedigree (5,5,5,5,5)
  (same comment as for diesel)

## Sampling procedure
International Railway statistic

## Extrapolations
see Technology and Geography This dataset has been copied from an original dataset covering the geography CN, RER, US. The uncertainty has been adjusted accordingly.
