# krypton to generic market for inert gas for discharge lamps

Dataset: EcoSpold 2, unit process
Geography: GLO
Time period: 2012-01-01 to 2023-12-31
Technology level: current
Classification: ISIC rev.4 ecoinvent: 2011:Manufacture of basic chemicals
Classification: EcoSpold01Categories: chemicals/inorganics
Tags: linking activity
Scenario: Business-as-Usual
System model: Allocation, cut-off by classification
Generated by: Tereza Levova
Database: ecoinvent
isCopyrightProtected: true
accessRestrictedTo: 1

## General comment
This is a linking activity. Several different noble gases (or their mixtures) can be used as an inert gas for gas-discharge lamps. This linking activity separate the production volume of krypton which is later on used as inert gas in gas-discharge lamps and link it to the generic market for inert gas for discharge lamps.

## Included activities end
This is a linking activity, i.e. nothing is produced in this activity.

## Reference product
- inert gas for discharge lamps: 1 kg; By-product classification allocatable product; CPC 34210: Hydrogen, nitrogen, oxygen, carbon dioxide and rare gases; inorganic oxygen compounds of non-metals n.e.c.; HS2017 850410: Discharge lamps or tubes; ballasts therefor
  Inert gas for discharge lamps, such as argon, neon, krypton, xenon or their mixture.
  production volume 8098.4 kg; = 10123*0.8
    Calculated based on literature value and estimate. Krypton is produced in air separation, xenon krypton purification activity. When 0.105 kg of xenon is produced as a reference product, 0.895 kg of krypton is produced as a by-product.
    The annual production volume of xenon produced in air separation, xenon krypton purification activity is (7000/5.894=) 1187 kg/year. Calculated based on literature value (Ullman's Encyclopedia). Approximately 7000 m3/year of xenon is produced in the world (data from 1998). 5.894 kg/m3 is the density of xenon, gaseous.
    The annual production volume of krypton produced in air separation, xenon krypton purification activity is calculated to be (0.895/0.105=) 10123 kg/year. It is estimated that 80% of this amount is used as inert gas for gas-discharge lamps, thus linked into the generic market.
  property price 6.59 EUR2005
    This is the average of the two gases that at the moment go to generic market of inert gas for discharge lamps: "argon, crude, liquid" and "krypton, gaseous". Other gases could be used for discharge lamps.
  properties: carbon allocation 0 kg, carbon content 0, carbon content, fossil 0, carbon content, non-fossil 0, dry mass 1 kg, water content 0, water in wet mass 0 kg, wet mass 1 kg

## Inputs from technosphere
- krypton, gaseous: 1 kg
  property carbon content, fossil 0; name C_content_fossil
  property carbon content, non-fossil 0; name C_content_non_fossil
  property dry mass 1 kg; name DM
  property water content 0; name water_content
  property water in wet mass 0 kg; name WWM
  property wet mass 1 kg; name WM

## Review by Bo Weidema 2012-07-02
passed
