# treatment of waste aluminium, sanitary landfill

Dataset: EcoSpold 2, unit process
Geography: RoW
Time period: 1994-01-01 to 2023-12-31
Technology level: current
Classification: ISIC rev.4 ecoinvent: 3821:Treatment and disposal of non-hazardous waste
Scenario: Business-as-Usual
System model: Allocation, cut-off by classification
Generated by: Nikolia Stoikou
Database: ecoinvent
isCopyrightProtected: true
accessRestrictedTo: 1

## General comment
This dataset represents the activity of waste disposal of 'waste aluminium' in a sanitary landfill. Recommended use of this dataset: For disposal of bulky, non-dust aluminium, which goes to disposal as part of a larger item or in small amounts only. Pure, isolated aluminium fractions will not be disposed in incinerators or landfills, but rather go to recycling. Inventoried waste consists of fraction: 100% Alu in MSW; . Waste composition (wet, in ppmw): H2O na; O na; H na; C na; S na; N na; P na; B na; Cl 4825; Br na; F na; I na; Ag na; As na; Ba na; Cd 3; Co na; Cr na; Cu 8.5; Hg na; Mn na; Mo na; Ni na; Pb 25.5; Sb na; Se na; Sn na; V na; Zn 29; Be na; Sc na; Sr na; Ti na; Tl na; W na; Si na; Fe na; Ca na; Al 995110; K na; Mg na; Na na. Share of carbon in initial waste waste that is biogenic 60.4%. Share of metals in waste not oxidised and bulk-recyclable (exclude very small or thin parts) Iron: 0%; Alu: 100%; Copper: 0%. Overall degradability of waste during 100 years: 50%. 0 kg waste mass remains in the landfill even after the long term period.

## Included activities start
The activity starts with the waste being available at the gate of the treatment facility. Collection and transportation of the waste to the treatment plant is not included.

## Included activities end
The activity ends with the waste being treated and waste-specific emissions from the landfill are released to the environment (air due to landfil gas, water due to landfil leachate, and subsequent into groundwater).

## Geography
The site has mean annual temperature (MAT) of 16.743579766537 degC, mean annual precipitation (MAP) of 1250.84108527132 mm/year, and net infiltration of 790.252035689178 mm/year.The leachate percolating through the landfill has an average residence time of 6.33 years.
References
UN data, 2020. Precipitation, Environment Statistics Database, United Nations Statistics Division Available at: http://data.un.org/Data.aspx?q=precipitation&d=ENV&f=variableID%3a6;
World Bank, 2022. Surface area (sq.km), World Bank Group Available at: https://data.worldbank.org/indicator/AG.SRF.TOTL.K2;
Doka G.,2021. A model for composition-specific life cycle inventories of regionalised wastewater fates, Zurich, Switzerland. http://www.doka.ch/publications.htm

## Technology
This is an inventory for a sanitary (controlled) landfill for municipal solid waste. Ultimate average landfill height is 20 meters. Operation phase duration is 30 years. The total raw landfill gas mass produced in the landfill from this waste is 0.00007481 kg. The total CH4 mass in the raw landfill gas is 0 kg. Percentage of landfill gas directly emitted is 47w%. Percentage of landfill gas captured and flared is 18.02w%. Percentage of landfill gas captured and utilised is 34.98%. Conversion efficiencies are 27.8e% for electricity and 13.5e% for useful heat. Leachate collected during the first 100 years is collected and treated region-specifically before emission. Based on average waste composition and climate data the end of carbonate phase is estimated to be reached 2'863 years after waste deposition.

## Reference product
- waste aluminium: -1 kg; By-product classification Waste; CPC 39363: Waste and scrap of aluminium; HS2017 760200: Aluminium; waste and scrap; CAS 7429-90-5
  main reference product of this activity
  production volume 3.38677e7 kg
    Estimated based on the total amount of this waste being generated in the database in the global geography
  property price 0 EUR2005
    Waste products are assigned a price of zero as they are assumed to require further treatment.
  properties: aluminium content 0.991926, cadmium content 3.05791e-6, carbon allocation 7.51105e-5 kg, carbon content 7.66062e-5, carbon content, fossil 7.66062e-5, carbon content, non-fossil 0, chlorine content 0.00479297, copper content 8.44942e-6, dry mass 0.980475 kg, hydrogen content 1.06868e-5, lead content 2.53528e-5, nitrogen content 3.1721e-5, oxygen content 0.00309609, water content 0.0199135, water in wet mass 0.0195247 kg, wet mass 1 kg, zinc content 2.89955e-5

## Inputs from technosphere
- cast iron: 1.48135e-6 kg; lognormal variance with pedigree 0.32902, pedigree (1,1,4,1,1)
  For sewer auxiliary materials.
  Uncertainty: Uncertainty calculated from uncertainty in base parameters.
  properties: carbon content, fossil 0.04, dry mass 1 kg, wet mass 1 kg
- concrete, 30MPa: 2.95844e-9, 1.25191e-7, 1.23286e-8, 3.03829e-9 m3 (4 suppliers, which the file names only by identifier); sum of these 1.43517e-7 m3; lognormal variance with pedigree 0.32902, pedigree (1,1,4,1,1)
  For leachate collection tanks and sewer pipe.
  Uncertainty: Uncertainty calculated from uncertainty in base parameters.
  properties: dry mass 2205 kg, water content 0.0816327, wet mass 2385 kg
- diesel, burned in building machine: 0.0485955 MJ; lognormal variance with pedigree 0.32902, pedigree (1,1,4,1,1)
  For waste distribution and compaction, construction diesel for base and compartment seals, for access street and sewer construction.
  Uncertainty: Uncertainty calculated from uncertainty in base parameters.
  properties: heating value, net 1 MJ
- electricity, low voltage: 5.72129e-7, 2.5539e-8, 4.01617e-7, 8.33609e-6, 8.22813e-7, 5.12513e-9, 1.88928e-6, 2.86999e-6, 1.42181e-7 kWh (9 suppliers, which the file names only by identifier); sum of these 1.50648e-5 kWh; lognormal variance with pedigree 0.028759, pedigree (1,1,4,1,1)
  Administrative building electricity consumption.
  Uncertainty: Uncertainty calculated from uncertainty in base parameters.
- excavation, hydraulic digger: 0.00038942 m3; lognormal variance with pedigree 0.32902, pedigree (1,1,4,1,1)
  Excavation work for landfill construction, sewer construction and recultivation.
  Uncertainty: Uncertainty calculated from uncertainty in base parameters.
- excavation, skid-steer loader: 0.00038942 m3; lognormal variance with pedigree 0.32902, pedigree (1,1,4,1,1)
  (same comment as for excavation, hydraulic digger)
- extrusion, plastic pipes: 8.53059e-5 kg; lognormal variance with pedigree 0.32902, pedigree (1,1,4,1,1)
  For base and interior drain system of landfill, sewer auxiliary materials.
  Uncertainty: Uncertainty calculated from uncertainty in base parameters.
- gravel, round: 0.160834 kg; lognormal variance with pedigree 0.32902, pedigree (1,1,4,1,1)
  For base and flank gravel beds and concrete, for access street, for drainage beds, for recultivation layer.
  Uncertainty: Uncertainty calculated from uncertainty in base parameters.
  properties: dry mass 1 kg, wet mass 1 kg
- heat, district or industrial, other than natural gas: 0.00157639, 7.30312e-7, 4.01142e-5 MJ (3 suppliers, which the file names only by identifier); sum of these 0.00161723 MJ; lognormal variance with pedigree 0.028759, pedigree (1,1,4,1,1)
  Administrative building space heat demand.
  Uncertainty: Uncertainty calculated from uncertainty in base parameters.
  properties: heating value, net 1 MJ
- leachate, SLF, waste aluminium: -0.00399963 m3
  Landfill leachate captured during short-term sent to wastewater treatment.
  production volume
    calculated in proportion to incinerated waste input
  properties: carbon content, non-fossil 1.13218e-5, dry mass 7.27547 kg, fossil share of carbon 1, mass concentration, TOC 3.28804e-7 kg/m3, mass concentration, aluminium 0.00609325 kg/m3, mass concentration, cadmium 6.64125e-8 kg/m3, mass concentration, chlorine 0.00116101 kg/m3, mass concentration, copper 5.08175e-9 kg/m3, mass concentration, hydrogen 4.58694e-8 kg/m3, mass concentration, lead 1.83477e-8 kg/m3, mass concentration, nitrogen 7.28987e-6 kg/m3, mass concentration, oxygen 1.32888e-5 kg/m3, mass concentration, zinc 1.68901e-7 kg/m3, water content 136.448, wet mass 1000 kg
- pitch: 0.00028355, 1.27099e-5, 6.26495e-6, 0.000109927, 1.81446e-5, 0.00160294, 0.000364273 kg (7 suppliers, which the file names only by identifier); sum of these 0.00239781 kg; lognormal variance with pedigree 0.32902, pedigree (1,1,4,1,1)
  For base and compartment seals and access street construction.
  Uncertainty: Uncertainty calculated from uncertainty in base parameters.
  properties: carbon content, fossil 0.83, dry mass 1 kg, heating value, net 28 MJ, wet mass 1 kg
- polyethylene, high density, granulate: 0.000269651 kg; lognormal variance with pedigree 0.32902, pedigree (1,1,4,1,1)
  For base and compartment seals, for base and interior drain system of landfill, sewer auxiliary materials.
  Uncertainty: Uncertainty calculated from uncertainty in base parameters.
  properties: carbon content, fossil 0.857143, dry mass 1 kg, heating value, net 42.47 MJ, wet mass 1 kg
- polypropylene, granulate: 2.24447e-7 kg; lognormal variance with pedigree 0.32902, pedigree (1,1,4,1,1)
  (same comment as for cast iron)
  properties: carbon content, fossil 0.857143, dry mass 1 kg, heating value, net 32.78 MJ, wet mass 1 kg
  note on heating value, net: Value extracted from "treatment of waste polypropylene, open burning"
- polyvinylchloride, bulk polymerised: 2.24447e-7 kg; lognormal variance with pedigree 0.32902, pedigree (1,1,4,1,1)
  (same comment as for cast iron)
  properties: carbon content, fossil 0.387097, dry mass 1 kg, heating value, net 21.5 MJ, wet mass 1 kg
- reinforcing steel: 8.75344e-6 kg; lognormal variance with pedigree 0.32902, pedigree (1,1,4,1,1)
  (same comment as for cast iron)
  properties: carbon content, fossil 0.004, dry mass 1 kg, wet mass 1 kg
- sand: 1.01625e-6, 6.61331e-5, 5.27588e-9 kg (3 suppliers, which the file names only by identifier); sum of these 6.71546e-5 kg; lognormal variance with pedigree 0.32902, pedigree (1,1,4,1,1)
  (same comment as for cast iron)
  properties: dry mass 1 kg, wet mass 1 kg
- steel, chromium steel 18/8, hot rolled: 3.05248e-6 kg; lognormal variance with pedigree 0.32902, pedigree (1,1,4,1,1)
  (same comment as for cast iron)
  properties: carbon content, fossil 0.0008, dry mass 1 kg, wet mass 1 kg
- synthetic rubber: 8.97789e-8 kg; lognormal variance with pedigree 0.32902, pedigree (1,1,4,1,1)
  (same comment as for cast iron)
  properties: carbon content, fossil 0.871949, dry mass 1 kg, heating value, net 26.42 MJ, wet mass 1 kg
- tap water: 2.27511e-6, 3.46821e-6, 6.47151e-6, 1.74338e-5, 2.09856e-6, 8.74545e-5, 0.00100079, 0.000745752 kg (8 suppliers, which the file names only by identifier); sum of these 0.00186574 kg; lognormal variance with pedigree 0.32902, pedigree (1,1,4,1,1)
  (same comment as for cast iron)
  properties: carbon content, fossil 0.00178991, dry mass 0.000337476 kg, water content 2962.17, wet mass 1 kg

## Inputs from nature
- Organic carbon, placed in landfill [inventory indicator, waste]: 1.24578e-5 kg; lognormal variance with pedigree 0.21359, pedigree (1,1,4,1,1)
  Mass of organic carbon in waste (without inorganic carbon), initially (year 1) put in sanitary landfill. The exchange represents a flow that is within the technosphere. This exchange should only be used to apply ecofactors for the Swiss LCIA method of Ecological Scarcity and not any other purpose.
  Uncertainty: uncertainty is derived from uncertainty in waste composition and flows.
- Waste mass, total, placed in landfill [inventory indicator, waste]: 1.00432 kg
  Mass of waste initially (year 1) put in sanitary landfill. The exchange represents a flow that is within the technosphere. This exchange should only be used to apply ecofactors for the Swiss LCIA method of Ecological Scarcity and not any other purpose.
- Occupation, construction site [natural resource, land]: 0.000251079 m2*year; lognormal variance with pedigree 0.32902, pedigree (1,1,4,1,1)
  For construction phase of the landfill.
  Uncertainty: Uncertainty calculated from uncertainty in base parameters.
- Occupation, dump site [natural resource, land]: 0.00150648 m2*year; lognormal variance with pedigree 0.32902, pedigree (1,1,4,1,1)
  For landfill operation phase.
  Uncertainty: Uncertainty calculated from uncertainty in base parameters.
- Occupation, shrub land, sclerophyllous [natural resource, land]: 0.000251079 m2*year; lognormal variance with pedigree 0.32902, pedigree (1,1,4,1,1)
  Restoration and aftercare phase.
  Uncertainty: Uncertainty calculated from uncertainty in base parameters.
- Occupation, traffic area, road network [natural resource, land]: 0.00185799 m2*year; lognormal variance with pedigree 0.32902, pedigree (1,1,4,1,1)
  For access road.
  Uncertainty: Uncertainty calculated from uncertainty in base parameters.
- Transformation, from dump site, sanitary landfill [natural resource, land]: 5.02159e-5 m2; lognormal variance with pedigree 0.32902, pedigree (1,1,4,1,1)
  Conversion after landfill operation.
  Uncertainty: Uncertainty calculated from uncertainty in base parameters.
- Transformation, from pasture, man made [natural resource, land]: 6.02591e-5 m2; lognormal variance with pedigree 0.32902, pedigree (1,1,4,1,1)
  Original conversion of landfill area and access road.
  Uncertainty: Uncertainty calculated from uncertainty in base parameters.
- Transformation, from shrub land, sclerophyllous [natural resource, land]: 5.02159e-5 m2; lognormal variance with pedigree 0.32902, pedigree (1,1,4,1,1)
  After restoration.
  Uncertainty: Uncertainty calculated from uncertainty in base parameters.
- Transformation, to dump site, sanitary landfill [natural resource, land]: 5.02159e-5 m2; lognormal variance with pedigree 0.32902, pedigree (1,1,4,1,1)
  Conversion to landfill area.
  Uncertainty: Uncertainty calculated from uncertainty in base parameters.
- Transformation, to forest, unspecified [natural resource, land]: 5.02159e-5 m2; lognormal variance with pedigree 0.32902, pedigree (1,1,4,1,1)
  Conversion to forest after renaturation.
  Uncertainty: Uncertainty calculated from uncertainty in base parameters.
- Transformation, to shrub land, sclerophyllous [natural resource, land]: 5.02159e-5 m2; lognormal variance with pedigree 0.32902, pedigree (1,1,4,1,1)
  Initial restoration and renaturation.
  Uncertainty: Uncertainty calculated from uncertainty in base parameters.
- Transformation, to traffic area, road network [natural resource, land]: 1.00432e-5 m2; lognormal variance with pedigree 0.32902, pedigree (1,1,4,1,1)
  Construction of access road.
  Uncertainty: Uncertainty calculated from uncertainty in base parameters.

## Emissions to nature
- Aluminium III [air, non-urban air or from high stacks]: 6.22151e-6 kg; lognormal variance with pedigree 1.3296, pedigree (1,1,4,1,1)
  Emission from direct release or combustion of landfill biogas.
  Uncertainty: Uncertainty calculated from uncertainty of the waste composition of this waste, uncertainty in waste decomposition and short-term leaching in landfill-
- Cadmium II [air, non-urban air or from high stacks]: 1.76835e-9 kg; lognormal variance with pedigree 2.1567, pedigree (1,1,4,1,1)
  (same comment as for Aluminium III)
- Carbon dioxide, fossil [air, non-urban air or from high stacks]: 1.96061e-5 kg; lognormal variance with pedigree 0.22576, pedigree (1,1,4,1,1)
  (same comment as for Aluminium III)
- Carbon monoxide, fossil [air, non-urban air or from high stacks]: 1.19619e-9 kg; lognormal variance with pedigree 0.87274, pedigree (1,1,4,1,1)
  (same comment as for Aluminium III)
- Copper ion [air, non-urban air or from high stacks]: 5.94648e-12 kg; lognormal variance with pedigree 2.9033, pedigree (1,1,4,1,1)
  (same comment as for Aluminium III)
- Heat, waste [air, non-urban air or from high stacks]: 0.000114762 MJ
  Emission from direct release or incineration of landfill biogas.
- Hydrochloric acid [air, non-urban air or from high stacks]: 6.85866e-5 kg; lognormal variance with pedigree 0.79086, pedigree (1,1,4,1,1)
  (same comment as for Aluminium III)
- Lead II [air, non-urban air or from high stacks]: 2.50436e-11 kg; lognormal variance with pedigree 2.7142, pedigree (1,1,4,1,1)
  (same comment as for Aluminium III)
- Methane, fossil [air, non-urban air or from high stacks]: 2.54435e-6 kg; lognormal variance with pedigree 0.26629, pedigree (1,1,4,1,1)
  (same comment as for Aluminium III)
- NMVOC, non-methane volatile organic compounds [air, non-urban air or from high stacks]: 2.26307e-11 kg; lognormal variance with pedigree 0.26629, pedigree (1,1,4,1,1)
  (same comment as for Aluminium III)
- Nitrogen oxides [air, non-urban air or from high stacks]: 2.83265e-9 kg
  Emission from direct release or combustion of landfill biogas.
- Particulate Matter, < 2.5 um [air, non-urban air or from high stacks]: 4.01579e-10 kg; lognormal variance with pedigree 0.52693, pedigree (1,1,4,1,1)
  (same comment as for Aluminium III)
- Zinc II [air, non-urban air or from high stacks]: 1.52826e-10 kg; lognormal variance with pedigree 2.4788, pedigree (1,1,4,1,1)
  (same comment as for Aluminium III)
- Non-hazardous waste disposed [inventory indicator, waste]: 1.00432 kg
  Inventory indicator for waste mass disposed in landfill. To be used in EN15804 "other data" results.
- Aluminium III [water, ground-, long-term]: 0.970773 kg; lognormal variance with pedigree 0.00806679, pedigree (1,1,4,1,1)
  Emissions from long-term leachate (>100a).
  Uncertainty: Uncertainty calculated from uncertainty of the waste composition of this waste, uncertainty in waste decomposition and short-term leaching in landfill
- Ammonium [water, ground-, long-term]: 2.10334e-15 kg; lognormal variance with pedigree 2.1158, pedigree (1,1,4,1,1)
  (same comment as for Aluminium III)
- BOD5, Biological Oxygen Demand [water, ground-, long-term]: 1.29043e-6 kg; lognormal variance with pedigree 0.22842, pedigree (1,1,4,1,1)
  Emissions from long-term leachate (>100a).
  Uncertainty: Uncertainty calculated from uncertainty of the waste composition of this waste, uncertainty in waste decomposition and short-term leaching in landfill.
- COD, Chemical Oxygen Demand [water, ground-, long-term]: 5.45097e-6 kg; lognormal variance with pedigree 0.22842, pedigree (1,1,4,1,1)
  (same comment as for Aluminium III)
- Cadmium II [water, ground-, long-term]: 2.74563e-6 kg; lognormal variance with pedigree 1.4349, pedigree (1,1,4,1,1)
  (same comment as for Aluminium III)
- Chloride [water, ground-, long-term]: 4.825e-12 kg; lognormal variance with pedigree 2.3862, pedigree (1,1,4,1,1)
  (same comment as for Aluminium III)
- Copper ion [water, ground-, long-term]: 8.48013e-6 kg; lognormal variance with pedigree 1.2974, pedigree (1,1,4,1,1)
  (same comment as for Aluminium III)
- DOC, Dissolved Organic Carbon [water, ground-, long-term]: 4.98375e-6 kg; lognormal variance with pedigree 0.22842, pedigree (1,1,4,1,1)
  (same comment as for Aluminium III)
- Lead II [water, ground-, long-term]: 2.54284e-5 kg; lognormal variance with pedigree 1.1518, pedigree (1,1,4,1,1)
  (same comment as for Aluminium III)
- Nitrate [water, ground-, long-term]: 2.212e-16 kg; lognormal variance with pedigree 2.1158, pedigree (1,1,4,1,1)
  (same comment as for Aluminium III)
- Nitrite [water, ground-, long-term]: 1.14479e-16 kg; lognormal variance with pedigree 2.1158, pedigree (1,1,4,1,1)
  (same comment as for Aluminium III)
- Nitrogen, organic bound [water, ground-, long-term]: 3.43777e-15 kg; lognormal variance with pedigree 2.1158, pedigree (1,1,4,1,1)
  (same comment as for Aluminium III)
- TOC, Total Organic Carbon [water, ground-, long-term]: 4.98375e-6 kg; lognormal variance with pedigree 0.22842, pedigree (1,1,4,1,1)
  (same comment as for Aluminium III)
- Zinc II [water, ground-, long-term]: 2.83427e-5 kg; lognormal variance with pedigree 1.1348, pedigree (1,1,4,1,1)
  (same comment as for Aluminium III)
