# wheat grain production

Dataset: EcoSpold 2, unit process
Geography: US
Time period: 2001-01-01 to 2023-12-31
Technology level: current
Classification: ISIC rev.4 ecoinvent: 0111:Growing of cereals (except rice), leguminous crops and oil seeds
Synonyms: Triticum aestivum L.
Scenario: Business-as-Usual
System model: Allocation, cut-off by classification
Share of production covered: 100 %
Generated by: Thomas Kägi
Published in: Nemecek, T. 2007
Database: ecoinvent
isCopyrightProtected: true
accessRestrictedTo: 1

## General comment
This dataset represents the production of 1 kg of wheat grain (fresh matter). The yield is 2253 kg/ha at a moisture content at storage of 15%.
[This dataset was already contained in the ecoinvent database version 2. It was not individually updated during the transfer to ecoinvent version 3. Life Cycle Impact Assessment results may still have changed, as they are affected by changes in the supply chain, i.e. in other datasets. This dataset was generated following the ecoinvent quality guidelines for version 2. It may have been subject to central changes described in the ecoinvent version 3 change report (http://www.ecoinvent.org/database/ecoinvent-version-3/reports-of-changes/), and the results of the central updates were reviewed extensively. The changes added e.g. consistent water flows and other information throughout the database. The documentation of this dataset can be found in the ecoinvent reports of version 2, which are still available via the ecoinvent website. The change report linked above covers all central changes that were made during the conversion process.]

## Included activities start
This activity starts after the harvest of the previous crop. The inputs of seeds, mineral fertilisers, pesticides and irrigation water are considered. It is assumed that no organic fertilisers are applied.

## Included activities end
The dataset includes all machine operations and corresponding machine infrastructure and sheds. Machine operations are: soil cultivation, sowing, fertilisation, irrigation, weed control, pest and pathogen control, combine-harvest and transport from field to farm (1 km). Further, direct field emissions are included. This activity ends after harvest and drying of grains at the farm gate.

## Geography
Refers to an average production in the USA

## Technology
Conventional production typical for the country. Water for irrigation is pumped from 48 meter depth by electric pumps.

## Time period
The yield data have been collected for the years 2001-2006.

## Parameters
- fraction, irrigation water to surface water: 0.2 dimensionless; name fraction_IW_to_surface_water; lognormal variance with pedigree 0.0886, pedigree (4,3,1,1,4)
  Literature value (Döll, 2011) cross referenced with expert opinion.
- fraction, irrigation water, to air: 0.6949 dimensionless; name fraction_IW_to_air; lognormal variance with pedigree 0.0409, pedigree (2,2,2,1,1)
  Literature value (Siebert, 2010) (Vionnet, S., Quantis Water Database - Technical Report, 2012).
- fraction, irrigation water, to ground water: 0.8 dimensionless; name fraction_IW_to_ground_water; lognormal variance with pedigree 0.0886, pedigree (4,3,1,1,4)
  Literature value (Döll, 2011) cross referenced with expert opinion.

## Reference product
- wheat grain: 1 kg; name REF_PRODUCT; By-product classification allocatable product; CPC 01112: Wheat, other; HS2017 100199: Cereals; wheat and meslin, other than durum wheat, other than seed
  EcoSpold01Location=US
  production volume 5.7242e10 kg
    U.S. average prod. of wheat 54'128'897t in 2001-2006.
    FAOSTAT US 2005
  property carbon content, fossil 0; name REF_PRODUCT_C_content_fossil
    fossil carbon content on a dry matter basis
  property carbon content, non-fossil 0.464601; name REF_PRODUCT_C_content_non_fossil
    biogene carbon content on a dry matter basis
    Composition data obtained from Wheat, soft red winter, in (http://www.nal.usda.gov/fnic/foodcomp/search/). First, composition data were refered to 1 kg dry mass. Then, C-contents were calculated considering a C-content/dry mass of 46% in carbohydrates (including fibres), 53% in proteins and 75% in fats. All data from "Evolutionary and Biochemical Aspects", A.D. Kay and T. Vrede (in Global Ecology, 2010, Elsevier B.V., S.E. Jørgensen Ed.).
  property dry mass 0.85 kg; name REF_PRODUCT_DM
  property energy content 15.3935 MJ; name REF_PRODUCT_energy_content
    See chapter 'Product Properties' in "01_crop production - yields & inputs US_v1.0.pdf" - pdf-document on the dedicated talk page of ecoinvent (www.ecoinvent.org/documentation)
  property price 0.22 EUR2005
    Literature value. Based on SAFEX price of R 3,727 per tonne, source: SAGIS, 2018. Retrieved from: http://www.sagis.org.za/safex_historic.html, accessed 28May2018
  property water content 0.176471; name REF_PRODUCT_water_content; = (1-REF_PRODUCT_DM)/REF_PRODUCT_DM
  property water in wet mass 0.15 kg; name REF_PRODUCT_WWM; = 1-REF_PRODUCT_DM
  property wet mass 1 kg; name REF_PRODUCT_WM
  properties: carbon allocation 0.394911 kg, carbon content 0.464601

## Inputs from technosphere
- [sulfonyl]urea-compound: 2.6665e-6 kg; lognormal variance with pedigree 0.0406, pedigree (2,1,5,1,1)
  EcoSpold01Location=CH
  See chapter 'Yields and Inputs of Arable Crop Production' in "01_crop production - yields & inputs US_v1.0.pdf" - pdf-document on the dedicated talk page of ecoinvent (www.ecoinvent.org/documentation)
  properties: carbon content, fossil 0.540853, dry mass 1 kg, wet mass 1 kg
  note on carbon content, fossil: Approximated as an unweighted average of the C-content of the [sulfonyl]urea-compounds (Tab 2.25 Sutter, 2010) chlorotoluron, Diuron, Linuron and Isoproturon.
- [thio]carbamate-compound: 1.069e-6 kg; lognormal variance with pedigree 0.0406, pedigree (2,1,5,1,1)
  (same comment as for [sulfonyl]urea-compound)
  properties: carbon content, fossil 0.626349, dry mass 1 kg, wet mass 1 kg
  note on carbon content, fossil: Approximated as an unweighted average of the C-content of the [thio]carbamate-compounds (Tab 2.25 Sutter, 2010) carbofuran,orbencarb, prosulfocarb
- acetamide-anillide-compound, unspecified: 3.3653e-7 kg; lognormal variance with pedigree 0.0406, pedigree (2,1,5,1,1)
  See chapter 'Yields and Inputs of Arable Crop Production' in "01_crop production - yields & inputs US_v1.0.pdf" - pdf-document on the dedicated talk page of ecoinvent (www.ecoinvent.org/documentation)
  EcoSpold01Location=CH
  properties: carbon content, fossil 0.659175, dry mass 1 kg, wet mass 1 kg
  note on carbon content, fossil: Approximated as an unweighted average of the C-content of the acetamide-anillide-compound (Tab 2.25 Sutter, 2010) alachor, metolachlor, propachlor and teflubenzuron
- ammonia, anhydrous, liquid: 0.01617 kg; lognormal variance with pedigree 0.0407, pedigree (2,2,5,1,1)
  EcoSpold01Location=RER
  See chapter 'Yields and Inputs of Arable Crop Production' in "01_crop production - yields & inputs US_v1.0.pdf" - pdf-document on the dedicated talk page of ecoinvent (www.ecoinvent.org/documentation)
  properties: dry mass 1 kg, wet mass 1 kg
- ammonium nitrate: 0.0220682 kg; lognormal variance with pedigree 0.0407, pedigree (2,2,5,1,1)
  EcoSpold01Location=RER
  The exchange has been updated from 'ammonium nitrate, as N' into 'ammonium nitrate' and therefore its amount has been scaled (multiplied) from 0.0077 kg by 2.8573 kg of 'ammonium nitrate' per kg of 'ammonium nitrate, as N'. Original comment of the exchange is: See chapter 'Yields and Inputs of Arable Crop Production' in "01_crop production - yields & inputs US_v1.0.pdf" - pdf-document on the dedicated talk page of ecoinvent (www.ecoinvent.org/documentation)
  properties: dry mass 1 kg, wet mass 1 kg
- application of plant protection product, by field sprayer: 0.00044377 ha; lognormal variance with pedigree 0.0407, pedigree (2,1,5,3,1)
  (same comment as for [sulfonyl]urea-compound)
- benzoic-compound: 2.8506e-6 kg; lognormal variance with pedigree 0.0406, pedigree (2,1,5,1,1)
  (same comment as for [sulfonyl]urea-compound)
  properties: carbon content, fossil 0.405853, dry mass 1 kg, wet mass 1 kg
  note on carbon content, fossil: C content estimated after the pesticides Dicamba (C8H6Cl2O3) and Clopyralid (C6H3Cl2NO2) (Tab 1.5, Sutter 2010), classified in ecoinvent v2.2 report 15a, Tab 10.3 as benzoic compounds
- combine harvesting: 0.0003667 ha; lognormal variance with pedigree 0.0407, pedigree (2,1,5,3,1)
  (same comment as for acetamide-anillide-compound, unspecified)
- cyclic N-compound: 4.1176e-6 kg; lognormal variance with pedigree 0.0406, pedigree (2,1,5,1,1)
  (same comment as for [sulfonyl]urea-compound)
  properties: carbon content, fossil 0.641962, dry mass 1 kg, wet mass 1 kg
  note on carbon content, fossil: Calculated as an unweigthed average of the C content of the cyclic N-compounds where information was avaliable in Sutter, 2010, following the classification in Tab 2.25 in Sutter 2010: Difenoconazole (C19H17Cl2N3O3), Fenpropidin (C19H31N), Fenpropimorph (C20H33NO), Flusilazole (C16H15F2N3Si), Metconazole (C17H22ClN3O), Penconazole (C13H15Cl2N3), Propiconazole (C15H17Cl2N3O2), Tebuconazole (C16H22ClN3O)
- diphenylether-compound: 8.2153e-7 kg; lognormal variance with pedigree 0.0406, pedigree (2,1,5,1,1)
  (same comment as for acetamide-anillide-compound, unspecified)
  properties: carbon content, fossil 0.560061, dry mass 1 kg, wet mass 1 kg
  note on carbon content, fossil: C content of diphenylether-compounds was calculated after the C content of thepesticides aclonifen and diflufenican classified as diphenylether-compound in Tab 2.25 of Sutter 2010
- fertilising, by broadcaster: 0.0013313 ha; lognormal variance with pedigree 0.0407, pedigree (2,1,5,3,1)
  (same comment as for acetamide-anillide-compound, unspecified)
- glyphosate: 4.0146e-5 kg; lognormal variance with pedigree 0.0406, pedigree (2,1,5,1,1)
  (same comment as for acetamide-anillide-compound, unspecified)
  properties: carbon content, fossil 0.214286, dry mass 1 kg, wet mass 1 kg
- inorganic nitrogen fertiliser, as N: 0.0072404 kg; lognormal variance with pedigree 0.0407, pedigree (2,2,5,1,1)
  See chapter 'Yields and Inputs of Arable Crop Production' in "01_crop production - yields & inputs US_v1.0.pdf" - pdf-document on the dedicated talk page of ecoinvent (www.ecoinvent.org/documentation)
  EcoSpold01Location=RER
  properties: dry mass 1 kg, wet mass 1 kg
- inorganic phosphorus fertiliser, as P2O5: 0.018503 kg; lognormal variance with pedigree 0.0407, pedigree (2,2,5,1,1)
  (same comment as for ammonia, anhydrous, liquid)
  properties: dry mass 1 kg, wet mass 1 kg
- irrigation: 0.545539 m3; name water_irrigation_input; source Siebert, S. 2010; lognormal variance with pedigree 0.0427, pedigree (2,2,5,1,1)
  See chapter 'Yields and Inputs of Arable Crop Production' in "01_crop production - yields & inputs US_v1.0.pdf" - pdf-document on the dedicated talk page of ecoinvent (www.ecoinvent.org/documentation)
  Calculated based on literature values (Döll, 2010) and partially modelled at ETH (Pfister, S.).
  See chapter 'Yields and Inputs of Arable Crop Production' in "01_crop production - yields & inputs US_v1.0.pdf" - pdf-document on the dedicated talk page of ecoinvent (www.ecoinvent.org/documentation)
  Calculated based on literature values (Döll, 2010) and partially modelled at ETH (Pfister, S.).
  EcoSpold01Location=US
  properties: dry mass 0.11 kg, water content 9089.91, wet mass 1000 kg
- nitrile-compound: 3.1674e-6 kg; lognormal variance with pedigree 0.0406, pedigree (2,1,5,1,1)
  (same comment as for acetamide-anillide-compound, unspecified)
  properties: carbon content, fossil 0.344995, dry mass 1 kg, wet mass 1 kg
  note on carbon content, fossil: An unweighted average of the C content in chlorothalonil, dichlobenil, bromoxynil, ioxynil, substances classified as nitrile-compounds in Tab 2.25, Sutter 2010
- organophosphorus-compound, unspecified: 6.7702e-6 kg; lognormal variance with pedigree 0.0406, pedigree (2,1,5,1,1)
  (same comment as for [sulfonyl]urea-compound)
  properties: carbon content, fossil 0.260898, dry mass 1 kg, wet mass 1 kg
  note on carbon content, fossil: C content was calculated as an unweighted average of glyphosate, parathion, and fosetyl-Al. Those substances are classified as organo-phosphorous compounds in Tab 2.25, Sutter 2010
- packaging, for fertilisers: 0.157811 kg; lognormal variance with pedigree 0.0912, pedigree (4,3,5,5,4)
  Total amount of active substance/s of fertilisers needed for the production of 'wheat grain' is calculated to be circa 7.89E-02 kg. Fertiliser/s used in this dataset is/are: 'ammonia, liquid', 'ammonium nitrate, as N', 'nitrogen fertiliser, as N', 'phosphate fertiliser, as P2O5', 'potassium chloride, as K2O', 'urea, as N'. The total amount of active substance/s is doubled in order to account for the packaging of the dilluted product of fertiliser/s that is/are applied. Therefore, 1.58E-01 kg of packaging for fertilisers is justified with this exchange.
  properties: carbon content, fossil 0.825301, dry mass 1 kg, heating value, net 25.01 MJ, price 0.0642 EUR2005, wet mass 1 kg
  note on carbon content, fossil: Considering a chemical formula (C2H4)n for polyethylene, carbon content-fossil is calculated to be 0.856286 kg of Carbon per kg of dry mass.
- packaging, for pesticides: 0.000228492 kg; lognormal variance with pedigree 0.0912, pedigree (4,3,5,5,4)
  Total amount of active substance/s of pesticides needed for the production of wheat grain is calculated to be circa 1.14E-04 kg. Pesticide/s used in this dataset is/are: '[sulfonyl]urea-compound', '[thio]carbamate-compound', 'acetamide-anillide-compound, unspecified', 'benzoic-compound', 'cyclic N-compound', 'diphenylether-compound', 'glyphosate', 'nitrile-compound', 'organophosphorus-compound, unspecified', 'pesticide, unspecified', 'phenoxy-compound', 'pyrethroid-compound', 'triazine-compound, unspecified'. The total amount of active substance/s is doubled in order to account for the packaging of the dilluted product of pesticide/s that is/are applied. Therefore, 2.28E-04 kg of packaging for pesticides is justified with this exchange.
  properties: carbon content, fossil 0.85714, dry mass 1 kg, heating value, net 25.97 MJ, price 0.0642 EUR2005, wet mass 1 kg
- pesticide, unspecified: 1.2768e-6 kg; lognormal variance with pedigree 0.0406, pedigree (2,1,5,1,1)
  (same comment as for acetamide-anillide-compound, unspecified)
  properties: carbon content, fossil 0.486978, dry mass 1 kg, wet mass 1 kg
  note on carbon content, fossil: Mean of C content in all pesticides whose formula has been documented in Sutter 2010
- phenoxy-compound: 4.60352e-5 kg; lognormal variance with pedigree 0.0406, pedigree (2,1,5,1,1)
  (same comment as for acetamide-anillide-compound, unspecified)
  properties: carbon content, fossil 0.532559, dry mass 1 kg, wet mass 1 kg
  note on carbon content, fossil: An unweighted average of the C content in mCPA, mCPB, mecoprop, fluazifop-P-butyl, and 2,4-D. Those substances are classified as phenoxy-compounds in Tab 2.25, Sutter 2010
- potassium chloride: 0.0374767 kg; lognormal variance with pedigree 0.0407, pedigree (2,2,5,1,1)
  The exchange has been updated from 'potassium chloride, as K2O' into 'potassium chloride' and therefore its amount has been scaled (multiplied) from 0.0237 kg by 1.5829 kg of 'potassium chloride' per kg of 'potassium chloride, as K2O'. Original comment of the exchange is: See chapter 'Yields and Inputs of Arable Crop Production' in "01_crop production - yields & inputs US_v1.0.pdf" - pdf-document on the dedicated talk page of ecoinvent (www.ecoinvent.org/documentation)
  EcoSpold01Location=RER
  properties: dry mass 1 kg, wet mass 1 kg
- pyrethroid-compound: 1.1878e-7 kg; lognormal variance with pedigree 0.0406, pedigree (2,1,5,1,1)
  (same comment as for acetamide-anillide-compound, unspecified)
  properties: carbon content, fossil 0.623, dry mass 1 kg, wet mass 1 kg
  note on carbon content, fossil: C content of pyrethroid-compounds was calculated as an unweigthed average of C content of the substances: cypermethrin, alpha-cypermethrin,beta-cyfluthrin, lambdacyhalothrin. Those substances are classified as pyrethroid-compounds in Tab 2.25, Sutter 2010
- sowing: 0.00044377 ha; lognormal variance with pedigree 0.0407, pedigree (2,1,5,3,1)
  (same comment as for [sulfonyl]urea-compound)
- tillage, harrowing, by spring tine harrow: 0.00088754 ha; lognormal variance with pedigree 0.0407, pedigree (2,1,5,3,1)
  (same comment as for [sulfonyl]urea-compound)
- tillage, ploughing: 4.4377e-5 ha; lognormal variance with pedigree 0.0407, pedigree (2,1,5,3,1)
  (same comment as for [sulfonyl]urea-compound)
- tillage, rolling: 0.00044377 ha; lognormal variance with pedigree 0.0407, pedigree (2,1,5,3,1)
  (same comment as for [sulfonyl]urea-compound)
- triazine-compound: 4.8698e-6 kg; lognormal variance with pedigree 0.0406, pedigree (2,1,5,1,1)
  (same comment as for acetamide-anillide-compound, unspecified)
  properties: carbon content, fossil 0.475616, dry mass 1 kg, wet mass 1 kg
  note on carbon content, fossil: An unweighted average of the C content in Atrazine, Cyanazine, metamitron, simazine, and terbuthylazine. Those substances are classified as triazine-compounds in Tab 2.25, Sutter 2010
- urea: 0.0119898 kg; lognormal variance with pedigree 0.0407, pedigree (2,2,5,1,1)
  EcoSpold01Location=RER
  The exchange has been updated from 'urea, as N' into 'urea' and therefore its amount has been scaled (multiplied) from 0.0056 kg by 2.1438 kg of 'urea' per kg of 'urea, as N'. Original comment of the exchange is: See chapter 'Yields and Inputs of Arable Crop Production' in "01_crop production - yields & inputs US_v1.0.pdf" - pdf-document on the dedicated talk page of ecoinvent (www.ecoinvent.org/documentation)
  properties: carbon content, fossil 0.2, dry mass 1 kg, wet mass 1 kg
- wheat seed, for sowing: 0.041781 kg; name SEED; lognormal variance with pedigree 0.0407, pedigree (2,2,5,1,1)
  See chapter 'Yields and Inputs of Arable Crop Production' in "01_crop production - yields & inputs US_v1.0.pdf" - pdf-document on the dedicated talk page of ecoinvent (www.ecoinvent.org/documentation)
  property carbon content, non-fossil 0.447696; name SEED_C_content_non_fossil
  property dry mass 0.85 kg; name SEED_DM
  property energy content 15.3935 MJ; name SEED_energy_content
  property water content 0.176471; name wheat_seed_sowing_water_content
  property water in wet mass 0.15 kg; name wheat_seed_sowing_WWM
  property wet mass 1 kg; name wheat_seed_sowing_WM
  note on carbon content, non-fossil: biogene carbon content on a dry matter basis; Composition data obtained from Wheat, soft red winter, in (http://www.nal.usda.gov/fnic/foodcomp/search/). First, composition data were refered to 1 kg dry mass. Then, C-contents were calculated considering a C-content/dry mass of 44% in carbohydrates (including fibres), 53% in proteins and 75% in fats. All data from ecoinvent report, n 15a, pg 40, except C-content in protein, that comes from Determination of protein concentration by total organic carbon analysis, Rouwenhorst et al., 1991, J Biochem and Biophys Methods, 22:119-128.
  note on energy content: See chapter 'Product Properties' in "01_crop production - yields & inputs US_v1.0.pdf" - pdf-document on the dedicated talk page of ecoinvent (www.ecoinvent.org/documentation)

## Inputs from nature
- Carbon dioxide, in air [natural resource, in air]: 1.38971 kg; = 44/12 * (REF_PRODUCT_C_content_non_fossil * REF_PRODUCT * REF_PRODUCT_DM - SEED_C_content_non_fossil * SEED * SEED_DM); lognormal variance with pedigree 0.0406, pedigree (2,1,5,1,1)
  Modelled,see chapter 'CO2 binding' in "01_crop production_direct field emissions and natural resources_v1.0.pdf" - pdf-document on the dedicated talk page of ecoinvent (www.ecoinvent.org/documentation)
- Energy, gross calorific value, in biomass [natural resource, biotic]: 14.75 MJ; lognormal variance with pedigree 0.0411891, pedigree (2,1,5,1,1)
- Occupation, annual crop [natural resource, land]: 4.4377 m2*year; lognormal variance with pedigree 0.1606, pedigree (2,1,5,1,1)
  Modelled, see chapter 'Land use' in "01_crop production_direct field emissions and natural resources_v1.0.pdf" - pdf-document on the dedicated talk page of ecoinvent (www.ecoinvent.org/documentation)
- Transformation, from annual crop [natural resource, land]: 4.4377 m2; lognormal variance with pedigree 0.1606, pedigree (2,1,5,1,1)
  (same comment as for Occupation, annual crop)
- Transformation, to annual crop [natural resource, land]: 4.4377 m2; lognormal variance with pedigree 0.1606, pedigree (2,1,5,1,1)
  (same comment as for Occupation, annual crop)

## Emissions to nature
- Ammonia [air, non-urban air or from high stacks]: 0.00204508 kg; lognormal variance with pedigree 0.0507, pedigree (2,2,5,1,1)
  Modelled with the 'AGRAMMON model' described in "01_crop production_direct field emissions and natural resources_v1.0.pdf" - pdf-document on the dedicated talk page of ecoinvent (www.ecoinvent.org/documentation)
- Carbon dioxide, fossil [air, non-urban air or from high stacks]: 0.0087807 kg; lognormal variance with pedigree 0.0407, pedigree (2,2,5,1,1)
  Modelled, see chapter 'Release of fossil CO2 after urea applications' in "01_crop production_assessment methods of direct field emissions_v1.0.pdf" - pdf-document on the dedicated talk page of ecoinvent (www.ecoinvent.org/documentation)
- Dinitrogen monoxide [air, non-urban air or from high stacks]: 0.000808379 kg; name N2O; lognormal variance with pedigree 0.0707, pedigree (2,2,5,1,1)
  Modelled, see chapter 'Emissions of N2O to the air' in "01_crop production_direct field emissions and natural resources_v1.0.pdf" - pdf-document on the dedicated talk page of ecoinvent (www.ecoinvent.org/documentation)
- Nitrogen oxides [air, non-urban air or from high stacks]: 0.00016976 kg; = 0.21 * N2O; lognormal variance with pedigree 0.0707, pedigree (2,2,5,1,1)
  Modelled, see chapter 'Emissions of NOx to the air' in "01_crop production_direct field emissions and natural resources_v1.0.pdf" - pdf-document on the dedicated talk page of ecoinvent (www.ecoinvent.org/documentation)
- Water [air, unspecified]: 0.379095 m3; name water_to_air_unspecified; = (water_irrigation_input*fraction_IW_to_air); lognormal variance with pedigree 0.0807, pedigree (2,2,5,1,1)
  Calculated value based on literature values and expert opinion. See comments in the parametres' comment field.
  property fraction, origin: fresh water 1; name fraction_origin_fresh_water
  property fraction, origin: salt water 0; name fraction_origin_salt_water
  property fraction, origin: unspecified 0; name fraction_origin_unspecified
- 2,4-D [soil, agricultural]: 3.9117e-5 kg; lognormal variance with pedigree 0.0506, pedigree (2,1,5,1,1)
  Modelled, see chapter 'Emissions of pesticides to agricultural soil' in "01_crop production_direct field emissions and natural resources_v1.0.pdf" - pdf-document on the dedicated talk page of ecoinvent (www.ecoinvent.org/documentation)
- Atrazine [soil, agricultural]: 2.8902e-6 kg; lognormal variance with pedigree 0.0506, pedigree (2,1,5,1,1)
  (same comment as for 2,4-D)
- Azoxystrobin [soil, agricultural]: 6.9286e-8 kg; lognormal variance with pedigree 0.0506, pedigree (2,1,5,1,1)
  (same comment as for 2,4-D)
- Bromoxynil [soil, agricultural]: 3.1674e-6 kg; lognormal variance with pedigree 0.0506, pedigree (2,1,5,1,1)
  (same comment as for 2,4-D)
- Cadmium II [soil, agricultural]: 1.23048e-6 kg; lognormal variance with pedigree 0.0827, pedigree (2,2,5,5,1)
  Modelled, see chapter 'Emissions of heavy metals to agricultural soil, surface water and ground water' in "01_crop production_direct field emissions and natural resources_v1.0.pdf" - pdf-document on the dedicated talk page of ecoinvent (www.ecoinvent.org/documentation)
- Carfentrazone-ethyl [soil, agricultural]: 2.9694e-8 kg; lognormal variance with pedigree 0.0506, pedigree (2,1,5,1,1)
  (same comment as for 2,4-D)
- Chlorpyrifos [soil, agricultural]: 4.2759e-6 kg; lognormal variance with pedigree 0.0506, pedigree (2,1,5,1,1)
  (same comment as for 2,4-D)
- Chlorsulfuron [soil, agricultural]: 3.1674e-7 kg; lognormal variance with pedigree 0.0506, pedigree (2,1,5,1,1)
  (same comment as for 2,4-D)
- Chromium III [soil, agricultural]: 5.58648e-6 kg; lognormal variance with pedigree 0.0827, pedigree (2,2,5,5,1)
  (same comment as for Cadmium II)
- Clodinafop-propargyl [soil, agricultural]: 1.5837e-7 kg; lognormal variance with pedigree 0.0506, pedigree (2,1,5,1,1)
  (same comment as for 2,4-D)
- Clopyralid [soil, agricultural]: 3.5633e-7 kg; lognormal variance with pedigree 0.0506, pedigree (2,1,5,1,1)
  (same comment as for 2,4-D)
- Copper ion [soil, agricultural]: -6.55577e-7 kg
  (same comment as for Cadmium II)
- Cypermethrin [soil, agricultural]: 1.1878e-7 kg; lognormal variance with pedigree 0.0506, pedigree (2,1,5,1,1)
  (same comment as for 2,4-D)
- Dicamba [soil, agricultural]: 2.8506e-6 kg; lognormal variance with pedigree 0.0506, pedigree (2,1,5,1,1)
  (same comment as for 2,4-D)
- Diclofop-methyl [soil, agricultural]: 6.6317e-7 kg; lognormal variance with pedigree 0.0506, pedigree (2,1,5,1,1)
  (same comment as for 2,4-D)
- Dimethoate [soil, agricultural]: 3.0684e-7 kg; lognormal variance with pedigree 0.0506, pedigree (2,1,5,1,1)
  (same comment as for 2,4-D)
- Diuron [soil, agricultural]: 1.0888e-6 kg; lognormal variance with pedigree 0.0506, pedigree (2,1,5,1,1)
  (same comment as for 2,4-D)
- Fenoxaprop [soil, agricultural]: 7.9184e-8 kg; lognormal variance with pedigree 0.0506, pedigree (2,1,5,1,1)
  (same comment as for 2,4-D)
- Flucarbazone sodium salt [soil, agricultural]: 1.9796e-8 kg; lognormal variance with pedigree 0.0506, pedigree (2,1,5,1,1)
  (same comment as for 2,4-D)
- Fluroxypyr [soil, agricultural]: 4.5531e-7 kg; lognormal variance with pedigree 0.0506, pedigree (2,1,5,1,1)
  (same comment as for 2,4-D)
- Glyphosate [soil, agricultural]: 4.0146e-5 kg; lognormal variance with pedigree 0.0506, pedigree (2,1,5,1,1)
  (same comment as for 2,4-D)
- Imazamox [soil, agricultural]: 1.1878e-7 kg; lognormal variance with pedigree 0.0506, pedigree (2,1,5,1,1)
  (same comment as for 2,4-D)
- Ioxynil [soil, agricultural]: 3.3653e-7 kg; lognormal variance with pedigree 0.0506, pedigree (2,1,5,1,1)
  (same comment as for 2,4-D)
- Lambda-cyhalothrin [soil, agricultural]: 7.9184e-8 kg; lognormal variance with pedigree 0.0506, pedigree (2,1,5,1,1)
  (same comment as for 2,4-D)
- Lead II [soil, agricultural]: 1.31152e-6 kg; lognormal variance with pedigree 0.0827, pedigree (2,2,5,5,1)
  (same comment as for Cadmium II)
- MCPA [soil, agricultural]: 6.3842e-6 kg; lognormal variance with pedigree 0.0506, pedigree (2,1,5,1,1)
  (same comment as for 2,4-D)
- Mercury II [soil, agricultural]: 8.48443e-11 kg; lognormal variance with pedigree 0.0827, pedigree (2,2,5,5,1)
  (same comment as for Cadmium II)
- Mesosulfuron-methyl (prop) [soil, agricultural]: 9.898e-9 kg; lognormal variance with pedigree 0.0506, pedigree (2,1,5,1,1)
  (same comment as for 2,4-D)
- Metribuzin [soil, agricultural]: 1.8212e-6 kg; lognormal variance with pedigree 0.0506, pedigree (2,1,5,1,1)
  (same comment as for 2,4-D)
- Metsulfuron-methyl [soil, agricultural]: 1.1878e-7 kg; lognormal variance with pedigree 0.0506, pedigree (2,1,5,1,1)
  (same comment as for 2,4-D)
- Nickel II [soil, agricultural]: 2.0459e-6 kg; lognormal variance with pedigree 0.0827, pedigree (2,2,5,5,1)
  (same comment as for Cadmium II)
- Parathion [soil, agricultural]: 2.4943e-6 kg; lognormal variance with pedigree 0.0506, pedigree (2,1,5,1,1)
  (same comment as for 2,4-D)
- Picloram [soil, agricultural]: 3.9592e-8 kg; lognormal variance with pedigree 0.0506, pedigree (2,1,5,1,1)
  (same comment as for 2,4-D)
- Propiconazole [soil, agricultural]: 3.9592e-6 kg; lognormal variance with pedigree 0.0506, pedigree (2,1,5,1,1)
  (same comment as for 2,4-D)
- Prosulfuron [soil, agricultural]: 1.9796e-8 kg; lognormal variance with pedigree 0.0506, pedigree (2,1,5,1,1)
  (same comment as for 2,4-D)
- Pyraclostrobin [soil, agricultural]: 3.9592e-7 kg; lognormal variance with pedigree 0.0506, pedigree (2,1,5,1,1)
  (same comment as for 2,4-D)
- Sulfosulfuron [soil, agricultural]: 4.751e-7 kg; lognormal variance with pedigree 0.0506, pedigree (2,1,5,1,1)
  (same comment as for 2,4-D)
- Tebuconazole [soil, agricultural]: 1.5837e-7 kg; lognormal variance with pedigree 0.0506, pedigree (2,1,5,1,1)
  (same comment as for 2,4-D)
- Thifensulfuron-methyl [soil, agricultural]: 3.207e-7 kg; lognormal variance with pedigree 0.0506, pedigree (2,1,5,1,1)
  (same comment as for 2,4-D)
- Tralkoxydim [soil, agricultural]: 1.3857e-7 kg; lognormal variance with pedigree 0.0506, pedigree (2,1,5,1,1)
  (same comment as for 2,4-D)
- Triallate [soil, agricultural]: 1.069e-6 kg; lognormal variance with pedigree 0.0506, pedigree (2,1,5,1,1)
  (same comment as for 2,4-D)
- Triasulfuron [soil, agricultural]: 3.1674e-7 kg; lognormal variance with pedigree 0.0506, pedigree (2,1,5,1,1)
  (same comment as for 2,4-D)
- Tribenuron-methyl [soil, agricultural]: 1.5837e-7 kg; lognormal variance with pedigree 0.0506, pedigree (2,1,5,1,1)
  (same comment as for 2,4-D)
- Trifloxystrobin [soil, agricultural]: 7.9184e-8 kg; lognormal variance with pedigree 0.0506, pedigree (2,1,5,1,1)
  (same comment as for 2,4-D)
- Zinc II [soil, agricultural]: 1.02166e-5 kg; lognormal variance with pedigree 0.0827, pedigree (2,2,5,5,1)
  (same comment as for Cadmium II)
- Cadmium II [water, ground-]: 1.79834e-8 kg; lognormal variance with pedigree 0.1327, pedigree (2,2,5,5,1)
  (same comment as for Cadmium II)
- Cadmium II [water, surface water]: 9.52189e-9 kg; lognormal variance with pedigree 0.1327, pedigree (2,2,5,5,1)
  (same comment as for Cadmium II)
- Chromium III [water, ground-]: 8.50826e-6 kg; lognormal variance with pedigree 0.1327, pedigree (2,2,5,5,1)
  (same comment as for Cadmium II)
- Chromium III [water, surface water]: 1.06692e-6 kg; lognormal variance with pedigree 0.1327, pedigree (2,2,5,5,1)
  (same comment as for Cadmium II)
- Copper ion [water, ground-]: 1.22763e-6 kg; lognormal variance with pedigree 0.1327, pedigree (2,2,5,5,1)
  (same comment as for Cadmium II)
- Copper ion [water, surface water]: 7.56084e-7 kg; lognormal variance with pedigree 0.1327, pedigree (2,2,5,5,1)
  (same comment as for Cadmium II)
- Lead II [water, ground-]: 4.14139e-8 kg; lognormal variance with pedigree 0.1327, pedigree (2,2,5,5,1)
  (same comment as for Cadmium II)
- Lead II [water, surface water]: 1.4847e-7 kg; lognormal variance with pedigree 0.1327, pedigree (2,2,5,5,1)
  (same comment as for Cadmium II)
- Mercury II [water, ground-]: 8.08265e-11 kg; lognormal variance with pedigree 0.1327, pedigree (2,2,5,5,1)
  (same comment as for Cadmium II)
- Mercury II [water, surface water]: 5.75981e-11 kg; lognormal variance with pedigree 0.1327, pedigree (2,2,5,5,1)
  (same comment as for Cadmium II)
- Nickel II [water, surface water]: 5.96142e-7 kg; lognormal variance with pedigree 0.1327, pedigree (2,2,5,5,1)
  (same comment as for Cadmium II)
- Nitrate [water, ground-]: 0.0555446 kg; lognormal variance with pedigree 0.0807, pedigree (2,2,5,1,1)
  Modelled with the 'SQCB-NO3 model' described in "01_crop production_direct field emissions and natural resources_v1.0.pdf" - pdf-document on the dedicated talk page of ecoinvent (www.ecoinvent.org/documentation)
- Phosphate [water, ground-]: 3.1064e-5 kg; lognormal variance with pedigree 0.0827, pedigree (2,2,5,5,1)
  Modelled, see chapter 'Emissions of phosphorous to the water' in "01_crop production_direct field emissions and natural resources_v1.0.pdf" - pdf-document on the dedicated talk page of ecoinvent (www.ecoinvent.org/documentation)
- Phosphate [water, surface water]: 0.00086758 kg; lognormal variance with pedigree 0.0827, pedigree (2,2,5,5,1)
  (same comment as for Phosphate)
- Phosphorus [water, surface water]: 0.00064205 kg; lognormal variance with pedigree 0.0807, pedigree (2,2,5,1,1)
  (same comment as for Phosphate)
- Water [water, ground-]: 0.133155 m3; name water_to_water_ground; = water_irrigation_input*(1-fraction_IW_to_air)*fraction_IW_to_ground_water; lognormal variance with pedigree 0.1286, pedigree (4,3,5,1,4)
  Calculated value. See the parameters and their comments to understand the calculation.
  property carbon content, fossil 0; name C_content_fossil
  property carbon content, non-fossil 0; name C_content_non_fossil
  property dry mass 0 kg; name DM
  property fraction, origin: fresh water 1; name fraction_origin_fresh_water_Wgw
  property fraction, origin: salt water 0; name fraction_origin_salt_water_Wgw
  property fraction, origin: unspecified 0; name fraction_origin_unspecified_Wgw
  property water in wet mass 1000 kg; name WWM
  property wet mass 1000 kg; name WM
- Water [water, surface water]: 0.0332888 m3; name water_to_water_surface; = water_irrigation_input*(1-fraction_IW_to_air)*fraction_IW_to_surface_water; lognormal variance with pedigree 0.1286, pedigree (4,3,5,1,4)
  Calculated value. See the parameters and their comments to understand the calculation.
  property fraction, origin: fresh water 1; name fraction_origin_fresh_water_Wsw
  property fraction, origin: salt water 0; name fraction_origin_salt_water_Wsw
- Zinc II [water, ground-]: 5.36549e-6 kg; lognormal variance with pedigree 0.1327, pedigree (2,2,5,5,1)
  (same comment as for Cadmium II)
- Zinc II [water, surface water]: 8.89584e-7 kg; lognormal variance with pedigree 0.1327, pedigree (2,2,5,5,1)
  (same comment as for Cadmium II)

## Sampling procedure
Data come from the NREL database and from varoius U.S database. Data were compiled from statistics, literature, farm survey reports, documents from extension services, and expert knowledge.

## Review by Roberto Dones 2009-01-22
automatic validation in Excel
none
