# BTX production, from pyrolysis gas, average

Dataset: EcoSpold 2, unit process
Geography: RoW
Time period: 2019-01-01 to 2023-12-31
Technology level: current
Classification: ISIC rev.4 ecoinvent: 2011:Manufacture of basic chemicals
Scenario: Business-as-Usual
System model: Allocation, cut-off by classification
Generated by: Thomas Fröhlich
Published in: IFEU/PlasticsEurope 2021
Database: ecoinvent
isCopyrightProtected: true
accessRestrictedTo: 1

## General comment
This process represents the separation of pyrolysis gas from steam cracking into benzene, toluene, xylenes and further products.
Raw pyrolysis gasoline has to be hydrotreated first, then the aromatics are separated from the non-aromatics (raffinate) by solvent extraction (liquid-liquid extraction). The aromatics are extracted from the solvent by distillation and stripping. In two further distillation steps, benzene and toluene are recovered as pure products. In a transalkylation/disproportionation unit, overhead toluene can be converted into additional xylenes. The xylenes and higher aromatics obtained at the bottom of the toluene column together with the xylenes produced in the transalkylation/disproportionation unit are charged to a xylene column. This fractionation unit is designed to either completely separate the xylenes from higher aromatics or to recover also a part of o-xylene in the bottoms. In the latter case, o-xylene can be obtained as product after another distillation step. Higher aromatics (C9+) are either used in toluene transalkylation or sold as valuable by-products.
This dataset was extrapolated from the European dataset (IFEU/PlasticsEurope, 2021). Therefore the European feedstock mix was applied in the upstream steam cracking activity.
In the present dataset, there are five reference products (benzene, toluene, liquid, o-xylene, p-xylene and xylenes, mixed). For more information on how multi-functionality is solved, consult the Sampling Procedure.
References:
IFEU/PlasticsEurope (2021): Eco-profile of Benzene, Toluene, and Xylenes
(Aromatics, BTX)
Folkins H.O. (2021): Benzene, Ullmann's Encyclopedia of Industrial Chemistry, Wiley VCH.

## Included activities start
The activity starts with the raw materials entering the BTX extraction and separation plant.

## Included activities end
The activity ends with the final products being ready for further processing or transportation at the production site gate. The dataset includes the input materials, energy uses, infrastructure and emissions.

## Geography
This dataset was extrapolated from the European dataset (IFEU/PlasticsEurope, 2021). Therefore the European feedstock mix was applied in the upstream steam cracking activity. Representativeness estimated for min. 80 % of European (EU + GB, NO, CH) production.

## Technology
This dataset was extrapolated from the European dataset (IFEU/PlasticsEurope, 2021). Therefore the European feedstock mix was applied in the upstream steam cracking activity. The used feedstock is as follows(share by mass): butane (16.2%), ethane (4.5%), naphtha (64%), natural gas liquids (2.2%), propane (7.6%), refinery gas (1.5%) and atmospheric gas oil (4%, proxied by diesel).
Raw pyrolysis gasoline has to be hydrotreated to saturate mono- and diolefins (to prevent polymerisation) and to remove sulphur compounds. This is usually done in two stages. In the first stage a mild selective hydrotreating converts acetylenes, dienes, and styrene to olefinic compounds. In the second stage, olefins are saturated and residual sulphur is removed at higher temperatures (around 300 °C). For hydrotreatment, hydrogen from the steam cracker is usually used.
From the hydrotreated pyrolysis gas, the aromatics are separated from the non-aromatics (raffinate) by solvent extraction (liquid-liquid extraction). Usually highly polar substances are used as solvents in an extraction column. The paraffinic raffinate from the top of the column is usually sold as a fuell. Aromatics are extracted from the solvent by distillation and stripping. In two further distillation steps, benzene and toluene are recovered as pure products. Both low temperature (20-40 °C) and high temperature (100-200 °C) processes at atmospheric pressure are common.
In a transalkylation/disproportionation unit, overhead toluene can be converted into additional xylenes. For transalkylation, higher aromatics (e.g. trimethylbenzenes) are co-fed with toluene to produce only xylenes. During disproportionation, two toluene molecules react to form one molecule of benzene and xylenes, respectively. Typical processes are carried out at temperatures of 260-530 °C and pressures of 2-46 bar on either zeolitic or alumina/silica catalysts.Toluene can also be fed to a hydrodealkylation (HDA) unit to produce additional benzene and methane. This is done either thermally at 550-800 °C and 30-100 bar or catalytically at 500-650 °C and 30-50 bar on alumina supported catalysts. Usually, hydrogen from steam cracking is used for HDA.
The xylenes and higher aromatics obtained at the bottom of the toluene column together with the xylenes produced in the transalkylation/disproportionation unit are charged to a xylene column. This fractionation unit is designed to either completely separate the xylenes from higher aromatics or to recover also a part of o-xylene in the bottoms. In the latter case, o-xylene can be obtained as product after another distillation step. Higher aromatics (C9+) are either used in toluene transalkylation or blended into the gasoline pool.
The xylenes from the top of the xylene column are fed to the so-called xylene loop, consisting of a p-xylene extraction unit and a xylene isomerisation unit. In the first unit high purity p-xylene is extracted from the equilibrium xylene mixture either by crystallization (-60 to -70 °C, atmospheric pressure) or by adsorptive separation (120-175 °C). The remaining xylene mixture (containing also ethylbenzene and styrene) is fed to an isomerisation unit where a near-equilibrium distribution of xylene isomers is re-established, meaning that new p-xylene is formed from the remaining o- and m-xylenes. The acidic metal-containing zeolite catalyst used here also isomerizes ethylbenzene selectively to xylene isomers in their equilibrium ratio. Hydrogen is added to the isomerisation unit to prevent hydrogenolysis of the aromatics on the metal sites. After separation from light by-products (light ends (methane and hydrogen), benzene, toluene) through fractionation and from unsaturated components by clay treating the mixed xylenes (and by-product C9+-aromatics) are recycled to the xylene column. The usual operating conditions are situated in the range of temperatures between 400-500 °C, pressures of 10-20 bar, and molar ratios H2/feed of 15-20.
It is assumed that roughly 7% of the cooling water is evaporated, the remaining 93% are emitted as water to water. In addition, it is assumed that waste heat is dissipated.
The catalyst is neglected in this assessment.
References:
IFEU/PlasticsEurope (2021): Eco-profile of Benzene, Toluene, and Xylenes
Folkins H.O. (2021): Benzene, Ullmann's Encyclopedia of Industrial Chemistry, Wiley VCH.

## Time period
Study executed in 2019. The technology is not expected to change within 5 years.

## Reference product
- toluene, liquid: 1 kg; name toluene; By-product classification allocatable product; CPC 34110: Hydrocarbons and their halogenated, sulphonated, nitrated or nitrosated derivatives; HS2017 290230: Cyclic hydrocarbons; toluene; CAS 108-88-3
  production volume 4.14539e9 kg; name PV_toluene; = toluene/benzene*PV_benzene
    Calculated from production volume of benzene using the relative outputs.
    According to IFEU/PlasticsEurope (2021), the market consists of 30% toluene from pyrolysis gas and 70% from reformate.
    References:
    IFEU/PlasticsEurope (2021): Eco-profile of Benzene, Toluene, and Xylenes (Aromatics, BTX)
  property heating value, net 38.17 MJ
    LHV is calculated based on the elemental composition of the substance. Based on the CAS number of the substance (000108-88-3), the chemical formula of the substance is found to be: C7H8, (PubChem 2020).
    Reference: Kim, S., Chen, J., Cheng, T., Gindulyte, A., He, J., He, S., Li, Q., Shoemaker, B. A., Thiessen, P. A., Yu, B., Zaslavsky, L., Zhang, J., & Bolton, E. E. (2019). PubChem 2019 update: improved access to chemical data. Nucleic acids research, 47(D1), D1102–D1109. https://doi.org/10.1093/nar/gky1033
  property price 0.512347 EUR2005
    Calculated value based on data from United Nations Commodity Trade Statistics Database (comtrade.un.org). UN comtrade category: 290230. Toluene. Average price from the year 2015-2019. Average of price of import into 5 main markets (EU, US, KR, IN and CN).
    The prices were converted to EUR based on the annual exchange rates published by the European Central Bank (https://sdw.ecb.europa.eu/quickview.do?SERIES_KEY=120.EXR.A.USD.EUR.SP00.A, last accessed on 2022-02-15) and adjusted for inflation relative to 2005 using the producer price index (PPI) of the euro area, published by eurostat (https://ec.europa.eu/eurostat/databrowser/view/STS_INPP_A__custom_6416181/default/table?lang=en, last accessed on 2022-05-04).
  properties: carbon allocation 0.913043 kg, carbon content 0.913043, carbon content, fossil 0.913043, carbon content, non-fossil 0, dry mass 1 kg, water content 0, water in wet mass 0 kg, wet mass 1 kg

## Inputs from technosphere
All rows: lognormal variance with pedigree 0.0512, pedigree (2,5,1,5,4)
- chemical factory, organics: 3.19137e-10 unit; = 4E-10*(benzene+toluene+xylene+o_xylene+p_xylene)
  Calculated based on literature data published by the industry. For this activity, no information was readily available concerning infrastructure and land-use. Therefore, the infrastructure is estimated based on data from two chemical factories, the BASF site of Ludwigshafen and the chemical factory in Gendorf (which are both located in Germany), which produce a wide range of chemical substances. Based on this data, the following assumptions are made: the built area amounts to about 4.2 ha, the plant has an average output of 50'000 t/a and a lifespan of fifty years. The estimated infrastructure amount is therefore 4.00 E-10 units per kg of produced chemical.
  This amount was multiplied with the amount of chemical products produced.
  References:
  Althaus H.-J., Chudacoff M., Hischier R., Jungbluth N., Osses M. and Primas A. (2007) Life Cycle Inventories of Chemicals. ecoinvent report No. 8, v2.0. EMPA Dübendorf, Swiss Centre for Life Cycle Inventories, Dübendorf, CH.
  Gendorf (2000) Umwelterklärung 2000, Werk Gendorf. Werk Gendorf, Burgkirchen.
- electricity, medium voltage: 0.00158901, 0.0316973, 0.0106502, 0.00048661, 9.73946e-5, 2.09128e-5, 0.00327323 kWh (7 suppliers, which the file names only by identifier); sum of these 0.0478146 kWh
  European average value, based on literature data, representative for min. 80 % of European (EU + GB, NO, CH) production
  IFEU/PlasticsEurope (2021): Eco-profile of Benzene, Toluene, and Xylenes
  (Aromatics, BTX)
- hazardous waste, for underground deposit: -3.85456e-5 kg; name haz_waste
  European average value, based on literature data, representative for min. 80 % of European (EU + GB, NO, CH) production.
  This waste describes the waste from the applied alumina (Al2O3) based catalyst.
  IFEU/PlasticsEurope (2021): Eco-profile of Benzene, Toluene, and Xylenes (Aromatics, BTX)
  production volume; name PV_haz_waste; = haz_waste/benzene*PV_benzene
    Calculated from production volume of reference product using the relative outputs.
  properties: carbon content, fossil 0.554667, dry mass 1 kg, wet mass 1 kg
  note on carbon content, fossil: Tab A.6, ecoinvent v2.2 report 13_I, average hazardous waste composition was used, and referred to 0% water mass. No waste-specific emission are currently inventoried for underground deposits. Accordingly, no waste composition must be specified. For generic, average waste to underground deposit deposition in a 200 liter steel drum without cement solidification is assumed (ecoinvent v2.2 report 13_I).
- heat, from steam, in chemical industry: 1.40873 MJ
  (same comment as for electricity, medium voltage)
  properties: heating value, net 1 MJ
- hydrogen, gaseous, low pressure: 0.0393123 kg
  European average value, based on literature data, representative for min. 80 % of European (EU + GB, NO, CH) production.
  It is assumed, that hydrogen is provided directly by the nearby steam cracker, therefore an activity link was introduced.
  IFEU/PlasticsEurope (2021): Eco-profile of Benzene, Toluene, and Xylenes (Aromatics, BTX)
  properties: dry mass 1 kg, heating value, net 120.21 MJ, wet mass 1 kg
- pyrolysis gas, containing benzene, toluene and xylene: 1.07261 kg
  (same comment as for electricity, medium voltage)
  properties: carbon content, fossil 0.8878, dry mass 1 kg, heating value, net 42.4 MJ, wet mass 1 kg
  note on heating value, net: Based on IFEU/PlasticsEurope (2021): Eco-profile of Steam Cracker Products: Ethylene, Propylene, Butadiene, Pyrolysis Gasoline, Ethylene Oxide (EO), Ethylene Glycols (MEG, DEG, TEG).
- wastewater, average: -2.27679e-5, -8.10624e-8 m3 (2 suppliers, which the file names only by identifier); sum of these -2.2849e-5 m3
  (same comment as for electricity, medium voltage)
  production volume; name PV_wastewater; = wastewater/benzene*PV_benzene
    Calculated from production volume of reference product using the relative outputs.
  properties: carbon content, non-fossil 0.194039, dry mass 0.346837 kg, mass concentration, TOC 0.1091 kg/m3, mass concentration, calcium 0.039453 kg/m3, mass concentration, chlorine 0.030031 kg/m3, mass concentration, hydrogen 0.013365 kg/m3, mass concentration, nitrogen 0.031015 kg/m3, mass concentration, oxygen 0.069824 kg/m3, mass concentration, sodium 0.06456 kg/m3, mass concentration, sulfur 0.015602 kg/m3, water content 2882.2, wet mass 1000 kg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
  note on carbon content, non-fossil: 0.0673 kg TOC/m3 (Tab A.17, ecoinvent v2.2 report 13_I). TOC was considered as Total Carbon.
- water, deionised: 0.0228484 kg
  (same comment as for electricity, medium voltage)
  properties: wet mass 1 kg

## Inputs from nature
- Water, cooling, unspecified natural origin [natural resource, in water]: 0.0336774 m3; lognormal variance with pedigree 0.0512, pedigree (2,5,1,5,4)
  (same comment as for electricity, medium voltage)
- Water, unspecified natural origin [natural resource, in water]: 0.00101233 m3; lognormal variance with pedigree 0.0512, pedigree (2,5,1,5,4)
  (same comment as for electricity, medium voltage)

## Emissions to nature
- Benzene [air, unspecified]: 1.00217e-5 kg; lognormal variance with pedigree 0.0906, pedigree (2,5,1,5,4)
  (same comment as for electricity, medium voltage)
- Benzo(a)pyrene [air, unspecified]: 3.81604e-12 kg; lognormal variance with pedigree 0.0906, pedigree (2,5,1,5,4)
  (same comment as for electricity, medium voltage)
- Carbon dioxide, fossil [air, unspecified]: 0.216609 kg; lognormal variance with pedigree 0.0512, pedigree (2,5,1,5,4)
  (same comment as for electricity, medium voltage)
- Carbon monoxide, fossil [air, unspecified]: 6.58812e-5 kg; lognormal variance with pedigree 0.7006, pedigree (2,5,1,5,4)
  (same comment as for electricity, medium voltage)
- Dinitrogen monoxide [air, unspecified]: 5.71224e-6 kg; lognormal variance with pedigree 0.0906, pedigree (2,5,1,5,4)
  (same comment as for electricity, medium voltage)
- Dioxins, measured as 2,3,7,8-tetrachlorodibenzo-p-dioxin [air, unspecified]: 1.1049e-16 kg; lognormal variance with pedigree 0.0906, pedigree (2,5,1,5,4)
  (same comment as for electricity, medium voltage)
- Formaldehyde [air, unspecified]: 4.95061e-7 kg; lognormal variance with pedigree 0.0906, pedigree (2,5,1,5,4)
  (same comment as for electricity, medium voltage)
- Mercury II [air, unspecified]: 5.3997e-9 kg; lognormal variance with pedigree 0.7006, pedigree (2,5,1,5,4)
  (same comment as for electricity, medium voltage)
- Methane, fossil [air, unspecified]: 4.95061e-6 kg; lognormal variance with pedigree 0.0906, pedigree (2,5,1,5,4)
  (same comment as for electricity, medium voltage)
- NMVOC, non-methane volatile organic compounds [air, unspecified]: 1.35574e-5 kg; lognormal variance with pedigree 0.0906, pedigree (2,5,1,5,4)
  (same comment as for electricity, medium voltage)
- Nitrogen oxides [air, unspecified]: 0.000224681 kg; lognormal variance with pedigree 0.0906, pedigree (2,5,1,5,4)
  (same comment as for electricity, medium voltage)
- PAH, polycyclic aromatic hydrocarbons [air, unspecified]: 3.80816e-8 kg; lognormal variance with pedigree 0.3506, pedigree (2,5,1,5,4)
  (same comment as for electricity, medium voltage)
- Particulate Matter, > 2.5 um and < 10um [air, unspecified]: 3.80816e-7 kg; lognormal variance with pedigree 0.1706, pedigree (2,5,1,5,4)
  (same comment as for electricity, medium voltage)
- Sulfur dioxide [air, unspecified]: 0.000468487 kg; lognormal variance with pedigree 0.0512, pedigree (2,5,1,5,4)
  (same comment as for electricity, medium voltage)
- Toluene [air, unspecified]: 4.06893e-6 kg; lognormal variance with pedigree 0.0906, pedigree (2,5,1,5,4)
  (same comment as for electricity, medium voltage)
- Water [air, unspecified]: 0.00225142 m3; lognormal variance with pedigree 0.0906, pedigree (2,5,1,5,4)
  (same comment as for electricity, medium voltage)
- Sulfide [water, unspecified]: 7.70912e-5 kg; lognormal variance with pedigree 0.0906, pedigree (2,5,1,5,4)
  (same comment as for electricity, medium voltage)
- Water [water, unspecified]: 0.0326937 m3; lognormal variance with pedigree 0.0906, pedigree (2,5,1,5,4)
  (same comment as for electricity, medium voltage)

## Sampling procedure
Extrapolation from European dataset. Literature data, representativeness estimated for min. 80 % of European (EU + GB, NO, CH) production.

Multi-functionality is solved in accordance with IFEU/PlasticsEurope (2021) with a flow specific approach. Feedstock is partitioned to all allocatable outputs by mass, whereas all the other inputs and outputs (energy and other input, emissions and solid wastes) are assigned only to the reference products (benzene, toluene, o-xylene, p-xylene and xylenes, mixed) based on process information.

References:

IFEU/PlasticsEurope (2021): Eco-profile of Steam Cracker Products: Ethylene, Propylene, Butadiene, Pyrolysis Gasoline, Ethylene Oxide (EO), Ethylene Glycols (MEG, DEG, TEG).

## Extrapolations
Extrapolation from European dataset. Uncertainty has been adjusted accordingly.
