# lithium carbonate production, from spodumene

Dataset: EcoSpold 2, unit process
Geography: RoW
Time period: 2014-01-31 to 2023-12-31
Technology level: current
Classification: ISIC rev.4 ecoinvent: 2011:Manufacture of basic chemicals
Scenario: Business-as-Usual
System model: Allocation, cut-off by classification
Generated by: Eleonora Crenna
Published in: Songyan Jiang 2020
Database: ecoinvent
isCopyrightProtected: true
accessRestrictedTo: 1

## General comment
This dataset represents the production of 1 kg of refined lithium carbonate (Li2CO3), with 99.9% purity. It is a copy of the Chinese dataset, as China represents the world main producer of lithium carbonate from spodumene. The data come from the publication of Jiang et al. (2020). The authors collected the original data from one of the largest rock-based lithium production company in China in Suzhou city, Jiangsu province. This dataset updates any previous version, including the process with consumption of raw materials, energy, infrastructure, as well as the generation of emissions to air (NOx, PM, SOx and H₂SO₄) and water (BOD5, COD, TOC, DOC, phosphorus and suspended solids). Production during stable operation conditions is represented. The manufacturing plant is located in an urban/industrial area, and consequently the emissions are categorised as emanating in a high population density area. Within the production of lithium carbonate, sodium sulfate is derived as by-product.
Reference:
Jiang, S., Zhang, L., Li, F., Hua, H., Liu, X., Yuan, Z., & Wu, H. (2020). Environmental impacts of lithium production showing the importance of primary data of upstream process in life-cycle assessment. Journal of environmental management, 262, 110253

## Included activities start
The activity starts with the reception of spodumene and includes its processing at the factory gate.

## Included activities end
The activity ends with the production of lithium carbonate, including materials, energy uses, infrastructure and emissions.

## Geography
Dataset valid for the entire world.

## Technology
The production of rock-based lithium carbonate includes calcination, roasting, leaching, purification, carbonation, and drying steps. Air compression and auxiliary systems are included as well. Air compression provides compressed air as energy source along the production steps. Auxiliary systems provide energy for water circulation, removal of dust particles and disposal of waste.
During the initial calcination step, α-spodumene is converted into β-spodumene in a rotary kiln powered by natural gas at 1070–1100 °C. After being cooled down and crushed into smaller powder particles, β-spodumene is mixed with sulfuric acid (98.3%) and roasted at 250°C in another rotary kiln powered by natural gas. Then, lithium sulfate is leached out from the mother liquor with water during a continuous leaching stage at 60°C. Impurities like iron, aluminium, magnesium and calcium are removed by precipitation through reacting with sodium hydroxide (soda lime) and sodium carbonate (soda ash) added to the solution. The leach liquor is further purified by ion-exchange using hydrochloric acid (6%). Other purifying additives, e.g. Kieselguhr or activated charcoal, are used during the purifying filtration step. In the subsequent carbonation stage, sodium carbonate is added to the lithium-rich solution to precipitate lithium carbonate. After being dissolved in water, the solid lithium carbonate reacts with liquid carbon dioxide to generate dissolved lithium hydrogen carbonate (LiHCO3), which is finally treated with steam at 85°C and natural gas to obtain purified and dry lithium carbonate (99.9%) as a main product. The remaining mother liquor consists mainly of sodium sulfate, obtained as by-product of the entire process. Besides sodium sulfate, inert solid wastes are produced. Wastewater is collected and transported in sewers for treatment.

## Time period
Data are considered valid from 2014 (year of the on-field data collection) to 2020 (year of the publication)

## Parameters
- fraction, process water, to air: 0.15 dimensionless; name fraction_PW_to_air
  Literature value. In case when no industry/process specific data are available, default evaporation fraction value is used. This value is 15% and is based on literature (Statistics Canada, 2007 & Shaffer, K.H., 2008, Consumptive water use in the Great Lakes Basin, USGS & Shiklomanov, 2003, World Water Resources at the Beginning of the 21st Century) and has been approved by an expert.

## Reference product
- sodium sulfate, anhydrite: 1 kg; name sodium_sulfate_amount; By-product classification allocatable product; CPC 34240: Phosphates of triammonium; salts and peroxysalts of inorganic acids and metals n.e.c.; HS2017 283311: Sodium sulphates; disodium sulphate; CAS 7757-82-6
  Literature
  production volume 7.40073e7 kg; = ABS(sodium_sulfate_amount/lithium_carbonate_amount) * lithium_carbonate_PV
    The production volume is expressed in kg. Its calculation is based on the fact that for the production of 1 kg of lithium carbonate, 2.32 kg of sodium sulfate is produced as by-product.
  property price 0.191 EUR2005
    Temporary price data. Calculated as 90% of purchasers price based on: 2004 Import/Export data (total trades (USD) divided by total weight (kg) in EU27, USA, China, Japan and India) from UN Commodity Trade Statistics Database (http://data.un.org/Explorer.aspxDatabase [Accessed 2 July 2010]). Commodity: Sodium sulphates other than disodium sulphate
  properties: allocation factor 0.061487, carbon allocation 0 kg, carbon content 0, carbon content, fossil 0, carbon content, non-fossil 0, dry mass 1 kg, true value 0.442229, water content 0, water in wet mass 0 kg, wet mass 1 kg

## Inputs from technosphere
- bentonite: 0.00162521 kg; lognormal variance with pedigree 0.0066, pedigree (1,4,3,5,1)
  Literature. Bentonite is used as proxy for Kieselguhr from the original publication
  properties: dry mass 1 kg, wet mass 1 kg
- carbon dioxide, liquid: 0.000235516, 0.00111882 kg (2 suppliers, which the file names only by identifier); sum of these 0.00135434 kg; lognormal variance with pedigree 0.0066, pedigree (1,4,3,5,1)
  Literature
  properties: carbon content, fossil 0.272727, dry mass 1 kg, heating value, net 8.27 MJ, wet mass 1 kg
- chemical factory, organics: 5.94484e-12 unit; lognormal variance with pedigree 0.306, pedigree (1,4,3,5,1)
  Estimation, based on the production volume of lithium carbonate, sodium sulfate and inert solid waste (see Production Volume Comment) and a plant life time of fifty years.
- electricity, medium voltage: 0.000135021, 1.2009e-5, 0.00104705, 0.00137206, 0.00145302, 0.000740095, 0.000102218, 0.000646966, 2.73101e-5, 0.00437248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 kWh (47 suppliers, which the file names only by identifier); sum of these 0.103742 kWh; lognormal variance with pedigree 0.0066, pedigree (1,4,3,5,1)
  Literature, it includes the electricity consumed by air compression and auxiliary system.
- heat, district or industrial, natural gas: 1.33722 MJ; lognormal variance with pedigree 0.0066, pedigree (1,4,3,5,1)
  Literature, 1.3872 m3 of natural gas are consumed for producing 1 kg lithium carbonate. The exchange value is obtained by multiplying the volume of natural gas by 36.3 MJ/m3.
  properties: heating value, net 1 MJ
- heat, from steam, in chemical industry: 0.173767, 0.0306373 MJ (2 suppliers, which the file names only by identifier); sum of these 0.204404 MJ; lognormal variance with pedigree 0.0066, pedigree (1,4,3,5,1)
  Literature, 7.9252 m3 of steam are used to keep the temperature at 85 °C during the purification stage.
  Steam density at 85°C: 0.366 kg/m3
  Steam specific enthalpy (total heat) at 85°C: kJ/kg 2653.57
  Source: https://www.thermexcel.com/english/tables/vap_eau.htm
  properties: heating value, net 1 MJ
- hydrochloric acid, without water, in 30% solution state: 0.000875565, 0.00400006 kg (2 suppliers, which the file names only by identifier); sum of these 0.00487562 kg; lognormal variance with pedigree 0.0066, pedigree (1,4,3,5,1)
  Literature
  properties: dry mass 1 kg, heating value, net 3.32 MJ, wet mass 1 kg
- hydrogen peroxide, without water, in 50% solution state: 0.000565572, 0.00268484 kg (2 suppliers, which the file names only by identifier); sum of these 0.00325041 kg; lognormal variance with pedigree 0.0066, pedigree (1,4,3,5,1)
  Literature
  properties: dry mass 1 kg, heating value, net 7.13 MJ, wet mass 1 kg
- inert waste, for final disposal: -0.311907, -0.00203059 kg (2 suppliers, which the file names only by identifier); sum of these -0.313937 kg; lognormal variance with pedigree 0.0048, pedigree (1,4,2,5,1)
  The value from literature (13.3 kg) has been adjusted to obtain mass balance. based on dry mass.
  production volume; = ABS(inert_waste_amount/lithium_carbonate_amount) * lithium_carbonate_PV
    The production volume is expressed in kg. Its calculation is based on the fact that for the production of 1 kg of lithium carbonate, 13.30 kg of inert solid waste is produced as by-product.
  properties: dry mass 0.995 kg, lithium content 0.0101791, water content 0.00502513, wet mass 1 kg
  note on lithium content: lithium content on a dry matter basis. The lithium content of inert waste is calculated to obtain mass balance, as difference between the Li content in spodumene and Li content in lithium carbonate, and accounting for the total mass of inert waste.
- quicklime, milled, loose: 0.0174605, 0.00014592 kg (2 suppliers, which the file names only by identifier); sum of these 0.0176064 kg; lognormal variance with pedigree 0.0066, pedigree (1,4,3,5,1)
  Literature
  properties: dry mass 0.99 kg, water content 0.010101, wet mass 1 kg
- soda ash, light: 0.0500255, 0.0111906 kg (2 suppliers, which the file names only by identifier); sum of these 0.0612161 kg; lognormal variance with pedigree 0.0066, pedigree (1,4,3,5,1)
  Literature
  properties: carbon content, fossil 0.0517241, dry mass 1 kg, heating value, net 3.43 MJ, wet mass 1 kg
- sodium hydroxide, without water, in 50% solution state: 0.00132532, 0.0135724 kg (2 suppliers, which the file names only by identifier); sum of these 0.0148977 kg; lognormal variance with pedigree 0.0066, pedigree (1,4,3,5,1)
  Literature
  properties: dry mass 1 kg, heating value, net 3.03 MJ, wet mass 1 kg
- spodumene: 0.234842 kg; name spodumene_amount; lognormal variance with pedigree 0.0066, pedigree (1,4,3,5,1)
  Literature
  property lithium content 0.0349; name spodumene_amount_Li_content; = 3.49/100
  properties: dry mass 1 kg, wet mass 1 kg
  note on lithium content: lithium content on a dry matter basis. According to Stamp et al. 2012, Li content in concentrated ore is 3.49% Reference: Stamp, A., Lang, D. J., & Wäger, P. A. (2012). Environmental impacts of a transition toward e-mobility: the present and future role of lithium carbonate production. Journal of Cleaner Production, 23(1), 104-112.
- sulfuric acid: 0.0723402, 0.00946185 kg (2 suppliers, which the file names only by identifier); sum of these 0.0818021 kg; lognormal variance with pedigree 0.0066, pedigree (1,4,3,5,1)
  Literature
  properties: dry mass 1 kg, wet mass 1 kg
- tap water: 1.33971 kg; name input_water_amount; = 0.0504477338325922*1000; lognormal variance with pedigree 0.0066, pedigree (1,4,3,5,1)
  Literature. Conversion 1 m3= 1000 kg
  properties: carbon content, fossil 0.00178991, dry mass 0.000337476 kg, water content 2962.17, wet mass 1 kg
  note on carbon content, fossil: Bicarbonate content is 2.93 mol/m3. CO2 content is 0.1 mol/m3 (ecoinvent v2.2 report 8, Tab 93.1).
- wastewater, average: -5.05789e-6, -0.000841656, -0.000201257, -2.99661e-6 m3 (4 suppliers, which the file names only by identifier); sum of these -0.00105097 m3; lognormal variance with pedigree 0.0048, pedigree (1,4,2,5,1)
  Literature
  production volume; = ABS(wastewater_amount/lithium_carbonate_amount) * lithium_carbonate_PV
    The production volume is expressed in m3. Its calculation is based on the fact that for the production of 1 kg of lithium carbonate, 0.0396 m3 of wastewater is produced as by-product.
  properties: carbon content, non-fossil 0.194039, dry mass 0.346837 kg, water content 2882.2, wet mass 1000 kg
  note on carbon content, non-fossil: 0.0673 kg TOC/m3 (Tab A.17, ecoinvent v2.2 report 13_I). TOC was considered as Total Carbon.

## Emissions to nature
- Nitrogen oxides [air, urban air close to ground]: 3.54837e-5 kg; lognormal variance with pedigree 0.046, pedigree (1,4,3,5,1)
  Literature
- Particulate Matter, < 2.5 um [air, urban air close to ground]: 1.34946e-5 kg; lognormal variance with pedigree 0.0466, pedigree (2,4,3,5,1)
  Literature. Total particulates emissions from calcination of spodumene (Jiang et al. 2020) are split into three PM categories, based on their wt % according to 'Phosphate rock processing: calciner' (USEPA, 1986, Appendix B.1 - Particle Size Distribution Data and Sized Emission Factors for Selected Sources): 94% PM <2.5um,, 4% PM>2.5um and <10um; 2% PM >10um
- Particulate Matter, > 10 um [air, urban air close to ground]: 2.8712e-7 kg; lognormal variance with pedigree 0.0466, pedigree (2,4,3,5,1)
  (same comment as for Particulate Matter, < 2.5 um)
- Particulate Matter, > 2.5 um and < 10um [air, urban air close to ground]: 5.7424e-7 kg; lognormal variance with pedigree 0.0466, pedigree (2,4,3,5,1)
  (same comment as for Particulate Matter, < 2.5 um)
- Sulfur dioxide [air, urban air close to ground]: 2.43781e-6 kg; lognormal variance with pedigree 0.0066, pedigree (1,4,3,5,1)
  Literature
- Sulfuric acid [air, urban air close to ground]: 1.35434e-6 kg; lognormal variance with pedigree 0.046, pedigree (1,4,3,5,1)
  Literature.
- Water [air, unspecified]: 4.33118e-5 m3; = (input_water_amount/1000-wastewater_amount)*fraction_PW_to_air; lognormal variance with pedigree 0.25, pedigree (5,5,5,5,5)
  Calculated value based on literature values and expert opinion. See comments in the parametres' comment field.
- Ammonium [water, unspecified]: 0.000988007 kg; lognormal variance with pedigree 0.046, pedigree (1,4,3,5,1)
  Estimation, based on the amount of nitrogen provided in Jiang et al. 2020. The amount of ammonia is estimated by means of stoichiometric calculations. MW N = 14.0067 g/mol; MW H3 = 3.0234 g/mol
- BOD5, Biological Oxygen Demand [water, unspecified]: 0.00744887 kg; lognormal variance with pedigree 0.046, pedigree (1,4,3,5,1)
  Best estimate value based on section 5.9.7 of the Data quality guideline for the ecoinvent database version 3.
- COD, Chemical Oxygen Demand [water, unspecified]: 0.0148977 kg; lognormal variance with pedigree 0.046, pedigree (1,4,3,5,1)
  Literature
- DOC, Dissolved Organic Carbon [water, unspecified]: 0.00551768 kg; lognormal variance with pedigree 0.0466, pedigree (2,4,3,5,1)
  (same comment as for BOD5, Biological Oxygen Demand)
- Phosphorus [water, unspecified]: 8.12604e-5 kg; lognormal variance with pedigree 0.046, pedigree (1,4,3,5,1)
  Literature
- Suspended solids, unspecified [water, unspecified]: 0.0200442 kg; lognormal variance with pedigree 0.046, pedigree (1,4,3,5,1)
  Literature
- TOC, Total Organic Carbon [water, unspecified]: 0.00551768 kg; lognormal variance with pedigree 0.0466, pedigree (2,4,3,5,1)
  (same comment as for BOD5, Biological Oxygen Demand)
- Water [water, unspecified]: 0.000245433 m3; = (input_water_amount/1000- wastewater_amount)*(1- fraction_PW_to_air); lognormal variance with pedigree 0.25, pedigree (5,5,5,5,5)
  (same comment as for Water)

## Sampling procedure
All exchanges to the environment and from the technosphere are taken from the life cycle inventory model presented in Jiang et al. (2020). The original data are provided by one of the largest rock-based lithium production company in China (Suzhou city, Jiangsu province) and are reported as economically allocated to the production of 1 kg lithium carbonate, based on sales revenue of lithium carbonate (256.38 million RMB), sodium sulfate (3.73 million RMB) and inert solid waste (1.39 million RMB) in China in 2014. In this dataset, data are back calculated as follows: allocated LCI from Jiang et al. (2020) * (256.38+3.73+1.39) / 256.38. Infrastructure is calculated with standard values.

## Extrapolations
The data are extrapolated from CN; the uncertainty has been adjusted accordingly.

## Review by Carl Vadenbo 2021-02-24
Why not "lithium carbonate production, acid leaching of spodumene"? Also, extrapolation from CN could be stated more explicity, but general comment at least mentions that it is a copy of a country-specific dataset.
