# kenaf production, irrigated

Dataset: EcoSpold 2, unit process
Geography: RoW
Time period: 2016-03-15 to 2023-03-14
Technology level: current
Classification: ISIC rev.4 ecoinvent: 0116:Growing of fibre crops
Classification: EcoSpold01Categories: agricultural production/plant production
Scenario: Business-as-Usual
System model: Allocation, cut-off by classification
Generated by: Archana Datta
Published in: Faist Emmenegger, M. 2018
Database: ecoinvent
isCopyrightProtected: true
accessRestrictedTo: 1

## General comment
The inventory covers field activity for production of 1 kg kenaf plant. The farm has a yield of 30,000 kg fresh green matter per ha for this crop cycle. Mineral NPK fertilizer input is 80-40-40 kg/ha.
Kenaf (commonly known as mesta) is an annual or biennial herbaceous plant. The fibres in kenaf are found in the bast (bark) and core (wood). The bast constitutes 40% and core constitutes 60% of the plant. The bast fibres are long (2 to 6 mm) and slender while core has thick (ø 38 µm) but short (0.5 mm) and thin walled (3µm) fibres. Unlike jute, kenaf requires less care in its cultivation and takes a longer time to mature. The plant is harvested for retting when in full flower stage.

## Included activities start
This activity starts right after the harvest of the previous crop. The soil is prepared for the kenaf cultivation.

## Included activities end
The activity ends at the harvesting of the mature kenaf plant.

## Geography
This dataset is a copy of Indian dataset

## Technology
Cultivation of kenaf from conventional production standards

## Time period
Sowing date for main crop-15 March 2016; harvesting date of main crop:-15 September 2016. Total harvesting time from the date of sowing is around 150 days. Data is for one crop cycle. Cycle of one year considered for entry in ecoeditor

## Reference product
- kenaf plant, harvested: 1 kg; name RP_amount_1; By-product classification allocatable product; CPC 01922: Jute, kenaf, and other textile bast fibres, raw or retted, except flax, true hemp and ramie; HS2017 5303: Jute and other textile bast fibres (not flax, true hemp and ramie), raw or processed but not spun; tow and wa[...]
  production volume 2.8396e8 kg; name RP_PV_1; = 284100*1000
    Data for year 2010; Source: http://jute.org/IJSG%20Publications/Jute%20&%20kenaf%20Stat%20at%20a%20glance_ijsg.pdf
  property carbon content, non-fossil 0.475
    Biogenic carbon content of vegetation on a dry mass basis (47.5% DM) derived from FAOSTAT.
    Reference: http://www.fao.org/forestry/17111/en
  property price 0.0144747 EUR2005
    Calculated based on inputs: The price of the product has been calculated as a sum of the values of the material and energy inputs for this product. This value is therefore a rough estimation. It may underestimate the real price since there are additional expenses when producing any product. These expences can include for example labour costs, treatment of waste materials and profit for the producer. Please consider carefully whether this level of data quality is acceptable for your application.
  properties: carbon allocation 0.0843824 kg, carbon content 0.475, carbon content, fossil 0, dry mass 0.177647 kg, water content 4.62914, water in wet mass 0.822353 kg, wet mass 1 kg

## Inputs from technosphere
- ammonia, anhydrous, liquid: 6.02192e-9, 2.58709e-8, 1.29574e-7, 5.47716e-9, 1.22521e-9, 4.50288e-8, 3.87077e-9, 1.19316e-8 kg (8 suppliers, which the file names only by identifier); sum of these 2.29e-7 kg; lognormal variance with pedigree 0.0078, pedigree (3,3,3,5,2)
  Calculated Value. This value has been calculated by using the Ecoinvent LCI calculation tool for crop production.
  properties: dry mass 1 kg, wet mass 1 kg
- ammonium nitrate: 1.3309e-7, 7.09449e-8, 2.40837e-7, 9.23031e-8 kg (4 suppliers, which the file names only by identifier); sum of these 5.37176e-7 kg; lognormal variance with pedigree 0.0078, pedigree (3,3,3,5,2)
  The exchange has been updated from 'ammonium nitrate, as N' into 'ammonium nitrate' and therefore its amount has been scaled (multiplied) from 0 kg by 2.8573 kg of 'ammonium nitrate' per kg of 'ammonium nitrate, as N'. Original comment of the exchange is: Calculated Value. This value has been calculated by using the Ecoinvent LCI calculation tool for crop production.
  properties: dry mass 1 kg, wet mass 1 kg
- ammonium sulfate: 1.34673e-5, 4.13266e-6 kg (2 suppliers, which the file names only by identifier); sum of these 1.76e-5 kg; lognormal variance with pedigree 0.0078, pedigree (3,3,3,5,2)
  (same comment as for ammonia, anhydrous, liquid)
  properties: dry mass 1 kg, wet mass 1 kg
- inorganic nitrogen fertiliser, as N: 5.75046e-8, 1.34938e-5, 1.60069e-6, 1.71887e-5, 3.93177e-6, 1.66506e-6, 1.5346e-5, 1.44105e-6, 1.01096e-5, 1.03422e-6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 kg (29 suppliers, which the file names only by identifier); sum of these 0.00159001 kg; lognormal variance with pedigree 0.0078, pedigree (3,3,3,5,2)
  This exchange is an aggregation of amounts:
  0.001058669890248312. Comment:
  1.6192964160794746E-4. Comment:
  1.6192964160794746E-4. Comment:
  1.642034538805976E-4. Comment:
  4.197497699777306E-6. Comment:
  3.907536329433147E-5. Comment:
  properties: dry mass 1 kg, wet mass 1 kg
- inorganic phosphorus fertiliser, as P2O5: 1.01781e-5, 2.25918e-5, 0.000195456, 6.30779e-6, 1.54908e-6, 2.19359e-6, 5.47268e-6, 7.18814e-7, 3.52299e-6, 8.39962e-8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 kg (29 suppliers, which the file names only by identifier); sum of these 0.00133212 kg; lognormal variance with pedigree 0.0078, pedigree (3,3,3,5,2)
  This exchange is an aggregation of amounts:
  5.92281387178312E-6. Comment:
  1.0884954469483347E-4. Comment:
  4.888900782089441E-4. Comment:
  4.888900782089441E-4. Comment:
  2.39572171843368E-4. Comment:
  properties: dry mass 1 kg, wet mass 1 kg
- inorganic potassium fertiliser, as K2O: 2.32615e-6, 7.55026e-7, 2.61483e-7, 1.11844e-5, 3.36431e-7, 1.29576e-6, 5.60163e-7, 2.10963e-8, 3.24939e-5, 1.89312e-6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 kg (29 suppliers, which the file names only by identifier); sum of these 0.000389613 kg; lognormal variance with pedigree 0.0078, pedigree (3,3,3,5,2)
  (same comment as for ammonia, anhydrous, liquid)
  properties: dry mass 1 kg, wet mass 1 kg
- irrigation: 9.80062e-6, 0.000195996, 0.0119602, 0.000150998, 0.000404854, 0.000556504, 0.0431448, 8.8327e-5, 2.27165e-6, 0.00530806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 m3 (16 suppliers, which the file names only by identifier); sum of these 0.0663 m3; lognormal variance with pedigree 0.0078, pedigree (3,3,3,5,2)
  The data was collected for a hectare area through interview.
  properties: dry mass 0.11 kg, water content 9089.91, wet mass 1000 kg
- linseed seed, at farm: 0.0005 kg; lognormal variance with pedigree 0.0078, pedigree (3,3,3,5,2)
  data for kenaf seeds
  properties: carbon content, non-fossil 1, dry mass 1 kg, wet mass 1 kg
- manure, liquid, cattle: 0.167667 kg; lognormal variance with pedigree 0.0078, pedigree (3,3,3,5,2)
  (same comment as for ammonia, anhydrous, liquid)
  properties: carbon content, non-fossil 0.68, dry mass 0.075 kg, water content 12.333, wet mass 1 kg
- packaging, for fertilisers: 0.0106667 kg; lognormal variance with pedigree 0.0532, pedigree (4,3,3,5,4)
  Total amount of active substance/s of fertilisers needed for the production of 'kenaf plant, harvested' is calculated to be circa 5.33E-03 kg. Fertiliser/s used in this dataset is/are: 'ammonia, liquid', 'ammonium nitrate, as N', 'ammonium sulfate, as N', 'nitrogen fertiliser, as N', 'phosphate fertiliser, as P2O5', 'phosphate rock, as P2O5, beneficiated, dry', 'potassium chloride, as K2O', 'potassium fertiliser, as K2O', 'potassium sulfate, as K2O', 'urea, as N'. The total amount of active substance/s is doubled in order to account for the packaging of the dilluted product of fertiliser/s that is/are applied. Therefore, 1.07E-02 kg of packaging for fertilisers is justified with this exchange.
  properties: carbon content, fossil 0.825301, dry mass 1 kg, heating value, net 25.01 MJ, price 0.0642 EUR2005, wet mass 1 kg
  note on carbon content, fossil: Considering a chemical formula (C2H4)n for polyethylene, carbon content-fossil is calculated to be 0.856286 kg of Carbon per kg of dry mass.
- packaging, for pesticides: 0.000133333 kg; lognormal variance with pedigree 0.0532, pedigree (4,3,3,5,4)
  Total amount of active substance/s of pesticides needed for the production of kenaf plant, harvested is calculated to be circa 6.67E-05 kg. Pesticide/s used in this dataset is/are: 'pesticide, unspecified'. The total amount of active substance/s is doubled in order to account for the packaging of the dilluted product of pesticide/s that is/are applied. Therefore, 1.33E-04 kg of packaging for pesticides is justified with this exchange.
  properties: carbon content, fossil 0.85714, dry mass 1 kg, heating value, net 25.97 MJ, price 0.0642 EUR2005, wet mass 1 kg
- pesticide, unspecified: 6.66667e-5 kg; lognormal variance with pedigree 0.0078, pedigree (3,3,3,5,2)
  Florochloraline used as herbicide
  properties: carbon content, fossil 0.486978, dry mass 1 kg, wet mass 1 kg
- phosphate rock, beneficiated: 4.86316e-8, 4.86316e-8, 1.65882e-8, 3.66317e-6 kg (4 suppliers, which the file names only by identifier); sum of these 3.77702e-6 kg; lognormal variance with pedigree 0.0078, pedigree (3,3,3,5,2)
  The exchange has been updated from 'phosphate rock, as P2O5, beneficiated, dry' into 'phosphate rock, beneficiated' and therefore its amount has been scaled (multiplied) from 0 kg by 3.125 kg of 'phosphate rock, beneficiated' per kg of 'phosphate rock, as P2O5, beneficiated, dry'. Original comment of the exchange is: Calculated Value. This value has been calculated by using the Ecoinvent LCI calculation tool for crop production.
  properties: dry mass 1 kg, wet mass 1 kg
- potassium chloride: 0.000113612, 0.00136994 kg (2 suppliers, which the file names only by identifier); sum of these 0.00148355 kg; lognormal variance with pedigree 0.0078, pedigree (3,3,3,5,2)
  The exchange has been updated from 'potassium chloride, as K2O' into 'potassium chloride' and therefore its amount has been scaled (multiplied) from 0.0009 kg by 1.5829 kg of 'potassium chloride' per kg of 'potassium chloride, as K2O'. Original comment of the exchange is: Calculated Value. This value has been calculated by using the Ecoinvent LCI calculation tool for crop production.
  properties: dry mass 1 kg, wet mass 1 kg
- potassium sulfate: 2.08587e-6, 9.90189e-6 kg (2 suppliers, which the file names only by identifier); sum of these 1.19878e-5 kg; lognormal variance with pedigree 0.0078, pedigree (3,3,3,5,2)
  The exchange has been updated from 'potassium sulfate, as K2O' into 'potassium sulfate' and therefore its amount has been scaled (multiplied) from 0 kg by 1.85 kg of 'potassium sulfate' per kg of 'potassium sulfate, as K2O'. Original comment of the exchange is: Calculated Value. This value has been calculated by using the Ecoinvent LCI calculation tool for crop production.
  properties: dry mass 1 kg, wet mass 1 kg
- tillage, harrowing, by rotary harrow: 5.17e-5 ha; lognormal variance with pedigree 0.0078, pedigree (3,3,3,5,2)
  The data was collected for a hectare area through interview. The tillage activity was scaled based on the diesel used for tillage in the ecoinvent dataset and the diesel consumption data collected in the project
- urea: 0.00106195, 0.000134306, 0.000166495, 0.000906827 kg (4 suppliers, which the file names only by identifier); sum of these 0.00226958 kg; lognormal variance with pedigree 0.0078, pedigree (3,3,3,5,2)
  The exchange has been updated from 'urea, as N' into 'urea' and therefore its amount has been scaled (multiplied) from 0.0011 kg by 2.1438 kg of 'urea' per kg of 'urea, as N'. Original comment of the exchange is: The data was collected for a hectare area through interview
  properties: carbon content, fossil 0.2, dry mass 1 kg, wet mass 1 kg
- waste wood, untreated: -0.000239069, -0.178153, -0.00326993, -0.00138752, -0.0562885, -0.00219355, -0.0263353 kg (7 suppliers, which the file names only by identifier); sum of these -0.267867 kg; lognormal variance with pedigree 0.0058, pedigree (3,3,1,5,2)
  This exchange is an aggregation of amounts:
  0.2312. Comment: Byproduct- sticks
  0.03666666666666667. Comment: Byproduct-seeds
  production volume; = RP_PV_1 * (BP_amount_1 / RP_amount_1)
    Calculated from production volume of reference product using the relative outputs.
  properties: heating value, net 13.99 MJ
  note on heating value, net: Value taken from the general comment of the treatment dataset.

## Inputs from nature
- Carbon dioxide, in air [natural resource, in air]: 0.967346 kg; lognormal variance with pedigree 0.0078, pedigree (3,3,3,5,2)
  (same comment as for ammonia, anhydrous, liquid)
- Energy, gross calorific value, in biomass [natural resource, biotic]: 11.25 MJ; lognormal variance with pedigree 0.0078, pedigree (3,3,3,5,2)
  (same comment as for ammonia, anhydrous, liquid)
- Occupation, annual crop, irrigated [natural resource, land]: 0.166667 m2*year; lognormal variance with pedigree 0.0092, pedigree (3,3,3,5,2)
  Calculated Value. This value has been calculated by using the ecoinvent LCI calculation tool for crop production.
- Transformation, from annual crop, irrigated [natural resource, land]: 0.333333 m2; lognormal variance with pedigree 0.0152, pedigree (3,3,3,5,2)
  (same comment as for ammonia, anhydrous, liquid)
- Transformation, to annual crop, irrigated [natural resource, land]: 0.333333 m2; lognormal variance with pedigree 0.0152, pedigree (3,3,3,5,2)
  (same comment as for ammonia, anhydrous, liquid)

## Emissions to nature
- Ammonia [air, non-urban air or from high stacks]: 0.000545309 kg; lognormal variance with pedigree 0.0212, pedigree (4,5,3,5,2)
  (same comment as for ammonia, anhydrous, liquid)
- Carbon dioxide, fossil [air, non-urban air or from high stacks]: 0.00249477 kg; lognormal variance with pedigree 0.0212, pedigree (4,5,3,5,2)
  (same comment as for ammonia, anhydrous, liquid)
- Dinitrogen monoxide [air, non-urban air or from high stacks]: 6.72e-5 kg; lognormal variance with pedigree 0.0212, pedigree (4,5,3,5,2)
  (same comment as for ammonia, anhydrous, liquid)
- Nitrogen oxides [air, non-urban air or from high stacks]: 0.000187051 kg; lognormal variance with pedigree 0.0212, pedigree (4,5,3,5,2)
  (same comment as for ammonia, anhydrous, liquid)
- Water [air, non-urban air or from high stacks]: 0.033813 m3; lognormal variance with pedigree 0.0212, pedigree (4,5,3,5,2)
  (same comment as for ammonia, anhydrous, liquid)
- Cadmium II [soil, agricultural]: -8.09632e-9 kg
  (same comment as for ammonia, anhydrous, liquid)
- Chromium III [soil, agricultural]: -5.49622e-7 kg
  (same comment as for ammonia, anhydrous, liquid)
- Copper ion [soil, agricultural]: -4.33735e-6 kg
  (same comment as for ammonia, anhydrous, liquid)
- Lead II [soil, agricultural]: -4.59931e-7 kg
  (same comment as for ammonia, anhydrous, liquid)
- Mercury II [soil, agricultural]: -2.45012e-8 kg
  (same comment as for ammonia, anhydrous, liquid)
- Nickel II [soil, agricultural]: -9.48059e-7 kg
  (same comment as for ammonia, anhydrous, liquid)
- Zinc II [soil, agricultural]: -1.94955e-5 kg
  (same comment as for ammonia, anhydrous, liquid)
- Cadmium II [water, ground-]: 7.14e-10 kg; lognormal variance with pedigree 0.0212, pedigree (4,5,3,5,2)
  (same comment as for ammonia, anhydrous, liquid)
- Cadmium II [water, surface water]: 5.94e-9 kg; lognormal variance with pedigree 0.0212, pedigree (4,5,3,5,2)
  (same comment as for ammonia, anhydrous, liquid)
- Chromium III [water, ground-]: 3.29e-7 kg; lognormal variance with pedigree 0.0212, pedigree (4,5,3,5,2)
  (same comment as for ammonia, anhydrous, liquid)
- Chromium III [water, surface water]: 6.48e-7 kg; lognormal variance with pedigree 0.0212, pedigree (4,5,3,5,2)
  (same comment as for ammonia, anhydrous, liquid)
- Copper ion [water, ground-]: 5.04e-8 kg; lognormal variance with pedigree 0.0212, pedigree (4,5,3,5,2)
  (same comment as for ammonia, anhydrous, liquid)
- Copper ion [water, surface water]: 4.88e-7 kg; lognormal variance with pedigree 0.0212, pedigree (4,5,3,5,2)
  (same comment as for ammonia, anhydrous, liquid)
- Lead II [water, ground-]: 3.15e-9 kg; lognormal variance with pedigree 0.0212, pedigree (4,5,3,5,2)
  (same comment as for ammonia, anhydrous, liquid)
- Lead II [water, surface water]: 1.77e-7 kg; lognormal variance with pedigree 0.0212, pedigree (4,5,3,5,2)
  (same comment as for ammonia, anhydrous, liquid)
- Mercury II [water, ground-]: 1.5e-11 kg; lognormal variance with pedigree 0.0212, pedigree (4,5,3,5,2)
  (same comment as for ammonia, anhydrous, liquid)
- Mercury II [water, surface water]: 1.46e-9 kg; lognormal variance with pedigree 0.0212, pedigree (4,5,3,5,2)
  (same comment as for ammonia, anhydrous, liquid)
- Nickel II [water, surface water]: 4.23e-7 kg; lognormal variance with pedigree 0.0212, pedigree (4,5,3,5,2)
  (same comment as for ammonia, anhydrous, liquid)
- Nitrate [water, ground-]: 0.00427706 kg; lognormal variance with pedigree 0.0606, pedigree (4,5,3,5,2)
  (same comment as for ammonia, anhydrous, liquid)
- Phosphate [water, ground-]: 3.61e-6 kg; lognormal variance with pedigree 0.0212, pedigree (4,5,3,5,2)
  (same comment as for ammonia, anhydrous, liquid)
- Phosphate [water, surface water]: 1.01e-5 kg; lognormal variance with pedigree 0.0212, pedigree (4,5,3,5,2)
  (same comment as for ammonia, anhydrous, liquid)
- Phosphorus [water, surface water]: 5.94e-5 kg; lognormal variance with pedigree 0.0212, pedigree (4,5,3,5,2)
  (same comment as for ammonia, anhydrous, liquid)
- Water [water, ground-]: 0.025857 m3; lognormal variance with pedigree 0.0212, pedigree (4,5,3,5,2)
  (same comment as for ammonia, anhydrous, liquid)
- Water [water, surface water]: 0.00663 m3; lognormal variance with pedigree 0.0212, pedigree (4,5,3,5,2)
  (same comment as for ammonia, anhydrous, liquid)
- Zinc II [water, ground-]: 2.65e-7 kg; lognormal variance with pedigree 0.0212, pedigree (4,5,3,5,2)
  (same comment as for ammonia, anhydrous, liquid)
- Zinc II [water, surface water]: 6.9e-7 kg; lognormal variance with pedigree 0.0212, pedigree (4,5,3,5,2)
  (same comment as for ammonia, anhydrous, liquid)

## Sampling procedure
Focus group discussion, expert interviews, literature data and assumptions. Standardized questionnaires were developed and adapted to jute-specific cultivation and post-harvest situation. The secondary data from literature and the primary data from surveys were compared and matched to obtain highest data quality.

## Extrapolations
The data on inputs to the field activites are collected directly from the farmers and farming experts. However, the emission data were not readily available for India. Hence, Ecoinvent LCI calculation tool for crop production was used to calculate field emissions from the cultivation process.
