# polyethylene terephthalate, granulate, amorphous, recycled to generic market for amorphous PET granulate

Dataset: EcoSpold 2, unit process
Geography: Europe without Switzerland
Time period: 2010-01-01 to 2023-12-31
Technology level: current
Classification: ISIC rev.4 ecoinvent: 2013:Manufacture of plastics and synthetic rubber in primary forms
Scenario: Business-as-Usual
System model: Allocation, cut-off by classification
Generated by: Thomas Kägi
Database: ecoinvent
isCopyrightProtected: true
accessRestrictedTo: 1

## General comment
This is a renaming activity linking recycled polyethylene terephthalate (PET), amorphous, granulate to the generic market for amorphous PET granulate.
Transport distances for road and rail freight based product category SCTG code 242 in the US BTS Commodity Flow Survey from 2012, US Dep. Of Transportation, Bureau of Transportation Statistics. Air freight was omitted due to assumed low relevance for this product category.

## Reference product
- polyethylene terephthalate, granulate, amorphous: 1 kg; By-product classification allocatable product; CPC 34710: Polymers of ethylene, in primary forms; HS2017 3907: Polyacetals, other polyethers and epoxide resins, in primary forms; polycarbonates, alkyd resins, polyallyl e[...]; CAS 25038-59-9
  production volume 0.001 kg
    Recycled granulates assumed to represent negligible share of oveall global market for granulate (for example, World Economic Forum states that about 2% closed-loop recycling for plastic packaging material; WEF 2016 'The New Plastics Economy - Rethinking the future of plastics'), hence production volume here set to low arbitrarily amount to link the recycled product to the generic market.
  properties: carbon allocation 0.625 kg, carbon content 0.625, carbon content, fossil 0.625, carbon content, non-fossil 0, dry mass 1 kg, heating value, net 22.95 MJ, price 1.29 EUR2005, water content 0, water in wet mass 0 kg, wet mass 1 kg

## Inputs from technosphere
- polyethylene terephthalate, granulate, amorphous, recycled: 1 kg
  properties: carbon content, fossil 0.625, dry mass 1 kg, heating value, net 22.95 MJ, wet mass 1 kg
  note on heating value, net: Assumed equal to "polyethylene terephthalate, granulate, amorphous"
