# potassium mining and benefication

Dataset: EcoSpold 2, unit process
Geography: CA-SK
Time period: 2000-01-01 to 2023-12-31
Technology level: current
Classification: ISIC rev.4 ecoinvent: 2012:Manufacture of fertilizers and nitrogen compounds
Synonyms: muriate of potash; sylvite
Scenario: Business-as-Usual
System model: Allocation, cut-off by classification
Generated by: François Saunier
Published in: Nemecek, T. 2007
Database: ecoinvent
isCopyrightProtected: true
accessRestrictedTo: 1

## General comment
The dataset describes the production of potassium chloride (KCl). KCl has a K2O content of 60% in terms of mass. The production process combines mining of potash salt and its further beneficiation. The original dataset is documented in Nemecek T. & Kägi T. (2007).
Reference: Nemecek T. & Kägi T. (2007) Life Cycle Inventories of Swiss and European Agricultural Production Systems. Final report ecoinvent V2.0 No. 15a. Agroscope Reckenholz-Taenikon Research Station ART, Swiss Centre for Life Cycle Inventories, Zurich and Dübendorf, CH, retrieved from: www.ecoinvent.ch.
[This dataset is meant to replace the following datasets:
- potassium chloride production, CA-SK, 2000 - 2000]

## Included activities start
Potassium chloride production process starting from underground mining of potash salts.

## Included activities end
This activity ends with dried potassium chloride at factory gate.
the dataset includes the mining of potash salts, the processes of concentration of the potassium chloride, conditioning and drying. The use of the resource sylvinite was accounted for as well as the disposal of the salt residues on heaps and to rivers. Treatment of other wastes was included. Infrastructure was included by means of a proxy module.
Coating and packaging of the final fertiliser products were not included.

## Geography
Child dataset created as proxy for potassium chloride used in the Quebec context. Data quality indicators have been adjusted accordingly.
The data from parent dataset refer to Germany.
Data for energy demand refer to average data from 11 production facilities in Canada, where 10 are in Saskatechewan and 1 in New Brunswick. As the production volume of the New Brunswick facility is negligible, data are supposed to reflect Saskatchewan situation.

## Technology
The potash salts stem from underground mines. Conventional underground mining with underground equipment and personnel is considered in this dataset. Solution mining is another technology used in Saskatchewan for the production of potassium chloride but this technology is not covered by this data. The share of total KCl production capacity in Saskatchewan with solution mining was 16% in 2000. Solution mining is a more energy intensive technology than conventional mining (Natural Resources Canada, 2004).
In the parent dataset, three different technologies are used to concentrate the salt: thermal leaching (solution in hot water), flotation and electrostatic separation. Except for energy demand, the inventory describes a mixture of these processes.
In Saskatchewan potash industry, most of the mines use a flotation process and only one a thermal leaching process. The energy demand reflects this situation.
References :
Natural Resources Canada (2004). Energy Benchmarking : Canadian Potash Production Facilities. Report for the Canadian Industry Program for Energy Conservation, 21p.

## Time period
Parent data come from an environmental report for the year 2000.
Data on energy demand come from an energy benchmarking of canadian potash production facilities for the years 2000 and 2001.

## Parameters
- fraction, cooling water, cooling pond system, to air: 0.032 dimensionless; lognormal variance with pedigree 0.0413, pedigree (2,3,1,3,1)
- fraction, cooling water, once-through system, to air: 0.004 dimensionless; lognormal variance with pedigree 0.0413, pedigree (2,3,1,3,1)
- fraction, cooling water, recirculating system, to air: 0.771 dimensionless; lognormal variance with pedigree 0.0413, pedigree (2,3,1,3,1)
- fraction, cooling water, to air: 0.3875 dimensionless; lognormal variance with pedigree 0.092025, pedigree (4,4,3,2,4)
- fraction, process water, to air: 0.36 dimensionless; lognormal variance with pedigree 0.092025, pedigree (4,4,3,2,4)

## Reference product
- potassium chloride: 1 kg; name Ref; By-product classification allocatable product; CPC 34631: Potassium chloride (muriate of potash); HS2017 310420: Fertilizers, mineral or chemical; potassic, potassium chloride; CAS 7447-40-7
  production volume 9.5e9 kg; name PV_Reference
    Production volume of potassium chloride, as K2O, in Canada in 2000. Source:
    Natural Resources Canada (2004). Energy Benchmarking : Canadian Potash Production Facilities. Report for the Canadian Industry Program for Energy Conservation, 21p.
  property price 0.184 EUR2005
    Prices are calculated on basis of Import/Export data (tonnes and US$) from UN Trade Statistics Database (http://data.un.org/Browse.aspx?d=ComTrade, accessed 7/7-2010). N, P2O5, or K2O content (http://www.fertilizer.org/ifa/Home-Page/STATISTICS/Conversions-factors)
  properties: carbon allocation 0 kg, carbon content 0, carbon content, fossil 0, carbon content, non-fossil 0, dry mass 1 kg, water content 0, water in wet mass 0 kg, wet mass 1 kg

## Inputs from technosphere
- chemical factory, organics: 4.21379e-10 unit; lognormal variance with pedigree 0.4632, pedigree (2,3,5,5,5)
  The exchange has been scaled to represent the production of potassium chloride instead of a pure form of K2O. The exchange has been divided with the scaling key of circa 1.58 kg of potassium chloride per kg of K2O. Original amount of the exchange was: 0.000000000667 unit.
- chemical, inorganic: 0.0063807 kg; lognormal variance with pedigree 0.1638, pedigree (2,3,5,5,5)
  The exchange has been scaled to represent the production of potassium chloride instead of a pure form of K2O. The exchange has been divided with the scaling key of circa 1.58 kg of potassium chloride per kg of K2O. Original amount of the exchange was: 0.0101 kg.
  properties: carbon content, fossil 0.003, dry mass 1 kg, wet mass 1 kg
  note on carbon content, fossil: This dataset is an unweighted average of 20 inorganic substances (listed in Tab 88.1, ecoinvent v2.2 report 8, part II), being part of the top100 chemicals included in this database. The C-content has also been calculated as an unweighted average of the C content of the substances composing this dataset.
- diesel, burned in building machine: 0.0254596 MJ; source Natural Resources Canada 2004; lognormal variance with pedigree 0.041325, pedigree (2,2,5,2,1)
  The exchange has been scaled to represent the production of potassium chloride instead of a pure form of K2O. The exchange has been divided with the scaling key of circa 1.58 kg of potassium chloride per kg of K2O. Original amount of the exchange was: 0.0403 MJ.
  Original comment: Estimation. Energy demand by other type than natural gas and electricity represents 3% of total energy consumption (Natural Resources Canada, 2004). This energy has been asumed to be consumed in the form of diesel.
  properties: heating value, net 1 MJ
- electricity, medium voltage: 0.0758103 kWh; lognormal variance with pedigree 0.041325, pedigree (2,2,5,2,1)
  The exchange has been scaled to represent the production of potassium chloride instead of a pure form of K2O. The exchange has been divided with the scaling key of circa 1.58 kg of potassium chloride per kg of K2O. Original amount of the exchange was: 0.12 kWh.
  Original comment: Literature value. Electricity is used for powering mining machines, hoisting, conveying, ventilation, lighting, dewatering, mill operations, tailings management and office facilities (Natural Resources Canada, 2004).
- hazardous waste, for incineration: -0.000199634 kg; name hazardous_waste; lognormal variance with pedigree 0.1238, pedigree (2,3,1,5,5)
  The exchange has been scaled to represent the production of potassium chloride instead of a pure form of K2O. The exchange has been divided with the scaling key of circa 1.58 kg of potassium chloride per kg of K2O. Original amount of the exchange was: 0.000316 kg.
  production volume; = hazardous_waste/Ref*PV_Reference
    Calculated from the production volume of potassium chloride, as K2O in proportion to the respective output amounts.
  properties: carbon content, fossil 0.554667, dry mass 0.75 kg, heating value, net 17 MJ, water content 0.333333, wet mass 1 kg
  note on carbon content, fossil: Tab A.6, ecoinvent v2.2 report 13_I. C content has been calculated after data in the tables, and then referred to 1 kg DM
  note on heating value, net: Value taken from the general comment of the treatment dataset.
- heat, district or industrial, natural gas: 0.550257 MJ; source Natural Resources Canada 2004; lognormal variance with pedigree 0.041325, pedigree (2,2,5,2,1)
  The exchange has been scaled to represent the production of potassium chloride instead of a pure form of K2O. The exchange has been divided with the scaling key of circa 1.58 kg of potassium chloride per kg of K2O. Original amount of the exchange was: 0.871 MJ.
  Original comment: Literature value. All the heat is supposed to come from district or industrial furnaces or boilers.
  Heat from natural gas is used for mine air heating, building heating, steam generation and product drying (Natural Resources Canada, 2004).
  properties: heating value, net 1 MJ
- municipal solid waste: -0.000452967 kg; name municipal_waste; lognormal variance with pedigree 0.1238, pedigree (2,3,1,5,5)
  The exchange has been scaled to represent the production of potassium chloride instead of a pure form of K2O. The exchange has been divided with the scaling key of circa 1.58 kg of potassium chloride per kg of K2O. Original amount of the exchange was: 0.000717 kg.
  production volume; = municipal_waste/Ref*PV_Reference
    (same comment as for hazardous waste, for incineration)
  properties: carbon content, fossil 0.171549, carbon content, non-fossil 0.261655, dry mass 0.771 kg, heating value, net 11.74 MJ, water content 0.297017, wet mass 1 kg
  note on carbon content, fossil: MSW composition in tab 4.1, ecoinvent v2.2 report 13_I. C content referred to 1 kg DM
- salt tailing from potash mine: -2.89343 kg; name salt_tailing; lognormal variance with pedigree 0.1238, pedigree (2,3,1,5,5)
  The exchange has been scaled to represent the production of potassium chloride instead of a pure form of K2O. The exchange has been divided with the scaling key of circa 1.58 kg of potassium chloride per kg of K2O. Original amount of the exchange was: 4.58 kg.
  production volume; = salt_tailing/Ref*PV_Reference
    (same comment as for hazardous waste, for incineration)
  properties: dry mass 1 kg, wet mass 1 kg

## Inputs from nature
- Sylvite [natural resource, in ground]: 1.19401 kg; lognormal variance with pedigree 0.1638, pedigree (2,3,5,5,5)
  The exchange has been scaled to represent the production of potassium chloride instead of a pure form of K2O. The exchange has been divided with the scaling key of circa 1.58 kg of potassium chloride per kg of K2O. Original amount of the exchange was: 1.89 kg.
- Water, cooling, unspecified natural origin [natural resource, in water]: 0.00821279 m3; lognormal variance with pedigree 0.1638, pedigree (2,3,5,5,5)
  The exchange has been scaled to represent the production of potassium chloride instead of a pure form of K2O. The exchange has been divided with the scaling key of circa 1.58 kg of potassium chloride per kg of K2O. Original amount of the exchange was: 0.013 m3.
- Water, river [natural resource, in water]: 0.00221114 m3; lognormal variance with pedigree 0.1638, pedigree (2,3,5,5,5)
  The exchange has been scaled to represent the production of potassium chloride instead of a pure form of K2O. The exchange has been divided with the scaling key of circa 1.58 kg of potassium chloride per kg of K2O. Original amount of the exchange was: 0.0035 m3.

## Emissions to nature
- Hydrochloric acid [air, urban air close to ground]: 5.86267e-6 kg; lognormal variance with pedigree 0.2232, pedigree (2,3,5,5,5)
  The exchange has been scaled to represent the production of potassium chloride instead of a pure form of K2O. The exchange has been divided with the scaling key of circa 1.58 kg of potassium chloride per kg of K2O. Original amount of the exchange was: 0.00000928 kg.
- Particulate Matter, < 2.5 um [air, urban air close to ground]: 4.8645e-7 kg; lognormal variance with pedigree 0.4832, pedigree (2,3,5,5,5)
  The exchange has been scaled to represent the production of potassium chloride instead of a pure form of K2O. The exchange has been divided with the scaling key of circa 1.58 kg of potassium chloride per kg of K2O. Original amount of the exchange was: 0.00000077 kg.
- Particulate Matter, > 10 um [air, urban air close to ground]: 8.84454e-6 kg; lognormal variance with pedigree 0.2232, pedigree (2,3,5,5,5)
  The exchange has been scaled to represent the production of potassium chloride instead of a pure form of K2O. The exchange has been divided with the scaling key of circa 1.58 kg of potassium chloride per kg of K2O. Original amount of the exchange was: 0.000014 kg.
- Particulate Matter, > 2.5 um and < 10um [air, urban air close to ground]: 3.8916e-7 kg; lognormal variance with pedigree 0.2932, pedigree (2,3,5,5,5)
  The exchange has been scaled to represent the production of potassium chloride instead of a pure form of K2O. The exchange has been divided with the scaling key of circa 1.58 kg of potassium chloride per kg of K2O. Original amount of the exchange was: 0.000000616 kg.
- Water [air, unspecified]: 0.00397846 m3; lognormal variance with pedigree 0.2032, pedigree (2,3,5,5,5)
  The exchange has been scaled to represent the production of potassium chloride instead of a pure form of K2O. The exchange has been divided with the scaling key of circa 1.58 kg of potassium chloride per kg of K2O. Original amount of the exchange was: 0.0062975 m3.
- Calcium II [water, surface water]: 0.00132036 kg; lognormal variance with pedigree 0.2232, pedigree (2,3,5,5,5)
  The exchange has been scaled to represent the production of potassium chloride instead of a pure form of K2O. The exchange has been divided with the scaling key of circa 1.58 kg of potassium chloride per kg of K2O. Original amount of the exchange was: 0.00209 kg.
- Chloride [water, surface water]: 0.0796009 kg; lognormal variance with pedigree 0.2232, pedigree (2,3,5,5,5)
  The exchange has been scaled to represent the production of potassium chloride instead of a pure form of K2O. The exchange has been divided with the scaling key of circa 1.58 kg of potassium chloride per kg of K2O. Original amount of the exchange was: 0.126 kg.
- Magnesium [water, surface water]: 0.00764421 kg; lognormal variance with pedigree 0.2232, pedigree (2,3,5,5,5)
  The exchange has been scaled to represent the production of potassium chloride instead of a pure form of K2O. The exchange has been divided with the scaling key of circa 1.58 kg of potassium chloride per kg of K2O. Original amount of the exchange was: 0.0121 kg.
- Potassium I [water, surface water]: 0.00101712 kg; lognormal variance with pedigree 0.2232, pedigree (2,3,5,5,5)
  The exchange has been scaled to represent the production of potassium chloride instead of a pure form of K2O. The exchange has been divided with the scaling key of circa 1.58 kg of potassium chloride per kg of K2O. Original amount of the exchange was: 0.00161 kg.
- Sodium I [water, surface water]: 0.046497 kg; lognormal variance with pedigree 0.2232, pedigree (2,3,5,5,5)
  The exchange has been scaled to represent the production of potassium chloride instead of a pure form of K2O. The exchange has been divided with the scaling key of circa 1.58 kg of potassium chloride per kg of K2O. Original amount of the exchange was: 0.0736 kg.
- Sulfur [water, surface water]: 0.00789691 kg; lognormal variance with pedigree 0.2232, pedigree (2,3,5,5,5)
  The exchange has been scaled to represent the production of potassium chloride instead of a pure form of K2O. The exchange has been divided with the scaling key of circa 1.58 kg of potassium chloride per kg of K2O. Original amount of the exchange was: 0.0125 kg.
- Water [water, unspecified]: 0.00644546 m3; lognormal variance with pedigree 0.2032, pedigree (2,3,5,5,5)
  The exchange has been scaled to represent the production of potassium chloride instead of a pure form of K2O. The exchange has been divided with the scaling key of circa 1.58 kg of potassium chloride per kg of K2O. Original amount of the exchange was: 0.0102025 m3.
  property carbon content, fossil 0; name C_content_fossil
  property carbon content, non-fossil 0; name C_content_non_fossil
  property dry mass 0 kg; name DM
  property water in wet mass 1000 kg; name WWM
  property wet mass 1000 kg; name WM

## Sampling procedure
The parent data are based on an environmental report of Kali & Salz (2001). They were supplemented by literature data.

## Extrapolations
Dataset based on GLO parent dataset. Other data than energy demand are kept from parent dataset (GLO, based on RER data) and may not be representative of the geography and the technology. The uncertainty has been adjusted accordingly.
Data for energy demand refer to average data from 11 production facilities in Canada, where 10 are in Saskatechewan and 1 in New Brunswick. As the production volume of the New Brunswick facility is negligible, data are supposed to reflect Saskatchewan situation.
