# trawler maintenance, steel

Dataset: EcoSpold 2, unit process
Geography: RoW
Time period: 2010-01-01 to 2023-12-31
Technology level: current
Classification: ISIC rev.4 ecoinvent: 0311:Marine fishing
Scenario: Business-as-Usual
System model: Allocation, cut-off by classification
Generated by: [System]
Published in: Avadí, A. 2018
Database: ecoinvent
isCopyrightProtected: true
accessRestrictedTo: 1

## General comment
This dataset represents the maintenance of steel trawlers, per 1000 kg of light ship weight, based on data from Peru (2004-3013), corresponding to 9 vessels (from a fleet of 54) for which data was avilable with different levels of detail. Specific data for specific inventory items may be based on sub-samples for which detailed data was available. Vessel dimensions: 34 - 275 m3 (16 - 34 m length).
System boundaries and relation between activities

## Included activities start
Maintenance of vessels, including provision of all materials and work

## Included activities end
End of life of replaced materials. Batteries are excluded, as they do not exist in the database

## Geography
Data from Peru, extrapolated to global (GLO)

## Technology
Peru features various shipyards and relevant ship-building and ship-retrofitting expertise.

## Reference product
- trawler maintenance, steel: 1 kg; name LSW; = steel+copper+nylon+engine*1000+paint+gear+rubber; source Angel Avadí 2017; By-product classification allocatable product; CPC 8729: Maintenance and repair services of other goods n.e.c.
  Maintenance of a steel trawler, per 1000 kg of light ship weight (LSW) over its lifetime. Regressions based on mainly primary data were created to relate the weight of each inventory item to a purse seiner's LSW, adjusted for trawler's gear. The list of inventory items (granularity) contribute >95% of environmental impacts, as described in the reference publication.
  production volume 0.997077 kg; name prod_vol
    Unquantifiable
  property price 1.6286 EUR2005
    Calculated based on inputs: The price of the product has been calculated as a sum of the values of the material and energy inputs for this product. This value is therefore a rough estimation. It may underestimate the real price since there are additional expenses when producing any product. These expences can include for example labour costs, treatment of waste materials and profit for the producer. Please consider carefully whether this level of data quality is acceptable for your application.
  properties: carbon allocation 0 kg, carbon content 0

## Inputs from technosphere
All rows: source Angel Avadí 2017
- alkyd paint, white, without solvent, in 60% solution state: 0.256338 kg; triangular min 0.221776, mostLikely 0.262098, max 0.28514, pedigree (1,3,2,5,1)
  Hull and deck paint, including antifouling, maintenance, every 2 years
  Uncertainty: Data from 9 vessels
  properties: carbon content, fossil 0.140367, carbon content, non-fossil 0.199629, dry mass 1 kg, heating value, net 10.3 MJ, wet mass 1 kg
  note on carbon content, fossil: C content was calculated as an addition of C content in the raw materials.
- alkyd paint, white, without solvent, in 60% solution state: 0.0539986 kg; triangular min 0.0467179, mostLikely 0.055212, max 0.0600658, pedigree (1,3,2,5,1)
  (same comment as for alkyd paint, white, without solvent, in 60% solution state)
- copper scrap, sorted, pressed: -0.0486649 kg; name BP_amount_4; = copper
  Waste copper wire
  production volume; = prod_vol * (BP_amount_4 / LSW)
    Calculated from production volume of reference product using the relative outputs.
  properties: dry mass 1 kg, price 2.84 EUR2005, wet mass 1 kg
- copper, cathode: 0.0486649 kg; = copper
  Copper wire for electric circuit construction, 50% recycled
  properties: dry mass 1 kg, wet mass 1 kg
- iron scrap, unsorted: -0.497493 kg; name BP_amount_5; = steel+gear
  Waste steel from hull and fishing gear
  production volume; = prod_vol * (BP_amount_5 / LSW)
    Calculated from production volume of reference product using the relative outputs.
  properties: dry mass 1 kg, price 0.149 EUR2005, wet mass 1 kg
- marine engine: 0.000109129 unit; name engine; triangular min 0.000103943, mostLikely 0.000103943, max 0.000119502, pedigree (3,3,2,5,1)
  Marine diesel engine maintenance, 1 replacement over the lifespan
  Uncertainty: Data from 54 vessels, assumptions on replacement/maintenance
  property lifetime 15 year; name engine_lifetime
  property lifetime capacity [h] 8000 hour; name engine_lifetime_capacity_PMH
- nylon 6-6: 0.0161856 kg; triangular min 0.0120026, mostLikely 0.0143505, max 0.0222037, pedigree (2,3,2,5,1)
  Fishing net maintenance, 40% every 10 years
  Uncertainty: Data from 9 vessels
  properties: carbon content, fossil 0.637168, dry mass 1 kg, heating value, net 30.9 MJ, wet mass 1 kg
  note on heating value, net: Assumed equal to Nylon-66. Reference: Walters, R. N., Hackett, S. M. and Lyon, R. E. (2000) ‘Heats of combustion of high temperature polymers’, Fire and Materials, 24(5), pp. 245–252. doi: 10.1002/1099-1018(200009/10)24:5<245::AID-FAM744>3.0.CO;2-7.
- nylon 6-6: 0.00799338 kg; triangular min 0.00592757, mostLikely 0.00708709, max 0.0109655, pedigree (2,3,2,5,1)
  Fishing net maintenance, 40% every 10 years
  Uncertainty: Data from 9 vessels
- steel, low-alloyed: 0.125772 kg; name gear; triangular min 0.0635467, mostLikely 0.0931479, max 0.22062, pedigree (2,3,2,5,1)
  Fishing net maintenance, 40% every 10 years
  Uncertainty: Data from 9 vessels
  properties: carbon content, fossil 0.005, dry mass 1 kg, wet mass 1 kg
- steel, low-alloyed, hot rolled: 0.371722 kg; name steel; triangular min 0.356714, mostLikely 0.377494, max 0.380957, pedigree (2,3,2,5,1)
  Steel hull, sheets, 12% replacement every 2 years; transmission, structural elements
  Uncertainty: Data from 9 vessels
  property carbon content, non-fossil 0; name steel_C_content_non_fossil
  properties: carbon content, fossil 0.005, dry mass 1 kg, wet mass 1 kg
  note on carbon content, fossil: Low alloyed steel composition given in Tab. 3.2 ecoinvent v2.2 report 10_partII. Steel assumed to have a C content of 0.5%
  note on carbon content, non-fossil: Low alloyed steel composition given in Tab. 3.2 ecoinvent v2.2 report 10_partII.
- synthetic rubber: 0.0101968 kg; name rubber; triangular min 0.00515881, mostLikely 0.00833774, max 0.0170938, pedigree (2,3,2,5,1)
  Fishing net maintenance, 40% every 10 years
  Uncertainty: Data from 9 vessels
  property carbon content, fossil 0.871949; name rubber_CCF
  property carbon content, non-fossil 0; name rubber_CCNF
  property dry mass 1 kg; name rubber_DM
  property water content 0; name rubber_WC
  property water in wet mass 0 kg; name rubber_WWM
  properties: heating value, net 26.42 MJ, wet mass 1 kg
  note on carbon content, fossil: EPDM (Ethylene-propene-diene terpolymer) rubber is a terpolymer of ethylene, propene, and a diene with the residual unsaturated portion of the diene in the side chain (ecoinvent v2.2 report 7-part XX & Ullmann). Chemical formula (deduced from Evidences of Solvent-Induced Miscibility in Polychloroprene-co-Ethylene-Propene Diene Terpolymer Blends, Dubey et al., Journal of Applied Polymer Science, 2009, 111:1884–1891): C20H35
- waste paint on metal: -0.102575, -0.000870689 kg (2 suppliers, which the file names only by identifier); sum of these -0.103446 kg; = paint*1/3
  Waste paint, 2/3 of solids emitted to ocean
  production volume; = prod_vol * (BP_amount_3 / LSW)
    Calculated from production volume of reference product using the relative outputs.
  properties: carbon content, fossil 0.140367, carbon content, non-fossil 0.199629, dry mass 1 kg, heating value, net 19.7 MJ, wet mass 1 kg
- waste plastic, mixture: -6.3396e-6, -0.000262306, -6.02004e-6, -0.0236581, -0.000229717, -1.53488e-5, -1.1608e-6 kg (7 suppliers, which the file names only by identifier); sum of these -0.024179 kg; = nylon
  Waste nylon
  production volume; = prod_vol * (BP_amount_2 / LSW)
    Calculated from production volume of reference product using the relative outputs.
  properties: carbon content, fossil 0.637168, dry mass 1 kg, heating value, net 30.79 MJ, wet mass 1 kg
  note on heating value, net: Value taken from the general comment of the treatment dataset.
- waste rubber, unspecified: -0.000162744, -0.00615731, -0.00387672 kg (3 suppliers, which the file names only by identifier); sum of these -0.0101968 kg; = rubber
  Waste rubber
  production volume; = prod_vol * (BP_amount_1 / LSW)
    Calculated from production volume of reference product using the relative outputs.
  properties: carbon content, fossil 0.871949, dry mass 1 kg, heating value, net 27.19 MJ, wet mass 1 kg
- wire drawing, copper: 0.0486649 kg; name copper; triangular min 0.045893, mostLikely 0.0496507, max 0.050451, pedigree (3,3,2,5,1)
  Manufacture of copper wire, 1.5 replacements over lifetime
  Uncertainty: Assumptions on replacement rates

## Emissions to nature
- Solids, inorganic [water, ocean]: 0.206891 kg; = paint*2/3; source Avadí, A. 2018
  Waste paint, 2/3 of solids emitted to ocean
