# acetamide-anillide-compound production, unspecified

Dataset: EcoSpold 2, unit process
Geography: RER
Time period: 2000-01-01 to 2023-12-31
Technology level: current
Classification: ISIC rev.4 ecoinvent: 2021:Manufacture of pesticides and other agrochemical products
Classification: EcoSpold01Categories: agricultural means of production/pesticides
Tags: ConvertedDataset
Scenario: Business-as-Usual
System model: Allocation, cut-off by classification
Share of production covered: 100 %
Generated by: Jürgen Sutter
Published in: Sutter, J. 2007
Database: ecoinvent
isCopyrightProtected: true
accessRestrictedTo: 1

## General comment
This dataset represents the production of acetamide-anilide-compounds (1 kg of active ingredient). Raw materials are modelled with a stoichiometric calculation. Energy consumption is modelled with data from a similar process. The emissions are estimated. Infrastructure is included with a default value.
This dataset represents the production of acetamide-anilide-compounds (1 kg of active ingredient). Raw materials are modelled with a stoichiometric calculation. Energy consumption is modelled with data from a similar process. The emissions are estimated. Infrastructure is included with a default value.

## Included activities start
From reception of precursors (acetaldehyde, acetic anhydride, acetone, ammonia, bromine, carbon monoxide, chlorine, cumene, ethylene, ethylenediamine, hydrochloric acid, hydrogen, hydrogen cyanide, hydrogen fluoride, hydrogen sulfide, methanol, naphtha, nitric acid, nitrobenzene, oxygen, p-dichlorobenzene, phosgene, propylene oxide, sodium hydroxide, sodium hypochlorite, sulfur, sulfur dioxide, sulfuric acid, toluene, trichloromethane, water decarbonized, "water, salt, sole", and xylene) at the factory gate.

## Included activities end
This activity ends with acetamide-anilide-compounds at the factory gate. The dataset includes the input materials, energy uses, infrastructure and emissions. The dataset doesn't include emulsives, additives etc.

## Geography
The inventory is modelled for Europe.

## Technology
Acetamide-anilide-compounds are herbicides with an anilide functional group. Amides are usually produced by reacting an amine with an acid (acetanilide) or an acid chloride (chloroacetanilide).
The dataset acetamide-anilide-compounds was calculated from the arithmetic mean of all inputs and outputs of the production of diflufenican, dimethenamid, metazachlor, metolachlor, napropamide, phenmedipham, and S-metolachlor.
Diflufenican is produced in eight steps from acetaldehyde:
3 C2H4O → C6H12O3
4 C6H12O3 + 3 NH3 → 3 C8H11N + 12 H2O
C8H11N + 8 HNO3 → C7H5NO4 + 7 H2O + 5 NO + CO2 + 3 NO2
C7H5NO4 → C6H5NO2 + CO2
C6H5NO2 + Cl2 → C6H4NO2Cl + HCl
C6H4NO2Cl + C7H5F3O → C13H8F3NO3 + HCl
C13H8F3NO3 + SOCl2 → C13H7F3NClO2 + HCl + SO2
C13H7F3NClO2 + C6H5NF2 → C19H11F5N2O2 + HCl
Precursors that are used for the diflufenican production are trifluoromethyl phenol (C6H5NF2), thionyl chloride (SOCl2), and 2,4-difluoro aniline (C6H2F2NO2).
Dimethenamide is produced in nine steps from ethylene:
C2H4 + CO + H2O → C3H6O2
C3H6O2 + Cl2 → C3H5ClO + HCl
C3H5ClO + NaSH + H2O → C3H5O2SNa + HCl + H2
C3H5O2SNa + HCl → C3H6O2S + NaCl
C3H6O2S + C4H6O2 → C7H12O4S
C7H12O4S → C6H10OS + CO2 + H2O
C6H10OS + C4H11NO → C10H19NOS + H2O
2 C10H19NOS + 2 SOCl2 → 2 C10H17NOS + SO2 + S + 4 HCl
C10H17NOS + C2H2Cl2O → C12H18ClNO2S + HCl
Precursors that are used for the dimethenamide production are chloroacetyl chloride (C2H2Cl2O), methacrylic acid (C4H6O2), 1-methoxy-2-amino-propane (C4H11NO), sodium hydrosulfide (NaSH), and thionyl chloride (SOCl2).
Metazachlor is produced in five steps from xylene:
C8H10 + HNO3 → C8H9NO2 + H2O
C6H5N3O4 + H2 → C8H11N + H2O
C8H11N + C2H3Cl2O → C10H14NClO + HCl
3 C10H12NClO + C3H6O3 + 3 HCl → 3 C11H14NCl2O + 3 H2O
C11H14NCl2O + C3H4N2 → C14H16ClN3O + HCl
Precursors that are used for the metazachlor production are chloroacetyl chloride (C2H2Cl2O), paraformaldehyde (C3H6O3), pyrazole (C3H4N2), and thionyl chloride (SOCl2).
Metolachlor is produced in five steps from toluene:
C8H10 + HNO3 → C8H9NO2 + H2O
C7H7NO2 + 3 H2 → C7H9N + 2 H2O
C7H9N + C2H4 → C9H14N
C9H14N + C4H8O2 + H2 → C13H21ON + H2O
C13H21ON + C2H2Cl2O → C15H22ClNO2 + HCl
Precursors that are used for the metolachlor production are chloroacetyl chloride (C2H2Cl2O), methoxyacetone (C4H7O2), and thionyl chloride (SOCl2).
Napropamide is produced in five steps from ethylene:
C2H4 + CO + H2O → C3H6O2
C3H6O2 + Br2 → C3H5BrO2 + HBr
C3H5BrO2 + SOCl2 → C3H4BrClO + SO2 + HCl
C3H4BrClO + C4H11N → C7H14NBrO + HCl
C7H14NBrO + C10H8O → C17H21NO2 + HBr
Precursors that are used for the napropamide production are -naphthol (C10H8O3S) and thionyl chloride (SOCl2).
Phenmedipham is produced in six steps from nitrobenzene:
C6H5NO2 + H2SO4 → C6H5NO5S + H2O
C6H5NO5S + 3 H2 → C6H7O3S + 2 H2O
7C6H7NO3S + 3 NaOH → C6H6NONa + Na2SO3 + 2 H2O
C6H6NONa + H2SO4 → C6H7NO + NaHSO4
C6H7NO + C2H3ClO2 → C8H9NO2 + HCl
C8H9NO2 + C8H7NO → C16H16N2O3
Precursors that are used for the phenmedipham production are m-isocyanato toluene (C8H7NO) and methyl chloroformate (C2H3ClO2).
Precursors:
Chloroacetyl chloride (C2H2Cl2O) is produced in two steps from acetic acid:
C2H4O2 + Cl2 → C2H3ClO2 + HCl
C2H3ClO2 + SOCl2 → C2H2Cl2O + HCl + SO2
2,4-Difluoro aniline (C6H2F2NO2) is produced in four steps from p-dichlorobenzene:
C6H4Cl2 + Cl2 → C6H3Cl3 + HCl
C6H3Cl3 + HNO3 → C6H2Cl3NO2 + H2O
C6H2Cl3NO2 + 2 HF → C6H2ClF2NO2 + 2 HCl
C6H2ClF2NO2 + H2 → C6H2F2NO2 + HCl
Methacrylic acid (C4H6O2) is produced in three steps from acetone:
C3H6O + HCN → C4H7NO
C4H7NO + H2SO4 → C4H9NO5S
C4H9NO5S + H2O → C4H6O2 + NH4HSO4
Methyl chloroformate (C2H3ClO2) is produced from methanol and phosgene:
CH4O + CCl2O → C2H3ClO2 + HCl
Methoxyacetone (C4H7O2) is produced in three steps from cumene :
C9H12 + O2 → C9H12O2
C9H12O2 + C3H6O → C3H6O2 + C9H12O
C3H6O2 + CH4O → C4H7O2 + H2O
1-Methoxy-2-amino-propane (C4H11NO) is produced in two steps from propylene oxide:
C3H6O + NH3 → C3H9NO
C3H9NO + CH4O → C4H11NO + H2O
m-Isocyanato toluene (C8H7NO) is produced in three steps from toluene:
C7H8 + HNO3 → C7H7NO2 + 2 H2O
C7H7NO2 + 3 H2 → C7H9N + 2 H2O
C7H9N + CCl2O → C8H7NO + 2 HCl
-Naphthol (C10H8O3S) is produced in two steps from naphthalene:
C10H8 + H2SO4 → C10H8O3S + H2O
C10H8O3S + 2 NaOH → C10H8O + Na2SO4 + H2O
Paraformaldehyde (C3H6O3) is produced from formaldehyde:
3 CH2O → C3H6O3
Pyrazole (C3H4N2) is produced in four steps from sodium hypochlorite:
NaOCl + NH3 → NH2Cl + NaOH
NH2Cl + NaOH + NH3 → N2H4 + NaCl + H2O
N2H4 + CHCl3 → CH2N2 + 3 HCl
CH2N2 + C2H4 → C3H4N2 + H2
Sodium hydrogen sulfide (NaSH) is produced from hydrogen sulfide and sodium hydroxide:
H2S + NaOH → NaSH + H2O
3-Trifluoromethyl phenol (C6H5NF2) is produced in five steps from toluene:
C7H8 + Cl2 → C7H7Cl
C7H7Cl + NaOH → C7H7ONa
C7H7ONa + HCl → C7H8O + NaCl
C7H8O + 3 Cl2 → C7H5Cl3O + 3 HCl
C7H5Cl3O + 3 HF → C7H5F3O + 3 HCl
Thionyl chloride (SOCl2) is produced in two steps from sulphur:
S + Cl2 → SCl2
SCl2 + SO2 + Cl2 → 2 SOCl2

## Time period
Time of publications

## Parameters
- fraction, cooling water, cooling pond system, to air: 0.032 dimensionless; name fraction_CW_CP_to_air; lognormal variance with pedigree 0.0413, pedigree (2,3,1,3,1)
  Calculated based on literature value (Scown, C.D., 2011, Water Footprint of U.S. Transportation Fuels and supplying information of the article) (Vionnet, S., Quantis Water Database - Technical Report, 2012).
- fraction, cooling water, once-through system, to air: 0.004 dimensionless; name fraction_CW_OT_to_air; lognormal variance with pedigree 0.0413, pedigree (2,3,1,3,1)
  (same comment as for fraction, cooling water, cooling pond system, to air)
- fraction, cooling water, recirculating system, to air: 0.771 dimensionless; name fraction_CW_R_to_air; lognormal variance with pedigree 0.0413, pedigree (2,3,1,3,1)
  (same comment as for fraction, cooling water, cooling pond system, to air)
- fraction, cooling water, to air: 0.3875 dimensionless; name fraction_CW_to_air; = (0.5*fraction_CW_OT_to_air)+(0.5*fraction_CW_R_to_air); lognormal variance with pedigree 0.092025, pedigree (4,4,3,2,4)
  Calculated value based on literature value (see comments of the other parametres present in this dataset) and expert opinion. In the case when no industry/literature data are available about the type of cooling or directly fraction, cooling water, to air specific for the process a default assumption is applied. It is assumed that the once-through cooling system is used in 50% of all cases and recirculating system is used in another 50% of all cases.
- fraction, process water, to air: 0.205 dimensionless; name fraction_PW_to_air; lognormal variance with pedigree 0.092025, pedigree (4,4,3,2,4)
  Literature value (Statistics Canada, 2007 & Shaffer, K.H., 2008, Consumptive water use in the Great Lakes Basin, USGS) (Vionnet, S., Quantis Water Database - Technical Report, 2012).
- fraction, water, decarbonised, to air: 0.3875 dimensionless; name fraction_WDC_to_air; = fraction_CW_to_air; lognormal variance with pedigree 0.092025, pedigree (4,4,3,2,4)
  Calculated value. See comments in the other parametres present in this dataset. Decarbonised water is considered to be always used as cooling water, thus cooling water fractions to air are applied to all carbonised water input flows to calculate the amount of water consumed in the processes.

## Reference product
- acetamide-anillide-compound, unspecified: 1 kg; By-product classification allocatable product; CPC 34663: Herbicides, anti-sprouting products and plant-growth regulators; HS2017 380893: Herbicides, anti-sprouting products and plant-growth regulators; other than containing goods of Subheading [...]
  EcoSpold01Location=RER
  Acetamide-anilide-compounds can have different modes of action as herbicides. Diflufenican is an inhibitor of the phytoene desaturase (PDS); dimethenamid, metazachlor, metolachlor, napropamide and S-metolachlor are inhibitors of synthesis of very long fatty acids; and phenmedipham is an inhibitor of photosynthesis at photosystem II site A.
  production volume 4.56912e7 kg
    Unknown
    The addition of the consumption volumes in the US in 2002 (from USGS, 2002 Pesticide use Maps) of the acetamide-anillide-compoundsacetochlor, alachlor, cloransulam, diclosulam, dimethenamid, fenhexamid, flufenacet, flumetsulam, flutolanil, mefenoxam, napropamide, naptalam, pronamide (propyzamide), propanil, sulfentrazone, trif-orine, zoxamide has been used to estimate the production volumes of this type of pesticide in the Europe. For that, it has been extrapolated to a Global production mix using the ha of Arable land and Permanent crops of US versus the ha of Arable land and Permanent crops in the Europe in 2002 (299/179 million ha; FAOSTAT).
  property carbon content, fossil 0.659175
    Approximated as an unweighted average of the C-content of the acetamide-anillide-compound (Tab 2.25 Sutter, 2010) alachor, metolachlor, propachlor and teflubenzuron
  property price 4.18323 EUR2005
    Calculated based on inputs: The price of the product has been calculated as a sum of the values of the material and energy inputs for this product. This value is therefore a rough estimation. It may underestimate the real price since there are additional expenses when producing any product. These expences can include for example labour costs, treatment of waste materials and profit for the producer. Please consider carefully whether this level of data quality is acceptable for your application.
  properties: carbon allocation 0.659175 kg, carbon content 0.659175, carbon content, non-fossil 0, dry mass 1 kg, water content 0, water in wet mass 0 kg, wet mass 1 kg

## Inputs from technosphere
- acetaldehyde: 0.093245 kg; source Unger T A 1996; lognormal variance with pedigree 0.076, pedigree (4,5,5,1,1)
  EcoSpold01Location=RER
  Stoichiometric calculation, assuming an efficiency of 95% per reaction step.
  Further references:
  Eckert et al. 2006 Marc Eckert, Gerald Fleischmann, Reinhard Jira, Hermann M. Bolt, Klaus Golka: Acetaldehyde. In: Ullmann's Encyclopedia of Industrial Chemistry, Seventh Edition, 2009 Electronic Release (ed. Fiedler E., Grossmann G., Kersebohm D., Weiss G. and Witte C.). 7 th Electronic Release Edition. Wiley InterScience, New York, Article Online Posting Date: December 15, 2006. Online-Version under: DOI: 10.1002/14356007.a01_031.pub2
  Shimizu et al. 2000. Shinkichi Shimizu, Nanao Watanabe, Toshiaki Kataoka, Takayuki Shoji, Nobuyuki Abe, Sinji Morishita, Hisao Ichimura: Pyridine and Pyridine Derivatives. In: Ullmann's Encyclopedia of Industrial Chemistry, Seventh Edition, 2009 Electronic Release (ed. Fiedler E., Grossmann G., Kersebohm D., Weiss G. and Witte C.). 7 th Electronic Release Edition. Wiley InterScience, New York, Article Online Posting Date: June 15, 2000. Online-Version under: DOI: 10.1002/14356007.a22_399
  Uncertainty: Stoechiometric calculation
  properties: carbon content, fossil 0.545296, dry mass 1 kg, heating value, net 27.53 MJ, wet mass 1 kg
- acetic anhydride: 0.16479 kg; source Unger T A 1996; lognormal variance with pedigree 0.076, pedigree (4,5,5,1,1)
  EcoSpold01Location=RER
  Stoichiometric calculation, assuming an efficiency of 95% per reaction step.
  Uncertainty: Stoechiometric calculation
  properties: carbon content, fossil 0.470588, dry mass 1 kg, heating value, net 21.38 MJ, wet mass 1 kg
- acetone, liquid: 0.074053 kg; source Kim S. 2003; lognormal variance with pedigree 0.076, pedigree (4,5,5,1,1)
  EcoSpold01Location=RER
  Stoichiometric calculation, assuming an efficiency of 95% per reaction step.
  Further references:
  Eller et al. 2000. Karsten Eller, Erhard Henkes, Roland Rossbacher, Hartmut Höke: Amines, Aliphatic. In: Ullmann's Encyclopedia of Industrial Chemistry, Seventh Edition, 2009 Electronic Release (ed. Fiedler E., Grossmann G., Kersebohm D., Weiss G. and Witte C.). 7 th Electronic Release Edition. Wiley InterScience, New York, Article Online Posting Date: June 15, 2000. Online-Version under: DOI: 10.1002/14356007.a02_001
  Bauer 2000. William Bauer Jr.: Methacrylic Acid and Derivatives. In: Ullmann's Encyclopedia of Industrial Chemistry, Seventh Edition, 2009 Electronic Release (ed. Fiedler E., Grossmann G., Kersebohm D., Weiss G. and Witte C.). 7 th Electronic Release Edition. Wiley InterScience, New York, Article Online Posting Date: June 15, 2000. Online-Version under: DOI: 10.1002/14356007.a16_441
  Uncertainty: Stoechiometric calculation
  properties: carbon content, fossil 0.62069, dry mass 1 kg, heating value, net 31.32 MJ, wet mass 1 kg
- ammonia, anhydrous, liquid: 0.053252 kg; source Unger T A 1996; lognormal variance with pedigree 0.076, pedigree (4,5,5,1,1)
  EcoSpold01Location=RER
  Stoichiometric calculation, assuming an efficiency of 95% per reaction step.
  Further references:
  Bauer 2000. William Bauer Jr.: Methacrylic Acid and Derivatives. In: Ullmann's Encyclopedia of Industrial Chemistry, Seventh Edition, 2009 Electronic Release (ed. Fiedler E., Grossmann G., Kersebohm D., Weiss G. and Witte C.). 7 th Electronic Release Edition. Wiley InterScience, New York, Article Online Posting Date: June 15, 2000. Online-Version under: DOI: 10.1002/14356007.a16_441
  Eckert et al. 2006 Marc Eckert, Gerald Fleischmann, Reinhard Jira, Hermann M. Bolt, Klaus Golka: Acetaldehyde. In: Ullmann's Encyclopedia of Industrial Chemistry, Seventh Edition, 2009 Electronic Release (ed. Fiedler E., Grossmann G., Kersebohm D., Weiss G. and Witte C.). 7 th Electronic Release Edition. Wiley InterScience, New York, Article Online Posting Date: December 15, 2006. Online-Version under: DOI: 10.1002/14356007.a01_031.pub2
  Eller et al. 2000. Karsten Eller, Erhard Henkes, Roland Rossbacher, Hartmut Höke: Amines, Aliphatic. In: Ullmann's Encyclopedia of Industrial Chemistry, Seventh Edition, 2009 Electronic Release (ed. Fiedler E., Grossmann G., Kersebohm D., Weiss G. and Witte C.). 7 th Electronic Release Edition. Wiley InterScience, New York, Article Online Posting Date: June 15, 2000. Online-Version under: DOI: 10.1002/14356007.a02_001
  Kim et al. 2003. Kim S., Overcash M.: Energy in chemical manufacturing processes: gate-to-gate information for life cycle assessment. In: Journal of Chemical Technology & Biotechnology vol. 78, no. 9: 995-1005(11). 2003
  Klemm et al. 2000. Alfred Klemm, Gabriele Hartmann, Ludwig Lange: Sodium and Sodium Alloys. In: Ullmann's Encyclopedia of Industrial Chemistry, Seventh Edition, 2009 Electronic Release (ed. Fiedler E., Grossmann G., Kersebohm D., Weiss G. and Witte C.). 7 th Electronic Release Edition. Wiley InterScience, New York, Article Online Posting Date: June 15, 2000. Online-Version under: DOI: 10.1002/14356007.a24_277
  Shimizu et al. 2000. Shinkichi Shimizu, Nanao Watanabe, Toshiaki Kataoka, Takayuki Shoji, Nobuyuki Abe, Sinji Morishita, Hisao Ichimura: Pyridine and Pyridine Derivatives. In: Ullmann's Encyclopedia of Industrial Chemistry, Seventh Edition, 2009 Electronic Release (ed. Fiedler E., Grossmann G., Kersebohm D., Weiss G. and Witte C.). 7 th Electronic Release Edition. Wiley InterScience, New York, Article Online Posting Date: June 15, 2000. Online-Version under: DOI: 10.1002/14356007.a22_399
  Uncertainty: Stoechiometric calculation
  properties: dry mass 1 kg, wet mass 1 kg
- carbon monoxide: 0.11396 kg; source Unger T A 1996; lognormal variance with pedigree 0.076, pedigree (4,5,5,1,1)
  EcoSpold01Location=RER
  Stoichiometric calculation, assuming an efficiency of 95% per reaction step.
  Further references:
  Samel et al. 2000. Ulf-Rainer Samel, Walter Kohler, Armin Otto Gamer, Ullrich Keuser: Propionic Acid and Derivatives. In: Ullmann's Encyclopedia of Industrial Chemistry, Seventh Edition, 2009 Electronic Release (ed. Fiedler E., Grossmann G., Kersebohm D., Weiss G. and Witte C.). 7 th Electronic Release Edition. Wiley InterScience, New York, Article Online Posting Date: June 15, 2000. Online-Version under: DOI: 10.1002/14356007.a22_223
  Uncertainty: Stoechiometric calculation
  properties: carbon content, fossil 0.428571, dry mass 1 kg, heating value, net 12.99 MJ, wet mass 1 kg
  note on carbon content, fossil: CO. It is assumed that CO is produced from partial combustion of heavy heating oil.
- chemical factory, organics: 2.9509e-9 unit; lognormal variance with pedigree 0.448, pedigree (4,5,5,5,5)
  Estimation, based on a production capacity of 50,000 t per year and a plant life time of 50 years, therefore an amount of 4X10-10 units per kg of produced chemical is aded to the unit process of the respective chemical. The amount is accounted for each production step. This might be an overestimation in some multistep syntheses
  EcoSpold01Location=RER
  Uncertainty: Estimation
- chlorine, liquid: 0.76645 kg; source Unger T A 1996; lognormal variance with pedigree 0.076, pedigree (4,5,5,1,1)
  Stoichiometric calculation, assuming an efficiency of 95% per reaction step.
  Further references:
  Booth 2000. Gerald Booth: Nitro Compounds, Aromatic. In: Ullmann's Encyclopedia of Industrial Chemistry, Seventh Edition, 2009 Electronic Release (ed. Fiedler E., Grossmann G., Kersebohm D., Weiss G. and Witte C.). 7 th Electronic Release Edition. Wiley InterScience, New York, Article Online Posting Date: June 15, 2000. Online-Version under: DOI: 10.1002/14356007.a17_411
  Eckert et al. 2006 Marc Eckert, Gerald Fleischmann, Reinhard Jira, Hermann M. Bolt, Klaus Golka: Acetaldehyde. In: Ullmann's Encyclopedia of Industrial Chemistry, Seventh Edition, 2009 Electronic Release (ed. Fiedler E., Grossmann G., Kersebohm D., Weiss G. and Witte C.). 7 th Electronic Release Edition. Wiley InterScience, New York, Article Online Posting Date: December 15, 2006. Online-Version under: DOI: 10.1002/14356007.a01_031.pub2
  Kim et al. 2003. Kim S., Overcash M.: Energy in chemical manufacturing processes: gate-to-gate information for life cycle assessment. In: Journal of Chemical Technology & Biotechnology vol. 78, no. 9: 995-1005(11). 2003
  Samel et al. 2000. Ulf-Rainer Samel, Walter Kohler, Armin Otto Gamer, Ullrich Keuser: Propionic Acid and Derivatives. In: Ullmann's Encyclopedia of Industrial Chemistry, Seventh Edition, 2009 Electronic Release (ed. Fiedler E., Grossmann G., Kersebohm D., Weiss G. and Witte C.). 7 th Electronic Release Edition. Wiley InterScience, New York, Article Online Posting Date: June 15, 2000. Online-Version under: DOI: 10.1002/14356007.a22_223
  Shimizu et al. 2000. Shinkichi Shimizu, Nanao Watanabe, Toshiaki Kataoka, Takayuki Shoji, Nobuyuki Abe, Sinji Morishita, Hisao Ichimura: Pyridine and Pyridine Derivatives. In: Ullmann's Encyclopedia of Industrial Chemistry, Seventh Edition, 2009 Electronic Release (ed. Fiedler E., Grossmann G., Kersebohm D., Weiss G. and Witte C.). 7 th Electronic Release Edition. Wiley InterScience, New York, Article Online Posting Date: June 15, 2000. Online-Version under: DOI: 10.1002/14356007.a22_399
  EcoSpold01Location=RER
  Uncertainty: Stoechiometric calculation
  properties: dry mass 1 kg, wet mass 1 kg
- chloroform: 0.10605 kg; source Unger T A 1996; lognormal variance with pedigree 0.076, pedigree (4,5,5,1,1)
  (same comment as for acetic anhydride)
  properties: carbon content, fossil 0.101695, dry mass 1 kg, heating value, net 4.06 MJ, wet mass 1 kg
- cumene: 0.21942 kg; source Unger T A 1996; lognormal variance with pedigree 0.076, pedigree (4,5,5,1,1)
  Stoichiometric calculation, assuming an efficiency of 95% per reaction step.
  EcoSpold01Location=RER
  Uncertainty: Stoechiometric calculation
  properties: carbon content, fossil 0.9, dry mass 1 kg, heating value, net 39.35 MJ, wet mass 1 kg
- electricity, medium voltage: 2.28456 kWh; source Gendorf 2000; lognormal variance with pedigree 0.076, pedigree (4,5,5,1,1)
  Estimation, assuming a default value, originated from calculation of avarage consumption of electricity and heat per kg of product (3.2 MJ kg-1), and a resulting amount of electricity of 0,333 kW for every reaction step per kg reaction product, considering that the demand is made up of a mix that inlcudes 38% electricity. Additionally, reaction steps are approximated with energy consumption data, assuming that inventory flows can be estimated using process data for basic operation steps, available for specific organic chemicals.
  Further references:
  Kim S., Overcash M.: Energy in chemical manufacturing processes: gate-to-gate information for life cycle assessment. In: Journal of Chemical Technology & Biotechnology vol. 78, no. 9: 995-1005(11). 2003
  EcoSpold01Location=UCTE
  Uncertainty: Estimation
- ethylene: 0.17083 kg; source Unger T A 1996; lognormal variance with pedigree 0.076, pedigree (4,5,5,1,1)
  Stoichiometric calculation, assuming an efficiency of 95% per reaction step.
  Further references:
  Samel et al. 2000. Ulf-Rainer Samel, Walter Kohler, Armin Otto Gamer, Ullrich Keuser: Propionic Acid and Derivatives. In: Ullmann's Encyclopedia of Industrial Chemistry, Seventh Edition, 2009 Electronic Release (ed. Fiedler E., Grossmann G., Kersebohm D., Weiss G. and Witte C.). 7 th Electronic Release Edition. Wiley InterScience, New York, Article Online Posting Date: June 15, 2000. Online-Version under: DOI: 10.1002/14356007.a22_223
  EcoSpold01Location=RER
  Uncertainty: Stoechiometric calculation
  properties: carbon content, fossil 0.857143, dry mass 1 kg, heating value, net 43.22 MJ, wet mass 1 kg
- ethylene diamine: 0.042639 kg; source Unger T A 1996; lognormal variance with pedigree 0.076, pedigree (4,5,5,1,1)
  (same comment as for cumene)
  properties: carbon content, fossil 0.5, dry mass 1 kg, heating value, net 28.24 MJ, wet mass 1 kg
- heat, district or industrial, natural gas: 16.2777 MJ; source Gendorf 2000; lognormal variance with pedigree 0.076, pedigree (4,5,5,1,1)
  Estimation, assuming a default value, originated from calculation of avarage consumption of electricity and heat per kg of product (3.2 MJ kg-1), and a resulting amount of heat of 2 MJ for every reaction step per kg reaction product, considering that the demand is made up of a mix that includes 50% natural gas. Additionally, reaction steps are approximated with energy consumption data, assuming that inventory flows can be estimated using process data for basic operation steps, available for specific organic chemicals.
  Further references:
  Kim S., Overcash M.: Energy in chemical manufacturing processes: gate-to-gate information for life cycle assessment. In: Journal of Chemical Technology & Biotechnology vol. 78, no. 9: 995-1005(11). 2003
  Uncertainty: Estimation
  properties: heating value, net 1 MJ
- heat, district or industrial, other than natural gas: 9.08552 MJ; source Gendorf 2000; lognormal variance with pedigree 0.076, pedigree (4,5,5,1,1)
  Estimation, assuming a default value, originated from calculation of avarage consumption of electricity and heat per kg of product (3.2 MJ kg-1), and a resulting amount of heat of 2 MJ for every reaction step per kg reaction product, considering that the demand is made up of a mix that inlcudes 12% steam from external energy sources. Additionally, reaction steps are approximated with energy consumption data, assuming that inventory flows can be estimated using process data for basic operation steps, available for specific organic chemicals.
  Further references:
  Kim S., Overcash M.: Energy in chemical manufacturing processes: gate-to-gate information for life cycle assessment. In: Journal of Chemical Technology & Biotechnology vol. 78, no. 9: 995-1005(11). 2003
  Uncertainty: Estimation
  properties: heating value, net 1 MJ
- hydrochloric acid, without water, in 30% solution state: 0.20462 kg; source Unger T A 1996; lognormal variance with pedigree 0.076, pedigree (4,5,5,1,1)
  Stoichiometric calculation, assuming an efficiency of 100%.
  Further references:
  Kim et al. 2003. Kim S., Overcash M.: Energy in chemical manufacturing processes: gate-to-gate information for life cycle assessment. In: Journal of Chemical Technology & Biotechnology vol. 78, no. 9: 995-1005(11). 2003
  Samel et al. 2000. Ulf-Rainer Samel, Walter Kohler, Armin Otto Gamer, Ullrich Keuser: Propionic Acid and Derivatives. In: Ullmann's Encyclopedia of Industrial Chemistry, Seventh Edition, 2009 Electronic Release (ed. Fiedler E., Grossmann G., Kersebohm D., Weiss G. and Witte C.). 7 th Electronic Release Edition. Wiley InterScience, New York, Article Online Posting Date: June 15, 2000. Online-Version under: DOI: 10.1002/14356007.a22_223
  EcoSpold01Location=RER
  Uncertainty: Stoechiometric calculation
  properties: dry mass 1 kg, heating value, net 3.32 MJ, wet mass 1 kg
- hydrogen cyanide: 0.021142 kg; source Bauer W. 2009; lognormal variance with pedigree 0.076, pedigree (4,5,5,1,1)
  Stoichiometric calculation, assuming an efficiency of 95% per reaction step
  EcoSpold01Location=RER
  Uncertainty: Stoechiometric calculation
  properties: carbon content, fossil 0.444444, dry mass 1 kg, heating value, net 17.95 MJ, wet mass 1 kg
- hydrogen fluoride: 0.043625 kg; source Unger T A 1996; lognormal variance with pedigree 0.076, pedigree (4,5,5,1,1)
  Stoichiometric calculation, assuming an efficiency of 95% per reaction step.
  Further references:
  Booth 2000. Gerald Booth: Nitro Compounds, Aromatic. In: Ullmann's Encyclopedia of Industrial Chemistry, Seventh Edition, 2009 Electronic Release (ed. Fiedler E., Grossmann G., Kersebohm D., Weiss G. and Witte C.). 7 th Electronic Release Edition. Wiley InterScience, New York, Article Online Posting Date: June 15, 2000. Online-Version under: DOI: 10.1002/14356007.a17_411
  Kim et al. 2003. Kim S., Overcash M.: Energy in chemical manufacturing processes: gate-to-gate information for life cycle assessment. In: Journal of Chemical Technology & Biotechnology vol. 78, no. 9: 995-1005(11). 2003
  EcoSpold01Location=GLO
  Uncertainty: Stoechiometric calculation
  properties: dry mass 1 kg, heating value, net 6.06 MJ, wet mass 1 kg
- hydrogen sulfide: 0.026623 kg; source Lange L. 2009; lognormal variance with pedigree 0.076, pedigree (4,5,5,1,1)
  (same comment as for acetic anhydride)
  properties: dry mass 1 kg, heating value, net 7.11 MJ, wet mass 1 kg
- hydrogen, gaseous, medium pressure, merchant: 0.021403 kg; source Unger T A 1996; lognormal variance with pedigree 0.076, pedigree (4,5,5,1,1)
  EcoSpold01Location=RER
  Stoichiometric calculation, assuming an efficiency of 95% per reaction step.
  Further references:
  Booth 2000. Gerald Booth: Nitro Compounds, Aromatic. In: Ullmann's Encyclopedia of Industrial Chemistry, Seventh Edition, 2009 Electronic Release (ed. Fiedler E., Grossmann G., Kersebohm D., Weiss G. and Witte C.). 7 th Electronic Release Edition. Wiley InterScience, New York, Article Online Posting Date: June 15, 2000. Online-Version under: DOI: 10.1002/14356007.a17_411
  Kim et al. 2003. Kim S., Overcash M.: Energy in chemical manufacturing processes: gate-to-gate information for life cycle assessment. In: Journal of Chemical Technology & Biotechnology vol. 78, no. 9: 995-1005(11). 2003
  Lindner et al. 2000. Otto Lindner and Lars Rodefeld: Benzenesulfonic Acids and Their Derivatives. In: Ullmann's Encyclopedia of Industrial Chemistry, Seventh Edition, 2009 Electronic Release (ed. Fiedler E., Grossmann G., Kersebohm D., Weiss G. and Witte C.). 7 th Electronic Release Edition. Wiley InterScience, New York, Article Online Posting Date: September 15, 2000. Online-Version under: DOI: 10.1002/14356007.a03_507
  Uncertainty: Stoechiometric calculation
  properties: dry mass 1 kg, heating value, net 120.21 MJ, wet mass 1 kg
- inert waste, for final disposal: -0.21925 kg; lognormal variance with pedigree 0.036, pedigree (4,5,1,1,1)
  EcoSpold01Location=CH
  Stoichiometric calculation
  Uncertainty: Stoechiometric calculation
  production volume
    Calculated from the production volume of acetamide-anillide-compound, unspecified in proportion to the respective output amounts.
  properties: dry mass 0.995 kg, water content 0.00502513, wet mass 1 kg
- methanol: 0.12337 kg; source Unger T A 1996; lognormal variance with pedigree 0.076, pedigree (4,5,5,1,1)
  EcoSpold01Location=GLO
  Stoichiometric calculation, assuming an efficiency of 95% per reaction step.
  Further references:
  Eller et al. 2000. Karsten Eller, Erhard Henkes, Roland Rossbacher, Hartmut Höke: Amines, Aliphatic. In: Ullmann's Encyclopedia of Industrial Chemistry, Seventh Edition, 2009 Electronic Release (ed. Fiedler E., Grossmann G., Kersebohm D., Weiss G. and Witte C.). 7 th Electronic Release Edition. Wiley InterScience, New York, Article Online Posting Date: June 15, 2000. Online-Version under: DOI: 10.1002/14356007.a02_001
  Kim et al. 2003. Kim S., Overcash M.: Energy in chemical manufacturing processes: gate-to-gate information for life cycle assessment. In: Journal of Chemical Technology & Biotechnology vol. 78, no. 9: 995-1005(11). 2003
  Uncertainty: Stoechiometric calculation
  properties: carbon content, fossil 0.375, dry mass 1 kg, heating value, net 20 MJ, wet mass 1 kg
  note on heating value, net: Based on literature, page 533, Report 17: Jungbluth, N., Chudacoff, M., Dauriat, A., Dinkel, F., Doka, G., Faist Emmenegger, M., Gnansounou, E., Kljun, N., Schleiss, K., Spielmann, M., Stettler, C., Sutter, J. 2007: Life Cycle Inventories of Bioenergy. ecoinvent report No. 17, Swiss Centre for Life Cycle Inventories, Dübendorf, CH.
- naphtha: 0.078699 kg; source Unger T A 1996; lognormal variance with pedigree 0.076, pedigree (4,5,5,1,1)
  (same comment as for acetic anhydride)
  properties: carbon content, fossil 0.919743, dry mass 1 kg, heating value, net 45 MJ, wet mass 1 kg
  note on carbon content, fossil: C-content was calculated using data from Tab 3.20, ecoinvent v2.2 report 6_IV CO2 emmissions and High heating value.
- nitric acid, without water, in 50% solution state: 0.50259 kg; source Unger T A 1996; lognormal variance with pedigree 0.076, pedigree (4,5,5,1,1)
  Stoichiometric calculation, assuming an efficiency of 95% per reaction step.
  Further references:
  Booth 2000. Gerald Booth: Nitro Compounds, Aromatic. In: Ullmann's Encyclopedia of Industrial Chemistry, Seventh Edition, 2009 Electronic Release (ed. Fiedler E., Grossmann G., Kersebohm D., Weiss G. and Witte C.). 7 th Electronic Release Edition. Wiley InterScience, New York, Article Online Posting Date: June 15, 2000. Online-Version under: DOI: 10.1002/14356007.a17_411
  Eckert et al. 2006 Marc Eckert, Gerald Fleischmann, Reinhard Jira, Hermann M. Bolt, Klaus Golka: Acetaldehyde. In: Ullmann's Encyclopedia of Industrial Chemistry, Seventh Edition, 2009 Electronic Release (ed. Fiedler E., Grossmann G., Kersebohm D., Weiss G. and Witte C.). 7 th Electronic Release Edition. Wiley InterScience, New York, Article Online Posting Date: December 15, 2006. Online-Version under: DOI: 10.1002/14356007.a01_031.pub2
  Kim et al. 2003. Kim S., Overcash M.: Energy in chemical manufacturing processes: gate-to-gate information for life cycle assessment. In: Journal of Chemical Technology & Biotechnology vol. 78, no. 9: 995-1005(11). 2003
  Shimizu et al. 2000. Shinkichi Shimizu, Nanao Watanabe, Toshiaki Kataoka, Takayuki Shoji, Nobuyuki Abe, Sinji Morishita, Hisao Ichimura: Pyridine and Pyridine Derivatives. In: Ullmann's Encyclopedia of Industrial Chemistry, Seventh Edition, 2009 Electronic Release (ed. Fiedler E., Grossmann G., Kersebohm D., Weiss G. and Witte C.). 7 th Electronic Release Edition. Wiley InterScience, New York, Article Online Posting Date: June 15, 2000. Online-Version under: DOI: 10.1002/14356007.a22_399
  EcoSpold01Location=RER
  Uncertainty: Stoechiometric calculation
  properties: dry mass 1 kg, wet mass 1 kg
- nitrobenzene: 0.079679 kg; source Unger T A 1996; lognormal variance with pedigree 0.076, pedigree (4,5,5,1,1)
  EcoSpold01Location=RER
  Stoichiometric calculation, assuming an efficiency of 95% per reaction step.
  Further references:
  Lindner et al. 2000. Otto Lindner and Lars Rodefeld: Benzenesulfonic Acids and Their Derivatives. In: Ullmann's Encyclopedia of Industrial Chemistry, Seventh Edition, 2009 Electronic Release (ed. Fiedler E., Grossmann G., Kersebohm D., Weiss G. and Witte C.). 7 th Electronic Release Edition. Wiley InterScience, New York, Article Online Posting Date: September 15, 2000. Online-Version under: DOI: 10.1002/14356007.a03_507
  Uncertainty: Stoechiometric calculation
  properties: carbon content, fossil 0.606061, dry mass 1 kg, heating value, net 22.66 MJ, wet mass 1 kg
- oxygen, liquid: 0.058511 kg; source Unger T A 1996; lognormal variance with pedigree 0.076, pedigree (4,5,5,1,1)
  Stoichiometric calculation, assuming an efficiency of 100% per reaction step.
  EcoSpold01Location=RER
  Uncertainty: Stoechiometric calculation
  properties: dry mass 1 kg, wet mass 1 kg
- p-dichlorobenzene: 0.065649 kg; source Unger T A 1996; lognormal variance with pedigree 0.076, pedigree (4,5,5,1,1)
  EcoSpold01Location=RER
  Stoichiometric calculation, assuming an efficiency of 95% per reaction step.
  Further references:
  Booth 2000. Gerald Booth: Nitro Compounds, Aromatic. In: Ullmann's Encyclopedia of Industrial Chemistry, Seventh Edition, 2009 Electronic Release (ed. Fiedler E., Grossmann G., Kersebohm D., Weiss G. and Witte C.). 7 th Electronic Release Edition. Wiley InterScience, New York, Article Online Posting Date: June 15, 2000. Online-Version under: DOI: 10.1002/14356007.a17_411
  Kim et al. 2003. Kim S., Overcash M.: Energy in chemical manufacturing processes: gate-to-gate information for life cycle assessment. In: Journal of Chemical Technology & Biotechnology vol. 78, no. 9: 995-1005(11). 2003
  Uncertainty: Stoechiometric calculation
  properties: carbon content, fossil 0.493151, dry mass 1 kg, heating value, net 18.15 MJ, wet mass 1 kg
- phosgene, liquid: 0.10614 kg; source Unger T A 1996; lognormal variance with pedigree 0.076, pedigree (4,5,5,1,1)
  Stoichiometric calculation, assuming an efficiency of 95% per reaction step.
  Assumed to be removed with an efficiency of 100% in the wastewater treatment.
  EcoSpold01Location=RER
  Uncertainty: Stoechiometric calculation
  properties: carbon content, fossil 0.122449, dry mass 1 kg, heating value, net 3.68 MJ, wet mass 1 kg
- propylene oxide, liquid: 0.038939 kg; source Kim S. 2003; lognormal variance with pedigree 0.076, pedigree (4,5,5,1,1)
  Stoichiometric calculation, assuming an efficiency of 95% per reaction step.
  Further references:
  Kim et al. 2003. Kim S., Overcash M.: Energy in chemical manufacturing processes: gate-to-gate information for life cycle assessment. In: Journal of Chemical Technology & Biotechnology vol. 78, no. 9: 995-1005(11). 2003
  EcoSpold01Location=RER
  Uncertainty: Stoechiometric calculation
  properties: carbon content, fossil 0.62069, dry mass 1 kg, heating value, net 31.32 MJ, wet mass 1 kg
- sodium hydroxide, without water, in 50% solution state: 1.0032 kg; source Unger T A 1996; lognormal variance with pedigree 0.076, pedigree (4,5,5,1,1)
  EcoSpold01Location=RER
  Stoichiometric calculation, assuming an efficiency of 100%.
  Further references:
  Kim et al. 2003. Kim S., Overcash M.: Energy in chemical manufacturing processes: gate-to-gate information for life cycle assessment. In: Journal of Chemical Technology & Biotechnology vol. 78, no. 9: 995-1005(11). 2003
  Lange et al. 2000. Ludwig Lange and Wolfgang Triebel: Sulfides, Polysulfides, and Sulfanes. In: Ullmann's Encyclopedia of Industrial Chemistry, Seventh Edition, 2009 Electronic Release (ed. Fiedler E., Grossmann G., Kersebohm D., Weiss G. and Witte C.). 7 th Electronic Release Edition. Wiley InterScience, New York, Article Online Posting Date: June 15, 2000. Online-Version under: DOI: 10.1002/14356007.a25_443
  Lindner et al. 2000. Otto Lindner and Lars Rodefeld: Benzenesulfonic Acids and Their Derivatives. In: Ullmann's Encyclopedia of Industrial Chemistry, Seventh Edition, 2009 Electronic Release (ed. Fiedler E., Grossmann G., Kersebohm D., Weiss G. and Witte C.). 7 th Electronic Release Edition. Wiley InterScience, New York, Article Online Posting Date: September 15, 2000. Online-Version under: DOI: 10.1002/14356007.a03_507
  Uncertainty: Stoechiometric calculation
  properties: dry mass 1 kg, heating value, net 3.03 MJ, wet mass 1 kg
- sodium hypochlorite, without water, in 15% solution state: 0.073694 kg; source Unger T A 1996; lognormal variance with pedigree 0.076, pedigree (4,5,5,1,1)
  (same comment as for acetic anhydride)
  properties: dry mass 1 kg, wet mass 1 kg
- sulfur: 0.026816 kg; source Kim S. 2003; lognormal variance with pedigree 0.076, pedigree (4,5,5,1,1)
  (same comment as for cumene)
  properties: dry mass 1 kg, wet mass 1 kg
- sulfur dioxide, liquid: 0.053632 kg; source Kim S. 2003; lognormal variance with pedigree 0.076, pedigree (4,5,5,1,1)
  (same comment as for cumene)
  properties: dry mass 1 kg, wet mass 1 kg
- sulfuric acid: 0.25107 kg; source Unger T A 1996; lognormal variance with pedigree 0.076, pedigree (4,5,5,1,1)
  Stoichiometric calculation, assuming an efficiency of 95% per reaction step.
  Further references:
  Bauer 2000. William Bauer Jr.: Methacrylic Acid and Derivatives. In: Ullmann's Encyclopedia of Industrial Chemistry, Seventh Edition, 2009 Electronic Release (ed. Fiedler E., Grossmann G., Kersebohm D., Weiss G. and Witte C.). 7 th Electronic Release Edition. Wiley InterScience, New York, Article Online Posting Date: June 15, 2000. Online-Version under: DOI: 10.1002/14356007.a16_441
  Lindner et al. 2000. Otto Lindner and Lars Rodefeld: Benzenesulfonic Acids and Their Derivatives. In: Ullmann's Encyclopedia of Industrial Chemistry, Seventh Edition, 2009 Electronic Release (ed. Fiedler E., Grossmann G., Kersebohm D., Weiss G. and Witte C.). 7 th Electronic Release Edition. Wiley InterScience, New York, Article Online Posting Date: September 15, 2000. Online-Version under: DOI: 10.1002/14356007.a03_507
  EcoSpold01Location=RER
  Uncertainty: Stoechiometric calculation
  properties: dry mass 1 kg, wet mass 1 kg
- toluene, liquid: 0.19523 kg; source Unger T A 1996; lognormal variance with pedigree 0.076, pedigree (4,5,5,1,1)
  (same comment as for propylene oxide, liquid)
  properties: carbon content, fossil 0.913043, dry mass 1 kg, heating value, net 38.17 MJ, wet mass 1 kg
- water, decarbonised: 2.74842e-5, 0.0286924, 0.00158399, 0.0432842, 0.00872589 kg (5 suppliers, which the file names only by identifier); sum of these 0.082314 kg; source Unger T A 1996; lognormal variance with pedigree 0.076, pedigree (4,5,5,1,1)
  Stoichiometric calculation, assuming an efficiency of 100%.
  Further references:
  Bauer 2000. William Bauer Jr.: Methacrylic Acid and Derivatives. In: Ullmann's Encyclopedia of Industrial Chemistry, Seventh Edition, 2009 Electronic Release (ed. Fiedler E., Grossmann G., Kersebohm D., Weiss G. and Witte C.). 7 th Electronic Release Edition. Wiley InterScience, New York, Article Online Posting Date: June 15, 2000. Online-Version under: DOI: 10.1002/14356007.a16_441
  Samel et al. 2000. Ulf-Rainer Samel, Walter Kohler, Armin Otto Gamer, Ullrich Keuser: Propionic Acid and Derivatives. In: Ullmann's Encyclopedia of Industrial Chemistry, Seventh Edition, 2009 Electronic Release (ed. Fiedler E., Grossmann G., Kersebohm D., Weiss G. and Witte C.). 7 th Electronic Release Edition. Wiley InterScience, New York, Article Online Posting Date: June 15, 2000. Online-Version under: DOI: 10.1002/14356007.a22_223
  Stoichiometric calculation, assuming an efficiency of 100%.
  Further references:
  Bauer 2000. William Bauer Jr.: Methacrylic Acid and Derivatives. In: Ullmann's Encyclopedia of Industrial Chemistry, Seventh Edition, 2009 Electronic Release (ed. Fiedler E., Grossmann G., Kersebohm D., Weiss G. and Witte C.). 7 th Electronic Release Edition. Wiley InterScience, New York, Article Online Posting Date: June 15, 2000. Online-Version under: DOI: 10.1002/14356007.a16_441
  Samel et al. 2000. Ulf-Rainer Samel, Walter Kohler, Armin Otto Gamer, Ullrich Keuser: Propionic Acid and Derivatives. In: Ullmann's Encyclopedia of Industrial Chemistry, Seventh Edition, 2009 Electronic Release (ed. Fiedler E., Grossmann G., Kersebohm D., Weiss G. and Witte C.). 7 th Electronic Release Edition. Wiley InterScience, New York, Article Online Posting Date: June 15, 2000. Online-Version under: DOI: 10.1002/14356007.a22_223
  EcoSpold01Location=RER
  Uncertainty: Stoechiometric calculation
  properties: wet mass 1 kg
- xylene, mixed: 0.21083 kg; source Unger T A 1996; lognormal variance with pedigree 0.076, pedigree (4,5,5,1,1)
  (same comment as for acetic anhydride)
  properties: carbon content, fossil 0.905061, dry mass 1 kg, heating value, net 38.84 MJ, wet mass 1 kg

## Inputs from nature
- Bromine [natural resource, in water]: 0.10355 kg; name bromine_input; source Unger T A 1996; lognormal variance with pedigree 0.076, pedigree (4,5,5,1,1)
  0.23% Br in water; Stoichiometric calculation, assuming an efficiency of 95% per reaction step.
  Further references:
  Samel et al. 2000. Ulf-Rainer Samel, Walter Kohler, Armin Otto Gamer, Ullrich Keuser: Propionic Acid and Derivatives. In: Ullmann's Encyclopedia of Industrial Chemistry, Seventh Edition, 2009 Electronic Release (ed. Fiedler E., Grossmann G., Kersebohm D., Weiss G. and Witte C.). 7 th Electronic Release Edition. Wiley InterScience, New York, Article Online Posting Date: June 15, 2000. Online-Version under: DOI: 10.1002/14356007.a22_223
  Uncertainty: Stoechiometric calculation
- Water, cooling, unspecified natural origin [natural resource, in water]: 0.18047 m3; name water_cooling_UNO_input; source Gendorf 2000; lognormal variance with pedigree 0.076, pedigree (4,5,5,1,1)
  Estimation (24 kg cooling water per kg produced chemical per step).
  Uncertainty: Estimation
- Water, salt, sole [natural resource, in water]: 0.0450217 m3; name water_salt_sole_input; = ((bromine_input/0.0023))/1000; lognormal variance with pedigree 0.076, pedigree (4,5,5,1,1)
  There is an intermediate containing bromine in this process and this input is used as an input in the bromine production.
  The concentration of bromine in water, salt, sole is 0.23% = 0.0023kg/kg. Cross-referenced: 0.25% (Ullmann's encyclopedia), 0.4% (USGS). The concentration of iodine in water, salt, sole is 0.03% = 0.0003kg/kg. Cross-referenced: 0.015% - 0.12% (Ullmann's encyclopedia).
  There is an intermediate containing bromine in this process and this input is used as an input in the bromine production.
  The concentration of bromine in water, salt, sole is 0.23% = 0.0023kg/kg. Cross-referenced: 0.25% (Ullmann's encyclopedia), 0.4% (USGS). The concentration of iodine in water, salt, sole is 0.03% = 0.0003kg/kg. Cross-referenced: 0.015% - 0.12% (Ullmann's encyclopedia).
  Uncertainty: Stoechiometric calculation

## Emissions to nature
- 2-Aminopropanol [air, urban air close to ground]: 9.5668e-5 kg; lognormal variance with pedigree 0.188, pedigree (4,5,5,5,5)
  Estimation, based on the assumption that 0.2% of volatile input materials is emitted to air occurring from the purge vent, the destillation vent and fugitive emission sources.
  Uncertainty: Estimation
- Acetaldehyde [air, urban air close to ground]: 0.00018649 kg; lognormal variance with pedigree 0.188, pedigree (4,5,5,5,5)
  (same comment as for 2-Aminopropanol)
- Acetic acid [air, urban air close to ground]: 3.7399e-5 kg; lognormal variance with pedigree 0.188, pedigree (4,5,5,5,5)
  (same comment as for 2-Aminopropanol)
- Acetone [air, urban air close to ground]: 0.00014209 kg; lognormal variance with pedigree 0.188, pedigree (4,5,5,5,5)
  (same comment as for 2-Aminopropanol)
- Ammonia [air, urban air close to ground]: 0.0001065 kg; lognormal variance with pedigree 0.218, pedigree (4,5,5,5,5)
  (same comment as for 2-Aminopropanol)
- Carbon dioxide, fossil [air, urban air close to ground]: 0.663 kg; lognormal variance with pedigree 0.1786, pedigree (4,5,5,5,5)
  Estimation, based on the assumption that 0.2% of volatile input materials is emitted to air occurring from the purge vent, the destillation vent and fugitive emission sources. Remaining gases like CH4 or CO are oxidated to CO2. The carbon contained in the removed carbon compounds from wastewater treatment was accounted as CO2 emissions to air (assuming a removal efficiency of 90%).
  Uncertainty: Estimation
- Carbon monoxide, fossil [air, urban air close to ground]: 0.00022791 kg; lognormal variance with pedigree 0.798, pedigree (4,5,5,5,5)
  (same comment as for 2-Aminopropanol)
- Chloramine [air, urban air close to ground]: 9.6499e-5 kg; lognormal variance with pedigree 0.188, pedigree (4,5,5,5,5)
  (same comment as for 2-Aminopropanol)
- Chlorine [air, urban air close to ground]: 0.046974 kg; lognormal variance with pedigree 0.188, pedigree (4,5,5,5,5)
  (same comment as for 2-Aminopropanol)
- Chloroacetic acid [air, urban air close to ground]: 0.00034954 kg; lognormal variance with pedigree 0.188, pedigree (4,5,5,5,5)
  (same comment as for 2-Aminopropanol)
- Diethylamine [air, urban air close to ground]: 8.5278e-5 kg; lognormal variance with pedigree 0.188, pedigree (4,5,5,5,5)
  (same comment as for 2-Aminopropanol)
- Ethylene [air, urban air close to ground]: 0.00034167 kg; lognormal variance with pedigree 0.188, pedigree (4,5,5,5,5)
  (same comment as for 2-Aminopropanol)
- Formaldehyde [air, urban air close to ground]: 3.6091e-5 kg; lognormal variance with pedigree 0.188, pedigree (4,5,5,5,5)
  (same comment as for 2-Aminopropanol)
- Hydrogen [air, urban air close to ground]: 0.0037307 kg; lognormal variance with pedigree 0.188, pedigree (4,5,5,5,5)
  (same comment as for 2-Aminopropanol)
- Hydrogen sulfide [air, urban air close to ground]: 5.3246e-5 kg; lognormal variance with pedigree 0.188, pedigree (4,5,5,5,5)
  (same comment as for 2-Aminopropanol)
- Methanol [air, urban air close to ground]: 0.0001537 kg; lognormal variance with pedigree 0.188, pedigree (4,5,5,5,5)
  (same comment as for 2-Aminopropanol)
- Nitrogen oxides [air, urban air close to ground]: 0.067476 kg; lognormal variance with pedigree 0.188, pedigree (4,5,5,5,5)
  (same comment as for 2-Aminopropanol)
- Phenol [air, urban air close to ground]: 4.1539e-5 kg; lognormal variance with pedigree 0.188, pedigree (4,5,5,5,5)
  (same comment as for 2-Aminopropanol)
- Propionic acid [air, urban air close to ground]: 0.00021168 kg; lognormal variance with pedigree 0.188, pedigree (4,5,5,5,5)
  (same comment as for 2-Aminopropanol)
- Propylene oxide [air, urban air close to ground]: 7.7877e-5 kg; lognormal variance with pedigree 0.188, pedigree (4,5,5,5,5)
  (same comment as for 2-Aminopropanol)
- Sulfur dioxide [air, urban air close to ground]: 0.24739 kg; lognormal variance with pedigree 0.1786, pedigree (4,5,5,5,5)
  (same comment as for 2-Aminopropanol)
- Toluene [air, urban air close to ground]: 0.0017419 kg; lognormal variance with pedigree 0.188, pedigree (4,5,5,5,5)
  (same comment as for 2-Aminopropanol)
- Water [air, unspecified]: 0.0791935 m3; name water_to_air_unspecified; = (water_decarbonised_input/1000*fraction_WDC_to_air)+(water_cooling_UNO_input*fraction_CW_to_air)+(water_salt_sole_input*fraction_PW_to_air); lognormal variance with pedigree 0.0807, pedigree (2,2,5,1,1)
  Calculated value based on literature values and expert opinion. See comments in the parametres' comment field.
  property fraction, origin: fresh water 0.000402769; name fraction_origin_fresh_water
  property fraction, origin: salt water 0.116543; name fraction_origin_salt_water
  property fraction, origin: unspecified 0.883054; name fraction_origin_unspecified
- o-Chlorotoluene [air, urban air close to ground]: 0.00013084 kg; lognormal variance with pedigree 0.188, pedigree (4,5,5,5,5)
  (same comment as for 2-Aminopropanol)
- 2-Aminopropanol [water, surface water]: 0.0002296 kg; lognormal variance with pedigree 0.448, pedigree (4,5,5,5,5)
  Estimation, assuming that the remaining amount of unreacted input materials leave the production process with the wastewater, wich is further treated in an internal wastewater plant. For the nitrogen containing compounds within the wastewater a removal efficiency of 50% was assumed. The nitrogen emitted to air (N2) is neglected.
  Uncertainty: Estimation
- Acetaldehyde [water, surface water]: 0.00033568 kg; lognormal variance with pedigree 0.448, pedigree (4,5,5,5,5)
  Estimation, assuming that the remaining amount of unreacted input materials leave the production process with the wastewater, wich is further treated in an internal wastewater plant.
  Uncertainty: Estimation
- Acetic acid [water, surface water]: 0.0018662 kg; lognormal variance with pedigree 0.448, pedigree (4,5,5,5,5)
  (same comment as for Acetaldehyde)
- Acetone [water, surface water]: 0.00049292 kg; lognormal variance with pedigree 0.448, pedigree (4,5,5,5,5)
  (same comment as for Acetaldehyde)
- Ammonium [water, surface water]: 0.0012781 kg; lognormal variance with pedigree 0.188, pedigree (4,5,5,5,5)
  (same comment as for 2-Aminopropanol)
- Bromide [water, surface water]: 0.047349 kg; lognormal variance with pedigree 0.798, pedigree (4,5,5,5,5)
  (same comment as for Acetaldehyde)
- Chloramine [water, surface water]: 0.00086111 kg; lognormal variance with pedigree 0.448, pedigree (4,5,5,5,5)
  (same comment as for 2-Aminopropanol)
- Chloride [water, surface water]: 0.88897 kg; lognormal variance with pedigree 0.448, pedigree (4,5,5,5,5)
  (same comment as for Acetaldehyde)
- Chloroacetic acid [water, surface water]: 0.056781 kg; lognormal variance with pedigree 0.448, pedigree (4,5,5,5,5)
  (same comment as for Acetaldehyde)
- Chloroacetyl chloride [water, surface water]: 0.00030622 kg; lognormal variance with pedigree 0.448, pedigree (4,5,5,5,5)
  (same comment as for Acetaldehyde)
- Diethylamine [water, surface water]: 0.00020467 kg; lognormal variance with pedigree 0.448, pedigree (4,5,5,5,5)
  (same comment as for 2-Aminopropanol)
- Ethylene oxide [water, surface water]: 0.00062516 kg; lognormal variance with pedigree 0.448, pedigree (4,5,5,5,5)
  (same comment as for Acetaldehyde)
- Fluoride [water, surface water]: 0.0020722 kg; lognormal variance with pedigree 0.188, pedigree (4,5,5,5,5)
  (same comment as for Acetaldehyde)
- Formaldehyde [water, surface water]: 3.6091e-5 kg; lognormal variance with pedigree 0.448, pedigree (4,5,5,5,5)
  (same comment as for Acetaldehyde)
- Methanol [water, surface water]: 0.000686 kg; lognormal variance with pedigree 0.448, pedigree (4,5,5,5,5)
  (same comment as for Acetaldehyde)
- Nitrate [water, surface water]: 0.022987 kg; lognormal variance with pedigree 0.188, pedigree (4,5,5,5,5)
  (same comment as for 2-Aminopropanol)
- Phenol [water, surface water]: 0.00022278 kg; lognormal variance with pedigree 0.448, pedigree (4,5,5,5,5)
  (same comment as for Acetaldehyde)
- Propionic acid [water, surface water]: 0.00050802 kg; lognormal variance with pedigree 0.448, pedigree (4,5,5,5,5)
  (same comment as for Acetaldehyde)
- Propylene oxide [water, surface water]: 0.0001869 kg; lognormal variance with pedigree 0.448, pedigree (4,5,5,5,5)
  (same comment as for Acetaldehyde)
- Sodium I [water, surface water]: 0.55802 kg; lognormal variance with pedigree 0.798, pedigree (4,5,5,5,5)
  (same comment as for Acetaldehyde)
- Sulfate [water, surface water]: 0.06548 kg; lognormal variance with pedigree 0.188, pedigree (4,5,5,5,5)
  (same comment as for Acetaldehyde)
- Sulfur [water, surface water]: 0.0033912 kg; lognormal variance with pedigree 0.188, pedigree (4,5,5,5,5)
  (same comment as for Acetaldehyde)
- Toluene [water, surface water]: 0.00055572 kg; lognormal variance with pedigree 0.448, pedigree (4,5,5,5,5)
  (same comment as for Acetaldehyde)
- Water [water, unspecified]: 0.146381 m3; name water_to_water_unspecified; = (water_decarbonised_input/1000)*(1-fraction_WDC_to_air)+water_cooling_UNO_input*(1-fraction_CW_to_air)+water_salt_sole_input*(1-fraction_PW_to_air); lognormal variance with pedigree 0.0807, pedigree (2,2,5,1,1)
  (same comment as for Water)
  property carbon content, fossil 0; name C_content_fossil
  property carbon content, non-fossil 0; name C_content_non_fossil
  property dry mass 0 kg; name DM
  property fraction, origin: fresh water 0.000344426; name fraction_origin_fresh_water_Ww
  property fraction, origin: salt water 0.244515; name fraction_origin_salt_water_Ww
  property fraction, origin: unspecified 0.75514; name fraction_origin_unspecified_Ww
  property water in wet mass 1000 kg; name WWM
  property wet mass 1000 kg; name WM
- o-Chlorotoluene [water, surface water]: 0.00031402 kg; lognormal variance with pedigree 0.448, pedigree (4,5,5,5,5)
  (same comment as for Acetaldehyde)

## Sampling procedure
Literature data

## Review by Thomas Nemecek 2010-03-11
Passed.
none

## Review by Roland Hischier 2011-11-14
Transfer of documentation done.
