# industrial furnace production, coal, 1-10MW

Dataset: EcoSpold 2, unit process
Geography: RoW
Time period: 1988-01-01 to 2023-12-31
Technology level: current
Classification: ISIC rev.4 ecoinvent: 2815:Manufacture of ovens, furnaces and furnace burners
Classification: EcoSpold01Categories: hard coal/heating systems
Tags: ConvertedDataset
Scenario: Business-as-Usual
System model: Allocation, cut-off by classification
Generated by: Christian Bauer
Published in: Röder, A. 2007
Database: ecoinvent
isCopyrightProtected: true
accessRestrictedTo: 1

## General comment
Lifetime is assumed to be 20 years. No assessment was performed on different types of furnaces.
[This dataset was already contained in the ecoinvent database version 2. It was not individually updated during the transfer to ecoinvent version 3. Life Cycle Impact Assessment results may still have changed, as they are affected by changes in the supply chain, i.e. in other datasets. This dataset was generated following the ecoinvent quality guidelines for version 2. It may have been subject to central changes described in the ecoinvent version 3 change report (http://www.ecoinvent.org/database/ecoinvent-version-3/reports-of-changes/), and the results of the central updates were reviewed extensively. The changes added e.g. consistent water flows and other information throughout the database. The documentation of this dataset can be found in the ecoinvent reports of version 2, which are still available via the ecoinvent website. The change report linked above covers all central changes that were made during the conversion process.]

## Included activities end
Average stoker furnace operational in the early 1990s. The module includes materials, energy and transport requirements used for construction of the plant. Disposal of material is also included.

## Geography
German condition.

## Technology
Average used in early 1990s. Stoker boiler used as reference technology.

## Reference product
- industrial furnace, coal, 1-10MW: 1 unit; By-product classification allocatable product; CPC 43420: Industrial or laboratory furnaces and ovens, except non-electric bakery ovens; other industrial or laboratory […]; HS2017 841780: Furnaces and ovens; including incinerators, non-electric, for industrial or laboratory use, n.e.c. in headi[...]
  EcoSpold01Location=RER
  production volume 2.67763 unit
    This is a placeholder value that does not reflect real-world production volumes. This dataset does not currently require a real-world production volume to work in the database framework, and no actual data were collected yet. This has no negative effect on the results of the ecoinvent database.
  property price 74096.5 EUR2005
    Calculated based on inputs: The price of the product has been calculated as a sum of the values of the material and energy inputs for this product. This value is therefore a rough estimation. It may underestimate the real price since there are additional expenses when producing any product. These expences can include for example labour costs, treatment of waste materials and profit for the producer. Please consider carefully whether this level of data quality is acceptable for your application.
  properties: carbon allocation 0 kg, carbon content 0

## Inputs from technosphere
- aluminium, cast alloy: 115.2 kg; lognormal variance with pedigree 0.252, pedigree (1,1,5,5,1)
  own assumption
  EcoSpold01Location=RER
  properties: dry mass 1 kg, wet mass 1 kg
- aluminium, wrought alloy: 244.8 kg; lognormal variance with pedigree 0.252, pedigree (1,1,5,5,1)
  own assumption
  EcoSpold01Location=RER
  properties: dry mass 1 kg, wet mass 1 kg
- concrete, normal strength: 2.12078, 0.465713, 0.30292, 8.9809, 3.77027, 4.46947, 159.89 m3 (7 suppliers, which the file names only by identifier); sum of these 180 m3; lognormal variance with pedigree 0.252, pedigree (1,1,5,5,1)
  EcoSpold01Location=CH
  own assumption
  properties: dry mass 2190 kg, water content 0.086758, wet mass 2380 kg
- copper, cathode: 900 kg; lognormal variance with pedigree 0.252, pedigree (1,1,5,5,1)
  EcoSpold01Location=RER
  own assumption
  properties: dry mass 1 kg, wet mass 1 kg
- diesel, burned in building machine: 540000 MJ; lognormal variance with pedigree 0.162, pedigree (1,1,5,5,1)
  EcoSpold01Location=GLO
  own assumption
  properties: heating value, net 1 MJ
- electricity, medium voltage: 996.984, 19887.6, 6682.17, 305.311, 61.1076, 13.1212, 2053.7 kWh (7 suppliers, which the file names only by identifier); sum of these 30000 kWh; lognormal variance with pedigree 0.162, pedigree (1,1,5,5,1)
  EcoSpold01Location=UCTE
  own assumption
- heat, district or industrial, other than natural gas: 539750, 250.056 MJ (2 suppliers, which the file names only by identifier); sum of these 540000 MJ; lognormal variance with pedigree 0.162, pedigree (1,1,5,5,1)
  EcoSpold01Location=RER
  properties: heating value, net 1 MJ
- reinforcing steel: 27000 kg; lognormal variance with pedigree 0.252, pedigree (1,1,5,5,1)
  EcoSpold01Location=RER
  own assumption
  properties: carbon content, fossil 0.004, dry mass 1 kg, wet mass 1 kg
- steel, low-alloyed, hot rolled: 9000 kg; lognormal variance with pedigree 0.252, pedigree (1,1,5,5,1)
  own assumption
  EcoSpold01Location=RER
  properties: carbon content, fossil 0.005, dry mass 1 kg, wet mass 1 kg
  note on carbon content, fossil: Low alloyed steel composition given in Tab. 3.2 ecoinvent v2.2 report 10_partII. Steel assumed to have a C content of 0.5%

## Inputs from nature
- Occupation, industrial area [natural resource, land]: 18000 m2*year; lognormal variance with pedigree 0.162, pedigree (1,1,5,5,1)
  own assumption
- Transformation, from unspecified [natural resource, land]: 900 m2; lognormal variance with pedigree 0.162, pedigree (1,1,5,5,1)
  own assumption
- Transformation, to industrial area [natural resource, land]: 900 m2; lognormal variance with pedigree 0.162, pedigree (1,1,5,5,1)
  own assumption

## Sampling procedure
literature

## Extrapolations
see Geography/Text This dataset has been copied from an original dataset covering the geography RER. The uncertainty has been adjusted accordingly.

## Review by Hans-Jörg Althaus 2003-07-04
passed
