# paper production, newsprint, recycled

Dataset: EcoSpold 2, unit process
Geography: RoW
Time period: 2000-01-01 to 2023-12-31
Technology level: current
Classification: EcoSpold01Categories: paper & cardboard/graphic paper
Classification: ISIC rev.4 ecoinvent: 1701:Manufacture of pulp, paper and paperboard
Scenario: Business-as-Usual
System model: Allocation, cut-off by classification
Generated by: Roland Hischier
Published in: Hischier R. 2007
Database: ecoinvent
isCopyrightProtected: true
accessRestrictedTo: 1

## General comment
This dataset is a copy of the corresponding dataset for Europe without Switzerland. It represents the European production of newsprint paper containing deinked pulp (DIP) from waste newspaper.
Principal sources for the dataset of Newsprint paper produced in Europe are the Finnish EcoData data-base from KCL (KCL (2002)), the report of the Swedish EPA about the Swedish pulp and paper in-dustry (Naturvardsverket (2001)) as well as several environmental reports from European paper mills (Hylte Mill (2000; Kvarnsveden Mill (2002; Sachsen Mill (2002; Summa Mill (2001)). Further sources are the German inventory study about graphical paper (Tiedemann et al. (2000)) of UBA, dis-tinguishing beteween a nordic and a German newsprint paper, a recently established study from EMPA comparing printed with electronic media (Reichart & Hischier (2001)) - including datasets from several newsprint paper mills - and the European IPPC documentation for the paper and pulp in-dustry (European Commission (2000)). In the latter one, besides BAT technology, the present situa-tion of the pulp and paper industry is described and quantified.
Further documentation about the background data to this dataset can be found in the report Hischier (2007), available through the ecoinvent online for v2.
Reference(s):
">> KCL (2002) KCL EcoData - life cycle inventory database. The Finnish Pulp and Paper Research Institute (KCL), Espoo (Finnland) <<
>> Naturvardsverket (2001) Skogsindustrins utsläpp - avfallsmängder och energiförbrukning 2000. Report 5154. Naturvardsverket (Swedish EPA), Stockholm <<
>> Hylte Mill (2000) Environmental Report 1999. StoraEnso Newsprint, Hyltebruk (Sweden) as pdf-File under: http://www.storaenso.com/CDAvgn/main/0,,1_-2395-2103-,00.html <<
>> Kvarnsveden Mill (2002) Environmental Report 2001. StoraEnso Kvarnsveden AB, Borlänge (Sweden) as pdf-File under: http://www.storaenso.com/CDAvgn/main/0,,1_-2395-2103-,00.html <<
>> Sachsen Mill (2002) Environmental Statement Sachsen Mill 2001. StoraEnso Sachsen GmbH, Eilenburg (Germany) as pdf-File under: http://www.storaenso.com/CDAvgn/main/0,,1_-2394-2102-,00.html <<
>> Summa Mill (2001) Environmental Statement Summa Mill 2000. Stora Enso Newsprint, Hamina (Finland) as pdf-File under: http://www.storaenso.com/CDAvgn/main/0,,1_-2393-2097-,00.html <<
>> Tiedemann A., Böttcher Tiedemann C., Buschardt A., Georgi B., Giersberg G., Goosmann G., Gregor H.-D., Mehlhorn B., Modi A., Neitzel H., Oels H.-J., Schmitz S. and Suhr M. (2000) Ökobilanzen für graphische Papiere. Texte 22/00. Umweltbundesamt, Berlin <<
>> Reichart I. and Hischier R. (2001) Vergleich der Umweltbelastungen bei Benut-zung elektronischer und gedruckter Medien. EMPA-Bericht Nr. 253. EMPA, St. Gallen <<
>> Hischier R. (2007) Life Cycle Inventories of Packagings and Graphical Papers. ecoinvent-Report No. 11, Swiss Centre for Life Cycle Inventories, Dübendorf, 2007. <<
"

## Included activities start
The activity starts with "waste newspaper" being available to the recycling facility.

## Included activities end
This dataset represents the European production of newsprint paper containing deinked pulp (waste paper) - including transports to paper mill, wood handling, mechanical pulping and bleaching, deinking of waste paper, paper production, energy production on-site and internal waste water treatment. Not included is the transport of waste paper to the mill, as this is already included in the used waste paper datasets. Sorting of the incoming paper and the by-products connected to this has been excluded, since sorting of unsorted paper takes place in a separate activity. The input of waste newsprint has been adjusted accordingly, to exclude the losses (2.5%) during sorting.

## Geography
Data from a finnish database and from several European newsprint producers.

## Technology
Average European technology.

## Time period
Data represent the average technology in the late 1990ies and early 2000s. The production volume is valid for 2018.

## Parameters
- fraction, cooling water, cooling pond system, to air: 0.032 dimensionless; name fraction_CW_CP_to_air; lognormal variance with pedigree 0.0413, pedigree (2,3,1,3,1)
  Calculated based on literature value (Scown, C.D., 2011, Water Footprint of U.S. Transportation Fuels and supplying information of the article) (Vionnet, S., Quantis Water Database - Technical Report, 2012).
- fraction, cooling water, once-through system, to air: 0.004 dimensionless; name fraction_CW_OT_to_air; lognormal variance with pedigree 0.0413, pedigree (2,3,1,3,1)
  (same comment as for fraction, cooling water, cooling pond system, to air)
- fraction, cooling water, recirculating system, to air: 0.771 dimensionless; name fraction_CW_R_to_air; lognormal variance with pedigree 0.0413, pedigree (2,3,1,3,1)
  (same comment as for fraction, cooling water, cooling pond system, to air)
- fraction, cooling water, to air: 0.3875 dimensionless; name fraction_CW_to_air; = (0.5*fraction_CW_OT_to_air)+(0.5*fraction_CW_R_to_air); lognormal variance with pedigree 0.092025, pedigree (4,4,3,2,4)
  Calculated value based on literature value (see comments of the other parametres present in this dataset) and expert opinion. In the case when no industry/literature data are available about the type of cooling or directly fraction, cooling water, to air specific for the process a default assumption is applied. It is assumed that the once-through cooling system is used in 50% of all cases and recirculating system is used in another 50% of all cases.
- fraction, process water, to air: 0.15 dimensionless; name fraction_PW_to_air; lognormal variance with pedigree 0.092025, pedigree (4,4,3,2,4)

## Reference product
- paper, newsprint: 1 kg; By-product classification allocatable product; CPC 32121: Newsprint; HS2017 4802: Uncoated paper and paperboard, used for writing, printing or other graphics, non perforated punch-cards and p[...]
  production volume 1.36139e10 kg; name PV_paper; = 20289575000*0.93
    Production volume of total newsprint paper production worlwide for 2018 (20289575000 kg) for 2018 retrieved from FAOSTAT (http://www.fao.org/faostat/en/#data/FO) for forestry products, category Newsprint, region World, year 2018. For a lack of data on a global level, it is assume that the share of recycled newsprint in total newsprint production is 93% as reported for Europe by CEPI (2018).
    Reference(s):
    CEPI, 2018, Key Statistics 2018 European pulp & paper industry, accessible at http://www.cepi.org/system/files/public/documents/publications/Final%20Key%20Statistics%202018.pdf, last accessed March 2020
  property carbon content, non-fossil 0.482; name RP_C_content_non_fossil
    biogenic carbon content on a dry matter basis, estimated based on composition of input materials (sortet waste paper, pulpwood and fillers)
  property price 0.433 EUR2005
    Export prices for the World+ according to: http://faostat.fao.org/site/626/DesktopDefault.aspx?PageID=626#ancor downloaded 27 April 2009; calculated as export value divided by export volume.
  properties: carbon allocation 0.466479 kg, carbon content 0.493628, carbon content, fossil 0.0116283, dry mass 0.945 kg, heating value, net 14.11 MJ, water content 0.0582011, water in wet mass 0.055 kg, wet mass 1 kg

## Inputs from technosphere
- DTPA, diethylenetriaminepentaacetic acid: 0.00093 kg; lognormal variance with pedigree 0.0546, pedigree (2,4,5,5,1)
  average data from finnish database
  Uncertainty: a
  properties: carbon content, fossil 0.427481, dry mass 1 kg, heating value, net 12.95 MJ, wet mass 1 kg
  note on carbon content, fossil: Fossil C content was calculated after fossil C contents of chemicals used in the production of the paper (in Tab 8.6 ecoinvent v2.2 report 11_III, part 8). C14H23N3O10
- EDTA, ethylenediaminetetraacetic acid: 0.00067 kg; lognormal variance with pedigree 0.0546, pedigree (2,4,5,5,1)
  average data from finnish database
  Uncertainty: a
  properties: carbon content, fossil 0.410959, dry mass 1 kg, heating value, net 19.09 MJ, wet mass 1 kg
  note on carbon content, fossil: Fossil C content was calculated after fossil C contents of chemicals used in the production of the paper (in Tab 8.6 ecoinvent v2.2 report 11_III, part 8). C10H16N2O8
- activated bentonite: 0.0007 kg; lognormal variance with pedigree 0.0426, pedigree (1,3,5,5,1)
  average from several different paper mills
  Uncertainty: a
  properties: dry mass 1 kg, wet mass 1 kg
- aluminium sulfate, powder: 0.0027 kg; lognormal variance with pedigree 0.0426, pedigree (1,3,5,5,1)
  average from several different paper mills
  Uncertainty: a
  properties: dry mass 1 kg, wet mass 1 kg
- ash from deinking sludge: -0.0445 kg; name ash_deinking_sludge; lognormal variance with pedigree 0.0146, pedigree (2,4,1,5,1)
  average data from finnish database
  Uncertainty: a
  production volume; = PV_paper*ash_deinking_sludge
    Calculated from the production volume of paper, newsprint in proportion to the respective output amounts.
  properties: dry mass 1 kg, wet mass 1 kg
- ash from paper production sludge: -5.81e-5 kg; name ash_sludge; lognormal variance with pedigree 0.0146, pedigree (2,4,1,5,1)
  average data from finnish database
  Uncertainty: a
  production volume; = PV_paper*ash_sludge
    (same comment as for ash from deinking sludge)
  properties: carbon content, non-fossil 0.0092, dry mass 1 kg, wet mass 1 kg
  note on carbon content, non-fossil: Biogenic C content was calculated after biogenic C contents of chemicals used in the production of the paper (in Tab 8.6 ecoinvent v2.2 report 11_III, part 8). The cellulose content in 1 kg of paper (on a wet mas basis) was estimated as (1-chemical content), C content of cellulose was considered 0.44 kgC/kg dry mass (ecoinvent v2.2 report, n 15a, pg 40) Tab 6.21, ecoinvent v2.2 report 11_III
- chemical, organic: 0.00185 kg; lognormal variance with pedigree 0.0546, pedigree (2,4,5,5,1)
  average data from finnish database
  Uncertainty: a
  properties: carbon content, fossil 0.628, dry mass 1 kg, heating value, net 19.03 MJ, wet mass 1 kg
  note on carbon content, fossil: Fossil C content was calculated after fossil C contents of chemicals used in the production of the paper (in Tab 8.6 ecoinvent v2.2 report 11_III, part 8). This dataset is an unweighted average of 20 organic substances (listed in Tab 88.1, ecoinvent v2.2 report 8, part II), being part of the top100 chemicals included in this database. The C-content has also been calculated as an unweighted average of the C content of the substances composing this dataset.
- deinking emulsion, in paper production: 0.00054 kg; lognormal variance with pedigree 0.0546, pedigree (2,4,5,5,1)
  average data from finnish database
  Uncertainty: a
  properties: carbon content, fossil 0.00369863, carbon content, non-fossil 0.078, dry mass 1 kg, heating value, net 2.48 MJ, wet mass 1 kg
  note on carbon content, fossil: Fossil C content was calculated after fossil C contents of chemicals used in the production of the paper (in Tab 8.6 ecoinvent v2.2 report 11_III, part 8). Mixture of hydrogen peroxide (0.217), sodium hydroxide (0.258), silica (0.412) and fatty acid (0.104), and EDTA (0.009)
  note on carbon content, non-fossil: Biogenic C content was calculated after biogenic C contents of chemicals used in the production of the paper (in Tab 8.6 ecoinvent v2.2 report 11_III, part 8). The cellulose content in 1 kg of paper (on a wet mas basis) was estimated as (1-chemical content), C content of cellulose was considered 0.44 kgC/kg dry mass (ecoinvent v2.2 report, n 15a, pg 40) Mixture of hydrogen peroxide (0.217), sodium hydroxide (0.258), silica (0.412) and fatty acid (0.104), and EDTA (0.009)
- electricity, medium voltage: 0.0531725, 1.06067, 0.356383, 0.0162832, 0.00325907, 0.000699796, 0.109531 kWh (7 suppliers, which the file names only by identifier); sum of these 1.6 kWh; lognormal variance with pedigree 0.0432, pedigree (2,3,5,5,1)
  average from finnish database and several paper mills
  Uncertainty: a
- fatty acid: 0.00339 kg; lognormal variance with pedigree 0.0546, pedigree (2,4,5,5,1)
  average data from finnish database
  Uncertainty: a
  properties: carbon content, non-fossil 0.75, dry mass 1 kg, heating value, net 22.73 MJ, wet mass 1 kg
  note on carbon content, non-fossil: Biogenic C content was calculated after biogenic C contents of chemicals used in the production of the paper (in Tab 8.6 ecoinvent v2.2 report 11_III, part 8). The cellulose content in 1 kg of paper (on a wet mas basis) was estimated as (1-chemical content), C content of cellulose was considered 0.44 kgC/kg dry mass (ecoinvent v2.2 report, n 15a, pg 40) C-content/dry mass of fats and oils considered 75%, from: ecoinvent v2.2 report, n 15a, pg 40
- hard coal: 0.000191045, 4.53336e-5, 0.00135207, 0.000317532, 0.000194957, 0.000284826, 0.000421328, 8.29075e-5 kg (8 suppliers, which the file names only by identifier); sum of these 0.00289 kg; lognormal variance with pedigree 0.0432, pedigree (2,3,5,5,1)
  average from finnish database and several paper mills
  Uncertainty: a
  properties: carbon content, fossil 0.845, dry mass 0.94 kg, heating value, net 27.91 MJ, water content 0.0638298, wet mass 1 kg
  note on carbon content, fossil: Fossil C content was calculated after fossil C contents of chemicals used in the production of the paper (in Tab 8.6 ecoinvent v2.2 report 11_III, part 8). C content 75-94% (specified in Tab 1.1, report 6, part VI). A mean content of 0.845 kg C/ kg dry hard coal was considered
  note on heating value, net: Based on the Characterization factor of Hard coal in the CED method
- hazardous waste, for underground deposit: -0.00037 kg; name haz; lognormal variance with pedigree 0.0026, pedigree (1,3,1,5,1)
  average from several different paper mills
  Uncertainty: a
  production volume; = PV_paper*haz
    (same comment as for ash from deinking sludge)
  properties: carbon content, fossil 0.554667, dry mass 1 kg, wet mass 1 kg
  note on carbon content, fossil: Fossil C content was calculated after fossil C contents of chemicals used in the production of the paper (in Tab 8.6 ecoinvent v2.2 report 11_III, part 8). Tab A.6, ecoinvent v2.2 report 13_I, average hazardous waste composition was used, and referred to 0% water mass. No waste-specific emission are currently inventoried for underground deposits. Accordingly, no waste composition must be specified. For generic, average waste to underground deposit deposition in a 200 liter steel drum without cement solidification is assumed (ecoinvent v2.2 report 13_I).
- heavy fuel oil: 0.000132769, 7.73133e-5, 0.000393046, 0.00918804, 9.91816e-5, 0.000509645 kg (6 suppliers, which the file names only by identifier); sum of these 0.0104 kg; lognormal variance with pedigree 0.0432, pedigree (2,3,5,5,1)
  average from finnish database and several paper mills
  Uncertainty: a
  properties: carbon content, fossil 0.849, dry mass 1 kg, heating value, net 41.2 MJ, wet mass 1 kg
  note on carbon content, fossil: Fossil C content was calculated after fossil C contents of chemicals used in the production of the paper (in Tab 8.6 ecoinvent v2.2 report 11_III, part 8). C-content is 84.9% (ecoinvent v2.2 report 6_IV, Tab 3.18)
- hydrogen peroxide, without water, in 50% solution state: 0.0113 kg; lognormal variance with pedigree 0.0546, pedigree (2,4,5,5,1)
  average data from finnish database
  Uncertainty: a
  properties: dry mass 1 kg, heating value, net 7.13 MJ, wet mass 1 kg
- inert waste, for final disposal: -4.23967e-5 kg
  production volume
    This exchange only appears in the corresponding local dataset for Switzerland. The production volume is set equal to the production volume of the same exchange in the Swiss dataset. It is therefore calculated based on the exchange amount and production volume of the Swiss dataset "paper production, newsprint, recycled, CH 2012".
  properties: dry mass 0.995 kg, water content 0.00502513, wet mass 1 kg
- kaolin: 0.0168 kg; lognormal variance with pedigree 0.0426, pedigree (1,3,5,5,1)
  average from several different paper mills
  Uncertainty: a
  properties: dry mass 1 kg, wet mass 1 kg
- lignite briquettes: 0.115 MJ; lognormal variance with pedigree 0.0432, pedigree (2,3,5,5,1)
  average from finnish database and several paper mills
  Uncertainty: a
  properties: carbon content, fossil 0.65679, dry mass 0.0415385 kg, heating value, net 19.5 MJ, water content 0.234568, wet mass 0.0512821 kg
  note on carbon content, fossil: Fossil C content was calculated after fossil C contents of chemicals used in the production of the paper (in Tab 8.6 ecoinvent v2.2 report 11_III, part 8). 53.2% C and 19% water in wet mass (ecoinvent v2.1 report 6_VI Table 7.1)
  note on heating value, net: Based on literature, page 52, Report 5: Dones, R., Bauer, C., Bolliger, R., Burger, B., faist Emmenegger, M., Frischknecht, R., Heck, T., Jungbluth, N., Röder, A., Tuchschmid, M. (2007) Life Cycle Inventories of Energy Systems: Resulst for current Systems in Switzerland and other UCTE Countries. ecoinvent report No. 5. Paul Scherrer Institut Villigen, Swiss Centre for Life Cycle Inventories, Dübendorf, CH
- malusil: 0.0026 kg; lognormal variance with pedigree 0.0426, pedigree (1,3,5,5,1)
  average from several different paper mills
  Uncertainty: a
  properties: dry mass 1 kg, wet mass 1 kg
- municipal solid waste: -8.58042e-6, -1.01889e-6, -6.3413e-6, -0.00484107, -7.12977e-7, -2.28853e-7, -5.1727e-7, -2.15341e-5 kg (8 suppliers, which the file names only by identifier); sum of these -0.00488 kg; lognormal variance with pedigree 0.0146, pedigree (2,4,1,5,1)
  average data from finnish database
  Uncertainty: a
  production volume; = PV_paper*MSW
    (same comment as for ash from deinking sludge)
  properties: carbon content, fossil 0.171549, carbon content, non-fossil 0.261655, dry mass 0.771 kg, heating value, net 11.74 MJ, water content 0.297017, wet mass 1 kg
  note on carbon content, fossil: Fossil C content was calculated after fossil C contents of chemicals used in the production of the paper (in Tab 8.6 ecoinvent v2.2 report 11_III, part 8). MSW composition in tab 4.1, ecoinvent v2.2 report 13_I. C content referred to 1 kg DM
  note on carbon content, non-fossil: Biogenic C content was calculated after biogenic C contents of chemicals used in the production of the paper (in Tab 8.6 ecoinvent v2.2 report 11_III, part 8). The cellulose content in 1 kg of paper (on a wet mas basis) was estimated as (1-chemical content), C content of cellulose was considered 0.44 kgC/kg dry mass (ecoinvent v2.2 report, n 15a, pg 40) MSW composition in tab 4.1, ecoinvent v2.2 report 13_I. C content referred to 1 kg DM
  note on heating value, net: Value taken from the general comment of the treatment dataset.
- natural gas, high pressure: 0.000409837, 0.000691345, 0.00150803, 0.000504675, 0.000117941, 0.000701958, 0.000673583, 0.0017712, 0.000683801, 0.00105765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 m3 (37 suppliers, which the file names only by identifier); sum of these 0.0530769 m3; lognormal variance with pedigree 0.0432, pedigree (2,3,5,5,1)
  average from finnish database and several paper mills
  Uncertainty: a
  properties: carbon content, fossil 0.602381, dry mass 0.84 kg, heating value, gross 40 MJ, heating value, net 36 MJ, wet mass 0.84 kg
  note on carbon content, fossil: An average C content of 0.506 kg C/ m3 has been assumed (this average has been calculated using data in Tab 3.5, ecoinvent v2.2 report 6_V
  note on heating value, net: Literature value, Source: Christoph Meili;Niels Jungbluth;Maresa Bussa (2021) Life cycle inventories of crude oil and natural gas extraction. ESU-services Ltd. commissioned by BAFU & VSG, Schaffhausen, Switzerland, http://esu-services.ch/data/public-lci-reports/
- nitrogen, liquid: 0.00019 kg; lognormal variance with pedigree 0.0546, pedigree (2,4,5,5,1)
  average data from finnish database
  Uncertainty: a
  properties: dry mass 1 kg, wet mass 1 kg
- paper mill, integrated: 5.44e-11 unit; lognormal variance with pedigree 0.448, pedigree (4,5,5,5,5)
  assumption
  Uncertainty: o
- phosphorus, white, liquid: 3e-5 kg; lognormal variance with pedigree 0.0546, pedigree (2,4,5,5,1)
  average data from finnish database
  Uncertainty: a
  properties: dry mass 1 kg, wet mass 1 kg
- pulpwood, softwood, measured as solid wood under bark: 0.001084 m3; = 0.000689+0.000395; lognormal variance with pedigree 0.0432, pedigree (2,3,5,5,1)
  Average from finnish database and several paper mills; includes residual wood from ordinary softwood forestry
  Uncertainty: a
  property dry mass 425.92 kg; name dryMass; = (1+0.1)*387.2
  property water in wet mass 596.288 kg; name water_in_wetMass
  property wet mass 1022.21 kg; name wetMass
  properties: carbon content, non-fossil 0.494, heating value, net 4483.78 MJ, water content 1.4
  note on carbon content, non-fossil: Biogenic C content was calculated after biogenic C contents of chemicals used in the production of the paper (in Tab 8.6 ecoinvent v2.2 report 11_III, part 8). The cellulose content in 1 kg of paper (on a wet mas basis) was estimated as (1-chemical content), C content of cellulose was considered 0.44 kgC/kg dry mass (ecoinvent v2.2 report, n 15a, pg 40) C content of dry mass is 0.494 kgC/kg dry wood (ecoinvent v2.2 report 9)
  note on heating value, net: Value based on "softwood forestry, mixed species, sustainable forest management"The property is based on a value of 11.58MJ/kg
- quicklime, milled, loose: 0.0003 kg; lognormal variance with pedigree 0.0426, pedigree (1,3,5,5,1)
  average from several different paper mills
  Uncertainty: a
  properties: dry mass 0.99 kg, water content 0.010101, wet mass 1 kg
- retention aid, for paper production: 0.00013 kg; lognormal variance with pedigree 0.0546, pedigree (2,4,5,5,1)
  average data from finnish database
  Uncertainty: a
  properties: carbon content, fossil 0.5, dry mass 1 kg, heating value, net 15.15 MJ, wet mass 1 kg
  note on carbon content, fossil: Fossil C content was calculated after fossil C contents of chemicals used in the production of the paper (in Tab 8.6 ecoinvent v2.2 report 11_III, part 8). The functional unit represents 1 kg of retention aids. Raw material approximated by acrylic acid (ecoinvent v2.2 report 11-III, pg 297). Acrylic acid formula is C3H4O2.
- sludge from pulp and paper production: -0.000206 kg; name sludge; lognormal variance with pedigree 0.0146, pedigree (2,4,1,5,1)
  average data from finnish database
  Uncertainty: a
  production volume; = PV_paper*sludge
    (same comment as for ash from deinking sludge)
  properties: carbon content, non-fossil 0.21, dry mass 0.75 kg, heating value, net 2.65 MJ, water content 0.333333, wet mass 1 kg
  note on carbon content, non-fossil: Biogenic C content was calculated after biogenic C contents of chemicals used in the production of the paper (in Tab 8.6 ecoinvent v2.2 report 11_III, part 8). The cellulose content in 1 kg of paper (on a wet mas basis) was estimated as (1-chemical content), C content of cellulose was considered 0.44 kgC/kg dry mass (ecoinvent v2.2 report, n 15a, pg 40) Tab 6.21, ecoinvent v2.2 report 11_III & Tab A.9, ecoinvent v2.2 report 13_I. Sludge from pulp and paper contains 15.75% carbon
- sodium dithionite, anhydrous: 0.00265 kg; lognormal variance with pedigree 0.0546, pedigree (2,4,5,5,1)
  average data from finnish database
  Uncertainty: a
  properties: dry mass 1 kg, wet mass 1 kg
- sodium hydroxide, without water, in 50% solution state: 0.0109 kg; lognormal variance with pedigree 0.0546, pedigree (2,4,5,5,1)
  average data from finnish database
  Uncertainty: a
  properties: dry mass 1 kg, heating value, net 3.03 MJ, wet mass 1 kg
- sodium silicate, spray powder, 80%: 0.0167 kg; lognormal variance with pedigree 0.0546, pedigree (2,4,5,5,1)
  average data from finnish database
  Uncertainty: a
  properties: dry mass 1 kg, wet mass 1 kg
- sulfate pulp, bleached: 0.01672 kg; = 0.0176*0.95; lognormal variance with pedigree 0.0432, pedigree (2,3,5,5,1)
  average from finnish database and several paper mills. pulp input is 5% unbleached pulp and 95% bleached pulp.
  Uncertainty: a
  properties: carbon content, non-fossil 0.494, dry mass 0.9 kg, heating value, net 13.23 MJ, water content 0.111111, wet mass 1 kg
  note on carbon content, non-fossil: C content of dry mass of sulfate pulp is 0.494 kgC/kg dry wood (ecoinvent v2.2 report 6_IX & ecoinvent v2.2 report 9). No other C containing products in the formulation of the pulp.
- sulfate pulp, unbleached: 0.00088 kg; = 0.0176*0.05; lognormal variance with pedigree 0.0432, pedigree (2,3,5,5,1)
  average from finnish database and several paper mills. pulp input is 5% unbleached pulp and 95% bleached pulp
  Uncertainty: a
  properties: carbon content, non-fossil 0.494, dry mass 0.9 kg, heating value, net 13.23 MJ, price 0.355 EUR2005, water content 0.111111, wet mass 1 kg
- sulfur dioxide, liquid: 0.004 kg; lognormal variance with pedigree 0.0546, pedigree (2,4,5,5,1)
  average data from finnish database
  Uncertainty: a
  properties: dry mass 1 kg, wet mass 1 kg
- sulfuric acid: 0.00034 kg; lognormal variance with pedigree 0.0546, pedigree (2,4,5,5,1)
  average data from finnish database
  Uncertainty: a
  properties: dry mass 1 kg, wet mass 1 kg
- waste mineral oil: -1.65308e-7 kg; name min_oil; lognormal variance with pedigree 0.0047, pedigree (3,2,1,5,1)
  added from Swiss dataset
  production volume
    Calculated from production volume of reference product using the relative outputs.
  properties: carbon content, fossil 0.864444, dry mass 0.9 kg, heating value, net 34.7 MJ, water content 0.111111, wet mass 1 kg
  note on carbon content, fossil: Tab A.6, ecoinvent v2.2 report 13_I. C content has been calculated after data in the tables, and then referred to 1 kg DM
- waste newspaper: 0.742 kg; lognormal variance with pedigree 0.0444, pedigree (2,3,5,5,2)
  average from finnish database and several paper mills
  properties: carbon content, non-fossil 0.458427, dry mass 0.853 kg, heating value, net 14.11 MJ, water content 0.172333, wet mass 1 kg
- wood ash mixture, pure: -0.0101 kg; name wood_ash; lognormal variance with pedigree 0.0146, pedigree (2,4,1,5,1)
  average data from finnish database
  Uncertainty: a
  production volume; = PV_paper*wood_ash
    (same comment as for ash from deinking sludge)
  properties: carbon content, non-fossil 0.012, dry mass 1 kg, wet mass 1 kg
  note on carbon content, non-fossil: Biogenic C content was calculated after biogenic C contents of chemicals used in the production of the paper (in Tab 8.6 ecoinvent v2.2 report 11_III, part 8). The cellulose content in 1 kg of paper (on a wet mas basis) was estimated as (1-chemical content), C content of cellulose was considered 0.44 kgC/kg dry mass (ecoinvent v2.2 report, n 15a, pg 40) Tab A.9, ecoinvent v2.2 report 13_I.

## Inputs from nature
- Water, cooling, unspecified natural origin [natural resource, in water]: 0.058 m3; name water_cooling_UNO_input; lognormal variance with pedigree 0.0426, pedigree (1,3,5,5,1)
  average from several different paper mills
  Uncertainty: a
- Water, unspecified natural origin [natural resource, in water]: 0.0131 m3; name water_UNO_input; lognormal variance with pedigree 0.0426, pedigree (1,3,5,5,1)
  average from several different paper mills
  Uncertainty: a

## Emissions to nature
- Acetaldehyde [air, urban air close to ground]: 2.25e-7 kg; lognormal variance with pedigree 0.1806, pedigree (2,5,5,5,4)
  estimation - based on respective heating modules
  Uncertainty: e
- Acetic acid [air, urban air close to ground]: 5.83e-7 kg; lognormal variance with pedigree 0.1806, pedigree (2,5,5,5,4)
  estimation - based on respective heating modules
  Uncertainty: e
- Acetone [air, urban air close to ground]: 6.43e-8 kg; lognormal variance with pedigree 0.1806, pedigree (2,5,5,5,4)
  estimation - based on respective heating modules
  Uncertainty: e
- Acetylene [air, urban air close to ground]: 1.38e-6 kg; lognormal variance with pedigree 0.1806, pedigree (2,5,5,5,4)
  estimation - based on respective heating modules
  Uncertainty: e
- Aluminium III [air, urban air close to ground]: 4.07e-6 kg; lognormal variance with pedigree 0.1806, pedigree (2,5,5,5,4)
  estimation - based on respective heating modules
  Uncertainty: e
- Ammonia [air, urban air close to ground]: 4.5e-6 kg; lognormal variance with pedigree 0.1806, pedigree (2,5,5,5,4)
  estimation - based on respective heating modules
  Uncertainty: e
- Antimony ion [air, urban air close to ground]: 6.88e-9 kg; lognormal variance with pedigree 0.1806, pedigree (2,5,5,5,4)
  estimation - based on respective heating modules
  Uncertainty: e
- Arsenic ion [air, urban air close to ground]: 2.38e-8 kg; lognormal variance with pedigree 0.1806, pedigree (2,5,5,5,4)
  estimation - based on respective heating modules
  Uncertainty: e
- Barium II [air, urban air close to ground]: 7.8e-8 kg; lognormal variance with pedigree 0.7806, pedigree (2,5,5,5,4)
  estimation - based on respective heating modules
  Uncertainty: e
- Benzene [air, urban air close to ground]: 4.61e-6 kg; lognormal variance with pedigree 0.1806, pedigree (2,5,5,5,4)
  estimation - based on respective heating modules
  Uncertainty: e
- Benzo(a)pyrene [air, urban air close to ground]: 6.67e-9 kg; lognormal variance with pedigree 0.1806, pedigree (2,5,5,5,4)
  estimation - based on respective heating modules
  Uncertainty: e
- Beryllium II [air, urban air close to ground]: 7.8e-10 kg; lognormal variance with pedigree 0.7806, pedigree (2,5,5,5,4)
  estimation - based on respective heating modules
  Uncertainty: e
- Boron [air, urban air close to ground]: 3.08e-6 kg; lognormal variance with pedigree 0.7806, pedigree (2,5,5,5,4)
  estimation - based on respective heating modules
  Uncertainty: e
- Bromine [air, urban air close to ground]: 1.61e-7 kg; lognormal variance with pedigree 0.1806, pedigree (2,5,5,5,4)
  estimation - based on respective heating modules
  Uncertainty: e
- Butane [air, urban air close to ground]: 1.52e-6 kg; lognormal variance with pedigree 0.4406, pedigree (2,5,5,5,4)
  estimation - based on respective heating modules
  Uncertainty: e
- Cadmium II [air, urban air close to ground]: 1.82e-8 kg; lognormal variance with pedigree 0.7806, pedigree (2,5,5,5,4)
  estimation - based on respective heating modules
  Uncertainty: e
- Calcium II [air, urban air close to ground]: 2.88e-5 kg; lognormal variance with pedigree 0.4406, pedigree (2,5,5,5,4)
  estimation - based on respective heating modules
  Uncertainty: e
- Carbon dioxide, fossil [air, urban air close to ground]: 0.187 kg; lognormal variance with pedigree 0.1406, pedigree (2,5,5,5,4)
  estimation - based on respective heating modules
  Uncertainty: e
- Carbon dioxide, non-fossil [air, urban air close to ground]: 0.247 kg; lognormal variance with pedigree 0.1406, pedigree (2,5,5,5,4)
  estimation - based on respective heating modules
  Uncertainty: e
- Carbon monoxide, fossil [air, urban air close to ground]: 0.00108 kg; lognormal variance with pedigree 0.7806, pedigree (2,5,5,5,4)
  estimation - based on respective heating modules
  Uncertainty: e
- Carbon monoxide, non-fossil [air, urban air close to ground]: 0.000125 kg; lognormal variance with pedigree 0.7806, pedigree (2,5,5,5,4)
  estimation - based on respective heating modules
  Uncertainty: e
- Chlorine [air, urban air close to ground]: 4.68e-7 kg; lognormal variance with pedigree 0.4406, pedigree (2,5,5,5,4)
  estimation - based on respective heating modules
  Uncertainty: e
- Chromium III [air, urban air close to ground]: 3.76e-8 kg; lognormal variance with pedigree 0.7806, pedigree (2,5,5,5,4)
  estimation - based on respective heating modules
  Uncertainty: e
- Chromium VI [air, urban air close to ground]: 5.94e-10 kg; lognormal variance with pedigree 0.7806, pedigree (2,5,5,5,4)
  estimation - based on respective heating modules
  Uncertainty: e
- Cobalt II [air, urban air close to ground]: 2.45e-8 kg; lognormal variance with pedigree 0.7806, pedigree (2,5,5,5,4)
  estimation - based on respective heating modules
  Uncertainty: e
- Copper ion [air, urban air close to ground]: 8.66e-8 kg; lognormal variance with pedigree 0.7806, pedigree (2,5,5,5,4)
  estimation - based on respective heating modules
  Uncertainty: e
- Dinitrogen monoxide [air, urban air close to ground]: 7.62e-6 kg; lognormal variance with pedigree 0.1806, pedigree (2,5,5,5,4)
  estimation - based on respective heating modules
  Uncertainty: e
- Dioxins, measured as 2,3,7,8-tetrachlorodibenzo-p-dioxin [air, urban air close to ground]: 1.8e-12 kg; lognormal variance with pedigree 0.1806, pedigree (2,5,5,5,4)
  estimation - based on respective heating modules
  Uncertainty: e
- Ethane [air, urban air close to ground]: 4.13e-6 kg; lognormal variance with pedigree 0.1806, pedigree (2,5,5,5,4)
  estimation - based on respective heating modules
  Uncertainty: e
- Ethanol [air, urban air close to ground]: 1.29e-7 kg; lognormal variance with pedigree 0.1806, pedigree (2,5,5,5,4)
  estimation - based on respective heating modules
  Uncertainty: e
- Ethyl benzene [air, urban air close to ground]: 7.8e-8 kg; lognormal variance with pedigree 0.1806, pedigree (2,5,5,5,4)
  estimation - based on respective heating modules
  Uncertainty: e
- Ethylene [air, urban air close to ground]: 8.25e-6 kg; lognormal variance with pedigree 0.7806, pedigree (2,5,5,5,4)
  estimation - based on respective heating modules
  Uncertainty: e
- Fluorine [air, urban air close to ground]: 1.3e-7 kg; lognormal variance with pedigree 0.1806, pedigree (2,5,5,5,4)
  estimation - based on respective heating modules
  Uncertainty: e
- Formaldehyde [air, urban air close to ground]: 7.82e-7 kg; lognormal variance with pedigree 0.1806, pedigree (2,5,5,5,4)
  estimation - based on respective heating modules
  Uncertainty: e
- Hexachlorobenzene [air, urban air close to ground]: 1.87e-14 kg; lognormal variance with pedigree 0.1806, pedigree (2,5,5,5,4)
  estimation - based on respective heating modules
  Uncertainty: e
- Hydrocarbons, aliphatic, alkanes, unspecified [air, urban air close to ground]: 4e-6 kg; lognormal variance with pedigree 0.1806, pedigree (2,5,5,5,4)
  estimation - based on respective heating modules
  Uncertainty: e
- Hydrocarbons, aliphatic, unsaturated [air, urban air close to ground]: 9.45e-6 kg; lognormal variance with pedigree 0.1806, pedigree (2,5,5,5,4)
  estimation - based on respective heating modules
  Uncertainty: e
- Hydrocarbons, aromatic [air, urban air close to ground]: 6.43e-8 kg; lognormal variance with pedigree 0.1806, pedigree (2,5,5,5,4)
  estimation - based on respective heating modules
  Uncertainty: e
- Hydrochloric acid [air, urban air close to ground]: 4.89e-6 kg; lognormal variance with pedigree 0.1806, pedigree (2,5,5,5,4)
  estimation - based on respective heating modules
  Uncertainty: e
- Hydrogen fluoride [air, urban air close to ground]: 2e-7 kg; lognormal variance with pedigree 0.1806, pedigree (2,5,5,5,4)
  estimation - based on respective heating modules
  Uncertainty: e
- Hydrogen sulfide [air, urban air close to ground]: 2.67e-8 kg; lognormal variance with pedigree 0.1806, pedigree (2,5,5,5,4)
  estimation - based on respective heating modules
  Uncertainty: e
- Iodine [air, urban air close to ground]: 1.31e-8 kg; lognormal variance with pedigree 0.1806, pedigree (2,5,5,5,4)
  estimation - based on respective heating modules
  Uncertainty: e
- Iron ion [air, urban air close to ground]: 4.07e-6 kg; lognormal variance with pedigree 0.7806, pedigree (2,5,5,5,4)
  estimation - based on respective heating modules
  Uncertainty: e
- Lead II [air, urban air close to ground]: 1.06e-7 kg; lognormal variance with pedigree 0.7806, pedigree (2,5,5,5,4)
  estimation - based on respective heating modules
  Uncertainty: e
- Lead-210 [air, urban air close to ground]: 2.04e-5 kBq; lognormal variance with pedigree 0.4406, pedigree (2,5,5,5,4)
  estimation - based on respective heating modules
  Uncertainty: e
- Magnesium [air, urban air close to ground]: 3.27e-6 kg; lognormal variance with pedigree 0.7806, pedigree (2,5,5,5,4)
  estimation - based on respective heating modules
  Uncertainty: e
- Manganese II [air, urban air close to ground]: 4.5e-7 kg; lognormal variance with pedigree 0.7806, pedigree (2,5,5,5,4)
  estimation - based on respective heating modules
  Uncertainty: e
- Mercury II [air, urban air close to ground]: 4.19e-9 kg; lognormal variance with pedigree 0.7806, pedigree (2,5,5,5,4)
  estimation - based on respective heating modules
  Uncertainty: e
- Methane, fossil [air, urban air close to ground]: 8.65e-5 kg; lognormal variance with pedigree 0.1806, pedigree (2,5,5,5,4)
  estimation - based on respective heating modules
  Uncertainty: e
- Methane, non-fossil [air, urban air close to ground]: 1.04e-6 kg; lognormal variance with pedigree 0.1806, pedigree (2,5,5,5,4)
  estimation - based on respective heating modules
  Uncertainty: e
- Methanol [air, urban air close to ground]: 2.19e-7 kg; lognormal variance with pedigree 0.1806, pedigree (2,5,5,5,4)
  estimation - based on respective heating modules
  Uncertainty: e
- Molybdenum VI [air, urban air close to ground]: 1.9e-8 kg; lognormal variance with pedigree 0.7806, pedigree (2,5,5,5,4)
  estimation - based on respective heating modules
  Uncertainty: e
- NMVOC, non-methane volatile organic compounds [air, urban air close to ground]: 6.34e-6 kg; lognormal variance with pedigree 0.1806, pedigree (2,5,5,5,4)
  estimation - based on respective heating modules
  Uncertainty: e
- Nickel II [air, urban air close to ground]: 3.11e-7 kg; lognormal variance with pedigree 0.7806, pedigree (2,5,5,5,4)
  estimation - based on respective heating modules
  Uncertainty: e
- Nitrogen oxides [air, urban air close to ground]: 0.000459 kg; lognormal variance with pedigree 0.0832, pedigree (2,3,5,5,1)
  average from finnish database and several paper mills
  Uncertainty: a
- PAH, polycyclic aromatic hydrocarbons [air, urban air close to ground]: 5.08e-8 kg; lognormal variance with pedigree 0.1806, pedigree (2,5,5,5,4)
  estimation - based on respective heating modules
  Uncertainty: e
- Particulate Matter, < 2.5 um [air, urban air close to ground]: 3.9e-5 kg; lognormal variance with pedigree 0.3432, pedigree (2,3,5,5,1)
  average from finnish database and several paper mills
  Uncertainty: a
- Particulate Matter, > 10 um [air, urban air close to ground]: 1.3e-5 kg; lognormal variance with pedigree 0.0832, pedigree (2,3,5,5,1)
  average from finnish database and several paper mills
  Uncertainty: a
- Particulate Matter, > 2.5 um and < 10um [air, urban air close to ground]: 1.8e-5 kg; lognormal variance with pedigree 0.1632, pedigree (2,3,5,5,1)
  average from finnish database and several paper mills
  Uncertainty: a
- Pentachlorophenol [air, urban air close to ground]: 2.11e-11 kg; lognormal variance with pedigree 0.1806, pedigree (2,5,5,5,4)
  estimation - based on respective heating modules
  Uncertainty: e
- Pentane [air, urban air close to ground]: 2.61e-6 kg; lognormal variance with pedigree 0.1806, pedigree (2,5,5,5,4)
  estimation - based on respective heating modules
  Uncertainty: e
- Phenol [air, urban air close to ground]: 1.33e-7 kg; lognormal variance with pedigree 0.1806, pedigree (2,5,5,5,4)
  estimation - based on respective heating modules
  Uncertainty: e
- Phosphorus [air, urban air close to ground]: 8.12e-7 kg; lognormal variance with pedigree 0.1806, pedigree (2,5,5,5,4)
  estimation - based on respective heating modules
  Uncertainty: e
- Polonium-210 [air, urban air close to ground]: 3.75e-5 kBq; lognormal variance with pedigree 0.4406, pedigree (2,5,5,5,4)
  estimation - based on respective heating modules
  Uncertainty: e
- Potassium I [air, urban air close to ground]: 6.13e-5 kg; lognormal variance with pedigree 0.7806, pedigree (2,5,5,5,4)
  estimation - based on respective heating modules
  Uncertainty: e
- Potassium-40 [air, urban air close to ground]: 5.58e-6 kBq; lognormal variance with pedigree 0.4406, pedigree (2,5,5,5,4)
  estimation - based on respective heating modules
  Uncertainty: e
- Propane [air, urban air close to ground]: 3.2e-6 kg; lognormal variance with pedigree 0.1806, pedigree (2,5,5,5,4)
  estimation - based on respective heating modules
  Uncertainty: e
- Propionic acid [air, urban air close to ground]: 4.35e-8 kg; lognormal variance with pedigree 0.1806, pedigree (2,5,5,5,4)
  estimation - based on respective heating modules
  Uncertainty: e
- Propylene [air, urban air close to ground]: 1.38e-6 kg; lognormal variance with pedigree 0.1806, pedigree (2,5,5,5,4)
  estimation - based on respective heating modules
  Uncertainty: e
- Radium-226 [air, urban air close to ground]: 5.27e-6 kBq; lognormal variance with pedigree 0.4406, pedigree (2,5,5,5,4)
  estimation - based on respective heating modules
  Uncertainty: e
- Radium-228 [air, urban air close to ground]: 7.72e-6 kBq; lognormal variance with pedigree 0.4406, pedigree (2,5,5,5,4)
  estimation - based on respective heating modules
  Uncertainty: e
- Radon-220 [air, urban air close to ground]: 1.15e-6 kBq; lognormal variance with pedigree 0.4406, pedigree (2,5,5,5,4)
  estimation - based on respective heating modules
  Uncertainty: e
- Radon-222 [air, urban air close to ground]: 1.15e-6 kBq; lognormal variance with pedigree 0.4406, pedigree (2,5,5,5,4)
  estimation - based on respective heating modules
  Uncertainty: e
- Scandium [air, urban air close to ground]: 2.74e-10 kg; lognormal variance with pedigree 0.7806, pedigree (2,5,5,5,4)
  estimation - based on respective heating modules
  Uncertainty: e
- Selenium IV [air, urban air close to ground]: 2.62e-8 kg; lognormal variance with pedigree 0.7806, pedigree (2,5,5,5,4)
  estimation - based on respective heating modules
  Uncertainty: e
- Silicon [air, urban air close to ground]: 3.36e-5 kg; lognormal variance with pedigree 0.7806, pedigree (2,5,5,5,4)
  estimation - based on respective heating modules
  Uncertainty: e
- Sodium I [air, urban air close to ground]: 4.36e-6 kg; lognormal variance with pedigree 0.7806, pedigree (2,5,5,5,4)
  estimation - based on respective heating modules
  Uncertainty: e
- Strontium II [air, urban air close to ground]: 8.66e-8 kg; lognormal variance with pedigree 0.7806, pedigree (2,5,5,5,4)
  estimation - based on respective heating modules
  Uncertainty: e
- Sulfur dioxide [air, urban air close to ground]: 0.00062 kg; lognormal variance with pedigree 0.0432, pedigree (2,3,5,5,1)
  average from finnish database and several paper mills
  Uncertainty: a
- Thallium I [air, urban air close to ground]: 1.66e-10 kg; lognormal variance with pedigree 0.7806, pedigree (2,5,5,5,4)
  estimation - based on respective heating modules
  Uncertainty: e
- Thorium [air, urban air close to ground]: 9.67e-10 kg; lognormal variance with pedigree 0.7806, pedigree (2,5,5,5,4)
  estimation - based on respective heating modules
  Uncertainty: e
- Thorium-228 [air, urban air close to ground]: 2.43e-6 kBq; lognormal variance with pedigree 0.4406, pedigree (2,5,5,5,4)
  estimation - based on respective heating modules
  Uncertainty: e
- Thorium-232 [air, urban air close to ground]: 1.52e-6 kBq; lognormal variance with pedigree 0.4406, pedigree (2,5,5,5,4)
  estimation - based on respective heating modules
  Uncertainty: e
- Tin ion [air, urban air close to ground]: 5.92e-10 kg; lognormal variance with pedigree 0.7806, pedigree (2,5,5,5,4)
  estimation - based on respective heating modules
  Uncertainty: e
- Titanium ion [air, urban air close to ground]: 9.91e-8 kg; lognormal variance with pedigree 0.7806, pedigree (2,5,5,5,4)
  estimation - based on respective heating modules
  Uncertainty: e
- Toluene [air, urban air close to ground]: 1.5e-6 kg; lognormal variance with pedigree 0.1806, pedigree (2,5,5,5,4)
  estimation - based on respective heating modules
  Uncertainty: e
- Uranium [air, urban air close to ground]: 1.56e-9 kg; lognormal variance with pedigree 0.7806, pedigree (2,5,5,5,4)
  estimation - based on respective heating modules
  Uncertainty: e
- Uranium-238 [air, urban air close to ground]: 4.41e-6 kBq; lognormal variance with pedigree 0.4406, pedigree (2,5,5,5,4)
  estimation - based on respective heating modules
  Uncertainty: e
- Vanadium V [air, urban air close to ground]: 1.15e-6 kg; lognormal variance with pedigree 0.7806, pedigree (2,5,5,5,4)
  estimation - based on respective heating modules
  Uncertainty: e
- Water [air, unspecified]: 0.02444 m3; name water_to_air_unspecified; lognormal variance with pedigree 0.0827, pedigree (2,2,5,5,1)
  Calculated value based on literature values and expert opinion. See comments in the parametres" comment field.
  property fraction, origin: fresh water 0; name fraction_origin_fresh_water
  property fraction, origin: salt water 0; name fraction_origin_salt_water
  property fraction, origin: unspecified 1; name fraction_origin_unspecified
- Xylenes, unspecified [air, urban air close to ground]: 8.89e-7 kg; lognormal variance with pedigree 0.1806, pedigree (2,5,5,5,4)
  estimation - based on respective heating modules
  Uncertainty: e
- Zinc II [air, urban air close to ground]: 8e-7 kg; lognormal variance with pedigree 0.7806, pedigree (2,5,5,5,4)
  estimation - based on respective heating modules
  Uncertainty: e
- m-Xylene [air, urban air close to ground]: 3.12e-7 kg; lognormal variance with pedigree 0.1806, pedigree (2,5,5,5,4)
  estimation - based on respective heating modules
  Uncertainty: e
- AOX, Adsorbable Organic Halides [water, surface water]: 3e-5 kg; lognormal variance with pedigree 0.0832, pedigree (2,3,5,5,1)
  average from finnish database and several paper mills
  Uncertainty: a
- BOD5, Biological Oxygen Demand [water, surface water]: 0.00033 kg; lognormal variance with pedigree 0.0832, pedigree (2,3,5,5,1)
  average from finnish database and several paper mills
  Uncertainty: a
- COD, Chemical Oxygen Demand [water, surface water]: 0.00327 kg; lognormal variance with pedigree 0.0832, pedigree (2,3,5,5,1)
  average from finnish database and several paper mills
  Uncertainty: a
- DOC, Dissolved Organic Carbon [water, surface water]: 0.0002 kg; lognormal variance with pedigree 0.0826, pedigree (1,3,5,5,1)
  average from several different paper mills
  Uncertainty: a
- Nitrogen [water, surface water]: 5e-5 kg; lognormal variance with pedigree 0.0832, pedigree (2,3,5,5,1)
  average from finnish database and several paper mills
  Uncertainty: a
- Phosphorus [water, surface water]: 1e-5 kg; lognormal variance with pedigree 0.0832, pedigree (2,3,5,5,1)
  average from finnish database and several paper mills
  Uncertainty: a
- Suspended solids, unspecified [water, surface water]: 0.00048 kg; lognormal variance with pedigree 0.0832, pedigree (2,3,5,5,1)
  average from finnish database and several paper mills
  Uncertainty: a
- TOC, Total Organic Carbon [water, surface water]: 0.00043 kg; lognormal variance with pedigree 0.0826, pedigree (1,3,5,5,1)
  average from several different paper mills
  Uncertainty: a
- Water [water, unspecified]: 0.04666 m3; name water_to_water_unspecified; lognormal variance with pedigree 0.0827, pedigree (2,2,5,5,1)
  (same comment as for Water)
  property carbon content, fossil 0; name C_content_fossil
  property carbon content, non-fossil 0; name C_content_non_fossil
  property dry mass 0 kg; name DM
  property fraction, origin: fresh water 0; name fraction_origin_fresh_water_Ww
  property fraction, origin: salt water 0; name fraction_origin_salt_water_Ww
  property fraction, origin: unspecified 1; name fraction_origin_unspecified_Ww
  property water in wet mass 1000 kg; name WWM
  property wet mass 1000 kg; name WM

## Extrapolations
This dataset has been copied from an original dataset covering the geography RER. The uncertainty has been adjusted accordingly.
