# nutrient supply from ammonium chloride

Dataset: EcoSpold 2, unit process
Geography: GLO
Time period: 2016-01-01 to 2023-12-31
Technology level: current
Classification: ISIC rev.4 ecoinvent: 2012:Manufacture of fertilizers and nitrogen compounds
Scenario: Business-as-Usual
System model: Allocation, cut-off by classification
Generated by: Avraam Symeonidis
Database: ecoinvent
isCopyrightProtected: true
accessRestrictedTo: 1

## General comment
This inventory describes the supply of nutrients from ''ammonium chloride'' for fertiliser use.
No machinery expenditures or emissions to the environment are considered related to the actual application of this substance on soil during its agricultural use. The purpose of this activity is to connect the chemical production of ''ammonium chloride'' with its generic use as fertilizer. The product ''ammonium chloride'' is connected to the generic market for 'inorganic nitrogen fertiliser, as N' through this supplying activity. In the agricultural context, ''ammonium chloride'' can be used directly as a fertilizer input to crop production, eventually with other chemicals; alternatively, a generic input of 'inorganic nitrogen fertiliser, as N' can be used instead, and this will represent the regional consumption mix for his type of nutrient. A way in between is allowed by using the generic input 'inorganic nitrogen fertiliser, as N' and link to the activity providing it from a specific chemical.
In all cases, emissions associated to the application of the fertilizer have to be calculated in the crop production activity.

## Technology
Inventory based on composition of ''ammonium chloride''.

## Reference product
- inorganic nitrogen fertiliser, as N: 1 kg; name nitrogen; = (1/53.5)*14*ammonium_chloride; By-product classification allocatable product; CPC 34619: Other nitrogenous fertilizers and mixtures, n.e.c.; HS2017 310229: Fertilizers, mineral or chemical; nitrogenous, other than ammonium sulphate
  based on N-content, calculated with molar weight of ammonium chloride (53.5g/mol) and nitrogen (14g/mol).
  production volume 4.04329e7 kg; = (1.1854E+06 + 2.58E+08)*0.6*0.26
    No specific values were found on use of ammonium chloride in fertiliser applications at the World scale. In Japan, approx. 70% is used as a fertiliser. However, in other geographies this percentage seems to differ. In the US it is stated that ammonium chloride is mainly used as feed additive. No information for the European consumption is available (http://www.chem.unep.ch/irptc/sids/oecdsids/12125029.pdf ) The total production volume is obtained from the ammonium chloride produced in the inventories 'amination of chlorosilane' and 'modified Solvay's process, Hou's process' which can be found in the Ecoinvent database. Iit is estimated that on a global average, 60% of ammonium chloride is used in fertiliser applications. The N-fertiliser produced is based on the N-content of ammonium chloride (26%).
  property carbon content, fossil 0
    Carbon content, fossil is calculated based on the chemical formula of the substance.
  property nitrogen content 1
    Nitrogen content (on a dry matter basis) of inorganic nitrogen fertiliser, as N is calculated from the molecular formula of the substance (Nitrogen).
  property price 0.473 EUR2005
    Temporary price data. Calculated as 90% of purchasers price based on: 2004 prices are calculated on basis of Import/Export data (tonnes and US$) from UN Trade Statistics Database (http://data.un.org/Browse.aspx?d=ComTrade, accessed 7/7-2010). N, P2O5, or K2O content (http://www.fertilizer.org/ifa/Home-Page/STATISTICS/Conversions-factors)
  properties: carbon allocation 0 kg, carbon content 0, carbon content, non-fossil 0, dry mass 1 kg, water content 0, water in wet mass 0 kg, wet mass 1 kg

## Inputs from technosphere
- ammonium chloride: 3.82143 kg; name ammonium_chloride; lognormal variance with pedigree 0.0032, pedigree (2,1,3,1,1)
  properties: dry mass 1 kg, wet mass 1 kg
