# potato grading

Dataset: EcoSpold 2, unit process
Geography: US
Time period: 2021-01-01 to 2023-12-31
Technology level: current
Classification: ISIC rev.4 ecoinvent: 0163:Post-harvest crop activities
Scenario: Business-as-Usual
System model: Allocation, cut-off by classification
Generated by: Juanita Barrera
Database: ecoinvent
isCopyrightProtected: true
accessRestrictedTo: 1

## General comment
This dataset models the grading process of 1 kg ungraded potatoes.

## Included activities start
The activity starts from the agricultural field foreseen to be processed.

## Included activities end
This activity ends with potato planting. The dataset includes the diesel fuel consumption and the amount of agricultural machinery and of the shed attributed to the field work. It was also taken into consideration the amount of emissions to the air from combustion and the emission to the soil from tyre abrasion during the work process. Demand on machinery, buildings (shed) and electricity for potato grading and weighting.

## Geography
The inventory is a copy of the geography of Switzerland. Data quality indicators were adjusted accordingly.

## Technology
The inventory uses a potato grader and a weigh.

## Reference product
- potato grading: 1 kg; By-product classification allocatable product; CPC 86111: Post-harvest crop services
  production volume 1.9e10 kg
    The production volume is a 3-year-average from 2019 to 2021 for the US. It is assumed that the amount of produced potatoes equals to amount of graded potatoes. Source: FAOSTAT. Crops and livestock products. Available (accessed 6/10/2023): https://www.fao.org/faostat/en/#data
  property price 68.7715 EUR2005
    The price is from the year 2023. The price is estimated as a proxy based on the source: https://ag.umass.edu/sites/ag.umass.edu/files/pdf-doc-ppt/potato_budget.xls. The prices were adjusted for inflation relative to 2005 using the producer price index (PPI) of the euro area, published by eurostat (https://ec.europa.eu/eurostat/databrowser/view/STS_INPP_A__custom_6416181/default/table?lang=en, last accessed on 2023-06-01).
  properties: carbon allocation 0 kg, carbon content 0

## Inputs from technosphere
- agricultural machinery, unspecified: 0.000216 kg; lognormal variance with pedigree 0.3028, pedigree (1,3,2,5,1)
  proxy from "potato grading, GLO"
- electricity, low voltage: 0.00102 kWh; lognormal variance with pedigree 0.0034, pedigree (1,3,2,5,1)
  proxy from "potato grading, GLO"
- shed: 1.09e-6 m2; lognormal variance with pedigree 0.3028, pedigree (1,3,2,5,1)
  proxy from "potato grading, GLO"

## Extrapolations
The dataset is modeled for agricultural production system in US. Data Quality indicators are adjusted accordingly. The inventory uses a potato grader and a weigh.
