# stucco production

Dataset: EcoSpold 2, unit process
Geography: RoW
Time period: 1997-01-01 to 2023-12-31
Technology level: current
Classification: ISIC rev.4 ecoinvent: 2395:Manufacture of articles of concrete, cement and plaster
Classification: EcoSpold01Categories: construction materials/binder
Synonyms: gips; Kalziumsulfat halbhydrat; plaster of Paris; calcium sulphate hemihydrate; gypsum
Tags: ConvertedDataset
Scenario: Business-as-Usual
System model: Allocation, cut-off by classification
Generated by: Hans-Jörg Althaus
Published in: Kellenberger D. 2007
Database: ecoinvent
isCopyrightProtected: true
accessRestrictedTo: 1

## General comment
used for plaster, moulds, and gypsum boards; the dust emission is included in the estimated emission inventoried in the "mining Gypsum" process
[This dataset was already contained in the ecoinvent database version 2. It was not individually updated during the transfer to ecoinvent version 3. Life Cycle Impact Assessment results may still have changed, as they are affected by changes in the supply chain, i.e. in other datasets. This dataset was generated following the ecoinvent quality guidelines for version 2. It may have been subject to central changes described in the ecoinvent version 3 change report (http://www.ecoinvent.org/database/ecoinvent-version-3/reports-of-changes/), and the results of the central updates were reviewed extensively. The changes added e.g. consistent water flows and other information throughout the database. The documentation of this dataset can be found in the ecoinvent reports of version 2, which are still available via the ecoinvent website. The change report linked above covers all central changes that were made during the conversion process.]

## Included activities end
burning of gypsum mineral and milling of stucco

## Geography
data for Switzerland

## Technology
Assumed average technology for Switzerland

## Reference product
- stucco: 1 kg; By-product classification allocatable product; CPC 37410: Plasters; HS2017 252020: Plasters; (consisting of calcined gypsum or calcium sulphate), whether or not coloured, with or without sma[...]
  EcoSpold01Location=CH
  production volume 3.96633 kg
    This is a placeholder value that does not reflect real-world production volumes. This dataset does not currently require a real-world production volume to work in the database framework, and no actual data were collected yet. This has no negative effect on the results of the ecoinvent database.
  property price 0.052 EUR2005
    Calculated value based on data from United Nations Commodity Trade Statistics Database (comtrade.un.org). UN comtrade category: 252329 Portland cement, other than white cement. Year 2005. Using exchange rate of 1EURO = 1.209 USD. Average of price of import into 5 main markets (EU, US, JP, IN and CN).
  properties: carbon allocation 0 kg, carbon content 0, carbon content, fossil 0, carbon content, non-fossil 0, dry mass 1 kg, water content 0, water in wet mass 0 kg, wet mass 1 kg

## Inputs from technosphere
- electricity, medium voltage: 0.000754206, 0.0150447, 0.00505498, 0.000230964, 4.62272e-5, 9.92601e-6, 0.00105053, 0.0015536, 0.00325484 kWh (9 suppliers, which the file names only by identifier); sum of these 0.027 kWh; lognormal variance with pedigree 0.064, pedigree (3,4,5,5,3)
  EcoSpold01Location=CH
- gypsum, mineral: 1.13108, 0.0236146, 0.00530376 kg (3 suppliers, which the file names only by identifier); sum of these 1.16 kg; lognormal variance with pedigree 0.068, pedigree (4,5,5,5,1)
  EcoSpold01Location=CH
  properties: dry mass 1 kg, wet mass 1 kg
- heat, district or industrial, natural gas: 0.00831271, 0.505868, 0.186819 MJ (3 suppliers, which the file names only by identifier); sum of these 0.701 MJ; lognormal variance with pedigree 0.0426, pedigree (2,1,5,5,1)
  EcoSpold01Location=RER
  properties: heating value, net 1 MJ
- heat, district or industrial, other than natural gas: 0.17058, 7.90267e-5, 0.00434074 MJ (3 suppliers, which the file names only by identifier); sum of these 0.175 MJ; lognormal variance with pedigree 0.0426, pedigree (2,1,5,5,1)
  EcoSpold01Location=CH
  properties: heating value, net 1 MJ
- industrial machine, heavy, unspecified: 0.000139 kg; lognormal variance with pedigree 0.374, pedigree (3,4,5,5,3)
  EcoSpold01Location=RER

## Sampling procedure
environmental report, personal communication

## Extrapolations
none This dataset has been copied from an original dataset covering the geography CH. The uncertainty has been adjusted accordingly.

## Review by Roberto Dones 2003-07-04
Passed
