# hydrazine production

Dataset: EcoSpold 2, unit process
Geography: RoW
Time period: 2010-01-01 to 2023-12-31
Technology level: current
Classification: ISIC rev.4 ecoinvent: 2011:Manufacture of basic chemicals
Synonyms: N2H4
Scenario: Business-as-Usual
System model: Allocation, cut-off by classification
Share of production covered: 100 %
Generated by: Jürgen Sutter
Database: ecoinvent
isCopyrightProtected: true
accessRestrictedTo: 1

## General comment
The process “hydrazine, at plant, GLO" is modelled for the production of hydrazine from sodium hypochlorite. Raw materials are modelled with a stoechiometric calculation. Emissions are estimated. Energy consumptions, infrastructure and transports are calculated with standard values.
Hydrazine (H2N–NH2; CAS 302-01-2) is a colourless liquid with an ammoniacal odour. It is miscible with water in all proportions, and its aqueous solutions are highly alkaline. Certain physical properties of the aqueous solutions, e.g., viscosity and density, display a maximum value at the 64 % composition (corresponding to the monohydrate), suggesting that the hydrate, N2H4 • H2O, exists in both the solid and the liquid phase. Hydrazine forms an azeotrope with water, containing 58.5 mol % hydrazine. Availability of raw materials and production costs rule out most of the possible routes to hydrazine; nitrogen and ammonia are the only obvious starting materials for a reasonably direct process.
Consideration of the variation of standard free energy ΔF °(g) (298 K) for the gaseous system H2– N2– NH3– N2H4 indicates that the direct synthesis of hydrazine from nitrogen and hydrogen is energetically unfavorable. The free energy of formation is clearly much more favorable for production of ammonia.
The search for selective reduction of nitrogen has not yet found a practical or economic solution. Therefore, ammonia remains the only valuable nitrogen starting material for production of hydrazine.
Coupling of two molecules of NH3 with coproduction of hydrogen also appears, on paper, to be an attractive process. Such a reaction is, however, endothermic and highly inefficient. For example, decomposition of ammonia by an electric discharge, photolysis, or radiolysis gives only low yields of hydrazine. An alternative method is to oxidize the hydrogen atoms removed from the ammonia.
Only three oxidants are relevant to an industrial process: chlorine, oxygen, and hydrogen peroxide.
A further difficulty is that hydrazine, which is a much more powerful reducing agent than ammonia, may also react with the oxidizing agent.
Chlorine has been widely used in the Raschig process, which is still operated. To avoid further oxidation of hydrazine by chlorine, very dilute conditions have to be employed. Yields are no higher than 60 %.
The use of air or oxygen as a clean oxidizing agent is hardly feasible. This process can only be applied to a few aromatic imines that lead to aromatic azines, from which hydrazine can only be obtained as the sulfate.
The only modern method consists of obtaining hydrazine as a derivative from which it may be easily and efficiently released. Azines of low molecular mass are suitable for such a purpose.
The azines of acetone and methyl ethyl ketone are easily hydrolyzed under pressure forming hydrazine and regenerating the ketone. Bayer has considerably improved yields by introducing acetone into the Raschig process.
In the 1970s, PCUK, (now Atochem) developed a new, efficient, and clean process based on the oxidation of ammonia by hydrogen peroxide in the presence of a ketone. Most hydrazine is now produced by the ketazine process, with oxidation of ammonia by chlorine or hydrogen peroxide.
Raschig Process
In the Raschig process sodium hypochlorite (obtained by reaction of chlorine with sodium hydroxide) is used to oxidize ammonia.
Two steps are involved in the oxidation. In the first, carried out at ca. 5 °C, chloramine is formed by a fast reaction. The reaction mixture is then mixed with a large molar excess of ammonia (40 : 1) and the slow reaction leading to hydrazine is carried out at 130 – 150 °C and 3.0 MPa.
The kinetics and mechanism and the influence of various parameters such as temperature, pressure, concentration, and molar ratios have been examined.
At the outlet of the reactor, the reaction liquor contains 1 % hydrazine hydrate and ca. 4 % sodium chloride; the pressure is reduced to atmospheric in a battery of evaporators. Ammonia is condensed, concentrated, and recycled. The liquor from the bottom of the stripping columns is freed from salt in a conventional forced – circulation salting evaporator. The distillate is then concentrated to 100 % hydrazine hydrate.
For such a process, dilute solutions and a very high ammonia/hypochlorite ratio are essential in order to obtain reasonable yields. Evaporation costs are therefore high even when steam savings are realized.
Olin Raschig Process
In the Olin Raschig process, which is used by Olin to produce anhydrous hydrazine for aerospace applications, the production of sodium hypochlorite is carefully controlled. A low temperature is used to prevent decomposition and chlorate formation, and the excess of sodium hydroxide is kept at a low level.
The sodium hypochlorite solution is mixed with a threefold excess of ammonia at 5 °C to form chloramine, which is then rapidly added to a 30-fold molar excess of anhydrous ammonia under pressure (20 – 30 MPa) and heated to 130 °C.
The reaction liquor, containing 1 – 2 % hydrazine hydrate, is treated as in the conventional Raschig process to give hydrazine hydrate. Anhydrous hydrazine is obtained by removing the water by azeotropic distillation with aniline in a column at atmospheric pressure. Condensation of the vapor yields a two-layer distillate; the aqueous phase is removed and the aniline phase refluxed to the top of the column. Anhydrous hydrazine is recovered as a mixture with aniline, from which it is separated by distillation.
Urea Process
Urea may be used as a source of ammonia in the Raschig process. Currently it is not used for the production of commercial hydrazine hydrate. Compared with the standard Raschig process, it was the most economical method for low production levels, but with the rapid growth in plant size it became obsolete.
However, since 1990, large quantities of hydrazodicarbonamide are produced in Asia, by using the crude reaction mixture of urea and sodium hypochlorite as the source of hydrazine. Because this process involves extensive formation of byproducts and expensive effluent treatment, it is likely to become obsolete.
Bayer Ketazine Process
The Bayer process is a variation of the Raschig process and is based on the reaction of chloramine with ammonia in the presence of acetone at pH 12 – 14.
Sodium hypochlorite, acetone, and a 20 % aqueous solution of ammonia (molar ratio 1: 2: 20, respectively) are fed simultaneously and continuously into a reactor at ca. 35 °C and 200 kPa. Excess ammonia is removed from the reaction mixture by stripping, quenched with water, and recycled to the reactor as an aqueous solution. The aqueous dimethyl ketazine solution, freed from ammonia but containing unconverted acetone, sodium chloride, and organic impurities, is fed into a distillation column where the dimethyl ketazine is recovered as an aqueous azeotrope (containing 55 % dimethyl ketazine; bp 95 °C at 101.3 kPa) at atmospheric pressure. The injection of acetone into the distillation column is claimed to prevent premature hydrolysis of the ketazine. The byproduct from the still is a solution of sodium chloride containing traces of hydrazine and organic compounds. The solution must be treated before disposal or recycling to electrolysis.
The dimethyl ketazine is then hydrolyzed in a distillation column under pressure (0.8 – 1.2 MPa), giving acetone, which is recycled to the reactor, and a 10 % aqueous solution of hydrazine. The latter is then concentrated to a hydrazine content of 64 %.
Peroxide Process
The most recent hydrazine process, invented by PCUK, is operated by ATOFINA in France and by Mitsubishi Gas in Japan. Hydrogen peroxide is the oxidizing agent. The reaction is carried out in the presence of methyl ethyl ketone (MEK) at atmospheric pressure and 50 °C. The ratio of H2O2: MEK: NH3 used is 1: 2: 4.
The hydrogen peroxide is activated by acetamide [and disodium hydrogen phosphate or by an arsenic compound. The overall reaction results in formation of methyl ethyl ketazine in high yield.
The mechanism requires the activation of ammonia and hydrogen peroxide as these two reactants, unlike ammonia and hypochlorite in the Bayer process, do not react together. The reaction pathway involves the formation of an oxaziridine intermediate that is able to oxidize ammonia to a hydrazine derivative.
Since methyl ethyl ketazine is insoluble in the reaction mixture, it is easily separated by decantation; it is then purified by distillation. The purified ketazine is hydrolyzed under pressure (0.8 – 10 MPa) to give concentrated aqueous hydrazine and overhead methyl ethyl ketone, which is recycled.
The aqueous layer containing the activator is concentrated to remove water and recycled to the reactors after a purge of water-soluble impurities.
The peroxide process has many advantages compared with other processes: no salt byproduct, high yields, low energy consumption, low molar excess, no aqueous effluent treatment.
Most hydrazine is sold as an aqueous solution. The only outlet for anhydrous hydrazine is as a rocket fuel or as a mono- or bipropellant for satellites and spacecraft.
About 80 – 90 % of hydrazine production is converted into organic derivatives. All other applications are based on its use as a reducing agent, as an energy-rich compound, or on its hydrogen storage capacity.
The most important uses of hydrazine and its derivatives are as polymerization initiators and blowing agents for foamed plastics, and for the production of pesticides. Other uses include: synthetic building block, pharmaceuticals, propellants, and airbags for cars.
Many hydrazine-based blowing agents are produced industrially; world hydrazine hydrate consumption in 1998 for this application amounted to 50 000 t/a. They are all hydrazo or azo derivatives; the latter are obtained by oxidation of the former with chlorine or hydrogen peroxide.
Blowing agents decompose on heating into nitrogen and mixtures of other gases thereby producing a foaming action in polymers to form pores or cells (Foamed Plastics).
Frischknecht R., Jungbluth N., Althaus H.-J., Doka G., Dones R., Heck T., Hellweg S., Hischier R., Nemecek T., Rebitzer G. and Spielmann M. (2007) Overview and Methodology. Final report ecoinvent v2.0 No. 1. Swiss Centre for Life Cycle Inventories, Dübendorf, CH, retrieved from: www.ecoinvent.org.
Gendorf (2000) Umwelterklärung 2000, Werk Gendorf. Werk Gendorf, Burgkirchen as pdf-File under: http://www.gendorf.de/pdf/umwelterklaerung2000.pdf
Jean-Pierre Schirmann/Paul Bourdauducq: Hydrazine. Published online: 2002. In: Ullmann's Encyclopedia of Industrial Chemistry, Seventh Edition, 2004 Electronic Release (ed. Fiedler E., Grossmann G., Kersebohm D., Weiss G. and Witte C.). 7 th Electronic Release Edition. Wiley InterScience, New York, Online-Version under: DOI: 10.1002/14356007.a13_177

## Included activities end
production of hydrazine including materials, energy uses, infrastructure, and emissions

## Geography
The inventory is modelled for the world.

## Technology
Raschig process

## Time period
Time of publications

## Parameters
- fraction, cooling water, cooling pond system, to air: 0.032 dimensionless; name fraction_CW_CP_to_air; lognormal variance with pedigree 0.0413, pedigree (2,3,1,3,1)
  Calculated based on literature value (Scown, C.D., 2011, Water Footprint of U.S. Transportation Fuels and supplying information of the article) (Vionnet, S., Quantis Water Database - Technical Report, 2012).
- fraction, cooling water, once-through system, to air: 0.004 dimensionless; name fraction_CW_OT_to_air; lognormal variance with pedigree 0.0413, pedigree (2,3,1,3,1)
  (same comment as for fraction, cooling water, cooling pond system, to air)
- fraction, cooling water, recirculating system, to air: 0.771 dimensionless; name fraction_CW_R_to_air; lognormal variance with pedigree 0.0413, pedigree (2,3,1,3,1)
  (same comment as for fraction, cooling water, cooling pond system, to air)
- fraction, cooling water, to air: 0.3875 dimensionless; name fraction_CW_to_air; = (0.5*fraction_CW_OT_to_air)+(0.5*fraction_CW_R_to_air); lognormal variance with pedigree 0.092025, pedigree (4,4,3,2,4)
  Calculated value based on literature value (see comments of the other parametres present in this dataset) and expert opinion. In the case when no industry/literature data are available about the type of cooling or directly fraction, cooling water, to air specific for the process a default assumption is applied. It is assumed that the once-through cooling system is used in 50% of all cases and recirculating system is used in another 50% of all cases.

## Reference product
- hydrazine: 1 kg; By-product classification allocatable product; CPC 34150: Amine-function compounds; oxygen-function amino-compounds, except lysine and its esters and salts thereof and […]; HS2017 282510: Hydrazine and hydroxylamine and their inorganic salts; CAS 302-01-2
  EcoSpold01Location=RER
  production volume 6.2e7 kg
    1998 (Ullmanns 2004)
  property carbon content, fossil 0
    Calculated based on molecular structure. See tab "chemicals".
  property heating value, net 15.13 MJ
    LHV is calculated based on the elemental composition of the substance. Based on the CAS number of the substance (000302-01-2), the chemical formula of the substance is found to be: N2H4, (PubChem 2020).
    Reference: Kim, S., Chen, J., Cheng, T., Gindulyte, A., He, J., He, S., Li, Q., Shoemaker, B. A., Thiessen, P. A., Yu, B., Zaslavsky, L., Zhang, J., & Bolton, E. E. (2019). PubChem 2019 update: improved access to chemical data. Nucleic acids research, 47(D1), D1102–D1109. https://doi.org/10.1093/nar/gky1033
  property price 2.28 EUR2005
    Calculated value based on data from United Nations Commodity Trade Statistics Database (comtrade.un.org). UN comtrade category: 282510 Hydrazine and hydroxilamine, inorganic salts. Year 2005. Using exchange rate of 1EURO = 1.209 USD. Average of price of import into 5 main markets (EU, US, JP, IN and CN).
  properties: carbon allocation 0 kg, carbon content 0, carbon content, non-fossil 0, dry mass 1 kg, water content 0, water in wet mass 0 kg, wet mass 1 kg

## Inputs from technosphere
- ammonia, anhydrous, liquid: 0.0321786, 0.0624651, 0.692386, 0.0292676, 0.00654702, 0.240615, 0.0206837, 0.0637571 kg (8 suppliers, which the file names only by identifier); sum of these 1.1479 kg; lognormal variance with pedigree 0.0655, pedigree (4,5,5,1,1)
  As there was no data available for the production of hydrazine, the values for the consumption of the raw materials are calculated with an assumed yield of 95 % (Frischknecht et al. 2007).
  EcoSpold01Location=RER
  Uncertainty: Stoechiometric calculation
  properties: dry mass 1 kg, wet mass 1 kg
- chemical factory, organics: 1.0711e-9 unit; lognormal variance with pedigree 0.3184, pedigree (4,5,5,5,5)
  EcoSpold01Location=RER
  No information was readily available about infrastructure and land-use of hydrazine production plants. Therefore, in this study, the infrastructure is estimated based on the module "chemical plant, organics". This module assumes a built area of about 4.2 ha, an average output of 50'000 t/a, and plant life of fifty years. For this study, the estimated value is 4.00 E-10 units per kg of produced chemical.
  Uncertainty: Estimation
- electricity, medium voltage: 0.029632, 0.591093, 0.198605, 0.00907434, 0.00181622, 0.000389983, 0.0610395 kWh (7 suppliers, which the file names only by identifier); sum of these 0.89165 kWh; lognormal variance with pedigree 0.1786, pedigree (4,5,5,5,5)
  EcoSpold01Location=UCTE
  There was no information available on the amount of energy used for the production process. In order not to neglect the process energy demand those values were approximated with data from an large chemical plant site in Germany producing 2.05 Mt a-1 (intermediates included) of different chemicals (Gendorf (2000)). The values for the energy consumption per kg of product of this plant (3.2 MJ kg-1) were used as approximation for the energy consumption of the hydrazine production. This total energy demand contains a split of 50% natural gas, 38% electricity and 12% steam from external energy sources. For this inventory all energy used for heat or steam was assumed to be natural gas. For this inventory an amount of 2 MJ natural gas and 0.333 kW electricity per kg product was used.
  Uncertainty: Estimation
- heat, from steam, in chemical industry: 5.3553 MJ; lognormal variance with pedigree 0.1786, pedigree (4,5,5,5,5)
  There was no information available on the amount of energy used for the production process. In order not to neglect the process energy demand those values were approximated with data from an large chemical plant site in Germany producing 2.05 Mt a-1 (intermediates included) of different chemicals (Gendorf (2000)). The values for the energy consumption per kg of product of this plant (3.2 MJ kg-1) were used as approximation for the energy consumption of the hydrazine production. This total energy demand contains a split of 50% natural gas, 38% electricity and 12% steam from external energy sources. For this inventory all energy used for heat or steam was assumed to be natural gas. For this inventory an amount of 2 MJ natural gas and 0.333 kW electricity per kg product was used.
  EcoSpold01Location=RER
  Uncertainty: Estimation
  properties: heating value, net 1 MJ
- hydrochloric acid, without water, in 30% solution state: 1.2434 kg; lognormal variance with pedigree 0.0655, pedigree (4,5,5,1,1)
  The produced sodium hydroxide from the first step and the remaining sodium hydroxide from the second step is considered to be neutralized with hydrogen chloride.
  EcoSpold01Location=RER
  Uncertainty: Stoechiometric calculation
  properties: dry mass 1 kg, heating value, net 3.32 MJ, wet mass 1 kg
- sodium hydroxide, without water, in 50% solution state: 1.3158 kg; lognormal variance with pedigree 0.0655, pedigree (4,5,5,1,1)
  (same comment as for ammonia, anhydrous, liquid)
  properties: dry mass 1 kg, heating value, net 3.03 MJ, wet mass 1 kg
- sodium hypochlorite, without water, in 15% solution state: 2.5623 kg; lognormal variance with pedigree 0.0655, pedigree (4,5,5,1,1)
  EcoSpold01Location=RER
  As there was no data available for the production of hydrazine, the values for the consumption of the raw materials are calculated with an assumed yield of 95 % (Frischknecht et al. 2007).
  Uncertainty: Stoechiometric calculation
  properties: dry mass 1 kg, wet mass 1 kg
- wastewater, average: -2.26904e-6, -8.07865e-9 m3 (2 suppliers, which the file names only by identifier); sum of these -2.27712e-6 m3; lognormal variance with pedigree 0.0452, pedigree (2,4,1,5,4)
  Calculated based on literature data published by the GENDORF Chemical Park. The factory produced an average of 2462760 tonnes of chemical substances (including intermediates) per year in the years 2015-2019. The average ouput of wastewater going to an external wastewater treatment plant in the years 2015-2019 was 5608 m3 per year. This equals 0.000002277 m3/kg chemical produced.
  References:
  Chemiepark GENDORF, Umwelterklärung 2016, https://www.gendorf.de/Nachbarn/Umweltschutz/Industrie%20und%20Nachhaltigkeit
  Chemiepark GENDORF, Umwelterklärung 2017, https://www.gendorf.de/Nachbarn/Umweltschutz/Industrie%20und%20Nachhaltigkeit
  Chemiepark GENDORF, Umwelterklärung 2020, https://www.gendorf.de/Nachbarn/Umweltschutz/Industrie%20und%20Nachhaltigkeit
  properties: carbon content, non-fossil 0.194039, dry mass 0.346837 kg, mass concentration, TOC 0.1091 kg/m3, mass concentration, calcium 0.039453 kg/m3, mass concentration, chlorine 0.030031 kg/m3, mass concentration, hydrogen 0.013365 kg/m3, mass concentration, nitrogen 0.031015 kg/m3, mass concentration, oxygen 0.069824 kg/m3, mass concentration, sodium 0.06456 kg/m3, mass concentration, sulfur 0.015602 kg/m3, water content 2882.2, wet mass 1000 kg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
  note on carbon content, non-fossil: 0.0673 kg TOC/m3 (Tab A.17, ecoinvent v2.2 report 13_I). TOC was considered as Total Carbon.

## Inputs from nature
- Water, cooling, unspecified natural origin [natural resource, in water]: 0.014707 m3; lognormal variance with pedigree 0.0852, pedigree (2,4,5,5,4)
  Calculated based on literature data published by the GENDORF Chemical Park. The factory produced an average of 2462760 tonnes of chemical substances (including intermediates) per year in the years 2015-2019. The average amount of cooling water released in the years 2015-2019 was 34408800 t per year. It was assumed that 5% of the cooling water was emitted to air during its use, therefore, to calculate the input of cooling water, the output value reported by GENDORF was scaled up by the factor 1/0.95. This equals 0.014707 m3/kg chemical produced.
  References:
  Chemiepark GENDORF, Umwelterklärung 2016, https://www.gendorf.de/Nachbarn/Umweltschutz/Industrie%20und%20Nachhaltigkeit
  Chemiepark GENDORF, Umwelterklärung 2017, https://www.gendorf.de/Nachbarn/Umweltschutz/Industrie%20und%20Nachhaltigkeit
  Chemiepark GENDORF, Umwelterklärung 2020, https://www.gendorf.de/Nachbarn/Umweltschutz/Industrie%20und%20Nachhaltigkeit
  Uncertainty: Estimation
- Water, river [natural resource, in water]: 0.000965426 m3; lognormal variance with pedigree 0.0852, pedigree (2,4,5,5,4)
  Calculated based on literature data published by the GENDORF Chemical Park. The factory produced an average of 2462760 tonnes of chemical substances (including intermediates) per year in the years 2015-2019. The average consumption of river water in the years 2015-2019 was 22000820 t per year. However, since the cooling water is modelled as an input, the amount of river water was adjusted to avoid double counting. 55% of the input amount of cooling water was deducted from the amount of river water, as that is the share of river water versus well water. This equals 0.00096543 m3/kg chemical produced.
  References:
  Chemiepark GENDORF, Umwelterklärung 2016, https://www.gendorf.de/Nachbarn/Umweltschutz/Industrie%20und%20Nachhaltigkeit
  Chemiepark GENDORF, Umwelterklärung 2017, https://www.gendorf.de/Nachbarn/Umweltschutz/Industrie%20und%20Nachhaltigkeit
  Chemiepark GENDORF, Umwelterklärung 2020, https://www.gendorf.de/Nachbarn/Umweltschutz/Industrie%20und%20Nachhaltigkeit
- Water, well, in ground [natural resource, in water]: 0.000816522 m3; lognormal variance with pedigree 0.0852, pedigree (2,4,5,5,4)
  Calculated based on literature data published by the GENDORF Chemical Park. The factory produced an average of 2462760 tonnes of chemical substances (including intermediates) per year in the years 2015-2019. The average consumption of well water in the years 2015-2019 was 18607480 t per year. However, since the cooling water is modelled as an input, the amount of well water was adjusted to avoid double counting. 45% of the input amount of cooling water was deducted from the amount of well water, as that is the share of well water versus river water. This equals 0.00081652 m3/kg chemical produced.
  References:
  Chemiepark GENDORF, Umwelterklärung 2016, https://www.gendorf.de/Nachbarn/Umweltschutz/Industrie%20und%20Nachhaltigkeit
  Chemiepark GENDORF, Umwelterklärung 2017, https://www.gendorf.de/Nachbarn/Umweltschutz/Industrie%20und%20Nachhaltigkeit
  Chemiepark GENDORF, Umwelterklärung 2020, https://www.gendorf.de/Nachbarn/Umweltschutz/Industrie%20und%20Nachhaltigkeit

## Emissions to nature
- Ammonia [air, urban air close to ground]: 0.0022957 kg; lognormal variance with pedigree 0.1786, pedigree (4,5,5,5,5)
  There was no data available on process emissions to air for the hydrazine production. As approximation the air emissions occurring from the purge vent, the distillation vent and fugitive emission sources were estimated to 0.2% of the chloroamine and ammonia input.
  Uncertainty: Estimation
- Chloramine [air, urban air close to ground]: 0.0033553 kg; lognormal variance with pedigree 0.1786, pedigree (4,5,5,5,5)
  (same comment as for Ammonia)
- Water [air, unspecified]: 0.00147008 m3; lognormal variance with pedigree 0.1246, pedigree (2,4,5,5,4)
  Calculated based on literature data published by the GENDORF Chemical Park. The factory produced an average of 2462760 tonnes of chemical substances (including intermediates) per year in the years 2015-2019. To determine the emissions of water to air, the difference of all water inputs (from river, well, tap water and cooling) and outputs (wastewater, emissions to water) was calculated. The average ouput of water to air in the years 2015-2019 was 3620444 m3 per year. This equals 0.00147 m3/kg chemical produced. For more information on the other water exchanges please consult the respective exchange comment.
  References:
  Chemiepark GENDORF, Umwelterklärung 2016, https://www.gendorf.de/Nachbarn/Umweltschutz/Industrie%20und%20Nachhaltigkeit
  Chemiepark GENDORF, Umwelterklärung 2017, https://www.gendorf.de/Nachbarn/Umweltschutz/Industrie%20und%20Nachhaltigkeit
  Chemiepark GENDORF, Umwelterklärung 2020, https://www.gendorf.de/Nachbarn/Umweltschutz/Industrie%20und%20Nachhaltigkeit
  property fraction, origin: fresh water 0; name fraction_origin_fresh_water
  property fraction, origin: salt water 0; name fraction_origin_salt_water
  property fraction, origin: unspecified 1; name fraction_origin_unspecified
- Ammonium [water, surface water]: 0.027548 kg; lognormal variance with pedigree 0.1786, pedigree (4,5,5,5,5)
  The remaining amount of unreacted chloroamine and ammonia (4.8 % of the input) is assumed to leave the production process with the waste water.
  Further it is assumed that this wastewater is treated in a internal wastewater plant. The removal efficiency for chloroamine and for ammonia is assumed with 50%.
  Uncertainty: Estimation
- Chloramine [water, surface water]: 0.029941 kg; lognormal variance with pedigree 0.3184, pedigree (4,5,5,5,5)
  (same comment as for Ammonium)
- Chloride [water, surface water]: 2.4002 kg; lognormal variance with pedigree 0.3184, pedigree (4,5,5,5,5)
  Estimation from neutralization steps.
  Uncertainty: Estimation
- Sodium I [water, surface water]: 1.2627 kg; lognormal variance with pedigree 0.6642, pedigree (4,5,5,5,5)
  Estimation from neutralization steps.
  Uncertainty: Estimation
- Water [water, unspecified]: 0.0150391 m3; lognormal variance with pedigree 0.1246, pedigree (2,4,5,5,4)
  Calculated based on literature data published by the GENDORF Chemical Park. The factory produced an average of 2462760 tonnes of chemical substances (including intermediates) per year in the years 2015-2019. The amount of water released back to the environment consists of the sum of the amount of process water treated in the internal WWTP that is then released back to the environment and the amount of cooling water released back to the environment. The average ouput of the internal WWTP in the years 2015-2019 was 2628800 m3 and that of cooling water released back to the environment was 34408800 m3. This gives a yearly average of 37037600 m3 emissions of water to water. This equals 0.01504 m3/kg chemical produced.
  References:
  Chemiepark GENDORF, Umwelterklärung 2016, https://www.gendorf.de/Nachbarn/Umweltschutz/Industrie%20und%20Nachhaltigkeit
  Chemiepark GENDORF, Umwelterklärung 2017, https://www.gendorf.de/Nachbarn/Umweltschutz/Industrie%20und%20Nachhaltigkeit
  Chemiepark GENDORF, Umwelterklärung 2020, https://www.gendorf.de/Nachbarn/Umweltschutz/Industrie%20und%20Nachhaltigkeit
  property fraction, origin: fresh water 0; name fraction_origin_fresh_water_Ww
  property fraction, origin: salt water 0; name fraction_origin_salt_water_Ww
  property fraction, origin: unspecified 1; name fraction_origin_unspecified_Ww

## Sampling procedure
Literature data

## Extrapolations
Emissions are modelled with standard methods.
