# acrylic binder production, with water, in 54% solution state

Dataset: EcoSpold 2, unit process
Geography: RoW
Time period: 1995-01-01 to 2023-12-31
Technology level: current
Classification: ISIC rev.4 ecoinvent: 2022:Manufacture of paints, varnishes and similar coatings, printing ink and mas
Synonyms: PBAN (binder); PBAN; Acrylic acid; prop-2-enenitrile; 2-Propenoic acid polymer with 1,3-butadiene and 2-propenenitrile; PBAN-560; buta-1,3-diene
Scenario: Business-as-Usual
System model: Allocation, cut-off by classification
Generated by: Maggie Osses
Published in: Althaus H.-J. 2007
Database: ecoinvent
isCopyrightProtected: true
accessRestrictedTo: 1

## General comment
This dataset represents the production of 1 kg of acrylic binder (54% in water). Acrylic binder is used for the production of acrylic paint. This dataset is based on data provided by European manufacturing companies.
References:
Richter K., Künniger T. and Brunner K. (1996) Ökologische Bewertung von Fensterkonstruktionen verschiedener Rahmenmaterialien - Schweizerische Zentralstelle für Fenster- und Fassadenbau (SZFF) and Swiss Federal Laboratories for Materials Testing and Research (EMPA

## Included activities start
The activity starts when the raw materials enter the process.

## Included activities end
This activity ends with the production of 1 kg of acrylic binder in water. The manufacturing process is considered with the consumption of raw materials, energy, infrastructure and land use. The generation of solid wastes and emissions into air and water are also taken into account. No by-product is generated in the process. Consumption of auxiliaries are not included due to the lack of data. Solid wastes are assumed to be sent to hazardous waste incineration.

## Geography
The literature source used is based on information provided by European manufacturing companies. The inventory is assumed to be representative of the global production.

## Technology
This dataset is based on confidential data from European manufacturing companies, therefore the production technology is unknown.
References:
von Däniken A. and Chudacoff M. (1995) Vergleichende ökologische Bewertung von Anstrichstoffen im Baubereich - Band 2: Daten. Buwal Schriftenreihe Umwelt Nr. 232. BUWAL, Bern.

## Time period
The literature refers to data from the 1990s.

## Parameters
- fraction, process water, to air: 0.15 dimensionless; name fraction_PW_to_air; lognormal variance with pedigree 0.092025, pedigree (4,4,3,2,4)
  Literature value. In case when no industry/process specific data are available, default evaporation fraction value is used. This value is 15% and is based on literature (Statistics Canada, 2007 & Shaffer, K.H., 2008, Consumptive water use in the Great Lakes Basin, USGS & Shiklomanov, 2003, World Water Resources at the Beginning of the 21st Century) and has been approved by an expert.

## Reference product
- acrylic binder, with water, in 54% solution state: 1 kg; name RP; By-product classification allocatable product; CPC 35110: Paints and varnishes and related products; HS2017 320820: Paints and varnishes; based on acrylic or vinyl polymers, dispersed or dissolved in a non-aqueous medium
  Acrylic binder is used for the production of acrylic paint. It has the appearance of a thin milky liquid, which when dry becomes a firm flexible film. Pigments can either be added directly into the binder or the binder can be blended with other resin substances.
  production volume 3.304 kg; name RP_PV
    This is a placeholder value that does not reflect real-world production volumes. This dataset does not currently require a real-world production volume to work in the database framework, and no actual data were collected yet. This has no negative effect on the results of the ecoinvent database.
  property carbon content, fossil 0.679919; = (butylAcrylate* C_cont_butylAcrylate+ C_cont_vinylAcetate* vinylAcetate+ C_cont_versaticAcid* VersaticAcid+ C_cont_water* water_UNO_input*1000)/ RP_dryMass
    The carbon content was calculated from the carbon content of the inputs.
  property dry mass 0.54 kg; name RP_dryMass
  property heating value, net 18.18 MJ
    LHV is calculated based on the Carbon content of the product. More details can be found on the respective documentation.
  property price 3.37 EUR2005
    From UN trade database. http://data.un.org/ Import data from the largest economies of the world are used (Brazil, India, USA, China, Japan and EU-27). Commodities: 'Acrylic or vinyl polymer paint or varnish, non-aqueou', 'Polyester based paints, varnishes, non-aqueous medium' and 'Polymer based paint, varnish in non-aqueous medium ne'.
  property water content 0.851852; = RP_waterinwetmass/RP_dryMass
  property water in wet mass 0.46 kg; name RP_waterinwetmass
  properties: carbon allocation 0.367156 kg, carbon content 0.679919, carbon content, non-fossil 0, wet mass 1 kg

## Inputs from technosphere
- butyl acrylate: 0.0901 kg; name butylAcrylate; lognormal variance with pedigree 0.102, pedigree (3,5,5,5,1)
  Data originally from survey in literature (Richter et al. 1996), but scaled up to balance the mass of the output.
  Uncertainty: d
  property carbon content, fossil 0.756757; name C_cont_butylAcrylate
  properties: dry mass 1 kg, heating value, net 31.22 MJ, wet mass 1 kg
- chemical factory, organics: 4e-10 unit; lognormal variance with pedigree 0.3498, pedigree (2,3,5,4,3)
  Calculated based on literature data published by the industry. For this activity, no information was readily available concerning infrastructure and land-use. Therefore, the infrastructure is estimated based on data from two chemical factories, the BASF site of Ludwigshafen and the chemical factory in Gendorf (which are both located in Germany), which produce a wide range of chemical substances. Based on this data, the following assumptions are made: the built area amounts to about 4.2 ha, the plant has an average output of 50'000 t/a and a lifespan of fifty years. The estimated infrastructure amount is therefore 4.00 E-10 units per kg of produced chemical.
  References:
  Althaus H.-J., Chudacoff M., Hischier R., Jungbluth N., Osses M. and Primas A. (2007) Life Cycle Inventories of Chemicals. ecoinvent report No. 8, v2.0. EMPA Dübendorf, Swiss Centre for Life Cycle Inventories, Dübendorf, CH.
  Gendorf (2000) Umwelterklärung 2000, Werk Gendorf. Werk Gendorf, Burgkirchen.
- electricity, medium voltage: 0.00332328, 0.066292, 0.0222739, 0.0010177, 0.000203692, 4.37373e-5, 0.00684568 kWh (7 suppliers, which the file names only by identifier); sum of these 0.1 kWh; lognormal variance with pedigree 0.102, pedigree (3,5,5,5,1)
  Data from survey in literature (Richter et al. 1996).
  Uncertainty: d
- esters of versatic acid: 0.152 kg; name VersaticAcid; lognormal variance with pedigree 0.102, pedigree (3,5,5,5,1)
  (same comment as for butyl acrylate)
  property carbon content, fossil 0.727273; name C_cont_versaticAcid
  properties: dry mass 1 kg, heating value, net 22.04 MJ, wet mass 1 kg
- heat, district or industrial, natural gas: 0.00844721, 0.514053 MJ (2 suppliers, which the file names only by identifier); sum of these 0.5225 MJ; lognormal variance with pedigree 0.102, pedigree (3,5,5,5,1)
  Data from survey in literature (Richter et al. 1996).
  Uncertainty: d
  properties: heating value, net 1 MJ
- heat, district or industrial, other than natural gas: 0.565738, 0.000262096 MJ (2 suppliers, which the file names only by identifier); sum of these 0.566 MJ; lognormal variance with pedigree 0.102, pedigree (3,5,5,5,1)
  Data from survey in literature (Richter et al. 1996).
  Uncertainty: d
  properties: heating value, net 1 MJ
- vinyl acetate: 0.329 kg; name vinylAcetate; lognormal variance with pedigree 0.102, pedigree (3,5,5,5,1)
  (same comment as for butyl acrylate)
  property carbon content, fossil 0.55814; name C_cont_vinylAcetate
  properties: dry mass 1 kg, heating value, net 25.35 MJ, wet mass 1 kg
  note on carbon content, fossil: Vinyl acetate (CH3CO2CH=CH2) (ecoinvent v2.2 report 11_II), C4H6O2. MW=86 g/mol
- waste paint: -0.03 kg; name BP_waste_paint; lognormal variance with pedigree 0.212, pedigree (3,5,5,5,1)
  Data from survey in literature (Richter et al. 1996).
  Uncertainty: d
  production volume; = RP_PV*BP_waste_paint/ABS(RP)
    Calculated from the production volume of acrylic binder, without water, in 34% solution state in proportion to the respective output amounts.
  properties: carbon content, fossil 0.65, dry mass 1 kg, heating value, net 19.7 MJ, wet mass 1 kg
  note on carbon content, fossil: Tab A.5, ecoinvent v2.2 report 13_I. C content has been calculated after data in the tables, and then referred to 1 kg DM

## Inputs from nature
- Water, unspecified natural origin [natural resource, in water]: 0.00046 m3; name water_UNO_input; lognormal variance with pedigree 0.102, pedigree (3,5,5,5,1)
  Data from survey in literature (Richter et al. 1996).
  Uncertainty: d
  property carbon content, fossil 0.0104329; name C_cont_water

## Emissions to nature
- Hydrocarbons, aliphatic, alkanes, unspecified [air, urban air close to ground]: 7e-5 kg; lognormal variance with pedigree 0.182, pedigree (3,5,5,5,1)
  Data from survey in literature (Richter et al. 1996).
  Uncertainty: d
- BOD5, Biological Oxygen Demand [water, surface water]: 1.8e-5 kg; lognormal variance with pedigree 0.142, pedigree (3,5,5,5,1)
  Data from survey in literature (Richter et al. 1996).
  Uncertainty: d
- COD, Chemical Oxygen Demand [water, surface water]: 0.00017 kg; lognormal variance with pedigree 0.142, pedigree (3,5,5,5,1)
  Data from survey in literature (Richter et al. 1996).
  Uncertainty: d
- DOC, Dissolved Organic Carbon [water, surface water]: 1.1e-5 kg; lognormal variance with pedigree 0.142, pedigree (3,5,5,5,1)
  Data from survey in literature (Richter et al. 1996).
  Uncertainty: d
- Dissolved solids [water, surface water]: 0.00036 kg; lognormal variance with pedigree 0.142, pedigree (3,5,5,5,1)
  Data from survey in literature (Richter et al. 1996).
  Uncertainty: d
- Suspended solids, unspecified [water, surface water]: 2.1e-5 kg; lognormal variance with pedigree 0.142, pedigree (3,5,5,5,1)
  Data from survey in literature (Richter et al. 1996).
  Uncertainty: d
- TOC, Total Organic Carbon [water, surface water]: 4e-5 kg; lognormal variance with pedigree 0.142, pedigree (3,5,5,5,1)
  Data from survey in literature (Richter et al. 1996).
  Uncertainty: d

## Sampling procedure
Literature data.

## Extrapolations
This dataset has been copied from an original dataset covering the geography RER. The uncertainty has been adjusted accordingly.

## Review by Emilia Moreno Ruiz 2017-08-09
This dataset was additionally reviewed in a separate review process by Eric Johnson of Atlantic Consulting as well as Emilia Moreno Ruiz and Gregor Wernet of ecoinvent.
