# road maintenance

Dataset: EcoSpold 2, unit process
Geography: Europe without Switzerland
Time period: 1990-01-01 to 2023-12-31
Technology level: current
Classification: ISIC rev.4 ecoinvent: 4210:Construction of roads and railways
Classification: EcoSpold01Categories: transport systems/road
Scenario: Business-as-Usual
System model: Allocation, cut-off by classification
Generated by: Avraam Symeonidis
Published in: Spielmann M. 2007
Database: ecoinvent
isCopyrightProtected: true
accessRestrictedTo: 1

## General comment
The dataset represents the expenditures and interventions due to the operation and maintenance of road networks. The operation and maintenance of roads refers to aspects of lighting, weed control, line marking, etc. rather than the replacement and repair of road sections. It is therefore directly related to km use. The renewal of different road layers and eventual road disposal is accounted for in the road construction datasets. All environmental exchanges refer to one meter and year (m*year). Road operation and maintenance is therefore modelled as a constant renewal rather than as a one-time expenditure, and is assumed directly related to road use in km. In the transport datasets the value of 1.29E-03 m*year per km of transport should be applied. For freight transports this is then devided by the load transported to give road maintenance demand per metric ton*km. The dataset is based on a modeling of Swiss motorways and Class 1, 2 & 3 roads as described in the following sources:
Bundesamt für Statistik (2000) Mobilität in der Schweiz. Ergebnisse des Mikrozensus 2000 zum Verkehrsverhalten. Bundesamt für Statistik, Bern.
Maibach et al. (1999) Ökoinventar Transporte: Grundlagen für den ökologischen Vergleich von Transportsystemen und den Einbezug von Transportsystemen in Ökobilanzen. Technischer Schlussbericht. In: Schweizerischer Nationalfonds zur Förderung der wissenschaftlichen Forschung (ed. SPP Umwelt M.). 2nd Edition. INFRAS, Zürich.

## Included activities start
The dataset starts with expenditures for the continual operation and maintenance of roads.

## Included activities end
The dataset ends with emissions to the environment.

The dataset includes the energy for road operation and the materials used in road maintenance. It includes the NMVOC emissions to air from the solvent containing paint as well as salt used for de-icing which runs off to surface water. The dataset does not include road construction and disposal.

## Parameters
- road network, Switzerland: 71150 km; name road_network_CH; lognormal variance with pedigree 0.0086, pedigree (1,1,4,1,1)
  The length of the Swiss road network considering motorways and Class 1, 2 & 3 roads.
  Data from:
  Bundesamt für Statistik (2000) Mobilität in der Schweiz. Ergebnisse des Mikrozensus 2000 zum Verkehrsverhalten. Bundesamt für Statistik, Bern.
  Maibach et al. (1999) Ökoinventar Transporte: Grundlagen für den ökologischen Vergleich von Transportsystemen und den Einbezug von Transportsystemen in Ökobilanzen. Technischer Schlussbericht. In: Schweizerischer Nationalfonds zur Förderung der wissenschaftlichen Forschung (ed. SPP Umwelt M.). 2nd Edition. INFRAS, Zürich.

## Reference product
- road maintenance: 1 m*year; By-product classification allocatable product; CPC 54211: General construction services of highways (except elevated highways), streets and roads
  production volume 2.1522e8 m*year; = road_network_CH*1000*(1/0.330592352)
    Estimated. The european production volume is extrapolated from the global production volume using the nominal GDP of 2005 (source: United Nations, http://data.un.org/Glossary.aspx?q=GDP+%28current+US%24%29, accessed 20130726 and 20130312).
    Gross domestic product (GDP) at current prices is GDP at prices of the current reporting period. Also known as nominal GDP.
  property price 2.67739 EUR2005
    Calculated based on inputs: The price of the product has been calculated as a sum of the values of the material and energy inputs for this product. This value is therefore a rough estimation. It may underestimate the real price since there are additional expenses when producing any product. These expences can include for example labour costs, treatment of waste materials and profit for the producer. Please consider carefully whether this level of data quality is acceptable for your application.
  properties: carbon allocation 0 kg, carbon content 0

## Inputs from technosphere
- alkyd paint, white, without solvent, in 60% solution state: 0.0123 kg; source Maibach M. 1999; lognormal variance with pedigree 0.1013, pedigree (2,3,5,3,1)
  Calculated value. Road marking.
  Uncertainty: literature studies and own calculations. Pedigree matrix set according to expert judgment.
  properties: carbon content, fossil 0.140367, carbon content, non-fossil 0.199629, dry mass 1 kg, heating value, net 10.3 MJ, wet mass 1 kg
  note on carbon content, fossil: C content was calculated as an addition of C content in the raw materials.
- alkyd paint, white, without water, in 60% solution state: 0.00739 kg; source Maibach M. 1999; lognormal variance with pedigree 0.1013, pedigree (2,3,5,3,1)
  (same comment as for alkyd paint, white, without solvent, in 60% solution state)
  properties: carbon content, fossil 0.414587, carbon content, non-fossil 0.161654, dry mass 1 kg, heating value, net 17.46 MJ, wet mass 1 kg
- electricity, medium voltage: 19.1 kWh; source BFE 2003; lognormal variance with pedigree 0.0527, pedigree (3,3,5,3,1)
  Calculated value. Electricity used for lighting of highways and tunnels.
  EcoSpold01Location=CH
  Uncertainty: literature studies and own calculations. Pedigree matrix set according to expert judgment.
- glyphosate: 4.96e-5 kg; source Maibach M. 1999; lognormal variance with pedigree 0.1013, pedigree (2,3,5,3,1)
  Calculated value. Herbicide for weed control.
  Uncertainty: literature studies and own calculations. Pedigree matrix set according to expert judgment.
  properties: carbon content, fossil 0.214286, dry mass 1 kg, wet mass 1 kg
- gravel, crushed: 2.11 kg; name gravel; source Maibach M. 1999; lognormal variance with pedigree 0.0527, pedigree (3,3,5,3,1)
  Gravel used for maintenance of road surfaces.
  EcoSpold01Location=CH
  Uncertainty: literature studies and own calculations. Pedigree matrix set according to expert judgment.
  properties: dry mass 1 kg, wet mass 1 kg
- sodium chloride, powder: 2.57 kg; source Maibach M. 1999; lognormal variance with pedigree 0.1013, pedigree (2,3,5,3,1)
  Calculated value. De-icing of roads.
  Uncertainty: literature studies and own calculations. Pedigree matrix set according to expert judgment.
  properties: dry mass 1 kg, wet mass 1 kg
- transport, passenger car, large size, diesel, EURO 5: 0.502 km; source Maibach M. 1999; lognormal variance with pedigree 0.1087, pedigree (4,3,5,3,1)
  Used to represent the transport of maintenance personnel and equipment. In RER this is represented by a vehicle of modern emissions standards.
  Uncertainty: Own calculations. Pedigree matrix set according to expert judgment.

## Emissions to nature
- NMVOC, non-methane volatile organic compounds [air, unspecified]: 0.00527 kg; source Maibach M. 1999; lognormal variance with pedigree 0.1013, pedigree (2,3,5,3,1)
  1500t solvent containing paint per year (on Swiss roads), 25% of which is solvent. All solvent emitted as NMVOC.
  Uncertainty: literature studies and own calculations. Pedigree matrix set according to expert judgment.
- Chloride [water, surface water]: 1.54 kg; lognormal variance with pedigree 0.1013, pedigree (2,3,5,3,1)
  Assumed that all salt eventually washes off the road to surface water.
  Uncertainty: literature studies and own calculations. Pedigree matrix set according to expert judgment.
- Sodium I [water, surface water]: 1.03 kg; lognormal variance with pedigree 0.1013, pedigree (2,3,5,3,1)
  (same comment as for Chloride)

## Sampling procedure
National, from CH.

## Extrapolations
This dataset has been copied from an original dataset covering the geography CH. The uncertainty has been adjusted accordingly.
