# transport, pipeline, onshore, long distance, natural gas

Dataset: EcoSpold 2, unit process
Geography: GB
Time period: 2021-01-01 to 2023-12-31
Technology level: current
Classification: ISIC rev.4 ecoinvent: 4930:Transport via pipeline
Scenario: Business-as-Usual
System model: Allocation, cut-off by classification
Generated by: Maresa Bussa
Published in: Bussa, M. 2023
Database: ecoinvent
isCopyrightProtected: true
accessRestrictedTo: 1

## General comment
This dataset describes the transport of natural gas via long-distance onshore pipelines [metric ton*km], from United Kingdom to the importing countries.
The transportation of natural gas via long-distance pipelines is driven by compressor stations fueled by natural gas. The share of liquefied natural gas (LNG) in inter-regional trade of natural gas has increased steadily over the past decades, and it equaled the volume exported in pipelines around 2019-2020. (BP 2022)
The emission data availble from IEA 2022 (used by Meili et al. 2023 for modelling the extraction of oil and gas) is only available on the level of natural gas producing countries and can neither be allocated to the different distribution stages (long-distance, regional, local) nor converted to tonne*km which is required for modelling the long-distance transport. Hence, Bussa et al. (2023) relied on other data sources.
Gas leakage and energy requirements are the two main factors differing between regions for pipeline transport (both offshore and onshore). According to Bussa et al. (2023, section 4.2.2) the leakage in RER and RNA is set to 0.019%, and 0.204% in other regions of the world. Similarly, Bussa et al. estimated the energy requirements in RER and RNA to 0.9% versus 2.2% for the rest. Emissions and infrastructure need of the compressor stations are modelled with the input of “natural gas, burned in gas turbine” (i.e., for energy requirements).
This is delivering the service of transportation of 1 metric ton across the distance of 1 km. This service only considers the transportation of fuels, like natural gas, through offshore long-distance pipeline. The pipeline operates with compressor stations fueled by natural gas. Gas leakages are taken into account.
Reference(s):
Bussa, M., N. Jungbluth, Ch. Meili (2023) Life cycle inventories for long-distance transport and distribution of natural gas. ESU-services Ltd. Schaffhausen, Switzerland. Available from: http://esu-services.ch/data/public-lci-reports/

## Included activities start
This dataset describes the energy consumption and the emissions linked to the transport of natural gas from the place of production to export in an offshore pipeline.

## Included activities end
This dataset describes the energy consumption, emissions (including losses), and infrastructure requirements for the transport of 1 metric ton (based on a density of 0.735 kg/m3) natural gas over one kilometre in an offshore pipeline at the location specified by the activity’s geography. The construction, surveillance, and decommissioning of the network is considered in the separate activity for pipeline construction, which is an input to this transport activity. The energy requirements for the compression station are included over the input ‘natural gas, burned in gas turbine’. The distribution and delivery to customer via reduced pressure lines (1-5 bar overpressure for industries) and households (0.1 bar overpressure) is not considered here, but rather in the corresponding market activities for natural gas at high and low pressure, respectively.

## Geography
United Kingdom

## Technology
This dataset refers only to the delivery of high pressure natural fas, which has a pressure of 70 bar. The delivery of teh gas is performed via onshore pipelines.

## Time period
The data for emissions is from 2006, the data for energy requirements from 2001

## Reference product
- transport, pipeline, onshore, long distance, natural gas: 1 metric ton*km; name RP_amount; By-product classification allocatable product; CPC 65131: Transport services via pipeline of petroleum and natural gas
  Output
  production volume 1 metric ton*km; name RP_PV
    Output, as described in Bussa et al. 2023
  property price 0.0083 EUR2005
    Same calculations in file R61. The variations is due to industry price per MJ, which has been updated to prices in EU27 in 2005 (http://epp.eurostat.ec.europa.eu/tgm/table.do?tab=table&init=1&language=en&pcode=ten00112&plugin=1).
  properties: carbon allocation 0 kg, carbon content 0

## Inputs from technosphere
- natural gas, burned in gas turbine: 0.327332 MJ; lognormal variance with pedigree 0.0169951, pedigree (4,2,2,3,3)
  Qualified estimates from different gas companies, as described in Bussa et al. 2023
- natural gas, high pressure: 5.17007e-6 m3; = 0.02*0.000258503401360544; lognormal variance with pedigree 0.00869512, pedigree (4,2,1,1,1)
  Imports via pipeline + losses; shares of offshore and onshore production from table 4.1 in Meili et al. (2023)
  properties: carbon content, fossil 0.741, dry mass 0.735 kg, heating value, gross 40 MJ, heating value, net 36 MJ, wet mass 0.735 kg
  note on heating value, gross: At standard conditions; based on Meili et al. (2022) section 5.2
- natural gas, high pressure: 0.000253333 m3; = 0.98*0.000258503401360544; lognormal variance with pedigree 0.00869512, pedigree (4,2,1,1,1)
  (same comment as for natural gas, high pressure)
- pipeline, natural gas, long distance, low capacity, onshore: 3.57e-9 km; lognormal variance with pedigree 0.0572951, pedigree (4,3,5,3,3)
  Based on estimated standard capacity, as described in Bussa et al. 2023
- waste mineral oil: -1.16e-6 kg; name BP1_amount; lognormal variance with pedigree 0.0526951, pedigree (3,4,5,3,3)
  Based on dutch data, as described in Bussa et al. 2023
  production volume; = (BP1_amount/RP_amount)*RP_PV
    Annual production volume of by-product/waste calculated proportional to the production volume of the reference product.
  properties: carbon content, fossil 0.864444, dry mass 0.9 kg, heating value, net 34.7 MJ, water content 0.111111, wet mass 1 kg
  note on carbon content, fossil: Tab A.6, ecoinvent v2.2 report 13_I. C content has been calculated after data in the tables, and then referred to 1 kg DM
  note on heating value, net: Value taken from the general comment of the treatment dataset.

## Emissions to nature
- Butane [air, non-urban air or from high stacks]: 1.64203e-6 kg; lognormal variance with pedigree 0.0503005, pedigree (2,3,4,1,1)
  Calculated based on leakage and average gas composition, as described in Bussa et al. 2023
- Carbon dioxide, fossil [air, non-urban air or from high stacks]: 5.92741e-6 kg; lognormal variance with pedigree 0.656773, pedigree (2,3,4,1,1)
  Calculated based on leakage and average gas composition, as described in Bussa et al. 2023
- Ethane [air, non-urban air or from high stacks]: 1.41928e-5 kg; lognormal variance with pedigree 0.0503005, pedigree (2,3,4,1,1)
  Calculated based on leakage and average gas composition, as described in Bussa et al. 2023
- Mercury II [air, non-urban air or from high stacks]: 2.58503e-12 kg; lognormal variance with pedigree 0.0503005, pedigree (2,3,4,1,1)
  Calculated based on leakage and average gas composition, as described in Bussa et al. 2023
- Methane, bromochlorodifluoro-, Halon 1211 [air, non-urban air or from high stacks]: 2.24e-9 kg; lognormal variance with pedigree 0.1372, pedigree (5,5,5,3,3)
  Assuming 10% halon compared to Schori 2012, as described in Bussa et al. 2023
- Methane, fossil [air, non-urban air or from high stacks]: 0.000171353 kg; lognormal variance with pedigree 0.0503005, pedigree (2,3,4,1,1)
  Calculated based on leakage and average gas composition, as described in Bussa et al. 2023
- NMVOC, non-methane volatile organic compounds [air, non-urban air or from high stacks]: 1.18234e-7 kg; lognormal variance with pedigree 0.00979512, pedigree (2,3,4,1,1)
  Calculated based on leakage and average gas composition, as described in Bussa et al. 2023
- Propane [air, non-urban air or from high stacks]: 3.19316e-6 kg; lognormal variance with pedigree 0.0503005, pedigree (2,3,4,1,1)
  Calculated based on leakage and average gas composition, as described in Bussa et al. 2023
- Trifluoromethane [air, non-urban air or from high stacks]: 8.946e-8 kg; lognormal variance with pedigree 0.743673, pedigree (5,5,5,3,3)
  Assuming 90% HFC-23 compared to Schori 2012, as described in Bussa et al. 2023

## Sampling procedure
The pipeline transportation is driven by compressor stations, for which the energy requirements were derived for different regions from literature (Bussa et al., 2023, tab 4.6). Also the losses and generally leakages during long-distance transport are estimated based on various studies (Bussa et al., 2021, tab 4.8). The energy use data of the pipeline is based on qualified estimates from industrial experts for the years 2014 and 2015 (Müller-Syring et al. 2016; Schuller et al. 2017). The infrastructure needs are based on values given in Schori et al. 2012 (qualified estimates). Dutch company reports (Gasunie 1998; 2001) are used for the amount of condensate (verified data partly based on assumptions) and refrigerant emissions. The refrigerants used are updated to current legislation (non-expert estimate). Other emissions are calculated based on the loss rates (qualified estimates) and a generic natural gas composition. For the auxiliary datasets “Natural gas, burned in gas turbine”, the natural gas input is specified by country of origin. For the emissions, generic factors were used. Reference(s): Müller-Syring G., Große C., Glandien J. and Eyßer M. (2016) Critical Evaluation of Default Values for the GHG Emissions of the Natural Gas Supply Chain. DBI Gas- und Umwelttechnik GmbH. Schuller O., Reuter B., Hengstler J., Whitehouse S. and Zeitzen L. (2017) Greenhouse Gas Intensity of Natural Gas Transport. ThinkStep. Schori S. and Frischknecht R. (2012) Life Cycle Inventory of Natural Gas Supply. ESU Services Ltd. Uster, Switzerland. Report commissioned by Swiss Federal Office of Energy (SFOE) Gasunie (1998) Environmental annual report 1997. N.V. Nederlandse Gasunie, Groningen, retrieved from: www.gasunie.nl/eng/f_gm1.htm. Gasunie (2001) Safety, Health & Environment - annual report 2000. N.V. Nederlandse Gasunie, Groningen, retrieved from: www.gasunie.nl.

## Extrapolations
The data for emissions are based on European data and for energy requirements on German data.
