# natural stone plate production, polished

Dataset: EcoSpold 2, unit process
Geography: CH
Time period: 2000-01-01 to 2023-12-31
Technology level: current
Classification: ISIC rev.4 ecoinvent: 2396:Cutting, shaping and finishing of stone
Classification: EcoSpold01Categories: construction materials/others
Tags: ConvertedDataset
Scenario: Business-as-Usual
System model: Allocation, cut-off by classification
Generated by: Daniel Kellenberger (obsolete)
Published in: Kellenberger D. 2007
Database: ecoinvent
isCopyrightProtected: true
accessRestrictedTo: 1

## General comment
The polishing is assumed to be done using a polishing machine and very fine grinding medium. No losses are taken into account as no data are available. The dust emissions are estimated based on the losses (0.05 mm abrasion around the granite plate with geometry of 0.5 * 0.5 * 0.03 m and a weight of 2?750 kg/m3).
[This dataset was already contained in the ecoinvent database version 2. It was not individually updated during the transfer to ecoinvent version 3. Life Cycle Impact Assessment results may still have changed, as they are affected by changes in the supply chain, i.e. in other datasets. This dataset was generated following the ecoinvent quality guidelines for version 2. It may have been subject to central changes described in the ecoinvent version 3 change report (http://www.ecoinvent.org/database/ecoinvent-version-3/reports-of-changes/), and the results of the central updates were reviewed extensively. The changes added e.g. consistent water flows and other information throughout the database. The documentation of this dataset can be found in the ecoinvent reports of version 2, which are still available via the ecoinvent website. The change report linked above covers all central changes that were made during the conversion process.]

## Included activities end
Basis is a ground natural granite plate in a storage. Beside infrastructure some internal transports are included. No administration and wear and spare parts are taken into account. Dust is accounted for.

## Geography
For some exchanges RER- and GLO-modules are used as proxy

## Technology
Typical technology for average Swiss production

## Reference product
- natural stone plate, polished: 1 kg; By-product classification allocatable product; CPC 37690: Other worked monumental or building stone and articles thereof; other artificially coloured granules, chipping[…]; HS2017 680100: Stone; setts, curbstones and flagstones, of natural stone (except slate)
  EcoSpold01Location=CH
  production volume 0.0336675 kg
    This is a placeholder value that does not reflect real-world production volumes. This dataset does not currently require a real-world production volume to work in the database framework, and no actual data were collected yet. This has no negative effect on the results of the ecoinvent database. The placeholder value of this activity was scaled according to the nominal GDP of 2005 (source: United Nations, http://data.un.org/Glossary.aspx?q=GDP+%28current+US%24%29, accessed 20130726) to reflect an appropriate share of the global production volume, which is also a placeholder value.
  property carbon content, fossil 0
    granite (Potassium feldspar, plagioclase feldspar, and quartz)
  property carbon content, non-fossil 0
    granite (Potassium feldspar, plagioclase feldspar, and quartz)
  property price 0.508 EUR2005
    Calculated value based on data from United Nations Commodity Trade Statistics Database (comtrade.un.org). UN comtrade category: 680293 Worked granite. Year 2005. Using exchange rate of 1EURO = 1.209 USD. Average of price of import into 5 main markets (EU, US, JP, IN and CN).
  properties: carbon allocation 0 kg, carbon content 0, dry mass 1 kg, water content 0, water in wet mass 0 kg, wet mass 1 kg

## Inputs from technosphere
- diesel, burned in building machine: 0.357 MJ; lognormal variance with pedigree 0.078, pedigree (3,5,5,1,3)
  EcoSpold01Location=GLO
  properties: heating value, net 1 MJ
- electricity, medium voltage: 0.24 kWh; lognormal variance with pedigree 0.078, pedigree (3,5,5,1,3)
  EcoSpold01Location=CH
- industrial machine, heavy, unspecified: 5e-6 kg; lognormal variance with pedigree 0.446025, pedigree (5,5,5,2,3)
  activityLink introduced to establish a direct link to the corresponding regional supply of this product
  EcoSpold01Location=RER
- natural stone plate, grounded: 1.0077 kg; lognormal variance with pedigree 0.146, pedigree (5,5,5,1,3)
  EcoSpold01Location=CH
  properties: dry mass 1 kg, wet mass 1 kg

## Emissions to nature
- Particulate Matter, < 2.5 um [air, unspecified]: 0.00112 kg; lognormal variance with pedigree 0.5806, pedigree (2,5,5,5,5)
- Particulate Matter, > 10 um [air, unspecified]: 0.00056 kg; lognormal variance with pedigree 0.3206, pedigree (2,5,5,5,5)
- Particulate Matter, > 2.5 um and < 10um [air, unspecified]: 0.0020533 kg; lognormal variance with pedigree 0.4006, pedigree (2,5,5,5,5)

## Sampling procedure
Literature

## Extrapolations
See geography

## Review by Rolf Frischknecht 2010-02-07
passed
