# wheat grain production

Dataset: EcoSpold 2, unit process
Geography: Canada without Quebec
Time period: 2009-01-01 to 2023-12-31
Technology level: current
Classification: ISIC rev.4 ecoinvent: 0111:Growing of cereals (except rice), leguminous crops and oil seeds
Tags: WFLDB
Scenario: Business-as-Usual
System model: Allocation, cut-off by classification
Generated by: Eliane Riedener
Published in: Nemecek T. 2015
Database: ecoinvent
isCopyrightProtected: true
accessRestrictedTo: 1

## General comment
This dataset represents the production of 1 kg of wheat grains, at standard water content required for storage (14.5%). The average yield from 2009 - 2012 is 2.86 t/ha. The data are representative for spring-seeded wheat grown in western Canada, which accounts for 80% of wheat production in Canada. Amount of seeds, pesticides and machinery use is valid for Saskatchewan (central Canada). Mineral NPK fertiliser input is 75-25-5 kg/ha. Organic fertilisers applied amount to 3.01 m3/ha of liquid manure and 2.14 t/ha of solid manure. Total active ingredients (a.i.) applied as pesticides amount to 0.5 kg a.i./ha.
The dataset was modelled within the project 'World Food LCA database (WFLDB)'. The aim of this project was to provide inventories of a broad variety of agricultural products and processes and to cover for each product at least 50% of the global export market. The export share of spring wheat produced in Canada amounts to 13% of the global export (tonnage exported in 2010). The production system regarded in this dataset aimed at representing spring wheat produced in Canada for the export market.
PEF-Quality: data quality rating (DQR) = 1.5 (i.e. excellent quality). This dataset refers to an average situation; for specific situations exchanges might differ substantially due to site specific parameters

## Included activities start
This activity starts with soil cultivation after the harvest of the previous crop.

## Included activities end
This activity ends with the harvest of grains and their transport to the farm gate. The dataset includes all machine operations, corresponding infrastructure, fuel use and sheds. Machine operations are: soil cultivation (a mixture of no tillage and minimum tillage), sowing, fertilisation, pesticide application, harvesting, making and loading bales, and on-farm transport. Further, direct field emissions and land use change are included. Heavy metal uptake by the crop is considered. The inputs of seeds, fertilisers and pesticides as well as packaging of fertilisers and pesticides are considered. The dataset doesn't include emissions from manure storage because these are within the system boundary of animal production.

## Technology
Conventional production

## Parameters
- LUC_crop_specific: 1 dimensionless
  This parameter allows to switch between a 'crop specific' and a 'country specific' approach when calculating the LUC of a crop. By default, the chosen approach is 'crop specific', so the value of the parameter is 1. If you want to apply a 'country specific' approach, turn the parameter to 0.
- heavyMetalUptakeSwitch: 1 dimensionless

## Reference product
- straw: 1 kg; By-product classification allocatable product; CPC 01913: Cereal straw, husks, unprepared, ground, pressed, or in the form of pellets; HS2017 0604: Foliage, branches and other parts of plants, without flowers or flower buds, and grasses, mosses and lichens;[...]
  Yield = 1667.2 kg/ha
  production volume 1.49454e10 kg
    Calculated from reference product production volume, reference product amount and byproduct amount.
  property heating value, net 14.25 MJ
    Literature value, Source: Phyllis2, database for (treated) biomass, algae, feedstocks for biogas production and biochar, https://phyllis.nl/Biomass/View/1271, ECN.TNO
  property price 0.012 EUR2005
    Temporary price data. Calculated as 90% of purchasers price based on: Based on price allocation ratio from EcoInvent v2 report number 17, page 118.
  properties: allocation factor 0.0308376, carbon allocation 0.37177 kg, carbon content 0.437377, carbon content, fossil 0, carbon content, non-fossil 0.437377, dry mass 0.85 kg, true value 0.00700014, water content 0.176471, water in wet mass 0.15 kg, wet mass 1 kg

## Inputs from technosphere
- ammonia, anhydrous, liquid: 0.000404281 kg; source Troy McInnis. 2015; lognormal variance with pedigree 0.124177, pedigree (2,1,4,1,1)
  Calculated based on literature values or expert estimation: The total amount of nutrient (Personal written communication, Troy McInnis., Yara, 2015) multiplied by the share of fertiliser type (Personal written communication, Troy McInnis., Yara, 2015). See supporting documentation 'WFLDB-Documentation.pdf' chapter 'Fertiliser application' for L3 and L4 data (https://ecoquery.ecoinvent.org/File/Reports).
  Corresponds to 21.9 kg/ha
  properties: dry mass 1 kg, wet mass 1 kg
- ammonium sulfate: 9.71074e-5 kg; source Troy McInnis. 2015; lognormal variance with pedigree 0.124177, pedigree (2,1,4,1,1)
  Calculated based on literature values or expert estimation: The total amount of nutrient (Personal written communication, Troy McInnis., Yara, 2015) multiplied by the share of fertiliser type (Personal written communication, Troy McInnis., Yara, 2015). See supporting documentation 'WFLDB-Documentation.pdf' chapter 'Fertiliser application' for L3 and L4 data (https://ecoquery.ecoinvent.org/File/Reports).
  Corresponds to 5.25 kg/ha
  properties: dry mass 1 kg, wet mass 1 kg
- application of plant protection product, by field sprayer: 1.84966e-5 ha; source Li X. 2012; lognormal variance with pedigree 0.124664, pedigree (2,2,4,1,1)
  Literature value or expert estimation (Li et al. 2012).
- bale loading: 5.82644e-5 unit; source Li X. 2012; lognormal variance with pedigree 0.124177, pedigree (2,1,4,1,1)
  Literature value or expert estimation (Li et al. 2012).
- baling: 1.34008e-5 unit; source Li X. 2012; lognormal variance with pedigree 0.124177, pedigree (2,1,4,1,1)
  Literature value or expert estimation (Li et al. 2012).
- combine harvesting: 1.84966e-5 ha; source Li X. 2012; lognormal variance with pedigree 0.124177, pedigree (2,1,4,1,1)
  Literature value or expert estimation (Li et al. 2012).
- inorganic nitrogen fertiliser, as N: 6.93624e-5, 1.38725e-5 kg (2 suppliers, which the file names only by identifier); sum of these 8.32349e-5 kg
  Calculated based on literature values or expert estimation: The total amount of nutrient (Personal written communication, Troy McInnis., Yara, 2015) multiplied by the share of fertiliser type (Personal written communication, Troy McInnis., Yara, 2015). See supporting documentation 'WFLDB-Documentation.pdf' chapter 'Fertiliser application' for L3 and L4 data (https://ecoquery.ecoinvent.org/File/Reports).
  Corresponds to 0.75 kg/ha
  properties: dry mass 1 kg, wet mass 1 kg
- inorganic phosphorus fertiliser, as P2O5: 0.000439295, 2.31208e-5 kg (2 suppliers, which the file names only by identifier); sum of these 0.000462416 kg
  Calculated based on literature values or expert estimation: The total amount of nutrient (Personal written communication, Troy McInnis., Yara, 2015) multiplied by the share of fertiliser type (Personal written communication, Troy McInnis., Yara, 2015). See supporting documentation 'WFLDB-Documentation.pdf' chapter 'Fertiliser application' for L3 and L4 data (https://ecoquery.ecoinvent.org/File/Reports).
  Corresponds to 1.25 kg/ha
  properties: dry mass 1 kg, wet mass 1 kg
- liquid manure spreading, by vacuum tanker: 5.56176e-5 m3; lognormal variance with pedigree 0.124177, pedigree (2,1,4,1,1)
  This amount corresponds to the input of liquid manure.
- manure, liquid, cattle: 0.0385418 kg; source Troy McInnis. 2015; lognormal variance with pedigree 0.124177, pedigree (2,1,4,1,1)
  Calculated based on literature values: The total amount of manure (Personal written communication, Troy McInnis., Yara, 2015) multiplied by the country-share of manure per animal category (FAOSTAT 2015). See supporting documentation 'WFLDB-Documentation.pdf' chapter 'Fertiliser application' (https://ecoquery.ecoinvent.org/File/Reports).
  Corresponds to 2.08 m3/ha
  properties: carbon content, non-fossil 0.68, dry mass 0.075 kg, water content 12.333, wet mass 1 kg
- manure, liquid, swine: 0.0159838 kg; source Troy McInnis. 2015; lognormal variance with pedigree 0.124177, pedigree (2,1,4,1,1)
  Calculated based on literature values: The total amount of manure (Personal written communication, Troy McInnis., Yara, 2015) multiplied by the country-share of manure per animal category (FAOSTAT 2015). See supporting documentation 'WFLDB-Documentation.pdf' chapter 'Fertiliser application' (https://ecoquery.ecoinvent.org/File/Reports).
  Corresponds to 0.864 m3/ha
  properties: carbon content, non-fossil 0.64, dry mass 0.05 kg, water content 19, wet mass 1 kg
- manure, solid, cattle: 0.0257044 kg; source Troy McInnis. 2015; lognormal variance with pedigree 0.124177, pedigree (2,1,4,1,1)
  Calculated based on literature values: The total amount of manure (Personal written communication, Troy McInnis., Yara, 2015) multiplied by the country-share of manure per animal category (FAOSTAT 2015). See supporting documentation 'WFLDB-Documentation.pdf' chapter 'Fertiliser application' (https://ecoquery.ecoinvent.org/File/Reports).
  Corresponds to 1390.0 kg/ha
  properties: carbon content, non-fossil 0.441, dry mass 0.22 kg, water content 3.5454, wet mass 1 kg
- packaging, for fertilisers: 0.00402698 kg; lognormal variance with pedigree 0.0592, pedigree (4,3,4,5,4)
  Total amount of active substance/s of fertilisers needed for the production of 'wheat grain' is calculated to be circa 3.81E-02 kg. Fertiliser/s used in this dataset is/are: 'ammonia, liquid', 'ammonium sulfate, as N', 'nitrogen fertiliser, as N', 'nitrogen fertiliser, as N', 'nitrogen fertiliser, as N', 'phosphate fertiliser, as P2O5', 'phosphate fertiliser, as P2O5', 'potassium chloride, as K2O', 'urea, as N'. The total amount of active substance/s is doubled in order to account for the packaging of the dilluted product of fertiliser/s that is/are applied. Therefore, 7.62E-02 kg of packaging for fertilisers is justified with this exchange.
  properties: carbon content, fossil 0.825301, dry mass 1 kg, heating value, net 25.01 MJ, price 0.0642 EUR2005, wet mass 1 kg
  note on carbon content, fossil: Considering a chemical formula (C2H4)n for polyethylene, carbon content-fossil is calculated to be 0.856286 kg of Carbon per kg of dry mass.
- packaging, for pesticides: 1.84966e-5 kg; lognormal variance with pedigree 0.0592, pedigree (4,3,4,5,4)
  Total amount of active substance/s of pesticides needed for the production of wheat grain is calculated to be circa 1.75E-04 kg. Pesticide/s used in this dataset is/are: 'phenoxy-compound'. The total amount of active substance/s is doubled in order to account for the packaging of the dilluted product of pesticide/s that is/are applied. Therefore, 3.50E-04 kg of packaging for pesticides is justified with this exchange.
  properties: carbon content, fossil 0.85714, dry mass 1 kg, heating value, net 25.97 MJ, price 0.0642 EUR2005, wet mass 1 kg
- phenoxy-compound: 9.24832e-6 kg; source Li X. 2012; lognormal variance with pedigree 0.0138498, pedigree (2,2,4,1,1)
  Literature value or expert estimation (Li et al. 2012).
  properties: carbon content, fossil 0.532559, dry mass 1 kg, wet mass 1 kg
- potassium chloride: 0.000146391 kg; source Troy McInnis. 2015; lognormal variance with pedigree 0.124177, pedigree (2,1,4,1,1)
  The exchange has been updated from 'potassium chloride, as K2O' into 'potassium chloride' and therefore its amount has been scaled (multiplied) from 0.0017 kg by 1.5829 kg of 'potassium chloride' per kg of 'potassium chloride, as K2O'. Original comment of the exchange is: Calculated based on literature values or expert estimation: The total amount of nutrient (Personal written communication, Troy McInnis., Yara, 2015) multiplied by the share of fertiliser type (Personal written communication, Troy McInnis., Yara, 2015). See supporting documentation 'WFLDB-Documentation.pdf' chapter 'Fertiliser application' for L3 and L4 data (https://ecoquery.ecoinvent.org/File/Reports).
  Corresponds to 5.0 kg/ha
  properties: dry mass 1 kg, wet mass 1 kg
- poultry manure, dried: 0.0139283 kg; source Troy McInnis. 2015; lognormal variance with pedigree 0.124177, pedigree (2,1,4,1,1)
  Calculated based on literature values: The total amount of manure (Personal written communication, Troy McInnis., Yara, 2015) multiplied by the country-share of manure per animal category (FAOSTAT 2015). See supporting documentation 'WFLDB-Documentation.pdf' chapter 'Fertiliser application' (https://ecoquery.ecoinvent.org/File/Reports).
  properties: cadmium content 2.92e-7, carbon content, non-fossil 0.33389, copper content 4.38e-5, dry mass 0.865 kg, lead content 2.92e-6, mercury content 2e-7, nickel content 4e-5, nitrogen content 0.532, phosphorus content 0.0167, potassium content 0.024, water content 0.156069, wet mass 1 kg, zinc content 0.000349
- poultry manure, fresh: 0.000545991 kg; source Troy McInnis. 2015; lognormal variance with pedigree 0.124177, pedigree (2,1,4,1,1)
  Calculated based on literature values: The total amount of manure (Personal written communication, Troy McInnis., Yara, 2015) multiplied by the country-share of manure per animal category (FAOSTAT 2015). See supporting documentation 'WFLDB-Documentation.pdf' chapter 'Fertiliser application' (https://ecoquery.ecoinvent.org/File/Reports).
  Corresponds to 0.059 m3/ha
  properties: carbon content, non-fossil 0.33389, dry mass 0.38 kg, water content 1.63158, wet mass 1 kg
- solid manure loading and spreading, by hydraulic loader and spreader: 0.0396328 kg; lognormal variance with pedigree 0.124177, pedigree (2,1,4,1,1)
  This amount corresponds the input of solid manure.
- sowing: 1.84966e-5 ha; source Li X. 2012; lognormal variance with pedigree 0.124177, pedigree (2,1,4,1,1)
  Literature value or expert estimation (Li et al. 2012).
- tillage, cultivating, chiselling: 9.24832e-6 ha; source Li X. 2012; lognormal variance with pedigree 0.124177, pedigree (2,1,4,1,1)
  Estimation based on a modified MEXALCA-approach (Roches et al. 2010; Nemecek et al. 2012): See supporting documentation 'WFLDB-Documentation.pdf' chapter 'Machinery processes' for L2 data (https://ecoquery.ecoinvent.org/File/Reports).
- transport, freight train: 0.000188614 metric ton*km
  This represent the transport of fertilizers that are directly linked to their supplying activities, to better represent the fertilizer mix of the activity. Transport distance based on US BTS Commodity Flow Surveys 1993, 1997, 2002, 2007, US Dep. Of Transportation, Bureau of Transportation Statistics.
- transport, freight, inland waterways, barge: 3.18919e-5 metric ton*km
  (same comment as for transport, freight train)
- transport, freight, lorry, unspecified: 0.00010163 metric ton*km
  This represent the transport of fertilizers that are directly linked to their supplying activities, to better represent the fertilizer mix of the activity. Transport distance based on US BTS Commodity Flow Surveys 1993, 1997, 2002, 2007, US Dep. Of Transportation, Bureau of Transportation Statistics. Of the total road transport, 6% is assumed to be by delivery van for goods with a large share of retail sale, and 3% for goods that are mainly sold via wholesale.
- transport, freight, sea, container ship: 0.000575492 metric ton*km
  This represent the transport of fertilizers that are directly linked to their supplying activities, to better represent the fertilizer mix of the activity. The total marine transport volume differentiated into major commodity groups based on data from FearnResearch (2001): Fearnley's Annual Review 2000. Oslo: Fearnley/AS, p. 1-78. The category 'Other cargo' accounts for 38% of total maritime transport volume and has been distributed on commodity groups based on the proportions of transport by rail and inland waterways.
  The total marine transport volume differentiated into major commodity groups based on data from FearnResearch (2001): Fearnley's Annual Review 2000. Oslo: Fearnley/AS, p. 1-78. The category 'Other cargo' accounts for 38% of total maritime transport volume and has been distributed on commodity groups based on the proportions in the marine import and export of the US in 2001-2010.
- transport, tractor and trailer, agricultural: 0.00033823 metric ton*km; lognormal variance with pedigree 0.162439, pedigree (4,1,4,1,1)
  On-farm transport: Yield (in tonnes) multiplied by the average distance from field to farm. The distance was obtained by extrapolation (modified MEXALCA approach). See supporting documentation 'WFLDB-Documentation.pdf' chapter 'Machinery processes' (https://ecoquery.ecoinvent.org/File/Reports). Corresponds to 18.3tkm/ha.
- urea: 0.00157621 kg; source Troy McInnis. 2015; lognormal variance with pedigree 0.124177, pedigree (2,1,4,1,1)
  The exchange has been updated from 'urea, as N' into 'urea' and therefore its amount has been scaled (multiplied) from 0.0139 kg by 2.1438 kg of 'urea' per kg of 'urea, as N'. Original comment of the exchange is: Calculated based on literature values or expert estimation: The total amount of nutrient (Personal written communication, Troy McInnis., Yara, 2015) multiplied by the share of fertiliser type (Personal written communication, Troy McInnis., Yara, 2015). See supporting documentation 'WFLDB-Documentation.pdf' chapter 'Fertiliser application' for L3 and L4 data (https://ecoquery.ecoinvent.org/File/Reports).
  Corresponds to 39.8 kg/ha
  properties: carbon content, fossil 0.2, dry mass 1 kg, wet mass 1 kg
- urea ammonium nitrate mix: 0.000462416 kg
  The exchange has been updated from 'inorganic nitrogen fertiliser, as N' into 'urea ammonium nitrate' and therefore its amount has been scaled (multiplied) from 0.0026 kg by 3.3333 kg of 'urea ammonium nitrate' per kg of 'inorganic nitrogen fertiliser, as N'. Original comment of the exchange is: Calculated based on literature values or expert estimation: The total amount of nutrient (Personal written communication, Troy McInnis., Yara, 2015) multiplied by the share of fertiliser type (Personal written communication, Troy McInnis., Yara, 2015). See supporting documentation 'WFLDB-Documentation.pdf' chapter 'Fertiliser application' for L3 and L4 data (https://ecoquery.ecoinvent.org/File/Reports).
  Corresponds to 0.75 kg/ha
  properties: carbon content, fossil 0.0879977, dry mass 0.75 kg, hydrogen content 0.095042, nitrogen content 0.401231, oxygen content 0.749063, water content 0.333333, wet mass 1 kg
  note on carbon content, fossil: Carbon content, fossil is calculated based on the chemical formula of the substance.
  note on hydrogen content: Hydrogen content (on a dry matter basis) of urea ammonium nitrate mix is calculated from the molecular formula of the substance (CH6N4O4).
  note on nitrogen content: Nitrogen content (on a dry matter basis) of urea ammonium nitrate mix is calculated from the molecular formula of the substance (CH6N4O4).
  note on oxygen content: Oxygen content (on a dry matter basis) of urea ammonium nitrate mix is calculated from the molecular formula of the substance (CH6N4O4).
- wheat seed, for sowing: 0.00247855 kg; source Li X. 2012; lognormal variance with pedigree 0.124177, pedigree (2,1,4,1,1)
  Literature value or expert estimation (Li et al. 2012). Sowing density: 134kg/ha.
  property carbon content, fossil 0; name wheat_seed_sowing_C_content_fossil
  property carbon content, non-fossil 0.464601; name wheat_seed_sowing_C_content_non_fossil
  property dry mass 0.85 kg; name wheat_seed_sowing_DM; = wheat_seed_sowing_WM- wheat_seed_sowing_WWM
  property water content 0.176471; name wheat_seed_sowing_water_content; = wheat_seed_sowing_WWM/ wheat_seed_sowing_DM
  property water in wet mass 0.15 kg; name wheat_seed_sowing_WWM
  property wet mass 1 kg; name wheat_seed_sowing_WM
  note on carbon content, non-fossil: Composition data obtained from Wheat, soft red winter, in (http://www.nal.usda.gov/fnic/foodcomp/search/). First, composition data were refered to 1 kg dry mass. Then, C-contents were calculated considering a C-content/dry mass of 46% in carbohydrates (including fibres), 53% in proteins and 75% in fats. All data from "Evolutionary and Biochemical Aspects", A.D. Kay and T. Vrede (in Global Ecology, 2010, Elsevier B.V., S.E. Jørgensen Ed.).

## Inputs from nature
- Carbon dioxide, in air [natural resource, in air]: 0.0669911 kg; lognormal variance with pedigree 0.0138498, pedigree (2,2,4,1,1)
  CO2 uptake by biomass
- Energy, gross calorific value, in biomass [natural resource, biotic]: 0.780262 MJ; lognormal variance with pedigree 0.0138498, pedigree (2,2,4,1,1)
  Gross energy content is related to MJ/kg dry matter of product. Source: ecoinvent data.
- Occupation, annual crop [natural resource, land]: 0.185466 m2*year; lognormal variance with pedigree 0.0200616, pedigree (2,1,4,1,1)
  Related to the duration from harvest date of previous crop to harvest date of main crop: 366 days.
- Transformation, from arable land, unspecified use [natural resource, land]: 0.184966 m2; lognormal variance with pedigree 0.0442144, pedigree (2,1,4,1,1)
  10000 m2 divided by the life time of the crop.
- Transformation, to arable land, unspecified use [natural resource, land]: 0.184966 m2; lognormal variance with pedigree 0.0442144, pedigree (2,1,4,1,1)
  10000 m2 divided by the life time of the crop.

## Emissions to nature
- Ammonia [air, non-urban air or from high stacks]: 0.000463507 kg; source EEA 2013; lognormal variance with pedigree 0.0447216, pedigree (2,2,4,1,1)
  Calculated value - EMEP/EEA (2013). See 'WFLDB-Guidelines.pdf', available at https://ecoquery.ecoinvent.org/File/Reports.
- Carbon dioxide, fossil [air, non-urban air or from high stacks]: 0.00126323 kg; lognormal variance with pedigree 0.0138498, pedigree (2,2,4,1,1)
  Calculated value - CO2 emissions from urea and lime. See 'WFLDB-Guidelines.pdf', available at https://ecoquery.ecoinvent.org/File/Reports.
- Dinitrogen monoxide [air, non-urban air or from high stacks]: 3.86043e-5 kg; source IPCC 2006; lognormal variance with pedigree 0.124664, pedigree (2,2,4,1,1)
  Calculated value - IPCC (2006). See 'WFLDB-Guidelines.pdf', available at https://ecoquery.ecoinvent.org/File/Reports.
- Nitrogen oxides [air, non-urban air or from high stacks]: 6.20285e-5 kg; source EEA 2013; lognormal variance with pedigree 0.124664, pedigree (2,2,4,1,1)
  Calculated value - EEA/EMEP (2013). See 'WFLDB-Guidelines.pdf', available at https://ecoquery.ecoinvent.org/File/Reports.
- 2,4-D [soil, agricultural]: 9.24832e-6 kg; lognormal variance with pedigree 0.0447216, pedigree (2,2,4,1,1)
  Calculated value - 100% emission in soil. See 'WFLDB-Guidelines.pdf', available at https://ecoquery.ecoinvent.org/File/Reports.
- Cadmium II [soil, agricultural]: 1.50639e-8 kg; = 5.70293911826e-07 + ( - 8.70013995801e-08 - 1.9833449965e-07)*heavyMetalUptakeSwitch; source Freiermuth R.  2006
  Comment on mathematicalRelation:
  5.70293911826e-07 from Calculated value - Freiermuth (2006). See 'WFLDB-Guidelines.pdf', available at https://ecoquery.ecoinvent.org/File/Reports.
  -8.70013995801e-08 from Wheat grains, heavy metals uptake model
  -1.9833449965e-07 from Wheat straw, heavy metals uptake model
  Heavy metal uptake can be excluded by setting the parameter heavyMetalUptakeSwitch to zero.
- Chromium III [soil, agricultural]: 6.82082e-9 kg; = 9.97200839748e-07 + ( - 1.7400279916e-07 - 6.94170748775e-07)*heavyMetalUptakeSwitch; source Freiermuth R.  2006
  Comment on mathematicalRelation:
  9.97200839748e-07 from Calculated value - Freiermuth (2006). See 'WFLDB-Guidelines.pdf', available at https://ecoquery.ecoinvent.org/File/Reports.
  -1.7400279916e-07 from Wheat grains, heavy metals uptake model
  -6.94170748775e-07 from Wheat straw, heavy metals uptake model
  Heavy metal uptake can be excluded by setting the parameter heavyMetalUptakeSwitch to zero.
- Copper ion [soil, agricultural]: 3.34494e-7 kg; = 1.1677746676e-05 + ( - 2.87104618614e-06 - 2.47918124563e-06)*heavyMetalUptakeSwitch; source Freiermuth R.  2006
  Comment on mathematicalRelation:
  1.1677746676e-05 from Calculated value - Freiermuth (2006). See 'WFLDB-Guidelines.pdf', available at https://ecoquery.ecoinvent.org/File/Reports.
  -2.87104618614e-06 from Wheat grains, heavy metals uptake model
  -2.47918124563e-06 from Wheat straw, heavy metals uptake model
  Heavy metal uptake can be excluded by setting the parameter heavyMetalUptakeSwitch to zero.
- Lead II [soil, agricultural]: 2.34552e-8 kg; = 1.21270118964e-06 + ( - 1.7400279916e-07 - 5.9500349895e-07)*heavyMetalUptakeSwitch; source Freiermuth R.  2006
  Comment on mathematicalRelation:
  1.21270118964e-06 from Calculated value - Freiermuth (2006). See 'WFLDB-Guidelines.pdf', available at https://ecoquery.ecoinvent.org/File/Reports.
  -1.7400279916e-07 from Wheat grains, heavy metals uptake model
  -5.9500349895e-07 from Wheat straw, heavy metals uptake model
  Heavy metal uptake can be excluded by setting the parameter heavyMetalUptakeSwitch to zero.
- Mercury II [soil, agricultural]: 5.84281e-9 kg; = 1.1922673198e-07 + ( - 8.70013995801e-09)*heavyMetalUptakeSwitch; source Freiermuth R.  2006
  Comment on mathematicalRelation:
  1.1922673198e-07 from Calculated value - Freiermuth (2006). See 'WFLDB-Guidelines.pdf', available at https://ecoquery.ecoinvent.org/File/Reports.
  -8.70013995801e-09 from Wheat grains, heavy metals uptake model
  Heavy metal uptake can be excluded by setting the parameter heavyMetalUptakeSwitch to zero.
- Nickel II [soil, agricultural]: 1.62848e-7 kg; = 3.84954513646e-06 + ( - 1.7400279916e-07 - 5.9500349895e-07)*heavyMetalUptakeSwitch; source Freiermuth R.  2006
  Comment on mathematicalRelation:
  -1.7400279916e-07 from Wheat grains, heavy metals uptake model
  -5.9500349895e-07 from Wheat straw, heavy metals uptake model
  Heavy metal uptake can be excluded by setting the parameter heavyMetalUptakeSwitch to zero.
- Zinc II [soil, agricultural]: 2.49828e-6 kg; = 7.51364590623e-05 + ( - 1.83572953114e-05 - 9.52005598321e-06)*heavyMetalUptakeSwitch; source Freiermuth R.  2006
  Comment on mathematicalRelation:
  7.51364590623e-05 from Calculated value - Freiermuth (2006). See 'WFLDB-Guidelines.pdf', available at https://ecoquery.ecoinvent.org/File/Reports.
  -1.83572953114e-05 from Wheat grains, heavy metals uptake model
  -9.52005598321e-06 from Wheat straw, heavy metals uptake model
  Heavy metal uptake can be excluded by setting the parameter heavyMetalUptakeSwitch to zero.
- Cadmium II [water, ground-]: 6.49343e-10 kg; source Freiermuth R.  2006; lognormal variance with pedigree 0.356938, pedigree (2,2,4,1,1)
  Calculated value - Freiermuth (2006). See 'WFLDB-Guidelines.pdf', available at https://ecoquery.ecoinvent.org/File/Reports.
- Cadmium II [water, surface water]: 8.01515e-11 kg; source Freiermuth R.  2006; lognormal variance with pedigree 0.356938, pedigree (2,2,4,1,1)
  (same comment as for Cadmium II)
- Chromium III [water, ground-]: 3.35844e-7 kg; source Freiermuth R.  2006; lognormal variance with pedigree 0.356938, pedigree (2,2,4,1,1)
  (same comment as for Cadmium II)
- Chromium III [water, surface water]: 9.63028e-9 kg; source Freiermuth R.  2006; lognormal variance with pedigree 0.356938, pedigree (2,2,4,1,1)
  (same comment as for Cadmium II)
- Copper ion [water, ground-]: 6.21654e-8 kg; source Freiermuth R.  2006; lognormal variance with pedigree 0.356938, pedigree (2,2,4,1,1)
  (same comment as for Cadmium II)
- Copper ion [water, surface water]: 9.06077e-9 kg; source Freiermuth R.  2006; lognormal variance with pedigree 0.356938, pedigree (2,2,4,1,1)
  (same comment as for Cadmium II)
- Lead II [water, ground-]: 1.80222e-9 kg; source Freiermuth R.  2006; lognormal variance with pedigree 0.356938, pedigree (2,2,4,1,1)
  (same comment as for Cadmium II)
- Lead II [water, surface water]: 1.42161e-9 kg; source Freiermuth R.  2006; lognormal variance with pedigree 0.356938, pedigree (2,2,4,1,1)
  (same comment as for Cadmium II)
- Mercury II [water, ground-]: 3.5299e-11 kg; source Freiermuth R.  2006; lognormal variance with pedigree 0.356938, pedigree (2,2,4,1,1)
  (same comment as for Cadmium II)
- Mercury II [water, surface water]: 2.85884e-11 kg; source Freiermuth R.  2006; lognormal variance with pedigree 0.356938, pedigree (2,2,4,1,1)
  (same comment as for Cadmium II)
- Nickel II [water, ground-]: 9.1612e-12 kg; source Freiermuth R.  2006; lognormal variance with pedigree 0.356938, pedigree (2,2,4,1,1)
  (same comment as for Cadmium II)
- Nickel II [water, surface water]: 6.98785e-9 kg; source Freiermuth R.  2006; lognormal variance with pedigree 0.356938, pedigree (2,2,4,1,1)
  (same comment as for Cadmium II)
- Nitrate [water, ground-]: 0.00268697 kg; source Faist Emmenegger M. 2009; lognormal variance with pedigree 0.175866, pedigree (2,2,4,1,1)
- Phosphate [water, ground-]: 3.9925e-6 kg; source Prasuhn V.  2006; lognormal variance with pedigree 0.175866, pedigree (2,2,4,1,1)
  Calculated value - Prasuhn (2006). See 'WFLDB-Guidelines.pdf', available at https://ecoquery.ecoinvent.org/File/Reports.
- Phosphate [water, surface water]: 1.08708e-5 kg; source Prasuhn V.  2006; lognormal variance with pedigree 0.175866, pedigree (2,2,4,1,1)
  (same comment as for Phosphate)
- Phosphorus [water, surface water]: 3.51196e-7 kg; source Prasuhn V.  2006; lognormal variance with pedigree 0.175866, pedigree (2,2,4,1,1)
  Calculated value - Prasuhn (2006) and SQCB-Erosion. See 'WFLDB-Guidelines.pdf', available at https://ecoquery.ecoinvent.org/File/Reports.
- Zinc II [water, ground-]: 4.40017e-7 kg; source Freiermuth R.  2006; lognormal variance with pedigree 0.356938, pedigree (2,2,4,1,1)
  (same comment as for Cadmium II)
- Zinc II [water, surface water]: 2.06071e-8 kg; source Freiermuth R.  2006; lognormal variance with pedigree 0.356938, pedigree (2,2,4,1,1)
  (same comment as for Cadmium II)

## Sampling procedure
WFLDB Methodological Guidelines for the Life Cycle Inventory of Agricultural Products in the latest version, available at: Data were categorised from level 0 (L0) to level (L4) as follows: L0 = estimate, proxy; L1 = statistical data (e.g. FAOSTAT); L2 = L1 adapted to crop and country; L3 = literature data or L1 resp. L2 data approved by experts; medium detailing (i.e. kg of total N-fertiliser); L4 = L3 data of high detailing (i.e. portion N-fertiliser types).In this dataset data were obtained for yield: L3; Fertilisers: L4; Pesticides: L4; Machinery: L4; Irrigation: L3. For information regarding the calculation of individual exchanges see supporting documentation WFLDB-Documentation.pdf.

## Extrapolations
If used, extrapolations are documented on the flow level.

## Review by Assumpció ANTON 2016-05-30
Be aware that the use of statistics in input calculations could provide some specific inputs not common for specific crops, this should be corrected if better information is available and better reflexed in DQR . Currently, I would dissent for some of good marks provided, being a revision of criteria applied advisable.
Pesticides will need to be amended periodically checking for update of pesticides' ban.
