# methanol production, natural gas reforming

Dataset: EcoSpold 2, unit process
Geography: CN
Time period: 2017-01-01 to 2025-12-31
Technology level: current
Classification: ISIC rev.4 ecoinvent: 2011:Manufacture of basic chemicals
Synonyms: Methylol; Carbinol; Methyl alcohol; Wood spirit; Wood alcohol
Scenario: Business-as-Usual
System model: Allocation, cut-off by classification
Generated by: Iasonas Ioannou
Published in: IEAGHG 2017
Database: ecoinvent
isCopyrightProtected: true
accessRestrictedTo: 1

## General comment
This dataset represents the production of 1 kg of methanol from natural gas. Methanol (CH3OH) is a clear, colourless, volatile liquid with a faint alcohol-like odour. Methanol is the simplest of the alcohols, having only one carbon atom, and is completely miscible in water. Methanol easily dissolves in other alcohols and chlorinated hydrocarbons, but has limited solubility in diesel fuel, vegetable oils, and aliphatic hydrocarbons.
As of 2000, more than 70% of the methanol produced worldwide is used in chemical syntheses. In order of importance the produced methanol was used as follows:
- Formaldehyde: 34% of production.
- Methyl tert-butyl ether (MTBE): 28% of production.
- Acetic acid: 10% of production.
- Methyl methacrylate (MMA): 3% of production.
- Dimethyl terephthalate (DMT). 2% of production.
Only a small proportion is used for energy production (2% of production), although this use has great potential for vehicles with internal combustion engines.
Commercial production of methanol is based on synthesis gas mixtures (carbon monoxide and hydrogen) derived primarily from natural gas.
This dataset represents the production of methanol using the steam reforming process. The inventory is based on data from literature and reports on plant design or efficiency.
References:
Althaus H.-J., Chudacoff M., Hischier R., Jungbluth N., Osses M. and Primas A. (2007) Life Cycle Inventories of Chemicals. ecoinvent report No. 8, v2.0. EMPA Dübendorf, Swiss Centre for Life Cycle Inventories, Dübendorf, CH.

## Included activities start
The activity starts when the raw materials enter the process.

## Included activities end
This activity ends with the production of methanol. The dataset includes the consumption of raw materials and energy, estimated catalyst use, emissions to air and water from the process, as well as the infrastructure use. The use of CO2 is not included and the hydrogen that is produced during the process is assumed to be burned in the furnace.

## Geography
This dataset is modelled for China. Namely, this activity originates from literature data, based on robust modelling, for the production of methanol from steam methane reforming at a site located at the North East coast of the Neatherlands. The material and energy inputs reflect well the production technology and are, therefore, considered to be valid for the chosen geography.
References:
Liu, Yigang, Guoxuan Li, Zhengrun Chen, Yuanyuan Shen, Hongru Zhang, Shuai Wang, Jianguang Qi, Zhaoyou Zhu, Yinglong Wang, and Jun Gao. "Comprehensive analysis of environmental impacts and energy consumption of biomass-to-methanol and coal-to-methanol via life cycle assessment." Energy 204 (2020): 117961.

## Technology
In general, for normal methanol synthesis, reforming is performed in one step in a tubular reactor at 850 – 900 °C in order to leave as little methane as possible in the synthesis gas. For large methanol synthesis plants, Lurgi has introduced a two-step combination (combined reforming process) that gives better results. In the primary tubular reformer, lower temperature (ca. 800 °C) but higher pressure (2.5-4.0 MPa instead of 1.5-2.5 MPa) are applied.
More recently, Lurgi developed another two-step gas production scheme. It is based on catalytic autothermal reforming with an adiabatic performer and has economic advantages for very large methanol plants. At locations where no carbon dioxide is available most of the methanol plants are based on the following gas production technologies, depending on their capacities: steam reforming for capacities up to 2000 t/d or combined reforming from 1800 to 2500 t/d (Ullmann 2001).
Methanol produced using a low-pressure steam reforming process (ICI LPM) account for approximately 60% of the world capacity (Synetix 2000a). Besides steam reforming, combined reforming has gained importance due to the production of methanol in large plants at remote locations.
The reaction of the steam-reforming route can be formulated for methane, the major constituent of natural gas, as follows:
Synthesis gas preparation:
CH4 + H2O → CO + 3 H2; ΔH = 206 kJ mol-1
CO + H2O → CO2 + H2; ΔH = - 41 kJ mol-1
Methanol synthesis:
CO + 2 H2 → CH3OH; ΔH = -98 kJ mol-1
CO2 + 3 H2 → CH3OH + H2O; ΔH = -58 kJ mol-1
For an average plant the total carbon efficiency is around 75%, 81% for the synthesis gas preparation and 93% for the methanol synthesis (Le Blanc et al. 1994, p. 114). For steam reformers usually a steam to carbon ratio of 3:1 to 3.5:1 is used.
As methanol production is a highly integrated process with a complicated steam system, heat recovery and often also internal electricity production (out of excess steam), there were only data of the efficiency and energy consumption of the total process available. Therefore, the process was not divided into a reforming process, a synthesis process and a purification process for estimating the energy and resource flows. Also, the energy and resource flows in the methanol production plants are site specific (dependent on the local availability of resources such as CO2, O2, or electricity).
In this dataset, typical values for a methanol plant, where methanol is prepared from natural gas through a single train of combined reformers. Namely, the most important units are the following: the conventional steam methane reformer (SMR), followed by an oxygen blown autothermal reformer (ATR), and the methanol synthesis and purification stage, yielding AA grade methanol. Finally, auxiliary inputs and process steps are also covered in this datasets, e.g., infrastructure, feedstock pre-treatment and catalytic system(s), among others,
References:
Althaus H.-J., Chudacoff M., Hischier R., Jungbluth N., Osses M. and Primas A. (2007) Life Cycle Inventories of Chemicals. ecoinvent report No. 8, v2.0. EMPA Dübendorf, Swiss Centre for Life Cycle Inventories, Dübendorf, CH.
Santos, S. O., Collodi, G., Azzaro, G., & Ferrari, N. (2017). Techno-economic evaluation of Hyco plant integrated to ammonia/urea or methanol production with CCS. IEAGHG.
Le Blanc J. R., Schneider R. V., Ill and Strait R. B. (1994) Production of Methanol. In: Methanol Production and Use, Vol. 1 (ed. Cheng W.-H.). pp. 51-132. Marcel Dekker Inc, New York.
Ullmann (2001) Methanol, Chapter 4, 6, 8, 10. In: Ullmann's Encyclopedia of Industrial Chemistry, Sixth Edition, June-2001 Electronic Release (ed. Fiedler E., Grossmann G., Kersebohm D., Weiss G. and Witte C.). 6 th Electronic Release Edition. Wiley InterScience, New York, Online-Version under: http://www.mrw.interscience.wiley.com/ueic/ull_search_fs.html.

## Time period
This activity originates from literature data, based on robust modelling, for the production of methanol from steam methane reforming, published in 2017. The material and energy inputs reflect well the production technology and not expected to change significantly over time.
References:
Santos, S. O., Collodi, G., Azzaro, G., & Ferrari, N. (2017). Techno-economic evaluation of Hyco plant integrated to ammonia/urea or methanol production with CCS. IEAGHG.

## Reference product
- methanol: 1 kg; name RP; By-product classification allocatable product; CPC 34139: Other alcohols, phenols, phenol-alcohols, and their halogenated, sulphonated, nitrated or nitrosated derivativ[…]; HS2017 290511: Alcohols; saturated monohydric, methanol (methyl alcohol); CAS 67-56-1
  Methanol (CH3OH) is a clear, colourless, volatile liquid with a faint alcohol-like odour. Methanol is the simplest of the alcohols, having only one carbon atom, and is completely miscible in water. Methanol easily dissolves in other alcohols and chlorinated hydrocarbons, but has limited solubility in diesel fuel, vegetable oils, and aliphatic hydrocarbons.
  As of 2000, more than 70% of the methanol produced worldwide is used in chemical syntheses. In order of importance the produced methanol was used as follows:
  - Formaldehyde: 34% of production.
  - Methyl tert-butyl ether (MTBE): 28% of production.
  - Acetic acid: 10% of production.
  - Methyl methacrylate (MMA): 3% of production.
  - Dimethyl terephthalate (DMT). 2% of production.
  Only a small proportion is used for energy production (2% of production), although this use has great potential.
  References:
  Althaus H.-J., Chudacoff M., Hischier R., Jungbluth N., Osses M. and Primas A. (2007) Life Cycle Inventories of Chemicals. ecoinvent report No. 8, v2.0. EMPA Dübendorf, Swiss Centre for Life Cycle Inventories, Dübendorf, CH.
  production volume 2.33e10 kg; name RP_PV; = 23.3*1e9
    According to the report "Methanol fuel in China 2020, China Association of Alcohol and Ether Fuel and Automobiles (CAAEFA), 2021" Chian is one of the largest methanol producer and consumer worldwide. Namely, statistics from CNFIA, in 2019, report that a total methanol consumption of 80 Mt (including imports of 10 Mt), and a production oif 69.9 Mt.
    At the same time, around about two-thirds of China's methanol feedstock is generated from coal, while the residual production is covered from coking gas and natural gas (eia, 2017) .
    Moreover, China, as the largest methanol producer, accounted for 57% of the worlds production (iea, 2022).
    Finally, according to NETL, "About 55-65% of global methanol production uses natural gas feedstock, about 30-35% uses coal, with the rest using coking gas and other feedstocks. (Alvarado M. Methanol Industry Overview, 35th World Methanol Conference, Berlin, Germany 2017). In 2021, worldwide methanol production reached 107 million metric tons."
    All of the above were used in the Mathematica Relation to estimate the production volume of methanol, from natural gas, in China.
    References:
    https://www.methanol.org/wp-content/uploads/2020/04/China-Methanol-Fuel-Report-2020_final-1.pdf, last accessed 28-07-2023.
    IEA (2022), Chemicals, IEA, Paris https://www.iea.org/reports/chemicals, License: CC BY 4.0
    https://www.eia.gov/todayinenergy/detail.php?id=30072#:~:text=About%20two%2Dthirds%20of%20China's,using%20coal%20as%20a%20feedstock., last accessed 28-07-2023.
    https://www.netl.doe.gov/research/carbon-management/energy-systems/gasification/gasifipedia/methanol#:~:text=About%2055%2D65%25%20of%20global,reached%20107%20million%20metric%20tons., last accessed 28-07-2023.
  property heating value, net 20 MJ
    Based on literature, page 533, Report 17: Jungbluth, N., Chudacoff, M., Dauriat, A., Dinkel, F., Doka, G., Faist Emmenegger, M., Gnansounou, E., Kljun, N., Schleiss, K., Spielmann, M., Stettler, C., Sutter, J. 2007: Life Cycle Inventories of Bioenergy. ecoinvent report No. 17, Swiss Centre for Life Cycle Inventories, Dübendorf, CH.
  property price 0.22 EUR2005
    Calculated value based on data from United Nations Commodity Trade Statistics Database (comtrade.un.org). UN comtrade category: 290511 Methyl alcohol. Using exchange rate of 1EURO = 1.209 USD. Average of price of import into 5 main markets (EU, US, JP, IN and CN).
  properties: carbon allocation 0.375 kg, carbon content 0.375, carbon content, fossil 0.375, carbon content, non-fossil 0, dry mass 1 kg, water content 0, water in wet mass 0 kg, wet mass 1 kg

## Inputs from technosphere
- aluminium oxide, non-metallurgical: 0.00024 kg; lognormal variance with pedigree 0.2481, pedigree (4,5,3,3,5)
  Al2O3 used in the catalytic system, as per Althaus H.-J., Chudacoff M., Hischier R., Jungbluth N., Osses M. and Primas A. (2007) Life Cycle Inventories of Chemicals. ecoinvent report No. 8, v2.0. EMPA Dübendorf, Swiss Centre for Life Cycle Inventories, Dübendorf, CH.
  Uncertainty: E
  properties: dry mass 1 kg, wet mass 1 kg
- copper oxide: 9e-5 kg; lognormal variance with pedigree 0.2481, pedigree (4,5,3,3,5)
  Copper oxide used in the catalytic system, as per Althaus H.-J., Chudacoff M., Hischier R., Jungbluth N., Osses M. and Primas A. (2007) Life Cycle Inventories of Chemicals. ecoinvent report No. 8, v2.0. EMPA Dübendorf, Swiss Centre for Life Cycle Inventories, Dübendorf, CH.
  Uncertainty: E
  properties: dry mass 1 kg, wet mass 1 kg
- electricity, medium voltage: 0.088643 kWh; lognormal variance with pedigree 0.0013, pedigree (2,2,1,1,1)
  This value was extracted from Santos, S. O., Collodi, G., Azzaro, G., & Ferrari, N. (2017). Techno-economic evaluation of Hyco plant integrated to ammonia/urea or methanol production with CCS. IEAGHG.
- heat, district or industrial, natural gas: 0.01 MJ; lognormal variance with pedigree 0.0013, pedigree (2,2,1,1,1)
  This value was extracted from Santos, S. O., Collodi, G., Azzaro, G., & Ferrari, N. (2017). Techno-economic evaluation of Hyco plant integrated to ammonia/urea or methanol production with CCS. IEAGHG. This additional input of natural gas heat is consumed as utilities.
  properties: heating value, net 1 MJ
- methanol factory: 3.72e-11 unit; lognormal variance with pedigree 0.3038, pedigree (2,4,1,4,2)
  The infrastructure of the methanol plant was assessed using data from Pehnt 2002. In this publication a recently built methanol plant with a production capacity of 2700 t methanol per day (0.897 Mt per year) was assessed. This plant size was used for this inventory. The lifetime of the plant is accounted with 30 years. Additional 10 years were accounted for construction and dismantling of the plant (Pehnt 2002).
  Reference:
  Pehnt M. (2002) Ganzheitliche Bilanzierung von Brennstoffzellen als zukünftige Energiesysteme. PhD-Thesis, published in Fortschrittsberichte, Reihe 6, Nr. 476, VDI-Verlag. University of Stuttgart, Stuttgart.
- molybdenum trioxide: 1e-5 kg; name MoO3; lognormal variance with pedigree 0.2481, pedigree (4,5,3,3,5)
  MoO3 used in the catalytic system, as per Althaus H.-J., Chudacoff M., Hischier R., Jungbluth N., Osses M. and Primas A. (2007) Life Cycle Inventories of Chemicals. ecoinvent report No. 8, v2.0. EMPA Dübendorf, Swiss Centre for Life Cycle Inventories, Dübendorf, CH.
  Uncertainty: E
  property bismuth content 8e-5; name MoO3_Bi_content
  property copper content 0.0006; name MoO3_Cu_content
  property iron content 0.0044; name MoO3_Fe_content
  property lead content 0.00015; name MoO3_Pb_content
  property molecular weight 143.9 g/mol; name MoO3_mol_weight
  property molybdenum content 0.62; name MoO3_Mo_content
  property oxygen content 0.29; name MoO3_O_content
  property sulfur content 0.0003; name MoO3_S_content
- natural gas, high pressure: 0.889 m3; lognormal variance with pedigree 0.0013, pedigree (2,2,1,1,1)
  This value was extracted from Santos, S. O., Collodi, G., Azzaro, G., & Ferrari, N. (2017). Techno-economic evaluation of Hyco plant integrated to ammonia/urea or methanol production with CCS. IEAGHG.
  87.4% of the input amount is used as feedstock, whereas 12.6% is used as supplemental fuel to the steam methane reforming reactor.
  properties: carbon content, fossil 0.741, dry mass 0.735 kg, heating value, gross 40 MJ, heating value, net 36 MJ, wet mass 0.735 kg
  note on heating value, gross: At standard conditions; based on Meili et al. (2022) section 5.2
- nickel, class 1: 2e-5 kg; lognormal variance with pedigree 0.2481, pedigree (4,5,3,3,5)
  Proxy for NiO used in the catalytic system, as per Althaus H.-J., Chudacoff M., Hischier R., Jungbluth N., Osses M. and Primas A. (2007) Life Cycle Inventories of Chemicals. ecoinvent report No. 8, v2.0. EMPA Dübendorf, Swiss Centre for Life Cycle Inventories, Dübendorf, CH.
  Uncertainty: E
  properties: dry mass 1 kg, wet mass 1 kg
- wastewater, average: -0.00029564 m3; name WW; lognormal variance with pedigree 0.0013, pedigree (2,2,1,1,1)
  (same comment as for electricity, medium voltage)
  production volume; = RP_PV * (WW / RP)
    Calculated from production volume of reference product using the relative outputs.
  properties: carbon content, non-fossil 0.194039, dry mass 0.346837 kg, mass concentration, TOC 0.1091 kg/m3, mass concentration, calcium 0.039453 kg/m3, mass concentration, chlorine 0.030031 kg/m3, mass concentration, hydrogen 0.013365 kg/m3, mass concentration, nitrogen 0.031015 kg/m3, mass concentration, oxygen 0.069824 kg/m3, mass concentration, sodium 0.06456 kg/m3, mass concentration, sulfur 0.015602 kg/m3, water content 2882.2, wet mass 1000 kg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
  note on carbon content, non-fossil: 0.0673 kg TOC/m3 (Tab A.17, ecoinvent v2.2 report 13_I). TOC was considered as Total Carbon.
- water, deionised: 0.355 kg; lognormal variance with pedigree 0.0013, pedigree (2,2,1,1,1)
  (same comment as for electricity, medium voltage)
  properties: wet mass 1 kg
- zinc oxide: 3e-5 kg; lognormal variance with pedigree 0.2481, pedigree (4,5,3,3,5)
  ZnO used in the catalytic system, as per Althaus H.-J., Chudacoff M., Hischier R., Jungbluth N., Osses M. and Primas A. (2007) Life Cycle Inventories of Chemicals. ecoinvent report No. 8, v2.0. EMPA Dübendorf, Swiss Centre for Life Cycle Inventories, Dübendorf, CH.
  Uncertainty: E
  properties: dry mass 1 kg, wet mass 1 kg

## Inputs from nature
- Nitrogen [natural resource, in air]: 1.70472 kg; lognormal variance with pedigree 0.0013, pedigree (2,2,1,1,1)
  Nitrogen in input air. This value was extracted from Santos, S. O., Collodi, G., Azzaro, G., & Ferrari, N. (2017). Techno-economic evaluation of Hyco plant integrated to ammonia/urea or methanol production with CCS. IEAGHG.
- Oxygen [natural resource, in air]: 0.517891 kg; lognormal variance with pedigree 0.0013, pedigree (2,2,1,1,1)
  Oxygen input for the oxygen blown autothermal reformer (ATR) aiming on adjusting the CO2, CO, and H2 content of crude syngas to maintain a (H2-CO2)/(CO2+CO) ratio of about 2 in mole basis. This value was extracted from Santos, S. O., Collodi, G., Azzaro, G., & Ferrari, N. (2017). Techno-economic evaluation of Hyco plant integrated to ammonia/urea or methanol production with CCS. IEAGHG.
- Water, cooling, unspecified natural origin [natural resource, in water]: 0.2 m3; lognormal variance with pedigree 0.0833, pedigree (2,3,3,3,4)
  Water used for cooling. This value was extracted from Santos, S. O., Collodi, G., Azzaro, G., & Ferrari, N. (2017). Techno-economic evaluation of Hyco plant integrated to ammonia/urea or methanol production with CCS. IEAGHG. Namely, it consist of unspecified cooling water and sea water.
  Uncertainty: D

## Emissions to nature
- Carbon dioxide, fossil [air, unspecified]: 0.3531 kg; lognormal variance with pedigree 0.0013, pedigree (2,2,1,1,1)
  Direct process emissions. This value was extracted from Santos, S. O., Collodi, G., Azzaro, G., & Ferrari, N. (2017). Techno-economic evaluation of Hyco plant integrated to ammonia/urea or methanol production with CCS. IEAGHG.
- Carbon monoxide, fossil [air, unspecified]: 0.0163 kg; lognormal variance with pedigree 0.0013, pedigree (2,2,1,1,1)
  (same comment as for Carbon dioxide, fossil)
- Nitrogen [air, unspecified]: 1.9483 kg; lognormal variance with pedigree 0.0013, pedigree (2,2,1,1,1)
  (same comment as for Carbon dioxide, fossil)
- Oxygen [air, unspecified]: 0.03354 kg; lognormal variance with pedigree 0.0013, pedigree (2,2,1,1,1)
  (same comment as for electricity, medium voltage)
- Water [air, unspecified]: 0.000799 m3; lognormal variance with pedigree 0.0407, pedigree (2,2,1,1,1)
  (same comment as for electricity, medium voltage)
  property fraction, origin: fresh water 0.0522293; name fraction_origin_fresh_water
  property fraction, origin: salt water 0; name fraction_origin_salt_water
  property fraction, origin: unspecified 0.947771; name fraction_origin_unspecified
- Water [water, unspecified]: 0.199 m3; lognormal variance with pedigree 0.0407, pedigree (2,2,1,1,1)
  (same comment as for electricity, medium voltage)
  property carbon content, fossil 0; name C_content_fossil
  property carbon content, non-fossil 0; name C_content_non_fossil
  property dry mass 0 kg; name DM
  property fraction, origin: fresh water 0.119101; name fraction_origin_fresh_water_Ww
  property fraction, origin: salt water 0; name fraction_origin_salt_water_Ww
  property fraction, origin: unspecified 0.880899; name fraction_origin_unspecified_Ww
  property water in wet mass 1000 kg; name WWM
  property wet mass 1000 kg; name WM

## Sampling procedure
This activity originates from literature data, based on robust modelling, for the production of methanol from steam methane reforming published in 2017. The material and energy inputs reflect well the production technology and not expected to change significantly over time or geography.

References;
Santos, S. O., Collodi, G., Azzaro, G., & Ferrari, N. (2017). Techno-economic evaluation of Hyco plant integrated to ammonia/urea or methanol production with CCS. IEAGHG.
