# air filter production, decentralized unit, 180-250 m3/h

Dataset: EcoSpold 2, unit process
Geography: RoW
Time period: 2003-01-01 to 2023-12-31
Technology level: current
Classification: EcoSpold01Categories: ventilation/production of components
Classification: ISIC rev.4 ecoinvent: 2819:Manufacture of other general-purpose machinery
Tags: ConvertedDataset
Scenario: Business-as-Usual
System model: Allocation, cut-off by classification
Generated by: Alex Primas
Published in: Hässig, W. 2007
Database: ecoinvent
isCopyrightProtected: true
accessRestrictedTo: 1

## General comment
Production of a typical component used for a ventilation system in a multi family house. The house considered in the investigation includes 6 flats with 130 m2 floor area each and a ventilation rate of 120 m3/h.
[This dataset was already contained in the ecoinvent database version 2. It was not individually updated during the transfer to ecoinvent version 3. Life Cycle Impact Assessment results may still have changed, as they are affected by changes in the supply chain, i.e. in other datasets. This dataset was generated following the ecoinvent quality guidelines for version 2. It may have been subject to central changes described in the ecoinvent version 3 change report (http://www.ecoinvent.org/database/ecoinvent-version-3/reports-of-changes/), and the results of the central updates were reviewed extensively. The changes added e.g. consistent water flows and other information throughout the database. The documentation of this dataset can be found in the ecoinvent reports of version 2, which are still available via the ecoinvent website. The change report linked above covers all central changes that were made during the conversion process.]

## Included activities end
Materials used for the production. Estimation of electricity use for the different production steps. Energy use for heating of the production building. Transport of raw materials to the plant. Estimation for the Infrastructure of the Production site included.

## Geography
Data for production in the Netherlands used.

## Technology
Bag filter made of polyester fleece, frame cardboard. Total weight per element 0.22 kg

## Time period
Materials investigated in 2003

## Reference product
- air filter, decentralized unit, 180-250 m3/h: 1 unit; By-product classification allocatable product; CPC 43914: Filtering or purifying machinery and apparatus, for liquids or gases, except oil filters, petrol filters and a[…]; HS2017 842139: Machinery; for filtering or purifying gases, other than intake air filters for internal combustion engines
  EcoSpold01Location=RER
  production volume 2.67763 unit
    This is a placeholder value that does not reflect real-world production volumes. This dataset does not currently require a real-world production volume to work in the database framework, and no actual data were collected yet. This has no negative effect on the results of the ecoinvent database.
  property carbon content, fossil 0.367027
    C content was calculated as an addition of C content in the product components (Bag filter made of polyester fleece, frame cardboard). Then, it was referred to 1 kg DM
  property carbon content, non-fossil 0.154835
    (same comment as for air filter, decentralized unit, 180-250 m3/h)
  property price 5.94 EUR2005
    Convert from EU 27 price to the world by currency exchange rate.
  properties: carbon allocation 0.11481 kg, carbon content 0.521863, dry mass 0.22 kg, water content 0, water in wet mass 0 kg, wet mass 0.22 kg

## Inputs from technosphere
- electricity, medium voltage: 0.000804234, 0.0160427, 0.00539029, 0.000246284, 4.92935e-5, 1.05844e-5, 0.00165665 kWh (7 suppliers, which the file names only by identifier); sum of these 0.0242 kWh; lognormal variance with pedigree 0.11, pedigree (3,5,5,5,3)
  Data estimated from related processes
  EcoSpold01Location=UCTE
  Uncertainty: Data estimated from related processes
- heat, district or industrial, natural gas: 0.00489938, 0.298151 MJ (2 suppliers, which the file names only by identifier); sum of these 0.30305 MJ; lognormal variance with pedigree 0.078, pedigree (4,5,5,5,1)
  Data estimated from related companies
  EcoSpold01Location=RER
  Uncertainty: Data estimated from related companies
  properties: heating value, net 1 MJ
- heat, district or industrial, other than natural gas: 0.30291, 0.000140332 MJ (2 suppliers, which the file names only by identifier); sum of these 0.30305 MJ; lognormal variance with pedigree 0.072, pedigree (1,1,5,5,1)
  4,5,1,1,1,5; Data estimated from related companies
  EcoSpold01Location=RER
  properties: heating value, net 1 MJ
- plastic processing factory: 1.63e-10 unit; lognormal variance with pedigree 0.396, pedigree (4,5,5,5,3)
  Calculated with data of a similar company
  EcoSpold01Location=RER
  Uncertainty: Calculated with data of a similar company
- polar fleece, energy use only: 0.126 kg; lognormal variance with pedigree 0.074, pedigree (3,4,5,5,3)
  Questionnaire, approximation for technology
  EcoSpold01Location=RER
  Uncertainty: Questionnaire, approximation for technology
- polyethylene terephthalate, granulate, amorphous: 0.126 kg; lognormal variance with pedigree 0.0546, pedigree (2,4,5,5,1)
  EcoSpold01Location=RER
  Questionnaire
  Uncertainty: Questionnaire
  properties: carbon content, fossil 0.625, dry mass 1 kg, heating value, net 22.95 MJ, wet mass 1 kg
  note on carbon content, fossil: Polymer of the ethylen terephtalate monomer (C10H8O4)n (ecoinvent v2.2 report 11_II), MW=192 g/mol
- solid bleached and unbleached board carton: 0.102 kg; lognormal variance with pedigree 0.056, pedigree (3,4,5,5,1)
  Questionnaire, estimations
  EcoSpold01Location=RER
  Uncertainty: Questionnaire, estimations
  properties: carbon content, fossil 0.0190874, carbon content, non-fossil 0.327779, dry mass 0.945 kg, heating value, net 9.8 MJ, water content 0.0582011, wet mass 1 kg
- waste paperboard: -8.41922e-7, -3.39248e-6, -6.27983e-6, -9.62846e-6, -0.00188201, -6.30529e-5, -3.47917e-5 kg (7 suppliers, which the file names only by identifier); sum of these -0.002 kg; lognormal variance with pedigree 0.032, pedigree (4,4,1,5,1)
  EcoSpold01Location=CH
  Estimations on precentage material disposed
  Uncertainty: Estimations on precentage material disposed
  production volume
    Calculated from the production volume of air filter, decentralized unit, 180-250 m3/h in proportion to the respective output amounts.
  properties: carbon content, non-fossil 0.483259, dry mass 0.804 kg, heating value, net 15.92 MJ, water content 0.243781, wet mass 1 kg
  note on carbon content, non-fossil: C content was calculated for 1 kg DM, using data in Tab A.3, ecoinvent v2.2 report 13_I.
  note on heating value, net: Value taken from the general comment of the treatment dataset.
- waste polyethylene terephthalate: -0.00598768, -2.99124e-7, -5.47707e-8, -2.84046e-7, -7.24208e-7, -1.20843e-7, -1.08388e-5 kg (7 suppliers, which the file names only by identifier); sum of these -0.006 kg; lognormal variance with pedigree 0.032, pedigree (4,4,1,5,1)
  (same comment as for waste paperboard)
  production volume
    (same comment as for waste paperboard)
  properties: carbon content, fossil 0.554108, dry mass 0.998 kg, heating value, net 22.95 MJ, water content 0.00200401, wet mass 1 kg
  note on carbon content, fossil: C content in 1 kg DM was calculated using data in Tab A.1, ecoinvent v2.2 report 13_I

## Sampling procedure
Questionnaire and technical information of producer. Data of one common product used.

## Extrapolations
none This dataset has been copied from an original dataset covering the geography RER. The uncertainty has been adjusted accordingly.

## Review by Rolf Frischknecht 2007-08-16
passed
none
