# sawing and planing, azobe, air dried

Dataset: EcoSpold 2, unit process
Geography: RoW
Time period: 2000-01-01 to 2023-12-31
Technology level: current
Classification: ISIC rev.4 ecoinvent: 1610:Sawmilling and planing of wood
Classification: EcoSpold01Categories: wooden materials/processing
Synonyms: Lophira alata; Ekki; Bongassi
Scenario: Business-as-Usual
System model: Allocation, cut-off by classification
Generated by: Frank Werner (obsolete)
Published in: Althaus H.J. 2007
Database: ecoinvent
isCopyrightProtected: true
accessRestrictedTo: 1

## General comment
This dataset represents the sawing and planing of one m3 Azobe logs. The debarked Azobe wood logs have been imported to Europe from Central Africa.
The sawing and planing process produces panels of which production data are from a sawmill in the Netherlands. The sawmill uses modern equipment and is considered representative for Europe.
Natural drying is assumed. It is also assumed that 30% of log input, including sapwood, is generated as co-product that is sold or used for energy recovery outside this process.

## Included activities start
Sawing and planing processes starting from debarked Azobe logs at sawmill in Europe.

## Included activities end
Includes transportation to sawmill by lorry; sawing and plaining of azobe log in 20 mm sawn timber boards; natural drying is assumed; 30% of log input (including sapwood) is generated as co-product that is sold or is used for energy recovery used outside this process.

## Geography
Wood from Central Africa, sawing in Europe

## Technology
Data extrapolated from Meranti window production in the Netherlands. Depending on sawing technology, specific wood density of a particular log and type of sawn timber produced, data may vary

## Parameters
- fraction, process water, to air: 0.55 dimensionless; name fraction_PW_to_air; lognormal variance with pedigree 0.092025, pedigree (4,4,3,2,4)
- fraction, tap water, to air: 0.55 dimensionless; name fraction_TW_to_air; lognormal variance with pedigree 0.092025, pedigree (4,4,3,2,4)

## Reference product
- sawnwood, azobe, dried (u=15%), planed: 1 m3; name RP_amount_1; By-product classification allocatable product; CPC 31101: Wood, sawn or chipped lengthwise, sliced or peeled, of a thickness exceeding 6 mm, of coniferous wood; HS2017 440729: Wood, tropical, n.e.c. in item no. 4407.2, sawn or chipped lengthwise, sliced or peeled, whether or not pla[...]
  EcoSpold01Location=RER
  production volume 17518 m3; name RP_PV_1; = 21426.495/0.7/1.3
    Estimated. The global production volume is extrapolated from the CM production volume assuming that CM produces 70% of global production. 1.3 m3 of “sawlog and veneer log, azobe, debarked, measured as solid wood” are needed for 1 m3 of “sawnwood, azobe, dried (u=15%), planed”
  property carbon content, non-fossil 0.494
    C content of dry mass is 0.494 kgC/kg dry wood (ecoinvent v2.2 report 21).
  property heating value, net 14600.1 MJ
    LHV is calculated based on the Carbon content of the product. More details can be found on the respective documentation.The property is based on a value of 12.7MJ/kg
  property price 265 EUR2005
    Temporary price data. Calculated as 90% of purchasers price based on: 2004 export prices for the World+ according to: http://faostat.fao.org/site/626/DesktopDefault.aspx?PageID=626#ancor downloaded 28 April 2009; calculated as export value divided by export volume.
  properties: allocation factor 0.970447, carbon allocation 494 kg, carbon content 0.494, carbon content, fossil 0, dry mass 1000 kg, true value 265, water content 0.15, water in wet mass 150 kg, wet mass 1150 kg

## Inputs from technosphere
- diesel, burned in building machine: 21.3498 MJ; lognormal variance with pedigree 0.056, pedigree (3,4,5,5,1)
  EcoSpold01Location=GLO
  properties: heating value, net 1 MJ
- electricity, medium voltage: 3.41309, 68.0835, 22.8758, 1.04521, 0.209197, 0.0449192, 7.03067 kWh (7 suppliers, which the file names only by identifier); sum of these 102.702 kWh; lognormal variance with pedigree 0.056, pedigree (3,4,5,5,1)
  EcoSpold01Location=UCTE
- heat, district or industrial, natural gas: 0.202703, 12.3355 MJ (2 suppliers, which the file names only by identifier); sum of these 12.5382 MJ; lognormal variance with pedigree 0.056, pedigree (3,4,5,5,1)
  EcoSpold01Location=RER
  properties: heating value, net 1 MJ
- municipal solid waste: -0.0024571, -0.00029177, -0.0018159, -1.38629, -0.000204169, -6.55347e-5, -0.000148126, -0.00616654 kg (8 suppliers, which the file names only by identifier); sum of these -1.39744 kg; lognormal variance with pedigree 0.016, pedigree (3,4,1,5,1)
  Estimation. Calculated based on reference.
  EcoSpold01Location=CH
  production volume; = BP_amount_2/ RP_amount_1* RP_PV_1
    Calculated from production volume of reference product using the relative outputs.
  properties: carbon content, fossil 0.171549, carbon content, non-fossil 0.261655, dry mass 0.771 kg, heating value, net 11.74 MJ, water content 0.297017, wet mass 1 kg
  note on carbon content, fossil: MSW composition in tab 4.1, ecoinvent v2.2 report 13_I. C content referred to 1 kg DM
  note on heating value, net: Value taken from the general comment of the treatment dataset.
- petrol, low-sulfur: 0.0535803 kg; lognormal variance with pedigree 0.056, pedigree (3,4,5,5,1)
  EcoSpold01Location=RER
  properties: carbon content, fossil 0.865, dry mass 1 kg, heating value, net 42.5 MJ, wet mass 1 kg
  note on heating value, net: Based on literature, page 611, Report 17: Jungbluth, N., Chudacoff, M., Dauriat, A., Dinkel, F., Doka, G., Faist Emmenegger, M., Gnansounou, E., Kljun, N., Schleiss, K., Spielmann, M., Stettler, C., Sutter, J. 2007: Life Cycle Inventories of Bioenergy. ecoinvent report No. 17, Swiss Centre for Life Cycle Inventories, Dübendorf, CH.
- sawlog and veneer log, azobe, debarked, measured as solid wood: 1.26158 m3; lognormal variance with pedigree 0.056, pedigree (3,4,5,5,1)
  EcoSpold01Location=RER
  properties: carbon content, non-fossil 0.494, dry mass 1000 kg, heating value, net 14232 MJ, water content 0.3, wet mass 1300 kg
  note on carbon content, non-fossil: C content of dry mass is 0.494 kgC/kg dry wood (ecoinvent v2.2 report 21).
- sawmill: 3.88179e-7 unit; lognormal variance with pedigree 0.356, pedigree (3,4,5,5,1)
  EcoSpold01Location=RER
- tap water: 0.416346, 0.634684, 1.18429, 3.19039, 0.384037, 16.0042, 183.144 kg (7 suppliers, which the file names only by identifier); sum of these 204.958 kg; source ICL/SHR Timber Research 2002; lognormal variance with pedigree 0.056, pedigree (3,4,5,5,1)
  Estimation. Calculated based on data in reference.
  EcoSpold01Location=RER
  properties: carbon content, fossil 0.00178991, dry mass 0.000337476 kg, water content 2962.17, wet mass 1 kg
  note on carbon content, fossil: Bicarbonate content is 2.93 mol/m3. CO2 content is 0.1 mol/m3 (ecoinvent v2.2 report 8, Tab 93.1).

## Inputs from nature
- Carbon dioxide, non-fossil, resource correction [natural resource, in air]: -473.579 kg

## Emissions to nature
- NMVOC, non-methane volatile organic compounds [air, unspecified]: 0.0535803 kg; lognormal variance with pedigree 0.096, pedigree (3,4,5,5,1)
- Water [air, unspecified]: 0.112726 m3; name water_to_air_unspecified; lognormal variance with pedigree 0.0827, pedigree (2,2,5,5,1)
  Calculated value based on literature values and expert opinion. See comments in the parametres' comment field.
  property fraction, origin: fresh water 1; name fraction_origin_fresh_water
  property fraction, origin: salt water 0; name fraction_origin_salt_water
  property fraction, origin: unspecified 0; name fraction_origin_unspecified
- BOD5, Biological Oxygen Demand [water, unspecified]: 4.09529e-7 kg; lognormal variance with pedigree 0.096, pedigree (3,4,5,5,1)
- COD, Chemical Oxygen Demand [water, unspecified]: 8.19057e-7 kg; lognormal variance with pedigree 0.096, pedigree (3,4,5,5,1)
  Calculated as 2*BOD5.
- DOC, Dissolved Organic Carbon [water, unspecified]: 3.03355e-7 kg; lognormal variance with pedigree 0.096, pedigree (3,4,5,5,1)
  Calculated as equal to TOC.
- Hydrocarbons, aliphatic, unsaturated [water, unspecified]: 1.82444e-7 kg; lognormal variance with pedigree 0.356, pedigree (3,4,5,5,1)
- Phenol [water, unspecified]: 8.20998e-6 kg; lognormal variance with pedigree 0.356, pedigree (3,4,5,5,1)
- Suspended solids, unspecified [water, unspecified]: 4.19233e-6 kg; lognormal variance with pedigree 0.096, pedigree (3,4,5,5,1)
- TOC, Total Organic Carbon [water, unspecified]: 3.03355e-7 kg; lognormal variance with pedigree 0.096, pedigree (3,4,5,5,1)
  Calculated by default as TOC (gC) = COD/2.7 (COD measured in g O2). Should more correctly be calculated from the carbon content of the specified emissions to water.
- Water [water, unspecified]: 0.0922304 m3; name water_to_water_unspecified; lognormal variance with pedigree 0.0827, pedigree (2,2,5,5,1)
  (same comment as for Water)
  property carbon content, fossil 0; name C_content_fossil
  property carbon content, non-fossil 0; name C_content_non_fossil
  property dry mass 0 kg; name DM
  property fraction, origin: fresh water 1; name fraction_origin_fresh_water_Ww
  property fraction, origin: salt water 0; name fraction_origin_salt_water_Ww
  property fraction, origin: unspecified 0; name fraction_origin_unspecified_Ww
  property water in wet mass 1000 kg; name WWM
  property wet mass 1000 kg; name WM

## Sampling procedure
literature

## Extrapolations
see Technology This dataset has been copied from an original dataset covering the geography RER. The uncertainty has been adjusted accordingly.

## Review by Hans-Jörg Althaus 2007-09-25
Passed

## Review by Emilia Moreno Ruiz 2013-04-12
PV set to 4
