# treatment of refinery sludge, landfarming

Dataset: EcoSpold 2, unit process
Geography: Europe without Switzerland
Time period: 2000-01-01 to 2023-12-31
Technology level: current
Classification: EcoSpold01Categories: waste management/landfarming
Classification: ISIC rev.4 ecoinvent: 3821:Treatment and disposal of non-hazardous waste
Tags: Treatment
Scenario: Business-as-Usual
System model: Allocation, cut-off by classification
Generated by: [System]
Database: ecoinvent
isCopyrightProtected: true
accessRestrictedTo: 1

## General comment
Inventoried waste contains 100% refinery sludge; .
waste composition (wet, in ppm): upper heating value 4.732 MJ/kg; lower heating value 2.453 MJ/kg; H2O 888000; O 1017.1; H 13731; C 86452; S 508.54; N 1017.1; P 478.03; B n.a.; Cl n.a.; Br n.a.; F n.a.; I n.a.; Ag n.a.; As n.a.; Ba n.a.; Cd 10.171; Co 20.342; Cr n.a.; Cu 101.71; Hg 2.0342; Mn n.a.; Mo n.a.; Ni 152.56; Pb 457.69; Sb n.a.; Se n.a.; Sn n.a.; V n.a.; Zn 1017.1; Be n.a.; Sc n.a.; Sr n.a.; Ti n.a.; Tl n.a.; W n.a.; Si n.a.; Fe n.a.; Ca 7000; Al n.a.; K n.a.; Mg n.a.; Na n.a.;
Share of carbon in waste that is biogenic 0%.

## Included activities end
Direct emissions from landfarming applications (100% to industrial soil). Burden for spreading process.

## Geography
This dataset has been extrapolated from the global datasets since the data are considered to be representable for European conditions as well.

## Technology
Direct spreading on industrial areas. No crop growing.

## Time period
Waste composition as given in literature reference.

## Reference product
- refinery sludge: -1 kg; By-product classification Waste; CPC 39920: Sewage sludge; HS2017 382520: Residual products of the chemical or allied industries, not elsewhere specified or included; sewage sludge
  production volume 1.287e8 kg; = 11000000*117*0.1
    Calculated based on literature (European Comission, Join Research Centre, 2015, Best Available Techniques (BAT) Reference Document for the Refining of Mineral Oil and Gas).
    Based on a survey of 89 refineries the amount of sludge produced per one European refinery is 11'000 tonnes/year. There are 119 refinery plants operating in Europe (EU27, Norway, Switzerland, Turkey, Croatia) excluding Switzerland (2) there are 117 refineries in Europe without Switzerland.
    The resulting amount of refinery sludge produced in Europe without Switzerland is (11000*1000*117=) 1.29E+9 kg of refinery sludge/year.
    The share between the End-of-Life technologies are estimated as follows;
    80% hazardous waste incineration
    10% landfarming
    10% sanitary landfill
  property carbon content, fossil 0.767857
    Tab A.6, ecoinvent v2.2 report 13_I. C content has been calculated after data in the tables, and then referred to 1 kg DM
  property heating value, net 2.45 MJ
    Value taken from the general comment of the treatment dataset.
  property price 0 EUR2005
    Waste products are assigned a price of zero as they are assumed to require further treatment.
  properties: carbon allocation 0.080625 kg, carbon content 0.767857, carbon content, non-fossil 0, dry mass 0.105 kg, water content 8.52381, water in wet mass 0.895 kg, wet mass 1 kg

## Inputs from technosphere
- liquid manure spreading, by vacuum tanker: 0.001 m3; lognormal variance with pedigree 0.15, pedigree (5,5,5,5,4)
  Approximate burden for spreading. vaccum tank spreading (in m3) for landfarming of waste (in kg)

## Emissions to nature
- Cadmium II [soil, industrial]: 1.02e-5 kg; lognormal variance with pedigree 1.312, pedigree (1,1,5,5,1)
  direct emission from landfarming process. Uncertainty from uncertainty in waste composition.
- Calcium II [soil, industrial]: 0.007 kg; lognormal variance with pedigree 0.452, pedigree (1,1,5,5,1)
  (same comment as for Cadmium II)
- Carbon [soil, industrial]: 0.0865 kg; lognormal variance with pedigree 0.172, pedigree (1,1,5,5,1)
  (same comment as for Cadmium II)
- Cobalt II [soil, industrial]: 2.03e-5 kg; lognormal variance with pedigree 1.212, pedigree (1,1,5,5,1)
  (same comment as for Cadmium II)
- Copper ion [soil, industrial]: 0.000102 kg; lognormal variance with pedigree 1.002, pedigree (1,1,5,5,1)
  (same comment as for Cadmium II)
- Lead II [soil, industrial]: 0.000458 kg; lognormal variance with pedigree 0.802, pedigree (1,1,5,5,1)
  (same comment as for Cadmium II)
- Mercury II [soil, industrial]: 2.03e-6 kg; lognormal variance with pedigree 1.522, pedigree (1,1,5,5,1)
  (same comment as for Cadmium II)
- Nickel II [soil, industrial]: 0.000153 kg; lognormal variance with pedigree 0.952, pedigree (1,1,5,5,1)
  (same comment as for Cadmium II)
- Nitrogen [soil, industrial]: 0.00102 kg; lognormal variance with pedigree 0.702, pedigree (1,1,5,5,1)
  (same comment as for Cadmium II)
- Phosphorus [soil, industrial]: 0.000478 kg; lognormal variance with pedigree 0.792, pedigree (1,1,5,5,1)
  (same comment as for Cadmium II)
- Sulfur [soil, industrial]: 0.000509 kg; lognormal variance with pedigree 0.792, pedigree (1,1,5,5,1)
  (same comment as for Cadmium II)
- Zinc II [soil, industrial]: 0.00102 kg; lognormal variance with pedigree 0.702, pedigree (1,1,5,5,1)
  (same comment as for Cadmium II)

## Sampling procedure
Waste compositions from literature data.

## Extrapolations
Extrapolated from Swiss data. Spreading process approximated with vacuum tank spreader This dataset has been copied from an original dataset covering the geography CH. The uncertainty has been adjusted accordingly.
