# treatment of antimony slag, desulfurised, residual material landfill

Dataset: EcoSpold 2, unit process
Geography: GLO
Time period: 2010-01-01 to 2023-12-31
Technology level: current
Classification: ISIC rev.4 ecoinvent: 3822:Treatment and disposal of hazardous waste
Scenario: Business-as-Usual
System model: Allocation, cut-off by classification
Generated by: Nikolia Stoikou
Database: ecoinvent
isCopyrightProtected: true
accessRestrictedTo: 1

## General comment
This dataset represents the activity of waste disposal of 'antimony slag, desulfurised' in a residual material landfill (RMLF). Recommended use of this dataset: for wastes-residues that are low in organic carbon (< 5 w-%) and are not biologically or chemically reactive in water. Inventoried waste consists of fraction: 100% Antimony slag , desulfurised. Waste composition (wet, in ppmw): H2O na; O 400940; H na; C na; S 5400; N na; P 2662; B na; Cl na; Br na; F na; I na; Ag na; As 5700; Ba na; Cd na; Co 32.6; Cr 213; Cu 139; Hg 2.63; Mn 1084.2; Mo na; Ni 24.7; Pb 51.7; Sb 11100; Se na; Sn 2.74; V na; Zn 665; Be na; Sc na; Sr na; Ti 3236.5; Tl na; W na; Si 188850; Fe 152470; Ca 152950; Al 45145; K 4648.8; Mg 12302; Na 12389. Share of carbon in initial waste input that is biogenic 61.4%.

## Included activities start
The activity starts with the waste being available at the gate of the treatment facility. Collection and transportation of the waste to the treatment plant is not included.

## Included activities end
The activity ends with the waste being treated and waste-specific emissions from the landfill are released to the water (short-term emissions to water from leachate and long-term emissions to ground water).

## Geography
This dataset represents a landfill site with mean annual temperature (MAT) of 16.743579766537 degC, mean annual precipitation (MAP) of 1250.84108527132 mm/year, mean annual actual evaporation (EAT) of 460.58904958214 mm/year, and net infiltration of 790.3 mm/year. The leachate percolating through the residual material landfill has an average residence time of 4.43 years.
Reference for climatic parameters:
UN data, 2020. Precipitation, Environment Statistics Database, United Nations Statistics Division Available at: http://data.un.org/Data.aspx?q=precipitation&d=ENV&f=variableID%3a6;
World Bank, 2022. Surface area (sq.km), World Bank Group Available at: https://data.worldbank.org/indicator/AG.SRF.TOTL.K2;

## Technology
Residual material landfill for polluted, inorganic waste (VVEA Type C). With base seal and leachate collection system. Ultimate average landfill height is 10 meters. Operation phase duration is 30 years. Recultivation after closure. No additional solidification with cement requested. Based on average waste composition and climate data the end of carbonate phase in the residual material landfill is estimated to be reached after 60 000 years.

## Reference product
- antimony slag, desulfurised: -1 kg; By-product classification Waste; CPC 39368: Waste and scrap of antimony and chromium; HS2017 811020: Antimony; waste and scrap
  main reference product of this activity
  production volume 6.4e6 kg
    Calculated based on the production volume of this by-product in the database.
  property fluorine content 0.0708
    The value of 'fluorine content' is documented in literature. Reference available in the respective treatment dataset of residual material landfill for 'antimony slag, desulfurised'.
  property price 0 EUR2005
    Waste products are assigned a price of zero as they are assumed to require further treatment.
  properties: aluminium content 0.0451446, antimony content 0.0110999, arsenic content 0.00569995, calcium content 0.152949, carbon allocation 0 kg, carbon content 0, carbon content, fossil 0, carbon content, non-fossil 0, chromium content 0.000212998, cobalt content 3.25997e-5, copper content 0.000138999, dry mass 1 kg, heating value, gross 0 MJ, heating value, net 0 MJ, iron content 0.152469, lead content 5.16995e-5, magnesium content 0.0123019, manganese content 0.00108419, mercury content 2.62998e-6, nickel content 2.46998e-5, oxygen content 0.400936, phosphorus content 0.00266198, potassium content 0.00464876, silicon content 0.188848, sodium content 0.0123889, sulfur content 0.00539995, tin content 2.73998e-6, titanium content 0.00323647, water content 0, water in wet mass 0 kg, wet mass 1.00001 kg, zinc content 0.000664994

## Inputs from technosphere
- cast iron: 5.0555e-6 kg; lognormal variance with pedigree 0.31529, pedigree (1,1,2,1,1)
  for residual material landfill infrastructure
  properties: carbon content, fossil 0.04, dry mass 1 kg, wet mass 1 kg
- concrete, 25MPa: 5.22365e-10, 1.11853e-9, 2.58322e-9, 1.76853e-8, 1.74033e-8, 4.30057e-7 m3 (6 suppliers, which the file names only by identifier); sum of these 4.6937e-7 m3; lognormal variance with pedigree 0.31529, pedigree (1,1,2,1,1)
  for residual material landfill infrastructure
  properties: cement content 206 kg, dry mass 2285 kg, fly ash content 69 kg, gravel content 1100 kg, sand content 910 kg, water content 0.0538293, wet mass 2408 kg
- diesel, burned in building machine: 0.028614 MJ; lognormal variance with pedigree 0.012675, pedigree (1,1,2,1,1)
  for residual material landfill infrastructure and operation
  properties: heating value, net 1 MJ
- electricity, low voltage: 8.5714e-6 kWh; lognormal variance with pedigree 0.012648, pedigree (1,1,2,1,1)
  for residual material landfill operation
- excavation, hydraulic digger: 0.00030086 m3; lognormal variance with pedigree 0.31529, pedigree (1,1,2,1,1)
  for residual material landfill infrastructure
- excavation, skid-steer loader: 0.00030086 m3; lognormal variance with pedigree 0.31529, pedigree (1,1,2,1,1)
  for residual material landfill infrastructure
- extrusion, plastic pipes: 8.1818e-5 kg; lognormal variance with pedigree 0.31529, pedigree (1,1,2,1,1)
  for residual material landfill infrastructure
- gravel, round: 3.5542e-5, 0.136664 kg (2 suppliers, which the file names only by identifier); sum of these 0.1367 kg; lognormal variance with pedigree 0.31529, pedigree (1,1,2,1,1)
  for residual material landfill infrastructure
  properties: dry mass 1 kg, wet mass 1 kg
- heat, district or industrial, other than natural gas: 0.00092016 MJ; lognormal variance with pedigree 0.012648, pedigree (1,1,2,1,1)
  for residual material landfill operation
  property corresponding fuel use, propane, furnace >100kW 0 MJ; name fuel_use
  properties: heating value, net 1 MJ
  note on corresponding fuel use, propane, furnace >100kW: Lower heating value of the fuel input related to the heat/electricity output, taken directly from ecoinvent v3.0 dataset "heat production, natural gas, at industrial furnace >100kW, GLO 2000".
- pitch: 0.000151887, 6.80822e-6, 3.3559e-6, 1.28295e-6, 5.88839e-5, 9.71937e-6, 0.000858635, 0.000195128 kg (8 suppliers, which the file names only by identifier); sum of these 0.0012857 kg; lognormal variance with pedigree 0.31529, pedigree (1,1,2,1,1)
  for residual material landfill infrastructure
  properties: carbon content, fossil 0.83, dry mass 1 kg, heating value, net 28 MJ, wet mass 1 kg
- polyethylene, high density, granulate: 0.00024899 kg; lognormal variance with pedigree 0.31529, pedigree (1,1,2,1,1)
  for residual material landfill infrastructure
  properties: carbon content, fossil 0.857143, dry mass 1 kg, heating value, net 42.47 MJ, wet mass 1 kg
- polypropylene, granulate: 8.1981e-7 kg; lognormal variance with pedigree 0.31529, pedigree (1,1,2,1,1)
  for residual material landfill infrastructure
  properties: carbon content, fossil 0.857143, dry mass 1 kg, heating value, net 32.78 MJ, wet mass 1 kg
  note on heating value, net: Value extracted from "treatment of waste polypropylene, open burning"
- polyvinylchloride, bulk polymerised: 8.1981e-7 kg; lognormal variance with pedigree 0.31529, pedigree (1,1,2,1,1)
  for residual material landfill infrastructure
  properties: carbon content, fossil 0.387097, dry mass 1 kg, heating value, net 21.5 MJ, wet mass 1 kg
- reinforcing steel: 2.9923e-5 kg; lognormal variance with pedigree 0.31529, pedigree (1,1,2,1,1)
  for residual material landfill infrastructure
  properties: carbon content, fossil 0.004, dry mass 1 kg, wet mass 1 kg
- sand: 3.47314e-6, 4.15847e-8, 0.000226017, 1.80309e-8 kg (4 suppliers, which the file names only by identifier); sum of these 0.00022955 kg; lognormal variance with pedigree 0.31529, pedigree (1,1,2,1,1)
  for residual material landfill infrastructure
  properties: dry mass 1 kg, wet mass 1 kg
- steel, chromium steel 18/8, hot rolled: 1.0384e-5 kg; lognormal variance with pedigree 0.31529, pedigree (1,1,2,1,1)
  for residual material landfill infrastructure
  properties: carbon content, fossil 0.0008, dry mass 1 kg, wet mass 1 kg
- synthetic rubber: 2.7327e-7 kg; lognormal variance with pedigree 0.31529, pedigree (1,1,2,1,1)
  for residual material landfill infrastructure
  properties: carbon content, fossil 0.871949, dry mass 1 kg, heating value, net 26.42 MJ, wet mass 1 kg
- tap water: 0.0063763 kg; lognormal variance with pedigree 0.31529, pedigree (1,1,2,1,1)
  for residual material landfill infrastructure
  properties: carbon content, fossil 0.00178991, dry mass 0.000337476 kg, water content 2962.17, wet mass 1 kg

## Inputs from nature
- Waste mass, total, placed in landfill [inventory indicator, waste]: 1 kg; lognormal variance with pedigree 0.0002, pedigree (1,1,2,1,1)
  waste mass placed in residual material landfill (for ecoscarcity LCIA only)
- Occupation, construction site [natural resource, land]: 0.00028571 m2*year; lognormal variance with pedigree 0.21182, pedigree (1,1,2,1,1)
  for residual material landfill construction
- Occupation, dump site [natural resource, land]: 0.0017143 m2*year; lognormal variance with pedigree 0.21182, pedigree (1,1,2,1,1)
  for residual material landfill area during operation
- Occupation, shrub land, sclerophyllous [natural resource, land]: 0.00028571 m2*year; lognormal variance with pedigree 0.21182, pedigree (1,1,2,1,1)
  for residual material landfill area initial aftercare recultivation
- Occupation, traffic area, road network [natural resource, land]: 0.0025714 m2*year; lognormal variance with pedigree 0.21182, pedigree (1,1,2,1,1)
  for access road of residual material landfill during construction, operation, and aftercare
- Transformation, from dump site [natural resource, land]: 5.7143e-5 m2; lognormal variance with pedigree 0.53191, pedigree (1,1,2,1,1)
  for residual material landfill area initial aftercare recultivation
- Transformation, from pasture, man made [natural resource, land]: 9.1429e-5 m2; lognormal variance with pedigree 0.53191, pedigree (1,1,2,1,1)
  for residual material landfill and access road
- Transformation, from shrub land, sclerophyllous [natural resource, land]: 5.7143e-5 m2; lognormal variance with pedigree 0.53191, pedigree (1,1,2,1,1)
  for residual material landfill area initial aftercare recultivation
- Transformation, from traffic area, road network [natural resource, land]: 3.4286e-5 m2; lognormal variance with pedigree 0.53191, pedigree (1,1,2,1,1)
  for recultivation of access road of residual material landfill after aftercare period
- Transformation, to dump site [natural resource, land]: 5.7143e-5 m2; lognormal variance with pedigree 0.53191, pedigree (1,1,2,1,1)
  for residual material landfill area
- Transformation, to forest, unspecified [natural resource, land]: 5.7143e-5 m2; lognormal variance with pedigree 0.53191, pedigree (1,1,2,1,1)
  for residual material landfill area aftercare recultivation
- Transformation, to pasture, man made [natural resource, land]: 3.4286e-5 m2; lognormal variance with pedigree 0.53191, pedigree (1,1,2,1,1)
  for recultivation of landfill and access road of residual material landfill after aftercare period
- Transformation, to shrub land, sclerophyllous [natural resource, land]: 5.7143e-5 m2; lognormal variance with pedigree 0.53191, pedigree (1,1,2,1,1)
  for residual material landfill area initial aftercare recultivation
- Transformation, to traffic area, road network [natural resource, land]: 3.4286e-5 m2; lognormal variance with pedigree 0.53191, pedigree (1,1,2,1,1)
  for access road of residual material landfill

## Emissions to nature
- Heat, waste [air, urban air close to ground]: 3.0857e-5 MJ; lognormal variance with pedigree 0.012648, pedigree (1,1,2,1,1)
  from electricity consumption in residual material landfill operation
- Hazardous waste disposed [inventory indicator, waste]: 1 kg; lognormal variance with pedigree 0.0002, pedigree (1,1,2,1,1)
  EN15804 waste mass in residual material landfill
- Aluminium III [water, ground-, long-term]: 0.024932 kg; lognormal variance with pedigree 0.28634, pedigree (1,1,2,1,1)
  emissions to groundwater in residual material landfill
- Aluminium III [water, surface water]: 4.1623e-5 kg; lognormal variance with pedigree 0.86166, pedigree (1,1,2,1,1)
  emissions to surface water in residual material landfill
- Antimony ion [water, ground-, long-term]: 0.010158 kg; lognormal variance with pedigree 0.35571, pedigree (1,1,2,1,1)
  emissions to groundwater in residual material landfill
- Antimony ion [water, surface water]: 0.00094147 kg; lognormal variance with pedigree 0.4902, pedigree (1,1,2,1,1)
  emissions to surface water in residual material landfill
- Arsenic ion [water, ground-, long-term]: 0.0056284 kg; lognormal variance with pedigree 0.436, pedigree (1,1,2,1,1)
  emissions to groundwater in residual material landfill
- Arsenic ion [water, surface water]: 5.556e-5 kg; lognormal variance with pedigree 0.80351, pedigree (1,1,2,1,1)
  emissions to surface water in residual material landfill
- Calcium II [water, ground-, long-term]: 0.040545 kg; lognormal variance with pedigree 0.52639, pedigree (1,1,2,1,1)
  emissions to groundwater in residual material landfill
- Calcium II [water, surface water]: 6.7688e-5 kg; lognormal variance with pedigree 0.845, pedigree (1,1,2,1,1)
  emissions to surface water in residual material landfill
- Chromium VI [water, ground-, long-term]: 0.00020309 kg; lognormal variance with pedigree 0.86221, pedigree (1,1,2,1,1)
  emissions to groundwater in residual material landfill
- Chromium VI [water, surface water]: 1.1289e-6 kg; lognormal variance with pedigree 1.303, pedigree (1,1,2,1,1)
  emissions to surface water in residual material landfill
- Cobalt II [water, ground-, long-term]: 1.2214e-5 kg; lognormal variance with pedigree 1.3523, pedigree (1,1,2,1,1)
  emissions to groundwater in residual material landfill
- Cobalt II [water, surface water]: 2.039e-8 kg; lognormal variance with pedigree 1.8253, pedigree (1,1,2,1,1)
  emissions to surface water in residual material landfill
- Copper ion [water, ground-, long-term]: 1.1314e-5 kg; lognormal variance with pedigree 1.922, pedigree (1,1,2,1,1)
  emissions to groundwater in residual material landfill
- Copper ion [water, surface water]: 1.8888e-8 kg; lognormal variance with pedigree 1.8334, pedigree (1,1,2,1,1)
  emissions to surface water in residual material landfill
- Iron ion [water, ground-, long-term]: 0.0016149 kg; lognormal variance with pedigree 1.922, pedigree (1,1,2,1,1)
  emissions to groundwater in residual material landfill
- Iron ion [water, surface water]: 2.696e-6 kg; lognormal variance with pedigree 1.2708, pedigree (1,1,2,1,1)
  emissions to surface water in residual material landfill
- Lead II [water, ground-, long-term]: 3.88e-7 kg; lognormal variance with pedigree 1.922, pedigree (1,1,2,1,1)
  emissions to groundwater in residual material landfill
- Lead II [water, surface water]: 6.4775e-10 kg; lognormal variance with pedigree 1.922, pedigree (1,1,2,1,1)
  emissions to surface water in residual material landfill
- Magnesium [water, ground-, long-term]: 0.0030282 kg; lognormal variance with pedigree 0.83418, pedigree (1,1,2,1,1)
  emissions to groundwater in residual material landfill
- Magnesium [water, surface water]: 5.0555e-6 kg; lognormal variance with pedigree 1.112, pedigree (1,1,2,1,1)
  emissions to surface water in residual material landfill
- Manganese II [water, ground-, long-term]: 3.4679e-5 kg; lognormal variance with pedigree 1.922, pedigree (1,1,2,1,1)
  emissions to groundwater in residual material landfill
- Manganese II [water, surface water]: 5.7895e-8 kg; lognormal variance with pedigree 1.6859, pedigree (1,1,2,1,1)
  emissions to surface water in residual material landfill
- Mercury II [water, ground-, long-term]: 3.5566e-7 kg; lognormal variance with pedigree 1.922, pedigree (1,1,2,1,1)
  emissions to groundwater in residual material landfill
- Mercury II [water, surface water]: 5.9376e-10 kg; lognormal variance with pedigree 1.922, pedigree (1,1,2,1,1)
  emissions to surface water in residual material landfill
- Nickel II [water, ground-, long-term]: 1.1177e-5 kg; lognormal variance with pedigree 1.3054, pedigree (1,1,2,1,1)
  emissions to groundwater in residual material landfill
- Nickel II [water, surface water]: 1.8659e-8 kg; lognormal variance with pedigree 1.8376, pedigree (1,1,2,1,1)
  emissions to surface water in residual material landfill
- Phosphate [water, ground-, long-term]: 0.0015622 kg; lognormal variance with pedigree 1.2145, pedigree (1,1,2,1,1)
  emissions to groundwater in residual material landfill
- Phosphate [water, surface water]: 2.608e-6 kg; lognormal variance with pedigree 1.3335, pedigree (1,1,2,1,1)
  emissions to surface water in residual material landfill
- Potassium I [water, ground-, long-term]: 0.0035295 kg; lognormal variance with pedigree 0.46429, pedigree (1,1,2,1,1)
  emissions to groundwater in residual material landfill
- Potassium I [water, surface water]: 0.0011193 kg; lognormal variance with pedigree 0.51333, pedigree (1,1,2,1,1)
  emissions to surface water in residual material landfill
- Silicon [water, ground-, long-term]: 0.18799 kg; lognormal variance with pedigree 0.069692, pedigree (1,1,2,1,1)
  emissions to groundwater in residual material landfill
- Silicon [water, surface water]: 0.00085935 kg; lognormal variance with pedigree 0.52987, pedigree (1,1,2,1,1)
  emissions to surface water in residual material landfill
- Sodium I [water, ground-, long-term]: 0.008153 kg; lognormal variance with pedigree 0.34732, pedigree (1,1,2,1,1)
  emissions to groundwater in residual material landfill
- Sodium I [water, surface water]: 0.0042359 kg; lognormal variance with pedigree 0.37334, pedigree (1,1,2,1,1)
  emissions to surface water in residual material landfill
- Sulfate [water, ground-, long-term]: 0.014938 kg; lognormal variance with pedigree 0.44314, pedigree (1,1,2,1,1)
  emissions to groundwater in residual material landfill
- Sulfate [water, surface water]: 0.0012619 kg; lognormal variance with pedigree 0.58558, pedigree (1,1,2,1,1)
  emissions to surface water in residual material landfill
- Tin ion [water, ground-, long-term]: 4.8299e-8 kg; lognormal variance with pedigree 1.922, pedigree (1,1,2,1,1)
  emissions to groundwater in residual material landfill
- Tin ion [water, surface water]: 8.0634e-11 kg; lognormal variance with pedigree 1.922, pedigree (1,1,2,1,1)
  emissions to surface water in residual material landfill
- Titanium ion [water, ground-, long-term]: 0.00043438 kg; lognormal variance with pedigree 1.515, pedigree (1,1,2,1,1)
  emissions to groundwater in residual material landfill
- Titanium ion [water, surface water]: 7.2517e-7 kg; lognormal variance with pedigree 1.3556, pedigree (1,1,2,1,1)
  emissions to surface water in residual material landfill
- Zinc II [water, ground-, long-term]: 1.0576e-5 kg; lognormal variance with pedigree 1.922, pedigree (1,1,2,1,1)
  emissions to groundwater in residual material landfill
- Zinc II [water, surface water]: 1.7656e-8 kg; lognormal variance with pedigree 1.8423, pedigree (1,1,2,1,1)
  emissions to surface water in residual material landfill
