# copper sulfate production

Dataset: EcoSpold 2, unit process
Geography: GLO
Time period: 2006-01-01 to 2023-12-31
Technology level: current
Classification: ISIC rev.4 ecoinvent: 2011:Manufacture of basic chemicals
Synonyms: CuSO4; bluestone; copper(II) sulfate; cupric sulfate; blue vitriol
Scenario: Business-as-Usual
System model: Allocation, cut-off by classification
Generated by: Tereza Levova
Database: ecoinvent
isCopyrightProtected: true
accessRestrictedTo: 1

## General comment
Copper sulfate (CuSO4) is a salt which exists as a series of compounds that differ in their degree of hydration. This activity presents basic production of copper sulfate pentahydrate.
Data were obtained via stochiometric calculation. The amount of energy consumed (electricity and heat), cooling water and facilities is estimated based on data from Gendorf (2000).

## Included activities start
The activity starts when the raw materials enters the process.

## Included activities end
Materials entering the process are included as well as energy uses, infrastructure and emissions.

## Technology
Production of copper sulfate varies depending on the degree of hydration which needs to be reached. This activity presents basic reaction with which copper sulfate pentahydrate is produced.
Chemical reaction:
CuO + H2SO4 -> CuSO4 + H2O

## Time period
This activity presents basic chemical process and do not really change in time.

## Parameters
- efficiency: 0.95 dimensionless; name process_efficiency; lognormal variance with pedigree 0.0187, pedigree (4,4,1,3,3)
  Estimated value. The yield of chemical reaction.
- fraction of cooling water which evaporates to air: 0.3875 dimensionless; name fraction_CW_to_air; = (0.5*fraction_CW_OT_to_air)+(0.5*fraction_CW_R_to_air); lognormal variance with pedigree 0.092025, pedigree (4,4,3,2,4)
  Calculated value based on literature value (see comments of the other parametres present in this dataset) and expert opinion. In the case when no industry/literature data are available about the type of cooling or directly fraction, cooling water, to air specific for the process a default assumption is applied. It is assumed that the once-through cooling system is used in 50% of all cases and recirculating system is used in another 50% of all cases. Fraction of cooling water which evaporates to air, i.e. is consumed.
- fraction of cooling water which evaporates to air, once-through cooling system: 0.004 dimensionless; name fraction_CW_OT_to_air; lognormal variance with pedigree 0.092025, pedigree (4,4,3,2,4)
  Calculated based on literature value (Scown, C.D., 2011, Water Footprint of U.S. Transportation Fuels and supplying information of the article) (Vionnet, S., Quantis Water Database - Technical Report, 2012).
- fraction of cooling water which evaporates to air, recirculating cooling system: 0.771 dimensionless; name fraction_CW_R_to_air; lognormal variance with pedigree 0.092025, pedigree (4,4,3,2,4)
  (same comment as for fraction of cooling water which evaporates to air, once-through coolin)

## Reference product
- copper sulfate: 1 kg; name copper_sulfate_RP; By-product classification allocatable product; CPC 34240: Phosphates of triammonium; salts and peroxysalts of inorganic acids and metals n.e.c.; HS2017 283325: Sulphates; of copper; CAS 7758-98-7
  production volume 8e7 kg; = 100000*1000*0.8
    Literature value (Ullmann's Encyclopedia). In total 100 000 t/year of copper sulfate is produced in the world. Out of that app. 80% is produced by this technology (Ullmann's).
  property carbon content, fossil 0; name copper_sulfate_RP_C_content_fossil
    fossil carbon content on a dry matter basis
  property carbon content, non-fossil 0; name copper_sulfate_RP_C_content_non_fossil
    biogene carbon content on a dry matter basis
  property dry mass 1 kg; name copper_sulfate_RP_DM
  property price 3.77 EUR2005
    Estimation. Average 2005 prices for EU27, USA, China, Japan and India from Import/Export data (US$ and tonnes) in UN Commodity Trade Statistics Database; Commodity: Pesticides, rodenticides, nes, for retail sale
  property water content 0; name copper_sulfate_RP_water_content; = copper_sulfate_RP_WWM/ copper_sulfate_RP_DM
  property water in wet mass 0 kg; name copper_sulfate_RP_WWM
  property wet mass 1 kg; name copper_sulfate_RP_WM
  properties: carbon allocation 0 kg, carbon content 0

## Inputs from technosphere
- chemical factory, organics: 4e-10 unit; source Gendorf 2000; lognormal variance with pedigree 0.3526, pedigree (2,4,4,5,4)
  Calculated based on literature data published by the industry. For this activity, no information was readily available concerning infrastructure and land-use. Therefore, the infrastructure is estimated based on data from two chemical factories, the BASF site of Ludwigshafen and the chemical factory in Gendorf (which are both located in Germany), which produce a wide range of chemical substances. Based on this data, the following assumptions are made: the built area amounts to about 4.2 ha, the plant has an average output of 50'000 t/a and a lifespan of fifty years. The estimated infrastructure amount is therefore 4.00 E-10 units per kg of produced chemical.
  References:
  Althaus H.-J., Chudacoff M., Hischier R., Jungbluth N., Osses M. and Primas A. (2007) Life Cycle Inventories of Chemicals. ecoinvent report No. 8, v2.0. EMPA Dübendorf, Swiss Centre for Life Cycle Inventories, Dübendorf, CH.
  Gendorf (2000) Umwelterklärung 2000, Werk Gendorf. Werk Gendorf, Burgkirchen.
- copper oxide: 0.524627 kg; name copper_oxide_input; = (1/process_efficiency)*(79.545/159.602)*copper_sulfate_RP; lognormal variance with pedigree 0.0326, pedigree (4,5,4,1,3)
  Calculated value based on stoichiometric calculations.
  79.545 g/mol is a molar mass of copper oxide (CuO).
  159.602 g/mol is a molar mass of copper sulfate (CuSO4).
  properties: dry mass 1 kg, wet mass 1 kg
- electricity, medium voltage: 0.399063 kWh; source Gendorf 2000; lognormal variance with pedigree 0.0532, pedigree (2,4,4,5,4)
  Calculated based on literature data published by the GENDORF Chemical Park. The factory produced an average of 2462760 tonnes of chemical substances (including intermediates) per year in the years 2015-2019. The average consumption of electricity in the years 2015-2019 was 982796751 kWh per year. This equals 0.39906 kWh/kg chemical produced.
  References:
  Chemiepark GENDORF, Umwelterklärung 2016, https://www.gendorf.de/Nachbarn/Umweltschutz/Industrie%20und%20Nachhaltigkeit
  Chemiepark GENDORF, Umwelterklärung 2017, https://www.gendorf.de/Nachbarn/Umweltschutz/Industrie%20und%20Nachhaltigkeit
  Chemiepark GENDORF, Umwelterklärung 2020, https://www.gendorf.de/Nachbarn/Umweltschutz/Industrie%20und%20Nachhaltigkeit
- heat, district or industrial, natural gas: 1.88647 MJ; lognormal variance with pedigree 0.0532, pedigree (2,4,4,5,4)
  Calculated based on literature data published by the GENDORF Chemical Park. The factory produced an average of 2462760 tonnes of chemical substances (including intermediates) per year in the years 2015-2019. The average consumption of natural gas in the years 2015-2019 was 4645920000 MJ per year. This equals 1.8865 MJ/kg chemical produced.
  References:
  Chemiepark GENDORF, Umwelterklärung 2016, https://www.gendorf.de/Nachbarn/Umweltschutz/Industrie%20und%20Nachhaltigkeit
  Chemiepark GENDORF, Umwelterklärung 2017, https://www.gendorf.de/Nachbarn/Umweltschutz/Industrie%20und%20Nachhaltigkeit
  Chemiepark GENDORF, Umwelterklärung 2020, https://www.gendorf.de/Nachbarn/Umweltschutz/Industrie%20und%20Nachhaltigkeit
  properties: heating value, net 1 MJ
- heat, from steam, in chemical industry: 0.176662, 0.0311477 MJ (2 suppliers, which the file names only by identifier); sum of these 0.20781 MJ; source Gendorf 2000; lognormal variance with pedigree 0.0532, pedigree (2,4,4,5,4)
  Calculated based on literature data published by the GENDORF Chemical Park. The factory produced an average of 2462760 tonnes of chemical substances (including intermediates) per year in the years 2015-2019. The average consumption of steam (internal and external sources) in the years 2015-2019 was 511785800 MJ per year. This equals 0.2078 MJ/kg chemical produced.
  References:
  Chemiepark GENDORF, Umwelterklärung 2016, https://www.gendorf.de/Nachbarn/Umweltschutz/Industrie%20und%20Nachhaltigkeit
  Chemiepark GENDORF, Umwelterklärung 2017, https://www.gendorf.de/Nachbarn/Umweltschutz/Industrie%20und%20Nachhaltigkeit
  Chemiepark GENDORF, Umwelterklärung 2020, https://www.gendorf.de/Nachbarn/Umweltschutz/Industrie%20und%20Nachhaltigkeit
  properties: heating value, net 1 MJ
- sulfuric acid: 0.572003, 0.074816 kg (2 suppliers, which the file names only by identifier); sum of these 0.646819 kg; = (1/process_efficiency)*(98.072/159.602)* copper_sulfate_RP; lognormal variance with pedigree 0.0326, pedigree (4,5,4,1,3)
  Calculated value based on stoichiometric calculations.
  98.072 g/mol is a molar mass of sulfuric acid (H2SO4).
  159.602 g/mol is a molar mass of copper sulfate (CuSO4).
  properties: dry mass 1 kg, wet mass 1 kg
- wastewater, average: -1.09589e-8, -1.82361e-6, -4.36062e-7, -6.49273e-9 m3 (4 suppliers, which the file names only by identifier); sum of these -2.27712e-6 m3; lognormal variance with pedigree 0.0452, pedigree (2,4,1,5,4)
  Calculated based on literature data published by the GENDORF Chemical Park. The factory produced an average of 2462760 tonnes of chemical substances (including intermediates) per year in the years 2015-2019. The average ouput of wastewater going to an external wastewater treatment plant in the years 2015-2019 was 5608 m3 per year. This equals 0.000002277 m3/kg chemical produced.
  References:
  Chemiepark GENDORF, Umwelterklärung 2016, https://www.gendorf.de/Nachbarn/Umweltschutz/Industrie%20und%20Nachhaltigkeit
  Chemiepark GENDORF, Umwelterklärung 2017, https://www.gendorf.de/Nachbarn/Umweltschutz/Industrie%20und%20Nachhaltigkeit
  Chemiepark GENDORF, Umwelterklärung 2020, https://www.gendorf.de/Nachbarn/Umweltschutz/Industrie%20und%20Nachhaltigkeit
  properties: carbon content, non-fossil 0.194039, dry mass 0.346837 kg, mass concentration, TOC 0.1091 kg/m3, mass concentration, calcium 0.039453 kg/m3, mass concentration, chlorine 0.030031 kg/m3, mass concentration, hydrogen 0.013365 kg/m3, mass concentration, nitrogen 0.031015 kg/m3, mass concentration, oxygen 0.069824 kg/m3, mass concentration, sodium 0.06456 kg/m3, mass concentration, sulfur 0.015602 kg/m3, water content 2882.2, wet mass 1000 kg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
  note on carbon content, non-fossil: 0.0673 kg TOC/m3 (Tab A.17, ecoinvent v2.2 report 13_I). TOC was considered as Total Carbon.

## Inputs from nature
- Water, cooling, unspecified natural origin [natural resource, in water]: 0.014707 m3; source Gendorf 2000; lognormal variance with pedigree 0.0532, pedigree (2,4,4,5,4)
  Calculated based on literature data published by the GENDORF Chemical Park. The factory produced an average of 2462760 tonnes of chemical substances (including intermediates) per year in the years 2015-2019. The average amount of cooling water released in the years 2015-2019 was 34408800 t per year. It was assumed that 5% of the cooling water was emitted to air during its use, therefore, to calculate the input of cooling water, the output value reported by GENDORF was scaled up by the factor 1/0.95. This equals 0.014707 m3/kg chemical produced.
  References:
  Chemiepark GENDORF, Umwelterklärung 2016, https://www.gendorf.de/Nachbarn/Umweltschutz/Industrie%20und%20Nachhaltigkeit
  Chemiepark GENDORF, Umwelterklärung 2017, https://www.gendorf.de/Nachbarn/Umweltschutz/Industrie%20und%20Nachhaltigkeit
  Chemiepark GENDORF, Umwelterklärung 2020, https://www.gendorf.de/Nachbarn/Umweltschutz/Industrie%20und%20Nachhaltigkeit
  property dry mass 0.1101 kg; name water_cooling_UNO_input_DM
  property water content 9081.65; name water_cooling_UNO_input_water_content; = water_cooling_UNO_input_WWM/ water_cooling_UNO_input_DM
  property water in wet mass 999.89 kg; name water_cooling_UNO_input_WWM; = water_cooling_UNO_input_WM- water_cooling_UNO_input_DM
  property wet mass 1000 kg; name water_cooling_UNO_input_WM
- Water, river [natural resource, in water]: 0.000965426 m3; lognormal variance with pedigree 0.0532, pedigree (2,4,4,5,4)
  Calculated based on literature data published by the GENDORF Chemical Park. The factory produced an average of 2462760 tonnes of chemical substances (including intermediates) per year in the years 2015-2019. The average consumption of river water in the years 2015-2019 was 22000820 t per year. However, since the cooling water is modelled as an input, the amount of river water was adjusted to avoid double counting. 55% of the input amount of cooling water was deducted from the amount of river water, as that is the share of river water versus well water. This equals 0.00096543 m3/kg chemical produced.
  References:
  Chemiepark GENDORF, Umwelterklärung 2016, https://www.gendorf.de/Nachbarn/Umweltschutz/Industrie%20und%20Nachhaltigkeit
  Chemiepark GENDORF, Umwelterklärung 2017, https://www.gendorf.de/Nachbarn/Umweltschutz/Industrie%20und%20Nachhaltigkeit
  Chemiepark GENDORF, Umwelterklärung 2020, https://www.gendorf.de/Nachbarn/Umweltschutz/Industrie%20und%20Nachhaltigkeit
- Water, well, in ground [natural resource, in water]: 0.000816522 m3; lognormal variance with pedigree 0.0532, pedigree (2,4,4,5,4)
  Calculated based on literature data published by the GENDORF Chemical Park. The factory produced an average of 2462760 tonnes of chemical substances (including intermediates) per year in the years 2015-2019. The average consumption of well water in the years 2015-2019 was 18607480 t per year. However, since the cooling water is modelled as an input, the amount of well water was adjusted to avoid double counting. 45% of the input amount of cooling water was deducted from the amount of well water, as that is the share of well water versus river water. This equals 0.00081652 m3/kg chemical produced.
  References:
  Chemiepark GENDORF, Umwelterklärung 2016, https://www.gendorf.de/Nachbarn/Umweltschutz/Industrie%20und%20Nachhaltigkeit
  Chemiepark GENDORF, Umwelterklärung 2017, https://www.gendorf.de/Nachbarn/Umweltschutz/Industrie%20und%20Nachhaltigkeit
  Chemiepark GENDORF, Umwelterklärung 2020, https://www.gendorf.de/Nachbarn/Umweltschutz/Industrie%20und%20Nachhaltigkeit

## Emissions to nature
- Water [air, unspecified]: 0.00147008 m3; lognormal variance with pedigree 0.0926, pedigree (2,4,4,5,4)
  Calculated based on literature data published by the GENDORF Chemical Park. The factory produced an average of 2462760 tonnes of chemical substances (including intermediates) per year in the years 2015-2019. To determine the emissions of water to air, the difference of all water inputs (from river, well, tap water and cooling) and outputs (wastewater, emissions to water) was calculated. The average ouput of water to air in the years 2015-2019 was 3620444 m3 per year. This equals 0.00147 m3/kg chemical produced. For more information on the other water exchanges please consult the respective exchange comment.
  References:
  Chemiepark GENDORF, Umwelterklärung 2016, https://www.gendorf.de/Nachbarn/Umweltschutz/Industrie%20und%20Nachhaltigkeit
  Chemiepark GENDORF, Umwelterklärung 2017, https://www.gendorf.de/Nachbarn/Umweltschutz/Industrie%20und%20Nachhaltigkeit
  Chemiepark GENDORF, Umwelterklärung 2020, https://www.gendorf.de/Nachbarn/Umweltschutz/Industrie%20und%20Nachhaltigkeit
- Copper ion [water, unspecified]: 0.00220583 kg; name copper_emissions_water; = ((((1/process_efficiency)-1)* copper_oxide_input))*(63.546/79.545)*0.1; lognormal variance with pedigree 0.0326, pedigree (4,5,4,1,3)
  Calculated value based on literature and estimates. In case of copper oxide (CuO) part of the unreacted amount is released as copper, ion (Cu) as a part of wastewater. The efficiency of the waste water treatment plant (WWTP) is assumed to be 90%, i.e. 10% of the volume of copper, ion on the inflow to the WWTP is released to the environment.
  63.545 g/mol is molar mass of copper (Cu).
  79.545 g/mol is molar mass of copper(II) oxide (CuO).
- Sulfur [water, unspecified]: 0.00111288 kg; name sulfur_emissions_water; = ((((1/process_efficiency)-1)*sulfuric_acid_input))*(32.06/98.072)*0.1; lognormal variance with pedigree 0.072, pedigree (4,5,4,1,3)
  Calculated value based on literature and estimates. In case of sulfuric acid (H2SO4), part of the unreacted volume is released as sulfur (S) as a part of wastewater. The efficiency of the waste water treatment plant (WWTP) is assumed to be 90%, i.e. 10% of the volume of sulfur on the inflow to the WWTP is released to the environment.
  32.06 g/mol is the molar mass of sulfur (S).
  98.072 g/mol is the molar mass of sulfuric acid (H2SO4).
- Water [water, unspecified]: 0.0150391 m3; lognormal variance with pedigree 0.0926, pedigree (2,4,4,5,4)
  Calculated based on literature data published by the GENDORF Chemical Park. The factory produced an average of 2462760 tonnes of chemical substances (including intermediates) per year in the years 2015-2019. The amount of water released back to the environment consists of the sum of the amount of process water treated in the internal WWTP that is then released back to the environment and the amount of cooling water released back to the environment. The average ouput of the internal WWTP in the years 2015-2019 was 2628800 m3 and that of cooling water released back to the environment was 34408800 m3. This gives a yearly average of 37037600 m3 emissions of water to water. This equals 0.01504 m3/kg chemical produced.
  References:
  Chemiepark GENDORF, Umwelterklärung 2016, https://www.gendorf.de/Nachbarn/Umweltschutz/Industrie%20und%20Nachhaltigkeit
  Chemiepark GENDORF, Umwelterklärung 2017, https://www.gendorf.de/Nachbarn/Umweltschutz/Industrie%20und%20Nachhaltigkeit
  Chemiepark GENDORF, Umwelterklärung 2020, https://www.gendorf.de/Nachbarn/Umweltschutz/Industrie%20und%20Nachhaltigkeit

## Sampling procedure
Literature data and stochiometric calculation.
