# magnetite production

Dataset: EcoSpold 2, unit process
Geography: GLO
Time period: 1994-01-01 to 2023-12-31
Technology level: current
Classification: ISIC rev.4 ecoinvent: 2022:Manufacture of paints, varnishes and similar coatings, printing ink and mas
Synonyms: Iron Black; Magnetic Black; Ferrosoferric oxide; Black Iron BM; Magnetic oxide
Scenario: Business-as-Usual
System model: Allocation, cut-off by classification
Generated by: Mischa Classen
Published in: Hischier R. 2007
Database: ecoinvent
isCopyrightProtected: true
accessRestrictedTo: 1

## General comment
This dataset represents the production of 1 kg of magnetite for the use as magnetic carrier in toner for printer applications. This dataset is established on stoichiometric estimations and should not be used in cases where magnetite contributes significantly to the total mass of an inventory.

## Included activities start
The activity starts when the raw materials enter the process.

## Included activities end
This activity ends with the production of magnetite. The dataset includes the basic raw materials consumed and energy for precipitation reaction, filtration and drying. No direct emissions and no specific infrastructure are included.

## Technology
This dataset represents the most common production process.

## Reference product
- magnetite: 1 kg; name RP; By-product classification allocatable product; CPC 35130: Printing ink; HS2017 320649: Colouring matter; other preparations n.e.c. in item no. 3206.4; CAS 1309-38-2
  Magnetite is a (brownish-)black ferrimagnetic mineral. Being the most magnetic of the naturally-occuring minerals, it is both attracted to magnets and can be magentized to function as a permanent magnet by itself. It appears as one of the main iron ores. Magnetite can be applied as magnetic carrier in toner for printer applications.
  production volume 3.08e11 kg; name RP_PV
    Calculated based on literature value. The global production of iron ore in 2005 was 1.54E+12 kg (USGS, http://minerals.usgs.gov/minerals/pubs/commodity/iron_ore/feoremcs07.pdf, accessed 20130321). It is estimated, that 20% is produced by this technology.
  property price 0.0318 EUR2005
    Same price assumed as 'Iron ore'. According to http://minerals.usgs.gov/ds/2005/140/ironore.xls downloaded 3 February 2009. The Iron content is not specified.
  properties: carbon allocation 0 kg, carbon content 0, carbon content, fossil 0, carbon content, non-fossil 0, dry mass 1 kg, water content 0, water in wet mass 0 kg, wet mass 1 kg

## Inputs from technosphere
- aluminium hydroxide factory: 1.6393e-12 unit; lognormal variance with pedigree 0.648, pedigree (5,5,5,1,5)
- electricity, medium voltage: 0.083333 kWh; lognormal variance with pedigree 0.106625, pedigree (2,5,5,2,3)
- heat, district or industrial, natural gas: 1.4 MJ; lognormal variance with pedigree 0.106625, pedigree (2,5,5,2,3)
  properties: heating value, net 1 MJ
- iron sulfate: 0.845596, 0.417604 kg (2 suppliers, which the file names only by identifier); sum of these 1.2632 kg; lognormal variance with pedigree 0.124025, pedigree (4,5,5,2,3)
  properties: dry mass 1 kg, wet mass 1 kg
- sodium hydroxide, without water, in 50% solution state: 0.032358, 0.331372 kg (2 suppliers, which the file names only by identifier); sum of these 0.36373 kg; lognormal variance with pedigree 0.124025, pedigree (4,5,5,2,3)
  properties: dry mass 1 kg, heating value, net 3.03 MJ, wet mass 1 kg

## Sampling procedure
Literature data.

## Review by Gregor Wernet 2017-08-04
This dataset was additionally reviewed in a separate review process by Eric Johnson of Atlantic Consulting as well as Emilia Moreno Ruiz and Gregor Wernet of ecoinvent.
