# seed-cotton production, conventional

Dataset: EcoSpold 2, unit process
Geography: BD
Time period: 2016-07-16 to 2023-12-31
Technology level: current
Classification: ISIC rev.4 ecoinvent: 0116:Growing of fibre crops
Scenario: Business-as-Usual
System model: Allocation, cut-off by classification
Generated by: Mireille Faist Emmenegger
Database: ecoinvent
isCopyrightProtected: true
accessRestrictedTo: 1

## General comment
This inventory dataset exclusively covers the field activity for the production of 1 kg of seed-cotton in Bangladesh in 2017 for the main cotton variety known as American Cotton (Gossypium hirsutum).
The production of seed cotton involves inputs of land tillage (fall plow), irrigation (diesel pump), seeds, mineral fertilizers (urea, triple superphosphate potassium salt, limestone, boron, and zinc), pesticides (imidacloprid, emamectin benzoate, and libsen), growth hormones (mepiquat chloride and nitrobenzene) and culminates in harvesting of seed-cotton. Cotton is planted in mid-July and the plants matures in six months. Cotton plants demand water during the active growth phase and dry weather is needed at maturity as the cotton boll opens. In this dataset, the amount of irrigation needed is included and the irrigation process is covered in a different dataset. At maturity, harvesting is usually done three times and harvesting is completed in mid-January. The yield is 888 kg/acre (2194 kg/ha). The activity for this dataset ends here right after the harvesting operation. The harvested seed-cotton then goes to the ginning process where cotton fibre (lint) and cotton seed get separated. The ginning process is covered in a separate dataset.
Machineries and fixed overheads are excluded.
Land use change is not accounted in this dataset as seed-cotton area harvested in Bangladesh is shrinking during the period of the last 20 years. Data originate from FAOSTAT.

## Included activities start
The activity starts after the harvest of the previous crop and receipt of the inputs of seeds, mineral fertilizers, pesticides, and irrigation water at the field. Machinery and fixed overhead are excluded.

## Included activities end
The activity ends at the harvesting of seed-cotton in the field.

## Geography
Data obtained through field survey and secondary literature.

## Time period
The data were collected for 2016-2017 cropping season. The same cultivation practice has been practised over the last couple of decades with increased mechanization in tillage and irrigation. In the near future, the scope of changes in the current cultivation paradigm is low. It means that the dataset will remain valid for the next decade or so.

## Reference product
- seed-cotton: 1 kg; By-product classification allocatable product; CPC 01921: Cotton, whether or not ginned; HS2017 120721: Oil seeds; cotton seeds, seed, whether or not broken
  production volume 9.0882e7 kg; = 27540*3.3*1000
    Cotton Development Board, Government of Bangladesh, Data for 2015/2016. Calculated with a factor of 3.3 kg seed-cotton per kg of fibre cotton.
  property carbon content, non-fossil 0.475
    Biogenic carbon content of vegetation on a dry mass basis (47.5% DM) derived from FAOSTAT.
    Reference: http://www.fao.org/forestry/17111/en
  property price 0.411019 EUR2005
    Literature value. Price from FAOSTAT data Producer Prices - Annual (retrieved from: http://www.fao.org/faostat/en/#data/PP, accessed 15Feb2018). Data from 2005.
  properties: carbon allocation 0.438425 kg, carbon content 0.475, carbon content, fossil 0, dry mass 0.923 kg, water content 0.0834236, water in wet mass 0.077 kg, wet mass 1 kg

## Inputs from technosphere
- cottonseed, for sowing: 0.000925926 kg; lognormal variance with pedigree 0.0106, pedigree (4,1,3,1,1)
  Field data
  properties: carbon content, non-fossil 0.50932, dry mass 0.94 kg, water content 0.0638298, wet mass 1 kg
- cyclic N-compound: 0.0247413 kg; lognormal variance with pedigree 0.016, pedigree (4,1,3,1,1)
  This value has been calculated by using the ecoinvent LCI calculation tool for crop production.
  properties: carbon content, fossil 0.641962, dry mass 1 kg, wet mass 1 kg
- inorganic phosphorus fertiliser, as P2O5: 0.115741 kg; lognormal variance with pedigree 0.0106, pedigree (4,1,3,1,1)
  Field data
  properties: dry mass 1 kg, wet mass 1 kg
- irrigation: 0.2017 m3; lognormal variance with pedigree 0.0106, pedigree (4,1,3,1,1)
  Field data
  properties: dry mass 0.11 kg, water content 9089.91, wet mass 1000 kg
- lime: 0.0578079 kg; lognormal variance with pedigree 0.0106, pedigree (4,1,3,1,1)
  Field data
  properties: carbon content, fossil 0.120005, dry mass 1 kg, wet mass 1 kg
- packaging, for fertilisers: 0.632283 kg; lognormal variance with pedigree 0.0532, pedigree (4,3,3,5,4)
  Total amount of active substance/s of fertilisers needed for the production of 'seed-cotton' is calculated to be circa 3.16E-01 kg. Fertiliser/s used in this dataset is/are: 'lime', 'phosphate fertiliser, as P2O5', 'potassium chloride, as K2O', 'urea, as N'. The total amount of active substance/s is doubled in order to account for the packaging of the dilluted product of fertiliser/s that is/are applied. Therefore, 6.32E-01 kg of packaging for fertilisers is justified with this exchange.
  properties: carbon content, fossil 0.825301, dry mass 1 kg, heating value, net 25.01 MJ, price 0.0642 EUR2005, wet mass 1 kg
  note on carbon content, fossil: Considering a chemical formula (C2H4)n for polyethylene, carbon content-fossil is calculated to be 0.856286 kg of Carbon per kg of dry mass.
- packaging, for pesticides: 0.106388 kg; lognormal variance with pedigree 0.0532, pedigree (4,3,3,5,4)
  Total amount of active substance/s of pesticides needed for the production of seed-cotton is calculated to be circa 5.32E-02 kg. Pesticide/s used in this dataset is/are: 'cyclic N-compound', 'pesticide, unspecified', 'zinc'. The total amount of active substance/s is doubled in order to account for the packaging of the dilluted product of pesticide/s that is/are applied. Therefore, 1.06E-01 kg of packaging for pesticides is justified with this exchange.
  properties: carbon content, fossil 0.85714, dry mass 1 kg, heating value, net 25.97 MJ, price 0.0642 EUR2005, wet mass 1 kg
- pesticide, unspecified: 0.0247413 kg; lognormal variance with pedigree 0.0106, pedigree (4,1,3,1,1)
  (same comment as for cyclic N-compound)
  properties: carbon content, fossil 0.486978, dry mass 1 kg, wet mass 1 kg
- potassium chloride: 0.139236 kg; lognormal variance with pedigree 0.0106, pedigree (4,1,3,1,1)
  The exchange has been updated from 'potassium chloride, as K2O' into 'potassium chloride' and therefore its amount has been scaled (multiplied) from 0.088 kg by 1.5829 kg of 'potassium chloride' per kg of 'potassium chloride, as K2O'. Original comment of the exchange is: Field data
  properties: dry mass 1 kg, wet mass 1 kg
- tillage, ploughing: 0.000212857 ha; lognormal variance with pedigree 0.0106, pedigree (4,1,3,1,1)
  Field data
- urea: 0.117115 kg; lognormal variance with pedigree 0.0106, pedigree (4,1,3,1,1)
  The exchange has been updated from 'urea, as N' into 'urea' and therefore its amount has been scaled (multiplied) from 0.0546 kg by 2.1438 kg of 'urea' per kg of 'urea, as N'. Original comment of the exchange is: Field data
  properties: carbon content, fossil 0.2, dry mass 1 kg, wet mass 1 kg
- zinc: 0.0037112 kg; lognormal variance with pedigree 0.0106, pedigree (4,1,3,1,1)
  Field data
  properties: dry mass 1 kg, wet mass 1 kg

## Inputs from nature
- Carbon dioxide, in air [natural resource, in air]: 1.50049 kg; lognormal variance with pedigree 0.0106, pedigree (4,1,3,1,1)
  This value has been calculated by using the ecoinvent LCI calculation tool for crop production.
  Uncertainty: The ecoinvent LCI calculation tool for crop production used India as a proxy for Bangladesh and Hemp as for Jute.
- Energy, gross calorific value, in biomass [natural resource, biotic]: 17.3446 MJ; lognormal variance with pedigree 0.0106, pedigree (4,1,3,1,1)
  (same comment as for Carbon dioxide, in air)
- Occupation, annual crop [natural resource, land]: 1.24041 m2*year; lognormal variance with pedigree 0.0140616, pedigree (2,1,3,1,1)
  (same comment as for cyclic N-compound)
- Occupation, arable land, unspecified use [natural resource, land]: 1.24041 m2*year; lognormal variance with pedigree 0.012, pedigree (4,1,3,1,1)
  (same comment as for Carbon dioxide, in air)
- Transformation, from arable land, unspecified use [natural resource, land]: 2.47413 m2; lognormal variance with pedigree 0.018, pedigree (4,1,3,1,1)
  (same comment as for Carbon dioxide, in air)
- Transformation, to arable land, unspecified use [natural resource, land]: 2.47413 m2; lognormal variance with pedigree 0.018, pedigree (4,1,3,1,1)
  (same comment as for cyclic N-compound)

## Emissions to nature
- Ammonia [air, non-urban air or from high stacks]: 0.0132913 kg; lognormal variance with pedigree 0.018, pedigree (4,1,3,1,1)
  (same comment as for cyclic N-compound)
- Carbon dioxide, fossil [air, non-urban air or from high stacks]: 0.111243 kg; lognormal variance with pedigree 0.0106, pedigree (4,1,3,1,1)
  (same comment as for cyclic N-compound)
- Dinitrogen monoxide [air, non-urban air or from high stacks]: 0.00657611 kg; lognormal variance with pedigree 0.04, pedigree (4,1,3,1,1)
  Calciulated by using the ecoinvent LCI calculation tool for crop production based on data related to the amount of fertilisers and pesticides consumption as obtained through field survey and secondary literature.
- Nitrogen oxides [air, non-urban air or from high stacks]: 0.00217772 kg; lognormal variance with pedigree 0.05, pedigree (4,1,3,1,1)
  (same comment as for cyclic N-compound)
- Boron [soil, unspecified]: 0.00321637 kg; lognormal variance with pedigree 0.0106, pedigree (4,1,3,1,1)
- Cadmium II [soil, agricultural]: 2.87e-6 kg; lognormal variance with pedigree 0.05, pedigree (4,1,3,1,1)
  (same comment as for cyclic N-compound)
- Chromium III [soil, agricultural]: -0.000947954 kg
  (same comment as for cyclic N-compound)
- Copper ion [soil, agricultural]: -0.000823149 kg
  (same comment as for cyclic N-compound)
- Imidacloprid [soil, agricultural]: 0.0247413 kg; lognormal variance with pedigree 0.05, pedigree (4,1,3,1,1)
  (same comment as for Dinitrogen monoxide)
- Lead II [soil, agricultural]: -0.000373229 kg
  (same comment as for Dinitrogen monoxide)
- Mepiquat chloride [soil, agricultural]: 2.47413e-5 kg; lognormal variance with pedigree 0.05, pedigree (4,1,3,1,1)
  Field data.Considered as direct output to the environment.
- Mercury II [soil, agricultural]: -2.78992e-6 kg
  (same comment as for Dinitrogen monoxide)
- Nickel II [soil, agricultural]: -0.00091394 kg
  (same comment as for Dinitrogen monoxide)
- Zinc II [soil, agricultural]: -0.00179571 kg
  (same comment as for Dinitrogen monoxide)
- Cadmium II [water, ground-]: 6.14472e-9 kg; lognormal variance with pedigree 0.1, pedigree (4,1,3,1,1)
  (same comment as for cyclic N-compound)
- Cadmium II [water, surface water]: 1.01368e-5 kg; lognormal variance with pedigree 0.1, pedigree (4,1,3,1,1)
  (same comment as for cyclic N-compound)
- Chromium III [water, ground-]: 2.60656e-6 kg; lognormal variance with pedigree 0.1, pedigree (4,1,3,1,1)
  (same comment as for cyclic N-compound)
- Chromium III [water, surface water]: 0.00101837 kg; lognormal variance with pedigree 0.1, pedigree (4,1,3,1,1)
  (same comment as for cyclic N-compound)
- Copper ion [water, ground-]: 4.35299e-7 kg; lognormal variance with pedigree 0.1, pedigree (4,1,3,1,1)
  (same comment as for cyclic N-compound)
- Copper ion [water, surface water]: 0.00083529 kg; lognormal variance with pedigree 0.1, pedigree (4,1,3,1,1)
  (same comment as for cyclic N-compound)
- Lead II [water, ground-]: 3.34884e-8 kg; lognormal variance with pedigree 0.1, pedigree (4,1,3,1,1)
  (same comment as for Dinitrogen monoxide)
- Lead II [water, surface water]: 0.000374053 kg; lognormal variance with pedigree 0.1, pedigree (4,1,3,1,1)
  (same comment as for Dinitrogen monoxide)
- Mercury II [water, ground-]: 1.47943e-10 kg; lognormal variance with pedigree 0.1, pedigree (4,1,3,1,1)
  (same comment as for Dinitrogen monoxide)
- Mercury II [water, surface water]: 2.85515e-6 kg; lognormal variance with pedigree 0.1, pedigree (4,1,3,1,1)
  (same comment as for Dinitrogen monoxide)
- Nickel II [water, surface water]: 0.000925199 kg; lognormal variance with pedigree 0.1, pedigree (4,1,3,1,1)
  (same comment as for Dinitrogen monoxide)
- Nitrate [water, ground-]: 2.07962 kg; lognormal variance with pedigree 0.018, pedigree (4,1,3,1,1)
  (same comment as for Dinitrogen monoxide)
- Nitrobenzene [water, unspecified]: 6.18533e-5 kg; lognormal variance with pedigree 0.05, pedigree (4,1,3,1,1)
  Field data.Considered as direct output to the environment.
- Phosphate [water, ground-]: 0.00014401 kg; lognormal variance with pedigree 0.05, pedigree (4,1,3,1,1)
  (same comment as for Dinitrogen monoxide)
- Phosphorus [water, surface water]: 0.0873548 kg; lognormal variance with pedigree 0.05, pedigree (4,1,3,1,1)
  (same comment as for Dinitrogen monoxide)
- Zinc II [water, ground-]: 3.61929e-6 kg; lognormal variance with pedigree 0.1, pedigree (4,1,3,1,1)
  (same comment as for Dinitrogen monoxide)
- Zinc II [water, surface water]: 0.00186959 kg; lognormal variance with pedigree 0.1, pedigree (4,1,3,1,1)
  (same comment as for Dinitrogen monoxide)

## Sampling procedure
Literature data on agricultural practices were taken from the Bangladesh Yearbook of Agricultural Statistics - 2015. The secondary agronomic data were taken from the Cotton Development Board of Bangladesh (http://www.cdb.gov.bd/). To quantify the actual practices in the field, focused group discussions (FGDs) were arranged with the cotton farmers and agricultural extension officers in the major cotton growing districts in Bangladesh. Standardized questionnaires were developed and adapted to cotton-specific cultivation and post-harvest situation. The secondary data from literature and the primary data from surveys were compared and matched to obtain the highest data quality.

## Extrapolations
If used, extrapolations are documented on the flow level.
