# tebuconazole production

Dataset: EcoSpold 2, unit process
Geography: GLO
Time period: 2020-01-01 to 2023-12-31
Technology level: current
Classification: ISIC rev.4 ecoinvent: 2011:Manufacture of basic chemicals
Synonyms: Fenetrazole; Folicur
Scenario: Business-as-Usual
System model: Allocation, cut-off by classification
Generated by: Daria Dellenbach
Database: ecoinvent
isCopyrightProtected: true
accessRestrictedTo: 1

## General comment
This dataset represents the production of 1 kg of tebuconazole. Emissions are estimated. Energy consumptions, infrastructure and transports are calculated with standard values. A yield of 95% per chemical step was assumed.
Tebuconazole is an organic substance with the CAS no.: 107534-96-3. It is called '1-(4-chlorophenyl)-4,4-dimethyl-3-[(1H-1,2,4-triazol-1-yl)methyl]pentan-3-ol' under IUPAC naming and its molecular formula is: C16H22ClN3O. It is solid under normal conditions of temperature and pressure as colorless crystals. It is modelled as a pure substance. Tebuconazole is a fungicide, it can not only be used on plants but as well as a wood protective agent. It is usually applied as a foliar spray. There are no publicly available information about the consumption of this substance on industrial sites.
Reference(s):
Unger T., (1996). Pesticide Synthesis Handbook, Noyes Publication.
Chinese Patent Office (2013), CN103242151B
Ackermann P., Margot P., Muller F., (2011): Fungicides, Agricultural, in Ullmann's Encyclopedia in Industrial Chemistry, Weinheim, Wiley-VCH.
Sauter H., Zeeh B., (2009): Plant Growth Regulators, in Ullmanns Encyclopedia of Industrial Chemistry, Weinheim, Wiley-VCH.
Chemiepark GENDORF, Umwelterklärung 2016, https://www.gendorf.de/Nachbarn/Umweltschutz/Industrie%20und%20Nachhaltigkeit
Chemiepark GENDORF, Umwelterklärung 2017, https://www.gendorf.de/Nachbarn/Umweltschutz/Industrie%20und%20Nachhaltigkeit
Chemiepark GENDORF, Umwelterklärung 2020, https://www.gendorf.de/Nachbarn/Umweltschutz/Industrie%20und%20Nachhaltigkeit
GESTIS Stoffdatenbank, Tebuconazole, last accessed 2021-02-22
Hischier, R. (2005) Establishing Life Cycle Inventories of Chemicals Based on Differing Data Availability (9 pp). The International Journal of Life Cycle Assessment, Volume 10, Issue 1, pp 59–67. 10.1065/lca2004.10.181.7

## Included activities start
Cradle to gate. The activity starts when the raw materials enter the process.

## Included activities end
Production of tebuconazole production including materials, energy uses, infrastructure and emissions.

## Technology
Tebuconazole is fungicide produced in 5 steps from toluene. Toluene is chlorinated, hydrated and reacted with pinacolone to deliver the intermediate 1(4-chlorophenyl)4.4-dimethyl-3-pentanone. The intermediate is treated with a base and dimethylsulfide to form an epoxy, reaction with 1,2,4-triazole then yields in the product.
C7H8 + 2 FeCl3 --> C7H7Cl + 2 FeCl2 + HCl
C7H7Cl + H2O --> C7H5ClO + 2 H2
C7H5ClO + C6H12O + H2 --> C13H17ClO + H2O
C13H17ClO + C2H6S + NaOCH3 --> C14H19ClO + NaOH + C2H6S
C14H19ClO + C2H3N3 --> C16H22ON3Cl
Pinacolone (C6H12O) is produced from acetone:
2C3H6O + H2 --> C6H14O2
C6H14O2 --> C6H12O + H2O
1,2,4-triazole is produced from hydrazine and formamide:
CO + NH3 --> CH3NO
2 CH3NO + H4N2--> C2H3N3 + 2H2O
Sodium hydroxide is added to neutralize the formed hydrochloric acid and hydrochloric acid is added to neutralized the formed sodium hydroxide.
Reference(s):
Unger T., (1996). Pesticide Synthesis Handbook, Noyes Publication.
Chinese Patent Office (2013), CN103242151B
Ackermann P., Margot P., Muller F., (2011): Fungicides, Agricultural, in Ullmann's Encyclopedia in Industrial Chemistry, Weinheim, Wiley-VCH.
Sauter H., Zeeh B., (2009): Plant Growth Regulators, in Ullmanns Encyclopedia of Industrial Chemistry, Weinheim, Wiley-VCH.

## Reference product
- tebuconazole: 1 kg; name RP; By-product classification allocatable product; CPC 34662: Fungicides; HS2017 380892: Fungicides; other than containing goods specified in Subheading Note 1 to this Chapter; put up in forms or [...]; CAS 107534-96-3
  production volume 1.61861e7 kg; name PV_RP; = (2375000+792624.8)/(0.0357+0.1600)
    Calculated value. The global production volume is extrapolated from the German and US production volumes using the global average GDP (constant 2017 international USD from 2015-2019). The annual production value of Germany in the year 2017 is 2375000 kg and the US production volume in 2017 is 792624.8 kg. This value is divided by the German share of global GDP, 3.57% (2015-2019), and the US share, 16.00% (2015-2019).
    References:
    Bundesamt für Verbraucherschutz und Lebensmittelsicherheit (2018): Absatz an Pflanzenschutzmitteln in der Bundesrepublik Deutschland 2017, available here: https://www.bvl.bund.de/SharedDocs/Downloads/04_Pflanzenschutzmittel/01_meldungen_par_64/meld_par_64_2017.pdf?__blob=publicationFile&v=2, accessed 07-06-2022.
    U.S. Geological Survey (2018): Estimated Annual Agricultural Pesticide Use, available here: https://water.usgs.gov/nawqa/pnsp/usage/maps/county-level/, accessed 07-06-2022.
    World bank (2022): GDP, available here: https://data.worldbank.org/indicator/NY.GDP.MKTP.PP.KD, accessed 17-05-2022.
  property price 3.91137 EUR2005
    The price is calculated based on price information from MadeInChina and IndiaMart (available here: https://www.indiamart.com/proddetail/tebuconazole-2-ds-24761754988.html and https://shbosman.en.made-in-china.com/product/LveJPDXFrkYy/China-Best-Price-Fungicide-Tebuconazole-97-TC-430g-L-SC-80-WDG.html, last accessed 2022-06-14).
    The prices were converted to EUR based on the annual exchange rates published by the European Central Bank (https://sdw.ecb.europa.eu/quickview.do?SERIES_KEY=120.EXR.A.USD.EUR.SP00.A, last accessed on 2022-02-15) and adjusted for inflation relative to 2005 using the producer price index (PPI) of the euro area, published by eurostat (https://appsso.eurostat.ec.europa.eu/nui/show.do?dataset=sts_inpp_a&lang=en, last accessed on 2022-05-04).
  properties: carbon allocation 0.624309 kg, carbon content 0.624309, carbon content, fossil 0.624309, carbon content, non-fossil 0, dry mass 1 kg, water content 0, water in wet mass 0 kg, wet mass 1 kg

## Inputs from technosphere
- acetone, liquid: 0.305477, 0.0944771 kg (2 suppliers, which the file names only by identifier); sum of these 0.399954 kg; lognormal variance with pedigree 0.010025, pedigree (2,5,2,2,2)
  Calculated based on stoichiometry. See technology comment for the description of the reaction.
  properties: carbon content, fossil 0.62069, dry mass 1 kg, heating value, net 31.32 MJ, wet mass 1 kg
- ammonia, anhydrous, liquid: 0.00294345, 0.0126454, 0.00571383, 0.0633342, 0.00267718, 0.000598871, 0.0220096, 0.00189199, 0.00583201 kg (9 suppliers, which the file names only by identifier); sum of these 0.117647 kg; lognormal variance with pedigree 0.010025, pedigree (2,5,2,2,2)
  (same comment as for acetone, liquid)
  properties: dry mass 1 kg, wet mass 1 kg
- carbon monoxide: 0.0483089, 0.145186 kg (2 suppliers, which the file names only by identifier); sum of these 0.193495 kg; lognormal variance with pedigree 0.010025, pedigree (2,5,2,2,2)
  (same comment as for acetone, liquid)
  properties: carbon content, fossil 0.428571, dry mass 1 kg, heating value, net 12.99 MJ, wet mass 1 kg
- chemical factory, organics: 1.84e-9 unit; lognormal variance with pedigree 0.3494, pedigree (2,5,2,4,4)
  Calculated based on literature data published by the industry. For this activity, no information was readily available concerning infrastructure and land-use. Therefore, the infrastructure is estimated based on data from two chemical factories, the BASF site of Ludwigshafen and the chemical factory in Gendorf (which are both located in Germany), which produce a wide range of chemical substances. Based on this data, the following assumptions are made: the built area amounts to about 4.2 ha, the plant has an average output of 50'000 t/a and a lifespan of fifty years. The estimated infrastructure amount is therefore 4.00 E-10 units per kg of produced chemical.
  Since this process comprises 9 reactions to produce the final product, the default value was scaled up. To produce 1 kg of output, 3.6 kg of intermediate products are necessary. The value was therefore scaled up with the factor 4.6.
  References:
  Althaus H.-J., Chudacoff M., Hischier R., Jungbluth N., Osses M. and Primas A. (2007) Life Cycle Inventories of Chemicals. ecoinvent report No. 8, v2.0. EMPA Dübendorf, Swiss Centre for Life Cycle Inventories, Dübendorf, CH.
  Gendorf (2000) Umwelterklärung 2000, Werk Gendorf. Werk Gendorf, Burgkirchen.
- compressed air, 1000 kPa gauge: 1.47836, 0.601575 m3 (2 suppliers, which the file names only by identifier); sum of these 2.07994 m3; lognormal variance with pedigree 0.05, pedigree (2,5,2,4,4)
  Calculated based on literature data published by the GENDORF Chemical Park. The factory produced an average of 2462760 tonnes of chemical substances (including intermediates) per year in the years 2015-2019. The average consumption of compressed air in the years 2015-2019 was 1113557454 m3 per year. This equals 0.45216 m3/kg chemical produced.
  Since this process comprises 9 reactions to produce the final product, the default value was scaled up. To produce 1 kg of output, 3.6 kg of intermediate products are necessary. The value was therefore scaled up with the factor 4.6.
  References:
  Chemiepark GENDORF, Umwelterklärung 2016, https://www.gendorf.de/Nachbarn/Umweltschutz/Industrie%20und%20Nachhaltigkeit
  Chemiepark GENDORF, Umwelterklärung 2017, https://www.gendorf.de/Nachbarn/Umweltschutz/Industrie%20und%20Nachhaltigkeit
  Chemiepark GENDORF, Umwelterklärung 2020, https://www.gendorf.de/Nachbarn/Umweltschutz/Industrie%20und%20Nachhaltigkeit
- electricity, medium voltage: 1.83568 kWh; lognormal variance with pedigree 0.05, pedigree (2,5,2,4,4)
  Calculated based on literature data published by the GENDORF Chemical Park. The factory produced an average of 2462760 tonnes of chemical substances (including intermediates) per year in the years 2015-2019. The average consumption of electricity in the years 2015-2019 was 982796751 kWh per year. This equals 0.39906 kWh/kg chemical produced.
  Since this process comprises 9 reactions to produce the final product, the default value was scaled up. To produce 1 kg of output, 3.6 kg of intermediate products are necessary. The value was therefore scaled up with the factor 4.6.
  References:
  Chemiepark GENDORF, Umwelterklärung 2016, https://www.gendorf.de/Nachbarn/Umweltschutz/Industrie%20und%20Nachhaltigkeit
  Chemiepark GENDORF, Umwelterklärung 2017, https://www.gendorf.de/Nachbarn/Umweltschutz/Industrie%20und%20Nachhaltigkeit
  Chemiepark GENDORF, Umwelterklärung 2020, https://www.gendorf.de/Nachbarn/Umweltschutz/Industrie%20und%20Nachhaltigkeit
- hazardous waste, for incineration: -0.551407, -0.26517, -0.00693137 kg (3 suppliers, which the file names only by identifier); sum of these -0.823508 kg; lognormal variance with pedigree 0.0498, pedigree (2,5,1,4,4)
  (same comment as for acetone, liquid)
  production volume; name PV_hazwaste; = (BP_hazwaste* PV_RP/RP)
    Calculated from the production volume of the reference product in proportion to the respective output amounts.
  properties: carbon content, fossil 0.554667, dry mass 0.75 kg, heating value, net 17 MJ, water content 0.333333, wet mass 1 kg
  note on carbon content, fossil: Tab A.6, ecoinvent v2.2 report 13_I. C content has been calculated after data in the tables, and then referred to 1 kg DM
  note on heating value, net: Value taken from the general comment of the treatment dataset.
- heat, district or industrial, natural gas: 8.6779 MJ; lognormal variance with pedigree 0.05, pedigree (2,5,2,4,4)
  Calculated based on literature data published by the GENDORF Chemical Park. The factory produced an average of 2462760 tonnes of chemical substances (including intermediates) per year in the years 2015-2019. The average consumption of natural gas in the years 2015-2019 was 4645920000 MJ per year. This equals 1.8865 MJ/kg chemical produced.
  Since this process comprises 9 reactions to produce the final product, the default value was scaled up. To produce 1 kg of output, 3.6 kg of intermediate products are necessary. The value was therefore scaled up with the factor 4.6.
  References:
  Chemiepark GENDORF, Umwelterklärung 2016, https://www.gendorf.de/Nachbarn/Umweltschutz/Industrie%20und%20Nachhaltigkeit
  Chemiepark GENDORF, Umwelterklärung 2017, https://www.gendorf.de/Nachbarn/Umweltschutz/Industrie%20und%20Nachhaltigkeit
  Chemiepark GENDORF, Umwelterklärung 2020, https://www.gendorf.de/Nachbarn/Umweltschutz/Industrie%20und%20Nachhaltigkeit
  properties: heating value, net 1 MJ
- heat, from steam, in chemical industry: 0.812607, 0.143273 MJ (2 suppliers, which the file names only by identifier); sum of these 0.95588 MJ; lognormal variance with pedigree 0.05, pedigree (2,5,2,4,4)
  Calculated based on literature data published by the GENDORF Chemical Park. The factory produced an average of 2462760 tonnes of chemical substances (including intermediates) per year in the years 2015-2019. The average consumption of steam (internal and external sources) in the years 2015-2019 was 511785800 MJ per year. This equals 0.2078 MJ/kg chemical produced.
  Since this process comprises 9 reactions to produce the final product, the default value was scaled up. To produce 1 kg of output, 3.6 kg of intermediate products are necessary. The value was therefore scaled up with the factor 4.6.
  References:
  Chemiepark GENDORF, Umwelterklärung 2016, https://www.gendorf.de/Nachbarn/Umweltschutz/Industrie%20und%20Nachhaltigkeit
  Chemiepark GENDORF, Umwelterklärung 2017, https://www.gendorf.de/Nachbarn/Umweltschutz/Industrie%20und%20Nachhaltigkeit
  Chemiepark GENDORF, Umwelterklärung 2020, https://www.gendorf.de/Nachbarn/Umweltschutz/Industrie%20und%20Nachhaltigkeit
  properties: heating value, net 1 MJ
- hydrazine: 0.0734211, 0.0367106 kg (2 suppliers, which the file names only by identifier); sum of these 0.110132 kg; lognormal variance with pedigree 0.010025, pedigree (2,5,2,2,2)
  (same comment as for acetone, liquid)
  properties: dry mass 1 kg, heating value, net 15.13 MJ, wet mass 1 kg
- hydrogen, gaseous, medium pressure, merchant: 0.00158646, 0.00757973, 0.00475937 kg (3 suppliers, which the file names only by identifier); sum of these 0.0139256 kg; lognormal variance with pedigree 0.010025, pedigree (2,5,2,2,2)
  (same comment as for acetone, liquid)
  properties: dry mass 1 kg, heating value, net 120.21 MJ, wet mass 1 kg
- iron(III) chloride, without water, in 40% solution state: 1.11488 kg; lognormal variance with pedigree 0.010025, pedigree (2,5,2,2,2)
  (same comment as for acetone, liquid)
  properties: dry mass 1 kg, wet mass 1 kg
- nitrogen, liquid: 0.0534606, 0.0146746 kg (2 suppliers, which the file names only by identifier); sum of these 0.0681352 kg; lognormal variance with pedigree 0.05, pedigree (2,5,2,4,4)
  Calculated based on literature data published by the GENDORF Chemical Park. The factory produced an average of 2462760 tonnes of chemical substances (including intermediates) per year in the years 2015-2019. The average consumption of nitrogen, liquid in the years 2015-2019 was 29168033 m3 per year. This equals 0.014812 kg/kg chemical produced. The density to convert to kg was assumed to be 1.2506 kg/m3.
  Since this process comprises 9 reactions to produce the final product, the default value was scaled up. To produce 1 kg of output, 3.6 kg of intermediate products are necessary. The value was therefore scaled up with the factor 4.6.
  References:
  Chemiepark GENDORF, Umwelterklärung 2016, https://www.gendorf.de/Nachbarn/Umweltschutz/Industrie%20und%20Nachhaltigkeit
  Chemiepark GENDORF, Umwelterklärung 2017, https://www.gendorf.de/Nachbarn/Umweltschutz/Industrie%20und%20Nachhaltigkeit
  Chemiepark GENDORF, Umwelterklärung 2020, https://www.gendorf.de/Nachbarn/Umweltschutz/Industrie%20und%20Nachhaltigkeit
  properties: dry mass 1 kg, wet mass 1 kg
- sodium methoxide: 0.185663 kg; lognormal variance with pedigree 0.010025, pedigree (2,5,2,2,2)
  (same comment as for acetone, liquid)
  properties: carbon content, fossil 0.222222, dry mass 1 kg, heating value, net 13.47 MJ, wet mass 1 kg
- tap water: 0.1035 kg; lognormal variance with pedigree 0.05, pedigree (2,5,2,4,4)
  Calculated based on literature data published by the GENDORF Chemical Park. The factory produced an average of 2462760 tonnes of chemical substances (including intermediates) per year in the years 2015-2019. The average consumption of tap water in the years 2015-2019 was 55352 t per year. This equals 0.0225 kg/kg chemical produced.
  Since this process comprises 9 reactions to produce the final product, the default value was scaled up. To produce 1 kg of output, 3.6 kg of intermediate products are necessary. The value was therefore scaled up with the factor 4.6.
  References:
  Chemiepark GENDORF, Umwelterklärung 2016, https://www.gendorf.de/Nachbarn/Umweltschutz/Industrie%20und%20Nachhaltigkeit
  Chemiepark GENDORF, Umwelterklärung 2017, https://www.gendorf.de/Nachbarn/Umweltschutz/Industrie%20und%20Nachhaltigkeit
  Chemiepark GENDORF, Umwelterklärung 2020, https://www.gendorf.de/Nachbarn/Umweltschutz/Industrie%20und%20Nachhaltigkeit
  properties: carbon content, fossil 0.00178991, dry mass 0.000337476 kg, water content 2962.17, wet mass 1 kg
  note on carbon content, fossil: Bicarbonate content is 2.93 mol/m3. CO2 content is 0.1 mol/m3 (ecoinvent v2.2 report 8, Tab 93.1).
- toluene, liquid: 0.279982, 0.0366728 kg (2 suppliers, which the file names only by identifier); sum of these 0.316654 kg; lognormal variance with pedigree 0.010025, pedigree (2,5,2,2,2)
  (same comment as for acetone, liquid)
  properties: carbon content, fossil 0.913043, dry mass 1 kg, heating value, net 38.17 MJ, wet mass 1 kg
- wastewater, average: -5.04082e-8, -8.38815e-6, -2.00578e-6, -2.9865e-8 m3 (4 suppliers, which the file names only by identifier); sum of these -1.04742e-5 m3; lognormal variance with pedigree 0.0498, pedigree (2,5,1,4,4)
  Calculated based on literature data published by the GENDORF Chemical Park. The factory produced an average of 2462760 tonnes of chemical substances (including intermediates) per year in the years 2015-2019. The average ouput of wastewater going to an external wastewater treatment plant in the years 2015-2019 was 5608 m3 per year. This equals 0.000002277 m3/kg chemical produced.
  Since this process comprises 9 reactions to produce the final product, the default value was scaled up. To produce 1 kg of output, 3.6 kg of intermediate products are necessary. The value was therefore scaled up with the factor 4.6.
  References:
  Chemiepark GENDORF, Umwelterklärung 2016, https://www.gendorf.de/Nachbarn/Umweltschutz/Industrie%20und%20Nachhaltigkeit
  Chemiepark GENDORF, Umwelterklärung 2017, https://www.gendorf.de/Nachbarn/Umweltschutz/Industrie%20und%20Nachhaltigkeit
  Chemiepark GENDORF, Umwelterklärung 2020, https://www.gendorf.de/Nachbarn/Umweltschutz/Industrie%20und%20Nachhaltigkeit
  production volume; name PV_wastewater; = (BP_wastewater* PV_RP/RP)
    (same comment as for hazardous waste, for incineration)
  properties: carbon content, non-fossil 0.194039, dry mass 0.346837 kg, water content 2882.2, wet mass 1000 kg
  note on carbon content, non-fossil: 0.0673 kg TOC/m3 (Tab A.17, ecoinvent v2.2 report 13_I). TOC was considered as Total Carbon.
- water, deionised: 0.014641, 5.27041e-5, 0.0475294 kg (3 suppliers, which the file names only by identifier); sum of these 0.0622232 kg; lognormal variance with pedigree 0.010025, pedigree (2,5,2,2,2)
  (same comment as for acetone, liquid)
  properties: wet mass 1 kg

## Inputs from nature
- Water, cooling, unspecified natural origin [natural resource, in water]: 0.0676522 m3; lognormal variance with pedigree 0.05, pedigree (2,5,2,4,4)
  Calculated based on literature data published by the GENDORF Chemical Park. The factory produced an average of 2462760 tonnes of chemical substances (including intermediates) per year in the years 2015-2019. The average amount of cooling water released in the years 2015-2019 was 34408800 t per year. It was assumed that 5% of the cooling water was emitted to air during its use, therefore, to calculate the input of cooling water, the output value reported by GENDORF was scaled up by the factor 1/0.95. This equals 0.014707 m3/kg chemical produced.
  Since this process comprises 9 reactions to produce the final product, the default value was scaled up. To produce 1 kg of output, 3.6 kg of intermediate products are necessary. The value was therefore scaled up with the factor 4.6.
  References:
  Chemiepark GENDORF, Umwelterklärung 2016, https://www.gendorf.de/Nachbarn/Umweltschutz/Industrie%20und%20Nachhaltigkeit
  Chemiepark GENDORF, Umwelterklärung 2017, https://www.gendorf.de/Nachbarn/Umweltschutz/Industrie%20und%20Nachhaltigkeit
  Chemiepark GENDORF, Umwelterklärung 2020, https://www.gendorf.de/Nachbarn/Umweltschutz/Industrie%20und%20Nachhaltigkeit
- Water, river [natural resource, in water]: 0.00444098 m3; lognormal variance with pedigree 0.05, pedigree (2,5,2,4,4)
  Calculated based on literature data published by the GENDORF Chemical Park. The factory produced an average of 2462760 tonnes of chemical substances (including intermediates) per year in the years 2015-2019. The average consumption of river water in the years 2015-2019 was 22000820 t per year. However, since the cooling water is modelled as an input, the amount of river water was adjusted to avoid double counting. 55% of the input amount of cooling water was deducted from the amount of river water, as that is the share of river water versus well water. This equals 0.00096543 m3/kg chemical produced.
  Since this process comprises 9 reactions to produce the final product, the default value was scaled up. To produce 1 kg of output, 3.6 kg of intermediate products are necessary. The value was therefore scaled up with the factor 4.6.
  References:
  Chemiepark GENDORF, Umwelterklärung 2016, https://www.gendorf.de/Nachbarn/Umweltschutz/Industrie%20und%20Nachhaltigkeit
  Chemiepark GENDORF, Umwelterklärung 2017, https://www.gendorf.de/Nachbarn/Umweltschutz/Industrie%20und%20Nachhaltigkeit
  Chemiepark GENDORF, Umwelterklärung 2020, https://www.gendorf.de/Nachbarn/Umweltschutz/Industrie%20und%20Nachhaltigkeit
- Water, well, in ground [natural resource, in water]: 0.00375599 m3; lognormal variance with pedigree 0.05, pedigree (2,5,2,4,4)
  Calculated based on literature data published by the GENDORF Chemical Park. The factory produced an average of 2462760 tonnes of chemical substances (including intermediates) per year in the years 2015-2019. The average consumption of well water in the years 2015-2019 was 18607480 t per year. However, since the cooling water is modelled as an input, the amount of well water was adjusted to avoid double counting. 45% of the input amount of cooling water was deducted from the amount of well water, as that is the share of well water versus river water. This equals 0.00081652 m3/kg chemical produced.
  Since this process comprises 9 reactions to produce the final product, the default value was scaled up. To produce 1 kg of output, 3.6 kg of intermediate products are necessary. The value was therefore scaled up with the factor 4.6.
  References:
  Chemiepark GENDORF, Umwelterklärung 2016, https://www.gendorf.de/Nachbarn/Umweltschutz/Industrie%20und%20Nachhaltigkeit
  Chemiepark GENDORF, Umwelterklärung 2017, https://www.gendorf.de/Nachbarn/Umweltschutz/Industrie%20und%20Nachhaltigkeit
  Chemiepark GENDORF, Umwelterklärung 2020, https://www.gendorf.de/Nachbarn/Umweltschutz/Industrie%20und%20Nachhaltigkeit

## Emissions to nature
- Acetone [air, unspecified]: 0.000745056 kg; lognormal variance with pedigree 0.049425, pedigree (2,5,2,2,2)
  Calculated losses, based on the boiling point of a chemical, to water or to air. In addition, unreacted chemicals are assumed to go to wastewater treatment, which has a conversion rate in biological treatment of 95% of carbon into carbon dioxide. The remaining 5% are released as emissions to water.
- Ammonia [air, unspecified]: 0.000588233 kg; lognormal variance with pedigree 0.049425, pedigree (2,5,2,2,2)
  (same comment as for Acetone)
- Carbon dioxide, fossil [air, unspecified]: 0.574027 kg; lognormal variance with pedigree 0.010025, pedigree (2,5,2,2,2)
  Calculated based on the carbon content of unreacted chemical substances. The unreacted chemicals are assumed to go to wastewater treatment, which has a conversion rate in biological treatment of 95% of carbon into carbon dioxide. The remaining 5% are released as emissions to water, unspecified.
- Carbon monoxide, fossil [air, unspecified]: 0.000967474 kg; lognormal variance with pedigree 0.659425, pedigree (2,5,2,2,2)
  (same comment as for Acetone)
- Hydrogen [air, unspecified]: 0.0132326 kg; lognormal variance with pedigree 0.049425, pedigree (2,5,2,2,2)
  (same comment as for Acetone)
- Nitrogen [air, unspecified]: 0.0681352 kg; lognormal variance with pedigree 0.0894, pedigree (2,5,2,4,4)
  Calculated value. The amount of nitrogen released to air is equal to the amount of nitrogen entering the activity.
  Since this process comprises 9 reactions to produce the final product, the default value was scaled up. To produce 1 kg of output, 3.6 kg of intermediate products are necessary. The value was therefore scaled up with the factor 4.6.
- Water [air, unspecified]: 0.00729018 m3; lognormal variance with pedigree 0.0894, pedigree (2,5,2,4,4)
  Calculated based on literature data published by the GENDORF Chemical Park. The factory produced an average of 2462760 tonnes of chemical substances (including intermediates) per year in the years 2015-2019. To determine the emissions of water to air, the difference of all water inputs (from river, well, tap water and cooling) and outputs (wastewater, emissions to water) was calculated. The average ouput of water to air in the years 2015-2019 was 3620444 m3 per year. This equals 0.00147 m3/kg chemical produced. For more information on the other water exchanges please consult the respective exchange comment.
  This value includes as well process emissions.
  Since this process comprises 9 reactions to produce the final product, the default value was scaled up. To produce 1 kg of output, 3.6 kg of intermediate products are necessary. The value was therefore scaled up with the factor 4.6.
  References:
  Chemiepark GENDORF, Umwelterklärung 2016, https://www.gendorf.de/Nachbarn/Umweltschutz/Industrie%20und%20Nachhaltigkeit
  Chemiepark GENDORF, Umwelterklärung 2017, https://www.gendorf.de/Nachbarn/Umweltschutz/Industrie%20und%20Nachhaltigkeit
  Chemiepark GENDORF, Umwelterklärung 2020, https://www.gendorf.de/Nachbarn/Umweltschutz/Industrie%20und%20Nachhaltigkeit
- Ammonium [water, unspecified]: 0.00588935 kg; lognormal variance with pedigree 0.049425, pedigree (2,5,2,2,2)
  (same comment as for Acetone)
- BOD5, Biological Oxygen Demand [water, unspecified]: 0.0275099 kg; lognormal variance with pedigree 0.049425, pedigree (2,5,2,2,2)
  Calculated value. The BOD, COD, TOC and BOD5 are calculated based on the amount and type of emissions released to water in the same activity.
- COD, Chemical Oxygen Demand [water, unspecified]: 0.0275099 kg; lognormal variance with pedigree 0.049425, pedigree (2,5,2,2,2)
  (same comment as for BOD5, Biological Oxygen Demand)
- Chloride [water, unspecified]: 0.0606088 kg; lognormal variance with pedigree 0.049425, pedigree (2,5,2,2,2)
  (same comment as for Acetone)
- DOC, Dissolved Organic Carbon [water, unspecified]: 0.00823779 kg; lognormal variance with pedigree 0.049425, pedigree (2,5,2,2,2)
  (same comment as for BOD5, Biological Oxygen Demand)
- Iron ion [water, surface water]: 0.0918818 kg; lognormal variance with pedigree 0.659425, pedigree (2,5,2,2,2)
  (same comment as for Acetone)
- Sodium I [water, unspecified]: 0.000356526 kg; lognormal variance with pedigree 0.049425, pedigree (2,5,2,2,2)
  (same comment as for Acetone)
- TOC, Total Organic Carbon [water, unspecified]: 0.00823779 kg; lognormal variance with pedigree 0.049425, pedigree (2,5,2,2,2)
  (same comment as for BOD5, Biological Oxygen Demand)
- Water [water, unspecified]: 0.0694181 m3; lognormal variance with pedigree 0.0894, pedigree (2,5,2,4,4)
  Calculated based on literature data published by the GENDORF Chemical Park. The factory produced an average of 2462760 tonnes of chemical substances (including intermediates) per year in the years 2015-2019. The amount of water released back to the environment consists of the sum of the amount of process water treated in the internal WWTP that is then released back to the environment and the amount of cooling water released back to the environment. The average ouput of the internal WWTP in the years 2015-2019 was 2628800 m3 and that of cooling water released back to the environment was 34408800 m3. This gives a yearly average of 37037600 m3 emissions of water to water. This equals 0.01504 m3/kg chemical produced.
  This value includes as well process emissions.
  Since this process comprises 9 reactions to produce the final product, the default value was scaled up. To produce 1 kg of output, 3.6 kg of intermediate products are necessary. The value was therefore scaled up with the factor 4.6.
  References:
  Chemiepark GENDORF, Umwelterklärung 2016, https://www.gendorf.de/Nachbarn/Umweltschutz/Industrie%20und%20Nachhaltigkeit
  Chemiepark GENDORF, Umwelterklärung 2017, https://www.gendorf.de/Nachbarn/Umweltschutz/Industrie%20und%20Nachhaltigkeit
  Chemiepark GENDORF, Umwelterklärung 2020, https://www.gendorf.de/Nachbarn/Umweltschutz/Industrie%20und%20Nachhaltigkeit

## Sampling procedure
Literature data and stoichiometric calculation. This inventory is partially based on a generic model of the production of chemicals. The data generated by this model have been improved with compound-specific data when available.
The model of the production of chemicals is using specific industry or literature data wherever possible and more generic data on chemical production processes to fill compound-specific data gaps when necessary. The basic principles of the model have been published in literature (Hischier, 2005). The model has been updated and extended with newly available data from the chemical industry.
In the model, unreacted fractions are treated in a waste treatment process, and emissions reported are after a waste treatment process that is included in the scope of this dataset. For volatile reactants, a small level of evaporation is assumed. Solvents and catalysts are mostly recycled in closed-loop systems within the scope of the dataset and reported flows are for losses from this system.
The main source of information for the values for heat, electricity, water (process and cooling), nitrogen, chemical factory is industry data from the GENDORF Chemical Park. The values are a 5-year average of data from 2015 to 2019 published by the GENDORF Chemical Park, which is based in Germany and produced an average of 2462760 tonnes of chemical substances in the years 2015-2019.

Reference(s):
Hischier, R. (2005) Establishing Life Cycle Inventories of Chemicals Based on Differing Data Availability (9 pp). The International Journal of Life Cycle Assessment, Volume 10, Issue 1, pp 59–67. 10.1065/lca2004.10.181.7
Chemiepark GENDORF, Umwelterklärung 2016, https://www.gendorf.de/Nachbarn/Umweltschutz/Industrie%20und%20Nachhaltigkeit
Chemiepark GENDORF, Umwelterklärung 2017, https://www.gendorf.de/Nachbarn/Umweltschutz/Industrie%20und%20Nachhaltigkeit
Chemiepark GENDORF, Umwelterklärung 2020, https://www.gendorf.de/Nachbarn/Umweltschutz/Industrie%20und%20Nachhaltigkeit
Unger T., (1996). Pesticide Synthesis Handbook, Noyes Publication.
Chinese Patent Office (2013), CN103242151B
Ackermann P., Margot P., Muller F., (2011): Fungicides, Agricultural, in Ullmann's Encyclopedia in Industrial Chemistry, Weinheim, Wiley-VCH.
Sauter H., Zeeh B., (2009): Plant Growth Regulators, in Ullmanns Encyclopedia of Industrial Chemistry, Weinheim, Wiley-VCH.
GESTIS Stoffdatenbank, Tebuconazole, last accessed 2021-02-22
