# thermo-mechanical pulp production

Dataset: EcoSpold 2, unit process
Geography: RoW
Time period: 1993-01-01 to 2023-12-31
Technology level: current
Classification: EcoSpold01Categories: paper & cardboard/pulps
Classification: ISIC rev.4 ecoinvent: 1701:Manufacture of pulp, paper and paperboard
Synonyms: wood-containing pulp
Tags: ConvertedDataset
Scenario: Business-as-Usual
System model: Allocation, cut-off by classification
Generated by: Roland Hischier
Published in: Hischier R. 2007
Database: ecoinvent
isCopyrightProtected: true
accessRestrictedTo: 1

## General comment
This dataset is a copy of the European dataset (thermo-mechanical pulp production, RER, 2000).
This dataset characterises the average production of mechanical pulp following a refiner process with thermal pre-treatment (TMP) in Europe. Bleaching has not been included because mechanical pulps cannot be brightened effectively by oxidative and reductive bleaching.
During mechanical defibration, lignin is plasticised and remains in the pulp. This makes mechanical pulp weaker but with higher light-scattering coefficients and opacity than chemical pulp (sulfate and sulfite pulp). Mechanical pulps are mainly used for short-life printing papers, hygienic paper and board.
PULP MARKET: Of the total pulp production in Europe the largest part is sulfate /kraft-pulp, making up about 70% of total pulp production. Thermo-mechanical pulp is a type of mechanical pulp, which makes up around 25-28% of total pulp production, of which in turn the largest part, about 85%, is thermo-mechanical pulp and the rest chemi-thermomechanical pulp. Only a part of pulp production is sold on the market, the majority is produced at integrated pulp mills which directly process it further into (paper-) products. For mechanical pulp the share of market pulp is small, much in 2016 was 9%, the other 92% is integrated pulp.
The SOURCES of information for this dataset are (1) the former Swiss life cycle inventories of packing materials of the Swiss Environmental Agency (BUWAL) (Habersatter et al., 1998), (2) a study from the Swiss Federal Laboratories for Materials Science and Technology (EMPA) comparing printed and electronic media (Reichart & Hischier, 2001), (3) a German inventory on graphical paper commissioned by the UBA (Tiedemann et al., 2000), (4) a report of the Swedish EPA about the Swedish pulp and paper industry (Naturvardsverket, 2001), (5) the European IPPC documentation for the paper and pulp industry, which also contains information on Best Available Techniques (BAT) and the description and quantification of the present situation of the pulp and paper industry (European Commission, 2000) and (6) the theoretical description of Patt et al. (1993).
Reference(s):
Habersatter K., Fecker I., Dall'Acqua S., Fawer M., Fallscheer F., Förster R., Maillefer C., Ménard M., Reusser L., Som C., Stahel U. and Zimmermann P. (1998) Ökoinventare für Verpackungen. BUWAL Schriftenreihe Umwelt Nr. 250. 2nd Edition. BUWAL, Bern.
Reichart I. and Hischier R. (2001) Vergleich der Umweltbelastungen bei Benut-zung elektronischer und gedruckter Medien. EMPA-Bericht Nr. 253. EMPA, St. Gallen.
Tiedemann et al., 2000. Tiedemann A., Böttcher Tiedemann C., Buschardt A., Georgi B., Giersberg G., Goosmann G., Gregor H.-D., Mehlhorn B., Modi A., Neitzel H., Oels H.-J., Schmitz S. and Suhr M. (2000) Ökobilanzen für graphische Papiere. Texte 22/00. Umweltbundesamt, Berlin.
Naturvardsverket, 2001. Naturvardsverket (2001) Skogsindustrins utsläpp - avfallsmängder och energiförbrukning 2000. Report 5154. Naturvardsverket (Swedish EPA), Stockholm.
European Commission, 2000. European Commission (2000) Integrated Pollution Prevention and Control (IPPC) - Reference Document on Best Available Techniques in the Pulp and Pa-per Industry. Institute for Prospective Technological Studies, Sevilla.
Patt R., Kordsachia O., Süttinger R., Ohtani Y., Hoesch J. F., Ehrler P., Eich-inger R., Holik H., Hamm U., Rohmann M. E., Mummenhoff P., Petermann E., Miller R. F., Frank D., Wilken R., Baumgarten H. L. and Rentrop G.-H. (1993) Paper and Pulp. In: Ullmann's Encyclopedia of Industrial Chemistry, Vol. A.18. VCH Publisher Inc.

## Included activities start
The activity starts with the transport of the wood to the pulp factory.

## Included activities end
The process includes transports to the pulp mill, raw material handling, pulping, drying, recovery cycles of chemicals and internal wastewater treatment. The activity ends when the thermo-mechanical pulp is ready to be sold.

## Geography
This dataset is a copy of the European dataset, it therefore represents the average thermo-mechanical pulp production in Europe. Data are sourced from various European providers, for example, in Switzerland and Germany.

## Technology
Modern average technology.

## Time period
Data gathered between 2000-2002.

## Parameters
- fraction, cooling water, cooling pond system, to air: 0.032 dimensionless; name fraction_CW_CP_to_air; lognormal variance with pedigree 0.0413, pedigree (2,3,1,3,1)
  Calculated based on literature value (Scown, C.D., 2011, Water Footprint of U.S. Transportation Fuels and supplying information of the article) (Vionnet, S., Quantis Water Database - Technical Report, 2012).
- fraction, cooling water, once-through system, to air: 0.004 dimensionless; name fraction_CW_OT_to_air; lognormal variance with pedigree 0.0413, pedigree (2,3,1,3,1)
  (same comment as for fraction, cooling water, cooling pond system, to air)
- fraction, cooling water, recirculating system, to air: 0.771 dimensionless; name fraction_CW_R_to_air; lognormal variance with pedigree 0.0413, pedigree (2,3,1,3,1)
  (same comment as for fraction, cooling water, cooling pond system, to air)
- fraction, cooling water, to air: 0.3875 dimensionless; name fraction_CW_to_air; = (0.5*fraction_CW_OT_to_air)+(0.5*fraction_CW_R_to_air); lognormal variance with pedigree 0.092025, pedigree (4,4,3,2,4)
  Calculated value based on literature value (see comments of the other parametres present in this dataset) and expert opinion. In the case when no industry/literature data are available about the type of cooling or directly fraction, cooling water, to air specific for the process a default assumption is applied. It is assumed that the once-through cooling system is used in 50% of all cases and recirculating system is used in another 50% of all cases.
- fraction, process water, to air: 0.231923 dimensionless; name fraction_PW_to_air; lognormal variance with pedigree 0.092025, pedigree (4,4,3,2,4)

## Reference product
- thermo-mechanical pulp: 1 kg; By-product classification allocatable product; CPC 32113: Mechanical wood pulp; semi-chemical wood pulp; pulps of fibrous cellulosic material other than wood; HS2017 470100: Wood pulp; mechanical wood pulp
  EcoSpold01Location=RER
  production volume 1.51764e9 kg; name apv; = 25419331000*0.09
    Caluclated value. The total amount of global thermo-mechanical pulp production in 2016, according to FAOSTAT, was 25400000 tonnes. No data was available on how much of the total global production is produced at integrated paper mills versus how much is traded on the market (market sulfate pulp). This dataset represents marekt thermo-mechanical pulp only. Therefore, it was assumed that the share of market mechanical pulp in total mechanical pulp production in Europe, 9% (CEPI, 2018), applies globally. 9% of 25400000 tonnes results in an annual production volume for thermo-mechanical market pulp of 2270000 tonnes.
    Reference(s):
    Confederation of European Paper Industries (CEPI), 2018, personal correspondence 4.7.2018
    FAO, 2018, FAOSTAT, Forestry Production and Trade, data retrieved from http://www.fao.org/faostat/en/#data/FO, 4.7.2018
  property carbon content, non-fossil 0.494
    C content of dry mass is 0.494 kgC/kg dry wood (ecoinvent v2.2 report 6_IX & ecoinvent v2.2 report 9). No other C containing products in the formulation of the pulp.
  property heating value, net 14.97 MJ
    LHV is calculated based on the Carbon content of the product. More details can be found on the respective documentation.
  property price 0.286 EUR2005
    Export prices for the World+ according to: http://faostat.fao.org/site/626/DesktopDefault.aspx?PageID=626#ancor downloaded 5 May 2009; calculated as export value divided by export volume.
  properties: carbon allocation 0.494 kg, carbon content 0.494, carbon content, fossil 0, dry mass 1 kg, water content 0, water in wet mass 0 kg, wet mass 1 kg

## Inputs from technosphere
- chemical, inorganic: 0.00453 kg; lognormal variance with pedigree 0.0432, pedigree (2,3,5,5,1)
  Average data from German LCA study
  EcoSpold01Location=GLO
  Uncertainty: average data from German LCA study
  properties: carbon content, fossil 0.003, dry mass 1 kg, wet mass 1 kg
  note on carbon content, fossil: This dataset is an unweighted average of 20 inorganic substances (listed in Tab 88.1, ecoinvent v2.2 report 8, part II), being part of the top100 chemicals included in this database. The C-content has also been calculated as an unweighted average of the C content of the substances composing this dataset.
- electricity, medium voltage: 0.0716499, 1.42926, 0.480226, 0.0219417, 0.0043916, 0.000942975, 0.147593 kWh (7 suppliers, which the file names only by identifier); sum of these 2.156 kWh; lognormal variance with pedigree 0.0432, pedigree (2,3,5,5,1)
  Average data from several LCA studies
  EcoSpold01Location=NORDEL
  Uncertainty: average data from several LCA studies
- heat, district or industrial, natural gas: 0.00100291, 0.0610321 MJ (2 suppliers, which the file names only by identifier); sum of these 0.062035 MJ; lognormal variance with pedigree 0.0432, pedigree (2,3,5,5,1)
  Average data from a recent newsprint LCA study
  EcoSpold01Location=RER
  Uncertainty: average data from a recent newsprint LCA study
  properties: heating value, net 1 MJ
- heat, district or industrial, other than natural gas: 0.117062, 5.42326e-5 MJ (2 suppliers, which the file names only by identifier); sum of these 0.117116 MJ; lognormal variance with pedigree 0.0432, pedigree (2,3,5,5,1)
  (same comment as for heat, district or industrial, natural gas)
  properties: heating value, net 1 MJ
- hydrogen peroxide, without water, in 50% solution state: 0.0286 kg; lognormal variance with pedigree 0.0432, pedigree (2,3,5,5,1)
  EcoSpold01Location=RER
  Average data from German LCA study
  Uncertainty: average data from German LCA study
  properties: dry mass 1 kg, heating value, net 7.13 MJ, wet mass 1 kg
- municipal solid waste: -1.00222e-6, -1.19009e-7, -7.40685e-7, -0.000565452, -8.32781e-8, -2.67308e-8, -6.04189e-8, -2.51526e-6 kg (8 suppliers, which the file names only by identifier); sum of these -0.00057 kg; lognormal variance with pedigree 0.0032, pedigree (2,3,1,5,1)
  Average swedish data from SE-EPA
  EcoSpold01Location=CH
  Uncertainty: average swedish data from SE-EPA
  production volume; = a_msw*apv
    Calculated from the production volume of thermo-mechanical pulp in proportion to the respective output amounts.
  properties: carbon content, fossil 0.171549, carbon content, non-fossil 0.261655, dry mass 0.771 kg, heating value, net 11.74 MJ, water content 0.297017, wet mass 1 kg
  note on carbon content, fossil: MSW composition in tab 4.1, ecoinvent v2.2 report 13_I. C content referred to 1 kg DM
  note on heating value, net: Value taken from the general comment of the treatment dataset.
- pulp factory: 5e-11 unit; lognormal variance with pedigree 0.448, pedigree (4,5,5,5,5)
  EcoSpold01Location=RER
  Assumption
  Uncertainty: assumption
- residual softwood, wet: 0.003044 m3; lognormal variance with pedigree 0.0432, pedigree (2,3,5,5,1)
  Average data from several LCA studies
  EcoSpold01Location=RER
  Uncertainty: average data from several LCA studies
  properties: carbon content, non-fossil 0.494, dry mass 450 kg, heating value, net 5962.7 MJ, water content 0.7, wet mass 765 kg
  note on carbon content, non-fossil: C content of dry mass is 0.494 kgC/kg dry wood (ecoinvent v2.2 report 9)
- scrap steel: -2.59e-5 kg; name a_ssteel; lognormal variance with pedigree 0.0032, pedigree (2,3,1,5,1)
  (same comment as for municipal solid waste)
  production volume; = a_ssteel*apv
    (same comment as for municipal solid waste)
  properties: dry mass 1 kg, wet mass 1 kg
- sodium hydroxide, without water, in 50% solution state: 0.0142 kg; lognormal variance with pedigree 0.0432, pedigree (2,3,5,5,1)
  (same comment as for hydrogen peroxide, without water, in 50% solution state)
  properties: dry mass 1 kg, heating value, net 3.03 MJ, wet mass 1 kg
- sodium silicate, spray powder, 80%: 0.0164 kg; lognormal variance with pedigree 0.0432, pedigree (2,3,5,5,1)
  Average data from German LCA study
  EcoSpold01Location=RER
  Uncertainty: average data from German LCA study
  properties: dry mass 1 kg, wet mass 1 kg
- waste graphical paper: -1.64269e-7, -1.43638e-8, -5.78784e-8, -5.93574e-7, -1.07573e-6, -7.1987e-5, -1.07139e-7 kg (7 suppliers, which the file names only by identifier); sum of these -7.4e-5 kg; lognormal variance with pedigree 0.0032, pedigree (2,3,1,5,1)
  EcoSpold01Location=CH
  Average swedish data from SE-EPA
  Uncertainty: average swedish data from SE-EPA
  production volume; = a_wgp*apv
    (same comment as for municipal solid waste)
  properties: carbon content, non-fossil 0.454955, dry mass 0.888 kg, heating value, net 14.12 MJ, water content 0.126126, wet mass 1 kg
- waste plastic, mixture: -6.17547e-8, -5.86419e-8, -0.000230456, -2.2377e-6, -1.49514e-7, -2.49482e-8, -1.13075e-8 kg (7 suppliers, which the file names only by identifier); sum of these -0.000233 kg; lognormal variance with pedigree 0.0032, pedigree (2,3,1,5,1)
  (same comment as for municipal solid waste)
  production volume; = a_wpm*apv
    (same comment as for municipal solid waste)
  properties: carbon content, fossil 0.747344, dry mass 0.847 kg, heating value, net 30.79 MJ, water content 0.180638, wet mass 1 kg
  note on carbon content, fossil: C content in 1 kg DM was calculated using data in Tab A.2, ecoinvent v2.2 report 13_I
- waste textile, soiled: -2.41e-5 kg; name a_wtex; lognormal variance with pedigree 0.0032, pedigree (2,3,1,5,1)
  (same comment as for municipal solid waste)
  production volume; = a_wtex*apv
    (same comment as for municipal solid waste)
  properties: carbon content, non-fossil 0.570519, dry mass 0.75 kg, heating value, net 14.45 MJ, water content 0.333333, wet mass 1 kg
  note on carbon content, non-fossil: C content of 1 kg DM was calculated after data in Tab A.4, ecoinvent v2.2 report 13_I,
- waste wood, untreated: -0.0166415, -0.000433183, -0.322806, -0.00592499, -0.00251413, -0.00397463, -0.0477186 kg (7 suppliers, which the file names only by identifier); sum of these -0.400013 kg; = 1.3E-05 + 0.4; lognormal variance with pedigree 0.0032, pedigree (2,3,1,5,1)
  Average swedish data from SE-EPA (1.3E-05) + 0.4 to balance wood input.
  EcoSpold01Location=CH
  Uncertainty: average swedish data from SE-EPA
  production volume; = a_ww*apv
    (same comment as for municipal solid waste)
  properties: carbon content, non-fossil 0.48632, dry mass 0.8 kg, heating value, net 13.99 MJ, water content 0.25, wet mass 1 kg
  note on carbon content, non-fossil: Tab A.4, ecoinvent v2.2 report 13_I. C content has been referred to 1 kg DM,
- wood ash mixture, pure: -0.00225 kg; name a_woodash; lognormal variance with pedigree 0.0032, pedigree (2,3,1,5,1)
  (same comment as for waste graphical paper)
  production volume; = a_woodash*apv
    (same comment as for municipal solid waste)
  properties: carbon content, non-fossil 0.012, dry mass 1 kg, wet mass 1 kg

## Inputs from nature
- Water, cooling, unspecified natural origin [natural resource, in water]: 0.0052 m3; name water_cooling_UNO_input; source Byers, W. 2003; lognormal variance with pedigree 0.0532, pedigree (2,3,5,5,1)
  Calculated based on literature (Byers, W., 2003, Industrial Water Management; Fibria, 2010, Sustainability Report_pulp from eucalyptus), (Vionnet, S., Quantis Water Database - Technical Report, 2012). It includes the main processes: wood washing and screening, evaporation, recausticizing, bleach plant chemical preparation and pulp dryer.
  property carbon content, fossil 0.0104329; name C_content_fossil
  property carbon content, non-fossil 0; name C_content_non_fossil
  property dry mass 0.1101 kg; name DM
  property water content 9081.65; name water_content
  property water in wet mass 999.89 kg; name WWM
  property wet mass 1000 kg; name WM
- Water, unspecified natural origin [natural resource, in water]: 0.0078 m3; name water_UNO_input; source Byers, W. 2003; lognormal variance with pedigree 0.0546, pedigree (3,3,5,5,1)
  Average swedish data from SE-EPA
  Calculated based on literature (Byers, W., 2003, Industrial Water Management; Fibria, 2010, Sustainability Report_pulp from eucalyptus), (Vionnet, S., Quantis Water Database - Technical Report, 2012). It includes the main processes: wood washing and screening, evaporation, recausticizing, bleach plant chemical preparation and pulp dryer.
  Uncertainty: average swedish data from SE-EPA

## Emissions to nature
- Nitrogen oxides [air, urban air close to ground]: 0.00155 kg; lognormal variance with pedigree 0.0832, pedigree (2,3,5,5,1)
  Average swedish data from SE-EPA
  Uncertainty: average swedish data from SE-EPA
- Water [air, unspecified]: 0.003824 m3; name water_to_air_unspecified; lognormal variance with pedigree 0.0827, pedigree (2,2,5,5,1)
  Calculated value based on literature values and expert opinion. See comments in the parametres' comment field.
  property fraction, origin: fresh water 0; name fraction_origin_fresh_water
  property fraction, origin: salt water 0; name fraction_origin_salt_water
  property fraction, origin: unspecified 1; name fraction_origin_unspecified
- BOD5, Biological Oxygen Demand [water, surface water]: 0.0009 kg; lognormal variance with pedigree 0.0832, pedigree (2,3,5,5,1)
  Average data from several LCA studies
  Uncertainty: average data from several LCA studies
- COD, Chemical Oxygen Demand [water, surface water]: 0.00437 kg; lognormal variance with pedigree 0.0832, pedigree (2,3,5,5,1)
  Average data from several LCA studies
  Uncertainty: average data from several LCA studies
- DOC, Dissolved Organic Carbon [water, surface water]: 0.00158 kg; lognormal variance with pedigree 0.0926, pedigree (1,3,5,5,1)
  Calculated as equal to TOC.
  Uncertainty: data from former Swiss LCA of packaging
- Nitrogen [water, surface water]: 6e-5 kg; lognormal variance with pedigree 0.0832, pedigree (2,3,5,5,1)
  Average data from several LCA studies
  Uncertainty: average data from several LCA studies
- Phosphorus [water, surface water]: 1e-5 kg; lognormal variance with pedigree 0.0832, pedigree (2,3,5,5,1)
  Average data from several LCA studies
  Uncertainty: average data from several LCA studies
- Suspended solids, unspecified [water, surface water]: 0.00124 kg; lognormal variance with pedigree 0.0832, pedigree (2,3,5,5,1)
  Average data from several LCA studies
  Uncertainty: average data from several LCA studies
- TOC, Total Organic Carbon [water, surface water]: 0.00158 kg; lognormal variance with pedigree 0.0926, pedigree (1,3,5,5,1)
  Data from former Swiss LCA of packaging
  Uncertainty: data from former Swiss LCA of packaging
- Water [water, unspecified]: 0.009176 m3; name water_to_water_unspecified; lognormal variance with pedigree 0.0827, pedigree (2,2,5,5,1)
  (same comment as for Water)
  property fraction, origin: fresh water 0; name fraction_origin_fresh_water_Ww
  property fraction, origin: salt water 0; name fraction_origin_salt_water_Ww
  property fraction, origin: unspecified 1; name fraction_origin_unspecified_Ww

## Sampling procedure
Data were collected from literature and industry data.

## Extrapolations
This dataset is a copy of the European dataset “thermo-mechanical pulp production, RER, 2000”. The uncertainty has been adjusted accordingly.

## Review by Hans-Jörg Althaus 2003-08-06
Passed
