# fish curing, small fish

Dataset: EcoSpold 2, unit process
Geography: RoW
Time period: 2010-01-01 to 2023-12-31
Technology level: current
Classification: ISIC rev.4 ecoinvent: 1020:Processing and preserving of fish, crustaceans and molluscs
Scenario: Business-as-Usual
System model: Allocation, cut-off by classification
Generated by: Angel Avadí
Published in: Avadí, A. 2018
Database: ecoinvent
isCopyrightProtected: true
accessRestrictedTo: 1

## General comment
The activity represents the salting and curing of small fish in a curing plant. The functional unit is 1000 kg of raw material processed, excluding residues. The total raw material demand of this activity is 1000 kg of preprocessed raw material + the amount of residues generated by preprocessing (gutting, heading, tailing, peeling, filleting, etc). The life cycle inventories were produced based on a sample of 1 Peruvian plant (processing capacity: 2688 t/y) and data from other industry representatives. The data applies to small fish such as small pelagics (anchovies, herrings, sardines, mackerels) and small bottom feeders (grouppers, eals, small cods, haddock, bass, snappers). This activity can be used to model fish processing in other geographies.
Users must use this service activity in combination with an activity providing the raw material (fish).
System boundaries of fish processing for Direct Human Consumption (DHC) and relations between activities
Detailed system boundaries of DCH activities in Peru, including provision of fish from dedicated fleet

## Included activities start
From delivery of consumables to the plant, through its Use phase (production), including all upstream activities (e.g. provision of infrastructure, fuels, electricity, chemicals and packaging materials).

## Included activities end
Excludes fishery activities and provision of raw material (fish)

## Geography
Representative of Peru.

## Technology
Small pelagics curing activities of Peruvian fish canning plants, per t of processing capacity. Plants have a lifespan of 30 years.
Process diagram of small fish curing

## Time period
Production figures represent the period 2010-2012. Valid as of 2017.

## Reference product
- fish curing, small fish: 1 kg; name production; source Angel Avadí 2014; By-product classification allocatable product; CPC 21242: Fish, otherwise prepared or preserved; HS2017 160416: Fish preparations; anchovies, prepared or preserved, whole or in pieces (but not minced)
  Amount of raw material processed, excluding residues. The total raw material demand of this activity is 1000 kg of preprocessed raw material + the amount of residues generated by preprocessing (gutting, heading, tailing, peeling, filleting, etc).
  production volume 2.13687e8 kg; name prod_vol
    Global production of cured fish assumed to be 1 order of magnitude that of Peru (Peru produced 23 743 t of cured fish in 2013, ~8 000 t of which was anchovies)
  property price 1.43564 EUR2005
    Calculated based on inputs: The price of the product has been calculated as a sum of the values of the material and energy inputs for this product. This value is therefore a rough estimation. It may underestimate the real price since there are additional expenses when producing any product. These expences can include for example labour costs, treatment of waste materials and profit for the producer. Please consider carefully whether this level of data quality is acceptable for your application.
  properties: carbon allocation 0 kg, carbon content 0

## Inputs from technosphere
- aluminium, cast alloy: 0.0798 kg; name Al; source Angel Avadí 2014; triangular min 0.0305187, mostLikely 0.0791225, max 0.129759, pedigree (2,3,4,5,1)
  Aluminium cans
  Uncertainty: Data from 1 plant, assumptions for larger plants
  properties: dry mass 1 kg, wet mass 1 kg
- electricity, medium voltage: 0.000397137 kWh; source Angel Avadí 2014; triangular min 0.000357152, mostLikely 0.000397137, max 0.000437122, pedigree (2,3,4,5,1)
  Electricity use along the whole process, including processing, maturing and cold storage
  Uncertainty: Data from 1 plant, assumptions for larger plants
- electricity, medium voltage: 1.77193e-5 kWh; source Angel Avadí 2014; triangular min 1.59353e-5, mostLikely 1.77193e-5, max 1.95034e-5, pedigree (2,3,4,5,1)
  (same comment as for electricity, medium voltage)
- electricity, medium voltage: 0.000412906 kWh; source Angel Avadí 2014; triangular min 0.000371334, mostLikely 0.000412906, max 0.000454479, pedigree (2,3,4,5,1)
  (same comment as for electricity, medium voltage)
- electricity, medium voltage: 0.000209343 kWh; source Angel Avadí 2014; triangular min 0.000188266, mostLikely 0.000209343, max 0.00023042, pedigree (2,3,4,5,1)
  (same comment as for electricity, medium voltage)
- electricity, medium voltage: 0.000256344 kWh; source Angel Avadí 2014; triangular min 0.000230534, mostLikely 0.000256344, max 0.000282153, pedigree (2,3,4,5,1)
  (same comment as for electricity, medium voltage)
- electricity, medium voltage: 0.00014835 kWh; source Angel Avadí 2014; triangular min 0.000133414, mostLikely 0.00014835, max 0.000163286, pedigree (2,3,4,5,1)
  (same comment as for electricity, medium voltage)
- electricity, medium voltage: 0.0163998 kWh; source Angel Avadí 2014; triangular min 0.0147486, mostLikely 0.0163998, max 0.0180509, pedigree (2,3,4,5,1)
  (same comment as for electricity, medium voltage)
- electricity, medium voltage: 0.327138 kWh; source Angel Avadí 2014; triangular min 0.294201, mostLikely 0.327138, max 0.360076, pedigree (2,3,4,5,1)
  (same comment as for electricity, medium voltage)
- electricity, medium voltage: 3.67886e-5 kWh; source Angel Avadí 2014; triangular min 3.30846e-5, mostLikely 3.67886e-5, max 4.04926e-5, pedigree (2,3,4,5,1)
  (same comment as for electricity, medium voltage)
- electricity, medium voltage: 0.109918 kWh; source Angel Avadí 2014; triangular min 0.0988507, mostLikely 0.109918, max 0.120984, pedigree (2,3,4,5,1)
  (same comment as for electricity, medium voltage)
- electricity, medium voltage: 0.00163314 kWh; source Angel Avadí 2014; triangular min 0.00146871, mostLikely 0.00163314, max 0.00179757, pedigree (2,3,4,5,1)
  (same comment as for electricity, medium voltage)
- electricity, medium voltage: 0.00502217 kWh; source Angel Avadí 2014; triangular min 0.00451652, mostLikely 0.00502217, max 0.00552781, pedigree (2,3,4,5,1)
  (same comment as for electricity, medium voltage)
- electricity, medium voltage: 0.000553769 kWh; source Angel Avadí 2014; triangular min 0.000498014, mostLikely 0.000553769, max 0.000609524, pedigree (2,3,4,5,1)
  (same comment as for electricity, medium voltage)
- electricity, medium voltage: 0.000115874 kWh; source Angel Avadí 2014; triangular min 0.000104207, mostLikely 0.000115874, max 0.00012754, pedigree (2,3,4,5,1)
  (same comment as for electricity, medium voltage)
- electricity, medium voltage: 0.0708137 kWh; source Angel Avadí 2014; triangular min 0.063684, mostLikely 0.0708137, max 0.0779434, pedigree (2,3,4,5,1)
  (same comment as for electricity, medium voltage)
- electricity, medium voltage: 0.00100518 kWh; source Angel Avadí 2014; triangular min 0.000903977, mostLikely 0.00100518, max 0.00110639, pedigree (2,3,4,5,1)
  (same comment as for electricity, medium voltage)
- electricity, medium voltage: 0.000439572 kWh; source Angel Avadí 2014; triangular min 0.000395315, mostLikely 0.000439572, max 0.000483829, pedigree (2,3,4,5,1)
  (same comment as for electricity, medium voltage)
- electricity, medium voltage: 0.00173863 kWh; source Angel Avadí 2014; triangular min 0.00156358, mostLikely 0.00173863, max 0.00191368, pedigree (2,3,4,5,1)
  (same comment as for electricity, medium voltage)
- electricity, medium voltage: 0.000222172 kWh; source Angel Avadí 2014; triangular min 0.000199803, mostLikely 0.000222172, max 0.000244541, pedigree (2,3,4,5,1)
  (same comment as for electricity, medium voltage)
- electricity, medium voltage: 0.000215835 kWh; source Angel Avadí 2014; triangular min 0.000194104, mostLikely 0.000215835, max 0.000237566, pedigree (2,3,4,5,1)
  (same comment as for electricity, medium voltage)
- electricity, medium voltage: 0.00524394 kWh; source Angel Avadí 2014; triangular min 0.00471596, mostLikely 0.00524394, max 0.00577191, pedigree (2,3,4,5,1)
  (same comment as for electricity, medium voltage)
- electricity, medium voltage: 0.000251698 kWh; source Angel Avadí 2014; triangular min 0.000226357, mostLikely 0.000251698, max 0.00027704, pedigree (2,3,4,5,1)
  (same comment as for electricity, medium voltage)
- electricity, medium voltage: 8.81249e-5 kWh; source Angel Avadí 2014; triangular min 7.92522e-5, mostLikely 8.81249e-5, max 9.69975e-5, pedigree (2,3,4,5,1)
  (same comment as for electricity, medium voltage)
- electricity, medium voltage: 0.0228431 kWh; source Angel Avadí 2014; triangular min 0.0205432, mostLikely 0.0228431, max 0.025143, pedigree (2,3,4,5,1)
  (same comment as for electricity, medium voltage)
- electricity, medium voltage: 0.000314571 kWh; source Angel Avadí 2014; triangular min 0.000282899, mostLikely 0.000314571, max 0.000346243, pedigree (2,3,4,5,1)
  (same comment as for electricity, medium voltage)
- electricity, medium voltage: 0.000288717 kWh; source Angel Avadí 2014; triangular min 0.000259649, mostLikely 0.000288717, max 0.000317786, pedigree (2,3,4,5,1)
  (same comment as for electricity, medium voltage)
- electricity, medium voltage: 1.90846e-5 kWh; source Angel Avadí 2014; triangular min 1.71631e-5, mostLikely 1.90846e-5, max 2.10061e-5, pedigree (2,3,4,5,1)
  (same comment as for electricity, medium voltage)
- electricity, medium voltage: 0.00161873 kWh; source Angel Avadí 2014; triangular min 0.00145575, mostLikely 0.00161873, max 0.00178171, pedigree (2,3,4,5,1)
  (same comment as for electricity, medium voltage)
- electricity, medium voltage: 0.00297665 kWh; source Angel Avadí 2014; triangular min 0.00267695, mostLikely 0.00297665, max 0.00327635, pedigree (2,3,4,5,1)
  (same comment as for electricity, medium voltage)
- electricity, medium voltage: 0.0154523 kWh; source Angel Avadí 2014; triangular min 0.0138966, mostLikely 0.0154523, max 0.0170081, pedigree (2,3,4,5,1)
  (same comment as for electricity, medium voltage)
- electricity, medium voltage: 0.000208718 kWh; source Angel Avadí 2014; triangular min 0.000187704, mostLikely 0.000208718, max 0.000229733, pedigree (2,3,4,5,1)
  (same comment as for electricity, medium voltage)
- extrusion, plastic film: 0.00096 kg; = plastic_sheets; source Angel Avadí 2014
  Packaging plastic
- fish curing plant: 5.45661e-8 unit; = ((production+residues)/1000)/(capacity*lifetime); source Angel Avadí 2014
  One unit of plant represents the installed capacity required to process 1 t of raw material
  property capacity [kg] 1909 kg; name capacity
  property lifetime 30 year; name lifetime
- fish residues: -2.125 kg; name residues; source Angel Avadí 2014; triangular min -3.55024, mostLikely -1.65589, max -1.16887, pedigree (2,3,1,5,1)
  Residues from fish processing, raw or cooked
  Uncertainty: Data from 1 plant, assumptions for larger plants
  production volume; = prod_vol * residues / production
    Calculated from production volume of reference product using the relative outputs.
  property ash content 0.015 kg; name residues_ash
  property carbon content, non-fossil 0.47385; name residues_C_content_non_fossil; = (1-residues_protein-residues_fat_content-residues_ash)*0.444+residues_protein*0.535+residues_fat_content*0.774
  property dry mass 0.241111 kg; name residues_DM
  property energy content 4.01 MJ; name residues_energy_content
  property fat content 0.061; name residues_fat_content
  property protein content 0.18; name residues_protein
  property water content 0.758889; name residues_water_content
  property water in wet mass 0.182977 kg; name residues_WWM
  property wet mass 0.424088 kg; name residues_WM
  properties: price 0.062025 EUR2005
  note on ash content: Ash content of fish is between 1-2% of the edible portion, http://www.fao.org/wairdocs/tan/x5916e/x5916e01.htm
  note on carbon content, non-fossil: Calculated from C_content = polysaccharids*0.444+protein*0.535+lipids*0.774 and polysaccharids = 1-(protein+lipids+ash)
  note on energy content: Average of 49 fish species, http://www.fao.org/wairdocs/tan/x5916e/x5916e01.htm
- heat, district or industrial, natural gas: 1.076 MJ; source Angel Avadí 2014; triangular min 0.9687, mostLikely 1.07567, max 1.18363, pedigree (2,3,4,5,1)
  Industrial heat, for sterilisation
  Uncertainty: Data from 1 plant, assumptions for larger plants
  properties: heating value, net 1 MJ
- metal working, average for chromium steel product manufacturing: 0.02938 kg; = tinplate_can; source Angel Avadí 2014
  Tinplate can
- nitrogen, liquid: 0.000219695 kg; source Angel Avadí 2014; triangular min 0.000197726, mostLikely 0.000219695, max 0.000241665, pedigree (2,3,4,5,1)
  Nitrogen for process
  Uncertainty: Data from 1 plant, assumptions for larger plants
  properties: dry mass 1 kg, wet mass 1 kg
- nitrogen, liquid: 6.03049e-5 kg; source Angel Avadí 2014; triangular min 5.42744e-5, mostLikely 6.03049e-5, max 6.63353e-5, pedigree (2,3,4,5,1)
  Nitrogen for process
  Uncertainty: Data from 1 plant, assumptions for larger plants
- packaging film, low density polyethylene: 0.00433 kg; source Angel Avadí 2014; triangular min 0.00400459, mostLikely 0.0043134, max 0.00467202, pedigree (2,3,4,5,1)
  Plastic bags
  Uncertainty: Data from 1 plant, assumptions for larger plants
  properties: carbon content, fossil 0.857143, dry mass 1 kg, heating value, net 42.47 MJ, wet mass 1 kg
- packaging glass, white: 0.21 kg; name glass; source Angel Avadí 2014; triangular min 0.12859, mostLikely 0.194273, max 0.307137, pedigree (2,3,4,5,1)
  Glass containers
  Uncertainty: Data from 1 plant, assumptions for larger plants
  properties: dry mass 1 kg, wet mass 1 kg
- polyethylene terephthalate, granulate, amorphous: 0.02839 kg; name plastic_barrels; source Angel Avadí 2014; triangular min 0.02555, mostLikely 0.02839, max 0.03123, pedigree (2,3,4,5,1)
  Plastic barrels
  Uncertainty: Data from 1 plant, assumptions for larger plants
  properties: carbon content, fossil 0.625, dry mass 1 kg, heating value, net 22.95 MJ, wet mass 1 kg
- polyethylene, high density, granulate: 0.00096 kg; name plastic_sheets; source Angel Avadí 2014; triangular min 0.00088692, mostLikely 0.000956678, max 0.0010364, pedigree (2,3,4,5,1)
  Packaging plastic
  Uncertainty: Data from 1 plant, assumptions for larger plants
  properties: carbon content, fossil 0.857143, dry mass 1 kg, heating value, net 42.47 MJ, wet mass 1 kg
  note on carbon content, fossil: Polyethylene is formed out of a huge amount of ethylene monomers (C2H4) (ecoinvent v2.2 report 11_II). MW=28 g/mol
- scrap aluminium: -0.0532992, -0.0253132, -0.00118764 kg (3 suppliers, which the file names only by identifier); sum of these -0.0798 kg; = Al; source Avadí, A. 2018
  Waste aluminium cans
  production volume; = prod_vol * (BP_amount_4 / production)
    Calculated from production volume of reference product using the relative outputs.
  properties: dry mass 1 kg, wet mass 1 kg
- scrap tin sheet: -1.4091e-13, -0.451507, -0.00682111 kg (3 suppliers, which the file names only by identifier); sum of these -0.458328 kg; = tinplate_can*15.6; source Avadí, A. 2018
  Waste tinplate cans, area of sheets times weight of a sheet
  production volume; = prod_vol * (BP_amount_1 / production)
    Calculated from production volume of reference product using the relative outputs.
  properties: dry mass 1 kg, wet mass 1 kg
- sheet rolling, aluminium: 0.0798 kg; = Al; source Angel Avadí 2014
  Aluminium cans
- sodium chloride, powder: 1.92 kg; source Angel Avadí 2014; triangular min 1.728, mostLikely 1.92, max 2.112, pedigree (2,3,4,5,1)
  Salt for brine and fish salting
  Uncertainty: Data from 1 plant, assumptions for larger plants
  properties: dry mass 1 kg, wet mass 1 kg
- thermoforming of plastic sheets: 0.02839 kg; = plastic_barrels; source Angel Avadí 2014
  Plastic barrels
- tin plated chromium steel sheet, 2 mm: 0.02938 m2; name tinplate_can; source Angel Avadí 2014; triangular min 0.0161237, mostLikely 0.0296627, max 0.0423536, pedigree (2,3,4,5,1)
  Tinplate can
  Uncertainty: Data from 1 plant, assumptions for larger plants
  properties: dry mass 15.6365 kg, wet mass 15.6365 kg
- vegetable oil, refined: 0.73 kg; source Angel Avadí 2014; triangular min 0.685504, mostLikely 0.732676, max 0.771819, pedigree (2,3,4,5,1)
  Oil for canned fish
  Uncertainty: Data from 1 plant, assumptions for larger plants
  properties: carbon content, non-fossil 0.768, dry mass 1 kg, heating value, net 38.4 MJ, wet mass 1 kg
  note on heating value, net: Values is approximated from HHV from "vegetable oil, crude". Source: Radovanovic,M.; Zivanovic,T.; Stojiljkovic,D.; Jovanovic,V.; Jerinic,N.; Knezevic,S. et.al. Utilization of sunflower husk as a fuel for industrial boilers - 20 years experience. Proc. 5th Eur. Conf. on Industrial Furnaces&Boilers 2000,vol.2,p.221-233. Available at: https://phyllis.nl/Biomass/View/2152
- waste packaging glass, unsorted: -0.21 kg; name BP_amount_3; = glass; source Avadí, A. 2018
  Waste packaging glass
  production volume; = prod_vol * (BP_amount_3 / production)
    Calculated from production volume of reference product using the relative outputs.
  properties: price 0.04 EUR2005
- waste polyethylene, for recycling, unsorted: -0.02935 kg; name BP_amount_2; = plastic_sheets+plastic_barrels; source Avadí, A. 2018
  Waste PE from plastic sheet bags (packaging)
  production volume; = prod_vol * (BP_amount_2 / production)
    Calculated from production volume of reference product using the relative outputs.
  properties: heating value, net 42.47 MJ, price 0.0315 EUR2005
- wastewater from vegetable oil refinery: -0.0079744 m3; name BP_amount_5; = (water*0.8)/1000; source Avadí, A. 2018
  Proxy for wastewater from fish processing plant. Asumed 20% of the water is either incorporated into the product or lost
  production volume; = prod_vol * (BP_amount_5 / production)
    Calculated from production volume of reference product using the relative outputs.
  properties: carbon content, non-fossil 0.8, dry mass 0.871801 kg, water content 1146.05, wet mass 1000 kg
  note on carbon content, non-fossil: Estimated load for fish processing plant cleansing wastewater. The loading of fish processing wastewater is mainly organic (http://www.dfo-mpo.gc.ca/Library/273700.pdf)
- water, completely softened: 3.2632 kg; source Angel Avadí 2014; triangular min 2.93691, mostLikely 3.26331, max 3.58938, pedigree (2,3,4,5,1)
  Soft water for process
  Uncertainty: Data from 1 plant, assumptions for larger plants
  properties: wet mass 1 kg
- water, completely softened: 4.35934 kg; source Angel Avadí 2014; triangular min 3.92345, mostLikely 4.35949, max 4.79509, pedigree (2,3,4,5,1)
  Soft water for process
  Uncertainty: Data from 1 plant, assumptions for larger plants
- water, completely softened: 2.34546 kg; source Angel Avadí 2014; triangular min 2.11094, mostLikely 2.34554, max 2.5799, pedigree (2,3,4,5,1)
  Soft water for process
  Uncertainty: Data from 1 plant, assumptions for larger plants

## Emissions to nature
- Nitrogen [water, unspecified]: 0.01585 kg; source Angel Avadí 2014; triangular min 0.014263, mostLikely 0.0158533, max 0.0174337, pedigree (2,3,4,5,1)
  Emissions to water from process waters
  Uncertainty: Data from 1 plant, assumptions for larger plants
- Phosphorus [water, unspecified]: 0.00329 kg; source Angel Avadí 2014; triangular min 0.00296, mostLikely 0.00329, max 0.00362, pedigree (2,3,4,5,1)
  (same comment as for Nitrogen)

## Sampling procedure
Data from 1 curing plant, opperated by one of the largest fish processing companies in the country. This plant is representative of the current technology and managemen.
As of 2017 there were 73 active fish curing plants in Peru, with an aggregated processing capacity of 139 300 t/y.

## Extrapolations
Data from anchovies curing were assumed to represent the curing of other fish.
