# monoammonium phosphate production

Dataset: EcoSpold 2, unit process
Geography: RoW
Time period: 2011-01-01 to 2023-12-31
Technology level: current
Classification: ISIC rev.4 ecoinvent: 2012:Manufacture of fertilizers and nitrogen compounds
Synonyms: MAP, Ammonium dihydrogen phosphate, ADP
Scenario: Business-as-Usual
System model: Allocation, cut-off by classification
Generated by: Anna Kounina
Database: ecoinvent
isCopyrightProtected: true
accessRestrictedTo: 1

## General comment
This dataset is a weighted average from the respective regional datasets.
This dataset represents the production of 1 kg of monoammonium phosphate (MAP) with 8.4% N and 52% P2O5. Monommonium phosphate is an intermediate used to produce compound fertilisers, but is also used directly. MAP is produced with ammonia, phosphate rock and energy. The input and energy requirements are modeled based on Davis & Hagelund (1999).
The main data sources for this dataset is Fertilizers Europe (2014). Additional data sources are listed as follows.
References:
Fertilizers Europe (2000): Best Available Techniques for Pollution Prevention and Control in the European Fertilizer Industry. Booklet No. 1 of 8: Production of Ammonia. Fertilizers Europe, Brussels.
Kongshaug G. (1998): Energy Consumption and Greenhouse Gas Emissions in Fertilizer Production. IFA 20th July 1998
Davies J., Haglund C. (1999): Life Cycle Inventory of Fertiliser Production. SIK-Report No 654 1999. Chalmers University of Technology, Sweden.
Fertilizers Europe (2000): Best Available Techniques for Pollution Prevention and Control in the European Fertilizer Industry. Booklet No. 2 of 8: Production of Nitric Acid. Fertilizers Europe, Brussels.
Patyk R., Reinhardt, G.A. (1997): Düngemittel - Energie- und Stoffstrombilanzen. Vieweg Verlag, Braunschweig.
Fertilizers Europe (2014): Average Emissions Year 2011. Fertilizers Europe Environmental report (internal).
Fertilizers Europe (2016): Average Emissions Year 2014. Fertilizers Europe Environmental report (internal). Used for updated energy and GHG emission in Carbon Footprint Calculator
Althaus H.-J., Chudacoff M., Hischier R., Jungbluth N., Osses M. and Primas A. (2007) Life Cycle Inventories of Chemicals. ecoinvent report No. 8, v2.0. EMPA Dübendorf, Swiss Centre for Life Cycle Inventories, Dübendorf, CH.

## Included activities start
The activity includes all the raw and processed materials necessary to produce this product. Liquid ammonia, phosphate rock, steam and electricity are included. Direct emissions include ammonia to air.

## Included activities end
The activity ends with the final product being ready for transportation at the production site.

## Geography
This dataset is a weighted average built from the following geographies: CN, RNA, RER.

## Technology
Average techlogy from the regional counterparts as given in the geography comment.

## Time period
Primary data were collected on fertiliser production for the year 2011. These data were based on annual average data for the year 2011.

## Reference product
- monoammonium phosphate: 1 kg; By-product classification allocatable product; CPC 34643: Monoammonium phosphate; HS2017 310540: Fertilizers, mineral or chemical; ammonium dihydrogenorthophosphate (monoammonium phosphate) and mixtures t[...]; CAS 7722-76-1
  production volume 7.2757e9 kg
    Value in kg/y. International Fertilizers Association (2014).
  property carbon content, fossil 0
    Carbon content, fossil is calculated based on the chemical formula of the substance.
  property nitrogen content 0.084
    Nitrogen content (on a dry matter basis) of monoammonium phosphate is calculated from the molecular formula of the nutrient present in the substance.
  property phosphorus content 0.226939
    Phosphorus content (on a dry matter basis) of monoammonium phosphate is calculated from the molecular formula of the nutrient present in the substance.
  property price 0.418169 EUR2005
    Calculated based on inputs: The price of the product has been calculated as a sum of the values of the material and energy inputs for this product. This value is therefore a rough estimation. It may underestimate the real price since there are additional expenses when producing any product. These expences can include for example labour costs, treatment of waste materials and profit for the producer. Please consider carefully whether this level of data quality is acceptable for your application.
  properties: carbon allocation 0 kg, carbon content 0, carbon content, non-fossil 0, dry mass 1 kg, water content 0, water in wet mass 0 kg, wet mass 1 kg

## Inputs from technosphere
- ammonia, anhydrous, liquid: 0.00389105, 0.00755333, 0.0837238, 0.00353906, 0.00079167, 0.00250109 kg (6 suppliers, which the file names only by identifier); sum of these 0.102 kg; lognormal variance with pedigree 0.0466, pedigree (3,4,5,5,1)
  This flow is weighted averages using the exchanges in the corresponding regional data.
  properties: dry mass 1 kg, hydrogen content 0.177547, nitrogen content 0.822453, wet mass 1 kg
  note on hydrogen content: Hydrogen content (on a dry matter basis) of ammonia, anhydrous, liquid is calculated from the molecular formula of the substance (H3N).
  note on nitrogen content: Nitrogen content (on a dry matter basis) of ammonia, anhydrous, liquid is calculated from the molecular formula of the substance (H3N).
- chemical factory, organics: 5.13909e-10 unit; lognormal variance with pedigree 0.346, pedigree (3,4,5,5,1)
  This flow is weighted averages using the exchanges in the corresponding regional data.
- electricity, low voltage: 0.0049464, 0.0267647, 0.00104016, 0.000404422, 0.00672889, 0.000405805, 0.00138685, 0.000554133, 0.000190959, 0.000489384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 kWh (44 suppliers, which the file names only by identifier); sum of these 0.231111 kWh; lognormal variance with pedigree 0.0466, pedigree (3,4,5,5,1)
  This flow is weighted averages using the exchanges in the corresponding regional data.
- phosphate rock, beneficiated: 0.0213561, 1.60864 kg (2 suppliers, which the file names only by identifier); sum of these 1.63 kg; lognormal variance with pedigree 0.0466, pedigree (3,4,5,5,1)
  This flow is weighted averages using the exchanges in the corresponding regional data.
  properties: dry mass 1 kg, oxygen content 0.180345, phosphorus content 0.139655, wet mass 1 kg
  note on oxygen content: Oxygen content (on a dry matter basis) of phosphate rock, beneficiated is calculated from the molecular formula of the substance ().
  note on phosphorus content: Phosphorus content (on a dry matter basis) of phosphate rock, beneficiated is calculated from the molecular formula of the substance ().
- steam, in chemical industry: 0.549091 kg; lognormal variance with pedigree 0.0466, pedigree (3,4,5,5,1)
  This flow is weighted averages using the exchanges in the corresponding regional data.
  properties: dry mass 1 kg, wet mass 1 kg

## Emissions to nature
- Ammonia [air, urban air close to ground]: 0.000333 kg; lognormal variance with pedigree 0.086, pedigree (3,4,5,5,1)
  This flow is weighted averages using the exchanges in the corresponding regional data.
- Water [air, unspecified]: 1.21e-6 m3; lognormal variance with pedigree 0.086, pedigree (3,4,5,5,1)
  This flow is weighted averages using the exchanges in the corresponding regional data.

## Extrapolations
This dataset was built as a weighted average of regional datasets of the same activityName. Weights are based on production volumes.
CN: production volume = 1.29e+10 kg/year, weight = 0.7026
RNA: production volume = 5.33e+09 kg/year, weight = 0.2894
RER: production volume = 1.48e+08 kg/year, weight = 0.008049
