# iron ore beneficiation

Dataset: EcoSpold 2, unit process
Geography: RoW
Time period: 1998-01-01 to 2023-12-31
Technology level: current
Classification: EcoSpold01Categories: metals/extraction
Classification: ISIC rev.4 ecoinvent: 0710:Mining of iron ores
Tags: ConvertedDataset
Scenario: Business-as-Usual
System model: Allocation, cut-off by classification
Share of production covered: 65 %
Generated by: Hans-Jörg Althaus
Published in: Classen M. 2009
Database: ecoinvent
isCopyrightProtected: true
accessRestrictedTo: 1

## General comment
This ore has different grain sizes. It can be lump ore that can be used directly in the blast furnace or it can be ore of smaller grain size that is used for sinter and pellet production. Water emissions are estimated according to the maximal levels for financial support of mining activities by the world bank.
[This dataset was already contained in the ecoinvent database version 2. It was not individually updated during the transfer to ecoinvent version 3. Life Cycle Impact Assessment results may still have changed, as they are affected by changes in the supply chain, i.e. in other datasets. This dataset was generated following the ecoinvent quality guidelines for version 2. It may have been subject to central changes described in the ecoinvent version 3 change report (http://www.ecoinvent.org/database/ecoinvent-version-3/reports-of-changes/), and the results of the central updates were reviewed extensively. The changes added e.g. consistent water flows and other information throughout the database. The documentation of this dataset can be found in the ecoinvent reports of version 2, which are still available via the ecoinvent website. The change report linked above covers all central changes that were made during the conversion process.]

## Included activities start
The activity starts with the reception of crude iron ore at the beneficiation plant gate.

## Included activities end
Milling and sorting of crude ore.

## Geography
Data relate to the global average

## Technology
Milling and mechanical sorting. Average iron yield is 84%.

## Parameters
- fraction, process water, to air: 0.095 dimensionless; name fraction_PW_to_air; lognormal variance with pedigree 0.092025, pedigree (4,4,3,2,4)
  Literature value (Statistics Canada, 2007 & Shaffer, K.H., 2008, Consumptive water use in the Great Lakes Basin, USGS) (Vionnet, S., Quantis Water Database - Technical Report, 2012).

## Reference product
- iron ore concentrate: 1 kg; name RP_amount; By-product classification allocatable product; CPC 14100: Iron ores and concentrates, other than roasted iron pyrites; HS2017 260111: Iron ores and concentrates; non-agglomerated
  EcoSpold01Location=GLO
  production volume 8.14886e11 kg; name RP_PV; = (1520*1000000000*0.5)*0.85/0.65
    Calculated based on literature value.
    1520 million metric tons of iron ore (in terms of iron content) were mined in 2019 in the whole world (USGS 2021).
    0.5 is the share of this type of iron ore being beneficiated by the technology represented by this activity and 0.65 is the iron content in the ore produced in this activity. Since the values given in USGS (2021) refer to the production volume at the mine, an additional efficiency factor is taken into account for the beneficiation to 65%. Based on the amount of iron in the crude ore (46% Fe) that is coming into the activity, the efficiency factor is 85%.
    Reference:
    USGS (2021) Iron Ore. U.S. Geological Survey, Mineral Commodity Summaries, 2020, https://pubs.usgs.gov/periodicals/mcs2021/mcs2021-iron-ore.pdf (last accessed on 2021-07-22).
  property carbon content, fossil 0
    Iron ores are mixtures of up to 400 different minerals. The most important ones are the iron oxides and sulphides (ecoinvent v2.2 report 10_partII)
  property carbon content, non-fossil 0
    (same comment as for iron ore concentrate)
  property price 0.0467 EUR2005
    Calculated based on literature value (UN Commodity Trade Statistics Database) using data on trade value and net weight (kg) for 5 reference countries/regions (EU-27, USA, JP, CN and IN) which weighted (by net weight) average is assumed to be a good approximation of the global price. The UN classification; 2601 Iron ores and concentrates, roasted iron pyrites (accessed 20140508). Data for the year 2005.
  properties: carbon allocation 0 kg, carbon content 0, dry mass 1 kg, water content 0, water in wet mass 0 kg, wet mass 1 kg

## Inputs from technosphere
- electricity, medium voltage: 1.70439e-5, 1.51592e-6, 0.000132171, 0.000173198, 0.000183417, 9.34237e-5, 1.29032e-5, 8.16678e-5, 3.44741e-6, 0.000551947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 kWh (47 suppliers, which the file names only by identifier); sum of these 0.018715 kWh; lognormal variance with pedigree 0.0402, pedigree (1,2,5,3,1)
  EcoSpold01Location=UCTE
- iron ore, crude ore, 46% Fe: 1.6582 kg; lognormal variance with pedigree 0.0401, pedigree (1,2,5,1,1)
  Run-of-mine (crude) iron ores are not traded commodities. They are produced at mine sites and processed at a nearby mill close. Hence, an activity link has been added to exchange the crude ore from the mine operation to the beneficiation activity.
  EcoSpold01Location=GLO
  properties: dry mass 1 kg, wet mass 1 kg

## Inputs from nature
- Water, unspecified natural origin [natural resource, in water]: 0.001519 m3; name water_UNO_input; source Byers, W. 2003; lognormal variance with pedigree 0.0401, pedigree (1,2,5,1,1)

## Emissions to nature
- Water [air, unspecified]: 0.00014431 m3; name water_to_air_unspecified; lognormal variance with pedigree 0.0807, pedigree (2,2,5,1,1)
  Calculated value based on literature values and expert opinion. See comments in the parametres' comment field.
  property fraction, origin: fresh water 0; name fraction_origin_fresh_water
  property fraction, origin: salt water 0; name fraction_origin_salt_water
  property fraction, origin: unspecified 1; name fraction_origin_unspecified
- Arsenic ion [water, unspecified]: 5.7911e-8 kg; lognormal variance with pedigree 0.1341, pedigree (4,5,5,3,3)
- BOD5, Biological Oxygen Demand [water, unspecified]: 8.6867e-5 kg; lognormal variance with pedigree 0.1341, pedigree (4,5,5,3,3)
- COD, Chemical Oxygen Demand [water, unspecified]: 8.6867e-5 kg; lognormal variance with pedigree 0.1341, pedigree (4,5,5,3,3)
- Cadmium II [water, unspecified]: 5.7911e-8 kg; lognormal variance with pedigree 0.7341, pedigree (4,5,5,3,3)
- Chromium VI [water, unspecified]: 5.7911e-8 kg; lognormal variance with pedigree 0.7341, pedigree (4,5,5,3,3)
- Copper ion [water, unspecified]: 2.8956e-7 kg; lognormal variance with pedigree 0.7341, pedigree (4,5,5,3,3)
- Cyanide [water, unspecified]: 5.7911e-7 kg; lognormal variance with pedigree 0.1341, pedigree (4,5,5,3,3)
- DOC, Dissolved Organic Carbon [water, unspecified]: 3.136e-6 kg; lognormal variance with pedigree 0.1341, pedigree (4,5,5,3,3)
- Iron ion [water, unspecified]: 2.0269e-6 kg; lognormal variance with pedigree 0.7341, pedigree (4,5,5,3,3)
- Lead II [water, unspecified]: 1.1582e-7 kg; lognormal variance with pedigree 0.7341, pedigree (4,5,5,3,3)
- Mercury II [water, unspecified]: 5.7911e-9 kg; lognormal variance with pedigree 0.7341, pedigree (4,5,5,3,3)
- Nickel II [water, unspecified]: 2.8956e-7 kg; lognormal variance with pedigree 0.7341, pedigree (4,5,5,3,3)
- Oils, unspecified [water, unspecified]: 5.7911e-6 kg; lognormal variance with pedigree 0.3941, pedigree (4,5,5,3,3)
- TOC, Total Organic Carbon [water, unspecified]: 3.136e-6 kg; lognormal variance with pedigree 0.1341, pedigree (4,5,5,3,3)
- Water [water, unspecified]: 0.00137469 m3; name water_to_water_unspecified; = water_UNO_input*(1-fraction_PW_to_air); lognormal variance with pedigree 0.0807, pedigree (2,2,5,1,1)
  (same comment as for Water)
  property carbon content, fossil 0; name C_content_fossil
  property carbon content, non-fossil 0; name C_content_non_fossil
  property dry mass 0 kg; name DM
  property fraction, origin: fresh water 0; name fraction_origin_fresh_water_Ww
  property fraction, origin: salt water 0; name fraction_origin_salt_water_Ww
  property fraction, origin: unspecified 1; name fraction_origin_unspecified_Ww
  property water in wet mass 1000 kg; name WWM
  property wet mass 1000 kg; name WM
- Zinc II [water, unspecified]: 1.1582e-6 kg; lognormal variance with pedigree 0.7341, pedigree (4,5,5,3,3)

## Sampling procedure
based on literature

## Review by Roland Hischier 2007-08-13
passed
