# power supply unit production, for desktop computer

Dataset: EcoSpold 2, unit process
Geography: RoW
Time period: 2005-01-01 to 2023-12-31
Technology level: current
Classification: EcoSpold01Categories: electronics/module
Classification: ISIC rev.4 ecoinvent: 2710:Manufacture of electric motors, generators, transformers and electricity di
Tags: ConvertedDataset
Scenario: Business-as-Usual
System model: Allocation, cut-off by classification
Generated by: Roland Hischier
Published in: Hischier R. 2007
Database: ecoinvent
isCopyrightProtected: true
accessRestrictedTo: 1

## General comment
This dataset is a rough estimation of the material composition of the PSU in a desktop PC due to own measurements.
[This dataset was already contained in the ecoinvent database version 2. It was not individually updated during the transfer to ecoinvent version 3. Life Cycle Impact Assessment results may still have changed, as they are affected by changes in the supply chain, i.e. in other datasets. This dataset was generated following the ecoinvent quality guidelines for version 2. It may have been subject to central changes described in the ecoinvent version 3 change report (http://www.ecoinvent.org/database/ecoinvent-version-3/reports-of-changes/), and the results of the central updates were reviewed extensively. The changes added e.g. consistent water flows and other information throughout the database. The documentation of this dataset can be found in the ecoinvent reports of version 2, which are still available via the ecoinvent website. The change report linked above covers all central changes that were made during the conversion process.]

## Included activities end
This dataset contains the material inputs that build up all together a power supply unit for a desktop PC. Requirements and emissions of the assembly process (energy, emissions, waste) are not included.

## Geography
Data of a Chinese product; commonly used in current desktop PC.

## Technology
The dataset represents the material composition of a PSU, model ST-235ATX, from a Chinese producer.

## Reference product
- power supply unit, for desktop computer: 1 unit; By-product classification allocatable product; CPC 46113: Electric generating sets and rotary converters; HS2017 850431: Electrical transformers; n.e.c. in item no. 8504.2, having a power handling capacity not exceeding 1kVA
  EcoSpold01Location=CN
  production volume 3.80251 unit
    This is a placeholder value that does not reflect real-world production volumes. This dataset does not currently require a real-world production volume to work in the database framework, and no actual data were collected yet. This has no negative effect on the results of the ecoinvent database.
  property carbon content, fossil 0.23443
    Calculated as the addition of C contents in the product composition, then referred to 1 kg DM
  property carbon content, non-fossil 0.00159217
    (same comment as for power supply unit, for desktop computer)
  property price 20.5132 EUR2005
    Calculated based on inputs: The price of the product has been calculated as a sum of the values of the material and energy inputs for this product. This value is therefore a rough estimation. It may underestimate the real price since there are additional expenses when producing any product. These expences can include for example labour costs, treatment of waste materials and profit for the producer. Please consider carefully whether this level of data quality is acceptable for your application.
  properties: carbon allocation 0.346952 kg, carbon content 0.236022, dry mass 1.47 kg, water content 0, water in wet mass 0 kg, wet mass 1.47 kg

## Inputs from technosphere
All rows: lognormal variance with pedigree 0.182, pedigree (1,1,5,5,1)
- cable, ribbon cable, 20-pin, with plugs: 0.1935 kg
  own dismantling acitivites
  EcoSpold01Location=GLO
  properties: carbon content, fossil 0.648653, dry mass 1 kg, wet mass 1 kg
  note on carbon content, fossil: Calculated as the addition of C contents in the product composition. Then referred to 1 kg DM
- fan, for power supply unit, desktop computer: 0.0742 kg
  own dismantling acitivites
  EcoSpold01Location=GLO
  properties: carbon content, fossil 0.693687, carbon content, non-fossil 0.000300198, dry mass 1 kg, wet mass 1 kg
  note on carbon content, fossil: Calculated as the addition of C contents in the product composition
- plug, inlet and outlet, for computer cable: 1 unit
  own dismantling acitivites
  EcoSpold01Location=GLO
  properties: carbon content, fossil 0.3397, dry mass 0.0585 kg, wet mass 0.0585 kg
- printed wiring board, for power supply unit, desktop computer, Pb containing: 0.18114 kg
  own dismantling acitivites
  EcoSpold01Location=GLO
  properties: carbon content, fossil 0.240291, carbon content, non-fossil 0.00383938, dry mass 1 kg, wet mass 1 kg
  note on carbon content, fossil: C content was calculated as the addition of C content in the PWB components
- printed wiring board, for power supply unit, desktop computer, Pb free: 0.42266 kg
  own dismantling acitivites
  EcoSpold01Location=GLO
  properties: carbon content, fossil 0.240291, carbon content, non-fossil 0.00383938, dry mass 1 kg, wet mass 1 kg
- sheet rolling, steel: 0.5719 kg
  EcoSpold01Location=RER
  own dismantling acitivites
- steel, low-alloyed, hot rolled: 0.5719 kg
  own dismantling acitivites
  EcoSpold01Location=RER
  properties: carbon content, fossil 0.005, dry mass 1 kg, wet mass 1 kg
  note on carbon content, fossil: Low alloyed steel composition given in Tab. 3.2 ecoinvent v2.2 report 10_partII. Steel assumed to have a C content of 0.5%

## Sampling procedure
own dismantling & estimation

## Extrapolations
see Geography and Technology This dataset has been copied from an original dataset covering the geography CN. The uncertainty has been adjusted accordingly.

## Review by Rolf Frischknecht 2007-09-14
passed
