# electricity, high voltage, hydro, import from PY

Dataset: EcoSpold 2, unit process
Geography: AR
Time period: 2012-01-01 to 2023-12-31
Technology level: current
Classification: ISIC rev.4 ecoinvent: 3510:Electric power generation, transmission and distribution
Scenario: Business-as-Usual
System model: Allocation, cut-off by classification
Generated by: Bárbara Civit
Published in: Suppen, N. 2017
Database: ecoinvent
isCopyrightProtected: true
accessRestrictedTo: 1

## General comment
This dataset represents the amount of imported electricity from Paraguay to AR. The import value is valid for 2014 and includes all electricity imports, independently whether used within the importing country, or re-exported.
Half of the electricity production from the binational (Paraguay-Argentina) Yacyretá hydroelectric power plant belongs to each country. However, as Paraguay's electricity requirements are covered (the country only consumes, on average, between 10 and 13% of the energy produced), the rest of its quota is sold to Argentina, which incorporates it into the national interconnected electrical system.
Source: SÍNTESIS DEL MERCADO ELÉCTRICO MAYORISTA DE LA REPÚBLICA ARGENTINA - Diciembre 2014.
The Argentinean imports from Paraguay aren modelled as " electricity production, hydro, reservoir, tropical region"/ GLO2008 (Access date: January 18, 2018), because this activity does not exist for PY.

## Included activities start
This activity represents the point of 'handing over' the electricity from one country to the other at the border

## Included activities end
This dataset doesn't include any electricity losses or transmission infrastructure as these are accounted for in the market datasets

## Time period
Annual production volume valid for 2014

## Reference product
- electricity, high voltage: 1 kWh; By-product classification allocatable product; CPC 17100: Electrical energy; HS2017 271600: Electrical energy
  production volume 6.0251e8 kWh
    Literature/Statistics
    Value taken from BASE_INFORME_MENSUAL for 2014, available from
    CAMMESA "COMPAÑÍA ADMINISTRADORA DEL MERCADO MAYORISTA ELÉCTRICO SOCIEDAD ANÓNIMA" Supporting documentation available at: http://portalweb.cammesa.com/Memnet1/default.aspx
    Informe mensual
  property price 0.0977 EUR2005
    Temporary price data. Calculated as 90% of purchasers price based on: 94% of the average price (to account for a 6% loss in transformation and transmission) for electricity for industrial consumersin 2005 (excluded taxes). From IEA.
  properties: carbon allocation 0 kg, carbon content 0

## Inputs from technosphere
- electricity, high voltage: 1 kWh; source CNEA 2015
  The amount of imported electricity from Paraguay to AR is supplied from the binational (Paraguay-Argentina) Yacyretá hydroelectric power plant, as Paraguay only consumes, on average, between 10 and 13% of the energy produced, and the rest of its quota is sold to Argentina. The Argentinean imports from Paraguay aren modelled as " electricity production, hydro, reservoir, tropical region", GLO2018 (Access date: January 18, 2018), because this activity does not exist for PY.

## Extrapolations
The amount of imported electricity from Paraguay to AR is obtained from
CAMMESA "COMPAÑÍA ADMINISTRADORA DEL MERCADO MAYORISTA ELÉCTRICO SOCIEDAD ANÓNIMA"
Supporting documentation available at: http://portalweb.cammesa.com/Memnet1/default.aspx
The Argentinean imports from Paraguay aren modelled as " electricity production, hydro, reservoir, tropical region, GLO" because this activity does not exist for PY.

## Review by Christopher Oberschelp 2018-05-14
Review not completed as ecoinvent has to run a full database calculation. Review has to continue afterwards.
