# aircraft production, agricultural

Dataset: EcoSpold 2, unit process
Geography: GLO
Time period: 2021-01-01 to 2023-12-31
Technology level: current
Classification: ISIC rev.4 ecoinvent: 3030:Manufacture of air and spacecraft and related machinery
Scenario: Business-as-Usual
System model: Allocation, cut-off by classification
Generated by: Nikolia Stoikou
Database: ecoinvent
isCopyrightProtected: true
accessRestrictedTo: 1

## General comment
This dataset models the manufacturing of an agricultural airplane. It should be used ONLY for similar agricultural applications.

## Included activities start
The activity starts by receiving/obtaining the material inputs required for construction at the factory gate.

## Included activities end
This activity ends with the production of the agricultural aircraft. The activity ends with the production of one aircraft. The dataset includes the materials (aluminium, titanium, nickel and composite materials), energy (electricity and heat), and water used in the production. Emissions of VOCs are also included. Emissions from the production of composite materials are included via an input of carbon fibre reinforced plastic. Electronics and interior materials (plastics, textiles etc.) have not been included due to a lack of available data.

## Geography
The aircraft is modelled to be representative for a global geography .

## Technology
It has a lifetime of 20 years and an operation capacity of 160ha/hour. It weights 2012 kg.

## Reference product
- aircraft, agricultural: 1 unit; name RP; By-product classification allocatable product; CPC 49623: Aeroplanes and other powered aircraft of an unladen weight exceeding 2000 kg; HS2017 8802: Aircraft n.e.c. in heading no. 8801 (e.g. helicopters, aeroplanes); spacecraft (including satellites) and sub[...]
  production volume 200 unit; name RPpv
    The production volume has been estimated summing the amount of airplane produced for this specific sources.173 Air Tractor from this source (https://airtractor.com/news/2022/07/air-tractor-aims-for-record-aircraft-production-in-2022/) from 2022 and 27 Ipanema from this source (https://www.militaryaerospace.com/commercial-aerospace/article/14232089/embraer-ipanema-crop-duster) from 2021.
  property price 405153 EUR2005
    The price is from the year 2023. The price is estimated as a proxy based on the source: https://pilotpassion.com/how-much-does-a-crop-duster-plane-cost/. The prices were adjusted for inflation relative to 2005 using the producer price index (PPI) of the euro area, published by eurostat (https://ec.europa.eu/eurostat/databrowser/view/STS_INPP_A__custom_6416181/default/table?lang=en, last accessed on 2023-06-01).
  properties: carbon allocation 0 kg, carbon content 0, lifetime 20 year

## Inputs from technosphere
- aluminium, wrought alloy: 1169.18 kg; lognormal variance with pedigree 0.002925, pedigree (3,2,2,2,1)
  scaled based on "Jemioło W., Cox B., Solvoli G., 2015. Life cycle assessment of current and future passenger air transport in Switzerland, Technology Assessment Group, Laboratory for Energy System Analysis Paul Scherrer Institut (PSI), Switzerland, Mater Thesis Available at. https://www.sccer-mobility.ch/export/sites/sccer-mobility/capacity-areas/dwn_capacity_areas/Jemiolo_Thesis_Final.pdf" to represent the manufacturing of an acricultural aircraft with an average weigh of 2012 kg (Air Tractor, 2022. Agriculture Aircraft, Air Tractor, INC Available at: https://airtractor.com/aircraft/at-402b/; Aviastar, 2022. Embraer EMB-200/201 Ipanema, Aviastar Available at: http://www.aviastar.org/air/brazil/embraer_ipanema.php)
  properties: dry mass 1 kg, wet mass 1 kg
- carbon fibre reinforced plastic, injection moulded: 184.057 kg; lognormal variance with pedigree 0.002925, pedigree (3,2,2,2,1)
  Scaled based on "Jemioło W., Cox B., Solvoli G., 2015. Life cycle assessment of current and future passenger air transport in Switzerland, Technology Assessment Group, Laboratory for Energy System Analysis Paul Scherrer Institut (PSI), Switzerland, Mater Thesis Available at. https://www.sccer-mobility.ch/export/sites/sccer-mobility/capacity-areas/dwn_capacity_areas/Jemiolo_Thesis_Final.pdf" to represent the manufacturing of an agricultural aircraft with an average weigh of 2012 kg (Air Tractor, 2022. Agriculture Aircraft, Air Tractor, INC Available at: https://airtractor.com/aircraft/at-402b/; Aviastar, 2022. Embraer EMB-200/201 Ipanema, Aviastar Available at: http://www.aviastar.org/air/brazil/embraer_ipanema.php)
  properties: carbon content, fossil 0.68, dry mass 1 kg, wet mass 1 kg
- cast iron: 17.1764 kg; lognormal variance with pedigree 0.003525, pedigree (3,2,2,2,2)
  (same comment as for aluminium, wrought alloy)
  properties: carbon content, fossil 0.04, dry mass 1 kg, wet mass 1 kg
- electricity, medium voltage: 30.2102 kWh; lognormal variance with pedigree 0.003525, pedigree (3,2,2,2,2)
  scaled based on "aircraft production, passenger aircraft, very short haul, GLO" that represents a 38.3 tons aircrafts to a 2012 kg aircraft
- glass fibre reinforced plastic, polyamide, injection moulded: 20.0392 kg; lognormal variance with pedigree 0.003525, pedigree (3,2,2,2,2)
  (same comment as for carbon fibre reinforced plastic, injection moulded)
  properties: carbon content, fossil 0.446018, dry mass 1 kg, wet mass 1 kg
- heat, district or industrial, natural gas: 99960.6 MJ; lognormal variance with pedigree 0.003525, pedigree (3,2,2,2,2)
  (same comment as for electricity, medium voltage)
  properties: heating value, net 1 MJ
- heat, district or industrial, other than natural gas: 2944.77 MJ; lognormal variance with pedigree 0.003525, pedigree (3,2,2,2,2)
  (same comment as for electricity, medium voltage)
  properties: heating value, net 1 MJ
- iron-nickel-chromium alloy: 16.5028 kg; lognormal variance with pedigree 0.003525, pedigree (3,2,2,2,2)
  (same comment as for aluminium, wrought alloy)
  properties: dry mass 1 kg, wet mass 1 kg
- nickel, class 1: 55.7392 kg; lognormal variance with pedigree 0.002925, pedigree (3,2,2,2,1)
  (same comment as for aluminium, wrought alloy)
  properties: dry mass 1 kg, wet mass 1 kg
- reinforcing steel: 385.123 kg; lognormal variance with pedigree 0.003525, pedigree (3,2,2,2,2)
  (same comment as for aluminium, wrought alloy)
  properties: carbon content, fossil 0.004, dry mass 1 kg, wet mass 1 kg
- scrap aluminium: -780.904, -370.872, -17.4005 kg (3 suppliers, which the file names only by identifier); sum of these -1169.18 kg; lognormal variance with pedigree 0.040725, pedigree (5,2,1,2,1)
  production volume; = BY_AL*RPpv/RP
    Calculated from production volume of reference product using the relative outputs.
  properties: dry mass 1 kg, wet mass 1 kg
- scrap copper: -140.142, -66.5571, -3.12272 kg (3 suppliers, which the file names only by identifier); sum of these -209.822 kg; lognormal variance with pedigree 0.040725, pedigree (5,2,1,2,1)
  representing the sum of nickel and titanium
  production volume; = BY_AC*RPpv/RP
    Calculated from production volume of reference product using the relative outputs.
  properties: dry mass 1 kg, wet mass 1 kg
- scrap steel: -5.69466, -2.72171, -0.00344831 kg (3 suppliers, which the file names only by identifier); sum of these -8.41982 kg; lognormal variance with pedigree 0.040725, pedigree (5,2,1,2,1)
  The byproduct was modelled based on "aircraft production, passenger aircraft, very short haul, GLO" and inputs/outputs were scaled down based on the avarage weight of the agricultural aircraft. (avarage 2012 kg). References "Jemioło W., Cox B., Solvoli G., 2015. Life cycle assessment of current and future passenger air transport in Switzerland, Technology Assessment Group, Laboratory for Energy System Analysis Paul Scherrer Institut (PSI), Switzerland, Mater Thesis Available at. https://www.sccer-mobility.ch/export/sites/sccer-mobility/capacity-areas/dwn_capacity_areas/Jemiolo_Thesis_Final.pdf" (Air Tractor, 2022. Agriculture Aircraft, Air Tractor, INC Available at: https://airtractor.com/aircraft/at-402b/; Aviastar, 2022. Embraer EMB-200/201 Ipanema, Aviastar Available at: http://www.aviastar.org/air/brazil/embraer_ipanema.php)
  production volume; = BY_AS*RPpv/RP
    Calculated from production volume of reference product using the relative outputs.
  properties: dry mass 1 kg, wet mass 1 kg
- steel, chromium steel 18/8: 8.41982 kg; lognormal variance with pedigree 0.002925, pedigree (3,2,2,2,1)
  (same comment as for aluminium, wrought alloy)
  properties: carbon content, fossil 0.0008, dry mass 1 kg, wet mass 1 kg
- tantalum powder, capacitor-grade: 1.85236 kg; lognormal variance with pedigree 0.003525, pedigree (3,2,2,2,2)
  (same comment as for aluminium, wrought alloy)
  properties: dry mass 1 kg, tantalum content 0.9996, wet mass 1 kg
- tap water: 73889 kg; lognormal variance with pedigree 0.003525, pedigree (3,2,2,2,2)
  (same comment as for electricity, medium voltage)
  properties: carbon content, fossil 0.00178991, dry mass 0.000337476 kg, water content 2962.17, wet mass 1 kg
- titanium: 154.083 kg; lognormal variance with pedigree 0.003525, pedigree (3,2,2,2,2)
  (same comment as for aluminium, wrought alloy)
  properties: dry mass 1 kg, wet mass 1 kg
- waste plastic, mixture: -0.0482537, -1.99654, -0.0458214, -180.073, -1.74848, -0.116827, -0.0194939, -0.00883543 kg (8 suppliers, which the file names only by identifier); sum of these -184.057 kg; lognormal variance with pedigree 0.040725, pedigree (5,2,1,2,1)
  (same comment as for scrap steel)
  production volume; = BY_WP*RPpv/RP
    Calculated from production volume of reference product using the relative outputs.
  properties: carbon content, fossil 0.747344, dry mass 0.847 kg, heating value, net 30.79 MJ, water content 0.180638, wet mass 1 kg
- wastewater, unpolluted: -0.0398417, -8.23878 m3 (2 suppliers, which the file names only by identifier); sum of these -8.27862 m3; lognormal variance with pedigree 0.041825, pedigree (5,3,1,2,2)
  (same comment as for electricity, medium voltage)
  production volume; = BY_WW*RPpv/RP
    Calculated from production volume of reference product using the relative outputs.
  properties: carbon content, fossil 0.00178991, carbon content, non-fossil 0.00178991, dry mass 0.337476 kg, fossil share of carbon 1, water content 2962.17, wet mass 1000 kg

## Emissions to nature
- NMVOC, non-methane volatile organic compounds [air, unspecified]: 53.4491 kg; lognormal variance with pedigree 0.042925, pedigree (3,2,2,2,2)
  (same comment as for electricity, medium voltage)
- Water [air, unspecified]: 7.3889 m3; lognormal variance with pedigree 0.042925, pedigree (3,2,2,2,2)
  (same comment as for electricity, medium voltage)
- Water [water, unspecified]: 58.2218 m3; lognormal variance with pedigree 0.042925, pedigree (3,2,2,2,2)
  (same comment as for electricity, medium voltage)

## Sampling procedure
This dataset was modelled based on "aircraft production, passenger aircraft, very short haul, GLO" and inputs/outputs were scaled down based on the avarage weight of the agricultural aircraft. (avarage 2012 kg).References "Jemioło W., Cox B., Solvoli G., 2015. Life cycle assessment of current and future passenger air transport in Switzerland, Technology Assessment Group, Laboratory for Energy System Analysis Paul Scherrer Institut (PSI), Switzerland, Mater Thesis Available at. https://www.sccer-mobility.ch/export/sites/sccer-mobility/capacity-areas/dwn_capacity_areas/Jemiolo_Thesis_Final.pdf" (Air Tractor, 2022. Agriculture Aircraft, Air Tractor, INC Available at: https://airtractor.com/aircraft/at-402b/; Aviastar, 2022. Embraer EMB-200/201 Ipanema, Aviastar Available at: http://www.aviastar.org/air/brazil/embraer_ipanema.php)
