# treatment of spent nuclear fuel, reprocessing

Dataset: EcoSpold 2, unit process
Geography: RoW
Time period: 1985-01-01 to 2023-12-31
Technology level: current
Classification: ISIC rev.4 ecoinvent: 3822:Treatment and disposal of hazardous waste
Classification: EcoSpold01Categories: nuclear power/waste treatment
Tags: Treatment; ConvertedDataset
Scenario: Business-as-Usual
System model: Allocation, cut-off by classification
Generated by: Roberto Dones
Published in: Dones, R. 2007
Database: ecoinvent
isCopyrightProtected: true
accessRestrictedTo: 1

## General comment
The factor for infrastrucure requirement has been calculated using THORP annual throughput of 1200 tonne heavy metal (modelled herewith practically as all uranium) for 30 years operation. Recent radioactive and non-radioactive emission data exist from an environmental report of La Hague (Cogema, FR) for both units UP2 and UP3 in the years 1996 and 1997. Radioactive releases to air and sea are given only for aggregated classes. Also the input for the use of main chemicals is from the French facilities. Material transports are estimated using ecoinvent standard distances with the exception of the transport of spent fuel from Swiss power plants to reprocessing facilities in UK and FR. The volumes for the six radioactive waste types to deliver to the intermediate repository and then to the final repository for high and intermediate radioactive waste have been taken from the old Swiss project for final repositories (Gewähr, 1985); the volume of the vitrified high level waste has been adjusted to take into account current average burnups of Swiss nuclear power plants. No allocation has been attempted to different products (uranium, plutonium, useful isotopes, and conditioned wastes). Low active waste from decommissioning of the facilities has roughly been estimated.
[This dataset was already contained in the ecoinvent database version 2. It was not individually updated during the transfer to ecoinvent version 3. Life Cycle Impact Assessment results may still have changed, as they are affected by changes in the supply chain, i.e. in other datasets. This dataset was generated following the ecoinvent quality guidelines for version 2. It may have been subject to central changes described in the ecoinvent version 3 change report (http://www.ecoinvent.org/database/ecoinvent-version-3/reports-of-changes/), and the results of the central updates were reviewed extensively. The changes added e.g. consistent water flows and other information throughout the database. The documentation of this dataset can be found in the ecoinvent reports of version 2, which are still available via the ecoinvent website. The change report linked above covers all central changes that were made during the conversion process.]

## Included activities end
The module includes: main chemicals for the operation; glass, steel and cement for the conditioning of the high and intermediale radioactive wastes; transport of spent fuel to the reprocessing plant, and transport of all materials; radioactive and non-radioactive solid waste streams; radioactive and non-radioactive emissions to air and sea.

## Geography
European facilities.

## Technology
Current commercial facilities.

## Parameters
- fraction, cooling water, cooling pond system, to air: 0.032 dimensionless; name fraction_CW_CP_to_air; lognormal variance with pedigree 0.0413, pedigree (2,3,1,3,1)
  Calculated based on literature value (Scown, C.D., 2011, Water Footprint of U.S. Transportation Fuels and supplying information of the article) (Vionnet, S., Quantis Water Database - Technical Report, 2012).
- fraction, cooling water, once-through system, to air: 0.004 dimensionless; name fraction_CW_OT_to_air; lognormal variance with pedigree 0.0413, pedigree (2,3,1,3,1)
  (same comment as for fraction, cooling water, cooling pond system, to air)
- fraction, cooling water, recirculating system, to air: 0.771 dimensionless; name fraction_CW_R_to_air; lognormal variance with pedigree 0.0413, pedigree (2,3,1,3,1)
  (same comment as for fraction, cooling water, cooling pond system, to air)
- fraction, cooling water, to air: 0.3875 dimensionless; name fraction_CW_to_air; = (0.5*fraction_CW_OT_to_air)+(0.5*fraction_CW_R_to_air); lognormal variance with pedigree 0.092025, pedigree (4,4,3,2,4)
  Calculated value based on literature value (see comments of the other parametres present in this dataset) and expert opinion. In the case when no industry/literature data are available about the type of cooling or directly fraction, cooling water, to air specific for the process a default assumption is applied. It is assumed that the once-through cooling system is used in 50% of all cases and recirculating system is used in another 50% of all cases.
- fraction, water, decarbonised, to air: 0.3875 dimensionless; name fraction_WDC_to_air; lognormal variance with pedigree 0.092025, pedigree (4,4,3,2,4)

## Reference product
- spent nuclear fuel: -1 kg; By-product classification Waste; CPC 33720: Spent (irradiated) fuel elements (cartridges) of nuclear reactors; HS2017 840140: Nuclear reactors; parts thereof
  EcoSpold01Location=RER
  production volume 2e6 kg
    Literature value. Source: International Panel on Fissile Materials (IPFP), 2011: http://fissilematerials.org/library/ipfm-spent-fuel-overview-june-2011.pdf
  property price 0 EUR2005
    Waste products are assigned a price of zero as they are assumed to require further treatment.
  properties: carbon allocation 0 kg, carbon content 0, carbon content, fossil 0, carbon content, non-fossil 0, dry mass 1 kg, water content 0, water in wet mass 0 kg, wet mass 1 kg

## Inputs from technosphere
- cement, unspecified: 0.0908058, 0.00234622, 0.0553372, 0.344858, 0.0108247, 0.00791235, 0.00428828, 0.00852295, 0.0130301, 3.46207 kg (10 suppliers, which the file names only by identifier); sum of these 4 kg; lognormal variance with pedigree 0.162, pedigree (1,1,5,5,1)
  EcoSpold01Location=CH
  estimation
  properties: dry mass 1 kg, wet mass 1 kg
- chemical, inorganic: 4.6 kg; lognormal variance with pedigree 0.042, pedigree (1,1,5,5,1)
  EcoSpold01Location=GLO
  data from operator
  properties: carbon content, fossil 0.003, dry mass 1 kg, wet mass 1 kg
  note on carbon content, fossil: This dataset is an unweighted average of 20 inorganic substances (listed in Tab 88.1, ecoinvent v2.2 report 8, part II), being part of the top100 chemicals included in this database. The C-content has also been calculated as an unweighted average of the C content of the substances composing this dataset.
- chemical, organic: 0.017 kg; lognormal variance with pedigree 0.042, pedigree (1,1,5,5,1)
  data from operator
  EcoSpold01Location=GLO
  properties: carbon content, fossil 0.628, dry mass 1 kg, heating value, net 19.03 MJ, wet mass 1 kg
  note on carbon content, fossil: This dataset is an unweighted average of 20 organic substances (listed in Tab 88.1, ecoinvent v2.2 report 8, part II), being part of the top100 chemicals included in this database. The C-content has also been calculated as an unweighted average of the C content of the substances composing this dataset.
- conditioned spent nuclear fuel: -0.00447 m3; lognormal variance with pedigree 0.042, pedigree (1,1,1,5,1)
  EcoSpold01Location=CH
  estimation, based on old assessment
  production volume
    Calculated from the production volume of spent nuclear fuel in proportion to the respective output amounts.
  properties: dry mass 7600 kg, wet mass 7600 kg
- diesel, burned in diesel-electric generating set, 10MW: 4.81 MJ; lognormal variance with pedigree 0.042, pedigree (1,1,5,5,1)
  data from operator
  EcoSpold01Location=GLO
  properties: heating value, net 1 MJ
- electricity, high voltage: 0.517153, 56.2915, 8.5298, 168.367, 2.58809, 17.5941, 0.112505 kWh (7 suppliers, which the file names only by identifier); sum of these 254 kWh; lognormal variance with pedigree 0.042, pedigree (1,1,5,5,1)
  EcoSpold01Location=FR
  data from operator
- flat glass, uncoated: 0.36 kg; lognormal variance with pedigree 0.162, pedigree (1,1,5,5,1)
  own calculation
  EcoSpold01Location=RER
  properties: dry mass 1 kg, wet mass 1 kg
- formaldehyde: 2.33 kg; lognormal variance with pedigree 0.042, pedigree (1,1,5,5,1)
  data from operator
  EcoSpold01Location=RER
  properties: carbon content, fossil 0.4, dry mass 1 kg, heating value, net 20.19 MJ, wet mass 1 kg
- hazardous waste, for incineration: -0.617 kg; lognormal variance with pedigree 0.002, pedigree (1,1,1,5,1)
  EcoSpold01Location=CH
  data from operator
  production volume
    (same comment as for conditioned spent nuclear fuel)
  properties: carbon content, fossil 0.554667, dry mass 0.75 kg, heating value, net 17 MJ, water content 0.333333, wet mass 1 kg
  note on carbon content, fossil: Tab A.6, ecoinvent v2.2 report 13_I. C content has been calculated after data in the tables, and then referred to 1 kg DM
  note on heating value, net: Value taken from the general comment of the treatment dataset.
- heat, district or industrial, other than natural gas: 908.729, 0.420997 MJ (2 suppliers, which the file names only by identifier); sum of these 909.15 MJ; lognormal variance with pedigree 0.042, pedigree (1,1,5,5,1)
  data from operator
  EcoSpold01Location=RER
  properties: heating value, net 1 MJ
- inert waste, for final disposal: -2.29 kg; lognormal variance with pedigree 0.002, pedigree (1,1,1,5,1)
  data from operator
  EcoSpold01Location=CH
  production volume
    (same comment as for conditioned spent nuclear fuel)
  properties: dry mass 0.995 kg, water content 0.00502513, wet mass 1 kg
- low level radioactive waste: -0.00435 m3; lognormal variance with pedigree 0.042, pedigree (1,1,1,5,1)
  estimation, based on old assessment
  EcoSpold01Location=CH
  production volume
    (same comment as for conditioned spent nuclear fuel)
  properties: dry mass 2500 kg, wet mass 2500 kg
- municipal solid waste: -0.0134509, -0.00159723, -0.00994077, -7.58897, -0.00111768, -0.000358755, -0.000810885, -0.0337574 kg (8 suppliers, which the file names only by identifier); sum of these -7.65 kg; lognormal variance with pedigree 0.002, pedigree (1,1,1,5,1)
  data from operator
  EcoSpold01Location=CH
  production volume
    (same comment as for conditioned spent nuclear fuel)
  properties: carbon content, fossil 0.171549, carbon content, non-fossil 0.261655, dry mass 0.771 kg, heating value, net 11.74 MJ, water content 0.297017, wet mass 1 kg
  note on carbon content, fossil: MSW composition in tab 4.1, ecoinvent v2.2 report 13_I. C content referred to 1 kg DM
- nitric acid, without water, in 50% solution state: 0.137941, 0.509696, 1.55618, 0.839957, 0.244219, 0.204201, 0.204959, 0.662844 kg (8 suppliers, which the file names only by identifier); sum of these 4.36 kg; lognormal variance with pedigree 0.042, pedigree (1,1,5,5,1)
  data from operator
  EcoSpold01Location=RER
  properties: dry mass 1 kg, wet mass 1 kg
- nuclear spent fuel reprocessing facility: 2.78e-8 unit; lognormal variance with pedigree 0.062, pedigree (1,1,5,5,1)
  estimation
  EcoSpold01Location=RER
- sodium hydroxide, without water, in 50% solution state: 5.42 kg; lognormal variance with pedigree 0.042, pedigree (1,1,5,5,1)
  data from operator
  EcoSpold01Location=RER
  properties: dry mass 1 kg, heating value, net 3.03 MJ, wet mass 1 kg
- steel, chromium steel 18/8, hot rolled: 6.6 kg; lognormal variance with pedigree 0.052, pedigree (1,1,5,5,1)
  own calculation
  EcoSpold01Location=RER
  properties: carbon content, fossil 0.0008, dry mass 1 kg, wet mass 1 kg
  note on carbon content, fossil: Stainless steel model is the grade 304 steel (18/8 stainless, 18% chromium 8% nickel; max. 0.08% C)
- waste plastic, mixture: -6.86458e-5, -6.51856e-5, -0.256172, -0.0024874, -0.000166198, -2.77321e-5, -1.25693e-5 kg (7 suppliers, which the file names only by identifier); sum of these -0.259 kg; lognormal variance with pedigree 0.002, pedigree (1,1,1,5,1)
  data from operator
  EcoSpold01Location=CH
  production volume
    (same comment as for conditioned spent nuclear fuel)
  properties: carbon content, fossil 0.747344, dry mass 0.847 kg, heating value, net 30.79 MJ, water content 0.180638, wet mass 1 kg
  note on carbon content, fossil: C content in 1 kg DM was calculated using data in Tab A.2, ecoinvent v2.2 report 13_I
- water, decarbonised: 9.31217, 136.067, 6.96824, 115.503, 73.1279, 18.1313, 0.890134 kg (7 suppliers, which the file names only by identifier); sum of these 360 kg; lognormal variance with pedigree 0.042, pedigree (1,1,5,5,1)
  data from operator
  EcoSpold01Location=RER
  properties: wet mass 1 kg
- welding, arc, steel: 0.23 m; lognormal variance with pedigree 0.342, pedigree (1,1,5,5,1)
  estimation
  EcoSpold01Location=RER

## Emissions to nature
- Aerosols, radioactive, unspecified [air, non-urban air or from high stacks]: 0.0153 kBq; lognormal variance with pedigree 0.342, pedigree (1,1,5,5,1)
  higher release in 2002 compared to 1996/1997
- Ammonia [air, non-urban air or from high stacks]: 5.86e-5 kg; lognormal variance with pedigree 0.162, pedigree (1,1,5,5,1)
  extrapolation
- Cadmium II [air, non-urban air or from high stacks]: 2.64e-5 kg; lognormal variance with pedigree 0.162, pedigree (1,1,5,5,1)
  extrapolation
- Carbon monoxide, fossil [air, non-urban air or from high stacks]: 0.0589 kg; lognormal variance with pedigree 0.162, pedigree (1,1,5,5,1)
  extrapolation
- Carbon-14 [air, non-urban air or from high stacks]: 16600 kBq; lognormal variance with pedigree 0.162, pedigree (1,1,5,5,1)
  extrapolation
- Dinitrogen monoxide [air, non-urban air or from high stacks]: 0.037 kg; lognormal variance with pedigree 0.162, pedigree (1,1,5,5,1)
  extrapolation
- Hydrochloric acid [air, non-urban air or from high stacks]: 0.000281 kg; lognormal variance with pedigree 0.162, pedigree (1,1,5,5,1)
  extrapolation
- Hydrogen fluoride [air, non-urban air or from high stacks]: 1.56e-5 kg; lognormal variance with pedigree 0.162, pedigree (1,1,5,5,1)
  extrapolation
- Iodine-129 [air, non-urban air or from high stacks]: 17.3 kBq; lognormal variance with pedigree 0.342, pedigree (1,1,5,5,1)
  lower release in 2002 compared to 1996/1997
- Methane, fossil [air, non-urban air or from high stacks]: 6.2e-5 kg; lognormal variance with pedigree 0.162, pedigree (1,1,5,5,1)
  extrapolation
- NMVOC, non-methane volatile organic compounds [air, non-urban air or from high stacks]: 0.00061 kg; lognormal variance with pedigree 0.162, pedigree (1,1,5,5,1)
  extrapolation
- Noble gases, radioactive, unspecified [air, non-urban air or from high stacks]: 1.66e8 kBq; lognormal variance with pedigree 0.082, pedigree (1,1,5,5,1)
  presumed uncertainty of measurements
- Particulate Matter, > 2.5 um and < 10um [air, non-urban air or from high stacks]: 0.000651 kg; lognormal variance with pedigree 0.162, pedigree (1,1,5,5,1)
  extrapolation
- Plutonium-238 [air, non-urban air or from high stacks]: 2.36e-6 kBq; lognormal variance with pedigree 0.342, pedigree (1,1,5,5,1)
  old reference
- Plutonium-alpha [air, non-urban air or from high stacks]: 5.41e-6 kBq; lognormal variance with pedigree 0.342, pedigree (1,1,5,5,1)
  old reference
- Sulfur dioxide [air, non-urban air or from high stacks]: 0.00263 kg; lognormal variance with pedigree 0.162, pedigree (1,1,5,5,1)
  extrapolation
- Tritium [air, non-urban air or from high stacks]: 44900 kBq; lognormal variance with pedigree 0.082, pedigree (1,1,5,5,1)
  presumed uncertainty of measurements
- Water [air, unspecified]: 0.1395 m3; name water_to_air_unspecified; lognormal variance with pedigree 0.0827, pedigree (2,2,5,5,1)
  Calculated value based on literature values and expert opinion. See comments in the parametres' comment field.
  property fraction, origin: fresh water 1; name fraction_origin_fresh_water
  property fraction, origin: salt water 0; name fraction_origin_salt_water
  property fraction, origin: unspecified 0; name fraction_origin_unspecified
- Actinides, radioactive, unspecified [water, ocean]: 28.1 kBq; lognormal variance with pedigree 0.082, pedigree (1,1,5,5,1)
  presumed uncertainty of measurements
- Aluminium III [water, ocean]: 0.000179 kg; lognormal variance with pedigree 0.042, pedigree (1,1,5,5,1)
  data from operator
- Ammonium [water, ocean]: 0.000125 kg; lognormal variance with pedigree 0.042, pedigree (1,1,5,5,1)
  data from operator
- Barium II [water, ocean]: 6e-5 kg; lognormal variance with pedigree 0.042, pedigree (1,1,5,5,1)
  data from operator
- Caesium-137 [water, ocean]: 3220 kBq; lognormal variance with pedigree 0.342, pedigree (1,1,5,5,1)
  lower release in 2002 compared to 1996/1997
- Cobalt II [water, ocean]: 9.7e-5 kg; lognormal variance with pedigree 0.042, pedigree (1,1,5,5,1)
  data from operator
- Nickel II [water, ocean]: 9.7e-5 kg; lognormal variance with pedigree 0.042, pedigree (1,1,5,5,1)
  data from operator
- Nitrate [water, ocean]: 2.1 kg; lognormal variance with pedigree 0.042, pedigree (1,1,5,5,1)
  data from operator
- Nitrite [water, ocean]: 0.0436 kg; lognormal variance with pedigree 0.042, pedigree (1,1,5,5,1)
  data from operator
- Oils, unspecified [water, ocean]: 0.00304 kg; lognormal variance with pedigree 0.042, pedigree (1,1,5,5,1)
  data from operator
- Phosphorus [water, ocean]: 0.000836 kg; lognormal variance with pedigree 0.042, pedigree (1,1,5,5,1)
  data from operator
- Radioactive species, Nuclides, unspecified [water, ocean]: 16800 kBq; lognormal variance with pedigree 0.082, pedigree (1,1,5,5,1)
  presumed uncertainty of measurements
- Strontium-90 [water, ocean]: 358 kBq; lognormal variance with pedigree 0.342, pedigree (1,1,5,5,1)
  lower release in 2002 compared to 1996/1997
- Sulfide [water, ocean]: 0.00363 kg; lognormal variance with pedigree 0.042, pedigree (1,1,5,5,1)
  data from operator
- Tritium [water, ocean]: 6.69e6 kBq; lognormal variance with pedigree 0.082, pedigree (1,1,5,5,1)
  presumed uncertainty of measurements
- Water [water, unspecified]: 0.2205 m3; name water_to_water_unspecified; lognormal variance with pedigree 0.0827, pedigree (2,2,5,5,1)
  (same comment as for Water)
  property carbon content, fossil 0; name C_content_fossil
  property carbon content, non-fossil 0; name C_content_non_fossil
  property dry mass 0 kg; name DM
  property fraction, origin: fresh water 1; name fraction_origin_fresh_water_Ww
  property fraction, origin: salt water 0; name fraction_origin_salt_water_Ww
  property fraction, origin: unspecified 0; name fraction_origin_unspecified_Ww
  property water in wet mass 1000 kg; name WWM
  property wet mass 1000 kg; name WM

## Sampling procedure
Literature

## Extrapolations
none This dataset has been copied from an original dataset covering the geography RER. The uncertainty has been adjusted accordingly.

## Review by Roberto Dones 2003-08-19
passed
for final calculation August 2003

## Review by Emilia Moreno Ruiz 2015-10-09
price corrected
