# electricity, high voltage, hydro, import from UY

Dataset: EcoSpold 2, unit process
Geography: AR
Time period: 2012-01-01 to 2023-12-31
Technology level: current
Classification: ISIC rev.4 ecoinvent: 3510:Electric power generation, transmission and distribution
Scenario: Business-as-Usual
System model: Allocation, cut-off by classification
Generated by: Bárbara Civit
Published in: Suppen, N. 2017
Database: ecoinvent
isCopyrightProtected: true
accessRestrictedTo: 1

## General comment
This dataset represents the amount of imported electricity from Uruguay to AR. The import value is valid for 2014 and includes all electricity imports, independently whether used within the importing country, or re-exported. In the case of Uruguay, when the binational (Argentina-Uruguay) Salto Grande hydroelectric power plant presents a water spill risk (by excess of contributions of the Uruguay river), instead of discarding it, this hydraulic resource is used to generate electricity, even if the Uruguay can not absorb all its share. This surplus is imported by Argentina to a value equivalent to 50% of the marginal cost of the electricity market of Argentina, as a compromise between the two countries, justified for reasons of productivity. This type of importation represents a habitual case in the trade of electricity between both countries.
Source: SÍNTESIS DEL MERCADO ELÉCTRICO MAYORISTA DE LA REPÚBLICA ARGENTINA - Diciembre 2014.
The Argentinean imports from Uruguay are modelled as "electricity production, hydro, reservoir, non-alpine region, GLO2008 (Access date: January 18, 2018)" because this activity does not exist for UY.

## Included activities start
This activity represents the point of 'handing over' the electricity from one country to the other at the border

## Included activities end
This dataset doesn't include any electricity losses or transmission infrastructure as these are accounted for in the market datasets

## Time period
Annual production volume valid for 2014

## Reference product
- electricity, high voltage: 1 kWh; By-product classification allocatable product; CPC 17100: Electrical energy; HS2017 271600: Electrical energy
  production volume 6.58362e9 kWh
    Literature/Statistics
    Value taken from BASE_INFORME_MENSUAL for 2014, available from
    CAMMESA "COMPAÑÍA ADMINISTRADORA DEL MERCADO MAYORISTA ELÉCTRICO SOCIEDAD ANÓNIMA" Supporting documentation available at: http://portalweb.cammesa.com/Memnet1/default.aspx
    Informe mensual
  property price 0.0977 EUR2005
    Temporary price data. Calculated as 90% of purchasers price based on: 94% of the average price (to account for a 6% loss in transformation and transmission) for electricity for industrial consumersin 2005 (excluded taxes). From IEA.
  properties: carbon allocation 0 kg, carbon content 0

## Inputs from technosphere
- electricity, high voltage: 1 kWh; source Central Statistics Office 2015
  Literature/Statistics
  The energy imported from Uruguay during the considered time period was taken from BASE_INFORME_MENSUAL for 2014, available from
  CAMMESA "COMPAÑÍA ADMINISTRADORA DEL MERCADO MAYORISTA ELÉCTRICO SOCIEDAD ANÓNIMA" Supporting documentation available at: http://portalweb.cammesa.com/Memnet1/default.aspx
  Informe mensual
  The Argentinean imports from Uruguay are modelled as "electricity production, hydro, reservoir, non-alpine region"/ GLO2008 (Access date: January 18, 2018), because this activity does not exist for UY.

## Extrapolations
The amount of imported electricity from Uruguay to AR is obtained from
CAMMESA "COMPAÑÍA ADMINISTRADORA DEL MERCADO MAYORISTA ELÉCTRICO SOCIEDAD ANÓNIMA"
Supporting documentation available at: http://portalweb.cammesa.com/Memnet1/default.aspx

The Argentinean imports from Uruguay are modelled as "electricity production, hydro, reservoir, non-alpine region, GLO" because this activity does not exist for UY.

## Review by Christopher Oberschelp 2018-05-14
Review not completed as ecoinvent has to run a full database calculation. Review has to continue afterwards.
