# ethanol fermentation plant construction

Dataset: EcoSpold 2, unit process
Geography: RoW
Time period: 1997-01-01 to 2023-12-31
Technology level: current
Classification: ISIC rev.4 ecoinvent: 4290:Construction of other civil engineering projects
Classification: EcoSpold01Categories: biomass/fuels
Tags: ConvertedDataset
Scenario: Business-as-Usual
System model: Allocation, cut-off by classification
Generated by: Niels Jungbluth
Published in: Jungbluth N. 2007
Database: ecoinvent
isCopyrightProtected: true
accessRestrictedTo: 1

## General comment
Ethanol plant with an annual capacity of 90 000 tons ethanol and a life time of 20 years .
[This dataset was already contained in the ecoinvent database version 2. It was not individually updated during the transfer to ecoinvent version 3. Life Cycle Impact Assessment results may still have changed, as they are affected by changes in the supply chain, i.e. in other datasets. This dataset was generated following the ecoinvent quality guidelines for version 2. It may have been subject to central changes described in the ecoinvent version 3 change report (http://www.ecoinvent.org/database/ecoinvent-version-3/reports-of-changes/), and the results of the central updates were reviewed extensively. The changes added e.g. consistent water flows and other information throughout the database. The documentation of this dataset can be found in the ecoinvent reports of version 2, which are still available via the ecoinvent website. The change report linked above covers all central changes that were made during the conversion process.]

## Included activities end
Ethanol plant infrastructure including transformation and occupation of land, materials, energy uses, emissions, and dismanteling

## Geography
The inventory is modelled with data from a plant in the USA.

## Technology
Ethanol fermentation plant with wheat as resource.

## Time period
Literature

## Reference product
- ethanol fermentation plant: 1 unit; By-product classification allocatable product; CPC 53269: Other constructions for manufacturing
  production volume 3.96633 unit
    This is a placeholder value that does not reflect real-world production volumes. This dataset does not currently require a real-world production volume to work in the database framework, and no actual data were collected yet. This has no negative effect on the results of the ecoinvent database.
  property price 3.30592e7 EUR2005
    Convert from EU 27 price to the world by currency exchange rate.
  properties: carbon allocation 0 kg, carbon content 0

## Inputs from technosphere
- concrete, normal strength: 145.876, 32.0337, 20.8362, 27.823, 617.745, 259.336, 307.43, 10997.9 m3 (8 suppliers, which the file names only by identifier); sum of these 12409 m3; lognormal variance with pedigree 0.052, pedigree (1,1,5,5,1)
  Literature 2002
  Uncertainty: L
  properties: dry mass 2190 kg, water content 0.086758, wet mass 2380 kg
- copper, cathode: 36000 kg; lognormal variance with pedigree 0.1786, pedigree (4,5,5,5,5)
  Estimation
  Uncertainty: E
  properties: dry mass 1 kg, wet mass 1 kg
- diesel, burned in building machine: 122000 MJ; lognormal variance with pedigree 0.1786, pedigree (4,5,5,5,5)
  Estimation
  Uncertainty: E
  properties: heating value, net 1 MJ
- electricity, medium voltage: 412.802, 8234.48, 2766.76, 126.414, 25.3017, 5.43284, 574.988, 850.337, 1781.48 kWh (9 suppliers, which the file names only by identifier); sum of these 14778 kWh; lognormal variance with pedigree 0.1786, pedigree (4,5,5,5,5)
  Estimation
  Uncertainty: E
- nickel, class 1: 3200 kg; lognormal variance with pedigree 0.1786, pedigree (4,5,5,5,5)
  Estimation
  Uncertainty: E
  properties: dry mass 1 kg, wet mass 1 kg
- steel, chromium steel 18/8, hot rolled: 145000 kg; lognormal variance with pedigree 0.1786, pedigree (4,5,5,5,5)
  Estimation
  Uncertainty: E
  properties: carbon content, fossil 0.0008, dry mass 1 kg, wet mass 1 kg
  note on carbon content, fossil: Stainless steel model is the grade 304 steel (18/8 stainless, 18% chromium 8% nickel; max. 0.08% C)
- steel, low-alloyed, hot rolled: 167000 kg; lognormal variance with pedigree 0.1786, pedigree (4,5,5,5,5)
  Estimation
  Uncertainty: E
  properties: carbon content, fossil 0.005, dry mass 1 kg, wet mass 1 kg
  note on carbon content, fossil: Low alloyed steel composition given in Tab. 3.2 ecoinvent v2.2 report 10_partII. Steel assumed to have a C content of 0.5%
- steel, unalloyed: 394700 kg; lognormal variance with pedigree 0.052, pedigree (1,1,5,5,1)
  Literature 2002
  Uncertainty: L
  properties: carbon content, fossil 0.0025, dry mass 1 kg, wet mass 1 kg
  note on carbon content, fossil: Unalloyed steels or carbon steels are those in which the level of an individual element in no case reaches or exceeds the limiting concentration given in Tab. 3.1 ecoinvent v2.2 report 10_partII. Assumed to have a C content of 0.25%
- waste concrete, not reinforced: -1.78761e6, -2.55124e7 kg (2 suppliers, which the file names only by identifier); sum of these -2.73e7 kg; lognormal variance with pedigree 0.1786, pedigree (4,5,5,5,5)
  Estimation
  Uncertainty: E
  production volume
    Calculated from the production volume of ethanol fermentation plant in proportion to the respective output amounts.
  properties: dry mass 1 kg, wet mass 1 kg
- zinc: 86000 kg; lognormal variance with pedigree 0.1786, pedigree (4,5,5,5,5)
  Estimation
  Uncertainty: E
  properties: dry mass 1 kg, wet mass 1 kg

## Inputs from nature
- Occupation, construction site [natural resource, land]: 187500 m2*year; lognormal variance with pedigree 0.092, pedigree (1,1,5,5,1)
  Literature 2005
  Uncertainty: L
- Occupation, industrial area [natural resource, land]: 750000 m2*year; lognormal variance with pedigree 0.092, pedigree (1,1,5,5,1)
  Literature 2005
  Uncertainty: L
- Transformation, from unspecified [natural resource, land]: 37500 m2; lognormal variance with pedigree 0.172, pedigree (1,1,5,5,1)
  Literature 2005
  Uncertainty: L
- Transformation, to industrial area [natural resource, land]: 37500 m2; lognormal variance with pedigree 0.172, pedigree (1,1,5,5,1)
  Literature 2005
  Uncertainty: L

## Sampling procedure
Literature data

## Extrapolations
Some data are derived from other or unknown plants or have been estimated. This dataset has been copied from an original dataset covering the geography CH. The uncertainty has been adjusted accordingly.

## Review by Niels Jungbluth 2005-12-19
Passed.
