# packaging film production, low density polyethylene

Dataset: EcoSpold 2, unit process
Geography: RER
Time period: 1993-01-01 to 2023-12-31
Technology level: current
Classification: ISIC rev.4 ecoinvent: 2220:Manufacture of plastics products
Classification: EcoSpold01Categories: plastics/processing
Tags: ConvertedDataset
Scenario: Business-as-Usual
System model: Allocation, cut-off by classification
Generated by: Roland Hischier
Published in: Hischier R. 2007
Database: ecoinvent
isCopyrightProtected: true
accessRestrictedTo: 1

## General comment
Example process for the utilization of the different converting modules in the database.
[This dataset was already contained in the ecoinvent database version 2. It was not individually updated during the transfer to ecoinvent version 3. Life Cycle Impact Assessment results may still have changed, as they are affected by changes in the supply chain, i.e. in other datasets. This dataset was generated following the ecoinvent quality guidelines for version 2. It may have been subject to central changes described in the ecoinvent version 3 change report (http://www.ecoinvent.org/database/ecoinvent-version-3/reports-of-changes/), and the results of the central updates were reviewed extensively. The changes added e.g. consistent water flows and other information throughout the database. The documentation of this dataset can be found in the ecoinvent reports of version 2, which are still available via the ecoinvent website. The change report linked above covers all central changes that were made during the conversion process.]

## Included activities end
This process contains the plastic amount and the transport of the plastic from the production site to the converting site as well as the dataset "extrusion, plastic film"

## Geography
based on average European extrusion process

## Technology
present technologies

## Time period
time to which data refer

## Reference product
- packaging film, low density polyethylene: 1 kg; By-product classification allocatable product; CPC 36330: Plates, sheets, film, foil and strip, of plastics, not self-adhesive, non-cellular and not reinforced, laminat[…]; HS2017 392010: Plastics; plates, sheets, film, foil and strip (not self-adhesive), of polymers of ethylene, non-cellular a[...]
  EcoSpold01Location=RER
  production volume 1.32237 kg
    This is a placeholder value that does not reflect real-world production volumes. This dataset does not currently require a real-world production volume to work in the database framework, and no actual data were collected yet. This has no negative effect on the results of the ecoinvent database. The placeholder value of this activity was scaled according to the nominal GDP of 2005 (source: United Nations, http://data.un.org/Glossary.aspx?q=GDP+%28current+US%24%29, accessed 20130726) to reflect an appropriate share of the global production volume, which is also a placeholder value.
  property carbon content, fossil 0.857143
    Polyethylene is formed out of a huge amount of ethylene monomers (C2H4) (ecoinvent v2.2 report 11_II). MW=28 g/mol
  property price 2.97 EUR2005
    Calculated value based on data from United Nations Commodity Trade Statistics Database (comtrade.un.org). UN comtrade category: 392062 Sheet/film not cellular/reinf polyethylene terephtal. Using exchange rate of 1EURO = 1.209 USD. Average of price of import into 5 main markets (EU, US, JP, IN and CN).
  properties: carbon allocation 0.857143 kg, carbon content 0.857143, carbon content, non-fossil 0, dry mass 1 kg, heating value, net 42.47 MJ, water content 0, water in wet mass 0 kg, wet mass 1 kg

## Inputs from technosphere
- extrusion, plastic film: 1.02 kg; lognormal variance with pedigree 0.0592, pedigree (2,3,5,1,3)
  Typical values, based on a European and a Swiss study
  EcoSpold01Location=RER
  Uncertainty: typical values, based on a European and a Swiss study
- polyethylene, low density, granulate: 1.02 kg; lognormal variance with pedigree 0.0592, pedigree (2,3,5,1,3)
  EcoSpold01Location=RER
  Typical values, based on a European and a Swiss study
  Uncertainty: typical values, based on a European and a Swiss study
  properties: carbon content, fossil 0.857143, dry mass 1 kg, heating value, net 42.47 MJ, wet mass 1 kg
  note on carbon content, fossil: Polyethylene is formed out of a huge amount of ethylene monomers (C2H4) (ecoinvent v2.2 report 11_II). MW=28 g/mol

## Sampling procedure
company data

## Extrapolations
no extrapolation

## Review by Mischa Classen 2003-06-10
Eintrag "none" bei uncertainty adjustment fehlt -> korrigiert.
