# peanut seed production, for sowing

Dataset: EcoSpold 2, unit process
Geography: RoW
Time period: 1999-01-01 to 2023-12-31
Technology level: current
Classification: ISIC rev.4 ecoinvent: 0164:Seed processing for propagation
Tags: WFLDB
Scenario: Business-as-Usual
System model: Allocation, cut-off by classification
Generated by: [System]
Database: ecoinvent
isCopyrightProtected: true
accessRestrictedTo: 1

## General comment
This global dataset is a copy of the regional IN dataset, except for the following modifications.
The production volume represents the global annual production.
The geographicalCorrelation score of every pedigree matrix of was changed to '5'.
The comments below were part of the IN regional dataset.
This dataset represents the production of 1 kg of peanut seed (fresh weight), with a maximum water content of 13%, at regional storehouse.
This process is identical to the ecoinvent process 'pea seed production, for sowing, CH' which is used as a proxy for peanut seed production at regional storehouse. This dataset refers to an average situation; for specific situations exchanges might differ substantially due to site specific parameters

## Included activities start
This activity start after the harvest of the crop.

## Included activities end
The seed produced at the farm is treated in the processing centre (pre-cleaning, cleaning, eventually drying, chemical dressing (for integrated production) and bag filling), stored and afterwards transported to the regional storage centre. No data on wastewater production were available.

## Technology
Integrated production

## Time period
Time period referring to the data source: 1999-2002. Based on expert opinion data is considered to be valid at least up to 2012.

## Reference product
- peanut seed, for sowing: 1 kg; By-product classification allocatable product; CPC 86112: Seed processing services; HS2017 080290: Nuts, edible; n.e.c. in heading no. 0801 and 0802, fresh or dried, whether or not shelled or peeled
  production volume 1.92537e9 kg
    Source: FAOSTAT. Average, 2009-2012. Calculation method: crop production volume [kg] / crop productivity [kg/ha] * seeding density [kg/ha] = kg
  property carbon content, non-fossil 0.63623
    calculation: C-content of components according to ecoinvent report No. 15a. Source of composition: Souci, S.W., Fachmann, W., Kraut, H. (Hg.: Bundesminsiterium fur Ernahrung, Landwirtschaft und Forsten, Bonn) 'Die Zusammensetzung der Lebensmittel - Nahrwerttabellen', medpharm Scientific Publishers Stuttgart, CRC Press; 2000.
  property price 0.292606 EUR2005
    Calculated based on inputs: The price of the product has been calculated as a sum of the values of the material and energy inputs for this product. This value is therefore a rough estimation. It may underestimate the real price since there are additional expenses when producing any product. These expences can include for example labour costs, treatment of waste materials and profit for the producer. Please consider carefully whether this level of data quality is acceptable for your application.
  properties: carbon allocation 0.604723 kg, carbon content 0.63623, carbon content, fossil 0, dry mass 0.95048 kg, water content 0.0521, water in wet mass 0.04952 kg, wet mass 1 kg

## Inputs from technosphere
- building, multi-storey: 2e-5 m3; lognormal variance with pedigree 1.40352, pedigree (5,3,4,5,1)
  Building used for seed cleaning
- electricity, low voltage: 0.000405441, 0.00219382, 8.52588e-5, 3.31492e-5, 0.00231398, 0.000551546, 3.32625e-5, 0.000113676, 4.54206e-5, 0.0204231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 kWh (47 suppliers, which the file names only by identifier); sum of these 0.058 kWh; lognormal variance with pedigree 0.303503, pedigree (5,3,5,5,1)
  Related to the building used for seed cleaning
- packaging, for pesticides: 0.0032 kg; lognormal variance with pedigree 0.0592, pedigree (4,3,4,5,4)
  Total amount of active substance/s of pesticides needed for the production of peanut seed, for sowing is calculated to be circa 1.60E-03 kg. Pesticide/s used in this dataset is/are: 'pesticide, unspecified'. The total amount of active substance/s is doubled in order to account for the packaging of the dilluted product of pesticide/s that is/are applied. Therefore, 3.20E-03 kg of packaging for pesticides is justified with this exchange.
  properties: carbon content, fossil 0.85714, dry mass 1 kg, heating value, net 25.97 MJ, price 0.0642 EUR2005, wet mass 1 kg
- peanut seed, at farm: 1 kg; lognormal variance with pedigree 0.0512412, pedigree (1,1,4,5,3)
  Extrapolated from Ecoinvent v2.2 process 'Pea seed IP, at regional storehouse/CH U'.
  properties: carbon content, non-fossil 0.63623, dry mass 0.95048 kg, water content 0.0521, wet mass 1 kg
  note on carbon content, non-fossil: calculation: C-content of components according to ecoinvent report No. 15a. Source of composition: Souci, S.W., Fachmann, W., Kraut, H. (Hg.: Bundesminsiterium fur Ernahrung, Landwirtschaft und Forsten, Bonn) 'Die Zusammensetzung der Lebensmittel - Nahrwerttabellen', medpharm Scientific Publishers Stuttgart, CRC Press; 2000.
- pesticide, unspecified: 0.0016 kg; lognormal variance with pedigree 0.0439412, pedigree (2,2,4,5,1)
  Corresponds to 0.0016 kg/ha
  properties: carbon content, fossil 0.486978, dry mass 1 kg, wet mass 1 kg

## Inputs from nature
- Occupation, construction site [natural resource, land]: 8e-6 m2*year; lognormal variance with pedigree 0.396093, pedigree (5,3,4,5,1)
  Related to the building used for seed cleaning
- Occupation, industrial area [natural resource, land]: 0.0002 m2*year; lognormal variance with pedigree 0.396093, pedigree (5,3,4,5,1)
  Related to the building used for seed cleaning
- Transformation, from unspecified [natural resource, land]: 4e-6 m2; lognormal variance with pedigree 0.672265, pedigree (5,3,4,5,1)
  Related to the building used for seed cleaning
- Transformation, to industrial area [natural resource, land]: 4e-6 m2; lognormal variance with pedigree 0.672265, pedigree (5,3,4,5,1)
  Related to the building used for seed cleaning

## Sampling procedure
Data based on a literature, expert information and enquiry of seed processing plants.

## Extrapolations
The amount of the exchanges are copy from a regional dataset.
