# strawberry seedling production, in unheated greenhouse, for planting

Dataset: EcoSpold 2, unit process
Geography: RoW
Time period: 2009-01-01 to 2023-12-31
Technology level: current
Classification: ISIC rev.4 ecoinvent: 0130:Plant propagation
Tags: WFLDB
Scenario: Business-as-Usual
System model: Allocation, cut-off by classification
Generated by: [System]
Database: ecoinvent
isCopyrightProtected: true
accessRestrictedTo: 1

## General comment
This dataset is a weighted average of the regional datasets, with weights based on production volume of the reference product. Detailed comments and sources about the exchanges can be found in the regional datasets.
The geographicalCorrelation score of every pedigree matrix of was changed to '5'.
Sum of regional production volumes: 1.705e+8 unit
US: PV = 1.410e+8 unit; weight = 0.8273
ES: PV = 2.945e+7 unit; weight = 0.1727
The comments below were part of the US regional dataset.
This dataset represents the production of 1 strawberry seedling, under non-heated greenhouse.
Functional unit is one strawberry seedling at nursery.
50000 seedlings per ha.year are considered.

## Included activities start
This activity starts with the nursery producing seedlings

## Included activities end
Included processes: peat moss use, end-of-life and distribution to seedling farm, irrigation and greenhouse infrastructure.
Not included are: fertilizers and pesticides application and transport from the nursery to the farm where the seedlings will be planted.
This activity ends with seedlings exiting the nursery.

## Reference product
- strawberry seedling, for planting: 1 unit; By-product classification allocatable product; CPC 01961: Live plants; bulbs, tubers and roots; cuttings and slips; mushroom spawn; HS2017 060290: Plants, live; n.e.c. in heading no. 0602
  production volume 5.62159e8 unit
    Source: FAOSTAT. Average, 2009-2012. Assumption: 80% open field, 15% greenhouse non heated, 5% greenhouse heated
  property carbon content, non-fossil 0.439481
    calculation: C-content of components according to ecoinvent report No. 15a. Source of composition: https://ndb.nal.usda.gov/ndb/search/. Unspecific seedling used as proxy.
  property price 0.00634647 EUR2005
    Calculated based on inputs: The price of the product has been calculated as a sum of the values of the material and energy inputs for this product. This value is therefore a rough estimation. It may underestimate the real price since there are additional expenses when producing any product. These expences can include for example labour costs, treatment of waste materials and profit for the producer. Please consider carefully whether this level of data quality is acceptable for your application.
  properties: carbon allocation 0.254036 kg, carbon content 0.439481, carbon content, fossil 0, dry mass 0.578035 kg, water content 0.73, water in wet mass 0.421965 kg, wet mass 1 kg

## Inputs from technosphere
- greenhouse, plastic walls and roof: 7.6923e-7 m2*year
  Calculated value: 1 ha divided by 50000 seedlings per ha and by 26 (i.e. seedlings are transplanted after 2 weeks). Note: greenhouse dataset stands for 1 m2 used over 1 year
  properties: Surface 7 m2, lifetime 25 year
- irrigation: 1.3467e-6, 0.0031582, 2.69319e-5, 0.00164346, 2.07486e-5, 5.56311e-5, 0.00592853, 1.2137e-5, 3.12147e-7, 0.000183846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 m3 (15 suppliers, which the file names only by identifier); sum of these 0.0114626 m3
  Literature value: total amount of water used for irrigation (Manfredi et al. 2014). See supporting documentation 'WFLDB-Documentation.pdf' chapter 'Water use for irrigation' (https://ecoquery.ecoinvent.org/File/Reports). Irrigation water for assumed 2 times higher for US strawberries than for Italian tomatoes due to lower efficiency.
  properties: dry mass 0.11 kg, water content 9089.91, wet mass 1000 kg
- peat moss: 0.0003 m3
  Mass of peat for one seedling: 30 g/ seedling (Based on Stoessel et al. 2012); 2.3 seedling/m2 (Martinez-Blanco et al. 2011)
  properties: heating value, net 17.88 MJ

## Inputs from nature
- Occupation, arable land, unspecified use [natural resource, land]: 7.6923e-7 m2*year
  Calculated value: 50000 seedlings per ha, transplanted after 2 weeks (i.e. 1/26 of a year)
- Transformation, from arable land, unspecified use [natural resource, land]: 7.6923e-7 m2
  Calculated value: 50000 seedlings per ha, transplanted after 2 weeks (i.e. 1/26 of a year)
- Transformation, to arable land, unspecified use [natural resource, land]: 7.6923e-7 m2
  Calculated value: 50000 seedlings per ha, transplanted after 2 weeks (i.e. 1/26 of a year)

## Emissions to nature
- Water [air, non-urban air or from high stacks]: 6.1089e-7 m3
  Total water use for irrigation = 25.5 m3/ha, for 50'000 seedlings/ha (Manfredi et al. 2012); Irrigation efficiency: 63%, based on FAO (1989)
- Water [water, ground-]: 6.5893e-5 m3
  Water, to water, river = 0.2*((ETirr/EFirr) â€' ETirr), based on Lévová et al. (2012); Irrigation efficiency: 63%, based on FAO (1989)
- Water [water, surface water]: 0.000249854 m3
  Water, to water, river = 0.8*((ETirr/EFirr) â€' ETirr), based on Lévová et al. (2012); Irrigation efficiency: 63%, based on FAO (1989)

## Sampling procedure
Data are based on the main production of strawberry seedlings in the United States. Technology: Plastic greenhouses, non-heated
For the transport of seedlings to strawberry farm, 100 g per seedling is considered, including moisture and container (Stoessel et al. 2012).

## Extrapolations
The amount of the exchanges are weighted average of regional datasets.

## Review by Assumpció ANTON 2016-06-09
Be aware that the use of statistics in input calculations could provide some specific inputs not common for specific crops, this should be corrected if better information is available.
Pesticides will need to be amended periodically checking for update of pesticides' ban.
