# water production, deionised

Dataset: EcoSpold 2, unit process
Geography: CH
Time period: 2012-01-01 to 2023-12-31
Technology level: current
Classification: ISIC rev.4 ecoinvent: 3600:Water collection, treatment and supply
Synonyms: Demineralized water
Scenario: Business-as-Usual
System model: Allocation, cut-off by classification
Generated by: Laura Rubio
Published in: Gmünder S. 2017
Database: ecoinvent
isCopyrightProtected: false
accessRestrictedTo: 1

## General comment
This dataset represents the production of 1 kg of deionised water, delivered at the user, by ion exchange.
This dataset is a copy of the GLO deionised water production dataset.
Deionised (DI) water, also known as demineralized water has become an essential ingredient in many applications as is water that has had almost all its mineral ions removed (such as iron, sodium, calcium, copper, sulphate, chloride among others). It is typically used in cooling systems, machines lubrication, cosmetic and pharmaceutical sectors, medicine production, food processing and countless other industrial processes. The quality of water needed in the different applications varies considerably. E.g., the conductivity (used as quality parameter) for demineralised water is 1-10 μS cm-1. Such water is used as boiler feed water for boilers up to 30 bar pressure. On the other hand, the conductivity of completely demineralised water is in the range of 0.055-1.0 μS cm-1. The purest water is used within the waver and electronic circuit production. For the process analysed in this inventory the production plants includes an strong type anionic resion or combined cation/anion exchange resin. Such systems obtain, by operation with counterflow regeneration. The ion exchanger resin is essential throughout the operation of the system; large amounts of salt may be necessary for regenerationing it. Energy usage is required for pumping and mixing. Large uncertainties exist due to the influence of raw water quality and operation mode on the regeneration chemical demand and electricity used.
Reference:
Althaus H.-J., Chudacoff M., Hischier R., Jungbluth N., Osses M. and Primas A. (2007) Life Cycle Inventories of Chemicals. ecoinvent report No. 8, v2.0. EMPA Dübendorf, Swiss Centre for Life Cycle Inventories, Dübendorf, CH.
de Dardel, F. and Arden, T. V. 2008. Ion Exchangers. Ullmann's Encyclopedia of Industrial Chemistry.
[This dataset is meant to replace the following datasets:
- water production, deionised, from tap water, at user, CH, 1992 - 2002]

## Included activities start
The activity starts when the raw materials enter the process.

## Included activities end
This activity ends with the production of deionised water. The dataset includes the energy for operation, chemicals used for regeneration, emissions from regeneration chemicals, infrastructure of the plant and replacement of spent exchange resin. The process does not include very small units (cartridges) or very large units with >>100 m3/h (power stations). Other production methods, such as reverse osmosis, electrodialysis or distillation, are not covered with this process (which represents only ion exchange). The concentration of the chemicals in the treated water is assumed to be negligible

## Geography
The inventory is modelled from two LCA studies one in the United States and the other one in South Africa, to the rest of the world.

## Technology
The process includes an anionic resion or combined cation/anion exchange resin. The unit is operated with counterflow regeneration. Obtained water quality: about 1-0.1 uS/ cm for the conductivity and a silica content (as SiO2) of 5-25 ug/l. For the water source, tap water from a public supply with a total hardness of 1.71 mol/m3 (range 0.7 - 3.2) was assumed.
Reference:
Althaus H.-J., Chudacoff M., Hischier R., Jungbluth N., Osses M. and Primas A. (2007) Life Cycle Inventories of Chemicals. ecoinvent report No. 8, v2.0. EMPA Dübendorf, Swiss Centre for Life Cycle Inventories, Dübendorf, CH.

## Time period
The time period is set from 2012 to the year 2017 as it is considered to be a period in which deionised treatment plants have not passed through drastical technological changes.

## Reference product
- water, deionised: 1 kg; name RP; By-product classification allocatable product; CPC 18000: Natural water; CAS 7732-18-5
  Deionised water which is free of mineral salts. Deionised (Dl) water has become an essential ingredient in many applications including: medical, laboratory, pharmaceutical, cosmetics, electronics manufacturing, food processing, plating and countless other industrial processes.
  Reference:
  Althaus H.-J., Chudacoff M., Hischier R., Jungbluth N., Osses M. and Primas A. (2007) Life Cycle Inventories of Chemicals. ecoinvent report No. 8, v2.0. EMPA Dübendorf, Swiss Centre for Life Cycle Inventories, Dübendorf, CH.
  production volume 6.427e9 kg; name RP_PV_1; = 0.6427E+12*0.01
    Estimated value based on the total industrial water withdrawal according to AQUASTAT and assuming that 1% of the industrial water withdrawal is used for deionised water production.
    Source for industrial water withdrawals: Table 7.1 in World Water Assessment Programme. 2009. The United Nations World Water Development Report 3: Water in a Changing World. Paris: UNESCO, and London: Earthscan.
    Industrial water withdrawals value was taken from the AQUASTAT (FAO's global water information system, developed by the Land and Water Division and the most quoted source on global water statistics). This value comprises industrial water withdrawal which can include water from primary renewable and secondary freshwater resources, as well as water from over-abstraction of renewable groundwater or withdrawal from fossil groundwater, direct use of agricultural drainage water, direct use of (treated) wastewater, and desalinated water. This sector refers to self-supplied industries not connected to the public distribution network. The ratio between net consumption and withdrawal is estimated at less than 5%. It includes water for the cooling of thermoelectric and nuclear power plants, but it does not include hydropower. Water withdrawn by industries that are connected to the public supply network is generally included in municipal water withdrawal.
  property price 8.08172e-5 EUR2005
    Calculated based on inputs: The price of the product has been calculated as a sum of the values of the material and energy inputs for this product. This value is therefore a rough estimation. It may underestimate the real price since there are additional expenses when producing any product. These expences can include for example labour costs, treatment of waste materials and profit for the producer. Please consider carefully whether this level of data quality is acceptable for your application.
  properties: carbon allocation 0 kg, carbon content 0, carbon content, fossil 0, carbon content, non-fossil 0, dry mass 0 kg, water in wet mass 1 kg, wet mass 1 kg

## Inputs from technosphere
- aluminium sulfate, without water, in 4.33% aluminium solution state: 2.41e-5 kg; name aluminium_sulfate; lognormal variance with pedigree 0.0452, pedigree (1,4,5,5,2)
  Calculated value based on two LCA studies: A comparative life cycle assessment of process water treatment technologies at the Secunda industrial complex, South Africa (Ras & Blottnitz, 2012) and The Sustainability of Ion Exchange Water treatment Technology (Amin, 2016).
  properties: dry mass 1 kg, wet mass 1 kg
- electricity, medium voltage: 2.6e-5 kWh; lognormal variance with pedigree 0.0452, pedigree (1,4,5,5,2)
  Calculated value based on two LCA studies: A comparative life cycle assessment of process water treatment technologies at the Secunda industrial complex, South Africa (Ras & Blottnitz, 2012) and The Sustainability of Ion Exchange Water treatment Technology (Amin, 2016). Energy values range from 3.96E-05 MJ/kg to 4.59E-04 MJ/kg.
- hydrochloric acid, without water, in 30% solution state: 3.79e-5 kg; name hydrochloric_acid; lognormal variance with pedigree 0.0452, pedigree (1,4,5,5,2)
  (same comment as for aluminium sulfate, without water, in 4.33% aluminium solution state)
  properties: dry mass 1 kg, heating value, net 3.32 MJ, wet mass 1 kg
- ion-exchanger for water treatment: 9e-11 unit; lognormal variance with pedigree 0.0506, pedigree (1,4,5,5,2)
  Literature value, copied from the existing dataset " water production, deionised, from tap water, at user, GLO" (accessed in 20171201) as it was also considered adequate for this dataset.
  Reference:
  Althaus H.-J., Chudacoff M., Hischier R., Jungbluth N., Osses M. and Primas A. (2007) Life Cycle Inventories of Chemicals. ecoinvent report No. 8, v2.0. EMPA Dübendorf, Swiss Centre for Life Cycle Inventories, Dübendorf, CH.
- magnesium oxide: 9.14e-6 kg; name magnesium_oxide; lognormal variance with pedigree 0.0452, pedigree (1,4,5,5,2)
  (same comment as for aluminium sulfate, without water, in 4.33% aluminium solution state)
  properties: dry mass 1 kg, wet mass 1 kg
- sewage sludge: -2.22e-5 m3; name sewage_sludge; = (water_input + water_input2)*0.02; lognormal variance with pedigree 0.1627, pedigree (2,2,1,5,5)
  Estimated value based on the EPA guideline "Drinking Water Treatment Plant Residuals Management Technical Report" in which typical lime softening sludge volumes produced by water treatment plants are computed. 2% of the total water input was assumed as the produced sludge. The sludge contains calcium carbonate, magnesium hydroxide, other divalent ions, natural organic matter from the source water, inorganics, suspended solids, microorganisms, and radionuclides. Metals found in the softening sludges include calcium, magnesium, arsenic, barium, cadmium, chromium, lead, mercury, selenium, and silver (Cornwell, 1999). (retrieved from: https://www.epa.gov/sites/production/files/2015-11/documents/dw-treatment-residuals-mgmt-tech-report-sept-2011.pdf)
  production volume; = RP_PV_1 * (sewage_sludge / RP)
    Calculated from production volume of reference product using the relative outputs.
  property dry mass 21.63 kg; name DM_BP01; = 0.03*WM_BP01
  property water in wet mass 699.37 kg; name WWM_BP01; = WM_BP01 - DM_BP01
  property wet mass 721 kg; name WM_BP01
  properties: carbon content, non-fossil 0.4096, water content 32.3333
- sodium chloride, powder: 0.000112 kg; name sodium_chloride; lognormal variance with pedigree 0.0452, pedigree (1,4,5,5,2)
  (same comment as for aluminium sulfate, without water, in 4.33% aluminium solution state)
  properties: dry mass 1 kg, wet mass 1 kg
- sodium hydroxide, without water, in 50% solution state: 8.97e-5 kg; name sodium_hydroxide; lognormal variance with pedigree 0.0566, pedigree (1,5,5,5,2)
  (same comment as for aluminium sulfate, without water, in 4.33% aluminium solution state)
  properties: dry mass 1 kg, heating value, net 3.03 MJ, wet mass 1 kg
- steam, in chemical industry: 1.31e-5 kg; name steam; lognormal variance with pedigree 0.0452, pedigree (1,4,5,5,2)
  (same comment as for aluminium sulfate, without water, in 4.33% aluminium solution state)
  properties: dry mass 1 kg, wet mass 1 kg
- sulfuric acid: 0.000191 kg; name sulfuric_acid; lognormal variance with pedigree 0.2106, pedigree (5,5,5,5,5)
  (same comment as for aluminium sulfate, without water, in 4.33% aluminium solution state)
  properties: dry mass 1 kg, wet mass 1 kg
- wastewater, unpolluted: -8.03029e-5 m3; name BP_amount_1; = ((water_input + water_input2) - RP/1000 - WWM_BP01*sewage_sludge/1000)*0.85; lognormal variance with pedigree 0.0054, pedigree (1,4,2,5,2)
  Estimated value based on water balance ( WaterIN - Water Out)
  production volume; = RP_PV_1 * (BP_amount_1 / RP)
    Calculated from production volume of reference product using the relative outputs.
  properties: carbon content, fossil 0.00178991, carbon content, non-fossil 0.00178991, dry mass 0.337476 kg, water content 2962.17, wet mass 1000 kg
  note on carbon content, fossil: Assumed to be like in tap water. Bicarbonate content is 2.93 mol/m3. CO2 content is 0.1 mol/m3 (ecoinvent v2.2 report 8, Tab 93.1).

## Inputs from nature
- Water, river [natural resource, in water]: 0.000535 m3; name water_input2; = 1.11/1000-water_input; lognormal variance with pedigree 0.0452, pedigree (1,4,5,5,2)
  (same comment as for aluminium sulfate, without water, in 4.33% aluminium solution state)
- Water, well, in ground [natural resource, in water]: 0.000575 m3; name water_input; lognormal variance with pedigree 0.0452, pedigree (1,4,5,5,2)
  (same comment as for aluminium sulfate, without water, in 4.33% aluminium solution state)

## Emissions to nature
- Water [air, non-urban air or from high stacks]: 1.41842e-5 m3; name water_to_air; = (((water_input + water_input2) - RP/1000 - WWM_BP01*sewage_sludge/1000)*0.15) + steam/1000; lognormal variance with pedigree 0.0452, pedigree (1,4,5,5,2)
  Calculated value based on literature values and expert opinion taken from the pre-existing dataset “water production, deionised, from tap water" (GLO) (accessed on the 2017-12-18) as it was also considered adequate for this dataset. 15% of water lost during production of deionised water is considered to be lost to air.
- Aluminium III [water, surface water]: 3.80099e-6 kg; = aluminium_sulfate/342.15*(26.9815*2); lognormal variance with pedigree 0.28, pedigree (5,5,5,5,5)
  Calculated value. Stoechiometric calculations were used to calculate the emissions to water based on the type and amount of chemicals used. Since the actual fate of the chemical is unknown, it was assume that all aluminum is emitted to the water (so basically remain in the water)
- Chloride [water, surface water]: 0.0001048 kg; = hydrochloric_acid/36.45*35.45+ sodium_chloride/58.44*35.45; lognormal variance with pedigree 0.28, pedigree (5,5,5,5,5)
  Calculated value. Stoechiometric calculations were used to calculate the emissions to water based on the type and amount of chemicals used.
- Magnesium [water, surface water]: 5.51175e-6 kg; = magnesium_oxide/40.3044*24.305; lognormal variance with pedigree 0.28, pedigree (5,5,5,5,5)
  Calculated value. Stoechiometric calculations were used to calculate the emissions to water based on the type and amount of chemicals used. Since the actual fate of the chemical is unknown, it was assume that all magnesium is emitted to the water (so basically remain in the water)
- Sodium I [water, surface water]: 9.5619e-5 kg; = sodium_hydroxide/39.9971*22.99+ sodium_chloride/58.44*22.99; lognormal variance with pedigree 0.28, pedigree (5,5,5,5,5)
  (same comment as for Chloride)
- Sulfate [water, surface water]: 6.77568e-6 kg; = aluminium_sulfate/342.15*(32.065*3); lognormal variance with pedigree 0.28, pedigree (5,5,5,5,5)
  Calculated value. Stoechiometric calculations were used to calculate the emissions to water based on the type and amount of chemicals used.Since the actual fate of the chemical is unknown, it was assume that all sulfate is emitted to the water (so basically remain in the water)

## Sampling procedure
Data for regeneration chemical, infrastucture and energy demand based mainly on two LCA studies.

References: A comparative life cycle assessment of process water treatment technologies at the Secunda industrial complex, South Africa (Ras & Blottnitz, 2012) and The Sustainability of Ion Exchange Water treatment Technology (Amin, 2016)

## Extrapolations
This dataset is a copy of the GLO deionised water production dataset.

From two LCA studies, one in the United States and the other one in South Africa, to Global deionised facilities. Data was used for updating chemicals, infrastucture and energy exchanges. Emission are assumed to be in a negligible concentration in the treated water, so they are modeled as emissions to water ( conservative assumption). The Uncertainty has been changed accordingly

## Review by Philippe Loubet 2017-12-22
The overall quality of these datasets is good.
In the future it would be desirable to consider different water quality types for this process (eg. tap water or raw river water)
