# light clay brick production

Dataset: EcoSpold 2, unit process
Geography: RoW
Time period: 1992-01-01 to 2023-12-31
Technology level: current
Classification: EcoSpold01Categories: construction materials/bricks
Classification: ISIC rev.4 ecoinvent: 2392:Manufacture of clay building materials
Tags: ConvertedDataset
Scenario: Business-as-Usual
System model: Allocation, cut-off by classification
Generated by: Daniel Kellenberger (obsolete)
Published in: Kellenberger D. 2004
Database: ecoinvent
isCopyrightProtected: true
accessRestrictedTo: 1

## General comment
technical drying by heat from liquid gas (natural gas used as proxy). It is assumed that there is wastewater but as no data is available it is not included. The lifespan of the plant is assumed to be 50 years.

## Included activities end
includes the raw materials clay, straw and water, their transport to the finishing plant, the drying energy, the packaging and the infrastructure. Beside the product, some solid household (e.g. packing material) waste is taken into account.

## Geography
For some exchanges CH, RER and GLO modules have been used as proxy.

## Technology
The raw materials (clay and straw) are mixed with water and poured into a mould. The drying process is technical with the use of a natural gas heater

## Parameters
- fraction, process water, to air: 0.5 dimensionless; name fraction_PW_to_air; lognormal variance with pedigree 0.092025, pedigree (4,4,3,2,4)
- fraction, tap water, to air: 0.5 dimensionless; name fraction_TW_to_air; lognormal variance with pedigree 0.092025, pedigree (4,4,3,2,4)

## Reference product
- light clay brick: 1 kg; name RP_amount_1; By-product classification allocatable product; CPC 37310: Bricks, blocks, tiles and other ceramic goods of siliceous earths; HS2017 6901: Bricks, blocks, tiles and other ceramic goods of siliceous fossil meals (e.g. kieselguhr, tripolite or diatom[...]
  EcoSpold01Location=DE
  production volume 2.3062e10 kg; name RP_PV_1; = (32000000*1000*0.39*0.5/1.01)/0.26
    Estimated value. According to Elzea Kogel, J, Trivedi, N.C., Barker, J.M. & Krukowski, S. T. (editors) (2006) Industrial Minerals and Rocks: Commodities, Markets and Uses, 7th edition, no precise estimates have been made so far on clay production, problems in these estimates are the exclusion of China and India in the majority of statistical references and the inclusion of different types of clays in different categories depending on the reporting geography. Kogel et al. estimate for 2002 World production of common clay to be hundreds of Mt, for refractory more than 20Mt , Kaolin 43 Mt mined and 26 Mt sold, Bentonite 10.3 Mt, Fuller’s earth uncertain 10Mt, ball clay 15.5 Mt and Hormites 2.1 Mt. As no precise estimate was found the World production volume for clay and kaolin production are estimated from European production volumes. For Bentonite and Kaolin World values are available from the European mineral statistics 2009-2013 (http://www.bgs.ac.uk/mineralsuk/statistics/europeanStatistics.html, accessed 08.02.2016) for which Eu production for Kaolin is 34.5% of World’s production and for Bentonite is the 16.4%. The remaining World values are scaled assuming that EU represents the 26% of World’s production, based on the average between Kaolin and Bentonite. Following the commodities are listed with their Prodcom codes, Prodcom name and production volume for EU 28 in tons: 08122210 “Bentonite” 2216788 tons, 08122230 “Fireclay” 2542435 tons, 08122250 “Common clays and shales for construction use (excluding bentonite, fireclay, expanded clays, kaolin and kaolinic clays); andalusite, kyanite and sillimanite; mullite; chamotte or dinas earths” 32000000 tons, and 08122160 “Kaolinitic clays (ball and plastic clays)” 2997294 tons. According to the European mineral statistics 2009-2013 (<http://www.bgs.ac.uk/mineralsuk/statistics/europeanStatistics.html>, accessed 08.02.2016), Europe (EU36) produces 9.1Mt of Kaolin, which is 34.5% of World production, of which 47.8% (16% of all World production) comes from Germany. The largest producer in 2013 was US with 23%, China represented the 12%, Brazil 8%, and Iran 6%. The European mineral statistics values are used for both Europe and the World estimates. The same source reports for EU36 Bentonite production of 2.73 Mt for 2013, which represents the 16.4% of World production. The values for Europe matches the values indicated from Eurostat and it used to estimate World’s production. Germany produces 13.1% of Europe’s bentonite 358844 tons. The volume of produced clay is assigned to the different activities based on USGS (2015) estimates of uses in the USA (<http://minerals.usgs.gov/minerals/pubs/commodity/clays/mcs-2015-clays.pdf>, accessed 08.02.2016) and according to input of clay per reference product. Of common clay, 39% is used for brick (for which 50% is assumed to be used for clay bricks and 50% light clay bricks), 23% lightweight aggregate, 31% cement, and 7% other uses (USGS specifies that 9% of common clay is used for lightweight concrete block production in the 2013 Minerals yearbook http://minerals.usgs.gov/minerals/pubs/commodity/clays/myb1-2013-clays.pdf, accessed 08.02.2016). Of ball clay, 39% is used for floor and wall tiles, 17% sanitary ware, and 44% other uses. Of bentonite 26% absorbents, 24% drilling mud, 15% foundry sand bond (assumed to represent plaster clay), 11% iron ore pelletising, and 24% other uses. Of fire clay, 34% for heavy clay products, and 66% for refractory and other products. Of fuller’s earth, 70% absorbents, and 30% for other uses. The US produce 15 to 25 % of refined clays (without common clay and shale). Comparing the estimated global values with the data for USGS (2015) for the production in USA, the US is responsible for 20% of Kaolin products, 34% of Bentonite and more than 10% of common clays. USGS (2015) reports USA to “probably” represent 15% to 25% of World production of refined clays excluding common clays.
  property carbon content, fossil 0
    Made from clay (85%) and straw (15%) ecoinvent v2.2 report 7, part XXI, Tab 6.14 & pg 8. Straw C content in DM was considered 0.43 kg C
  property carbon content, non-fossil 0.06804
    (same comment as for light clay brick)
  properties: carbon allocation 0.06804 kg, carbon content 0.06804, dry mass 1 kg, heating value, net 0 MJ, price 0.0826 EUR2005, water content 0, water in wet mass 0 kg, wet mass 1 kg

## Inputs from technosphere
- clay: 1.00984, 0.000155008 kg (2 suppliers, which the file names only by identifier); sum of these 1.01 kg; lognormal variance with pedigree 0.072, pedigree (3,5,5,5,1)
  EcoSpold01Location=CH
  properties: dry mass 0.965 kg, water content 0.0362694, wet mass 1 kg
- clay pit infrastructure: 1.67e-10 unit; lognormal variance with pedigree 0.692, pedigree (1,1,5,5,1)
  estimated
  EcoSpold01Location=CH
- diesel, burned in building machine: 0.0158 MJ; lognormal variance with pedigree 0.102, pedigree (3,5,5,5,1)
  EcoSpold01Location=GLO
  properties: heating value, net 1 MJ
- electricity, medium voltage: 2.12534e-6, 3.18141e-6, 1.00504e-6, 1.87076e-5, 1.098e-5, 1.30178e-5, 0.000158122, 3.77123e-7, 0.00315419, 0.0010598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 kWh (47 suppliers, which the file names only by identifier); sum of these 0.00556 kWh; lognormal variance with pedigree 0.102, pedigree (3,5,5,5,1)
  EcoSpold01Location=DE
- heat, district or industrial, natural gas: 0.0287683, 1.75069, 0.000541017 MJ (3 suppliers, which the file names only by identifier); sum of these 1.78 MJ; lognormal variance with pedigree 0.102, pedigree (3,5,5,5,1)
  EcoSpold01Location=RER
  properties: heating value, net 1 MJ
- inert waste, for final disposal: -0.000124191, -8.08519e-7 kg (2 suppliers, which the file names only by identifier); sum of these -0.000125 kg; lognormal variance with pedigree 0.102, pedigree (3,5,5,5,1)
  EcoSpold01Location=CH
  production volume; = BP_amount_1* RP_PV_1/ RP_amount_1
    Calculated from the production volume of light clay brick in proportion to the respective output amounts.
  properties: dry mass 0.995 kg, water content 0.00502513, wet mass 1 kg
- packing, clay product: 1 kg; lognormal variance with pedigree 0.692, pedigree (1,1,5,5,1)
  estimated
  EcoSpold01Location=CH
- straw: 0.162 kg; lognormal variance with pedigree 0.072, pedigree (3,5,5,5,1)
  property carbon content, fossil 0; name C_content_fossil
  property carbon content, non-fossil 0.437377; name C_content_non_fossil
  property dry mass 0.85 kg; name DM
  property water content 0.176471; name water_content
  property water in wet mass 0.15 kg; name WWM
  property wet mass 1 kg; name WM
  properties: heating value, net 14.25 MJ
  note on heating value, net: Literature value, Source: Phyllis2, database for (treated) biomass, algae, feedstocks for biogas production and biochar, https://phyllis.nl/Biomass/View/1271, ECN.TNO
- tap water: 0.000229225, 0.000349435, 0.000652027, 0.00175651, 0.000211437, 0.00881136, 0.000157141, 0.100833 kg (8 suppliers, which the file names only by identifier); sum of these 0.113 kg; lognormal variance with pedigree 0.102, pedigree (3,5,5,5,1)
  EcoSpold01Location=RER
  properties: carbon content, fossil 0.00178991, dry mass 0.000337476 kg, water content 2962.17, wet mass 1 kg
  note on carbon content, fossil: Bicarbonate content is 2.93 mol/m3. CO2 content is 0.1 mol/m3 (ecoinvent v2.2 report 8, Tab 93.1).

## Emissions to nature
- Water [air, unspecified]: 5.65e-5 m3; name water_to_air_unspecified; = (tap_water_input/1000*fraction_TW_to_air); lognormal variance with pedigree 0.0827, pedigree (2,2,5,5,1)
  Calculated value based on literature values and expert opinion. See comments in the parametres' comment field.
  property fraction, origin: fresh water 1; name fraction_origin_fresh_water
  property fraction, origin: salt water 0; name fraction_origin_salt_water
  property fraction, origin: unspecified 0; name fraction_origin_unspecified
- Water [water, unspecified]: 5.65e-5 m3; name water_to_water_unspecified; = (tap_water_input/1000)*(1-fraction_TW_to_air); lognormal variance with pedigree 0.0827, pedigree (2,2,5,5,1)
  (same comment as for Water)
  property fraction, origin: fresh water 1; name fraction_origin_fresh_water_Ww
  property fraction, origin: salt water 0; name fraction_origin_salt_water_Ww
  property fraction, origin: unspecified 0; name fraction_origin_unspecified_Ww

## Sampling procedure
Literature

## Extrapolations
See geography This dataset has been copied from an original dataset covering the geography DE. The uncertainty has been adjusted accordingly.

## Review by Roberto Dones 2004-04-05
passed

## Review by Bo Weidema 2012-07-19
input of "straw, production mix" changed to "straw"
