# horn meal production

Dataset: EcoSpold 2, unit process
Geography: RoW
Time period: 1993-01-01 to 2023-12-31
Technology level: current
Classification: ISIC rev.4 ecoinvent: 1010:Processing and preserving of meat
Classification: EcoSpold01Categories: agricultural means of production/organic fertiliser
Tags: ConvertedDataset
Scenario: Business-as-Usual
System model: Allocation, cut-off by classification
Generated by: Angelika Heil
Published in: Nemecek, T. 2007
Database: ecoinvent
isCopyrightProtected: true
accessRestrictedTo: 1

## General comment
Values regarding energy requirements were approximated from the energy consumption, which is typical for bone meal production in the European Union.
[This dataset was already contained in the ecoinvent database version 2. It was not individually updated during the transfer to ecoinvent version 3. Life Cycle Impact Assessment results may still have changed, as they are affected by changes in the supply chain, i.e. in other datasets. This dataset was generated following the ecoinvent quality guidelines for version 2. It may have been subject to central changes described in the ecoinvent version 3 change report (http://www.ecoinvent.org/database/ecoinvent-version-3/reports-of-changes/), and the results of the central updates were reviewed extensively. The changes added e.g. consistent water flows and other information throughout the database. The documentation of this dataset can be found in the ecoinvent reports of version 2, which are still available via the ecoinvent website. The change report linked above covers all central changes that were made during the conversion process.]

## Included activities end
Energy demand required for sterilisation of horns by autoclave and subsequent milling to horn meal were taken into account. Transports from a manufacturer in India, representing the most important country of production of horn meal for the Swiss market, to the regional storehouse in Switzerland were supplemented. No process emissions were taken into account. Infrastructure and land use were included by means of proxy data.

## Geography
The values refer to the market situation in Switzerland.

## Technology
Values refer to a commonly used technology for this product.

## Time period
Year of publication of the reference from which the energy demand of further processing was taken from.

## Reference product
- horn meal: 1 kg; By-product classification allocatable product; CPC 39110: Raw offal, inedible (including pigs' bristles, horse hair, animal guts, bird skins, feathers, bones and ivory); HS2017 050690: Animal products; bones and horn-cores and powder or waste of such, unworked, defatted, simply prepared (not[...]
  EcoSpold01Location=CH
  production volume 3.96633 kg
    This is a placeholder value that does not reflect real-world production volumes. This dataset does not currently require a real-world production volume to work in the database framework, and no actual data were collected yet. This has no negative effect on the results of the ecoinvent database.
  property carbon content, non-fossil 0.7
    From European Down and Feather Association, http://www.edfa.eu/englisch/eumwelt.htm
  property price 0.44 EUR2005
    Calculated value based on data from United Nations Commodity Trade Statistics Database (comtrade.un.org). UN comtrade category: 310100 Animal or vegetable fertilizer, in packs >10kg. Year 2005. Using exchange rate of 1EURO = 1.209 USD. Average of price of import into 5 main markets (EU, US, JP, IN and CN).
  properties: carbon allocation 0.7 kg, carbon content 0.7, carbon content, fossil 0, dry mass 1 kg, water content 0, water in wet mass 0 kg, wet mass 1 kg

## Inputs from technosphere
- building, hall: 7.37e-6 m2; lognormal variance with pedigree 0.3712, pedigree (2,3,5,5,3)
  EcoSpold01Location=CH
- electricity, low voltage: 0.00143937, 6.42511e-5, 0.00101039, 0.020972, 0.00207004, 1.28938e-5, 0.00475307, 0.00722034, 0.0003577 kWh (9 suppliers, which the file names only by identifier); sum of these 0.0379 kWh; lognormal variance with pedigree 0.0712, pedigree (2,3,5,5,3)
  EcoSpold01Location=UCTE
- heat, district or industrial, natural gas: 0.0139929, 0.851533, 0.314474 MJ (3 suppliers, which the file names only by identifier); sum of these 1.18 MJ; lognormal variance with pedigree 0.0712, pedigree (2,3,5,5,3)
  EcoSpold01Location=RER
  properties: heating value, net 1 MJ

## Inputs from nature
- Occupation, construction site [natural resource, land]: 5.53e-5 m2*year; lognormal variance with pedigree 0.1112, pedigree (2,3,5,5,3)
- Occupation, industrial area [natural resource, land]: 0.00138 m2*year; lognormal variance with pedigree 0.1112, pedigree (2,3,5,5,3)
- Transformation, from pasture, man made [natural resource, land]: 2.76e-5 m2; lognormal variance with pedigree 0.1912, pedigree (2,3,5,5,3)
- Transformation, to industrial area [natural resource, land]: 2.76e-5 m2; lognormal variance with pedigree 0.1912, pedigree (2,3,5,5,3)

## Sampling procedure
Data approximate production of horn meal in India, from where the largest part of horn meal consumption in Switzerland is imported.

## Extrapolations
Energy requirements for further processing of horns to horn meal in India approximated from the situation in Europe. This dataset has been copied from an original dataset covering the geography CH. The uncertainty has been adjusted accordingly.

## Review by Maggie Osses 2003-07-25
Passed.
