# anhydrite floor production

Dataset: EcoSpold 2, unit process
Geography: RoW
Time period: 2000-01-01 to 2023-12-31
Technology level: current
Classification: EcoSpold01Categories: mortar and plaster/production
Classification: ISIC rev.4 ecoinvent: 2395:Manufacture of articles of concrete, cement and plaster
Synonyms: Anhydritestrich, Caclumsulfat-Fliessestrich
Tags: ConvertedDataset
Scenario: Business-as-Usual
System model: Allocation, cut-off by classification
Generated by: Daniel Kellenberger (obsolete)
Published in: Kellenberger D. 2007
Database: ecoinvent
isCopyrightProtected: true
accessRestrictedTo: 1

## General comment
The raw materials for ready mix product are mixed. After mixing it is internally transported to the packing installation and packed. For the use 0.048 kg water has to be added per kg dry product (not included in this dataset). No direct process emissions are taken into account as they play a subordinate role compared to the emissions of the raw material production (e.g. drying of silica sand) and because no data is available. For inventorying the infrastructure, a yearly production amount of 150'000 tons is assumed. The lifespan of the machines is assumed to be 20 years.
[This dataset was already contained in the ecoinvent database version 2. It was not individually updated during the transfer to ecoinvent version 3. Life Cycle Impact Assessment results may still have changed, as they are affected by changes in the supply chain, i.e. in other datasets. This dataset was generated following the ecoinvent quality guidelines for version 2. It may have been subject to central changes described in the ecoinvent version 3 change report (http://www.ecoinvent.org/database/ecoinvent-version-3/reports-of-changes/), and the results of the central updates were reviewed extensively. The changes added e.g. consistent water flows and other information throughout the database. The documentation of this dataset can be found in the ecoinvent reports of version 2, which are still available via the ecoinvent website. The change report linked above covers all central changes that were made during the conversion process.]

## Included activities end
Includes the whole manufacturing process to produce anhydrite floor (raw material provision, raw material mixing, packing, and storage), transports to plant, and infrastructure. No requirements for administration are included. No additional buildings and land-use are taken into account as it is assumed that the mixing process takes place in an existing building of the sand/cement industry or on the construction site

## Geography
For the infrastructure RER- and for the silica sand DE-modules are used as proxy

## Technology
Assumed average current technology. The raw materials are mixed in an assumed average ratio, transported to the packing installation and packed.

## Reference product
- anhydrite floor: 1 kg; By-product classification allocatable product; CPC 15200: Gypsum; anhydrite; limestone flux; limestone and other calcareous stone, of a kind used for the manufacture of[…]; HS2017 252010: Gypsum; anhydrite
  EcoSpold01Location=CH
  production volume 3.96633 kg
    This is a placeholder value that does not reflect real-world production volumes. This dataset does not currently require a real-world production volume to work in the database framework, and no actual data were collected yet. This has no negative effect on the results of the ecoinvent database.
  property carbon content, fossil 0
    Raw materials are listed in Tab 5.2, ecoinvent v2.2 report 7, part XVII (26% anhydrite; sand 73.2%). C content is calculated after C content of raw materials
  property carbon content, non-fossil 0
    Raw materials are listed in Tab 5.2, ecoinvent v2.2 report 7, part XVII. C content is calculated after C content of raw materials
  property price 0.110109 EUR2005
    Calculated based on inputs: The price of the product has been calculated as a sum of the values of the material and energy inputs for this product. This value is therefore a rough estimation. It may underestimate the real price since there are additional expenses when producing any product. These expences can include for example labour costs, treatment of waste materials and profit for the producer. Please consider carefully whether this level of data quality is acceptable for your application.
  properties: carbon allocation 0 kg, carbon content 0, dry mass 1 kg, water content 0, water in wet mass 0 kg, wet mass 1 kg

## Inputs from technosphere
- acetic acid, without water, in 98% solution state: 0.0015 kg; lognormal variance with pedigree 0.692, pedigree (1,1,5,5,1)
  estimation
  EcoSpold01Location=RER
  properties: carbon content, fossil 0.400016, dry mass 1 kg, heating value, net 14.6 MJ, wet mass 1 kg
  note on heating value, net: Based on literature, page 10, Althaus H.-J., Chudacoff M., Hischier R., Jungbluth N., Osses M. and Primas A. (2007) Life Cycle Inventories of Chemicals. Final report ecoinvent data v2.0 No. 8. EMPA, Swiss Centre for Life Cycle Inventories, Dübendorf, CH, Online-Version under: www.ecoinvent.org.
- anhydrite: 0.26 kg; lognormal variance with pedigree 0.082, pedigree (1,1,5,5,1)
  EcoSpold01Location=CH
  estimation
  properties: dry mass 0.984 kg, water content 0.0162602, wet mass 1 kg
- conveyor belt: 3.3333e-8 m; lognormal variance with pedigree 0.692, pedigree (1,1,5,5,1)
  EcoSpold01Location=RER
  estimation
- electricity, medium voltage: 0.000775938, 0.0154782, 0.00520064, 0.000237619, 4.75592e-5, 1.0212e-5, 0.0010808, 0.00159837, 0.00334863 kWh (9 suppliers, which the file names only by identifier); sum of these 0.027778 kWh; lognormal variance with pedigree 0.692, pedigree (1,1,5,5,1)
  estimation
  EcoSpold01Location=CH
- industrial machine, heavy, unspecified: 6.6667e-6 kg; lognormal variance with pedigree 0.692, pedigree (1,1,5,5,1)
  EcoSpold01Location=RER
  estimation
- lime: 0.002 kg; lognormal variance with pedigree 0.692, pedigree (1,1,5,5,1)
  EcoSpold01Location=CH
  estimation
  properties: carbon content, fossil 0.120005, dry mass 1 kg, wet mass 1 kg
- melamine formaldehyde resin: 0.0015 kg; lognormal variance with pedigree 0.692, pedigree (1,1,5,5,1)
  estimation
  EcoSpold01Location=RER
  properties: carbon content, fossil 0.311708, dry mass 1 kg, heating value, net 9.44 MJ, wet mass 1 kg
  note on carbon content, fossil: Chemical formula of the melamine formaldehide monomer was assumed to be C4H6N6O
- packing, cement: 1 kg; lognormal variance with pedigree 0.692, pedigree (1,1,5,5,1)
  estimation
  EcoSpold01Location=CH
- polyethylene, high density, granulate: 0.0015 kg; lognormal variance with pedigree 0.692, pedigree (1,1,5,5,1)
  EcoSpold01Location=RER
  estimation
  properties: carbon content, fossil 0.857143, dry mass 1 kg, heating value, net 42.47 MJ, wet mass 1 kg
  note on carbon content, fossil: Polyethylene is formed out of a huge amount of ethylene monomers (C2H4) (ecoinvent v2.2 report 11_II). MW=28 g/mol
- potassium chloride: 0.00237435 kg; lognormal variance with pedigree 0.692, pedigree (1,1,5,5,1)
  The exchange has been updated from 'potassium chloride, as K2O' into 'potassium chloride' and therefore its amount has been scaled (multiplied) from 0.0015 kg by 1.5829 kg of 'potassium chloride' per kg of 'potassium chloride, as K2O'. Original comment of the exchange is: estimation
  EcoSpold01Location=RER
  properties: dry mass 1 kg, wet mass 1 kg
- silica sand: 0.732 kg; lognormal variance with pedigree 0.082, pedigree (1,1,5,5,1)
  estimation
  EcoSpold01Location=DE
  properties: dry mass 0.99 kg, water content 0.010101, wet mass 1 kg

## Sampling procedure
estimation

## Extrapolations
This dataset has been copied from an original dataset covering the geography CH. The uncertainty has been adjusted accordingly.

## Review by Rolf Frischknecht 2007-09-13
passed
