# glued laminated timber production, average glue mix

Dataset: EcoSpold 2, unit process
Geography: Europe without Switzerland
Time period: 2012-01-01 to 2023-12-31
Technology level: current
Classification: ISIC rev.4 ecoinvent: 1621:Manufacture of veneer sheets and wood-based panels
Synonyms: Brettschichtholz (Standardträger)
Tags: Swiss brush-up completed
Scenario: Business-as-Usual
System model: Allocation, cut-off by classification
Generated by: Frank Werner
Database: ecoinvent
isCopyrightProtected: true
accessRestrictedTo: 1

## General comment
This dataset represents the production of glued laminated timber (glulam) in Europe without Switzerland. Data are based on glued laminated timber production in Germany.
Glued laminated timber, also called glulam, is a type of structural engineered wood product comprising a number of layers of dimenstional sawn timber bonded together with durable, moisture-resistant structural adhesives.
By laminating a number of smaller pieces of sawn timber, a single large, strong, structural member is manufactured from smaller pieces. These structural members are used as vertical columns or horizontal beams (standard forms), as well as curved, arched shapes (special forms). Glulam is readily produced in curved shapes and is available in a range of species and appearance characteristics to meet varied end-use requirements. Connections are usually made with bolts or plain steel dowels and steel plates.
Glulam is distinct from Cross Laminated Timber (CLT), for which layers of sawn timber are glued in perpendicular orientation to adjacent layers.
Reference:
Rüter, S. and S. Diederichs (2012): Ökobilanz-Basisdaten für Bauprodukte aus Holz. Arbeitsbericht aus dem Institut für Holztechnologie und Holzbiologie Nr. 2012/1, Johann Heinrich von Thünen-Institut (vTI), Hamburg.
[This dataset is meant to replace the following datasets:
- glued laminated timber production, for indoor use, RER, 1986 - 2002
- glued laminated timber production, for outdoor use, RER, 1986 - 2002]

## Included activities start
From the reception at the factory gate of all materials and fuels used.

## Included activities end
This activity ends with the stpecial forms of glued laminated timber produced at the factory gate. The dataset includes the inputs to and outputs of the production processes and the available process emissions. Infrastructure is a rough estimate.

## Geography
Data for Germany used for central Europe

## Technology
Technology reflects a sample of German glulam production.

## Parameters
- wood_fuel: 1306.4; lognormal variance with pedigree 0.0256, pedigree (1,3,1,1,1)
  input of wood fuel used in production; value calculated from Rüter et al. 2012

## Reference product
- glued laminated timber, average glue mix: 1 m3; By-product classification allocatable product; CPC 3142: Other plywood, veneered panels and similar laminated wood, except of bamboo; HS2017 4412: Plywood, veneered panels and similar laminated wood
  Reference product. Plywood produced in Germany by processes representative for European average. The reference product is ready for delivery at the wooden board factory.
  A large number of materials can be produced with differing properties and areas of use. Typical uses are as construction plywood for wall, floor, and ceiling panels and also as panels for concrete shuttering, and decorative covering veneers in interior furnishings (e.g. wall panels or doors).
  production volume 3.66845e6 m3; name glulam_pv
    estimated from the existing PV for GLULAM indoor used and outdoor use Europe without Switzerland
  property heating value, net 5537.41 MJ
    LHV is calculated based on the Carbon content of the product. More details can be found on the respective documentation.The property is based on a value of 12.47MJ/kg
  property price 298 EUR2005
    Temporary price data. Calculated as 90% of purchasers price based on: Price for plywood applied (from 2004 World Import/Export (USD/cubicmeter) from FaoStat http://faostat.fao.org/site/626/default.aspx#ancor, accessed 14th June 2010)
  properties: allocation factor 0.959518, carbon allocation 185.96 kg, carbon content 0.459842, carbon content, fossil 0.01791, carbon content, non-fossil 0.441932, dry mass 404.4 kg, true value 298, water content 0.0979228, water in wet mass 39.6 kg, wet mass 444 kg

## Inputs from technosphere
- diesel, burned in building machine: 45.3795 MJ; lognormal variance with pedigree 0.0427, pedigree (1,4,5,3,1)
  Literature value; sample from Germany
  properties: UVEK_link_1 732, UVEK_link_8 4417, UVEK_link_9 4433, UVEK_relative_amount_1 1, UVEK_relative_amount_8 0.0269238, UVEK_relative_amount_9 0.161543, heating value, net 1 MJ
  note on UVEK_link_1: to be used only in special submissions in coordination with ecoinvent and the Swiss FOEN
  note on UVEK_link_8: This link has been introduced to model transport specifically for the SAM model; to be used only in special submissions in coordination with ecoinvent and the Swiss FOEN.
  note on UVEK_relative_amount_8: Scaling factor = amount of transport related to adhesives/amount of this input from technosphere. Source for transport distance: Overview and Methodology/2007/Frischknecht et al., i.e. 600 km train, 100 km lorry. To be used only in special submissions in coordination with ecoinvent and the Swiss FOEN
- electricity, medium voltage: 85.0316 kWh; lognormal variance with pedigree 0.0427, pedigree (1,4,5,3,1)
  Literature value; sample from Germany
  properties: UVEK_link_1 1779, UVEK_relative_amount_1 1
- furnace, wood chips, with silo, 300kW: 2.17172e-5 unit; = 2.31E-08*wood_fuel/1.33333; lognormal variance with pedigree 0.0086, pedigree (1,1,4,1,1)
  Infrastructure factor from DS "Heat, district or industrial, other than natural gas {CH}| heat production, wood chips from industry, at furnace 5000kW | Cut-off, U", multiplied by the input of wood fuel (direct wood fuel plus production residues); correction for assumed efficiency as original value refers to heat output
- heat, district or industrial, natural gas: 6.23687 MJ; lognormal variance with pedigree 0.0092, pedigree (1,3,4,1,1)
  Fuel input, converted to heat output
  properties: heating value, net 1 MJ
- heat, district or industrial, other than natural gas: 113.533 MJ; lognormal variance with pedigree 0.0092, pedigree (1,3,4,1,1)
  Fuel input, converted to heat output
  properties: heating value, net 1 MJ
- lubricating oil: 0.0978709 kg; name m_lubricating_oil; lognormal variance with pedigree 0.0186, pedigree (4,4,4,1,1)
  Literature value; sample from Germany
  property dry mass 1 kg; name DM_oil
  properties: UVEK_link_1 2866, UVEK_relative_amount_1 1, carbon content, fossil 0.75, heating value, net 40.2 MJ, wet mass 1 kg
  note on carbon content, fossil: Lubricating oil is produced from diesel. C-content/dry mass of fats and oils considered 75%, from: ecoinvent v2.2 report, n 15a, pg 40
  note on heating value, net: Literature value, Source: IPCC 2006, 2006 IPCC Guidelines for National Greenhouse Gas Inventories, Prepared by the National Greenhouse Gas Inventories Programme, Eggleston H.S., Buendia L., Miwa K., Ngara T. and Tanabe K. (eds). Published: IGES, Japan
- melamine urea formaldehyde adhesive: 8.36892 kg; lognormal variance with pedigree 0.0427, pedigree (1,4,5,3,1)
  Literature value; sample from Germany
  properties: UVEK_link_1 2931, UVEK_relative_amount_1 1, carbon content, fossil 0.311708, dry mass 1 kg, heating value, net 14.65 MJ, wet mass 1 kg
- municipal solid waste: -0.268665 kg; name w_MSW; lognormal variance with pedigree 0.1218, pedigree (2,3,1,1,5)
  Literature value; sample from Germany
  Uncertainty: a
  production volume; = w_MSW*glulam_pv
    Calculated from production volume of reference product using the relative outputs.
  properties: UVEK_link_1 1004, UVEK_relative_amount_1 -1, carbon content, fossil 0.171549, carbon content, non-fossil 0.261655, dry mass 0.771 kg, heating value, net 11.74 MJ, water content 0.297017, wet mass 1 kg
  note on carbon content, fossil: MSW composition in tab 4.1, ecoinvent v2.2 report 13_I. C content referred to 1 kg DM
  note on heating value, net: Value taken from the general comment of the treatment dataset.
- phenolic resin: 0.311843 kg; lognormal variance with pedigree 0.0092, pedigree (1,3,4,1,1)
  part of glueing system (inventoried as averaged production average in Europe)
  properties: UVEK_link_1 3435, UVEK_relative_amount_1 1, carbon content, fossil 0.772277, dry mass 1 kg, heating value, net 33.57 MJ, wet mass 1 kg
  note on carbon content, fossil: (C6H5OH)-CH2-(C6H5OH) was considered to be the basic structure in phenolic resin (ecoinvent v2.2 report 8-part 61). C13H14O2, MW=202 g/mol
- polyurethane adhesive: 0.39916 kg; lognormal variance with pedigree 0.0092, pedigree (1,3,4,1,1)
  part of glueing system (inventoried as averaged production average in Europe)
  properties: UVEK_link_1 2983, UVEK_link_8 4417, UVEK_link_9 4433, UVEK_relative_amount_1 1, UVEK_relative_amount_8 0.05, UVEK_relative_amount_9 0.6, carbon content, fossil 0.72, dry mass 1 kg, heating value, net 30.67 MJ, wet mass 1 kg
  note on UVEK_link_8: To be used only in special submissions in coordination with ecoinvent and the Swiss FOEN.
- residual wood, dry: 0.00597262 m3; = 3.42352941176471/550; lognormal variance with pedigree 0.0093, pedigree (2,1,4,3,1)
  Literature value; sample from Germany. Amount in kg/dry mass
  properties: carbon content, non-fossil 0.494, dry mass 550 kg, heating value, net 8030.06 MJ, water content 0.15, wet mass 632.5 kg
- sawlog and veneer log, softwood, measured as solid wood under bark: 0.293613 m3; lognormal variance with pedigree 0.0093, pedigree (2,1,4,3,1)
  Literature value; sample from Germany
  properties: basic wood density 397.449, carbon content, non-fossil 0.494, dry mass 451.646 kg, heating value, net 4483.78 MJ, water content 0.7, wet mass 767.799 kg
  note on heating value, net: Value based on the dataset "softwood forestry, mixed species, sustainable forest management"The property is based on a value of 11.58MJ/kg
- sawnwood, board, softwood, raw, dried (u=10%): 0.420269 m3; lognormal variance with pedigree 0.0093, pedigree (2,1,4,3,1)
  Literature value; sample from Germany
  property dry mass 418.176 kg; name basic_wood_d
  property water content 0.00118132; name water_content
  property water in wet mass 0.494 kg; name WWM
  property wet mass 418.67 kg; name WM
  properties: carbon content, non-fossil 0.494, heating value, net 5700.67 MJ
  note on heating value, net: Assumed equal to "sawnwood, softwood, dried (u=10%), planed".The property is based on a value of 13.38MJ/kg
- sawnwood, softwood, raw: 0.632323 m3; lognormal variance with pedigree 0.0093, pedigree (2,1,4,3,1)
  Literature value; sample from Germany
  properties: carbon content, non-fossil 0.494, dry mass 387.2 kg, heating value, net 5130.57 MJ, water content 0.7, wet mass 658.24 kg
- synthetic rubber: 0.128575 kg; name m_rubber; lognormal variance with pedigree 0.2106, pedigree (5,5,5,5,5)
  Literature value; sample from Germany
  property carbon content, fossil 0.871949; name C_content_fossil_rubber
  properties: UVEK_relative_amount_1 1, dry mass 1 kg, heating value, net 26.42 MJ, wet mass 1 kg
  note on UVEK_relative_amount_1: to be used only in special submissions in coordination with ecoinvent and the Swiss FOEN.
  note on carbon content, fossil: EPDM (Ethylene-propene-diene terpolymer) rubber is a terpolymer of ethylene, propene, and a diene with the residual unsaturated portion of the diene in the side chain (ecoinvent v2.2 report 7-part XX & Ullmann). Chemical formula (deduced from Evidences of Solvent-Induced Miscibility in Polychloroprene-co-Ethylene-Propene Diene Terpolymer Blends, Dubey et al., Journal of Applied Polymer Science, 2009, 111:1884-1891): C20H35
- tap water: 0.0230284 kg; name m_tapwater; lognormal variance with pedigree 0.0099, pedigree (2,3,4,3,1)
  Literature value; sample from Germany
  properties: UVEK_link_1 4285, UVEK_relative_amount_1 1, carbon content, fossil 0.00178991, dry mass 0.000337476 kg, water content 2962.17, wet mass 1 kg
  note on carbon content, fossil: Bicarbonate content is 2.93 mol/m3. CO2 content is 0.1 mol/m3 (ecoinvent v2.2 report 8, Tab 93.1).
- waste mineral oil: -0.0978709 kg; name w_mineral_oil; = m_lubricating_oil/DM_oil; lognormal variance with pedigree 0.0018, pedigree (2,3,1,1,1)
  hydraulic oil and engine oil/grease; adjusted for water content of waste oil
  production volume; = w_mineral_oil*glulam_pv
    Calculated from production volume of reference product using the relative outputs.
  properties: UVEK_link_1 1113, UVEK_relative_amount_1 -1, carbon content, fossil 0.864444, dry mass 0.9 kg, heating value, net 34.7 MJ, water content 0.111111, wet mass 1 kg
  note on carbon content, fossil: Tab A.6, ecoinvent v2.2 report 13_I. C content has been calculated after data in the tables, and then referred to 1 kg DM
- waste rubber, unspecified: -0.128575 kg; name w_rubber; = m_rubber; lognormal variance with pedigree 0.1786, pedigree (4,5,5,5,5)
  calculated from rubber input
  production volume; = w_rubber*glulam_pv
    Calculated from production volume of reference product using the relative outputs.
  property dry mass 1 kg; name w_rubber_DM
  properties: UVEK_link_1 1079, UVEK_relative_amount_1 -1, carbon content, fossil 0.853, heating value, net 27.19 MJ, wet mass 1 kg
- waste wood, post-consumer: 1.23367 kg; lognormal variance with pedigree 0.0093, pedigree (2,1,4,3,1)
  Literature value; sample from Germany
  properties: carbon content, non-fossil 0.494, dry mass 1 kg, heating value, net 9.99 MJ, water content 0.4, wet mass 1.4 kg
- wastewater, unpolluted: -0.0331897 m3; name wastewater; lognormal variance with pedigree 0.0029, pedigree (1,4,2,3,1)
  Literature value; sample from Germany
  production volume; = wastewater*glulam_pv
    Calculated from production volume of reference product using the relative outputs.
  properties: carbon content, fossil 0.00178991, carbon content, non-fossil 0.00178991, dry mass 0.337476 kg, water content 2962.17, wet mass 1000 kg
  note on carbon content, fossil: Assumed to be like in tap water. Bicarbonate content is 2.93 mol/m3. CO2 content is 0.1 mol/m3 (ecoinvent v2.2 report 8, Tab 93.1).
- wood ash mixture, pure: -0.626759 kg; name w_wood_ash; = 0.000666666666666667*wood_fuel/1.33333; lognormal variance with pedigree 0.0012, pedigree (1,3,1,1,1)
  Amount derived from DS "Heat, district or industrial, other than natural gas {CH}| heat production, wood chips from industry, at furnace 300kW | Cut-off, U" on heat generation from industrial residual wood per MJ, multiplied by the input of wood fuel (direct wood fuel plus production residues ) scaled to reflect wood input per generated heat
  production volume; = w_wood_ash*glulam_pv
    Calculated from production volume of reference product using the relative outputs.
  properties: UVEK_link_1 1128, UVEK_link_2 1127, UVEK_link_3 1129, UVEK_relative_amount_3 -1, carbon content, non-fossil 0.012, dry mass 1 kg, wet mass 1 kg
- wooden board factory, organic bonded boards: 3.1952e-8 unit; lognormal variance with pedigree 0.3961, pedigree (4,5,5,3,4)
  Default value from ecoinvent 2.2
  properties: UVEK_link_1 4946, UVEK_relative_amount_1 1

## Inputs from nature
- Carbon dioxide, non-fossil, resource correction [natural resource, in air]: -185.347 kg
- Water, cooling, unspecified natural origin [natural resource, in water]: 0.0331677 m3; name water_cooling_UNO_input; lognormal variance with pedigree 0.0427, pedigree (1,4,5,3,1)
  Literature value; sample from Germany

## Emissions to nature
- Acetaldehyde [air, unspecified]: 7.64646e-5 kg; = 8.13333333333333E-08*wood_fuel/1.33333; lognormal variance with pedigree 0.0812, pedigree (2,3,5,1,1)
  Emission factor from DS "Heat, district or industrial, other than natural gas {CH}| heat production, wood chips from industry, at furnace 300kW | Cut-off, U" on heat generation from industrial residual wood per MJ, multiplied by the input of wood fuel (direct wood fuel plus production residues ) scaled to reflect wood input per generated heat.
- Acetone [air, unspecified]: 0.01991 kg; lognormal variance with pedigree 0.2086, pedigree (2,5,5,1,4)
  Estimation: emissions from PUR adhesives
  Uncertainty: e
- Ammonia [air, unspecified]: 0.00216859 kg; = 2.30666666666667E-06*wood_fuel/1.33333; lognormal variance with pedigree 0.0812, pedigree (2,3,5,1,1)
  (same comment as for Acetaldehyde)
- Arsenic ion [air, unspecified]: 1.25352e-6 kg; = 1.33333333333333E-09*wood_fuel/1.33333; lognormal variance with pedigree 0.6912, pedigree (2,3,5,1,1)
  (same comment as for Acetaldehyde)
- Benzene [air, unspecified]: 0.0011407 kg; = 1.21333333333333E-06*wood_fuel/1.33333; lognormal variance with pedigree 0.0812, pedigree (2,3,5,1,1)
  (same comment as for Acetaldehyde)
- Benzo(a)pyrene [air, unspecified]: 6.26759e-7 kg; = 6.66666666666667E-10*wood_fuel/1.33333; lognormal variance with pedigree 0.3412, pedigree (2,3,5,1,1)
  (same comment as for Acetaldehyde)
- Bromine [air, unspecified]: 7.52111e-5 kg; = 0.00000008*wood_fuel/1.33333; lognormal variance with pedigree 0.6912, pedigree (2,3,5,1,1)
  (same comment as for Acetaldehyde)
- Cadmium II [air, unspecified]: 8.77462e-7 kg; = 9.33333333333334E-10*wood_fuel/1.33333; lognormal variance with pedigree 0.6912, pedigree (2,3,5,1,1)
  (same comment as for Acetaldehyde)
- Calcium II [air, unspecified]: 0.00733308 kg; = 0.0000078*wood_fuel/1.33333; lognormal variance with pedigree 0.6912, pedigree (2,3,5,1,1)
  (same comment as for Acetaldehyde)
- Carbon dioxide, non-fossil [air, unspecified]: 134.126 kg; = 0.142666666666666*wood_fuel/1.33333; lognormal variance with pedigree 0.0418, pedigree (2,3,5,1,1)
  (same comment as for Acetaldehyde)
- Carbon monoxide, non-fossil [air, unspecified]: 0.626759 kg; = 0.000666666666666667*wood_fuel/1.33333; lognormal variance with pedigree 0.6912, pedigree (2,3,5,1,1)
  (same comment as for Acetaldehyde)
- Chlorine [air, unspecified]: 0.000225633 kg; = 0.00000024*wood_fuel/1.33333; lognormal variance with pedigree 0.6912, pedigree (2,3,5,1,1)
  (same comment as for Acetaldehyde)
- Chromium III [air, unspecified]: 4.96393e-6 kg; = 5.28000000000001E-09*wood_fuel/1.33333; lognormal variance with pedigree 0.6912, pedigree (2,3,5,1,1)
  (same comment as for Acetaldehyde)
- Chromium VI [air, unspecified]: 5.01407e-8 kg; = 5.33333333333334E-11*wood_fuel/1.33333; lognormal variance with pedigree 0.6912, pedigree (2,3,5,1,1)
  (same comment as for Acetaldehyde)
- Copper ion [air, unspecified]: 2.75774e-5 kg; = 2.93333333333334E-08*wood_fuel/1.33333; lognormal variance with pedigree 0.6912, pedigree (2,3,5,1,1)
  (same comment as for Acetaldehyde)
- Dinitrogen monoxide [air, unspecified]: 0.00313379 kg; = 3.33333333333334E-06*wood_fuel/1.33333; lognormal variance with pedigree 0.0812, pedigree (2,3,5,1,1)
  (same comment as for Acetaldehyde)
- Dioxins, measured as 2,3,7,8-tetrachlorodibenzo-p-dioxin [air, unspecified]: 3.88591e-11 kg; = 4.13333333333333E-14*wood_fuel/1.33333; lognormal variance with pedigree 0.3412, pedigree (2,3,5,1,1)
  (same comment as for Acetaldehyde)
- Ethyl benzene [air, unspecified]: 3.76055e-5 kg; = 0.00000004*wood_fuel/1.33333; lognormal variance with pedigree 0.0812, pedigree (2,3,5,1,1)
  (same comment as for Acetaldehyde)
- Fluorine [air, unspecified]: 6.26759e-5 kg; = 6.66666666666667E-08*wood_fuel/1.33333; lognormal variance with pedigree 0.0812, pedigree (2,3,5,1,1)
  (same comment as for Acetaldehyde)
- Formaldehyde [air, unspecified]: 0.0127163 kg; = 1.73333333333334E-07*wood_fuel/1.33333+0.013083; lognormal variance with pedigree 0.1612, pedigree (2,3,5,1,1)
  Emission factor from DS "Heat, district or industrial, other than natural gas {CH}| heat production, wood chips from industry, at furnace 300kW | Cut-off, U" on heat generation from industrial residual wood per MJ, multiplied by the input of wood fuel (direct wood fuel plus production residues ) scaled to reflect wood input per generated heat plus estimated emissions from wood and glue drying processes (according to Rüter & Diederichs 2012).
- Hexachlorobenzene [air, unspecified]: 9.02533e-12 kg; = 9.60000000000001E-15*wood_fuel/1.33333; lognormal variance with pedigree 0.0812, pedigree (2,3,5,1,1)
  (same comment as for Acetaldehyde)
- Hydrocarbons, aliphatic, alkanes, unspecified [air, unspecified]: 0.0011407 kg; = 1.21333333333333E-06*wood_fuel/1.33333; lognormal variance with pedigree 0.0812, pedigree (2,3,5,1,1)
  (same comment as for Acetaldehyde)
- Hydrocarbons, aliphatic, unsaturated [air, unspecified]: 0.00388591 kg; = 4.13333333333333E-06*wood_fuel/1.33333; lognormal variance with pedigree 0.0812, pedigree (2,3,5,1,1)
  (same comment as for Acetaldehyde)
- Lead II [air, unspecified]: 3.13379e-5 kg; = 3.33333333333333E-08*wood_fuel/1.33333; lognormal variance with pedigree 0.6912, pedigree (2,3,5,1,1)
  (same comment as for Acetaldehyde)
- Magnesium [air, unspecified]: 0.000451266 kg; name magnesium; = 0.00000048*wood_fuel/1.33333; lognormal variance with pedigree 0.6912, pedigree (2,3,5,1,1)
  (same comment as for Acetaldehyde)
- Manganese II [air, unspecified]: 0.000213098 kg; name manganese; = 2.26666666666667E-07*wood_fuel/1.33333; lognormal variance with pedigree 0.6912, pedigree (2,3,5,1,1)
  (same comment as for Acetaldehyde)
- Mercury II [air, unspecified]: 3.76055e-7 kg; name mercury; = 0.0000000004*wood_fuel/1.33333; lognormal variance with pedigree 0.6912, pedigree (2,3,5,1,1)
  (same comment as for Acetaldehyde)
- Methane, non-fossil [air, unspecified]: 0.00564083 kg; = 0.000006*wood_fuel/1.33333; lognormal variance with pedigree 0.0812, pedigree (2,3,5,1,1)
  (same comment as for Acetaldehyde)
- NMVOC, non-methane volatile organic compounds [air, unspecified]: 0.00877462 kg; name nmvoc; = 9.33333333333334E-06*wood_fuel/1.33333; lognormal variance with pedigree 0.0812, pedigree (2,3,5,1,1)
  (same comment as for Acetaldehyde)
- Nickel II [air, unspecified]: 7.52111e-6 kg; name nickel; = 0.000000008*wood_fuel/1.33333; lognormal variance with pedigree 0.6912, pedigree (2,3,5,1,1)
  (same comment as for Acetaldehyde)
- Nitrogen oxides [air, unspecified]: 0.225633 kg; = 0.00024*wood_fuel/1.33333; lognormal variance with pedigree 0.0812, pedigree (2,3,5,1,1)
  (same comment as for Acetaldehyde)
- PAH, polycyclic aromatic hydrocarbons [air, unspecified]: 1.3914e-5 kg; name pah; = 0.0000000148*wood_fuel/1.33333; lognormal variance with pedigree 0.3412, pedigree (2,3,5,1,1)
  (same comment as for Acetaldehyde)
- Particulate Matter, < 2.5 um [air, unspecified]: 0.112817 kg; = 0.00012*wood_fuel/1.33333; lognormal variance with pedigree 0.3412, pedigree (2,3,5,1,1)
  (same comment as for Acetaldehyde)
- Particulate Matter, > 2.5 um and < 10um [air, unspecified]: 0.112817 kg; = 0.00012*wood_fuel/1.33333; lognormal variance with pedigree 0.1612, pedigree (2,3,5,1,1)
  (same comment as for Acetaldehyde)
- Pentachlorophenol [air, unspecified]: 1.01535e-8 kg; = 0.0000000000108*wood_fuel/1.33333; lognormal variance with pedigree 0.0812, pedigree (2,3,5,1,1)
  (same comment as for Acetaldehyde)
- Phosphorus [air, unspecified]: 0.000376055 kg; = 0.0000004*wood_fuel/1.33333; lognormal variance with pedigree 0.0812, pedigree (2,3,5,1,1)
  (same comment as for Acetaldehyde)
- Potassium I [air, unspecified]: 0.0293323 kg; = 0.0000312*wood_fuel/1.33333; lognormal variance with pedigree 0.0812, pedigree (2,3,5,1,1)
  (same comment as for Acetaldehyde)
- Sodium I [air, unspecified]: 0.00162957 kg; = 1.73333333333334E-06*wood_fuel/1.33333; lognormal variance with pedigree 0.6912, pedigree (2,3,5,1,1)
  (same comment as for Acetaldehyde)
- Sulfur dioxide [air, unspecified]: 0.00313379 kg; = 3.33333333333334E-06*wood_fuel/1.33333; lognormal variance with pedigree 0.0418, pedigree (2,3,5,1,1)
  (same comment as for Acetaldehyde)
- Toluene [air, unspecified]: 0.000376055 kg; = 0.0000004*wood_fuel/1.33333; lognormal variance with pedigree 0.0812, pedigree (2,3,5,1,1)
  (same comment as for Acetaldehyde)
- Water [air, unspecified]: 0.089599 m3; = 0.00006*wood_fuel/1.33333+m_tapwater/1000+water_cooling_UNO_input; lognormal variance with pedigree 0.130025, pedigree (4,4,5,2,4)
  Water emissions from the combustion of the wood (emission per MJ, scaled to wood input and extrapolated from wood input to heat generated) plus tap water input plus input of cooling water
- Zinc II [air, unspecified]: 0.000376055 kg; = 0.0000004*wood_fuel/1.33333; lognormal variance with pedigree 0.6912, pedigree (2,3,5,1,1)
  (same comment as for Acetaldehyde)
- m-Xylene [air, unspecified]: 0.000150422 kg; name mxylene; = 0.00000016*wood_fuel/1.33333; lognormal variance with pedigree 0.0812, pedigree (2,3,5,1,1)
  (same comment as for Acetaldehyde)

## Sampling procedure
Literature; emissions profile per MJ wood input from PSI (2014)

## Extrapolations
See Geography and Technology
