# treatment of waste reinforced plasterboard, collection for final disposal

Dataset: EcoSpold 2, unit process
Geography: RoW
Time period: 1994-01-01 to 2023-12-31
Technology level: current
Classification: ISIC rev.4 ecoinvent: 3821:Treatment and disposal of non-hazardous waste
Synonyms: calcium sulfate dihydrate (has CAS 10101-41-4); alabaster; natural gypsum (has CAS 13397-24-5; selenite
Scenario: Business-as-Usual
System model: Allocation, cut-off by classification
Generated by: Gabor Doka (obsolete)
Published in: Doka G. 2007
Database: ecoinvent
isCopyrightProtected: true
accessRestrictedTo: 1

## General comment
The process represents the collection of 'waste reinforced plasterboard' for final disposal. The waste contains 0.85kg gypsum and 0.15kg cardboard, while its density is 1000 kg/m3.

## Included activities start
The activity starts when the building demolition activity is ready to be performed. Transportation of the waste to the treatment plant is not included.

## Included activities end
The activity includes energy for dismantling, particulate matter emissions from dismantling and handling, and final disposal of waste material.

## Geography
Modelling parameters are not specific to this geography.

## Technology
Building demolition with skid-steer loaders.

## Reference product
- waste reinforced plasterboard: -1 kg; By-product classification Waste; CPC 39990: Other wastes n.e.c.
  production volume 8478.3 kg
    calculated from the swiss PV and scaled up based on swiss GDP (41/0.481%)
  property carbon content, fossil 0
    The waste contains 0.85kg gypsum (see Tab A.4 for details) and 0.15kg cardboard (see Tab A.3 for details), ecoinvent v2.2 report 13_I
  property carbon content, non-fossil 0.0791157
    The waste contains 0.85kg gypsum (see Tab A.4 for details) and 0.15kg cardboard (see Tab A.3 for details), ecoinvent v2.2 report 13_I. C content has been calculated after data in the atbles, and then referred to 1 kg DM
  property heating value, net 1.53 MJ
    LHV is calculated based on the Carbon content of the product. More details can be found on the respective documentation.
  property price 0 EUR2005
    Waste products are assigned a price of zero as they are assumed to require further treatment.
  properties: carbon allocation 0.06495 kg, carbon content 0.0791157, dry mass 0.82095 kg, water content 0.218101, water in wet mass 0.17905 kg, wet mass 1 kg

## Inputs from technosphere
- diesel, burned in building machine: 0.0359 MJ; lognormal variance with pedigree 0.072, pedigree (1,1,5,5,1)
  energy for demolition. Uncertainty from range in (DAFSTB 1996)
  properties: heating value, net 1 MJ
- waste gypsum: -0.199725, -0.650275 kg (2 suppliers, which the file names only by identifier); sum of these -0.85 kg; lognormal variance with pedigree 0.002, pedigree (1,1,1,5,1)
  disposed masses. Uncertainty calculated from uncertainty of waste composition
  production volume
    Calculated from the production volume of waste reinforced plaster board in proportion to the respective output amounts.
  properties: dry mass 0.806 kg, water content 0.240695, wet mass 1 kg
- waste paperboard: -5.8681e-5, -0.000236452, -0.000437697, -0.000671093, -0.131174, -0.00439472, -0.00242494, -0.0106023 kg (8 suppliers, which the file names only by identifier); sum of these -0.15 kg; lognormal variance with pedigree 0.002, pedigree (1,1,1,5,1)
  disposed masses. Uncertainty calculated from uncertainty of waste composition
  production volume
    (same comment as for waste gypsum)
  properties: carbon content, non-fossil 0.483259, dry mass 0.804 kg, heating value, net 15.92 MJ, water content 0.243781, wet mass 1 kg
  note on carbon content, non-fossil: C content was calculated for 1 kg DM, using data in Tab A.3, ecoinvent v2.2 report 13_I.
  note on heating value, net: Value taken from the general comment of the treatment dataset.

## Emissions to nature
- Particulate Matter, < 2.5 um [air, urban air close to ground]: 1.66e-5 kg; lognormal variance with pedigree 0.3632, pedigree (2,3,5,5,1)
  Emission from dismantling and handling. from one extrapolated PM10 emission factor and generic PM fractions from measurements
  Uncertainty: & basic uncertainty of 3; from one extrapolated PM10 emission factor and generic PM fractions from measurements
- Particulate Matter, > 10 um [air, urban air close to ground]: 8.35e-5 kg; lognormal variance with pedigree 0.0932, pedigree (2,3,5,5,1)
  Emission from dismantling and handling. from one extrapolated PM10 emission factor and generic PM fractions from measurements
  Uncertainty: & basic uncertainty of 1.5; from one extrapolated PM10 emission factor and generic PM fractions from measurements
- Particulate Matter, > 2.5 um and < 10um [air, urban air close to ground]: 6.34e-5 kg; lognormal variance with pedigree 0.1832, pedigree (2,3,5,5,1)
  Emission from dismantling and handling. from one extrapolated PM10 emission factor and generic PM fractions from measurements
  Uncertainty: & basic uncertainty of 2; from one extrapolated PM10 emission factor and generic PM fractions from measurements

## Sampling procedure
waste-specific calculation based on literature data

## Extrapolations
This dataset has been copied from an original dataset covering the geography CH. The uncertainty and Production Volume (PV) has been adjusted accordingly.

## Review by Niels Jungbluth 2003-05-22
Passed. Calculation for standard deviation 95 of transport services differs from standard Pedigree approach in this project and figure obtained by this procedure (2.09). Uncertainty for estimation of distance is not included.
