# treatment of inert waste, sanitary landfill

Dataset: EcoSpold 2, unit process
Geography: RoW
Time period: 1994-01-01 to 2023-12-31
Technology level: current
Classification: ISIC rev.4 ecoinvent: 3821:Treatment and disposal of non-hazardous waste
Scenario: Business-as-Usual
System model: Allocation, cut-off by classification
Generated by: Nikolia Stoikou
Database: ecoinvent
isCopyrightProtected: true
accessRestrictedTo: 1

## General comment
This dataset represents the activity of waste disposal of 'inert waste' in a sanitary landfill. Recommended use of this dataset: for landfilling of inert inorganic materials like glass, stones, hydrated cement, which goes to disposal as part of communal waste. Not suited for ashes or other residues. Inventoried waste consists of fraction: 100% inert material (as cement); . Waste composition (wet, in ppmw): H2O 5969.2; O 672760; H 66667; C na; S 4938.4; N na; P 231.96; B na; Cl na; Br na; F na; I na; Ag na; As 3.3957; Ba na; Cd 0.60687; Co 1.7555; Cr 21.386; Cu 3.8614; Hg 0.017115; Mn 189.76; Mo na; Ni 16.464; Pb 29.371; Sb 0.0881; Se na; Sn 1.3293; V 23.132; Zn 80.532; Be na; Sc na; Sr na; Ti na; Tl 0.19256; W na; Si 38427; Fe 10046; Ca 183060; Al 13408; K na; Mg na; Na 4115.3. Share of carbon in initial waste waste that is biogenic 60.4%. Share of metals in waste not oxidised and bulk-recyclable (exclude very small or thin parts) Iron: 0%; Alu: 0%; Copper: 0%. Overall degradability of waste during 100 years: 5%. 0.03806 kg waste mass remains in the landfill even after the long term period.

## Included activities start
The activity starts with the waste being available at the gate of the treatment facility. Collection and transportation of the waste to the treatment plant is not included.

## Included activities end
The activity ends with the waste being treated and waste-specific emissions from the landfill are released to the environment (air due to landfil gas, water due to landfil leachate, and subsequent into groundwater).

## Geography
The site has mean annual temperature (MAT) of 16.743579766537 degC, mean annual precipitation (MAP) of 1250.84108527132 mm/year, and net infiltration of 790.252035689178 mm/year.The leachate percolating through the landfill has an average residence time of 6.33 years.
References
UN data, 2020. Precipitation, Environment Statistics Database, United Nations Statistics Division Available at: http://data.un.org/Data.aspx?q=precipitation&d=ENV&f=variableID%3a6;
World Bank, 2022. Surface area (sq.km), World Bank Group Available at: https://data.worldbank.org/indicator/AG.SRF.TOTL.K2;
Doka G.,2021. A model for composition-specific life cycle inventories of regionalised wastewater fates, Zurich, Switzerland. http://www.doka.ch/publications.htm

## Technology
This is an inventory for a sanitary (controlled) landfill for municipal solid waste. Ultimate average landfill height is 20 meters. Operation phase duration is 30 years. The total raw landfill gas mass produced in the landfill from this waste is 0.03592 kg. The total CH4 mass in the raw landfill gas is 0 kg. Percentage of landfill gas directly emitted is 47w%. Percentage of landfill gas captured and flared is 18.02w%. Percentage of landfill gas captured and utilised is 34.98%. Conversion efficiencies are 27.8e% for electricity and 13.5e% for useful heat. Leachate collected during the first 100 years is collected and treated region-specifically before emission. Based on average waste composition and climate data the end of carbonate phase is estimated to be reached 2'863 years after waste deposition.

## Reference product
- inert waste: -1 kg; By-product classification Waste; CPC 39990: Other wastes n.e.c.
  Main reference product of this activity
  production volume 3.17156e10 kg
    The global total production of C&D waste is estimated to be 325 million tonnes in 2003 (http://www3.epa.gov/epawaste/inforesources/pubs/infocus/rif-cd.pdf, accessed 20151013). To calculate the share that is redirected to inert material landfill, sanitary landfill and recycling the weighted average (based on nominal GDP, source: United Nations, http://data.un.org/Glossary.aspx?q=GDP+%28current+US%24%29, accessed 20130726 and 20130312) of treatments in EU (GDP2005 0.330592), Honk Kong (GDP2005 0.003972) and Northeast America (GDP2005 0.274857) is calculated. Honk Kong’s Environmental protection department reports 95% of construction waste to inert material landfill and 5% to landfill (Statistic unit, 2013) (https://www.wastereduction.gov.hk/sites/default/files/msw2013.pdf, accessed 20151013). US Northeast Waste Management Officials’ Association reports 70% of waste going to inert material landfill and 30% to landfill (2009) (http://www.newmoa.org/solidwaste/CDReport2006DataFinalJune302009.pdf, accessed 20151013). For the EU, treatments vary greatly between states (recycling varies from less than 10% to over 90%) as an average 90% of waste is sent to inert material landfill and 10% to recycling. The weighted average of these regions result in 81% of waste sent to inert material landfill, 14% to sanitary landfill and 5% to recycling. No dataset for recycling is available at the moment.
  property price 0 EUR2005
    Waste products are assigned a price of zero as they are assumed to require further treatment.
  properties: aluminium content 0.0134886, antimony content 8.86295e-8, arsenic content 3.41605e-6, cadmium content 6.10514e-7, calcium content 0.184161, carbon allocation 0 kg, carbon content 0, carbon content, fossil 0, carbon content, non-fossil 0, chromium content 2.15143e-5, cobalt content 1.76604e-6, copper content 3.88458e-6, dry mass 0.994031 kg, hydrogen content 0.067067, iron content 0.010106, lead content 2.95472e-5, manganese content 0.000190896, mercury content 1.72181e-8, nickel content 1.65624e-5, nitrogen content 9.38432e-7, oxygen content 0.676805, phosphorus content 0.000233348, silicon content 0.0386574, sodium content 0.00414004, sulfur content 0.00496805, thallium content 1.93719e-7, tin content 1.33725e-6, vanadium content 2.32711e-5, water content 0.00600504, water in wet mass 0.00596919 kg, wet mass 1 kg, zinc content 8.10155e-5

## Inputs from technosphere
- cast iron: 1.47514e-6 kg; lognormal variance with pedigree 0.32902, pedigree (1,1,4,1,1)
  For sewer auxiliary materials.
  Uncertainty: Uncertainty calculated from uncertainty in base parameters.
  properties: carbon content, fossil 0.04, dry mass 1 kg, wet mass 1 kg
- concrete, 30MPa: 3.00975e-9, 1.27363e-7, 1.25424e-8 m3 (3 suppliers, which the file names only by identifier); sum of these 1.42915e-7 m3; lognormal variance with pedigree 0.32902, pedigree (1,1,4,1,1)
  For leachate collection tanks and sewer pipe.
  Uncertainty: Uncertainty calculated from uncertainty in base parameters.
  properties: dry mass 2205 kg, water content 0.0816327, wet mass 2385 kg
- diesel, burned in building machine: 0.0483917 MJ; lognormal variance with pedigree 0.32902, pedigree (1,1,4,1,1)
  For waste distribution and compaction, construction diesel for base and compartment seals, for access street and sewer construction.
  Uncertainty: Uncertainty calculated from uncertainty in base parameters.
  properties: heating value, net 1 MJ
- electricity, low voltage: 3.03987e-8, 4.7804e-7, 9.92233e-6, 9.79382e-7, 6.10037e-9, 3.41611e-6, 1.69236e-7 kWh (7 suppliers, which the file names only by identifier); sum of these 1.50016e-5 kWh; lognormal variance with pedigree 0.028759, pedigree (1,1,4,1,1)
  Administrative building electricity consumption.
  Uncertainty: Uncertainty calculated from uncertainty in base parameters.
- excavation, hydraulic digger: 0.000387787 m3; lognormal variance with pedigree 0.32902, pedigree (1,1,4,1,1)
  Excavation work for landfill construction, sewer construction and recultivation.
  Uncertainty: Uncertainty calculated from uncertainty in base parameters.
- excavation, skid-steer loader: 0.000387787 m3; lognormal variance with pedigree 0.32902, pedigree (1,1,4,1,1)
  (same comment as for excavation, hydraulic digger)
- extrusion, plastic pipes: 8.49481e-5 kg; lognormal variance with pedigree 0.32902, pedigree (1,1,4,1,1)
  For base and interior drain system of landfill, sewer auxiliary materials.
  Uncertainty: Uncertainty calculated from uncertainty in base parameters.
- gravel, round: 0.16016 kg; lognormal variance with pedigree 0.32902, pedigree (1,1,4,1,1)
  For base and flank gravel beds and concrete, for access street, for drainage beds, for recultivation layer.
  Uncertainty: Uncertainty calculated from uncertainty in base parameters.
  properties: dry mass 1 kg, wet mass 1 kg
- heat, district or industrial, other than natural gas: 0.00160971, 7.45747e-7 MJ (2 suppliers, which the file names only by identifier); sum of these 0.00161045 MJ; lognormal variance with pedigree 0.028759, pedigree (1,1,4,1,1)
  Administrative building space heat demand.
  Uncertainty: Uncertainty calculated from uncertainty in base parameters.
  properties: heating value, net 1 MJ
- leachate, SLF, inert waste: -0.0039551 m3
  Landfill leachate captured during short-term sent to wastewater treatment.
  production volume
    calculated in proportion to landfilled waste input
  properties: dry mass 0.849702 kg, fossil share of carbon 1, mass concentration, aluminium 8.47337e-6 kg/m3, mass concentration, calcium 0.000301346 kg/m3, mass concentration, hydrogen 2.45482e-5 kg/m3, mass concentration, manganese 2.74752e-6 kg/m3, mass concentration, oxygen 0.000247727 kg/m3, mass concentration, silicon 2.42841e-5 kg/m3, mass concentration, sodium 0.000215304 kg/m3, mass concentration, sulfur 2.32499e-5 kg/m3, water content 1175.88, wet mass 1000 kg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
- pitch: 0.000332941, 1.49238e-5, 7.35623e-6, 0.000129075, 2.13051e-5, 0.00188215 kg (6 suppliers, which the file names only by identifier); sum of these 0.00238775 kg; lognormal variance with pedigree 0.32902, pedigree (1,1,4,1,1)
  For base and compartment seals and access street construction.
  Uncertainty: Uncertainty calculated from uncertainty in base parameters.
  properties: carbon content, fossil 0.83, dry mass 1 kg, heating value, net 28 MJ, wet mass 1 kg
- polyethylene, high density, granulate: 0.000268521 kg; lognormal variance with pedigree 0.32902, pedigree (1,1,4,1,1)
  For base and compartment seals, for base and interior drain system of landfill, sewer auxiliary materials.
  Uncertainty: Uncertainty calculated from uncertainty in base parameters.
  properties: carbon content, fossil 0.857143, dry mass 1 kg, heating value, net 42.47 MJ, wet mass 1 kg
- polypropylene, granulate: 2.23506e-7 kg; lognormal variance with pedigree 0.32902, pedigree (1,1,4,1,1)
  (same comment as for cast iron)
  properties: carbon content, fossil 0.857143, dry mass 1 kg, heating value, net 32.78 MJ, wet mass 1 kg
  note on heating value, net: Value extracted from "treatment of waste polypropylene, open burning"
- polyvinylchloride, bulk polymerised: 2.23506e-7 kg; lognormal variance with pedigree 0.32902, pedigree (1,1,4,1,1)
  (same comment as for cast iron)
  properties: carbon content, fossil 0.387097, dry mass 1 kg, heating value, net 21.5 MJ, wet mass 1 kg
- reinforcing steel: 8.71674e-6 kg; lognormal variance with pedigree 0.32902, pedigree (1,1,4,1,1)
  (same comment as for cast iron)
  properties: carbon content, fossil 0.004, dry mass 1 kg, wet mass 1 kg
- sand: 1.01199e-6, 6.58558e-5, 5.25375e-9 kg (3 suppliers, which the file names only by identifier); sum of these 6.6873e-5 kg; lognormal variance with pedigree 0.32902, pedigree (1,1,4,1,1)
  (same comment as for cast iron)
  properties: dry mass 1 kg, wet mass 1 kg
- steel, chromium steel 18/8, hot rolled: 3.03968e-6 kg; lognormal variance with pedigree 0.32902, pedigree (1,1,4,1,1)
  (same comment as for cast iron)
  properties: carbon content, fossil 0.0008, dry mass 1 kg, wet mass 1 kg
- synthetic rubber: 8.94024e-8 kg; lognormal variance with pedigree 0.32902, pedigree (1,1,4,1,1)
  (same comment as for cast iron)
  properties: carbon content, fossil 0.871949, dry mass 1 kg, heating value, net 26.42 MJ, wet mass 1 kg
- tap water: 3.77411e-6, 5.75331e-6, 1.07354e-5, 2.89204e-5, 3.48124e-6, 0.000145076, 0.00166018 kg (7 suppliers, which the file names only by identifier); sum of these 0.00185792 kg; lognormal variance with pedigree 0.32902, pedigree (1,1,4,1,1)
  (same comment as for cast iron)
  properties: carbon content, fossil 0.00178991, dry mass 0.000337476 kg, water content 2962.17, wet mass 1 kg

## Inputs from nature
- Organic carbon, placed in landfill [inventory indicator, waste]: 3.63978e-7 kg; lognormal variance with pedigree 0.57748, pedigree (1,1,4,1,1)
  Mass of organic carbon in waste (without inorganic carbon), initially (year 1) put in sanitary landfill. The exchange represents a flow that is within the technosphere. This exchange should only be used to apply ecofactors for the Swiss LCIA method of Ecological Scarcity and not any other purpose.
  Uncertainty: uncertainty is derived from uncertainty in waste composition and flows.
- Waste mass, total, placed in landfill [inventory indicator, waste]: 1.00011 kg
  Mass of waste initially (year 1) put in sanitary landfill. The exchange represents a flow that is within the technosphere. This exchange should only be used to apply ecofactors for the Swiss LCIA method of Ecological Scarcity and not any other purpose.
- Occupation, construction site [natural resource, land]: 0.000250027 m2*year; lognormal variance with pedigree 0.32902, pedigree (1,1,4,1,1)
  For construction phase of the landfill.
  Uncertainty: Uncertainty calculated from uncertainty in base parameters.
- Occupation, dump site [natural resource, land]: 0.00150016 m2*year; lognormal variance with pedigree 0.32902, pedigree (1,1,4,1,1)
  For landfill operation phase.
  Uncertainty: Uncertainty calculated from uncertainty in base parameters.
- Occupation, shrub land, sclerophyllous [natural resource, land]: 0.000250027 m2*year; lognormal variance with pedigree 0.32902, pedigree (1,1,4,1,1)
  Restoration and aftercare phase.
  Uncertainty: Uncertainty calculated from uncertainty in base parameters.
- Occupation, traffic area, road network [natural resource, land]: 0.0018502 m2*year; lognormal variance with pedigree 0.32902, pedigree (1,1,4,1,1)
  For access road.
  Uncertainty: Uncertainty calculated from uncertainty in base parameters.
- Transformation, from dump site, sanitary landfill [natural resource, land]: 5.00053e-5 m2; lognormal variance with pedigree 0.32902, pedigree (1,1,4,1,1)
  Conversion after landfill operation.
  Uncertainty: Uncertainty calculated from uncertainty in base parameters.
- Transformation, from pasture, man made [natural resource, land]: 6.00064e-5 m2; lognormal variance with pedigree 0.32902, pedigree (1,1,4,1,1)
  Original conversion of landfill area and access road.
  Uncertainty: Uncertainty calculated from uncertainty in base parameters.
- Transformation, from shrub land, sclerophyllous [natural resource, land]: 5.00053e-5 m2; lognormal variance with pedigree 0.32902, pedigree (1,1,4,1,1)
  After restoration.
  Uncertainty: Uncertainty calculated from uncertainty in base parameters.
- Transformation, to dump site, sanitary landfill [natural resource, land]: 5.00053e-5 m2; lognormal variance with pedigree 0.32902, pedigree (1,1,4,1,1)
  Conversion to landfill area.
  Uncertainty: Uncertainty calculated from uncertainty in base parameters.
- Transformation, to forest, unspecified [natural resource, land]: 5.00053e-5 m2; lognormal variance with pedigree 0.32902, pedigree (1,1,4,1,1)
  Conversion to forest after renaturation.
  Uncertainty: Uncertainty calculated from uncertainty in base parameters.
- Transformation, to shrub land, sclerophyllous [natural resource, land]: 5.00053e-5 m2; lognormal variance with pedigree 0.32902, pedigree (1,1,4,1,1)
  Initial restoration and renaturation.
  Uncertainty: Uncertainty calculated from uncertainty in base parameters.
- Transformation, to traffic area, road network [natural resource, land]: 1.00011e-5 m2; lognormal variance with pedigree 0.32902, pedigree (1,1,4,1,1)
  Construction of access road.
  Uncertainty: Uncertainty calculated from uncertainty in base parameters.

## Emissions to nature
- Aluminium III [air, non-urban air or from high stacks]: 8.38288e-9 kg; lognormal variance with pedigree 1.9611, pedigree (1,1,4,1,1)
  Emission from direct release or combustion of landfill biogas.
  Uncertainty: Uncertainty calculated from uncertainty of the waste composition of this waste, uncertainty in waste decomposition and short-term leaching in landfill-
- Antimony ion [air, non-urban air or from high stacks]: 1.16278e-13 kg; lognormal variance with pedigree 3.4541, pedigree (1,1,4,1,1)
  (same comment as for Aluminium III)
- Arsenic ion [air, non-urban air or from high stacks]: 4.28992e-10 kg; lognormal variance with pedigree 2.3432, pedigree (1,1,4,1,1)
  (same comment as for Aluminium III)
- Cadmium II [air, non-urban air or from high stacks]: 3.57719e-11 kg; lognormal variance with pedigree 2.6682, pedigree (1,1,4,1,1)
  (same comment as for Aluminium III)
- Calcium II [air, non-urban air or from high stacks]: 2.9816e-7 kg; lognormal variance with pedigree 1.5768, pedigree (1,1,4,1,1)
  (same comment as for Aluminium III)
- Carbon dioxide, fossil [air, non-urban air or from high stacks]: 5.72833e-7 kg; lognormal variance with pedigree 0.58966, pedigree (1,1,4,1,1)
  (same comment as for Aluminium III)
- Carbon monoxide, fossil [air, non-urban air or from high stacks]: 3.49491e-11 kg; lognormal variance with pedigree 1.2366, pedigree (1,1,4,1,1)
  (same comment as for Aluminium III)
- Chromium III [air, non-urban air or from high stacks]: 3.04783e-12 kg; lognormal variance with pedigree 2.9838, pedigree (1,1,4,1,1)
  (same comment as for Aluminium III)
- Cobalt II [air, non-urban air or from high stacks]: 7.11138e-12 kg; lognormal variance with pedigree 2.8837, pedigree (1,1,4,1,1)
  (same comment as for Aluminium III)
- Copper ion [air, non-urban air or from high stacks]: 2.70137e-13 kg; lognormal variance with pedigree 3.2992, pedigree (1,1,4,1,1)
  (same comment as for Aluminium III)
- Heat, waste [air, non-urban air or from high stacks]: 3.353e-6 MJ
  Emission from direct release or incineration of landfill biogas.
- Iron ion [air, non-urban air or from high stacks]: 1.72532e-9 kg; lognormal variance with pedigree 2.1599, pedigree (1,1,4,1,1)
  (same comment as for Aluminium III)
- Lead II [air, non-urban air or from high stacks]: 2.88452e-12 kg; lognormal variance with pedigree 2.9885, pedigree (1,1,4,1,1)
  (same comment as for Aluminium III)
- Manganese II [air, non-urban air or from high stacks]: 2.82296e-9 kg; lognormal variance with pedigree 2.0975, pedigree (1,1,4,1,1)
  (same comment as for Aluminium III)
- Mercury II [air, non-urban air or from high stacks]: 2.3491e-11 kg; lognormal variance with pedigree 2.542, pedigree (1,1,4,1,1)
  (same comment as for Aluminium III)
- Methane, fossil [air, non-urban air or from high stacks]: 7.43382e-8 kg; lognormal variance with pedigree 0.63019, pedigree (1,1,4,1,1)
  (same comment as for Aluminium III)
- NMVOC, non-methane volatile organic compounds [air, non-urban air or from high stacks]: 6.612e-13 kg; lognormal variance with pedigree 0.63019, pedigree (1,1,4,1,1)
  (same comment as for Aluminium III)
- Nickel II [air, non-urban air or from high stacks]: 1.1974e-11 kg; lognormal variance with pedigree 2.811, pedigree (1,1,4,1,1)
  (same comment as for Aluminium III)
- Nitrogen oxides [air, non-urban air or from high stacks]: 8.27615e-11 kg
  Emission from direct release or combustion of landfill biogas.
- Particulate Matter, < 2.5 um [air, non-urban air or from high stacks]: 1.17329e-11 kg; lognormal variance with pedigree 0.89082, pedigree (1,1,4,1,1)
  (same comment as for Aluminium III)
- Silicon [air, non-urban air or from high stacks]: 2.4028e-8 kg; lognormal variance with pedigree 1.8434, pedigree (1,1,4,1,1)
  (same comment as for Aluminium III)
- Sodium I [air, non-urban air or from high stacks]: 2.13065e-7 kg; lognormal variance with pedigree 1.5271, pedigree (1,1,4,1,1)
  (same comment as for Aluminium III)
- Sulfur dioxide [air, non-urban air or from high stacks]: 3.22349e-5 kg
  Emission from direct release or combustion of landfill biogas.
- Thallium I [air, non-urban air or from high stacks]: 1.40112e-13 kg; lognormal variance with pedigree 3.39, pedigree (1,1,4,1,1)
  (same comment as for Aluminium III)
- Tin ion [air, non-urban air or from high stacks]: 9.79191e-14 kg; lognormal variance with pedigree 3.432, pedigree (1,1,4,1,1)
  (same comment as for Aluminium III)
- Vanadium V [air, non-urban air or from high stacks]: 3.05815e-11 kg; lognormal variance with pedigree 2.6891, pedigree (1,1,4,1,1)
  (same comment as for Aluminium III)
- Zinc II [air, non-urban air or from high stacks]: 4.24392e-11 kg; lognormal variance with pedigree 2.6413, pedigree (1,1,4,1,1)
  (same comment as for Aluminium III)
- Non-hazardous waste disposed [inventory indicator, waste]: 1.00011 kg
  Inventory indicator for waste mass disposed in landfill. To be used in EN15804 "other data" results.
- Aluminium III [water, ground-, long-term]: 0.0133753 kg; lognormal variance with pedigree 0.34065, pedigree (1,1,4,1,1)
  Emissions from long-term leachate (>100a).
  Uncertainty: Uncertainty calculated from uncertainty of the waste composition of this waste, uncertainty in waste decomposition and short-term leaching in landfill
- Ammonium [water, ground-, long-term]: 6.14533e-17 kg; lognormal variance with pedigree 2.1071, pedigree (1,1,4,1,1)
  (same comment as for Aluminium III)
- Antimony ion [water, ground-, long-term]: 5.86148e-9 kg; lognormal variance with pedigree 3.7642, pedigree (1,1,4,1,1)
  (same comment as for Aluminium III)
- Arsenic ion [water, ground-, long-term]: 4.36051e-7 kg; lognormal variance with pedigree 2.4688, pedigree (1,1,4,1,1)
  (same comment as for Aluminium III)
- BOD5, Biological Oxygen Demand [water, ground-, long-term]: 3.77026e-8 kg; lognormal variance with pedigree 0.59231, pedigree (1,1,4,1,1)
  Emissions from long-term leachate (>100a).
  Uncertainty: Uncertainty calculated from uncertainty of the waste composition of this waste, uncertainty in waste decomposition and short-term leaching in landfill.
- COD, Chemical Oxygen Demand [water, ground-, long-term]: 1.59261e-7 kg; lognormal variance with pedigree 0.59231, pedigree (1,1,4,1,1)
  (same comment as for Aluminium III)
- Cadmium II [water, ground-, long-term]: 6.01724e-7 kg; lognormal variance with pedigree 1.642, pedigree (1,1,4,1,1)
  (same comment as for Aluminium III)
- Calcium II [water, ground-, long-term]: 0.18188 kg; lognormal variance with pedigree 0.07979, pedigree (1,1,4,1,1)
  (same comment as for Aluminium III)
- Chromium VI [water, ground-, long-term]: 6.34559e-8 kg; lognormal variance with pedigree 9.6435, pedigree (1,1,4,1,1)
  (same comment as for Aluminium III)
- Cobalt II [water, ground-, long-term]: 1.72826e-6 kg; lognormal variance with pedigree 1.5043, pedigree (1,1,4,1,1)
  (same comment as for Aluminium III)
- Copper ion [water, ground-, long-term]: 3.86049e-6 kg; lognormal variance with pedigree 1.4012, pedigree (1,1,4,1,1)
  (same comment as for Aluminium III)
- DOC, Dissolved Organic Carbon [water, ground-, long-term]: 1.4561e-7 kg; lognormal variance with pedigree 0.59231, pedigree (1,1,4,1,1)
  (same comment as for Aluminium III)
- Hydrogen sulfide [water, ground-, long-term]: 0.000351856 kg; lognormal variance with pedigree 0.4616, pedigree (1,1,4,1,1)
  (same comment as for Aluminium III)
- Iron ion [water, ground-, long-term]: 0.0100391 kg; lognormal variance with pedigree 0.37486, pedigree (1,1,4,1,1)
  (same comment as for Aluminium III)
- Lead II [water, ground-, long-term]: 2.93626e-5 kg; lognormal variance with pedigree 1.1331, pedigree (1,1,4,1,1)
  (same comment as for Aluminium III)
- Manganese II [water, ground-, long-term]: 0.000179083 kg; lognormal variance with pedigree 0.88511, pedigree (1,1,4,1,1)
  (same comment as for Aluminium III)
- Mercury II [water, ground-, long-term]: 1.70358e-8 kg; lognormal variance with pedigree 1.9298, pedigree (1,1,4,1,1)
  (same comment as for Aluminium III)
- Nickel II [water, ground-, long-term]: 1.64169e-5 kg; lognormal variance with pedigree 1.2099, pedigree (1,1,4,1,1)
  (same comment as for Aluminium III)
- Nitrate [water, ground-, long-term]: 6.4628e-18 kg; lognormal variance with pedigree 2.1071, pedigree (1,1,4,1,1)
  (same comment as for Aluminium III)
- Nitrite [water, ground-, long-term]: 3.34474e-18 kg; lognormal variance with pedigree 2.1071, pedigree (1,1,4,1,1)
  (same comment as for Aluminium III)
- Nitrogen, organic bound [water, ground-, long-term]: 1.00441e-16 kg; lognormal variance with pedigree 2.1071, pedigree (1,1,4,1,1)
  (same comment as for Aluminium III)
- Phosphate [water, ground-, long-term]: 4.77152e-5 kg; lognormal variance with pedigree 2.6815, pedigree (1,1,4,1,1)
  (same comment as for Aluminium III)
- Silicon [water, ground-, long-term]: 0.000533174 kg; lognormal variance with pedigree 4.7964, pedigree (1,1,4,1,1)
  (same comment as for Aluminium III)
- Sodium I [water, ground-, long-term]: 0.00326319 kg; lognormal variance with pedigree 0.48668, pedigree (1,1,4,1,1)
  (same comment as for Aluminium III)
- Sulfate [water, ground-, long-term]: 0.013498 kg; lognormal variance with pedigree 0.4616, pedigree (1,1,4,1,1)
  (same comment as for Aluminium III)
- TOC, Total Organic Carbon [water, ground-, long-term]: 1.4561e-7 kg; lognormal variance with pedigree 0.59231, pedigree (1,1,4,1,1)
  (same comment as for Aluminium III)
- Thallium I [water, ground-, long-term]: 1.92024e-7 kg; lognormal variance with pedigree 1.7889, pedigree (1,1,4,1,1)
  (same comment as for Aluminium III)
- Tin ion [water, ground-, long-term]: 1.3289e-6 kg; lognormal variance with pedigree 1.5405, pedigree (1,1,4,1,1)
  (same comment as for Aluminium III)
- Vanadium V [water, ground-, long-term]: 4.64533e-6 kg; lognormal variance with pedigree 1.8082, pedigree (1,1,4,1,1)
  (same comment as for Aluminium III)
- Zinc II [water, ground-, long-term]: 8.03493e-5 kg; lognormal variance with pedigree 0.99885, pedigree (1,1,4,1,1)
  (same comment as for Aluminium III)
