# treatment of wood ash mixture, pure, landfarming

Dataset: EcoSpold 2, unit process
Geography: RoW
Time period: 2000-01-01 to 2023-12-31
Technology level: current
Classification: EcoSpold01Categories: waste management/landfarming
Classification: ISIC rev.4 ecoinvent: 3821:Treatment and disposal of non-hazardous waste
Tags: Treatment; ConvertedDataset
Scenario: Business-as-Usual
System model: Allocation, cut-off by classification
Generated by: Gabor Doka (obsolete)
Published in: Doka G. 2007
Database: ecoinvent
isCopyrightProtected: true
accessRestrictedTo: 1

## General comment
Inventoried waste contains 100% wood ash pure; .
waste composition (wet, in ppm): H2O n.a.; O 445010; H n.a.; C 12000; S 9200; N n.a.; P 9800; B n.a.; Cl 3200; Br n.a.; F n.a.; I n.a.; Ag n.a.; As 6.7; Ba n.a.; Cd 14.2; Co 18; Cr 194.9; Cu 163.2; Hg 0.1; Mn 19956; Mo 3.7; Ni 55.2; Pb 65; Sb n.a.; Se n.a.; Sn n.a.; V 39.5; Zn 1662; Be n.a.; Sc n.a.; Sr n.a.; Ti 1383; Tl n.a.; W n.a.; Si 82600; Fe 22833; Ca 284400; Al 20800; K 54500; Mg 32100; Na n.a.;
Share of carbon in waste that is biogenic 100%.
[This dataset was already contained in the ecoinvent database version 2. It was not individually updated during the transfer to ecoinvent version 3. Life Cycle Impact Assessment results may still have changed, as they are affected by changes in the supply chain, i.e. in other datasets. This dataset was generated following the ecoinvent quality guidelines for version 2. It may have been subject to central changes described in the ecoinvent version 3 change report (http://www.ecoinvent.org/database/ecoinvent-version-3/reports-of-changes/), and the results of the central updates were reviewed extensively. The changes added e.g. consistent water flows and other information throughout the database. The documentation of this dataset can be found in the ecoinvent reports of version 2, which are still available via the ecoinvent website. The change report linked above covers all central changes that were made during the conversion process.]

## Included activities end
direct emissions from landfarming applications (100% to agricultural soil). Burden for spreading process.

## Technology
direct spreading on agricultural areas.

## Time period
Waste composition as given in literature reference.

## Reference product
- wood ash mixture, pure: -1 kg; By-product classification Waste; CPC 3928: Sawdust and wood waste and scrap; HS2017 440140: Wood; for fuel, sawdust and wood waste and scrap, not agglomerated
  EcoSpold01Location=CH
  production volume 1.19653e9 kg; = (100-21.7)/21.7*990480000*0.5
    Based on firewood and charcoal usage in developing nations of 1300 Mio m3 (UCS 2011), generic wood fuel ash content, and a generic global rate of 21.7w% of MSW going to incineration (Pike + UNSD 2012). Very uncertain figure, as firewood using nations tend to have little MSWI, so a global average calculation might be misleading.
    It is estimated that the remaining 78.3% goes to landfill (50%) and to landfarming (50%).
  property heating value, net 0 MJ
    Non combustible products are assumed to have an LHV equal to zero (0).
  property price 0 EUR2005
    Waste products are assigned a price of zero as they are assumed to require further treatment.
  properties: carbon allocation 0.012 kg, carbon content 0.012, carbon content, fossil 0, carbon content, non-fossil 0.012, dry mass 1 kg, water content 0, water in wet mass 0 kg, wet mass 1 kg

## Inputs from technosphere
- liquid manure spreading, by vacuum tanker: 0.001 m3; lognormal variance with pedigree 0.15, pedigree (5,5,5,5,4)
  Approximate burden for spreading. vaccum tank spreading (in m3) for landfarming of waste (in kg)
  EcoSpold01Location=CH
  Uncertainty: & basic uncertainty of 1.05; vaccum tank spreading (in m3) for landfarming of waste (in kg)

## Emissions to nature
- Aluminium III [soil, agricultural]: 0.0208 kg; lognormal variance with pedigree 0.322, pedigree (1,1,5,5,1)
  direct emission from landfarming process. Uncertainty from uncertainty in waste composition.
- Arsenic ion [soil, agricultural]: 6.7e-6 kg; lognormal variance with pedigree 1.362, pedigree (1,1,5,5,1)
  (same comment as for Aluminium III)
- Cadmium II [soil, agricultural]: 1.42e-5 kg; lognormal variance with pedigree 1.262, pedigree (1,1,5,5,1)
  (same comment as for Aluminium III)
- Calcium II [soil, agricultural]: 0.284 kg; lognormal variance with pedigree 0.082, pedigree (1,1,5,5,1)
  (same comment as for Aluminium III)
- Carbon [soil, agricultural]: 0.012 kg; lognormal variance with pedigree 0.392, pedigree (1,1,5,5,1)
  (same comment as for Aluminium III)
- Chloride [soil, agricultural]: 0.0032 kg; lognormal variance with pedigree 0.552, pedigree (1,1,5,5,1)
  (same comment as for Aluminium III)
- Chromium III [soil, agricultural]: 0.000195 kg; lognormal variance with pedigree 0.912, pedigree (1,1,5,5,1)
  (same comment as for Aluminium III)
- Cobalt II [soil, agricultural]: 1.8e-5 kg; lognormal variance with pedigree 1.232, pedigree (1,1,5,5,1)
  (same comment as for Aluminium III)
- Copper ion [soil, agricultural]: 0.000163 kg; lognormal variance with pedigree 0.942, pedigree (1,1,5,5,1)
  (same comment as for Aluminium III)
- Iron ion [soil, agricultural]: 0.0228 kg; lognormal variance with pedigree 0.312, pedigree (1,1,5,5,1)
  (same comment as for Aluminium III)
- Lead II [soil, agricultural]: 6.5e-5 kg; lognormal variance with pedigree 1.062, pedigree (1,1,5,5,1)
  (same comment as for Aluminium III)
- Magnesium [soil, agricultural]: 0.0321 kg; lognormal variance with pedigree 0.272, pedigree (1,1,5,5,1)
  (same comment as for Aluminium III)
- Manganese II [soil, agricultural]: 0.02 kg; lognormal variance with pedigree 0.332, pedigree (1,1,5,5,1)
  (same comment as for Aluminium III)
- Mercury II [soil, agricultural]: 1e-7 kg; lognormal variance with pedigree 1.902, pedigree (1,1,5,5,1)
  (same comment as for Aluminium III)
- Molybdenum VI [soil, agricultural]: 3.7e-6 kg; lognormal variance with pedigree 1.432, pedigree (1,1,5,5,1)
  (same comment as for Aluminium III)
- Nickel II [soil, agricultural]: 5.52e-5 kg; lognormal variance with pedigree 1.082, pedigree (1,1,5,5,1)
  (same comment as for Aluminium III)
- Phosphorus [soil, agricultural]: 0.0098 kg; lognormal variance with pedigree 0.412, pedigree (1,1,5,5,1)
  (same comment as for Aluminium III)
- Potassium I [soil, agricultural]: 0.0545 kg; lognormal variance with pedigree 0.222, pedigree (1,1,5,5,1)
  (same comment as for Aluminium III)
- Silicon [soil, agricultural]: 0.0826 kg; lognormal variance with pedigree 0.182, pedigree (1,1,5,5,1)
  (same comment as for Aluminium III)
- Sulfur [soil, agricultural]: 0.0092 kg; lognormal variance with pedigree 0.422, pedigree (1,1,5,5,1)
  (same comment as for Aluminium III)
- Titanium ion [soil, agricultural]: 0.00138 kg; lognormal variance with pedigree 0.662, pedigree (1,1,5,5,1)
  (same comment as for Aluminium III)
- Vanadium V [soil, agricultural]: 3.95e-5 kg; lognormal variance with pedigree 1.132, pedigree (1,1,5,5,1)
  (same comment as for Aluminium III)
- Zinc II [soil, agricultural]: 0.00166 kg; lognormal variance with pedigree 0.632, pedigree (1,1,5,5,1)
  (same comment as for Aluminium III)

## Sampling procedure
Waste compositions from literature data.

## Extrapolations
Spreading process approximated with vacuum tank spreader This dataset has been copied from an original dataset covering the geography CH. The uncertainty has been adjusted accordingly.

## Review by Niels Jungbluth 2003-07-31
Passed.
