# maize grain production

Dataset: EcoSpold 2, unit process
Geography: ZA
Time period: 2006-01-01 to 2023-12-31
Technology level: current
Classification: ISIC rev.4 ecoinvent: 0111:Growing of cereals (except rice), leguminous crops and oil seeds
Synonyms: Zea mays L., corn
Scenario: Business-as-Usual
System model: Allocation, cut-off by classification
Generated by: Karen Muir
Published in: de Kock, L. 2017
Database: ecoinvent
isCopyrightProtected: true
accessRestrictedTo: 1

## General comment
This dataset represents the production of 1 kg of maize grain (fresh matter) in South Africa. The yield is 8134 kg/ha at a moisture content at storage of 13%.
Mineral N-P2O5-K2O fertiliser input is 202-33-46 kg/ha. Organic fertilisers applied amount to 2.5 t/ha of solid manure.

## Included activities start
This activity starts after the harvest of the previous crop.

## Included activities end
This activity ends with the transport of the harvested crop to the farm. The inputs of seeds, mineral fertilisers, pesticides and irrigation water are considered. Manure is the only organic fertiliser applied. The dataset includes all machine operations: soil cultivation, sowing, fertilisation, weed control, pest and pathogen control, combine-harvesting, transport of the harvested maize from the field to farm (5 km). Direct field emissions are also included.

## Geography
The inventory is modelled for South Africa.

## Technology
Cultivation of maize

## Parameters
- alpha-cypermethrin: 1.22937e-6 kg; name alpha_cypermethrin; lognormal variance with pedigree 0.037, pedigree (3,4,1,1,1)
  Quantity of pesticide applied (kg/kg maize)
- azoxystrobin: 3.27833e-6 kg; lognormal variance with pedigree 0.037, pedigree (3,4,1,1,1)
  Quantity of pesticide applied (kg/kg maize)
- benfuracarb: 8.19582e-6 kg; lognormal variance with pedigree 0.037, pedigree (3,4,1,1,1)
  Quantity of pesticide applied (kg/kg maize)
- compost application: 4.09791e-5 ha; name compost_application; lognormal variance with pedigree 0.0046, pedigree (3,4,1,1,1)
  Application of compost (ha/kg maize)
- fenvalerate: 8.19582e-7 kg; lognormal variance with pedigree 0.037, pedigree (3,4,1,1,1)
  Quantity of pesticide applied (kg/kg maize)
- fertiliser application: 0.00045077 ha; name fertiliser_application; lognormal variance with pedigree 0.0046, pedigree (3,4,1,1,1)
  Application of fertiliser (ha/kg maize)
- imidacloprid: 7.17134e-8 kg; lognormal variance with pedigree 0.037, pedigree (3,4,1,1,1)
  Quantity of pesticide applied (kg/kg maize)
- irrigation water fraction to air: 0.72 dimensionless; name fraction_iw_to_air; lognormal variance with pedigree 0.304, pedigree (3,4,1,1,1)
  Fraction of irrigation water emitted to the air. Literature value: Siebert, (2010); Vionnet, S., Quantis Water Database - Technical Report (2012)
- irrigation water fraction to ground water: 0.8 dimensionless; name fraction_iw_to_ground_water; lognormal variance with pedigree 0.304, pedigree (3,4,1,1,1)
  Fraction of irrigation water emitted to ground water
- irrigation water fracton to surface water: 0.2 dimensionless; name fraction_IW_to_surface_water; lognormal variance with pedigree 0.304, pedigree (3,4,1,1,1)
  Fraction of irrigation water emitted to surface water
- lambda-cyhalothrin: 1.14741e-6 kg; name Lambda_cyhalothrin; lognormal variance with pedigree 0.037, pedigree (3,4,1,1,1)
  Quantity of pesticide applied (kg/kg maize)
- mesotrione: 7.86799e-9 kg; lognormal variance with pedigree 0.037, pedigree (3,4,1,1,1)
  Quantity of pesticide applied (kg/kg maize)
- pesticides unspecified: 1.29656e-5 kg; name pesticides_unspecified; lognormal variance with pedigree 0.037, pedigree (3,4,1,1,1)
  Quantity of pesticide applied (kg/kg maize). This includes pesticides for which there is currently no specific exchange.
- thiamethoxam: 1.41186e-6 kg; lognormal variance with pedigree 0.037, pedigree (3,4,1,1,1)
  Quantity of pesticide applied (kg/kg maize)

## Reference product
- maize grain: 1 kg; By-product classification allocatable product; CPC 01122: Maize (corn), other; HS2017 100590: Cereals; maize (corn), other than seed
  Grain maize production, irrigated, South African production
  production volume 9.36563e7 kg
    Source: Grain SA, Operational planning of white maize grain production in the production year 2011/2012 in Eastern Highveld, South Africa; Lynnwood Ridge, South Africa, 2014; Grain SA Operational planning of white maize grain production in the production year 2011/2012 in Northwest, South Africa; Lynnwood Ridge, South Africa, 2014; Grain SA Operational planning of white maize grain production in the production year 2011/2012 in Central and Northern Free State, South Africa; Lynnwood Ridge, South Africa, 2014; Grain SA Maize production in South Africa from 2006-2013; Lynnwood Ridge, South Africa, 2014; Rechtus, S. GWK cost guide data 2016
  property price 0.12 EUR2005
    Literature value. Based on SAFEX price of R 2,025 per tonne (average yellow and white). Source: SAGIS, 2018. Retrieved from: http://www.sagis.org.za/safex_historic.html, accessed 28May2018.
  properties: carbon allocation 0.40383 kg, carbon content 0.46957, carbon content, fossil 0, carbon content, non-fossil 0.46957, dry mass 0.86 kg, water content 0.162791, water in wet mass 0.14 kg, wet mass 1 kg

## Inputs from technosphere
- application of plant protection product, by field sprayer: 0.00090154 ha; source Grain SA 2014; lognormal variance with pedigree 0.125164, pedigree (2,3,4,1,1)
  Literature value
  Further references: Grain SA Operational planning of white maize grain production in the production year 2011/2012 in Northwest, South Africa; Lynnwood Ridge, South Africa, 2014; Grain SA Operational planning of white maize grain production in the production year 2011/2012 in Central and Northern Free State, South Africa; Lynnwood Ridge, South Africa, 2014; Grain SA Maize production in South Africa from 2006-2013; Lynnwood Ridge, South Africa, 2014; Rechtus, S. GWK cost guide data 2016
- atrazine: 6.14687e-6 kg; source Grain SA 2014; lognormal variance with pedigree 0.0098, pedigree (2,3,4,1,1)
  (same comment as for application of plant protection product, by field sprayer)
  properties: carbon content, fossil 0.446512, dry mass 1 kg, wet mass 1 kg
- benzimidazole-compound: 5.12239e-6 kg; lognormal variance with pedigree 0.0098, pedigree (2,3,4,1,1)
  Literature value: carbendazim
  Further references: Grain SA Operational planning of white maize grain production in the production year 2011/2012 in Northwest, South Africa; Lynnwood Ridge, South Africa, 2014; Grain SA Operational planning of white maize grain production in the production year 2011/2012 in Central and Northern Free State, South Africa; Lynnwood Ridge, South Africa, 2014; Grain SA Maize production in South Africa from 2006-2013; Lynnwood Ridge, South Africa, 2014; Rechtus, S. GWK cost guide data 2016
  properties: carbon content, fossil 0.529668, dry mass 1 kg, wet mass 1 kg
- combine harvesting: 0.000122937 ha; lognormal variance with pedigree 0.124777, pedigree (2,3,4,1,1)
  Measured value: reported by South African maize producers
- cyclic N-compound: 2.04896e-6 kg; source Grain SA 2014; lognormal variance with pedigree 0.0143498, pedigree (2,3,4,1,1)
  Literature value: difenoconazole
  Further references: Grain SA Operational planning of white maize grain production in the production year 2011/2012 in Northwest, South Africa; Lynnwood Ridge, South Africa, 2014; Grain SA Operational planning of white maize grain production in the production year 2011/2012 in Central and Northern Free State, South Africa; Lynnwood Ridge, South Africa, 2014; Grain SA Maize production in South Africa from 2006-2013; Lynnwood Ridge, South Africa, 2014; Rechtus, S. GWK cost guide data 2016
  properties: carbon content, fossil 0.641962, dry mass 1 kg, wet mass 1 kg
- fertilising, by broadcaster: 0.000491749 ha; = compost_application+ fertiliser_application; source Grain SA 2014; lognormal variance with pedigree 0.124777, pedigree (2,3,4,1,1)
  Literature value: combined compost and fertiliser applications. 1 compost application per year and an average of 3.7 fertiliser application/year.
  Further references: Grain SA Operational planning of white maize grain production in the production year 2011/2012 in Northwest, South Africa; Lynnwood Ridge, South Africa, 2014; Grain SA Operational planning of white maize grain production in the production year 2011/2012 in Central and Northern Free State, South Africa; Lynnwood Ridge, South Africa, 2014; Grain SA Maize production in South Africa from 2006-2013; Lynnwood Ridge, South Africa, 2014; Rechtus, S. GWK cost guide data 2016.
- inorganic nitrogen fertiliser, as N: 0.0248652 kg; source Grain SA 2014; lognormal variance with pedigree 0.124777, pedigree (2,3,4,1,1)
  (same comment as for application of plant protection product, by field sprayer)
  properties: dry mass 1 kg, wet mass 1 kg
- inorganic phosphorus fertiliser, as P2O5: 0.00404422 kg; source Grain SA 2014; lognormal variance with pedigree 0.0098, pedigree (2,3,4,1,1)
  (same comment as for application of plant protection product, by field sprayer)
  properties: dry mass 1 kg, wet mass 1 kg
- inorganic potassium fertiliser, as K2O: 0.00559422 kg; source Grain SA 2014; lognormal variance with pedigree 0.0098, pedigree (2,3,4,1,1)
  (same comment as for application of plant protection product, by field sprayer)
  properties: dry mass 1 kg, wet mass 1 kg
- irrigation: 0.861 m3; name water_irrigation_input; source Grain SA 2014; lognormal variance with pedigree 0.3092, pedigree (2,3,4,1,1)
  Calculated value: average water use.
  Further references: Grain SA Operational planning of white maize grain production in the production year 2011/2012 in Northwest, South Africa; Lynnwood Ridge, South Africa, 2014; Grain SA Operational planning of white maize grain production in the production year 2011/2012 in Central and Northern Free State, South Africa; Lynnwood Ridge, South Africa, 2014; Grain SA Maize production in South Africa from 2006-2013; Lynnwood Ridge, South Africa, 2014; Rechtus, S. GWK cost guide data 2016; Hall, W. Personal communication 2015; Rechtus, S. GWK cost guide data 2016.
  properties: dry mass 0.11 kg, water content 9089.91, wet mass 1000 kg
- lime: 0.122937 kg; source Grain SA 2014; lognormal variance with pedigree 0.0098, pedigree (2,3,4,1,1)
  (same comment as for application of plant protection product, by field sprayer)
  properties: carbon content, fossil 0.120005, dry mass 1 kg, wet mass 1 kg
- maize seed, for sowing: 0.00283731 kg; name maize_seed_sowing; source Grain SA 2014; lognormal variance with pedigree 0.0098, pedigree (2,3,4,1,1)
  (same comment as for application of plant protection product, by field sprayer)
  property carbon content, fossil 0; name maize_seed_sowing_C_content_fossil
  property carbon content, non-fossil 0.45263; name maize_seed_sowing_C_content_non_fossil
  property dry mass 0.88 kg; name maize_seed_sowing_DM; = maize_seed_sowing_WM- maize_seed_sowing_WWM
  property water content 0.136364; name maize_seed_sowing_water_content; = maize_seed_sowing_WWM/ maize_seed_sowing_DM
  property water in wet mass 0.12 kg; name maize_seed_sowing_WWM
  property wet mass 1 kg; name maize_seed_sowing_WM
  note on carbon content, non-fossil: biogene carbon content on a dry matter basis; Composition data obtained from Corn Grain Whole, in (http://beefmagazine.com/images/2009%20feed%20table.pdf). First, composition data were refered to 1 kg dry mass. Then, C-contents were calculated considering a C-content/dry mass of 44% in carbohydrates (including fibres), 53% in proteins and 75% in fats. All data from ecoinvent report, n 15a, pg 40, except C-content in protein, that comes from Determination of protein concentration by total organic carbon analysis, Rouwenhorst et al., 1991, J Biochem and Biophys Methods, 22:119-128.
- manure, solid, cattle: 0.307343 kg; source de Kock, L.  2015; lognormal variance with pedigree 0.0098, pedigree (2,3,4,1,1)
  Calculated value: 50 % of farmers apply 10 t/ha every second year.
  properties: carbon content, non-fossil 0.441, dry mass 0.22 kg, water content 3.5454, wet mass 1 kg
- metolachlor: 3.74959e-5 kg; lognormal variance with pedigree 0.0098, pedigree (2,3,4,1,1)
  (same comment as for application of plant protection product, by field sprayer)
  properties: carbon content, fossil 0.633803, dry mass 1 kg, wet mass 1 kg
- packaging, for fertilisers: 0.314882 kg; lognormal variance with pedigree 0.0592, pedigree (4,3,4,5,4)
  Total amount of active substance/s of fertilisers needed for the production of 'maize grain' is calculated to be circa 1.57E-01 kg. Fertiliser/s used in this dataset is/are: 'lime', 'nitrogen fertiliser, as N', 'phosphate fertiliser, as P2O5', 'potassium fertiliser, as K2O'. The total amount of active substance/s is doubled in order to account for the packaging of the dilluted product of fertiliser/s that is/are applied. Therefore, 3.15E-01 kg of packaging for fertilisers is justified with this exchange.
  properties: carbon content, fossil 0.825301, dry mass 1 kg, heating value, net 25.01 MJ, price 0.0642 EUR2005, wet mass 1 kg
  note on carbon content, fossil: Considering a chemical formula (C2H4)n for polyethylene, carbon content-fossil is calculated to be 0.856286 kg of Carbon per kg of dry mass.
- packaging, for pesticides: 0.000129854 kg; lognormal variance with pedigree 0.0592, pedigree (4,3,4,5,4)
  Total amount of active substance/s of pesticides needed for the production of maize grain is calculated to be circa 6.49E-05 kg. Pesticide/s used in this dataset is/are: 'atrazine', 'benzimidazole-compound', 'cyclic N-compound', 'metolachlor', 'pesticide, unspecified', 'phenoxy-compound', 'pyrethroid-compound', 'triazine-compound, unspecified'. The total amount of active substance/s is doubled in order to account for the packaging of the dilluted product of pesticide/s that is/are applied. Therefore, 1.30E-04 kg of packaging for pesticides is justified with this exchange.
  properties: carbon content, fossil 0.85714, dry mass 1 kg, heating value, net 25.97 MJ, price 0.0642 EUR2005, wet mass 1 kg
- pesticide, unspecified: 4.76977e-6 kg; = azoxystrobin+ imidacloprid+ mesotrione+ thiamethoxam; source Grain SA 2014; lognormal variance with pedigree 0.0098, pedigree (2,3,4,1,1)
  Literature value: total of all unspecified pesticides: azoxystrobin, imidacloprid, mesotione, thiamethoxam.
  Further references: Grain SA Operational planning of white maize grain production in the production year 2011/2012 in Northwest, South Africa; Lynnwood Ridge, South Africa, 2014; Grain SA Operational planning of white maize grain production in the production year 2011/2012 in Central and Northern Free State, South Africa; Lynnwood Ridge, South Africa, 2014; Grain SA Maize production in South Africa from 2006-2013; Lynnwood Ridge, South Africa, 2014; Rechtus, S. GWK cost guide data 2016
  properties: carbon content, fossil 0.486978, dry mass 1 kg, wet mass 1 kg
- phenoxy-compound: 8.19582e-7 kg; = fenvalerate; source Grain SA 2014; lognormal variance with pedigree 0.0098, pedigree (2,3,4,1,1)
  Literature value: active ingredient Fenvalerat
  Further references: Grain SA Operational planning of white maize grain production in the production year 2011/2012 in Northwest, South Africa; Lynnwood Ridge, South Africa, 2014; Grain SA Operational planning of white maize grain production in the production year 2011/2012 in Central and Northern Free State, South Africa; Lynnwood Ridge, South Africa, 2014; Grain SA Maize production in South Africa from 2006-2013; Lynnwood Ridge, South Africa, 2014; Rechtus, S. GWK cost guide data 2016
  properties: carbon content, fossil 0.532559, dry mass 1 kg, wet mass 1 kg
- pyrethroid-compound: 2.37679e-6 kg; = alpha_cypermethrin+ Lambda_cyhalothrin; source Grain SA 2014; lognormal variance with pedigree 0.0098, pedigree (2,3,4,1,1)
  Literature value: active ingredient Alpha-Cypermethrin and Lamda-Cyhalothrin
  Further references: Grain SA Operational planning of white maize grain production in the production year 2011/2012 in Northwest, South Africa; Lynnwood Ridge, South Africa, 2014; Grain SA Operational planning of white maize grain production in the production year 2011/2012 in Central and Northern Free State, South Africa; Lynnwood Ridge, South Africa, 2014; Grain SA Maize production in South Africa from 2006-2013; Lynnwood Ridge, South Africa, 2014; Rechtus, S. GWK cost guide data 2016
  properties: carbon content, fossil 0.623, dry mass 1 kg, wet mass 1 kg
- sowing: 0.000122937 ha; source Grain SA 2014; lognormal variance with pedigree 0.124777, pedigree (2,3,4,1,1)
  (same comment as for application of plant protection product, by field sprayer)
- tillage, harrowing, by rotary harrow: 0.000245875 ha; source Grain SA 2014; lognormal variance with pedigree 0.3092, pedigree (2,3,4,1,1)
  (same comment as for application of plant protection product, by field sprayer)
- tillage, ploughing: 0.000122937 ha; source Grain SA 2014; lognormal variance with pedigree 0.124177, pedigree (2,1,4,1,1)
  (same comment as for application of plant protection product, by field sprayer)
- transport, tractor and trailer, agricultural: 0.045 metric ton*km; source distancefromto 2015; lognormal variance with pedigree 0.162439, pedigree (4,1,4,1,1)
  Calculated value: transport of harvested maize from the field to the farm (5km) and from the farm to the silo for storage (40km)
- triazine-compound: 6.14687e-6 kg; source Grain SA 2014; lognormal variance with pedigree 0.0098, pedigree (2,3,4,1,1)
  Literature value: active ingredient Terbuthylazin
  Further references: Grain SA Operational planning of white maize grain production in the production year 2011/2012 in Northwest, South Africa; Lynnwood Ridge, South Africa, 2014; Grain SA Operational planning of white maize grain production in the production year 2011/2012 in Central and Northern Free State, South Africa; Lynnwood Ridge, South Africa, 2014; Grain SA Maize production in South Africa from 2006-2013; Lynnwood Ridge, South Africa, 2014; Rechtus, S. GWK cost guide data 2016
  properties: carbon content, fossil 0.475616, dry mass 1 kg, wet mass 1 kg

## Inputs from nature
- Carbon dioxide, in air [natural resource, in air]: 1.49676 kg; source Nemecek, T. 2011; lognormal variance with pedigree 0.0171498, pedigree (3,4,4,1,1)
  Calculated value: calculated according to Nemecek und Schnetzer (2011).
- Energy, gross calorific value, in biomass [natural resource, biotic]: 15.91 MJ; lognormal variance with pedigree 0.0171498, pedigree (3,4,4,1,1)
  Literature value: according to US grain maize production dataset
- Occupation, annual crop, irrigated [natural resource, land]: 0.563478 m2*year; = 1/8134*10000*5.5/12; lognormal variance with pedigree 0.014, pedigree (3,4,4,1,1)
  Calculated value: cultivation period: 5.5 months, source: William Hall, Klipstapel Farm, South Africa
- Transformation, from annual crop, irrigated [natural resource, land]: 1.22937 m2; lognormal variance with pedigree 0.02, pedigree (3,4,4,1,1)
  Calculated value
- Transformation, to annual crop, irrigated [natural resource, land]: 1.22937 m2; lognormal variance with pedigree 0.02, pedigree (3,4,4,1,1)
  Calculated value

## Emissions to nature
- Ammonia [air, non-urban air or from high stacks]: 0.00131425 kg; source Nemecek, T. 2011; lognormal variance with pedigree 0.02, pedigree (3,4,4,1,1)
  Calculated value: emissions arising from fertiliser use, calculated using the AGRAMMON model from Nemecek und Schnetzer (2012).
- Dinitrogen monoxide [air, non-urban air or from high stacks]: 0.000583593 kg; source Nemecek, T. 2011; lognormal variance with pedigree 0.042, pedigree (3,4,4,1,1)
  Calculated value: emissions arising from fertiliser use, calculated according to Nemecek und Schnetzer (2011), N content of cow manure according to Walther, Ryser & Flisch (2001).
  Further references: Walther U., Ryser J.-P. & Flisch R, 2001. Grundlagen für die Düngung im Acker- und Futterbau 2001. Agrarforschung, 8 (6): 1-80.
- Nitrogen oxides [air, non-urban air or from high stacks]: 0.000125548 kg; source Nemecek, T. 2011; lognormal variance with pedigree 0.042, pedigree (3,4,4,1,1)
  Calculated value: calculated from N2O emissions according to Nemecek und Schnetzer (2011).
- Water [air, non-urban air or from high stacks]: 0.61992 m3; = water_irrigation_input* fraction_iw_to_air; lognormal variance with pedigree 0.124177, pedigree (2,1,4,1,1)
  Literature value (Siebert, 2010) (Vionnet, S., Quantis Water Database - Technical Report, 2012).
- Alpha-cypermethrin [soil, agricultural]: 1.22937e-6 kg; = alpha_cypermethrin; lognormal variance with pedigree 0.045, pedigree (3,4,4,1,1)
  Calculated value: 100% of input quantity
- Atrazine [soil, agricultural]: 6.14687e-6 kg; lognormal variance with pedigree 0.045, pedigree (3,4,4,1,1)
  Calculated value: 100% of input quantity
- Azoxystrobin [soil, agricultural]: 3.27833e-6 kg; lognormal variance with pedigree 0.045, pedigree (3,4,4,1,1)
  Calculated value: 100% of input quantity
- Cadmium II [soil, agricultural]: 6.47e-9 kg; source Nemecek, T. 2011; lognormal variance with pedigree 0.052, pedigree (3,4,4,1,1)
  Calculated value: calculated according to Nemecek und Schnetzer (2011). Heavy metal content of inorganic fertilisers according to Desaules & Struder (1993), heavy-metal contents of organic fertilisers according to Freiermuth (2006) from Menzi & Kessler (1998) and Desaules & Studer (1993), dry matter content from Walther et al. (2001), heavy metal content of plant material and deposition according to Freiermuth (2006), leaching rates according to Wolfensberger & Dinkel (1997), heavy metal content of the soil according to Keller & Desaules (2001), soil erosion according to Kooman & Critchley; Le Roux at al. (2008); UWC (2015), accumulation factor according to Wilke & Schaub (1986), erosion factor: 0.05, since surface waters between agricultural fields are rare and the distance to the next river or lake is greater than 100 m. Source: Freiermuth (2006).
  Further references: Desaules A. & Studer K. (1993) NABO: Nationales Beobachtungsnetz, Messresultate 1985-1991, Schriftenreihe Umwelt Nr. 200, BUWAL (Bundesamt für Umwelt, Wald und Landschaft), Bern; Menzi H. & Kessler J. (1998) Heavy metal content of manures in Switzerland. In: Martinez J. and Maudet M.N. (eds): Proc. 8th International Conference on the FAO ESCORENA; Freiermuth R. (2006) Modell zur Berechnung der Schwermetallflüsse in der Landwirtschaftlichen Ökobilanz - SALCA-Schwermetall, Forschungsanstalt Agroscope Reckenholz-Tänikon (ART), 28p; Perkow W. und Ploss H., 1994. Wirksubstanzen der Pflanzenschutz- und Schädlingsbekämpfungsmittel. Berlin: Blackwell Wissenschafts-Verlag.
- Carbendazim [soil, agricultural]: 5.12239e-6 kg; lognormal variance with pedigree 0.045, pedigree (3,4,4,1,1)
  Calculated value: 100% of input quantity
- Chromium III [soil, agricultural]: -1.57e-6 kg; source Nemecek, T. 2011; normal variance with pedigree 0.04, pedigree (3,4,4,1,1)
  Calculated value: calculated according to Nemecek und Schnetzer (2011). Heavy metal content of inorganic fertilisers according to Desaules & Struder (1993), heavy-metal contents of organic fertilisers according to Freiermuth (2006) from Menzi & Kessler (1998) and Desaules & Studer (1993), dry matter content from Walther et al. (2001), heavy metal content of plant material according to Freiermuth (2006), heavy metal content of pesticides according to Perkow & Ploss (1994) in Freiermuth (2006), deposition according to Freiermuth (2006), heavy metal content in exported biomass according to Freiermuth (2006).
  Further references:
  Desaules A. & Studer K. (1993) NABO: Nationales Beobachtungsnetz, Messresultate 1985-1991, Schriftenreihe Umwelt Nr. 200, BUWAL (Bundesamt für Umwelt, Wald und Landschaft), Bern;
  Menzi H. & Kessler J. (1998) Heavy metal content of manures in Switzerland. In: Martinez J. and Maudet M.N. (eds): Proc. 8th International Conference on the FAO ESCORENA;
  Freiermuth R. (2006) Modell zur Berechnung der Schwermetallflüsse in der Landwirtschaftlichen Ökobilanz - SALCA-Schwermetall, Forschungsanstalt Agroscope Reckenholz-Tänikon (ART), 28p;
  Perkow W. und Ploss H., 1994. Wirksubstanzen der Pflanzenschutz- und Schädlingsbekämpfungsmittel. Berlin: Blackwell Wissenschafts-Verlag.
  Walther U., Ryser J.-P. & Flisch R, 2001. Grundlagen für die Düngung im Acker- und Futterbau 2001. Agrarforschung, 8 (6): 1-80.
- Copper ion [soil, agricultural]: -1.09e-6 kg; source Nemecek, T. 2011; normal variance with pedigree 0.04, pedigree (3,4,4,1,1)
  (same comment as for Chromium III)
- Difenoconazole [soil, agricultural]: 2.04896e-6 kg; lognormal variance with pedigree 0.045, pedigree (3,4,4,1,1)
  Calculated value: 100% of input quantity
- Imidacloprid [soil, agricultural]: 7.17134e-8 kg; lognormal variance with pedigree 0.045, pedigree (3,4,4,1,1)
  Calculated value: 100% of input quantity
- Lambda-cyhalothrin [soil, agricultural]: 1.14741e-6 kg; = Lambda_cyhalothrin; lognormal variance with pedigree 0.045, pedigree (3,4,4,1,1)
  Calculated value: 100% of input quantity
- Lead II [soil, agricultural]: 1.55e-7 kg; source Nemecek, T. 2011; lognormal variance with pedigree 0.052, pedigree (3,4,4,1,1)
  (same comment as for Chromium III)
- Mercury II [soil, agricultural]: 2.45e-8 kg; source Nemecek, T. 2011; lognormal variance with pedigree 0.052, pedigree (3,4,4,1,1)
  (same comment as for Chromium III)
- Mesotrione [soil, agricultural]: 7.86799e-9 kg; lognormal variance with pedigree 0.045, pedigree (3,4,4,1,1)
  Calculated value: 100% of input quantity
- Metolachlor [soil, agricultural]: 3.74959e-5 kg; lognormal variance with pedigree 0.045, pedigree (3,4,4,1,1)
  Calculated value: 100% of input quantity
- Nickel II [soil, agricultural]: -6.64e-8 kg; source Nemecek, T. 2011; normal variance with pedigree 0.04, pedigree (3,4,4,1,1)
  (same comment as for Chromium III)
- Pesticides, unspecified [soil, agricultural]: 9.0154e-6 kg; = benfuracarb+ fenvalerate; lognormal variance with pedigree 0.045, pedigree (3,4,4,1,1)
  Calculated value: 100% of input quantity. Sum of pesticides for which there is no specific exchange (benfuracarb, fenvalerate).
- Terbuthylazin [soil, agricultural]: 6.14687e-6 kg; lognormal variance with pedigree 0.045, pedigree (3,4,4,1,1)
  Calculated value: 100% of input quantity
- Thiamethoxam [soil, agricultural]: 1.41186e-6 kg; lognormal variance with pedigree 0.045, pedigree (3,4,4,1,1)
  Calculated value: 100% of input quantity
- Zinc II [soil, agricultural]: -2.14e-6 kg; source Nemecek, T. 2011; normal variance with pedigree 0.04, pedigree (3,4,4,1,1)
  (same comment as for Chromium III)
- Cadmium II [water, ground-]: 6.31e-9 kg; source Nemecek, T. 2011; lognormal variance with pedigree 0.102, pedigree (3,4,4,1,1)
  Calculated value: calculated according to Nemecek und Schnetzer (2011). Leaching rates according to Wolfensberger & Dinkel (1997), heavy metal content of inorganic fertilisers according to Desaules & Struder (1993), heavy-metal contents of organic fertilisers according to Freiermuth (2006) from Menzi & Kessler (1998) and Desaules & Studer (1993), dry matter content from Walther et al. (2001), deposition and content of seeds according to Freiermuth (2006), heavy metal content of pesticides according to Perkow & Ploss (1994) in Freiermuth (2006).
  Further references:
  Wolfensberger U. & Dinkel F. (1997) Beurteilung nachwachsender Rohstoffe in der Schweiz in den Jahren 1993-1996, FAT und Carbotech, im Auftrag des Bundesamtes für Landwirtschaft, Bern;
  Desaules A. & Studer K. (1993) NABO: Nationales Beobachtungsnetz, Messresultate 1985-1991, Schriftenreihe Umwelt Nr. 200, BUWAL (Bundesamt für Umwelt, Wald und Landschaft), Bern;
  Menzi H. & Kessler J. (1998) Heavy metal content of manures in Switzerland. In: Martinez J. and Maudet M.N. (eds): Proc. 8th International Conference on the FAO ESCORENA;
  Freiermuth R. (2006) Modell zur Berechnung der Schwermetallflüsse in der Landwirtschaftlichen Ökobilanz - SALCA-Schwermetall, Forschungsanstalt Agroscope Reckenholz-Tänikon (ART), 28p
  Walther U., Ryser J.-P. & Flisch R, 2001. Grundlagen für die Düngung im Acker- und Futterbau 2001. Agrarforschung, 8 (6): 1-80.
  Perkow W. und Ploss H., 1994. Wirksubstanzen der Pflanzenschutz- und Schädlingsbekämpfungsmittel. Berlin: Blackwell Wissenschafts-Verlag.
- Cadmium II [water, surface water]: 6.2e-10 kg; source Nemecek, T. 2011; lognormal variance with pedigree 0.102, pedigree (3,4,4,1,1)
  Calculated value: calculated according to Nemecek und Schnetzer (2011). Soil heavy metal contents according to Keller & Desaules (2001), erosion average value according to Kooman & Critchley (2013), Le Roux et al. (2008) and UWC Erosion (2015), accumulation factor according to Prasuhn (2006), erosion factor: 0.05, since surface waters between agricultural fields are rare and the distance to the next river or lake is greater than 100 m according to Freiermuth (2006), heavy metal content of inorganic fertilisers according to Desaules & Struder (1993), heavy-metal contents of organic fertilisers according to Freiermuth (2006) from Menzi & Kessler (1998) and Desaules & Studer (1993), dry matter content from Walther et al. (2001), deposition and content of seeds according to Freiermuth (2006), heavy metal content of pesticides according to Perkow & Ploss (1994) in Freiermuth (2006).
  Further references:
  Keller T. & Desaules A. (2001) Böden der Schweiz: Schadstoffgehalte und Orientierungswerte (1990 - 1996). Umwelt-Materialien Nr. 139. Bern: Bundesamt für Umwelt, Wald und Landschaft BUWAL.
  Kooman, G.; Critchley, W. R. S. GIS-Assisted Modelling of Soil Erosion in a South African Catchment: Evaluating the USLE and SLEMSA Approach. In Water Resources Planning, Development and Management; Breetzke, G. D., Ed.; InTech, 2013;
  Le Roux, J. J.; Morgenthal, T. L.; Malherbe, J.; Pretorius, D. J.; Sumner, P. D. Water erosion prediction at a national scale for South Africa. Water SA 2008, 34, 305-314.;
  UWC Erosion http://www.botany.uwc.ac.za/envfacts/facts/erosion.htm (accessed Apr 28, 2015).
  Prasuhn V. (2006) Erfassung der PO4-Austräge für die Ökobilanzierung SALCA Phosphor. Agroscope Reckenholz - Tänikon ART, 20p. Online at http://www.art.admin.ch/themen/00617/00744/index.html?lang=en.
  Desaules A. & Studer K. (1993) NABO: Nationales Beobachtungsnetz, Messresultate 1985-1991, Schriftenreihe Umwelt Nr. 200, BUWAL (Bundesamt für Umwelt, Wald und Landschaft), Bern;
  Menzi H. & Kessler J. (1998) Heavy metal content of manures in Switzerland. In: Martinez J. and Maudet M.N. (eds): Proc. 8th International Conference on the FAO ESCORENA;
  Freiermuth R. (2006) Modell zur Berechnung der Schwermetallflüsse in der Landwirtschaftlichen Ökobilanz - SALCA-Schwermetall, Forschungsanstalt Agroscope Reckenholz-Tänikon (ART), 28p
  Walther U., Ryser J.-P. & Flisch R, 2001. Grundlagen für die Düngung im Acker- und Futterbau 2001. Agrarforschung, 8 (6): 1-80.
  Perkow W. und Ploss H., 1994. Wirksubstanzen der Pflanzenschutz- und Schädlingsbekämpfungsmittel. Berlin: Blackwell Wissenschafts-Verlag.
- Chromium III [water, ground-]: 9.39e-7 kg; source Nemecek, T. 2011; lognormal variance with pedigree 0.102, pedigree (3,4,4,1,1)
  (same comment as for Cadmium II)
- Chromium III [water, surface water]: 2.19e-6 kg; source Nemecek, T. 2011; lognormal variance with pedigree 0.102, pedigree (3,4,4,1,1)
  (same comment as for Cadmium II)
- Copper ion [water, ground-]: 3.67e-7 kg; source Nemecek, T. 2011; lognormal variance with pedigree 0.102, pedigree (3,4,4,1,1)
  (same comment as for Cadmium II)
- Copper ion [water, surface water]: 4.19e-7 kg; source Nemecek, T. 2011; lognormal variance with pedigree 0.102, pedigree (3,4,4,1,1)
  (same comment as for Cadmium II)
- Lead II [water, ground-]: 5.41e-9 kg; source Nemecek, T. 2011; lognormal variance with pedigree 0.102, pedigree (3,4,4,1,1)
  (same comment as for Cadmium II)
- Lead II [water, surface water]: 3.6e-8 kg; source Nemecek, T. 2011; lognormal variance with pedigree 0.102, pedigree (3,4,4,1,1)
  (same comment as for Cadmium II)
- Mercury II [water, ground-]: 1.29e-10 kg; source Nemecek, T. 2011; lognormal variance with pedigree 0.102, pedigree (3,4,4,1,1)
  (same comment as for Cadmium II)
- Mercury II [water, surface water]: 1.48e-9 kg; source Nemecek, T. 2011; lognormal variance with pedigree 0.102, pedigree (3,4,4,1,1)
  (same comment as for Cadmium II)
- Nickel II [water, surface water]: 1.7e-7 kg; source Nemecek, T. 2011; lognormal variance with pedigree 0.102, pedigree (3,4,4,1,1)
  (same comment as for Cadmium II)
- Nitrate [water, ground-]: 0.00461478 kg; source Faist Emmenegger M. 2009; lognormal variance with pedigree 0.052, pedigree (3,4,4,1,1)
  Calculated value: emissions arising from fertiliser use, calculated using the SQCB-NO3 model from Faist Emmenegger et al. (2009). Clay content according to the WFLDB, root depth according to FAO (2011).
  Further references: FAO (2011) Crop water information. Natural Resources and Environment Department, Food and Agriculture Organization of the United Nations. Online, accessed February 2011. Available at: http://www.fao.org/nr/water/cropinfo.html.
- Phosphate [water, ground-]: 2.6386e-5 kg; source Nemecek, T. 2011; lognormal variance with pedigree 0.052, pedigree (3,4,4,1,1)
  Calculated value: emissions arising from fertiliser use, calculated according to Nemecek und Schnetzer (2011). P2O5 content of manure according to Walther, Ryser & Flisch (2001).
  Further references: Walther U., Ryser J.-P. & Flisch R, 2001. Grundlagen für die Düngung im Acker- und Futterbau 2001. Agrarforschung, 8 (6): 1-80.
- Phosphate [water, surface water]: 6.77798e-5 kg; source Nemecek, T. 2011; lognormal variance with pedigree 0.052, pedigree (3,4,4,1,1)
  (same comment as for Phosphate)
- Phosphorus [water, surface water]: 2.38953e-5 kg; source Nemecek, T. 2011; lognormal variance with pedigree 0.052, pedigree (3,4,4,1,1)
  Calculated value: emissions arising from fertiliser use, calculated according to Nemecek und Schnetzer (2011). Soil erosion according to Kooman & Critchley; Le Roux at al. (2008); UWC (2015), P content in topsoil according to Nemecek, Kägi T. & Blaser S. (2007), enrichment factor for P according to Wilke & Schaub (1996), fraction of eroded soil that reaches river according to Nemecek, Kägi & Blaser (2007).
  Further references: Kooman, G.; Critchley, W. R. S. GIS-Assisted Modelling of Soil Erosion in a South African Catchment: Evaluating the USLE and SLEMSA Approach. In Water Resources Planning, Development and Management; Breetzke, G. D., Ed.; InTech, 2013 ISBN 978-953-51-1092-7; Le Roux, J. J.; Morgenthal, T. L.; Malherbe, J.; Pretorius, D. J.; Sumner, P. D. Water erosion prediction at a national scale for South Africa. Water SA 2008, 34, 305-314; UWC Erosion Available online: http://www.botany.uwc.ac.za/envfacts/facts/erosion.htm (accessed on Apr 28, 2015); Nemecek, T., Kagi, T., & Blaser, S. (2007). Life Cycle Inventories of Swiss and European Agricultural Production Systems. Final report; Wilke B. & Schaub D. (1996) Phosphatanreicherung bei Bodenerosion. Mitt. Deutsche Bodenkundl. Gesellsch. 79, 435-438.
- Water [water, ground-]: 0.192864 m3; = water_irrigation_input*(1- fraction_iw_to_air)* fraction_iw_to_ground_water; lognormal variance with pedigree 0.124177, pedigree (2,1,4,1,1)
  Calculated value.
- Water [water, surface water]: 0.048216 m3; = water_irrigation_input*(1- fraction_iw_to_air)* fraction_IW_to_surface_water; lognormal variance with pedigree 0.127577, pedigree (3,4,4,1,1)
  Calculated value.
- Zinc II [water, ground-]: 1.41e-6 kg; source Nemecek, T. 2011; lognormal variance with pedigree 0.102, pedigree (3,4,4,1,1)
  (same comment as for Cadmium II)
- Zinc II [water, surface water]: 4.34e-7 kg; source Nemecek, T. 2011; lognormal variance with pedigree 0.102, pedigree (3,4,4,1,1)
  (same comment as for Cadmium II)

## Sampling procedure
Production data are from Grain SA planning models and maize production reports and from the Griekwaland Wes Korporatief (GWK) cost guide (Grain SA Operational planning of white maize grain production in the production year 2011/2012 in Eastern Highveld, South Africa; Lynnwood Ridge, South Africa, 2014; Grain SA Operational planning of white maize grain production in the production year 2011/2012 in Northwest, South Africa; Lynnwood Ridge, South Africa, 2014; Grain SA Operational planning of white maize grain production in the production year 2011/2012 in Central and Northern Free State, South Africa; Lynnwood Ridge, South Africa, 2014; Grain SA Maize production in South Africa from 2006-2013; Lynnwood Ridge, South Africa, 2014; Rechtus, S. GWK cost guide data 2016). Transport distances were obtained from J. Coetzee, an extension officer for South African Breweries Ltd., as well as by using online distance calculators for land ( DistanceFromTo Available online: http://www.distancefromto.net (accessed on Apr 15, 2015)) and sea (SeaRates.com Available online: http://www.searates.com/de/reference/portdistance (accessed on Apr 15, 2015).) routes.

## Extrapolations
The planning models apply to cultivation in three maize production regions: the Eastern Highveld, North West, and Central and Northern Free State. These data are assumed to be representative for all South African grain maize production.

## Review by Assumpció ANTON 2017-08-10
Please, be aware to consider further flow updates as far as better models or local information could be applied.
