# heat production, coal tar, at industrial furnace 1MW

Dataset: EcoSpold 2, unit process
Geography: GLO
Time period: 2000-01-01 to 2023-12-31
Technology level: current
Classification: EcoSpold01Categories: oil/heating systems
Classification: ISIC rev.4 ecoinvent: 3530:Steam and air conditioning supply
Scenario: Business-as-Usual
System model: Allocation, cut-off by classification
Generated by: Sofia Parada Tur
Database: ecoinvent
isCopyrightProtected: true
accessRestrictedTo: 1

## General comment
This inventory describes the operation of a coal tar boiler, data related to fuel input. Due to lack of process data, the inventory is adapted from the proxy "heat production, heavy fuel oil, at industrial furnace 1 MW". The uncertainty has been adjusted accordingly.

## Included activities start
The dataset starts with the reception of coal tar at the furnace

## Included activities end
Heat delivered by the furnace not including losses during distribution in the factory.

## Geography
Assumption for operation in Europe.

## Technology
Non-modulating furnace, efficiency 95%.

## Time period
Estimation for efficiency of furnaces used in 2000.

## Parameters
- scaling factor: 1.05263 dimensionless; name scaling_factor; = 1/0.95
  1 divided by furnace efficiancy.

## Reference product
- heat, district or industrial, other than natural gas: 1 MJ; = 0.95 * scaling_factor; By-product classification allocatable product; CPC 17300: Steam and hot water
  1 MJ of heat output.
  production volume 7.90783e11 MJ; = 28242239813.6677*28
    Based on production volume of byproduct coal tar produced in the coking process and the LHV (28 MJ/kg).
  property corresponding fuel use, propane, furnace >100kW 1.05263 MJ; = 1/0.95
    Lower heating value of the fuel input related to the heat/electricity output, taken directly from ecoinvent v3.0 dataset "heat production, natural gas, at industrial furnace >100kW, GLO 2000".
  property price 0.0106 EUR2005
    Average European district heat price from Ecoheatcool and Euroheat 2005-2006, Ecoheat Work package 1: The European heat market. Final report. 10.6 EUR/GJ i s the price of district heat. http://www.solarthermalworld.org/files/Ecoheatcool%20WP1%20Web.pdf?download
  properties: carbon allocation 0 kg, carbon content 0, heating value, net 1 MJ

## Inputs from technosphere
- chimney: 3.65495e-8 m; = 3.4722E-08 * scaling_factor; lognormal variance with pedigree 0.52, pedigree (5,5,5,5,5)
  value from emission factors of heavy fuel oil burning. The emission factor is measured in kg/MJ input.
  EcoSpold01Location=CH
  Uncertainty: Calculated
- coal tar: 0.037594 kg; = (1/28)/0.95; lognormal variance with pedigree 0.2106, pedigree (5,5,5,5,5)
  based on calorific efficiency of furnace (0.95) and lower calorific value of coal tar (28 MJ/kg).
  properties: carbon content, fossil 0.83, dry mass 1 kg, heating value, net 28 MJ, wet mass 1 kg
  note on heating value, net: Literature value, Source: IPCC 2006, 2006 IPCC Guidelines for National Greenhouse Gas Inventories, Prepared by the National Greenhouse Gas Inventories Programme, Eggleston H.S., Buendia L., Miwa K., Ngara T. and Tanabe K. (eds). Published: IGES, Japan
- electricity, low voltage: 0.000875168 kWh; = 0.00083141 * scaling_factor; lognormal variance with pedigree 0.21, pedigree (5,5,5,5,5)
  value from emission factors of heavy fuel oil burning. The emission factor is measured in kg/MJ input.
  EcoSpold01Location=CH
  Uncertainty: Literature
- industrial furnace, 1MW, oil: 2.924e-9 unit; = 2.7778E-09 * scaling_factor; lognormal variance with pedigree 0.52, pedigree (5,5,5,5,5)
  value from emission factors of heavy fuel oil burning. The emission factor is measured in kg/MJ input.
  EcoSpold01Location=CH
  Uncertainty: Estimation 5000h use per year
- oil storage, 3000l: 3.89863e-8 unit; = 3.7037E-08 * scaling_factor; lognormal variance with pedigree 0.52, pedigree (5,5,5,5,5)
  (same comment as for chimney)

## Emissions to nature
- Acetaldehyde [air, urban air close to ground]: 1.57895e-7 kg; = 1.5E-07 * scaling_factor; lognormal variance with pedigree 1.02, pedigree (5,5,5,5,5)
  value from emission factors of heavy fuel oil burning. The emission factor is measured in kg/MJ input.
  Uncertainty: Literature, basic uncertainty estimated = 6
- Acetic acid [air, urban air close to ground]: 6.31579e-7 kg; = 6E-07 * scaling_factor; lognormal variance with pedigree 1.02, pedigree (5,5,5,5,5)
  (same comment as for Acetaldehyde)
- Acetone [air, urban air close to ground]: 1.57895e-7 kg; = 1.5E-07 * scaling_factor; lognormal variance with pedigree 1.02, pedigree (5,5,5,5,5)
  (same comment as for Acetaldehyde)
- Ammonia [air, urban air close to ground]: 1.05263e-8 kg; = 1E-08 * scaling_factor; lognormal variance with pedigree 0.67, pedigree (5,5,5,5,5)
  value from emission factors of heavy fuel oil burning. The emission factor is measured in kg/MJ input.
- Arsenic ion [air, urban air close to ground]: 1.36842e-8 kg; = 1.3E-08 * scaling_factor; lognormal variance with pedigree 0.86, pedigree (5,5,5,5,5)
  value from emission factors of heavy fuel oil burning. The emission factor is measured in kg/MJ input.
  Uncertainty: Literature
- Benzo(a)pyrene [air, urban air close to ground]: 2.94737e-11 kg; = 2.8E-11 * scaling_factor; lognormal variance with pedigree 1.02, pedigree (5,5,5,5,5)
  (same comment as for Acetaldehyde)
- Calcium II [air, urban air close to ground]: 1.15789e-7 kg; = 1.1E-07 * scaling_factor; lognormal variance with pedigree 0.26, pedigree (5,5,5,5,5)
  (same comment as for Arsenic ion)
- Carbon dioxide, fossil [air, urban air close to ground]: 0.0831579 kg; = 0.079 * scaling_factor; lognormal variance with pedigree 0.2086, pedigree (5,5,5,4,5)
  (same comment as for Arsenic ion)
- Carbon monoxide, fossil [air, urban air close to ground]: 7.36842e-6 kg; = 7E-06 * scaling_factor; lognormal variance with pedigree 0.37, pedigree (5,5,5,5,5)
  (same comment as for Ammonia)
- Chromium III [air, urban air close to ground]: 5.21053e-9 kg; = 4.95E-09 * scaling_factor; lognormal variance with pedigree 0.86, pedigree (5,5,5,5,5)
  (same comment as for Arsenic ion)
- Chromium VI [air, urban air close to ground]: 5.26316e-11 kg; = 5E-11 * scaling_factor; lognormal variance with pedigree 1.54, pedigree (5,5,5,5,5)
  value from emission factors of heavy fuel oil burning. The emission factor is measured in kg/MJ input.
  Uncertainty: Literature, estimation 1% Cr VI of Cr, basic uncertainity estimated = 10
- Cobalt II [air, urban air close to ground]: 3.47368e-8 kg; = 3.3E-08 * scaling_factor; lognormal variance with pedigree 0.86, pedigree (5,5,5,5,5)
  (same comment as for Arsenic ion)
- Copper ion [air, urban air close to ground]: 1.68421e-8 kg; = 1.6E-08 * scaling_factor; lognormal variance with pedigree 0.86, pedigree (5,5,5,5,5)
  (same comment as for Arsenic ion)
- Dinitrogen monoxide [air, urban air close to ground]: 8.42105e-7 kg; = 8E-07 * scaling_factor; lognormal variance with pedigree 0.74, pedigree (5,5,5,5,5)
  (same comment as for Ammonia)
- Dioxins, measured as 2,3,7,8-tetrachlorodibenzo-p-dioxin [air, urban air close to ground]: 4.73684e-16 kg; = 4.5E-16 * scaling_factor; lognormal variance with pedigree 0.3546, pedigree (3,3,5,5,1)
  (same comment as for Arsenic ion)
- Ethanol [air, urban air close to ground]: 3.15789e-7 kg; = 3E-07 * scaling_factor; lognormal variance with pedigree 1.02, pedigree (5,5,5,5,5)
  (same comment as for Acetaldehyde)
- Formaldehyde [air, urban air close to ground]: 4.73684e-7 kg; = 4.5E-07 * scaling_factor; lognormal variance with pedigree 1.02, pedigree (5,5,5,5,5)
  (same comment as for Acetaldehyde)
- Hydrocarbons, aliphatic, alkanes, unspecified [air, urban air close to ground]: 0.0259263 kg; = 0.02463 * scaling_factor; lognormal variance with pedigree 1.02, pedigree (5,5,5,5,5)
  (same comment as for Acetaldehyde)
- Hydrocarbons, aliphatic, unsaturated [air, urban air close to ground]: 6.31579e-7 kg; = 6E-07 * scaling_factor; lognormal variance with pedigree 1.0186, pedigree (5,5,5,4,5)
  (same comment as for Acetaldehyde)
- Hydrocarbons, aromatic [air, urban air close to ground]: 3.15789e-8 kg; = 3E-08 * scaling_factor; lognormal variance with pedigree 1.02, pedigree (5,5,5,5,5)
  (same comment as for Acetaldehyde)
- Hydrochloric acid [air, urban air close to ground]: 1.57895e-7 kg; = 1.5E-07 * scaling_factor; lognormal variance with pedigree 0.2586, pedigree (5,5,5,4,5)
  (same comment as for Arsenic ion)
- Hydrogen fluoride [air, urban air close to ground]: 1.51579e-6 kg; = 1.44E-06 * scaling_factor; lognormal variance with pedigree 0.26, pedigree (5,5,5,5,5)
  (same comment as for Arsenic ion)
- Iron ion [air, urban air close to ground]: 8.63158e-7 kg; = 8.2E-07 * scaling_factor; lognormal variance with pedigree 0.86, pedigree (5,5,5,5,5)
  (same comment as for Arsenic ion)
- Lead II [air, urban air close to ground]: 1.52632e-7 kg; = 1.45E-07 * scaling_factor; lognormal variance with pedigree 0.86, pedigree (5,5,5,5,5)
  (same comment as for Arsenic ion)
- Mercury II [air, urban air close to ground]: 1.57895e-10 kg; = 1.5E-10 * scaling_factor; lognormal variance with pedigree 0.86, pedigree (5,5,5,5,5)
  (same comment as for Arsenic ion)
- Methane, fossil [air, urban air close to ground]: 3.15789e-6 kg; = 3E-06 * scaling_factor; lognormal variance with pedigree 1.02, pedigree (5,5,5,5,5)
  (same comment as for Acetaldehyde)
- Methanol [air, urban air close to ground]: 5.36842e-7 kg; = 5.1E-07 * scaling_factor; lognormal variance with pedigree 0.26, pedigree (5,5,5,5,5)
  (same comment as for Arsenic ion)
- Molybdenum VI [air, urban air close to ground]: 8.42105e-9 kg; = 8E-09 * scaling_factor; lognormal variance with pedigree 0.21, pedigree (5,5,5,5,5)
  (same comment as for Arsenic ion)
- Nickel II [air, urban air close to ground]: 5.15789e-7 kg; = 4.9E-07 * scaling_factor; lognormal variance with pedigree 0.86, pedigree (5,5,5,5,5)
  (same comment as for Arsenic ion)
- Nitrogen oxides [air, urban air close to ground]: 0.000105263 kg; = 0.0001 * scaling_factor; lognormal variance with pedigree 0.86, pedigree (5,5,5,5,5)
  (same comment as for Ammonia)
- PAH, polycyclic aromatic hydrocarbons [air, urban air close to ground]: 6.10526e-10 kg; = 5.8E-10 * scaling_factor; lognormal variance with pedigree 0.52, pedigree (5,5,5,5,5)
  (same comment as for Arsenic ion)
- Particulate Matter, < 2.5 um [air, urban air close to ground]: 8.84211e-6 kg; = 8.4E-06 * scaling_factor; lognormal variance with pedigree 0.5186, pedigree (5,5,5,4,5)
  (same comment as for Arsenic ion)
- Particulate Matter, > 10 um [air, urban air close to ground]: 2.52632e-6 kg; = 2.4E-06 * scaling_factor; lognormal variance with pedigree 0.52, pedigree (5,5,5,5,5)
  value from emission factors of heavy fuel oil burning. The emission factor is measured in kg/MJ input.
  Uncertainty: Literature, basic uncertainty estimated = 3
- Particulate Matter, > 2.5 um and < 10um [air, urban air close to ground]: 1.26316e-6 kg; = 1.2E-06 * scaling_factor; lognormal variance with pedigree 0.52, pedigree (5,5,5,5,5)
  (same comment as for Particulate Matter, > 10 um)
- Propane [air, urban air close to ground]: 3.15789e-8 kg; = 3E-08 * scaling_factor; lognormal variance with pedigree 1.02, pedigree (5,5,5,5,5)
  (same comment as for Acetaldehyde)
- Selenium IV [air, urban air close to ground]: 1.26316e-8 kg; = 1.2E-08 * scaling_factor; lognormal variance with pedigree 0.8586, pedigree (5,5,5,4,5)
  (same comment as for Arsenic ion)
- Sodium I [air, urban air close to ground]: 7.89474e-7 kg; = 7.5E-07 * scaling_factor; lognormal variance with pedigree 0.26, pedigree (5,5,5,5,5)
  (same comment as for Arsenic ion)
- Sulfur dioxide [air, urban air close to ground]: 0.000414737 kg; = 0.000394 * scaling_factor; lognormal variance with pedigree 1.41, pedigree (5,5,5,5,5)
  (same comment as for Ammonia)
- Toluene [air, urban air close to ground]: 3.15789e-8 kg; = 3E-08 * scaling_factor; lognormal variance with pedigree 1.02, pedigree (5,5,5,5,5)
  (same comment as for Acetaldehyde)
- Vanadium V [air, urban air close to ground]: 1.05263e-6 kg; = 1E-06 * scaling_factor; lognormal variance with pedigree 0.86, pedigree (5,5,5,5,5)
  (same comment as for Arsenic ion)
- Zinc II [air, urban air close to ground]: 5.78947e-8 kg; = 5.5E-08 * scaling_factor; lognormal variance with pedigree 0.86, pedigree (5,5,5,5,5)
  (same comment as for Arsenic ion)

## Sampling procedure
dataset based on a proxy

## Extrapolations
based on original dataset for geography Europe without Switzerland, for heavy fuel oil burning

## Review by Bo Weidema 2012-03-23
The main ediitor, Niels Jungbluth, had no comments to this dataset.

## Review by Bo Weidema 2012-03-23
Passed.
Combustion of coal tar is modelled here as combustion of heavy fuel oil.
