# sweet corn production

Dataset: EcoSpold 2, unit process
Geography: US-WA
Time period: 2014-01-01 to 2023-12-31
Technology level: current
Classification: ISIC rev.4 ecoinvent: 0111:Growing of cereals (except rice), leguminous crops and oil seeds
Synonyms: Zea mays L., corn
Scenario: Business-as-Usual
System model: Allocation, cut-off by classification
Generated by: Juanita Barrera
Database: ecoinvent
isCopyrightProtected: true
accessRestrictedTo: 1

## General comment
This dataset represents the production of 1 kg of Sweet Corn (fresh matter) in the US state of Washington at farm, with an at harvest moisture content of 76.%. This dataset includes cultivation of the field prior to planting, field treatments, planting, applications of nutrients and pesticides, and harvest. Residues are not collected but remain on the field post-harvest and overwinter.
The average yield of Sweet Corn grown in Washington for the 2014-2021 seasons was 23,351 kg/ha (wet mass) (USDA NASS (2022a)). The dataset reflects the average Sweet Corn produced in Washington from 2014 to 2021, inclusive, as that period allows for at least one value from USDA statistics for most parameters and generally three or more. Seed establishment and weed control for sweet corn generally require tillage (EPA 2022; IPM 2003, IPM 1997), so this dataset reflects sweet corn production using conventional tillage practices. (0% no till, 0% reduced till, 100% conventional tillage) (EPA 2022; IPM center 2003; IPM center 1997 data) and being grown in rotations with other vegetable crops. While genetically engineered sweet (fresh) corn seed is available, the share of sweet (fresh) corn grown from genetically engineered seed is not compiled; it is estimated that between 75 and 90% of North American sweet corn is conventional (USDA 2018b).
Area, productivity, use of mineral and organic fertilisers and pesticides, and irrigation inputs are based on farmer data reported to the U.S. Department of Agriculture where possible or budgets available for the state, unless otherwise noted. Field operations and equipment types and fuel use are based on materials provided to growers by the agricultural extension office(s), including farm budgets, and on survey information agricultural extension office(s) collect from growers, in conjunction with row spacing data from USDA. 59.6% of crop land has installed drainage (tile or ditch), based on state-level agricultural survey data from USDA. Irrigation is included based on share of crop irrigated (86.6% over the time period, USDA NASS (2018d)).
Total cropland land use, for all crops, in Washington decreased by 4% between 1997 and 2017 (NRCS 2020); USDA NASS does not report cropped area for Sweet Corn prior to 2016. The ecoinvent practice and associated crop LCI tool allocate land use change to all crops and activities that grew in the last 20 years in the US, and only to them, according to their respective area increase; crops for which planted area decreased are not attributed LUC impacts or credits. Thus, the amount of Land use change, annual crop is close to zero for Sweet Corn grown in Washington.
Soil characteristics, including pH, are based on distribution of soil pH sampling results reported in the 2020 Soil Test Summary (Bruulsema and Jones 2021). The share of acidic soils is likely overestimated as more frequent testing is to be expected on soils having needed lime and thus low pH soils are likely to be more represented amongst the collected samples. In the absence of detailed direct soil pH data, the state-level share of soils in a particular pH band (that is, with a pH between its boundaries) is approximated as the share of the total test samples in that pH band. To test this assumption, the reported median soil pH is compared to the estimated average value using the approximated pH bins. Based on the agreement between the 2020 median pH and the approximated average soil pH for 2020, an approximate standard deviation is calculated using the variation in median values for 2020, 2015, 2010, and 2005 and the delta between the 2020 reported median and the approximate 2020 value. No anti-erosion practices are assumed in the dataset; instead, the erosion soil loss reported in the U.S. Natural Resources Conservation Service's Natural Resource Inventory is used.
References:
USDA NASS (2022a) Area, Production, Yield by State - Sweet Corn - 2016-2022. US Department of Agriculture (USDA) National Agricultural Statistics Service. https://quickstats.nass.usda.gov (direct query: https://quickstats.nass.usda.gov/results/5E5B411A-F9EF-3B83-AAFF-995DD89820FC)
USDA NASS (2018b) Statistical Methodology Name of Survey: Agricultural Resource Management Survey (ARMS) Phase II: PeanutProduction Practices Report, CornProduction Practices Report, and SoybeanProduction Practices Cost Report. US Department of Agriculture (USDA). https://www.nass.usda.gov/Surveys/Guide_to_NASS_Surveys/Chemical_Use/2018_Peanuts_Soybeans_Corn/Statistical%20Methodology%202018.pdf
IPM center (1997) Crop Profile for Corn (Sweet) in Maryland. Southern Integrated Pest Management Center. https://ipmdata.ipmcenters.org/documents/cropprofiles/MDcorn-sweet.pdf
IPM center (2003) Crop Profile for Sweet Corn in the North Central United States. Southern Integrated Pest Management Center.Southern Integrated Pest Management Center. https://ipmdata.ipmcenters.org/documents/cropprofiles/us-ncr-sweetcorn.pdf
EPA (2022) Assessment of the Benefits of Atrazine and the Impacts of Potential Mitigation for Field Corn, Sweet Corn, Sorghum, and Sugarcane; PC Code (080803). (MEMORANDUM).US Environmental Protection Agency. https://downloads.regulations.gov/EPA-HQ-OPP-2013-0266-1624/content.pdf
USDA NASS (2018d) 2018 Irrigation and Water Management Survey (2017 Census of Agriculture).US Department of Agriculture (USDA). https://www.nass.usda.gov/Publications/AgCensus/2017/Online_Resources/Farm_and_Ranch_Irrigation_Survey/index.php
NRCS (2020) Land Cover/use of non-Federal rural land, by State and year, in the 2017 National Resources Inventory. USDA, Natural Resources Conservation Service. http://www.nrcs.usda.gov/Internet/NRCS_RCA/reports/nri_crop_nat.html, https://www.nrcs.usda.gov/wps/portal/nrcs/rca/national/technical/nra/rca/text/#NRI%20Cropland
Bruulsema and Jones 2021. Soil Test Summary 2020. Foundation for Agronomic Research and Plant Nutrition Canada present this 2020 summary of soil test levels in North America. Foundation for Agronomic Research, Plant Nutrition Canada. https://soiltest.tfi.org/about/about_soil_test_summaryaccessed August 30, 2021

## Included activities start
This activity starts with soil cultivation after the harvest of the previous crop.

## Included activities end
This dataset includes cultivation of the field prior to planting, field treatments, planting, applications of nutrients and pesticides, and harvest. It ends with harvested sweet corn at the farm gate, prior to storage.

## Geography
Production of Sweet Corn in Washington (US-WA).

## Technology
This dataset reflects current practice for Sweet Corn in Washington as of 2022.

## Time period
The valid period covers 2014-01-01 through 2021-12-31 based on primary data sources. The production volumes, areas and applications are covered by data throughout the time period (annual for production and area, alternate years for applications). Because the specific pesticides used show time-dependent trends, the most recent 2 years of data are used to avoid underweighting the most dominant pesticides currently used and to avoid skewing impacts based on compounds no longer in use. Field operations are based on enterprise crop budgets and other guidance and change little year to year. The most recent enterprise budget available for Washington is from 2002, but operations included in it are consistent with more recent budgets and guidance from other states. The field operations are assumed valid through the dataset time period.

## Reference product
- sweet corn: 1 kg; By-product classification allocatable product; CPC 01290: Vegetables, fresh, n.e.c.; HS2017 070999: Vegetables; edible, n.e.c. in chapter 07, fresh or chilled
  This dataset represents the production of 1 kg of Sweet Corn (fresh matter) in the US state of Washington at farm, with an at harvest moisture content of 76.%. This dataset includes cultivation of the field prior to planting, field treatments, planting, applications of nutrients and pesticides, and harvest. Residues are not collected but remain on the field post-harvest and overwinter.
  production volume 716147 kg; name pv_corn
    Average annual production of maize grain in Washington 2016-2021: 0.7 Mt/year (source SWEET CORN - PRODUCTION, MEASURED IN Metric Tonne (converted from CWT = 100lb) US Department of Agriculture (USDA NASS) 2021a (direct query https://quickstats.nass.usda.gov/results/331F88CC-004E-34D2-B825-F8F65DAC7879)
  property carbon content, non-fossil 0.475
    Biogene carbon content on a dry matter basis (47.5%) derived from FAOSTAT. Reference: http://www.fao.org/forestry/17111/en.
  property energy content 4.488 MJ
    {3,3,1,3,5} The gross energy content of Sweet Corn is 18.7MJ/kg on a dry matter basis, 87.2% dry matter as fed for North American Sweet Corn (Feedipedia - Maize 2017). At the harvest moisture content of 76.% (Neibauer, J. and Maynard, E. 2012), the energy content of Sweet Corn is 4.5MJ/kg product weight
    Source(s):
    Heuzé V., Tran G., Lebas F. (2017) Maize grain. Feedipedia, a programme by INRAE, CIRAD, AFZ and FAO. https://www.feedipedia.org/node/556 Last updated on September 7, 2017, 14:29. ; Neibauer, J. and Maynard, E. (2012) Sweetcorn Produce Quality and Safety. Purdue University. https://www.hort.purdue.edu/prod_quality/commodities/sweetcorn.html
  property price 0.0911121 EUR2005
    The price per kg of sweetcorn is considered for the years 2016-2021 for the state of Washington in the US. The values were retrieved in $/CWT [1] and converted into $/kg. References: [1] US Department of Agriculture (NASS), Quickstat, TabLe "SWEETCORN - PRICE RECEIVED, MEASURED IN $ / CWT", accessed on 25.08.2023, available at: https://quickstats.nass.usda.gov/
    The prices were converted to EUR based on the annual exchange rates published by the European Central Bank (https://sdw.ecb.europa.eu/quickview.do?SERIES_KEY=120.EXR.A.AUD.EUR.SP00.A, last accessed on 2023-06-01) and adjusted for inflation relative to 2005 using the producer price index (PPI) of the euro area, published by eurostat (https://ec.europa.eu/eurostat/databrowser/view/STS_INPP_A__custom_6416181/default/table?lang=en, last accessed on 2023-06-01).
  properties: carbon allocation 0.114 kg, carbon content 0.475, carbon content, fossil 0, dry mass 0.24 kg, water content 3.16667, water in wet mass 0.76 kg, wet mass 1 kg

## Inputs from technosphere
- NPK (15-15-15) fertiliser: 0.00307477 kg; lognormal variance with pedigree 0.0046, pedigree (1,4,3,1,1)
  3.07E-3 kg NPK (15-15-15) fertiliser/kg Sweet Corn
  Quantities of specific fertiliser are calculated based on US fertiliser market share and nutrient compositions from IFA data to meet total nutrient demand N-P-K-S: 167.8--11.82--0.13--23.86 kg/ha (USDA NASS data for 2018), over reported cropped area of specified crop (conventional tillage): quantity of N applied to treated acres times percent of planted sweetcorn acres (USDA NASS) times share of N supplied by compound in U.S. consumption mix (ecoinvent and IFA 2019) times mass compound per mass N in compound.
  Sources:
  USDA NASS (2022c) SWEETCORN - APPLICATIONS, MEASURED IN LB / ACRE / YEAR, AVG (fertilizer and pesticides, amount, number of applications) - 2000-2021. US Department of Agriculture (USDA) National Agricultural Statistics Service. https://quickstats.nass.usda.gov/#5E5B411A-F9EF-3B83-AAFF-995DD89820FC; Ecoinvent U.S. consumption mix for N fertilisers, from IFA data; IFA (2021) Nutrient content in percentage - IFA Fertilizer Converter. International Fertilizer Association. https://www.ifastat.org/converter/fertilizer-converter/accessed 2021-06-24
  properties: dry mass 1 kg, nitrogen content 0.15, phosphorus content 0.15, potassium content 0.15, wet mass 1 kg
  note on nitrogen content: Nitrogen content (on a dry matter basis) of NPK (15-15-15) fertiliser is calculated from the molecular formula of the substance ().
  note on phosphorus content: Phosphorus content (on a dry matter basis) of NPK (15-15-15) fertiliser is calculated from the molecular formula of the substance ().
  note on potassium content: Potassium content (on a dry matter basis) of NPK (15-15-15) fertiliser is calculated from the molecular formula of the substance ().
- acetamide-anillide-compound, unspecified: 2.93556e-5 kg; normal variance with pedigree 8.05793e-11, pedigree (2,3,3,3,1)
  Proxy for applied pesticide(s) Dimethenamid-P (6.855E-1 kg/ha {1,2,2,1,1}).
  Data reported a quantity of total insecticides/herbicides/fungicides applied in sweet corn is sometimes available even when many of the substances in the category are reported with a “D”. If this total is available, the amount remaining after the sum of substance-specific values is accounted for is divided equally among the substances reported with a “D”. If the sum of available values exceeds or equals the total reported, any remaining “D” substances are treated as zero and omitted.
  From SWEETCORN - APPLICATIONS, MEASURED IN LB / ACRE / YEAR, AVG (fertilizer and pesticides, amount, number of applications) - 2000-2021, https://quickstats.nass.usda.gov/#5E5B411A-F9EF-3B83-AAFF-995DD89820FC
  properties: carbon content, fossil 0.659175, dry mass 1 kg, wet mass 1 kg
- ammonia, anhydrous, liquid: 0.00216611 kg; lognormal variance with pedigree 0.0046, pedigree (1,4,3,1,1)
  2.17E-3 kg ammonia, anhydrous, liquid/kg Sweet Corn.
  Ecoinvent U.S. consumption mix for N fertilisers, from IFA data N-P-K-S: 167.80--11.8--.1--23.86 kg/ha (USDA NASS data for 2018)over reported cropped area of specified crop (conventional tillage): quantity of N applied to treated acres times percent of planted sweetcorn acres (USDA NASS) times share of N supplied by compound in U.S. consumption mix (ecoinvent and IFA 2019) times mass compound per mass N in compound.
  Sources:
  USDA NASS (2022c) SWEETCORN - APPLICATIONS, MEASURED IN LB / ACRE / YEAR, AVG (fertilizer and pesticides, amount, number of applications) - 2000-2021. US Department of Agriculture (USDA) National Agricultural Statistics Service. https://quickstats.nass.usda.gov/#5E5B411A-F9EF-3B83-AAFF-995DD89820FC; Ecoinvent U.S. consumption mix for N fertilisers, from IFA data; IFA (2021) Nutrient content in percentage - IFA Fertilizer Converter. International Fertilizer Association. https://www.ifastat.org/converter/fertilizer-converter/accessed 2021-06-24
  properties: dry mass 1 kg, wet mass 1 kg
- ammonium nitrate: 0.000332808 kg; lognormal variance with pedigree 0.0046, pedigree (1,4,3,1,1)
  3.33E-4 kg ammonium nitrate/kg Sweet Corn.
  Ecoinvent U.S. consumption mix for N fertilisers, from IFA data N-P-K-S: 167.80--11.8--.1--23.86 kg/ha (USDA NASS data for 2018)over reported cropped area of specified crop (conventional tillage): quantity of N applied to treated acres times percent of planted sweetcorn acres (USDA NASS) times share of N supplied by compound in U.S. consumption mix (ecoinvent and IFA 2019) times mass compound per mass N in compound.
  Sources:
  USDA NASS (2022c) SWEETCORN - APPLICATIONS, MEASURED IN LB / ACRE / YEAR, AVG (fertilizer and pesticides, amount, number of applications) - 2000-2021. US Department of Agriculture (USDA) National Agricultural Statistics Service. https://quickstats.nass.usda.gov/#5E5B411A-F9EF-3B83-AAFF-995DD89820FC; Ecoinvent U.S. consumption mix for N fertilisers, from IFA data; IFA (2021) Nutrient content in percentage - IFA Fertilizer Converter. International Fertilizer Association. https://www.ifastat.org/converter/fertilizer-converter/accessed 2021-06-24
  properties: dry mass 1 kg, wet mass 1 kg
- ammonium nitrate phosphate: 0.000301056 kg; lognormal variance with pedigree 0.0046, pedigree (1,4,3,1,1)
  3.01E-4 kg ammonium nitrate phosphate/kg Sweet Corn.
  Ecoinvent U.S. consumption mix for N fertilisers, from IFA data N-P-K-S: 167.80--11.8--.1--23.86 kg/ha (USDA NASS data for 2018)over reported cropped area of specified crop (conventional tillage): quantity of N applied to treated acres times percent of planted sweetcorn acres (USDA NASS) times share of N supplied by compound in U.S. consumption mix (ecoinvent and IFA 2019) times mass compound per mass N in compound.
  Sources:
  USDA NASS (2022c) SWEETCORN - APPLICATIONS, MEASURED IN LB / ACRE / YEAR, AVG (fertilizer and pesticides, amount, number of applications) - 2000-2021. US Department of Agriculture (USDA) National Agricultural Statistics Service. https://quickstats.nass.usda.gov/#5E5B411A-F9EF-3B83-AAFF-995DD89820FC; Ecoinvent U.S. consumption mix for N fertilisers, from IFA data; IFA (2021) Nutrient content in percentage - IFA Fertilizer Converter. International Fertilizer Association. https://www.ifastat.org/converter/fertilizer-converter/accessed 2021-06-24
  properties: dry mass 1 kg, nitrogen content 0.22, phosphorus content 0.0960126, wet mass 1 kg
  note on nitrogen content: Nitrogen content (on a dry matter basis) of ammonium nitrate phosphate is calculated from the molecular formula of the nutrient present in the substance.
  note on phosphorus content: Phosphorus content (on a dry matter basis) of ammonium nitrate phosphate is calculated from the molecular formula of the nutrient present in the substance.
- ammonium sulfate: 0.00271958 kg; lognormal variance with pedigree 0.0046, pedigree (1,4,3,1,1)
  2.72E-3 kg ammonium sulfate/kg Sweet Corn.
  Ecoinvent U.S. consumption mix for N fertilisers, from IFA data N-P-K-S: 167.80--11.8--.1--23.86 kg/ha (USDA NASS data for 2018)over reported cropped area of specified crop (conventional tillage): quantity of N applied to treated acres times percent of planted sweetcorn acres (USDA NASS) times share of N supplied by compound in U.S. consumption mix (ecoinvent and IFA 2019) times mass compound per mass N in compound.
  Sources:
  USDA NASS (2022c) SWEETCORN - APPLICATIONS, MEASURED IN LB / ACRE / YEAR, AVG (fertilizer and pesticides, amount, number of applications) - 2000-2021. US Department of Agriculture (USDA) National Agricultural Statistics Service. https://quickstats.nass.usda.gov/#5E5B411A-F9EF-3B83-AAFF-995DD89820FC; Ecoinvent U.S. consumption mix for N fertilisers, from IFA data; IFA (2021) Nutrient content in percentage - IFA Fertilizer Converter. International Fertilizer Association. https://www.ifastat.org/converter/fertilizer-converter/accessed 2021-06-24
  properties: dry mass 1 kg, wet mass 1 kg
- application of plant protection product, by airplane: 8.56493e-5 ha; lognormal variance with pedigree 0.0206, pedigree (4,4,3,1,3)
  2.00 ha/ha (8.56E-5 ha/kg Sweet Corn) application of plant protection product, by airplane
  Pesticide data is sometimes withheld in the NASS database to avoid disclosing data for individual operations (denoted with "D" in the data returned for the query, indicating a non-zero but withheld value). This is the case for almost all pesticide entries for sweet corn in Washington. Thus pesticide applications are based on the Washington Extension office enterprise crop budget (2 ground herbicide and 2 aerial insecticide applications). Application rates of specific pesticides are based on a Washington state profile (Hinman H, Pelter G, Sorensen E and Fickle A 2002b) for sweet corn (compound) and Pacific NorthWest (Felix J 2022) integrated pest management materials (quantity). In the absence of data for acres treated the dataset assumes the guidance applies to all acres. Application by sprayer accounts for 50% (2.00 passes) and aircraft for 50% (2.00 passes). An aerial pesticide application rate of 50% is used here.
  The National Agricultural Aviation Association estimates that approximately 28% of all US cropland (excluding range, pasture, and forest lands) is treated by aircraft annually (NAAA 2019, NAAA 2020).
  Field operations are as identified in crop- and rotation-specific enterprise crop budgets supplied by the regional agricultural extension office and matched to equipment type in the budget or crop guidance unless otherwise noted. (Hinman H, Pelter G, Sorensen E and Fickle A 2002a, Hanna, Mark 2016, Schuler and Frank 1998, Lattz and Schnitkey 2021b). Field cultivation and tillage operations are specific to the tillage regime used. Seed establishment and weed control for sweet corn generally require tillage (EPA 2022; IPM 2003, IPM 1997), so this dataset reflects sweet corn production using conventional tillage practices
  Source(s):
  Hinman H, Pelter G, Sorensen E and Fickle A (2002a) 2002 Cost of Producing Dry Beands, Sweet Corn, And Green Peas Uner Center Pivot Irrigation In The Columbia Basin of Washington State. School of Economic Sciences, Washington State University. http://ses.wsu.edu/wp-content/uploads/2018/03/EB1941E.pdf
  DeBruin J and Butzen S (2020) Nitrogen uptake by corn . Pioneer. https://www.pioneer.com/us/agronomy/nitrogen_uptake_corn.htmlaccessed 11-20-2021
  NAAA (2020) Letter to the South Dakota Public Utilities Commission, July 30, 2020. National Agricultural Aviation Association. https://puc.sd.gov/commission/dockets/electric/2021/EL21-018/prefiledexhibits/MBExhH.pdf
  NAAA (2019) NAAA Member Survey Report. National Agricultural Aviation Association. https://www.agaviation.org/
  Wilde M (2010) "Dusting crops a boon, necessity for farmers," in the WFC Courier, August 16, 2010.https://iowadot.gov/aviation/news/pdfs/Dusting%20crops%20a%20boonnecessity%20for%20farmers.pdf
  FAA (2019) Table 5.1 - 2019 GENERAL AVIATION AND PART 135 TOTAL FUEL CONSUMED AND AVERAGE FUEL CONSUMPTION RATE BY AIRCRAFT TYPE, Table 3.2 - 2019 GENERAL AVIATION AND PART 135 TOTAL HOURS FLOWN BY ACTUAL USE BY AIRCRAFT TYPE. Federal Aviation Administration. https://www.faa.gov/data_research/aviation_data_statistics/general_aviation/CY2019/
  Fritz B (2018) “Best Practices for Aerial Application” in EPA webinar series "Pesticide Spray Drift Series—3 Parts". USDA. https://www.epa.gov/sites/default/files/2019-04/documents/best-practices-for-aerial-application-slides.pdf
  Lattz and Schnitkey (2021a) Machinery Cost Estimates: Summary. Department of Agricultural and Consumer Economics, University of Illinois at Urbana-Champaign. https://farmdoc.illinois.edu/assets/management/machinery-costs/machinery-cost-estimates_summary.pdf
  IPM (2002) Crop Profile for Corn (Sweet) in Florida. Integrated Pest Management. https://ipmdata.ipmcenters.org/documents/cropprofiles/FLSweetcorn2002.pdf
  ()
  USDA NASS (2022c) SWEETCORN - APPLICATIONS, MEASURED IN LB / ACRE / YEAR, AVG (fertilizer and pesticides, amount, number of applications) - 2000-2021. US Department of Agriculture (USDA) National Agricultural Statistics Service. https://quickstats.nass.usda.gov/#5E5B411A-F9EF-3B83-AAFF-995DD89820FC; Hinman H, Pelter G, Sorensen E and Fickle A 2002a, Hanna, Mark 2016, Schuler and Frank 1998, Lattz and Schnitkey 2021b
- application of plant protection product, by field sprayer: 8.56493e-5 ha; lognormal variance with pedigree 0.0206, pedigree (4,4,3,1,3)
  2.00 ha/ha (8.56E-5 ha/kg Sweet Corn) application of plant protection product, by sprayer
  Pesticide data is sometimes withheld in the NASS database to avoid disclosing data for individual operations (denoted with "D" in the data returned for the query, indicating a non-zero but withheld value). This is the case for almost all pesticide entries for sweet corn in Washington. Thus pesticide applications are based on the Washington Extension office enterprise crop budget (2 ground herbicide and 2 aerial insecticide applications). Application rates of specific pesticides are based on a Washington state profile (Hinman H, Pelter G, Sorensen E and Fickle A 2002b) for sweet corn (compound) and Pacific NorthWest (Felix J 2022) integrated pest management materials (quantity). In the absence of data for acres treated the dataset assumes the guidance applies to all acres. Application by sprayer accounts for 50% (2.00 passes) and aircraft for 50% (2.00 passes). An aerial pesticide application rate of 50% is used here.
  The National Agricultural Aviation Association estimates that approximately 28% of all US cropland (excluding range, pasture, and forest lands) is treated by aircraft annually (NAAA 2019, NAAA 2020).
  Field operations are as identified in crop- and rotation-specific enterprise crop budgets supplied by the regional agricultural extension office and matched to equipment type in the budget or crop guidance unless otherwise noted. (Hinman H, Pelter G, Sorensen E and Fickle A 2002a, Hanna, Mark 2016, Schuler and Frank 1998, Lattz and Schnitkey 2021b). Field cultivation and tillage operations are specific to the tillage regime used. Seed establishment and weed control for sweet corn generally require tillage (EPA 2022; IPM 2003, IPM 1997), so this dataset reflects sweet corn production using conventional tillage practices
  Source(s):
  Hinman H, Pelter G, Sorensen E and Fickle A (2002a) 2002 Cost of Producing Dry Beands, Sweet Corn, And Green Peas Uner Center Pivot Irrigation In The Columbia Basin of Washington State. School of Economic Sciences, Washington State University. http://ses.wsu.edu/wp-content/uploads/2018/03/EB1941E.pdf
  DeBruin J and Butzen S (2020) Nitrogen uptake by corn . Pioneer. https://www.pioneer.com/us/agronomy/nitrogen_uptake_corn.htmlaccessed 11-20-2021
  NAAA (2020) Letter to the South Dakota Public Utilities Commission, July 30, 2020. National Agricultural Aviation Association. https://puc.sd.gov/commission/dockets/electric/2021/EL21-018/prefiledexhibits/MBExhH.pdf
  NAAA (2019) NAAA Member Survey Report. National Agricultural Aviation Association. https://www.agaviation.org/
  Wilde M (2010) "Dusting crops a boon, necessity for farmers," in the WFC Courier, August 16, 2010.https://iowadot.gov/aviation/news/pdfs/Dusting%20crops%20a%20boonnecessity%20for%20farmers.pdf
  FAA (2019) Table 5.1 - 2019 GENERAL AVIATION AND PART 135 TOTAL FUEL CONSUMED AND AVERAGE FUEL CONSUMPTION RATE BY AIRCRAFT TYPE, Table 3.2 - 2019 GENERAL AVIATION AND PART 135 TOTAL HOURS FLOWN BY ACTUAL USE BY AIRCRAFT TYPE. Federal Aviation Administration. https://www.faa.gov/data_research/aviation_data_statistics/general_aviation/CY2019/
  Fritz B (2018) “Best Practices for Aerial Application” in EPA webinar series "Pesticide Spray Drift Series—3 Parts". USDA. https://www.epa.gov/sites/default/files/2019-04/documents/best-practices-for-aerial-application-slides.pdf
  Lattz and Schnitkey (2021a) Machinery Cost Estimates: Summary. Department of Agricultural and Consumer Economics, University of Illinois at Urbana-Champaign. https://farmdoc.illinois.edu/assets/management/machinery-costs/machinery-cost-estimates_summary.pdf
  IPM (2002) Crop Profile for Corn (Sweet) in Florida. Integrated Pest Management. https://ipmdata.ipmcenters.org/documents/cropprofiles/FLSweetcorn2002.pdf
  ()
  USDA NASS (2022c) SWEETCORN - APPLICATIONS, MEASURED IN LB / ACRE / YEAR, AVG (fertilizer and pesticides, amount, number of applications) - 2000-2021. US Department of Agriculture (USDA) National Agricultural Statistics Service. https://quickstats.nass.usda.gov/#5E5B411A-F9EF-3B83-AAFF-995DD89820FC; Hinman H, Pelter G, Sorensen E and Fickle A 2002a, Hanna, Mark 2016, Schuler and Frank 1998, Lattz and Schnitkey 2021b
- atrazine: 5.07002e-5 kg; normal variance with pedigree 2.86784e-9, pedigree (2,3,3,3,1)
  applied pesticide(s) Atrazine (1.184E+0 kg/ha {1,2,2,1,1}).
  Data reported a quantity of total insecticides/herbicides/fungicides applied in sweet corn is sometimes available even when many of the substances in the category are reported with a “D”. If this total is available, the amount remaining after the sum of substance-specific values is accounted for is divided equally among the substances reported with a “D”. If the sum of available values exceeds or equals the total reported, any remaining “D” substances are treated as zero and omitted.
  From SWEETCORN - APPLICATIONS, MEASURED IN LB / ACRE / YEAR, AVG (fertilizer and pesticides, amount, number of applications) - 2000-2021, https://quickstats.nass.usda.gov/#5E5B411A-F9EF-3B83-AAFF-995DD89820FC
  properties: carbon content, fossil 0.446512, dry mass 1 kg, wet mass 1 kg
- benzo[thia]diazole-compound: 1.92e-7 kg; normal variance with pedigree 1.47456e-19, pedigree (2,3,3,3,1)
  Proxy for applied pesticide(s) Fluthiacet-methyl (4.483E-3 kg/ha {1,2,2,1,1}).
  Data reported a quantity of total insecticides/herbicides/fungicides applied in sweet corn is sometimes available even when many of the substances in the category are reported with a “D”. If this total is available, the amount remaining after the sum of substance-specific values is accounted for is divided equally among the substances reported with a “D”. If the sum of available values exceeds or equals the total reported, any remaining “D” substances are treated as zero and omitted.
  From SWEETCORN - APPLICATIONS, MEASURED IN LB / ACRE / YEAR, AVG (fertilizer and pesticides, amount, number of applications) - 2000-2021, https://quickstats.nass.usda.gov/#5E5B411A-F9EF-3B83-AAFF-995DD89820FC
  properties: carbon content, fossil 0.499869, dry mass 1 kg, wet mass 1 kg
- diammonium phosphate: 0.00050176 kg; lognormal variance with pedigree 0.0046, pedigree (1,4,3,1,1)
  5.02E-4 kg diammonium phosphate/kg Sweet Corn.
  Ecoinvent U.S. consumption mix for N fertilisers, from IFA data N-P-K-S: 167.80--11.8--.1--23.86 kg/ha (USDA NASS data for 2018)over reported cropped area of specified crop (conventional tillage): quantity of N applied to treated acres times percent of planted sweetcorn acres (USDA NASS) times share of N supplied by compound in U.S. consumption mix (ecoinvent and IFA 2019) times mass compound per mass N in compound.
  Sources:
  USDA NASS (2022c) SWEETCORN - APPLICATIONS, MEASURED IN LB / ACRE / YEAR, AVG (fertilizer and pesticides, amount, number of applications) - 2000-2021. US Department of Agriculture (USDA) National Agricultural Statistics Service. https://quickstats.nass.usda.gov/#5E5B411A-F9EF-3B83-AAFF-995DD89820FC; Ecoinvent U.S. consumption mix for N fertilisers, from IFA data; IFA (2021) Nutrient content in percentage - IFA Fertilizer Converter. International Fertilizer Association. https://www.ifastat.org/converter/fertilizer-converter/accessed 2021-06-24
  properties: dry mass 1 kg, nitrogen content 0.18, phosphorus content 0.200754, wet mass 1 kg
  note on nitrogen content: Nitrogen content (on a dry matter basis) of diammonium phosphate is calculated from the molecular formula of the nutrient present in the substance.
  note on phosphorus content: Phosphorus content (on a dry matter basis) of diammonium phosphate is calculated from the molecular formula of the nutrient present in the substance.
- dinitroaniline-compound: 6.76856e-5 kg; normal variance with pedigree 5.69356e-10, pedigree (2,3,3,3,1)
  This exchange is an aggregate of proxies for applied pesticide(s) Pendimethalin, Pyraclostrobin (1.422E+0 kg/ha {1,2,2,1,1}; 1.582E-1 kg/ha {1,2,2,1,1}, respectively).
  Data reported a quantity of total insecticides/herbicides/fungicides applied in sweet corn is sometimes available even when many of the substances in the category are reported with a “D”. If this total is available, the amount remaining after the sum of substance-specific values is accounted for is divided equally among the substances reported with a “D”. If the sum of available values exceeds or equals the total reported, any remaining “D” substances are treated as zero and omitted.
  From SWEETCORN - APPLICATIONS, MEASURED IN LB / ACRE / YEAR, AVG (fertilizer and pesticides, amount, number of applications) - 2000-2021, https://quickstats.nass.usda.gov/#5E5B411A-F9EF-3B83-AAFF-995DD89820FC
  properties: carbon content, fossil 0.55516, dry mass 1 kg, wet mass 1 kg
- fertilising, by broadcaster: 4.28247e-5 ha; lognormal variance with pedigree 0.0206, pedigree (4,4,3,1,3)
  1.00 ha/ha (4.28E-5 ha/kg Sweet Corn) fertilising, by broadcaster
  Average application rates for mineral fertilisers (NPKS) on Sweet Corn in Washington are: 1.80 N applications on 99.0% of cropped area, 1.00 P applications on 56.0% of cropped area, 1.00 K applications on 6.0% of cropped area, and 1.20 S applications on 89.0% of cropped area (NPKS data from 2018). The budget includes pre-plant fertiliser application, ammendment with planting, and additional N delivered during the season via fertigation (Hinman H, Pelter G, Sorensen E and Fickle A 2002a). Applications of N are split between anhydrous ammonia and other N, because they are applied differently, with different equipment Other than anhydrous ammonia, most NPK(S) fertilisers are applied together via broadcast application.
  Anhydrous ammonia application (knifing/injection) is calculated as market share of N that is anhydrous ammonia * total N applications (=0.43). Other N application is then total USDA N applications less applications of anhydrous ammonia (=1.37). The market share of N that is anhydrous ammonia is calculated from fertiliser market group shares crossed with meeting NPKS nutrient demand (here, 23.65%). Thus, the dataset includes 0.42 anhydrous ammonia applications via injection (0.43 * 99.0% of crop area with applied N) and 1.36 other N applications via broadcast (1.37 * 99.0%). Since the number of passes for N application after removing the anhydrous ammonia share is greater than the maximum number of passes reported for the other nutrients, this dataset assumes that any other fertiliser applications are reflected under that pass and the total fertiliser broadcast fertiliser passes are thus 1.36.
  Field operations are as identified in crop- and rotation-specific enterprise crop budgets supplied by the regional agricultural extension office and matched to equipment type in the budget or crop guidance unless otherwise noted. (Hinman H, Pelter G, Sorensen E and Fickle A 2002a, Hanna, Mark 2016, Schuler and Frank 1998, Lattz and Schnitkey 2021b). Operations are matched to equipment type and where multiple options are available, the share of each is determined from guidance and annual farmer survey data (Custom Rate Summaries) for contracted operations/equipment. Where an operation applies only to a portion of the harvested area, the number of passes has been scaled by the % of harvested area to which it applies (e.g., manure spreading or insecticide) as indicated by USDA statistics (applications) or USDA reports (manure use) or as otherwise indicated in enterprise crop budgets.
  Source(s):
  USDA NASS (2022d) Applications - fertilizers and pesticides - number, amount, - Sweet Corn- 2000-2021. US Department of Agriculture (USDA) National Agricultural Statistics Service. https://quickstats.nass.usda.gov (direct query: https://quickstats.nass.usda.gov/results/13FC0C89-E211-3D0B-A9C5-BCFC35728512); Hinman H, Pelter G, Sorensen E and Fickle A (2002b) 2002 Cost of Producing dry beans, sweet corn and green peas under center pivot in the Columbia Basin of Washington State. School of Economic Sciences, Washington State University. http://ses.wsu.edu/wp-content/uploads/2018/03/EB1941E.pdf; WSU (2006) Sweet Corn. Washington State University. https://s3.wp.wsu.edu/uploads/sites/2071/2014/04/MicrosoftWord-SweetCornZeamaysvar.pdf; Hinman H, Pelter G, Sorensen E and Fickle A (2002a) 2002 Cost of Producing Dry Beands, Sweet Corn, And Green Peas Uner Center Pivot Irrigation In The Columbia Basin of Washington State. School of Economic Sciences, Washington State University. http://ses.wsu.edu/wp-content/uploads/2018/03/EB1941E.pdf; Hinman H, Pelter G, Sorensen E and Fickle A (2002a) 2002 Cost of Producing Dry Beands, Sweet Corn, And Green Peas Uner Center Pivot Irrigation In The Columbia Basin of Washington State. School of Economic Sciences, Washington State University. http://ses.wsu.edu/wp-content/uploads/2018/03/EB1941E.pdf, Oregon State University (2010) Enterprise Budget: Sweet Corn, Processed Market, Willamette Valley Region. Oregon State University. https://agsci.oregonstate.edu/sites/agscid7/files/oaeb/pdf/AEB0006.pdf, Clemson Extension (2020) Sweetcorn - For roadside or local market. Cooperative Extension Service, Clemson University. , Hanna, Mark (2016) Estimating the Field Capacity of Farm Machines. Cooperative Extension Service, Iowa State University of Science and Technology. https://www.extension.iastate.edu/agdm/crops/pdf/a3-24.pdf, Schuler and Frank (1998) A3510 Estimating Agricultural Field Machinery Costs. University of Wisconsin-Extension. https://learningstore.uwex.edu/Assets/pdfs/A3510.pdf, Lattz and Schnitkey (2021b) Machinery Cost Estimates: Field Operations. Department of Agricultural and Consumer Economics, University of Illinois at Urbana-Champaign. https://farmdoc.illinois.edu/assets/management/machinery-costs/field_operations.pdf
- fertilising, by injection: 4.28247e-5 ha; lognormal variance with pedigree 0.0206, pedigree (4,4,3,1,3)
  1.00 ha/ha (4.28E-5 ha/kg Sweet Corn) fertilising, by injection
  Average application rates for mineral fertilisers (NPKS) on Sweet Corn in Washington are: 1.80 N applications on 99.0% of cropped area, 1.00 P applications on 56.0% of cropped area, 1.00 K applications on 6.0% of cropped area, and 1.20 S applications on 89.0% of cropped area (NPKS data from 2018). The budget includes pre-plant fertiliser application, ammendment with planting, and additional N delivered during the season via fertigation (Hinman H, Pelter G, Sorensen E and Fickle A 2002a). Applications of N are split between anhydrous ammonia and other N, because they are applied differently, with different equipment Other than anhydrous ammonia, most NPK(S) fertilisers are applied together via broadcast application.
  Anhydrous ammonia application (knifing/injection) is calculated as market share of N that is anhydrous ammonia * total N applications (=0.43). Other N application is then total USDA N applications less applications of anhydrous ammonia (=1.37). The market share of N that is anhydrous ammonia is calculated from fertiliser market group shares crossed with meeting NPKS nutrient demand (here, 23.65%). Thus, the dataset includes 0.42 anhydrous ammonia applications via injection (0.43 * 99.0% of crop area with applied N) and 1.36 other N applications via broadcast (1.37 * 99.0%). Since the number of passes for N application after removing the anhydrous ammonia share is greater than the maximum number of passes reported for the other nutrients, this dataset assumes that any other fertiliser applications are reflected under that pass and the total fertiliser broadcast fertiliser passes are thus 1.36.
  Field operations are as identified in crop- and rotation-specific enterprise crop budgets supplied by the regional agricultural extension office and matched to equipment type in the budget or crop guidance unless otherwise noted. (Hinman H, Pelter G, Sorensen E and Fickle A 2002a, Hanna, Mark 2016, Schuler and Frank 1998, Lattz and Schnitkey 2021b). Operations are matched to equipment type and where multiple options are available, the share of each is determined from guidance and annual farmer survey data (Custom Rate Summaries) for contracted operations/equipment. Where an operation applies only to a portion of the harvested area, the number of passes has been scaled by the % of harvested area to which it applies (e.g., manure spreading or insecticide) as indicated by USDA statistics (applications) or USDA reports (manure use) or as otherwise indicated in enterprise crop budgets.
  Source(s):
  USDA NASS (2022d) Applications - fertilizers and pesticides - number, amount, - Sweet Corn- 2000-2021. US Department of Agriculture (USDA) National Agricultural Statistics Service. https://quickstats.nass.usda.gov (direct query: https://quickstats.nass.usda.gov/results/13FC0C89-E211-3D0B-A9C5-BCFC35728512); Hinman H, Pelter G, Sorensen E and Fickle A (2002b) 2002 Cost of Producing dry beans, sweet corn and green peas under center pivot in the Columbia Basin of Washington State. School of Economic Sciences, Washington State University. http://ses.wsu.edu/wp-content/uploads/2018/03/EB1941E.pdf; WSU (2006) Sweet Corn. Washington State University. https://s3.wp.wsu.edu/uploads/sites/2071/2014/04/MicrosoftWord-SweetCornZeamaysvar.pdf; Hinman H, Pelter G, Sorensen E and Fickle A (2002a) 2002 Cost of Producing Dry Beands, Sweet Corn, And Green Peas Uner Center Pivot Irrigation In The Columbia Basin of Washington State. School of Economic Sciences, Washington State University. http://ses.wsu.edu/wp-content/uploads/2018/03/EB1941E.pdf; Hinman H, Pelter G, Sorensen E and Fickle A (2002a) 2002 Cost of Producing Dry Beands, Sweet Corn, And Green Peas Uner Center Pivot Irrigation In The Columbia Basin of Washington State. School of Economic Sciences, Washington State University. http://ses.wsu.edu/wp-content/uploads/2018/03/EB1941E.pdf, Oregon State University (2010) Enterprise Budget: Sweet Corn, Processed Market, Willamette Valley Region. Oregon State University. https://agsci.oregonstate.edu/sites/agscid7/files/oaeb/pdf/AEB0006.pdf, Clemson Extension (2020) Sweetcorn - For roadside or local market. Cooperative Extension Service, Clemson University. , Hanna, Mark (2016) Estimating the Field Capacity of Farm Machines. Cooperative Extension Service, Iowa State University of Science and Technology. https://www.extension.iastate.edu/agdm/crops/pdf/a3-24.pdf, Schuler and Frank (1998) A3510 Estimating Agricultural Field Machinery Costs. University of Wisconsin-Extension. https://learningstore.uwex.edu/Assets/pdfs/A3510.pdf, Lattz and Schnitkey (2021b) Machinery Cost Estimates: Field Operations. Department of Agricultural and Consumer Economics, University of Illinois at Urbana-Champaign. https://farmdoc.illinois.edu/assets/management/machinery-costs/field_operations.pdf
- glyphosate: 0.000145003 kg; normal variance with pedigree 7.67516e-9, pedigree (2,3,3,3,1)
  applied pesticide(s) Glyphosate, Glyphosate, isopropylamine salt, Glyphosate isopropylamine salt (1.132E+0 kg/ha {1,2,2,1,1}; 1.127E+0 kg/ha {1,2,2,1,1}; 1.127E+0 kg/ha {1,2,2,1,1}, respectively).
  Data reported a quantity of total insecticides/herbicides/fungicides applied in sweet corn is sometimes available even when many of the substances in the category are reported with a “D”. If this total is available, the amount remaining after the sum of substance-specific values is accounted for is divided equally among the substances reported with a “D”. If the sum of available values exceeds or equals the total reported, any remaining “D” substances are treated as zero and omitted.
  From SWEETCORN - APPLICATIONS, MEASURED IN LB / ACRE / YEAR, AVG (fertilizer and pesticides, amount, number of applications) - 2000-2021, https://quickstats.nass.usda.gov/#5E5B411A-F9EF-3B83-AAFF-995DD89820FC
  properties: carbon content, fossil 0.214286, dry mass 1 kg, wet mass 1 kg
- harvesting, by sweet corn picker: 4.28247e-5 ha; lognormal variance with pedigree 0.0206, pedigree (4,4,3,1,3)
  4.28E-5 ha/kg harvesting, by sweet corn picker (1. effective pass(es) per year).
  This dataset assumes the use of a self propelled corn picker, in keeping with the available Pacific Northwest Guidance (Oregon State University 2010) and other recent budget guidance (Clemson Extension 2020, inter alia), as the harvester is unspecified in the last available budget (2002) for Washington state. The most recent enterprise budget available for Washington is from 2002, but operations included in it are consistent with more recent budgets and guidance from other states. The field operations are assumed valid through the dataset time period.Field operations are as identified in crop- and rotation-specific enterprise crop budgets supplied by the regional agricultural extension office and matched to equipment type in the budget or crop guidance unless otherwise noted. Operations are matched to equipment type and where multiple options are available, the share of each is determined from guidance and annual farmer survey data (Custom Rate Summaries) for contracted operations/equipment. Field cultivation and tillage operations are specific to the tillage regime used. Seed establishment and weed control for sweet corn generally require tillage (EPA 2022; IPM 2003, IPM 1997), so this dataset reflects sweet corn production using conventional tillage practices(0% reduced till, 100% conventional tillage, and 0% no till).
  Sources:
  Hinman H, Pelter G, Sorensen E and Fickle A 2002a, Hanna, Mark 2016, Schuler and Frank 1998, Lattz and Schnitkey 2021b; Hinman H, Pelter G, Sorensen E and Fickle A (2002a) 2002 Cost of Producing Dry Beands, Sweet Corn, And Green Peas Uner Center Pivot Irrigation In The Columbia Basin of Washington State. School of Economic Sciences, Washington State University. http://ses.wsu.edu/wp-content/uploads/2018/03/EB1941E.pdf, Oregon State University (2010) Enterprise Budget: Sweet Corn, Processed Market, Willamette Valley Region. Oregon State University. https://agsci.oregonstate.edu/sites/agscid7/files/oaeb/pdf/AEB0006.pdf, Clemson Extension (2020) Sweetcorn - For roadside or local market. Cooperative Extension Service, Clemson University. , Hanna, Mark (2016) Estimating the Field Capacity of Farm Machines. Cooperative Extension Service, Iowa State University of Science and Technology. https://www.extension.iastate.edu/agdm/crops/pdf/a3-24.pdf, Schuler and Frank (1998) A3510 Estimating Agricultural Field Machinery Costs. University of Wisconsin-Extension. https://learningstore.uwex.edu/Assets/pdfs/A3510.pdf, Lattz and Schnitkey (2021b) Machinery Cost Estimates: Field Operations. Department of Agricultural and Consumer Economics, University of Illinois at Urbana-Champaign. https://farmdoc.illinois.edu/assets/management/machinery-costs/field_operations.pdf; EPA (2022) Assessment of the Benefits of Atrazine and the Impacts of Potential Mitigation for Field Corn, Sweet Corn, Sorghum, and Sugarcane; PC Code (080803). (MEMORANDUM).US Environmental Protection Agency. https://downloads.regulations.gov/EPA-HQ-OPP-2013-0266-1624/content.pdf ; IPM center (2003) Crop Profile for Sweet Corn in the North Central United States. Southern Integrated Pest Management Center.Southern Integrated Pest Management Center. https://ipmdata.ipmcenters.org/documents/cropprofiles/us-ncr-sweetcorn.pdf ; IPM center (1997) Crop Profile for Corn (Sweet) in Maryland. Southern Integrated Pest Management Center. https://ipmdata.ipmcenters.org/documents/cropprofiles/MDcorn-sweet.pdf
- irrigation: 0.26012 m3; lognormal variance with pedigree 0.0038, pedigree (1,3,3,1,2)
  6,074.1 m3/ha (2.6E-1 m3/kg Sweet Corn) irrigation. Water applied for irrigation (7,010 m3/irrigated ha, 2018, 2020, USDA NASS 2018), weighted by the share of acres irrigated (86.6%, average over 2010-2018 from USDA NASS (2021); percent of harvested irrigated acres not reported 2019-2021).
  Sources:
  USDA NASS (2018d) 2018 Irrigation and Water Management Survey (2017 Census of Agriculture).US Department of Agriculture (USDA). https://www.nass.usda.gov/Publications/AgCensus/2017/Online_Resources/Farm_and_Ranch_Irrigation_Survey/index.php
  properties: dry mass 0.11 kg, water content 9089.91, wet mass 1000 kg
- land use change, annual crop: 6.48259e-6 ha; lognormal variance with pedigree 0.082025, pedigree (1,1,3,2,1)
  Land use change is allocated to all crops and activities that grew in the last 20 years for the US, and only to them, according to their respective area increase. Crop production and natural land areas in all countries use data from 1989 to 2012 (FAOSTAT 2012), as well as for country climates and soil types (EU-JRC 2010c). Crops for which planted area decreased are not attributed LUC impacts or credits. Total cropland land use, for all crops, in Washington decreased by 4% between 1997 and 2017 (NRCS 2020a); USDA NASS does not report cropped area for Sweet Corn prior to 2016.
  Land use change (LUC) combines land transformation areas calculated with the adapted 'Direct Land Use Change Assessment Tool' version 2014 developed by Blonk Consultants and the carbon losses from soil organic carbon (SOC) and vegetation (VEG) as calculated in ecoinvent v3. See 'WFLDB-Guidelines.pdf', available at https://ecoquery.ecoinvent.org/File/Reports. Calculated value from ecoinvent Crop LCI tool, 0.15137 divided by the yield in kg/ha.
- limestone and gypsum application, by spreader: 2.63316e-6 ha; lognormal variance with pedigree 0.1381, pedigree (4,2,3,1,3)
  0.061 ha/ha (2.63E-6 ha/kg Sweet Corn), calculated as the fraction of crop area treated with lime (30.7%, from soil grid level soil pH values and county level productivity, ISPAID8.1.1; USDA NASS) / (5 years between applications, based on Mallarino A P, Pagani A, Sawyer J E 2011).
  Lime is applied to all soils with pH below 6, and to high subsoil pH soils with pH between 6.5 and 6, based on expert guidance (J.E. Sawyer 2020). Cropped area needing liming is determined from grid level (sub-county level) data for soil pH and formation type (ISPAID8.1.1), weighted with county-level production data (NASS). The increase in pH with lime application remains dominant through at least 4 years from application (Mallarino A P, Pagani A, Sawyer J E 2011).
  Sources:
  Bruulsema T and Jones J D (2021) Soil Test Summary 2020. Foundation for Agronomic Research and Plant Nutrition Canada present this 2020 summary of soil test levels in North America. Foundation for Agronomic Research, Plant Nutrition Canada. https://soiltest.tfi.org/about/about_soil_test_summaryaccessed August 30, 2021; Sawyer, J.E (2020) Presentation "Soil pH and Liming". Cooperative Extension Service, Iowa State University of Science and Technology. http://www.agronext.iastate.edu/soilfertility/info/SoilpHandLiming2020.pdfaccessed October 1, 2021; Mallarino A P, Pagani A, Sawyer J E (2011) Corn and soybean response to soil pH level and liming. Paper presented at the 2011 Integrated Crop Management Conference. Iowa State University.Cooperative Extension Service, Iowa State University of Science and Technology. https://core.ac.uk/download/pdf/128983337.pdfaccessed November 17, 2021
- limestone, crushed, washed: 0.0130133 kg; lognormal variance with pedigree 0.1381, pedigree (4,2,3,1,3)
  Application of limestone to raise soil pH, 303.87 kg/ha (1.3E-2 kg/kg Sweet Corn), calculated as the (mass of lime applied to treated acres (2 t/treated ha)) * fraction of crop area treated with lime (30.7%, from soil pH data from Bruulsema T and Jones J D 2021) / (5 years between applications, based on Mallarino A P, Pagani A, Sawyer J E 2011).
  Lime is applied to all soils with pH below 6, and to high subsoil pH soils with pH between 6.5 and 6, based on expert guidance (J.E. Sawyer 2020). Cropped area needing liming is determined from grid level (sub-county level) data for soil pH and formation type (ISPAID8.1.1), weighted with county-level production data (NASS). The increase in pH with lime application remains dominant through at least 4 years from application (Mallarino A P, Pagani A, Sawyer J E 2011).
  Sources:
  Bruulsema T and Jones J D (2021) Soil Test Summary 2020. Foundation for Agronomic Research and Plant Nutrition Canada present this 2020 summary of soil test levels in North America. Foundation for Agronomic Research, Plant Nutrition Canada. https://soiltest.tfi.org/about/about_soil_test_summaryaccessed August 30, 2021; Sawyer, J.E (2020) Presentation "Soil pH and Liming". Cooperative Extension Service, Iowa State University of Science and Technology. http://www.agronext.iastate.edu/soilfertility/info/SoilpHandLiming2020.pdfaccessed October 1, 2021; Mallarino A P, Pagani A, Sawyer J E (2011) Corn and soybean response to soil pH level and liming. Paper presented at the 2011 Integrated Crop Management Conference. Iowa State University.Cooperative Extension Service, Iowa State University of Science and Technology. https://core.ac.uk/download/pdf/128983337.pdfaccessed November 17, 2021
  properties: carbon content, fossil 0.117257, dry mass 0.998 kg, water content 0.00200401, wet mass 1 kg
  note on carbon content, fossil: Table 3.1, ecoinvent v2.2 report 7, part VII, pg 3. MW CaCO3=100, MW MgCO3=84. C content of limestone is 0.117257 kg/kg DM
- maize seed, for sowing: 0.000525584 kg; normal variance with pedigree 2.95746e-8, pedigree (3,3,2,1,2)
  Each planted hectare uses 12.27 kg seed (5.26E-4 kg/kg Sweet Corn). This value is calculated from a seeding rate of 76,634 seeds/ha (Licht M, Parvej M R, Baum M 2019, 2020 Licht M) and an average seed count of 6,244 seeds/kg (averaged from commercial listings of F1 (SH2 and se-se) seeds, https://www.ufseeds.com/vegetables/corn/supersweet-sh2-corn, https://lacrosseseed.com/product-information/forage-tech-sheets/tech-sheets-alfalfa-5). While genetically engineered sweet (fresh) corn seed is available, the share of sweet (fresh) corn grown from genetically engineered seed is not compiled; it is estimated that between 75 and 90% of North American sweet corn is conventional (USDA 2018b). Seeding rates are based on state average guidance, not specifically for GE or conventional seed. Germination and stand losses are accounted for in the seeding rate.The uncertainty parameters are calculated from the uncertainty on the range of seed sizes (seed counts per kg), the yield variation, and the variability in seed-to-stand ratios. Sources:
  Licht M, Parvej M R, Baum M (2019) Guide to Iowa Corn Planting. Cooperative Extension Service, Iowa State University of Science and Technology. https://store.extension.iastate.edu/product/5475, Licht M (2020) "Updated views on corn and soybean planting recommendations" 4/1/20 10:43. Cooperative Extension Service, Iowa State University of Science and Technology. https://crops.extension.iastate.edu/blog/mark-licht/updated-views-corn-and-soybean-planting-recommendations, USDA NASS. (2020). Crops/Stocks Survey (or Agricultural Survey) for the years 2000-20 - Recent Trends in GE Adoption. US Department of Agriculture (USDA). https://www.ers.usda.gov/data-products/adoption-of-genetically-engineered-crops-in-the-us/documentation/ , Mekonnen et al (2018) Water, Energy, and Carbon Footprints of Bioethanol from the U.S. and Brazil. Environ. Sci. Technol. 52:14508–14518. Mesfin M. Mekonnen, Thiago L. Romanelli, Chittaranjan Ray, Arjen Y. Hoekstra, Adam J. Liska, and Christopher M.U. Neale. https://pubs.acs.org/doi/10.1021/acs.est.8b03359
  properties: carbon content, non-fossil 0.45263, dry mass 0.88 kg, water content 0.136364, wet mass 1 kg
  note on carbon content, non-fossil: biogene carbon content on a dry matter basis; Composition data obtained from Corn Grain Whole, in (http://beefmagazine.com/images/2009%20feed%20table.pdf). First, composition data were refered to 1 kg dry mass. Then, C-contents were calculated considering a C-content/dry mass of 44% in carbohydrates (including fibres), 53% in proteins and 75% in fats. All data from ecoinvent report, n 15a, pg 40, except C-content in protein, that comes from Determination of protein concentration by total organic carbon analysis, Rouwenhorst et al., 1991, J Biochem and Biophys Methods, 22:119-128.
- metolachlor: 7.09234e-5 kg; normal variance with pedigree 2.74547e-9, pedigree (2,3,3,3,1)
  applied pesticide(s) Metolachlor (1.656E+0 kg/ha {1,2,2,1,1}).
  Data reported a quantity of total insecticides/herbicides/fungicides applied in sweet corn is sometimes available even when many of the substances in the category are reported with a “D”. If this total is available, the amount remaining after the sum of substance-specific values is accounted for is divided equally among the substances reported with a “D”. If the sum of available values exceeds or equals the total reported, any remaining “D” substances are treated as zero and omitted.
  From SWEETCORN - APPLICATIONS, MEASURED IN LB / ACRE / YEAR, AVG (fertilizer and pesticides, amount, number of applications) - 2000-2021, https://quickstats.nass.usda.gov/#5E5B411A-F9EF-3B83-AAFF-995DD89820FC
  properties: carbon content, fossil 0.633803, dry mass 1 kg, wet mass 1 kg
- monoammonium phosphate: 0.00405339 kg; lognormal variance with pedigree 0.0046, pedigree (1,4,3,1,1)
  4.05E-3 kg monoammonium phosphate/kg Sweet Corn.
  Ecoinvent U.S. consumption mix for N fertilisers, from IFA data N-P-K-S: 167.80--11.8--.1--23.86 kg/ha (USDA NASS data for 2018)over reported cropped area of specified crop (conventional tillage): quantity of N applied to treated acres times percent of planted sweetcorn acres (USDA NASS) times share of N supplied by compound in U.S. consumption mix (ecoinvent and IFA 2019) times mass compound per mass N in compound.
  Sources:
  USDA NASS (2022c) SWEETCORN - APPLICATIONS, MEASURED IN LB / ACRE / YEAR, AVG (fertilizer and pesticides, amount, number of applications) - 2000-2021. US Department of Agriculture (USDA) National Agricultural Statistics Service. https://quickstats.nass.usda.gov/#5E5B411A-F9EF-3B83-AAFF-995DD89820FC; Ecoinvent U.S. consumption mix for N fertilisers, from IFA data; IFA (2021) Nutrient content in percentage - IFA Fertilizer Converter. International Fertilizer Association. https://www.ifastat.org/converter/fertilizer-converter/accessed 2021-06-24
  properties: dry mass 1 kg, nitrogen content 0.084, phosphorus content 0.226939, wet mass 1 kg
  note on nitrogen content: Nitrogen content (on a dry matter basis) of monoammonium phosphate is calculated from the molecular formula of the nutrient present in the substance.
  note on phosphorus content: Phosphorus content (on a dry matter basis) of monoammonium phosphate is calculated from the molecular formula of the nutrient present in the substance.
- organophosphorus-compound, unspecified: 2.4e-7 kg; normal variance with pedigree 2.93878e-20, pedigree (2,3,3,3,1)
  Proxy for applied pesticide(s) Chlorpyrifos (5.604E-3 kg/ha {1,2,2,1,1}).
  Data reported a quantity of total insecticides/herbicides/fungicides applied in sweet corn is sometimes available even when many of the substances in the category are reported with a “D”. If this total is available, the amount remaining after the sum of substance-specific values is accounted for is divided equally among the substances reported with a “D”. If the sum of available values exceeds or equals the total reported, any remaining “D” substances are treated as zero and omitted.
  From SWEETCORN - APPLICATIONS, MEASURED IN LB / ACRE / YEAR, AVG (fertilizer and pesticides, amount, number of applications) - 2000-2021, https://quickstats.nass.usda.gov/#5E5B411A-F9EF-3B83-AAFF-995DD89820FC
  properties: carbon content, fossil 0.260898, dry mass 1 kg, wet mass 1 kg
- packaging, for fertilisers: 0.051006 kg; name packaging_f; lognormal variance with pedigree 0.1708, pedigree (4,3,2,5,4)
  The total amount of mineral and/or synthetic fertilisers needed for the production of Sweet Corn is calculated to be circa 175.786kg/ha. The total amount of applied mineral fertiliser is doubled to account for the packaging of the diluted product. Lime is not delivered packaged. Thus, 0.051 kg/ha of packaging for fertilisers is calculated with this exchange.
  properties: carbon content, fossil 0.825301, dry mass 1 kg, price 0.0642 EUR2005, wet mass 1 kg
  note on carbon content, fossil: Considering a chemical formula (C2H4)n for polyethylene, carbon content-fossil is calculated to be 0.856286 kg of Carbon per kg of dry mass.
- packaging, for pesticides: 0.00073012 kg; name packaging_p; lognormal variance with pedigree 0.0514, pedigree (4,3,2,5,4)
  Total amount of active substance/s of pesticides used for the production of sweet corn is calculated to be about 8.52 kg/ha (2018, 2020-USDA NASS data). The total amount of active substance/s is doubled in order to account for the packaging of the dilluted product of pesticides that are applied. Therefore, 17.05kg of packaging for pesticides per ha of Sweet Corn( 7.3E-4kg/kg) is calculated with this exchange.
  properties: carbon content, fossil 0.85714, dry mass 1 kg, price 0.0642 EUR2005, wet mass 1 kg
- planting, by row crop planter: 4.28247e-5 ha; lognormal variance with pedigree 0.0206, pedigree (4,4,3,1,3)
  4.28E-5 ha/kg planting (1. effective pass(es) per year).
  Field operations are as identified in crop- and rotation-specific enterprise crop budgets supplied by the regional agricultural extension office and matched to equipment type in the budget or crop guidance unless otherwise noted. Operations are matched to equipment type and where multiple options are available, the share of each is determined from guidance and annual farmer survey data (Custom Rate Summaries) for contracted operations/equipment. Field cultivation and tillage operations are specific to the tillage regime used. Seed establishment and weed control for sweet corn generally require tillage (EPA 2022; IPM 2003, IPM 1997), so this dataset reflects sweet corn production using conventional tillage practices(0% reduced till, 100% conventional tillage, and 0% no till). Used for planting on conventionally tilled fields.
  Sources:
  Hinman H, Pelter G, Sorensen E and Fickle A 2002a, Hanna, Mark 2016, Schuler and Frank 1998, Lattz and Schnitkey 2021b; Hinman H, Pelter G, Sorensen E and Fickle A (2002a) 2002 Cost of Producing Dry Beands, Sweet Corn, And Green Peas Uner Center Pivot Irrigation In The Columbia Basin of Washington State. School of Economic Sciences, Washington State University. http://ses.wsu.edu/wp-content/uploads/2018/03/EB1941E.pdf, Oregon State University (2010) Enterprise Budget: Sweet Corn, Processed Market, Willamette Valley Region. Oregon State University. https://agsci.oregonstate.edu/sites/agscid7/files/oaeb/pdf/AEB0006.pdf, Clemson Extension (2020) Sweetcorn - For roadside or local market. Cooperative Extension Service, Clemson University. , Hanna, Mark (2016) Estimating the Field Capacity of Farm Machines. Cooperative Extension Service, Iowa State University of Science and Technology. https://www.extension.iastate.edu/agdm/crops/pdf/a3-24.pdf, Schuler and Frank (1998) A3510 Estimating Agricultural Field Machinery Costs. University of Wisconsin-Extension. https://learningstore.uwex.edu/Assets/pdfs/A3510.pdf, Lattz and Schnitkey (2021b) Machinery Cost Estimates: Field Operations. Department of Agricultural and Consumer Economics, University of Illinois at Urbana-Champaign. https://farmdoc.illinois.edu/assets/management/machinery-costs/field_operations.pdf; EPA (2022) Assessment of the Benefits of Atrazine and the Impacts of Potential Mitigation for Field Corn, Sweet Corn, Sorghum, and Sugarcane; PC Code (080803). (MEMORANDUM).US Environmental Protection Agency. https://downloads.regulations.gov/EPA-HQ-OPP-2013-0266-1624/content.pdf ; IPM center (2003) Crop Profile for Sweet Corn in the North Central United States. Southern Integrated Pest Management Center.Southern Integrated Pest Management Center. https://ipmdata.ipmcenters.org/documents/cropprofiles/us-ncr-sweetcorn.pdf ; IPM center (1997) Crop Profile for Corn (Sweet) in Maryland. Southern Integrated Pest Management Center. https://ipmdata.ipmcenters.org/documents/cropprofiles/MDcorn-sweet.pdf
- potassium nitrate: 0.00101709 kg; lognormal variance with pedigree 0.0046, pedigree (1,4,3,1,1)
  1.02E-3 kg potassium nitrate/kg Sweet Corn.
  Ecoinvent U.S. consumption mix for N fertilisers, from IFA data N-P-K-S: 167.80--11.8--.1--23.86 kg/ha (USDA NASS data for 2018)Required nutrient met or exceeded by supply of required nitrogen using U.S. consumption mix. Quantity of specific fertiliser calculated from: average total N application (2018) reported cropped area of specified crop (conventional tillage) and share of compound in U.S. consumption mix (ecoinvent and IFA 2019) times each fertiliser's K2O to N ratio to deliver more than the necessary nutrient. The remaining K2O and S demands are met from a mix of ammonium sulfate, potassium nitrate, potassium chloride, and potassium sulfate, the quantities of which are determined by satisfying the demand without adding any additional excess of any nutrient beyond that resulting from assuming the U.S. average mix of N fertilizers; any S demand remaining is met using elemental sulfur.
  Sources:
  USDA NASS (2022c) SWEETCORN - APPLICATIONS, MEASURED IN LB / ACRE / YEAR, AVG (fertilizer and pesticides, amount, number of applications) - 2000-2021. US Department of Agriculture (USDA) National Agricultural Statistics Service. https://quickstats.nass.usda.gov/#5E5B411A-F9EF-3B83-AAFF-995DD89820FC; Ecoinvent U.S. consumption mix for N fertilisers, from IFA data; IFA (2021) Nutrient content in percentage - IFA Fertilizer Converter. International Fertilizer Association. https://www.ifastat.org/converter/fertilizer-converter/accessed 2021-06-24
  properties: dry mass 1 kg, wet mass 1 kg
- pyrethroid-compound: 9.6e-7 kg; normal variance with pedigree 7.52327e-18, pedigree (2,3,3,3,1)
  This exchange is an aggregate of proxies for applied pesticide(s) Bifenthrin, Lambda-Cyhalothrin, Esfenvalerate, Zeta-Cypermethrin (5.604E-3 kg/ha {1,2,2,1,1}; 5.604E-3 kg/ha {1,2,2,1,1}; 5.604E-3 kg/ha {1,2,2,1,1}; 5.604E-3 kg/ha {1,2,2,1,1}, respectively).
  Data reported a quantity of total insecticides/herbicides/fungicides applied in sweet corn is sometimes available even when many of the substances in the category are reported with a “D”. If this total is available, the amount remaining after the sum of substance-specific values is accounted for is divided equally among the substances reported with a “D”. If the sum of available values exceeds or equals the total reported, any remaining “D” substances are treated as zero and omitted.
  From SWEETCORN - APPLICATIONS, MEASURED IN LB / ACRE / YEAR, AVG (fertilizer and pesticides, amount, number of applications) - 2000-2021, https://quickstats.nass.usda.gov/#5E5B411A-F9EF-3B83-AAFF-995DD89820FC
  properties: carbon content, fossil 0.623, dry mass 1 kg, wet mass 1 kg
- stalk shredding: 4.28247e-5 ha; lognormal variance with pedigree 0.0206, pedigree (4,4,3,1,3)
  4.28E-5 ha/kg stalk shredding (1. effective pass(es) per year).
  The most recent enterprise budget available for Washington is from 2002, but operations included in it are consistent with more recent budgets and guidance from other states. The field operations are assumed valid through the dataset time period.
  Field operations are as identified in crop- and rotation-specific enterprise crop budgets supplied by the regional agricultural extension office and matched to equipment type in the budget or crop guidance unless otherwise noted. Operations are matched to equipment type and where multiple options are available, the share of each is determined from guidance and annual farmer survey data (Custom Rate Summaries) for contracted operations/equipment. Field cultivation and tillage operations are specific to the tillage regime used. Seed establishment and weed control for sweet corn generally require tillage (EPA 2022; IPM 2003, IPM 1997), so this dataset reflects sweet corn production using conventional tillage practices(0% reduced till, 100% conventional tillage, and 0% no till).
  Sources:
  Hinman H, Pelter G, Sorensen E and Fickle A 2002a, Hanna, Mark 2016, Schuler and Frank 1998, Lattz and Schnitkey 2021b; Hinman H, Pelter G, Sorensen E and Fickle A (2002a) 2002 Cost of Producing Dry Beands, Sweet Corn, And Green Peas Uner Center Pivot Irrigation In The Columbia Basin of Washington State. School of Economic Sciences, Washington State University. http://ses.wsu.edu/wp-content/uploads/2018/03/EB1941E.pdf, Oregon State University (2010) Enterprise Budget: Sweet Corn, Processed Market, Willamette Valley Region. Oregon State University. https://agsci.oregonstate.edu/sites/agscid7/files/oaeb/pdf/AEB0006.pdf, Clemson Extension (2020) Sweetcorn - For roadside or local market. Cooperative Extension Service, Clemson University. , Hanna, Mark (2016) Estimating the Field Capacity of Farm Machines. Cooperative Extension Service, Iowa State University of Science and Technology. https://www.extension.iastate.edu/agdm/crops/pdf/a3-24.pdf, Schuler and Frank (1998) A3510 Estimating Agricultural Field Machinery Costs. University of Wisconsin-Extension. https://learningstore.uwex.edu/Assets/pdfs/A3510.pdf, Lattz and Schnitkey (2021b) Machinery Cost Estimates: Field Operations. Department of Agricultural and Consumer Economics, University of Illinois at Urbana-Champaign. https://farmdoc.illinois.edu/assets/management/machinery-costs/field_operations.pdf; EPA (2022) Assessment of the Benefits of Atrazine and the Impacts of Potential Mitigation for Field Corn, Sweet Corn, Sorghum, and Sugarcane; PC Code (080803). (MEMORANDUM).US Environmental Protection Agency. https://downloads.regulations.gov/EPA-HQ-OPP-2013-0266-1624/content.pdf ; IPM center (2003) Crop Profile for Sweet Corn in the North Central United States. Southern Integrated Pest Management Center.Southern Integrated Pest Management Center. https://ipmdata.ipmcenters.org/documents/cropprofiles/us-ncr-sweetcorn.pdf ; IPM center (1997) Crop Profile for Corn (Sweet) in Maryland. Southern Integrated Pest Management Center. https://ipmdata.ipmcenters.org/documents/cropprofiles/MDcorn-sweet.pdf
- sulfur: 0.000685219 kg; lognormal variance with pedigree 0.0046, pedigree (1,4,3,1,1)
  6.85E-4 kg sulfur/kg Sweet Corn
  Quantities of specific fertiliser are calculated based on US fertiliser market share and nutrient compositions from IFA data to meet total nutrient demand N-P-K-S: 167.8--11.82--0.13--23.86 kg/ha (USDA NASS data for 2018). Calculated from: average total N application (2018) reported cropped area of specified crop (includes all rotation patterns) and share of fertilisers in U.S. consumption mix (ecoinvent and IFA 2019) times each fertiliser's K2O to N ratio (IFA), subtracted from the application rate for the necessary nutrient, and multiplied by the mass of the compound over the mass of K2O in the compound. The remaining K2O and S demands are met from a mix of ammonium sulfate, potassium nitrate, potassium chloride, and potassium sulfate, the quantities of which are determined by satisfying the demand without adding any additional excess of any nutrient beyond that resulting from assuming the U.S. average mix of N fertilizers; any S demand remaining is met using elemental sulfur.
  Sources:
  USDA NASS (2022c) SWEETCORN - APPLICATIONS, MEASURED IN LB / ACRE / YEAR, AVG (fertilizer and pesticides, amount, number of applications) - 2000-2021. US Department of Agriculture (USDA) National Agricultural Statistics Service. https://quickstats.nass.usda.gov/#5E5B411A-F9EF-3B83-AAFF-995DD89820FC; Ecoinvent U.S. consumption mix for N fertilisers, from IFA data; IFA (2021) Nutrient content in percentage - IFA Fertilizer Converter. International Fertilizer Association. https://www.ifastat.org/converter/fertilizer-converter/accessed 2021-06-24
  properties: dry mass 1 kg, wet mass 1 kg
- tillage, cultivating, by strip tiller: 4.28247e-5 ha; lognormal variance with pedigree 0.0206, pedigree (4,4,3,1,3)
  4.28E-5 ha/kg tillage, cultivating, by strip tiller (1. effective pass(es) per year).
  Field operations are as identified in crop- and rotation-specific enterprise crop budgets supplied by the regional agricultural extension office and matched to equipment type in the budget or crop guidance unless otherwise noted. Operations are matched to equipment type and where multiple options are available, the share of each is determined from guidance and annual farmer survey data (Custom Rate Summaries) for contracted operations/equipment. Field cultivation and tillage operations are specific to the tillage regime used. Seed establishment and weed control for sweet corn generally require tillage (EPA 2022; IPM 2003, IPM 1997), so this dataset reflects sweet corn production using conventional tillage practices(0% reduced till, 100% conventional tillage, and 0% no till).
  Sources:
  Hinman H, Pelter G, Sorensen E and Fickle A 2002a, Hanna, Mark 2016, Schuler and Frank 1998, Lattz and Schnitkey 2021b; Hinman H, Pelter G, Sorensen E and Fickle A (2002a) 2002 Cost of Producing Dry Beands, Sweet Corn, And Green Peas Uner Center Pivot Irrigation In The Columbia Basin of Washington State. School of Economic Sciences, Washington State University. http://ses.wsu.edu/wp-content/uploads/2018/03/EB1941E.pdf, Oregon State University (2010) Enterprise Budget: Sweet Corn, Processed Market, Willamette Valley Region. Oregon State University. https://agsci.oregonstate.edu/sites/agscid7/files/oaeb/pdf/AEB0006.pdf, Clemson Extension (2020) Sweetcorn - For roadside or local market. Cooperative Extension Service, Clemson University. , Hanna, Mark (2016) Estimating the Field Capacity of Farm Machines. Cooperative Extension Service, Iowa State University of Science and Technology. https://www.extension.iastate.edu/agdm/crops/pdf/a3-24.pdf, Schuler and Frank (1998) A3510 Estimating Agricultural Field Machinery Costs. University of Wisconsin-Extension. https://learningstore.uwex.edu/Assets/pdfs/A3510.pdf, Lattz and Schnitkey (2021b) Machinery Cost Estimates: Field Operations. Department of Agricultural and Consumer Economics, University of Illinois at Urbana-Champaign. https://farmdoc.illinois.edu/assets/management/machinery-costs/field_operations.pdf; EPA (2022) Assessment of the Benefits of Atrazine and the Impacts of Potential Mitigation for Field Corn, Sweet Corn, Sorghum, and Sugarcane; PC Code (080803). (MEMORANDUM).US Environmental Protection Agency. https://downloads.regulations.gov/EPA-HQ-OPP-2013-0266-1624/content.pdf ; IPM center (2003) Crop Profile for Sweet Corn in the North Central United States. Southern Integrated Pest Management Center.Southern Integrated Pest Management Center. https://ipmdata.ipmcenters.org/documents/cropprofiles/us-ncr-sweetcorn.pdf ; IPM center (1997) Crop Profile for Corn (Sweet) in Maryland. Southern Integrated Pest Management Center. https://ipmdata.ipmcenters.org/documents/cropprofiles/MDcorn-sweet.pdf
- tillage, cultivating, chiselling: 4.28247e-5 ha; lognormal variance with pedigree 0.0206, pedigree (4,4,3,1,3)
  4.28E-5 ha/kg tillage, cultivating, chiselling (1. effective pass(es) per year).
  Field operations are as identified in crop- and rotation-specific enterprise crop budgets supplied by the regional agricultural extension office and matched to equipment type in the budget or crop guidance unless otherwise noted. Operations are matched to equipment type and where multiple options are available, the share of each is determined from guidance and annual farmer survey data (Custom Rate Summaries) for contracted operations/equipment. Field cultivation and tillage operations are specific to the tillage regime used. Seed establishment and weed control for sweet corn generally require tillage (EPA 2022; IPM 2003, IPM 1997), so this dataset reflects sweet corn production using conventional tillage practices(0% reduced till, 100% conventional tillage, and 0% no till).
  Sources:
  Hinman H, Pelter G, Sorensen E and Fickle A 2002a, Hanna, Mark 2016, Schuler and Frank 1998, Lattz and Schnitkey 2021b; Hinman H, Pelter G, Sorensen E and Fickle A (2002a) 2002 Cost of Producing Dry Beands, Sweet Corn, And Green Peas Uner Center Pivot Irrigation In The Columbia Basin of Washington State. School of Economic Sciences, Washington State University. http://ses.wsu.edu/wp-content/uploads/2018/03/EB1941E.pdf, Oregon State University (2010) Enterprise Budget: Sweet Corn, Processed Market, Willamette Valley Region. Oregon State University. https://agsci.oregonstate.edu/sites/agscid7/files/oaeb/pdf/AEB0006.pdf, Clemson Extension (2020) Sweetcorn - For roadside or local market. Cooperative Extension Service, Clemson University. , Hanna, Mark (2016) Estimating the Field Capacity of Farm Machines. Cooperative Extension Service, Iowa State University of Science and Technology. https://www.extension.iastate.edu/agdm/crops/pdf/a3-24.pdf, Schuler and Frank (1998) A3510 Estimating Agricultural Field Machinery Costs. University of Wisconsin-Extension. https://learningstore.uwex.edu/Assets/pdfs/A3510.pdf, Lattz and Schnitkey (2021b) Machinery Cost Estimates: Field Operations. Department of Agricultural and Consumer Economics, University of Illinois at Urbana-Champaign. https://farmdoc.illinois.edu/assets/management/machinery-costs/field_operations.pdf; EPA (2022) Assessment of the Benefits of Atrazine and the Impacts of Potential Mitigation for Field Corn, Sweet Corn, Sorghum, and Sugarcane; PC Code (080803). (MEMORANDUM).US Environmental Protection Agency. https://downloads.regulations.gov/EPA-HQ-OPP-2013-0266-1624/content.pdf ; IPM center (2003) Crop Profile for Sweet Corn in the North Central United States. Southern Integrated Pest Management Center.Southern Integrated Pest Management Center. https://ipmdata.ipmcenters.org/documents/cropprofiles/us-ncr-sweetcorn.pdf ; IPM center (1997) Crop Profile for Corn (Sweet) in Maryland. Southern Integrated Pest Management Center. https://ipmdata.ipmcenters.org/documents/cropprofiles/MDcorn-sweet.pdf
- tillage, disking: 8.56493e-5 ha; lognormal variance with pedigree 0.0206, pedigree (4,4,3,1,3)
  8.56E-5 ha/kg tillage, disking (2. effective pass(es) per year).
  Field operations are as identified in crop- and rotation-specific enterprise crop budgets supplied by the regional agricultural extension office and matched to equipment type in the budget or crop guidance unless otherwise noted. Operations are matched to equipment type and where multiple options are available, the share of each is determined from guidance and annual farmer survey data (Custom Rate Summaries) for contracted operations/equipment. Field cultivation and tillage operations are specific to the tillage regime used. Seed establishment and weed control for sweet corn generally require tillage (EPA 2022; IPM 2003, IPM 1997), so this dataset reflects sweet corn production using conventional tillage practices(0% reduced till, 100% conventional tillage, and 0% no till).
  Sources:
  Hinman H, Pelter G, Sorensen E and Fickle A 2002a, Hanna, Mark 2016, Schuler and Frank 1998, Lattz and Schnitkey 2021b; Hinman H, Pelter G, Sorensen E and Fickle A (2002a) 2002 Cost of Producing Dry Beands, Sweet Corn, And Green Peas Uner Center Pivot Irrigation In The Columbia Basin of Washington State. School of Economic Sciences, Washington State University. http://ses.wsu.edu/wp-content/uploads/2018/03/EB1941E.pdf, Oregon State University (2010) Enterprise Budget: Sweet Corn, Processed Market, Willamette Valley Region. Oregon State University. https://agsci.oregonstate.edu/sites/agscid7/files/oaeb/pdf/AEB0006.pdf, Clemson Extension (2020) Sweetcorn - For roadside or local market. Cooperative Extension Service, Clemson University. , Hanna, Mark (2016) Estimating the Field Capacity of Farm Machines. Cooperative Extension Service, Iowa State University of Science and Technology. https://www.extension.iastate.edu/agdm/crops/pdf/a3-24.pdf, Schuler and Frank (1998) A3510 Estimating Agricultural Field Machinery Costs. University of Wisconsin-Extension. https://learningstore.uwex.edu/Assets/pdfs/A3510.pdf, Lattz and Schnitkey (2021b) Machinery Cost Estimates: Field Operations. Department of Agricultural and Consumer Economics, University of Illinois at Urbana-Champaign. https://farmdoc.illinois.edu/assets/management/machinery-costs/field_operations.pdf; EPA (2022) Assessment of the Benefits of Atrazine and the Impacts of Potential Mitigation for Field Corn, Sweet Corn, Sorghum, and Sugarcane; PC Code (080803). (MEMORANDUM).US Environmental Protection Agency. https://downloads.regulations.gov/EPA-HQ-OPP-2013-0266-1624/content.pdf ; IPM center (2003) Crop Profile for Sweet Corn in the North Central United States. Southern Integrated Pest Management Center.Southern Integrated Pest Management Center. https://ipmdata.ipmcenters.org/documents/cropprofiles/us-ncr-sweetcorn.pdf ; IPM center (1997) Crop Profile for Corn (Sweet) in Maryland. Southern Integrated Pest Management Center. https://ipmdata.ipmcenters.org/documents/cropprofiles/MDcorn-sweet.pdf
- tillage, field cultivator: 8.56493e-5 ha; lognormal variance with pedigree 0.0206, pedigree (4,4,3,1,3)
  8.56E-5 ha/kg tillage, field cultivator (2. effective pass(es) per year).
  The most recent enterprise budget available for Washington is from 2002, but operations included in it are consistent with more recent budgets and guidance from other states. The field operations are assumed valid through the dataset time period.
  Field operations are as identified in crop- and rotation-specific enterprise crop budgets supplied by the regional agricultural extension office and matched to equipment type in the budget or crop guidance unless otherwise noted. Operations are matched to equipment type and where multiple options are available, the share of each is determined from guidance and annual farmer survey data (Custom Rate Summaries) for contracted operations/equipment. Field cultivation and tillage operations are specific to the tillage regime used. Seed establishment and weed control for sweet corn generally require tillage (EPA 2022; IPM 2003, IPM 1997), so this dataset reflects sweet corn production using conventional tillage practices(0% reduced till, 100% conventional tillage, and 0% no till).
  Sources:
  Hinman H, Pelter G, Sorensen E and Fickle A 2002a, Hanna, Mark 2016, Schuler and Frank 1998, Lattz and Schnitkey 2021b; Hinman H, Pelter G, Sorensen E and Fickle A (2002a) 2002 Cost of Producing Dry Beands, Sweet Corn, And Green Peas Uner Center Pivot Irrigation In The Columbia Basin of Washington State. School of Economic Sciences, Washington State University. http://ses.wsu.edu/wp-content/uploads/2018/03/EB1941E.pdf, Oregon State University (2010) Enterprise Budget: Sweet Corn, Processed Market, Willamette Valley Region. Oregon State University. https://agsci.oregonstate.edu/sites/agscid7/files/oaeb/pdf/AEB0006.pdf, Clemson Extension (2020) Sweetcorn - For roadside or local market. Cooperative Extension Service, Clemson University. , Hanna, Mark (2016) Estimating the Field Capacity of Farm Machines. Cooperative Extension Service, Iowa State University of Science and Technology. https://www.extension.iastate.edu/agdm/crops/pdf/a3-24.pdf, Schuler and Frank (1998) A3510 Estimating Agricultural Field Machinery Costs. University of Wisconsin-Extension. https://learningstore.uwex.edu/Assets/pdfs/A3510.pdf, Lattz and Schnitkey (2021b) Machinery Cost Estimates: Field Operations. Department of Agricultural and Consumer Economics, University of Illinois at Urbana-Champaign. https://farmdoc.illinois.edu/assets/management/machinery-costs/field_operations.pdf; EPA (2022) Assessment of the Benefits of Atrazine and the Impacts of Potential Mitigation for Field Corn, Sweet Corn, Sorghum, and Sugarcane; PC Code (080803). (MEMORANDUM).US Environmental Protection Agency. https://downloads.regulations.gov/EPA-HQ-OPP-2013-0266-1624/content.pdf ; IPM center (2003) Crop Profile for Sweet Corn in the North Central United States. Southern Integrated Pest Management Center.Southern Integrated Pest Management Center. https://ipmdata.ipmcenters.org/documents/cropprofiles/us-ncr-sweetcorn.pdf ; IPM center (1997) Crop Profile for Corn (Sweet) in Maryland. Southern Integrated Pest Management Center. https://ipmdata.ipmcenters.org/documents/cropprofiles/MDcorn-sweet.pdf
- urea: 0.00396474 kg; lognormal variance with pedigree 0.0046, pedigree (1,4,3,1,1)
  3.96E-3 kg urea/kg Sweet Corn.
  Ecoinvent U.S. consumption mix for N fertilisers, from IFA data N-P-K-S: 167.80--11.8--.1--23.86 kg/ha (USDA NASS data for 2018)over reported cropped area of specified crop (conventional tillage): quantity of N applied to treated acres times percent of planted sweetcorn acres (USDA NASS) times share of N supplied by compound in U.S. consumption mix (ecoinvent and IFA 2019) times mass compound per mass N in compound.
  Sources:
  USDA NASS (2022c) SWEETCORN - APPLICATIONS, MEASURED IN LB / ACRE / YEAR, AVG (fertilizer and pesticides, amount, number of applications) - 2000-2021. US Department of Agriculture (USDA) National Agricultural Statistics Service. https://quickstats.nass.usda.gov/#5E5B411A-F9EF-3B83-AAFF-995DD89820FC; Ecoinvent U.S. consumption mix for N fertilisers, from IFA data; IFA (2021) Nutrient content in percentage - IFA Fertilizer Converter. International Fertilizer Association. https://www.ifastat.org/converter/fertilizer-converter/accessed 2021-06-24
  properties: carbon content, fossil 0.2, dry mass 1 kg, wet mass 1 kg
- urea ammonium nitrate mix: 0.00668649 kg; lognormal variance with pedigree 0.0046, pedigree (1,4,3,1,1)
  6.69E-3 kg urea ammonium nitrate mix/kg Sweet Corn.
  Ecoinvent U.S. consumption mix for N fertilisers, from IFA data N-P-K-S: 167.80--11.8--.1--23.86 kg/ha (USDA NASS data for 2018)over reported cropped area of specified crop (conventional tillage): quantity of N applied to treated acres times percent of planted sweetcorn acres (USDA NASS) times share of N supplied by compound in U.S. consumption mix (ecoinvent and IFA 2019) times mass compound per mass N in compound.
  Sources:
  USDA NASS (2022c) SWEETCORN - APPLICATIONS, MEASURED IN LB / ACRE / YEAR, AVG (fertilizer and pesticides, amount, number of applications) - 2000-2021. US Department of Agriculture (USDA) National Agricultural Statistics Service. https://quickstats.nass.usda.gov/#5E5B411A-F9EF-3B83-AAFF-995DD89820FC; Ecoinvent U.S. consumption mix for N fertilisers, from IFA data; IFA (2021) Nutrient content in percentage - IFA Fertilizer Converter. International Fertilizer Association. https://www.ifastat.org/converter/fertilizer-converter/accessed 2021-06-24
  properties: carbon content, fossil 0.0879977, dry mass 0.75 kg, hydrogen content 0.095042, nitrogen content 0.401231, oxygen content 0.749063, water content 0.333333, wet mass 1 kg
  note on carbon content, fossil: Carbon content, fossil is calculated based on the chemical formula of the substance.
  note on hydrogen content: Hydrogen content (on a dry matter basis) of urea ammonium nitrate mix is calculated from the molecular formula of the substance (CH6N4O4).
  note on nitrogen content: Nitrogen content (on a dry matter basis) of urea ammonium nitrate mix is calculated from the molecular formula of the substance (CH6N4O4).
  note on oxygen content: Oxygen content (on a dry matter basis) of urea ammonium nitrate mix is calculated from the molecular formula of the substance (CH6N4O4).
- waste polyethylene: -0.0517361 kg; name waste_pe; = packaging_f+packaging_p; lognormal variance with pedigree 0.002625, pedigree (2,3,2,2,2)
  This waste is derived from the sum of packaging of pesticide and fertilizer.
  production volume; = waste_pe*pv_corn
    Calculated from production volume of reference product using the relative outputs.
  properties: carbon content, fossil 0.825301, dry mass 0.996 kg, heating value, net 42.47 MJ, water content 0.00401606, wet mass 1 kg
  note on carbon content, fossil: C content in 1 kg DM was calculated using data in Tab A.1, ecoinvent v2.2 report 13_I
  note on heating value, net: Value taken from the general comment of the treatment dataset.

## Inputs from nature
- Carbon dioxide, in air [natural resource, in air]: 1.49429 kg; lognormal variance with pedigree 0.0015, pedigree (2,2,2,1,1)
  Biogene carbon content of Sweet Corn on a dry matter basis 51.778% Carbon content of biomass fractions from Rouwenhorst et al. (1991) (carbohydrates and proteins) and Nemecek & Kägi (2007) (lipids, fibres ash). Carbohydrate, protein, lipid and fibre contents of from Feedipedia. Heuzé V., Tran G., Lebas F. (2017) Maize grain. Feedipedia, a programme by INRAE, CIRAD, AFZ and FAO. https://www.feedipedia.org/node/556 Last updated on September 7, 2017, 14:29.
- Energy, gross calorific value, in biomass [natural resource, biotic]: 4.488 MJ; lognormal variance with pedigree 0.1235, pedigree (3,3,2,3,5)
  The gross energy content of Sweet Corn is 18.7MJ/kg on a dry matter basis, 87.2% dry matter as fed for North American Sweet Corn (Feedipedia - Maize 2017). At the harvest moisture content of 76.% (Neibauer, J. and Maynard, E. 2012), the energy content of Sweet Corn is 4.5MJ/kg product weight
  Source(s):
  Heuzé V., Tran G., Lebas F. (2017) Maize grain. Feedipedia, a programme by INRAE, CIRAD, AFZ and FAO. https://www.feedipedia.org/node/556 Last updated on September 7, 2017, 14:29. ; Neibauer, J. and Maynard, E. (2012) Sweetcorn Produce Quality and Safety. Purdue University. https://www.hort.purdue.edu/prod_quality/commodities/sweetcorn.html
- Occupation, annual crop, irrigated [natural resource, land]: 0.37105 m2*year; lognormal variance with pedigree 0.0029, pedigree (2,2,2,1,1)
  Land occupation per year (annual growing season). Land is under rotation with other annual crop production (~80% corn-soy, ~20% corn-corn, Socolar et al 2021). US NRCS data indicates that land is leaving agricultural production rather than being transitioned into it, thus the continuous flux to/from annual crop is effectively steady state. Annual production averaged 0.7 million tonnes from 2016-2021 on . million ha planted and . million ha harvested. Thus occupation is 0.428 ha/t or 4282.466 m2/t (0.4.282m2/kg). This overall land use is split into irrigated ( 86.64% ) and non-irrigated ( 13.4% ) based on agricultural census data ( USDA NASS ) 3.71E-1 m2 planted/kg harvested maize of irrigated land, and 5.72E-2 m2 planted/kg harvested maize of non-irrigated land
- Occupation, annual crop, non-irrigated [natural resource, land]: 0.0571969 m2*year; lognormal variance with pedigree 0.0029, pedigree (2,2,2,1,1)
  (same comment as for Occupation, annual crop, irrigated)
- Transformation, from annual crop, irrigated [natural resource, land]: 0.37105 m2; lognormal variance with pedigree 0.0089, pedigree (2,2,2,1,1)
  Transformation of land for planting. Land is under rotation with other annual crop production (~80% corn-soy, ~20% corn-corn, Socolar et al 2021). US NRCS data indicates that land is leaving agricultural production rather than being transitioned into it, thus the continuous flux to/from annual crop is effectively steady state. Annual production averaged 0.7 million tonnes from 2016-2021 on . million ha planted and . million ha harvested. Thus occupation is 0.428 ha/t or 4282.466 m2/t (0.4.282m2/kg). This overall land use is split into irrigated ( 86.64% ) and non-irrigated ( 13.4% ) based on agricultural census data ( USDA NASS ) 3.71E-1 m2 planted/kg harvested maize of irrigated land, and 5.72E-2 m2 planted/kg harvested maize of non-irrigated land
- Transformation, from annual crop, non-irrigated [natural resource, land]: 0.0571969 m2; lognormal variance with pedigree 0.0089, pedigree (2,2,2,1,1)
  (same comment as for Transformation, from annual crop, irrigated)
- Transformation, to annual crop, irrigated [natural resource, land]: 0.37105 m2; lognormal variance with pedigree 0.0089, pedigree (2,2,2,1,1)
  (same comment as for Transformation, from annual crop, irrigated)
- Transformation, to annual crop, non-irrigated [natural resource, land]: 0.0571969 m2; lognormal variance with pedigree 0.0089, pedigree (2,2,2,1,1)
  (same comment as for Transformation, from annual crop, irrigated)
## Emissions to nature
- Ammonia [air, non-urban air or from high stacks]: 0.000678877 kg; lognormal variance with pedigree 0.0172, pedigree (2,3,4,1,1)
  Ammonia volatilised from applied mineral and organic fertilisers, 15.9 kg NH3/ha (6.79E-4kg NH3/kg Sweet Corn) total, 15.9 kg NH3/ha (6.79E-4 kg NH3/kg Sweet Corn) from synthetic fertilisers, 0.0 kg NH3/ha (0.E+0 kg NH3/kg Sweet Corn) from manure. . NH3 from volatilisation of mineral fertilisers is calculated using Tier 2 emission factors (temperate climate, specific fertiliser) from the European Environment Agency, EMEP/EEA 3Da1, Table3.2 (EEA 2019). NH3 from manure application is calculated with emission factors provided in EMEP/EEA 3.D.a.2.a (Animal manure applied to soils) (EEA 2019) for manure types used as (fraction TAN in total N)*(EF manure spreading per TAN) for each animal group and type. (kg NH3-N/kg N applied: ). The emissions from manure calculated here do not account for the change in N mineralization and phosphate runoff with incorporation type or time. Where impacts from manure application are expected to be significant, this should be considered as N volatilisation during and after application of manure ranges from as low as 1% N with direct injection to ~5% with immediate incorporation to 20-40% without incorporation (Sawyer J, Mallarino A P (2016) Using Manure Nutrients for Crop Production. Cooperative Extension Service, Iowa State University of Science and Technology. https://store.extension.iastate.edu/product/12874and Midwast Plan Services MWPS-18, 3ed).
  Sources:
  EEA (2019a) EMEP/EEA air pollutant emission inventory guidebook Part B: sectoral guidance chapters 3. Agriculture 3 D Crop production and agricultural soils. European Environment Agency. https://www.eea.europa.eu/publications/emep-eea-guidebook-2019/part-b-sectoral-guidance-chapters/4-agriculture/3-d-crop-production-and/view
  EEA (2019b) EMEP/EEA air pollutant emission inventory guidebook Part B: sectoral guidance chapters 3. Agriculture 3 B Manure management. European Environment Agency. https://www.eea.europa.eu/publications/emep-eea-guidebook-2019/part-b-sectoral-guidance-chapters/4-agriculture/3-b-manure-management/view
- Carbon dioxide, fossil [air, non-urban air or from high stacks]: 0.00339655 kg; lognormal variance with pedigree 0.0092, pedigree (2,3,4,1,1)
  CO2 emissions from use of urea, fertilisers, and lime is 105.751 kg/ha (4.53E-3 kg/kg Sweet Corn): 62.5 kg/ha from lime and 43.25 kg/ha from urea and urea ammonium nitrate (lime: 2.68E-3 kg/kg Sweet Corn; urea: 1.85E-3 kg/kg Sweet Corn).
  Emissions are calculated following the IPCC NIR Guidelines, §11.3 and §11.4, using IPCC NIR equations 11.12 (lime) and 11.13 (urea) (mass of lime/urea * emissions factor for lime/urea) with Tier 1 emissions factors (IPCC 2006b). EF limestone = 0.12 kg CO2-C/kg limestone (0.06-0.12, uniform) and EF urea = 0.2 kg CO2-C/kg urea (0.1-0.2, uniform) applied to both urea and the approximately 35% of UAN that is urea. The result is converted from kg CO2-C to kg CO2 (multiplying by the molar mass of CO2/mass of C in CO2 = 44.01/12)
- Dinitrogen monoxide [air, non-urban air or from high stacks]: 4.97422e-5 kg; lognormal variance with pedigree 0.0392, pedigree (2,3,4,1,1)
  Direct and indirect N2O emissions from fertilizer and manure use and crop cultivation. direct emissions: 1.16E+0 kgN2O/ha (4.97E-5 kg N2O/kg Sweet Corn), 6.38E-2 kg N2O/ha from synthetic fertiliser N and 0.E+0 kg N2O/ha from manure N, 7.24E-1kg N2O/ha from crop residues
  Emissions from run-off and leaching of N after direct volatilisation of NH3 are calculated using the IPCC National Greenhouse Gas Inventory Guidance (IPCC 2006a, 2019Ra) using Tier 1 and Tier 2 parameters. Direct N2O emissions are calculated using Tier 2 parameters from Table equation 11.2 of the 2019Refinement to wi of the IPCC National Inventory Guidance, 2019 revision. including contributions from nutrient applications, with the Tier 2 emissions factors for wet climates (Table 11.1, IPCC 2019R) 0.016 kg N2O-N/kg fertiliser N applied (uniform range 0.013--0.019) and 0.006 kgN2O-N/kg manure N applied (uniform range 0.001--0.011)
  Sources:
  IPCC (2006a) 2006 IPCC Guidelines for National Greenhouse Gas Inventories - Chapter 11: N2O Emissions from Managed Soils, and CO2 Emissions from Lime and Urea Application in Volume 4: Agriculture, Forestry and Other Land Use. UN Intergovernmental Panel on Climate Change (IPCC). https://www.ipcc-nggip.iges.or.jp/public/2006gl/pdf/4_Volume4/V4_11_Ch11_N2O&CO2.pdf, https://www.ipcc-nggip.iges.or.jp/public/2006gl/
  IPCC (2019a) Chapter 11: N2O Emissions from Managed Soils, and CO2 Emissions from Lime and Urea Application in 2019 Refinement to the 2006 IPCC Guidelines for National Greenhouse Gas Inventories - Volume 4: Agriculture, Forestry and Other Land Use. UN Intergovernmental Panel on Climate Change (IPCC). https://www.ipcc-nggip.iges.or.jp/public/2019rf/pdf/4_Volume4/19R_V4_Ch11_Soils_N2O_CO2.pdf https://www.ipcc-nggip.iges.or.jp/public/2019rf/index.html, https://www.ipcc.ch/report/2019-refinement-to-the-2006-ipcc-guidelines-for-national-greenhouse-gas-inventories/
  IPCC (2006b) IPCC Guidelines for National Greenhouse Gas Inventories (Volumes 1, 2, and 4). UN Intergovernmental Panel on Climate Change (IPCC). https://www.ipcc-nggip.iges.or.jp/public/2006gl/index.html
  IPCC (2019b) 2019 Refinement to the 2006 IPCC Guidelines for National Greenhouse Gas Inventories (Volumes 1, 2, and 4). UN Intergovernmental Panel on Climate Change (IPCC). https://www.ipcc.ch/report/2019-refinement-to-the-2006-ipcc-guidelines-for-national-greenhouse-gas- inventories/ https://www.ipcc-nggip.iges.or.jp/public/2019rf/index.html.
  IPCC (2019c) Equation 11.1, Chapter 11: N2O Emissions from Managed Soils, and CO2 Emissions from Lime and Urea Application in 2019 Refinement to the 2006 IPCC Guidelines for National Greenhouse Gas Inventories - Volume 4: Agriculture, Forestry and Other Land Use. UN Intergovernmental Panel on Climate Change (IPCC). https://www.ipcc-nggip.iges.or.jp/public/2019rf/pdf/4_Volume4/19R_V4_Ch11_Soils_N2O_CO2.pdf https://www.ipcc-nggip.iges.or.jp/public/2019rf/index.html, https://www.ipcc.ch/report/2019-refinement-to-the-2006-ipcc-guidelines-for-national-greenhouse-gas-inventories/
  IPCC (2019d) Equation 11.2, Chapter 11: N2O Emissions from Managed Soils, and CO2 Emissions from Lime and Urea Application in 2019 Refinement to the 2006 IPCC Guidelines for National Greenhouse Gas Inventories - Volume 4: Agriculture, Forestry and Other Land Use. UN Intergovernmental Panel on Climate Change (IPCC). https://www.ipcc-nggip.iges.or.jp/public/2019rf/pdf/4_Volume4/19R_V4_Ch11_Soils_N2O_CO2.pdf https://www.ipcc-nggip.iges.or.jp/public/2019rf/index.html, https://www.ipcc.ch/report/2019-refinement-to-the-2006-ipcc-guidelines-for-national-greenhouse-gas-inventories/
  IPCC (2019e) Table 11.1(A), Chapter 11: N2O Emissions from Managed Soils, and CO2 Emissions from Lime and Urea Application in 2019 Refinement to the 2006 IPCC Guidelines for National Greenhouse Gas Inventories - Volume 4: Agriculture, Forestry and Other Land Use. UN Intergovernmental Panel on Climate Change (IPCC). https://www.ipcc-nggip.iges.or.jp/public/2019rf/pdf/4_Volume4/19R_V4_Ch11_Soils_N2O_CO2.pdf https://www.ipcc-nggip.iges.or.jp/public/2019rf/index.html, https://www.ipcc.ch/report/2019-refinement-to-the-2006-ipcc-guidelines-for-national-greenhouse-gas-inventories/
- Nitrogen oxides [air, non-urban air or from high stacks]: 0.000278785 kg; lognormal variance with pedigree 0.0392, pedigree (2,3,4,1,1)
  6.5 kg NO2/ha (2.79E-4kg NO2/kg Sweet Corn), 6.51E+0 kg NO2/ha from fertilisers; 0.E+0 kg NO2/ha from manure) NOx emissions from fertilizer and manure nitrification after N loss from NH3, as NO2. Calculated according to EEA/EMEP guidance, EF_NO_Managed Soils = 0.04 kg NO2/kg N fertiliser and manure N applied (range 0.005 to 0.104, 95% CL), from Table 3.1, Tier 1 EFs for source category 3.D, EMEP/EEA Guidebook 2019. The differences between NO emissions from different application type, soil organic carbon levels, drainage or soil pH are not accounted for here.
- Water [air, non-urban air or from high stacks]: 0.171679 m3; lognormal variance with pedigree 0.0015, pedigree (2,2,2,1,1)
  Irrigation water released to air via evapotranspiration. Calculated by the ecoinvent agricultural LCI tool.
- Atrazine [soil, agricultural]: 5.07002e-5 kg; normal variance with pedigree 2.86784e-9, pedigree (2,3,3,3,1)
  Atrazine emission to agricultural soil (1.184E+00 kg/ha). Pesticides are assumed to be ultimately 100% emitted to soil across all rotation patterns, based on assumption that all sweet corn acres are treated, and assuming that cultivation is conventional tillage as common practice for weed management (EPA 2022; IPM 2003, IPM 1997).Data reported a quantity of total insecticides/herbicides/fungicides applied in sweet corn is sometimes available even when many of the substances in the category are reported with a “D”. If this total is available, the amount remaining after the sum of substance-specific values is accounted for is divided equally among the substances reported with a “D”. If the sum of available values exceeds or equals the total reported, any remaining “D” substances are treated as zero and omitted.
  Sources: SWEETCORN - APPLICATIONS, MEASURED IN LB / ACRE / YEAR, AVG (fertilizer and pesticides, amount, number of applications) - 2000-2021,https://quickstats.nass.usda.gov/#5E5B411A-F9EF-3B83-AAFF-995DD89820FC,IPM center (1997) Crop Profile for Corn (Sweet) in Maryland. Southern Integrated Pest Management Center. https://ipmdata.ipmcenters.org/documents/cropprofiles/MDcorn-sweet.pdf,IPM center (2003) Crop Profile for Sweet Corn in the North Central United States. Southern Integrated Pest Management Center.Southern Integrated Pest Management Center. https://ipmdata.ipmcenters.org/documents/cropprofiles/us-ncr-sweetcorn.pdf ,EPA (2022) Assessment of the Benefits of Atrazine and the Impacts of Potential Mitigation for Field Corn, Sweet Corn, Sorghum, and Sugarcane; PC Code (080803). (MEMORANDUM).US Environmental Protection Agency. https://downloads.regulations.gov/EPA-HQ-OPP-2013-0266-1624/content.pdf
- Bifenthrin [soil, agricultural]: 2.4e-7 kg; normal variance with pedigree 1.44e-18, pedigree (2,3,3,3,1)
  Bifenthrin emission to agricultural soil (5.604E-03 kg/ha). Pesticides are assumed to be ultimately 100% emitted to soil across all rotation patterns, based on assumption that all sweet corn acres are treated, and assuming that cultivation is conventional tillage as common practice for weed management (EPA 2022; IPM 2003, IPM 1997).Data reported a quantity of total insecticides/herbicides/fungicides applied in sweet corn is sometimes available even when many of the substances in the category are reported with a “D”. If this total is available, the amount remaining after the sum of substance-specific values is accounted for is divided equally among the substances reported with a “D”. If the sum of available values exceeds or equals the total reported, any remaining “D” substances are treated as zero and omitted.
  Sources: SWEETCORN - APPLICATIONS, MEASURED IN LB / ACRE / YEAR, AVG (fertilizer and pesticides, amount, number of applications) - 2000-2021,https://quickstats.nass.usda.gov/#5E5B411A-F9EF-3B83-AAFF-995DD89820FC,IPM center (1997) Crop Profile for Corn (Sweet) in Maryland. Southern Integrated Pest Management Center. https://ipmdata.ipmcenters.org/documents/cropprofiles/MDcorn-sweet.pdf,IPM center (2003) Crop Profile for Sweet Corn in the North Central United States. Southern Integrated Pest Management Center.Southern Integrated Pest Management Center. https://ipmdata.ipmcenters.org/documents/cropprofiles/us-ncr-sweetcorn.pdf ,EPA (2022) Assessment of the Benefits of Atrazine and the Impacts of Potential Mitigation for Field Corn, Sweet Corn, Sorghum, and Sugarcane; PC Code (080803). (MEMORANDUM).US Environmental Protection Agency. https://downloads.regulations.gov/EPA-HQ-OPP-2013-0266-1624/content.pdf
- Cadmium II [soil, agricultural]: -7.48312e-9 kg; normal variance with pedigree 0.04, pedigree (2,3,3,1,1)
  Emissions of heavy metals to soil are estimated based on the SALCA-heavy metal model (Freiermuth 2006) following the procedure in the ecoinvent agricultural LCI tool (Faist Emmenegger, Délerce-Mauris and Porté 2018 Models Integrated in Ecoinvent LCI Calculation Tool for Crop Production). The balance of heavy metal emissions to soils includes the net change from erosion, leaching, crop removal and fertilizer, manure, lime, planting and deposition. The crop system carries a share of heavy metals emissions based on the ratio of cropping additions to total additions (additions to crop system divided by additions to crop system plus depostion from air and present in soils) Sources for heavy metals contents include: Heavy-metal contents of plant material, maize (mg/kg dry matter, from Freiermuth 2006). ; Leaching of heavy metals to surface water (Wolfensberger & Dinkel 1997), where drainage is installed ; Deposition of heavy metals to soils, mg per ha per year (Freiermuth 2006). ; Deposition of heavy metals to soils, mg per ha per year (Freiermuth 2006). ; Average heavy metal contents in crop soils, mg per kg soil, based on data for Switzerland (from Keller & Desaules, 2001). state and regional erosion rates are from US NRC National Resources Inventory, 2017. and Drainage on all cropland acres state-wide, including tile drainage (4.2%,) and ditch drainage (5.1%). USDA (2018a) 2017 Census of Agriculture, Volume 1, Chapter 2: State Level Data - Table 41. Land Use Practices: 2017 and 2012 (live table: https://www.nass.usda.gov/Quick_Stats/CDQT/chapter/2/table/41/state/US). US Department of Agriculture (USDA). https://www.nass.usda.gov/Publications/AgCensus/2017/Full_Report/Volume_1,_Chapter_2_US_State_Level/st99_2_0041_0041.pdf. Fertilizer, manure and pesticide application rates are based on USDA NASS data.
- Chlorpyrifos [soil, agricultural]: 2.4e-7 kg; normal variance with pedigree 1.44e-18, pedigree (2,3,3,3,1)
  Chlorpyrifos emission to agricultural soil (5.604E-03 kg/ha). Pesticides are assumed to be ultimately 100% emitted to soil across all rotation patterns, based on assumption that all sweet corn acres are treated, and assuming that cultivation is conventional tillage as common practice for weed management (EPA 2022; IPM 2003, IPM 1997).Data reported a quantity of total insecticides/herbicides/fungicides applied in sweet corn is sometimes available even when many of the substances in the category are reported with a “D”. If this total is available, the amount remaining after the sum of substance-specific values is accounted for is divided equally among the substances reported with a “D”. If the sum of available values exceeds or equals the total reported, any remaining “D” substances are treated as zero and omitted.
  Sources: SWEETCORN - APPLICATIONS, MEASURED IN LB / ACRE / YEAR, AVG (fertilizer and pesticides, amount, number of applications) - 2000-2021,https://quickstats.nass.usda.gov/#5E5B411A-F9EF-3B83-AAFF-995DD89820FC,IPM center (1997) Crop Profile for Corn (Sweet) in Maryland. Southern Integrated Pest Management Center. https://ipmdata.ipmcenters.org/documents/cropprofiles/MDcorn-sweet.pdf,IPM center (2003) Crop Profile for Sweet Corn in the North Central United States. Southern Integrated Pest Management Center.Southern Integrated Pest Management Center. https://ipmdata.ipmcenters.org/documents/cropprofiles/us-ncr-sweetcorn.pdf ,EPA (2022) Assessment of the Benefits of Atrazine and the Impacts of Potential Mitigation for Field Corn, Sweet Corn, Sorghum, and Sugarcane; PC Code (080803). (MEMORANDUM).US Environmental Protection Agency. https://downloads.regulations.gov/EPA-HQ-OPP-2013-0266-1624/content.pdf
- Chromium III [soil, agricultural]: -8.48276e-6 kg; normal variance with pedigree 0.04, pedigree (2,3,3,1,1)
  (same comment as for Cadmium II)
- Copper ion [soil, agricultural]: -3.62995e-6 kg; normal variance with pedigree 0.04, pedigree (2,3,3,1,1)
  (same comment as for Cadmium II)
- Dimethenamid-P [soil, agricultural]: 2.93556e-5 kg; normal variance with pedigree 3.22317e-10, pedigree (2,3,3,3,1)
  Dimethenamid-P emission to agricultural soil (6.855E-01 kg/ha). Pesticides are assumed to be ultimately 100% emitted to soil across all rotation patterns, based on assumption that all sweet corn acres are treated, and assuming that cultivation is conventional tillage as common practice for weed management (EPA 2022; IPM 2003, IPM 1997).Data reported a quantity of total insecticides/herbicides/fungicides applied in sweet corn is sometimes available even when many of the substances in the category are reported with a “D”. If this total is available, the amount remaining after the sum of substance-specific values is accounted for is divided equally among the substances reported with a “D”. If the sum of available values exceeds or equals the total reported, any remaining “D” substances are treated as zero and omitted.
  Sources: SWEETCORN - APPLICATIONS, MEASURED IN LB / ACRE / YEAR, AVG (fertilizer and pesticides, amount, number of applications) - 2000-2021,https://quickstats.nass.usda.gov/#5E5B411A-F9EF-3B83-AAFF-995DD89820FC,IPM center (1997) Crop Profile for Corn (Sweet) in Maryland. Southern Integrated Pest Management Center. https://ipmdata.ipmcenters.org/documents/cropprofiles/MDcorn-sweet.pdf,IPM center (2003) Crop Profile for Sweet Corn in the North Central United States. Southern Integrated Pest Management Center.Southern Integrated Pest Management Center. https://ipmdata.ipmcenters.org/documents/cropprofiles/us-ncr-sweetcorn.pdf ,EPA (2022) Assessment of the Benefits of Atrazine and the Impacts of Potential Mitigation for Field Corn, Sweet Corn, Sorghum, and Sugarcane; PC Code (080803). (MEMORANDUM).US Environmental Protection Agency. https://downloads.regulations.gov/EPA-HQ-OPP-2013-0266-1624/content.pdf
- Esfenvalerate [soil, agricultural]: 2.4e-7 kg; normal variance with pedigree 1.44e-18, pedigree (2,3,3,3,1)
  Esfenvalerate emission to agricultural soil (5.604E-03 kg/ha). Pesticides are assumed to be ultimately 100% emitted to soil across all rotation patterns, based on assumption that all sweet corn acres are treated, and assuming that cultivation is conventional tillage as common practice for weed management (EPA 2022; IPM 2003, IPM 1997).Data reported a quantity of total insecticides/herbicides/fungicides applied in sweet corn is sometimes available even when many of the substances in the category are reported with a “D”. If this total is available, the amount remaining after the sum of substance-specific values is accounted for is divided equally among the substances reported with a “D”. If the sum of available values exceeds or equals the total reported, any remaining “D” substances are treated as zero and omitted.
  Sources: SWEETCORN - APPLICATIONS, MEASURED IN LB / ACRE / YEAR, AVG (fertilizer and pesticides, amount, number of applications) - 2000-2021,https://quickstats.nass.usda.gov/#5E5B411A-F9EF-3B83-AAFF-995DD89820FC,IPM center (1997) Crop Profile for Corn (Sweet) in Maryland. Southern Integrated Pest Management Center. https://ipmdata.ipmcenters.org/documents/cropprofiles/MDcorn-sweet.pdf,IPM center (2003) Crop Profile for Sweet Corn in the North Central United States. Southern Integrated Pest Management Center.Southern Integrated Pest Management Center. https://ipmdata.ipmcenters.org/documents/cropprofiles/us-ncr-sweetcorn.pdf ,EPA (2022) Assessment of the Benefits of Atrazine and the Impacts of Potential Mitigation for Field Corn, Sweet Corn, Sorghum, and Sugarcane; PC Code (080803). (MEMORANDUM).US Environmental Protection Agency. https://downloads.regulations.gov/EPA-HQ-OPP-2013-0266-1624/content.pdf
- Fluthiacet-methyl [soil, agricultural]: 1.92e-7 kg; normal variance with pedigree 5.89824e-19, pedigree (2,3,3,3,1)
  Fluthiacet-methyl emission to agricultural soil (4.483E-03 kg/ha). Pesticides are assumed to be ultimately 100% emitted to soil across all rotation patterns, based on assumption that all sweet corn acres are treated, and assuming that cultivation is conventional tillage as common practice for weed management (EPA 2022; IPM 2003, IPM 1997).Data reported a quantity of total insecticides/herbicides/fungicides applied in sweet corn is sometimes available even when many of the substances in the category are reported with a “D”. If this total is available, the amount remaining after the sum of substance-specific values is accounted for is divided equally among the substances reported with a “D”. If the sum of available values exceeds or equals the total reported, any remaining “D” substances are treated as zero and omitted.
  Sources: SWEETCORN - APPLICATIONS, MEASURED IN LB / ACRE / YEAR, AVG (fertilizer and pesticides, amount, number of applications) - 2000-2021,https://quickstats.nass.usda.gov/#5E5B411A-F9EF-3B83-AAFF-995DD89820FC,IPM center (1997) Crop Profile for Corn (Sweet) in Maryland. Southern Integrated Pest Management Center. https://ipmdata.ipmcenters.org/documents/cropprofiles/MDcorn-sweet.pdf,IPM center (2003) Crop Profile for Sweet Corn in the North Central United States. Southern Integrated Pest Management Center.Southern Integrated Pest Management Center. https://ipmdata.ipmcenters.org/documents/cropprofiles/us-ncr-sweetcorn.pdf ,EPA (2022) Assessment of the Benefits of Atrazine and the Impacts of Potential Mitigation for Field Corn, Sweet Corn, Sorghum, and Sugarcane; PC Code (080803). (MEMORANDUM).US Environmental Protection Agency. https://downloads.regulations.gov/EPA-HQ-OPP-2013-0266-1624/content.pdf
- Glyphosate [soil, agricultural]: 0.000145003 kg; normal variance with pedigree 7.67516e-9, pedigree (2,3,3,3,1)
  Glyphosate emission to agricultural soil (3.386E+00 kg/ha). Pesticides are assumed to be ultimately 100% emitted to soil across all rotation patterns, based on assumption that all sweet corn acres are treated, and assuming that cultivation is conventional tillage as common practice for weed management (EPA 2022; IPM 2003, IPM 1997).Data reported a quantity of total insecticides/herbicides/fungicides applied in sweet corn is sometimes available even when many of the substances in the category are reported with a “D”. If this total is available, the amount remaining after the sum of substance-specific values is accounted for is divided equally among the substances reported with a “D”. If the sum of available values exceeds or equals the total reported, any remaining “D” substances are treated as zero and omitted.
  Sources: SWEETCORN - APPLICATIONS, MEASURED IN LB / ACRE / YEAR, AVG (fertilizer and pesticides, amount, number of applications) - 2000-2021,https://quickstats.nass.usda.gov/#5E5B411A-F9EF-3B83-AAFF-995DD89820FC,IPM center (1997) Crop Profile for Corn (Sweet) in Maryland. Southern Integrated Pest Management Center. https://ipmdata.ipmcenters.org/documents/cropprofiles/MDcorn-sweet.pdf,IPM center (2003) Crop Profile for Sweet Corn in the North Central United States. Southern Integrated Pest Management Center.Southern Integrated Pest Management Center. https://ipmdata.ipmcenters.org/documents/cropprofiles/us-ncr-sweetcorn.pdf ,EPA (2022) Assessment of the Benefits of Atrazine and the Impacts of Potential Mitigation for Field Corn, Sweet Corn, Sorghum, and Sugarcane; PC Code (080803). (MEMORANDUM).US Environmental Protection Agency. https://downloads.regulations.gov/EPA-HQ-OPP-2013-0266-1624/content.pdf
- Lambda-cyhalothrin [soil, agricultural]: 2.4e-7 kg; normal variance with pedigree 1.44e-18, pedigree (2,3,3,3,1)
  Lambda-Cyhalothrin emission to agricultural soil (5.604E-03 kg/ha). Pesticides are assumed to be ultimately 100% emitted to soil across all rotation patterns, based on assumption that all sweet corn acres are treated, and assuming that cultivation is conventional tillage as common practice for weed management (EPA 2022; IPM 2003, IPM 1997).Data reported a quantity of total insecticides/herbicides/fungicides applied in sweet corn is sometimes available even when many of the substances in the category are reported with a “D”. If this total is available, the amount remaining after the sum of substance-specific values is accounted for is divided equally among the substances reported with a “D”. If the sum of available values exceeds or equals the total reported, any remaining “D” substances are treated as zero and omitted.
  Sources: SWEETCORN - APPLICATIONS, MEASURED IN LB / ACRE / YEAR, AVG (fertilizer and pesticides, amount, number of applications) - 2000-2021,https://quickstats.nass.usda.gov/#5E5B411A-F9EF-3B83-AAFF-995DD89820FC,IPM center (1997) Crop Profile for Corn (Sweet) in Maryland. Southern Integrated Pest Management Center. https://ipmdata.ipmcenters.org/documents/cropprofiles/MDcorn-sweet.pdf,IPM center (2003) Crop Profile for Sweet Corn in the North Central United States. Southern Integrated Pest Management Center.Southern Integrated Pest Management Center. https://ipmdata.ipmcenters.org/documents/cropprofiles/us-ncr-sweetcorn.pdf ,EPA (2022) Assessment of the Benefits of Atrazine and the Impacts of Potential Mitigation for Field Corn, Sweet Corn, Sorghum, and Sugarcane; PC Code (080803). (MEMORANDUM).US Environmental Protection Agency. https://downloads.regulations.gov/EPA-HQ-OPP-2013-0266-1624/content.pdf
- Lead II [soil, agricultural]: -5.80256e-7 kg; normal variance with pedigree 0.04, pedigree (2,3,3,1,1)
  (same comment as for Cadmium II)
- Metolachlor [soil, agricultural]: 7.09234e-5 kg; normal variance with pedigree 1.09819e-8, pedigree (2,3,3,3,1)
  Metolachlor emission to agricultural soil (1.656E+00 kg/ha). Pesticides are assumed to be ultimately 100% emitted to soil across all rotation patterns, based on assumption that all sweet corn acres are treated, and assuming that cultivation is conventional tillage as common practice for weed management (EPA 2022; IPM 2003, IPM 1997).Data reported a quantity of total insecticides/herbicides/fungicides applied in sweet corn is sometimes available even when many of the substances in the category are reported with a “D”. If this total is available, the amount remaining after the sum of substance-specific values is accounted for is divided equally among the substances reported with a “D”. If the sum of available values exceeds or equals the total reported, any remaining “D” substances are treated as zero and omitted.
  Sources: SWEETCORN - APPLICATIONS, MEASURED IN LB / ACRE / YEAR, AVG (fertilizer and pesticides, amount, number of applications) - 2000-2021,https://quickstats.nass.usda.gov/#5E5B411A-F9EF-3B83-AAFF-995DD89820FC,IPM center (1997) Crop Profile for Corn (Sweet) in Maryland. Southern Integrated Pest Management Center. https://ipmdata.ipmcenters.org/documents/cropprofiles/MDcorn-sweet.pdf,IPM center (2003) Crop Profile for Sweet Corn in the North Central United States. Southern Integrated Pest Management Center.Southern Integrated Pest Management Center. https://ipmdata.ipmcenters.org/documents/cropprofiles/us-ncr-sweetcorn.pdf ,EPA (2022) Assessment of the Benefits of Atrazine and the Impacts of Potential Mitigation for Field Corn, Sweet Corn, Sorghum, and Sugarcane; PC Code (080803). (MEMORANDUM).US Environmental Protection Agency. https://downloads.regulations.gov/EPA-HQ-OPP-2013-0266-1624/content.pdf
- Nickel II [soil, agricultural]: -4.38373e-6 kg; normal variance with pedigree 0.04, pedigree (2,3,3,1,1)
  (same comment as for Cadmium II)
- Pendimethalin [soil, agricultural]: 6.0912e-5 kg; normal variance with pedigree 5.97488e-9, pedigree (2,3,3,3,1)
  Pendimethalin emission to agricultural soil (1.422E+00 kg/ha). Pesticides are assumed to be ultimately 100% emitted to soil across all rotation patterns, based on assumption that all sweet corn acres are treated, and assuming that cultivation is conventional tillage as common practice for weed management (EPA 2022; IPM 2003, IPM 1997).Data reported a quantity of total insecticides/herbicides/fungicides applied in sweet corn is sometimes available even when many of the substances in the category are reported with a “D”. If this total is available, the amount remaining after the sum of substance-specific values is accounted for is divided equally among the substances reported with a “D”. If the sum of available values exceeds or equals the total reported, any remaining “D” substances are treated as zero and omitted.
  Sources: SWEETCORN - APPLICATIONS, MEASURED IN LB / ACRE / YEAR, AVG (fertilizer and pesticides, amount, number of applications) - 2000-2021,https://quickstats.nass.usda.gov/#5E5B411A-F9EF-3B83-AAFF-995DD89820FC,IPM center (1997) Crop Profile for Corn (Sweet) in Maryland. Southern Integrated Pest Management Center. https://ipmdata.ipmcenters.org/documents/cropprofiles/MDcorn-sweet.pdf,IPM center (2003) Crop Profile for Sweet Corn in the North Central United States. Southern Integrated Pest Management Center.Southern Integrated Pest Management Center. https://ipmdata.ipmcenters.org/documents/cropprofiles/us-ncr-sweetcorn.pdf ,EPA (2022) Assessment of the Benefits of Atrazine and the Impacts of Potential Mitigation for Field Corn, Sweet Corn, Sorghum, and Sugarcane; PC Code (080803). (MEMORANDUM).US Environmental Protection Agency. https://downloads.regulations.gov/EPA-HQ-OPP-2013-0266-1624/content.pdf
- Pyraclostrobin [soil, agricultural]: 6.77365e-6 kg; normal variance with pedigree 9.13709e-13, pedigree (2,3,3,3,1)
  Pyraclostrobin emission to agricultural soil (1.582E-01 kg/ha). Pesticides are assumed to be ultimately 100% emitted to soil across all rotation patterns, based on assumption that all sweet corn acres are treated, and assuming that cultivation is conventional tillage as common practice for weed management (EPA 2022; IPM 2003, IPM 1997).Data reported a quantity of total insecticides/herbicides/fungicides applied in sweet corn is sometimes available even when many of the substances in the category are reported with a “D”. If this total is available, the amount remaining after the sum of substance-specific values is accounted for is divided equally among the substances reported with a “D”. If the sum of available values exceeds or equals the total reported, any remaining “D” substances are treated as zero and omitted.
  Sources: SWEETCORN - APPLICATIONS, MEASURED IN LB / ACRE / YEAR, AVG (fertilizer and pesticides, amount, number of applications) - 2000-2021,https://quickstats.nass.usda.gov/#5E5B411A-F9EF-3B83-AAFF-995DD89820FC,IPM center (1997) Crop Profile for Corn (Sweet) in Maryland. Southern Integrated Pest Management Center. https://ipmdata.ipmcenters.org/documents/cropprofiles/MDcorn-sweet.pdf,IPM center (2003) Crop Profile for Sweet Corn in the North Central United States. Southern Integrated Pest Management Center.Southern Integrated Pest Management Center. https://ipmdata.ipmcenters.org/documents/cropprofiles/us-ncr-sweetcorn.pdf ,EPA (2022) Assessment of the Benefits of Atrazine and the Impacts of Potential Mitigation for Field Corn, Sweet Corn, Sorghum, and Sugarcane; PC Code (080803). (MEMORANDUM).US Environmental Protection Agency. https://downloads.regulations.gov/EPA-HQ-OPP-2013-0266-1624/content.pdf
- Zeta-cypermethrin [soil, agricultural]: 2.4e-7 kg; normal variance with pedigree 1.44e-18, pedigree (2,3,3,3,1)
  Zeta-Cypermethrin emission to agricultural soil (5.604E-03 kg/ha). Pesticides are assumed to be ultimately 100% emitted to soil across all rotation patterns, based on assumption that all sweet corn acres are treated, and assuming that cultivation is conventional tillage as common practice for weed management (EPA 2022; IPM 2003, IPM 1997).Data reported a quantity of total insecticides/herbicides/fungicides applied in sweet corn is sometimes available even when many of the substances in the category are reported with a “D”. If this total is available, the amount remaining after the sum of substance-specific values is accounted for is divided equally among the substances reported with a “D”. If the sum of available values exceeds or equals the total reported, any remaining “D” substances are treated as zero and omitted.
  Sources: SWEETCORN - APPLICATIONS, MEASURED IN LB / ACRE / YEAR, AVG (fertilizer and pesticides, amount, number of applications) - 2000-2021,https://quickstats.nass.usda.gov/#5E5B411A-F9EF-3B83-AAFF-995DD89820FC,IPM center (1997) Crop Profile for Corn (Sweet) in Maryland. Southern Integrated Pest Management Center. https://ipmdata.ipmcenters.org/documents/cropprofiles/MDcorn-sweet.pdf,IPM center (2003) Crop Profile for Sweet Corn in the North Central United States. Southern Integrated Pest Management Center.Southern Integrated Pest Management Center. https://ipmdata.ipmcenters.org/documents/cropprofiles/us-ncr-sweetcorn.pdf ,EPA (2022) Assessment of the Benefits of Atrazine and the Impacts of Potential Mitigation for Field Corn, Sweet Corn, Sorghum, and Sugarcane; PC Code (080803). (MEMORANDUM).US Environmental Protection Agency. https://downloads.regulations.gov/EPA-HQ-OPP-2013-0266-1624/content.pdf
- Zinc II [soil, agricultural]: -8.78495e-6 kg; normal variance with pedigree 0.04, pedigree (2,3,3,1,1)
  (same comment as for Cadmium II)
- Cadmium II [water, ground-]: 8.26613e-12 kg; lognormal variance with pedigree 0.0932, pedigree (2,3,3,1,1)
  Emissions of heavy metals to ground water arise from leaching. These emissions are estimated based on the SALCA-heavy metal model (Freiermuth 2006) following the procedure in the ecoinvent agricultural LCI tool (Faist Emmenegger, Délerce-Mauris and Porté 2018 Models Integrated in Ecoinvent LCI Calculation Tool for Crop Production). The crop system carries a share of heavy metals emissions based on the ratio of cropping additions to total additions (additions to crop system divided by additions to crop system plus depostion from air and present in soils)Sources for heavy metals leaching to groundwater include: Leaching of heavy metals to groundwater (Wolfensberger & Dinkel 1997), where no drainage is installed ; the share of leaching to groundwater is calcualted from Drainage on all cropland acres state-wide, including tile drainage (4.2%,) and ditch drainage (5.1%). USDA (2018a) 2017 Census of Agriculture, Volume 1, Chapter 2: State Level Data - Table 41. Land Use Practices: 2017 and 2012 (live table: https://www.nass.usda.gov/Quick_Stats/CDQT/chapter/2/table/41/state/US). US Department of Agriculture (USDA). https://www.nass.usda.gov/Publications/AgCensus/2017/Full_Report/Volume_1,_Chapter_2_US_State_Level/st99_2_0041_0041.pdf.
- Cadmium II [water, surface water]: 7.9688e-9 kg; lognormal variance with pedigree 0.0932, pedigree (2,3,3,1,1)
  Emissions of heavy metals to surface water arise from leaching (when drainage is present) and erosion. Emissions are estimated based on the SALCA-heavy metal model (Freiermuth 2006) following the procedure in the ecoinvent agricultural LCI tool (Faist Emmenegger, Délerce-Mauris and Porté 2018 Models Integrated in Ecoinvent LCI Calculation Tool for Crop Production). The crop system carries a share of heavy metals emissions based on the ratio of cropping additions to total additions (additions to crop system divided by additions to crop system plus depostion from air and present in soils) Sources for heavy metals contents include: Leaching of heavy metals to surface water (Wolfensberger & Dinkel 1997), where drainage is installed ; Average heavy metal contents in crop soils, mg per kg soil, based on data for Switzerland (from Keller & Desaules, 2001). erosion rates are from US NRC National Resources Inventory, 2017. and Drainage on all cropland acres state-wide, including tile drainage (4.2%,) and ditch drainage (5.1%). USDA (2018a) 2017 Census of Agriculture, Volume 1, Chapter 2: State Level Data - Table 41. Land Use Practices: 2017 and 2012 (live table: https://www.nass.usda.gov/Quick_Stats/CDQT/chapter/2/table/41/state/US). US Department of Agriculture (USDA). https://www.nass.usda.gov/Publications/AgCensus/2017/Full_Report/Volume_1,_Chapter_2_US_State_Level/st99_2_0041_0041.pdf. Fertilizer, manure and pesticide application rates are based on USDA NASS data.
- Chromium III [water, ground-]: 7.0117e-7 kg; lognormal variance with pedigree 0.0932, pedigree (2,3,3,1,1)
  (same comment as for Cadmium II)
- Chromium III [water, surface water]: 1.00441e-5 kg; lognormal variance with pedigree 0.0932, pedigree (2,3,3,1,1)
  (same comment as for Cadmium II)
- Copper ion [water, ground-]: 5.46588e-8 kg; lognormal variance with pedigree 0.0932, pedigree (2,3,3,1,1)
  (same comment as for Cadmium II)
- Copper ion [water, surface water]: 3.42241e-6 kg; lognormal variance with pedigree 0.0932, pedigree (2,3,3,1,1)
  (same comment as for Cadmium II)
- Lead II [water, ground-]: 1.02077e-10 kg; lognormal variance with pedigree 0.0932, pedigree (2,3,3,1,1)
  (same comment as for Cadmium II)
- Lead II [water, surface water]: 9.2628e-6 kg; lognormal variance with pedigree 0.0932, pedigree (2,3,3,1,1)
  (same comment as for Cadmium II)
- Mercury II [water, surface water]: 2.8644e-7 kg; lognormal variance with pedigree 0.0932, pedigree (2,3,3,1,1)
  (same comment as for Cadmium II)
- Nickel II [water, surface water]: 9.2256e-6 kg; lognormal variance with pedigree 0.0932, pedigree (2,3,3,1,1)
  (same comment as for Cadmium II)
- Nitrate [water, ground-]: 0.0111321 kg; lognormal variance with pedigree 0.0409, pedigree (2,2,2,1,1)
  The total nitrate leaching/runoff is 2.868E+2 kg NO3/ha (1.113E-2kg NO3/kg Sweet Corn), 2.000E+2 kg NO3/ha from fertilisers, 0.000E+0 kg NO3/ha from manure, 9.460E+1 kg NO3/ha from soil mineralization, and -7.858E+0 kg NO3 N uptake.
  9.4% is emitted to surface water and 90.6% to ground water, since 9.4% of cropland in Washington has drainage (ISU Extension 2020c).
  Nitrate leaching is calculated with the SQCB-NO3 model (Faist Emmenegger et al. 2009) using general (state-level parameters for slope and clay content, local precipitation and irrigation data).
  Sources:
  Faist Emmenegger M, Reinhard J, Zah R (2009) Sustainability Quick Check for Biofuels - in- termediate background report. With contributions from T. Ziep, R. Weichbrodt, Prof. Dr. V. Wohlgemuth, FHTW Berlin and A. Roches, R. Freiermuth Knuchel, Dr. G. Gaillard, Agroscope Reckenholz-Tänikon. Dübendorf. https://www.researchgate.net/profile/Rainer-Zah/publication/230725635_SQCB_-_Sustainability_Quick_Check_for_Biofuels_Second_draft_18th_February_2009_-_Intermediate_Background_Report_With_contributions_from_T_Ziep_R_Weichbrodt_Prof_Dr_V_Wohlgemuth_FHTW_Berlin_and_A_Roche/links/56b458fb08ae1f8aa45392e6/SQCB-Sustainability-Quick-Check-for-Biofuels-Second-draft-18th-February-2009-Intermediate-Background-Report-With-contributions-from-T-Ziep-R-Weichbrodt-Prof-Dr-V-Wohlgemuth-FHTW-Berlin-and-A-R.pdf; DeBruin J and Butzen S (2020) Nitrogen uptake by corn . Pioneer. https://www.pioneer.com/us/agronomy/nitrogen_uptake_corn.htmlaccessed 11-20-2021; Fan, Y., Wang, Z., Liao, D. et al. Uptake and utilization of nitrogen, phosphorus and potassium as related to yield advantage in maize-soybean intercropping under different row configurations. Sci Rep 10, 9504 (2020). https://doi.org/10.1038/s41598-020-66459-y; Hollinger S E (1995) Midwestern Climate Center Soils Atlas and Database. Crop Science Extension & Outreach, University of Illinois . https://www.isws.illinois.edu/pubdoc/C/ISWSC-179.pdf; Bruulsema T and Jones J D (2021) Soil Test Summary 2020. Foundation for Agronomic Research and Plant Nutrition Canada present this 2020 summary of soil test levels in North America. Foundation for Agronomic Research, Plant Nutrition Canada. https://soiltest.tfi.org/about/about_soil_test_summaryaccessed August 30, 2021
  ISU Extension (2020c) Crop Production Costs Budget - Corn following Soybeans. Cooperative Extension Service, Iowa State University of Science and Technology. https://www.extension.iastate.edu/agdm/crops/xls/a1-20cfs_tbl2.xlsx
- Nitrate [water, surface water]: 0.00114845 kg; lognormal variance with pedigree 0.0409, pedigree (2,2,2,1,1)
  (same comment as for Nitrate)
- Phosphate [water, ground-]: 2.99773e-6 kg; lognormal variance with pedigree 0.0428, pedigree (2,4,2,1,1)
  Phosphate leaching to ground water 0.07 kg PO4/ha (2.998E-6 kg/kg Sweet Corn): 0.E+0 kg PO4/ha from manure and 7.E-2 kg PO4/ha from leaching from arable land. Phosphate leaching to ground water is calculated using the SALCA-P model (Prasuhn 2006) with an average leaching factor for arable lands and the amount of phosphate in any applied manure, as implemented in the ecoinvent agricultural LCI tool (see Ecoinvent_Too_Model_Description_20191015.pdf). Does not incorporate state or county data on soils, slope or conservation drainage infrastructure. Calculated with the ecoinvent agricultural LCI tool. If the slope is less than 3%, no phosphate loss through run-off occurs (Prasuhn 2006). If the slope is greater or equal to 3%, phosphate loss through run-off are computed like in (Prasuhn 2006) with the site-specific correction factors set to their default value (=1):
  Sources:
  Prasuhn, V (2006) Erfassung der PO4-Austräge für die Ökobilanzierung. SALCA-Phosphor. Zü-rich, CH, Agrocope FAL Reckenholz. Agrocope.
  Freiermuth (2006) SALCA-Schwermetall - Modell zur Berechnung der Schwermetall- flüsse in der Landwirtschaftlichen Ökobilanz. Agroscope FAL Zürich-Reckenholz . https://www.agroscope.admin.ch/dam/agroscope/de/dokumente/themen/umwelt-ressourcen/produktionssysteme/salca-schwermetall.pdf.download.pdf/SALCA-Schwermetall.pdf
  U.S. Department of Agriculture. 2017.
  2017 National Resources Inventory.
  Natural Resources Conservation Service, Washington, DC. 31 October 2020 *
  <http://www.nrcs.usda.gov/Internet/NRCS_RCA/reports/nri_crop_nat.html>
- Phosphate [water, surface water]: 8.74557e-6 kg; lognormal variance with pedigree 0.0428, pedigree (2,4,2,1,1)
  2.922E-2 kg PO4/ha from mineral fertilisers, and 1.750E-1 kg PO4/ha from leaching from arable land
- Phosphorus [water, surface water]: 2.96661e-6 kg; lognormal variance with pedigree 0.0502, pedigree (3,2,4,3,1)
  Phosphorus emissions to surface water are based on the SALCA-P model (Prasuhn 2006), but using state-specific data for agricultural land (not crop-specific). The erosion and soil test values encompass the state-wide reported cropped area of Sweet Corn in Washington for all tillage practices (OPTiS 2020) and across all rotation patterns (Socolar et al 2021).Soil Phosphorus losses are calculated from an annual soil loss from water erosion on agricultural soils in Washington of 11.59t/ha/year (NRCS 2020b)with a Phosphorus soil concentration of 30mg/kg soil, the median value from 13,821 soil test samples reported for Washington in the 2020 Soil Test Survey, (the average of the 2005, 2010, 2015, and 2020 median soil Phosphorus concentrations is 53.mg/kg soil) (Bruulsema T and Jones J D 2021).No enrichment factor has been applied, because the phosphorus soil concentration samples are specifically agricultural land in the study area and thus any enrichment as a result of synthetic and organic fertilisers is already caputred in the soil test.An active cultivation duration of 6.8 months (0.56 year), covering cultivation through harvest (from weekly progress reports,USDA NASS 2022b), is used to adjust the annual erosion to the crop share (see Faist-Emmenegger et al 2009).No adjustment has been made for the presence of drainage (installed on 9.4% of crop land, USDA 2018a) or any anti-erosion practices.Sources:
  NRCS (2020a) Soil losses from erosion (water and wind) on cultivated cropland, in the 2017 National Resources Inventory. USDA, Natural Resources Conservation Service. http://www.nrcs.usda.gov/Internet/NRCS_RCA/reports/nri_crop_nat.html; Bruulsema T and Jones J D (2021) Soil Test Summary 2020. Foundation for Agronomic Research and Plant Nutrition Canada present this 2020 summary of soil test levels in North America. Foundation for Agronomic Research, Plant Nutrition Canada. https://soiltest.tfi.org/about/about_soil_test_summaryaccessed August 30, 2021; USDA NASS (2022b) SWEET CORN - PROGRESS (planted, emerged, harvested) - 2016-2022. US Department of Agriculture (USDA) National Agricultural Statistics Service. https://quickstats.nass.usda.gov/#5E5B411A-F9EF-3B83-AAFF-995DD89820FC; USDA (2018a) 2017 Census of Agriculture, Volume 1, Chapter 2: State Level Data - Table 41. Land Use Practices: 2017 and 2012 (live table: https://www.nass.usda.gov/Quick_Stats/CDQT/chapter/2/table/41/state/US). US Department of Agriculture (USDA). https://www.nass.usda.gov/Publications/AgCensus/2017/Full_Report/Volume_1,_Chapter_2_US_State_Level/st99_2_0041_0041.pdf; Prasuhn, V (2006) Erfassung der PO4-Austräge für die Ökobilanzierung. SALCA-Phosphor. Zü-rich, CH, Agrocope FAL Reckenholz. Agrocope. ; Faist Emmenegger M, Reinhard J, Zah R (2009) Sustainability Quick Check for Biofuels - in- termediate background report. With contributions from T. Ziep, R. Weichbrodt, Prof. Dr. V. Wohlgemuth, FHTW Berlin and A. Roches, R. Freiermuth Knuchel, Dr. G. Gaillard, Agroscope Reckenholz-Tänikon. Dübendorf. https://www.researchgate.net/profile/Rainer-Zah/publication/230725635_SQCB_-_Sustainability_Quick_Check_for_Biofuels_Second_draft_18th_February_2009_-_Intermediate_Background_Report_With_contributions_from_T_Ziep_R_Weichbrodt_Prof_Dr_V_Wohlgemuth_FHTW_Berlin_and_A_Roche/links/56b458fb08ae1f8aa45392e6/SQCB-Sustainability-Quick-Check-for-Biofuels-Second-draft-18th-February-2009-Intermediate-Background-Report-With-contributions-from-T-Ziep-R-Weichbrodt-Prof-Dr-V-Wohlgemuth-FHTW-Berlin-and-A-R.pdf
- Water [water, ground-]: 0.0702324 m3; lognormal variance with pedigree 0.0015, pedigree (2,2,2,1,1)
  Irrigation water not taken up by crop. Calculated by the ecoinvent agricultural LCI tool.
- Water [water, surface water]: 0.0182084 m3; lognormal variance with pedigree 0.0015, pedigree (2,2,2,1,1)
  Irrigation water not taken up by crop. Calculated by the ecoinvent agricultural LCI tool.
- Zinc II [water, ground-]: 5.06463e-8 kg; lognormal variance with pedigree 0.0932, pedigree (2,3,3,1,1)
  (same comment as for Cadmium II)
- Zinc II [water, surface water]: 2.60772e-5 kg; lognormal variance with pedigree 0.0932, pedigree (2,3,3,1,1)
  (same comment as for Cadmium II)

## Sampling procedure
Data is obtained from state, county and national statistics, agricultural extension offices, and published literature. Data for production, yields, applications of NPKS fertilisers, applications of pesticides, row width, and irrigation (if any) was obtained from the US Dept of Agriculture's National Agricultural Statistics Service and in most cases provides high-quality data spanning the dataset time period. Field operations and energy use are from enterprise crop budgets provided by local agricultural extensions offices and their farmer survey data. Literature data is used where USDA and agricultural extension guidance and data are not available.

## Extrapolations
Mineral fertiliser applications are crop and location (state and sub-state levels) specific for nutrient applied, based on survey data compiled by the USDA National Agricultural Statistics Service. Specific fertilisers are extrapolated from mineral fertiliser applications to Specific fertilisers are extrapolated from mineral fertiliser applications to Sweet Corn in Washington and market consumption in the US (IFA 2020). Field operations are as identified in crop- and rotation-specific enterprise crop budgets supplied by the regional agricultural extension office and matched to equipment type in the budget or crop guidance unless otherwise noted. Field cultivation and tillage operations are specific to the tillage regime used. Seed establishment and weed control for sweet corn generally require tillage (EPA 2022; IPM 2003, IPM 1997), so this dataset reflects sweet corn production using conventional tillage practices.. The most recent enterprise budget available for Washington is from 2002, but operations included in it are consistent with more recent budgets and guidance from other states. The field operations are assumed valid through the dataset time period. Operations are matched to equipment type and where multiple options are available, the share of each is determined from guidance and annual farmer survey data (Custom Rate Summaries) for contracted operations/equipment. Machine sizes (power) are approximate but based on common, recent surveys and equipment analyses (Lazarus 2020).
Emissions are calculated with standard methods according to ecoinvent documentation (Nemecek and Schnetzer, 2011. '01 crop production-direct field emissions natural resources' v1.2, August 2011, available at ) and the World Food LCA Database guidelines and the ecoinvent agricultural LCI tool. Soil characteristics, including pH and clay content, are extrapolated from distribution of soil pH sampling results reported in the 2020 Soil Test Summary (Bruulsema and Jones 2021). The share of acidic soils is likely overestimated as more more frequent testing is to be expected on soils having needed lime and thus low pH soils are likely to be more represented amongst the collected samples.In the absence of detailed direct soil pH data, the state-level share of soils in a particular pH band (that is, with a pH between its boundaries) is approximated as the share of the total test samples in that pH band. To test this assumption, the reported median soil pH is compared to the estimated average value using the approximated pH bins. Based on the agreement between the 2020 median pH and the approximated average soil pH for 2020, an approximate standard deviation is calculated using the variation in median values for 2020, 2015, 2010, and 2005 and the delta between the 2020 reported median and the approximate 2020 value. Drainage tile data from 2012 (reported to USDA for the 2012 agricultural census) is extrapolated as valid from that date through the rest of the time period of the dataset and the distribution of drainage is treated as homogenous for all field crops.
Some pesticide quantities are extrapolated. Pesticide data is sometimes withheld in the NASS database to avoid disclosing data for individual operations (denoted with "D" in the data returned for the query, indicating a non-zero but withheld value). Farmers select one or more compounds specific to their conditions, regulations, cost, and pests identified, so the full list of pesticides are not applied in any single case. Where disclosing data would allow for identification of individual operations, pesticide data is withheld in the NASS database (denoted with "D" in the data returned for the query, indicating a non-zero but withheld value). This is the case for the overwhelming majority of pesticides applied to sweet corn. Where a state-specific and substance-specific value was available in NASS, that value was used (if a value was available for both 2018 and 2020, the average of the two was used). Because farmers select one or more compounds specific to their conditions, local regulations, cost, and pests identified, the full list of pesticides are not applied in any single case and approximations are used to account for the remaining pesticides. A quantity of total insecticides/herbicides/fungicides applied is sometimes available even when many of the substances in the category are reported with a “D”. If this total is available, the amount remaining after the sum of substance-specific values is accounted for is divided equally among the substances reported with a “D”. If the sum of available values exceeds or equals the total reported, any remaining “D” substances are treated as zero and omitted. If the total used in that state is not reported, the average sweet corn country-level value for each is used for the substances reported (“D” substances). If no average US sweet corn value for the substance is available, then the value applied for US maize is used to approximate the substance to avoid undercounting since pesticide use in sweet corn cultivation is universal or nearly so. In the event that not even a value for US maize is available, the substance is omitted. If all available data across all three categories for a state are “D”, as is the case for Florida, Integrated Pest Management guidance and crop profile summaries were used to identify substances and set approximate application amounts.
Transports are modelled with standard distances.
