# chlor-alkali electrolysis, average production

Dataset: EcoSpold 2, unit process
Geography: RER
Time period: 2020-01-01 to 2025-12-31
Technology level: current
Classification: ISIC rev.4 ecoinvent: 2011:Manufacture of basic chemicals
Synonyms: Bertholite; diaphragm cell; Chlor; molecular chlorine; membrane cell
Scenario: Business-as-Usual
System model: Allocation, cut-off by classification
Generated by: Sabrina Ludmann
Published in: EuroChlor 2022
Database: ecoinvent
isCopyrightProtected: true
accessRestrictedTo: 1

## General comment
This dataset represents the average production of chlorine and sodium hydroxide (NaOH) by means of chlor-alkali electrolysis using membrane and diaphragm cells. In Europe, nearly 85% of chlorine is produced in membrane cells (monopolar, mono/bipolar, bipolar, oxygen depolarised cathodes), over 10% in diaphragm cells and the remaining by other technologies (chlorine-alcoholate, hydrochloric acid conversion, metal production and chlorine and caustic production without hydrogen as a by-product).
In the chlor-alkali process, brine (salt solution) is fed to the electrolysis unit where the brine is electrochemically decomposed into chlorine, hydrogen, and sodium hydroxide.
Chlorine is largely used in the synthesis of chlorinated organic compounds. PVC and isocyanates are the main drivers of chlor-alkali production in the EU-27 and EFTA countries (Euro Chlor 2022). These products are used in a wide range of applications, such as construction materials, plastics, clothing and pesticides.
Sodium hydroxide is a white odorless pellet or solid that is very soluble. Sodium hydroxide is used for the synthesis of other chemicals, and is used in the metal industry, the pulp and paper sector, the textile industry and in other various sectors.
This dataset is mainly based on industry data, collected from 35 plants in Europe (EU + GB, NO, CH).
References:
EuroChlor (2022): Chlorine (The Chlor-Alkali Process), An Eco-Profile and Environmental Product Declaration of the European Chlor-Alkali Industry.
Brinkmann T., Santonja G. G., Schorcht F., Roudier S., Delgado Sancho L. (2014): Best Available Techniques (BAT) Reference Document for the Production of Chlor-alkali, Joint Research Centre, available here: https://eippcb.jrc.ec.europa.eu/sites/default/files/2019-11/CAK_BREF_102014.pdf, last accessed 19-07-2023.

## Included activities start
The activity starts when the raw materials enter the process.

## Included activities end
This activity ends with the production of gaseous chlorine, sodium hydroxide and further products. Besides the electrolysis process, the following process steps are included in this activity: brine production, brine purification, as well as the final handling of the electrolysis products, without the chlorine liquefaction. Infrastructure is included in the dataset.

## Geography
Literature data, representative for min. 75 % of European (EU + GB, NO, CH) production capacity, based on installed nameplate capacity.

## Technology
In the chlor-alkali electrolysis, a sodium chloride solution is decomposed electrochemically by direct current. Three basic techniques exist for the electrolytic process: diaphragm, membrane and mercury cell technique. The mercury cell technique, however, has been phased out in recent years in Europe due to mercury's toxicity. The two remaining techniques differ in terms of electrode reaction and electrode materials, and in the way the chlorine produced is kept separate from sodium hydroxide and hydrogen.
The chemical processes at the anode are the same for the two techniques: chloride ions are oxidised and gaseous chlorine (Cl2) is formed:
Anode: 2 Cl- --> Cl2 + 2 e-
In membrane and diaphragm cells, water is decomposed at the cathode into hydrogen and hydroxide ions:
2 Na+ + 2 e- + 2 H2O --> 2 NaOH + H2
As a result, the overall reaction in the chlor-alkali unit for all techniques is:
2 NaCl + 2 H2O --> Cl2 + 2 NaOH + H2
Treatment of sodium hydroxide is slightly different for the two cell types due to the difference in product output quality (composition and concentration of the sodium hydroxide produced). Hydrogen leaving the cells is highly concentrated (> 99.9 vol.-%) and usually only a little processing is needed.
Sodium hypochlorite is produced by feeding gaseous chlorine into a dilute solution of sodium hydroxide.
The chlorine reacts with the sodium hydroxide under the formation of sodium hypochlorite, sodium chloride, and water:
Cl2 + 2 NaOH --> NaOCl + NaCl + H2O
When the desired concentration of sodium hypochlorite is reached, the solution is withdrawn from circulation and directed to a cooled storage tank.
The technological coverage can be understood as representative for membrane technology, whereas the representativeness of diaphragm technology is rather low.
References:
EuroChlor (2022): Chlorine (The Chlor-Alkali Process), An Eco-Profile and Environmental Product Declaration of the European Chlor-Alkali Industry.
Brinkmann T., Santonja G. G., Schorcht F., Roudier S., Delgado Sancho L. (2014): Best Available Techniques (BAT) Reference Document for the Production of Chlor-alkali, Joint Research Centre, available here: https://eippcb.jrc.ec.europa.eu/sites/default/files/2019-11/CAK_BREF_102014.pdf, laste accessed 19-07-2023.

## Time period
Data collection 2021. The technology is not expected to change within 4 years.

## Reference product
- hydrochloric acid, without water, in 30% solution state: 1 kg; name BP_HCl; By-product classification allocatable product; CPC 34231: Chemical elements n.e.c.; inorganic acids except phosphoric, nitric and sulphonitric; inorganic oxygen compoun[…]; HS2017 280610: Hydrogen chloride (hydrochloric acid); CAS 7647-01-0
  Literature data, representative for min. 75 % of European (EU + GB, NO, CH) production capacity, based on installed nameplate capacity.
  Based on EuroChlor (2022): Chlorine (The Chlor-Alkali Process), An Eco-Profile and Environmental Product Declaration of the European Chlor-Alkali Industry.
  production volume 9.042e7 kg; name PV_BP_HCl; = RP_PV*BP_HCl/RP
    Calculated from production volume of reference product using the relative outputs.
  property heating value, net 3.32 MJ
    LHV is calculated based on the elemental composition of the substance. Based on the CAS number of the substance (007647-01-0), the chemical formula of the substance is found to be: HCl, (PubChem 2020). Reference: Kim, S., Chen, J., Cheng, T., Gindulyte, A., He, J., He, S., Li, Q., Shoemaker, B. A., Thiessen, P. A., Yu, B., Zaslavsky, L., Zhang, J., & Bolton, E. E. (2019). PubChem 2019 update: improved access to chemical data. Nucleic acids research, 47(D1), D1102–D1109. https://doi.org/10.1093/nar/gky1033
  property price 0.127 EUR2005
    Temporary price data. Calculated as 90% of purchasers price based on: 2004 Import/Export data (total trades (USD) divided by total weight (kg) in EU27, USA, China, Japan and India) from UN Commodity Trade Statistics Database (http://data.un.org/Explorer.aspxDatabase [Accessed 2 July 2010]). Commodity: Hydrogen chloride (hydrochloric acid).
  properties: allocation factor 0.0028901, carbon allocation 0 kg, carbon content 0, carbon content, fossil 0, carbon content, non-fossil 0, dry mass 1 kg, true value 0.00118998, water content 0, water in wet mass 0 kg, wet mass 1 kg

## Inputs from technosphere
- activated carbon, granular: 1.62755e-6 kg; lognormal variance with pedigree 0.0019, pedigree (2,2,1,1,2)
  (same comment as for hydrochloric acid, without water, in 30% solution state)
  properties: carbon content, fossil 0.81, dry mass 0.97 kg, heating value, net 30.23 MJ, water content 0.030928, wet mass 1 kg
  note on carbon content, fossil: Literature value. From Biomass and Bioenergy: Processing and Properties (2014) edited by Khalid Rehman Hakeem, Mohammad Jawaid, Umer Rashid (p. 252). Carbon content is in the range of 72-90%, an average value of 81% is taken.
- ammonia, anhydrous, liquid: 6.02433e-8 kg; lognormal variance with pedigree 0.0019, pedigree (2,2,1,1,2)
  (same comment as for hydrochloric acid, without water, in 30% solution state)
  properties: dry mass 1 kg, wet mass 1 kg
- anionic resin: 0.000133224 kg; lognormal variance with pedigree 0.0019, pedigree (2,2,1,1,2)
  (same comment as for hydrochloric acid, without water, in 30% solution state)
  properties: carbon content, fossil 0.680721, dry mass 0.5 kg, heating value, net 9.09 MJ, water content 1, wet mass 1 kg
  note on carbon content, fossil: Cross-linked polystyrene beads are treated with chloromethyl methyl ether under anhydrous conditions, with either aluminum chloride or tin(IV) chloride as catalyst. Chloromethylated polystyrene is obtained. In a second stage, the chlorine in the chloromethylated group can be replaced by an amine (Anion exchange resins, in Ullmann). In this case, Trimethylamine, C3H9N, is used (ecoinvent v2.2 report 8-part 93). That is, the resine can be formulated as C12H18NCl (after Ullmann, Anion exchange resins). The resine is hydrated (ecoinvent v2.2 report 8, part II, Tab 93.7)
- barium carbonate: 1.34375e-5 kg; lognormal variance with pedigree 0.0019, pedigree (2,2,1,1,2)
  (same comment as for hydrochloric acid, without water, in 30% solution state)
- calcium chloride: 0.00017225 kg; lognormal variance with pedigree 0.0019, pedigree (2,2,1,1,2)
  (same comment as for hydrochloric acid, without water, in 30% solution state)
  properties: dry mass 1 kg, wet mass 1 kg
- carbon dioxide, liquid: 0.000407881 kg; lognormal variance with pedigree 0.0019, pedigree (2,2,1,1,2)
  (same comment as for hydrochloric acid, without water, in 30% solution state)
  properties: carbon content, fossil 0.272727, dry mass 1 kg, heating value, net 8.27 MJ, wet mass 1 kg
- cationic resin: 0.000133224 kg; lognormal variance with pedigree 0.0019, pedigree (2,2,1,1,2)
  (same comment as for hydrochloric acid, without water, in 30% solution state)
  properties: carbon content, fossil 0.521606, dry mass 0.5 kg, heating value, net 6.68 MJ, water content 1, wet mass 1 kg
  note on carbon content, fossil: Chemically inert polystyrene beads are treated with concentrated sulfuric or chlorosulfonic acid to give cross-linked polystyrene 3-sulfonic acid (Cation exchange resins, Ullmann). The resine was approximated as C8H8O3S (from Ullmann, Cation exchange resins). The resine is hydrated (ecoinvent v2.2 report 8, part II, Tab 93.5)
- chemical factory, organics: 1.23378e-10 unit; lognormal variance with pedigree 0.3432, pedigree (2,4,1,4,4)
  Calculated based on literature data published by the industry. For this activity, no information was readily available concerning infrastructure and land-use. Therefore, the infrastructure is estimated based on data from two chemical factories, the BASF site of Ludwigshafen and the chemical factory in Gendorf (which are both located in Germany), which produce a wide range of chemical substances. Based on this data, the following assumptions are made: the built area amounts to about 4.2 ha, the plant has an average output of 50'000 t/a and a lifespan of fifty years. The estimated infrastructure amount is therefore 4.00 E-10 units per kg of produced chemical.
  References:
  Althaus H.-J., Chudacoff M., Hischier R., Jungbluth N., Osses M. and Primas A. (2007) Life Cycle Inventories of Chemicals. ecoinvent report No. 8, v2.0. EMPA Dübendorf, Swiss Centre for Life Cycle Inventories, Dübendorf, CH.
  Gendorf (2000) Umwelterklärung 2000, Werk Gendorf. Werk Gendorf, Burgkirchen.
- chemical, inorganic: 0.000155193 kg; lognormal variance with pedigree 0.0019, pedigree (2,2,1,1,2)
  Proxy for magnesium chloride and calcium hydroxide.
  Literature data, representative for min. 75 % of European (EU + GB, NO, CH) production capacity, based on installed nameplate capacity.
  Based on EuroChlor (2022): Chlorine (The Chlor-Alkali Process), An Eco-Profile and Environmental Product Declaration of the European Chlor-Alkali Industry.
  properties: carbon content, fossil 0.003, dry mass 1 kg, wet mass 1 kg
  note on carbon content, fossil: This dataset is an unweighted average of 20 inorganic substances (listed in Tab 88.1, ecoinvent v2.2 report 8, part II), being part of the top100 chemicals included in this database. The C-content has also been calculated as an unweighted average of the C content of the substances composing this dataset.
- chemical, organic: 5.51995e-5 kg; lognormal variance with pedigree 0.0019, pedigree (2,2,1,1,2)
  Proxy for cellulose and anti-foam agents.
  Literature data, representative for min. 75 % of European (EU + GB, NO, CH) production capacity, based on installed nameplate capacity.
  Based on EuroChlor (2022): Chlorine (The Chlor-Alkali Process), An Eco-Profile and Environmental Product Declaration of the European Chlor-Alkali Industry.
  properties: carbon content, fossil 0.628, dry mass 1 kg, heating value, net 19.03 MJ, wet mass 1 kg
  note on carbon content, fossil: This dataset is an unweighted average of 20 organic substances (listed in Tab 88.1, ecoinvent v2.2 report 8, part II), being part of the top100 chemicals included in this database. The C-content has also been calculated as an unweighted average of the C content of the substances composing this dataset.
- compressed air, 600 kPa gauge: 0.0107369 m3; lognormal variance with pedigree 0.0019, pedigree (2,2,1,1,2)
  (same comment as for hydrochloric acid, without water, in 30% solution state)
- disodium disulphite: 2.29215e-5 kg; lognormal variance with pedigree 0.0019, pedigree (2,2,1,1,2)
  (same comment as for hydrochloric acid, without water, in 30% solution state)
  properties: dry mass 1 kg, wet mass 1 kg
- electricity, medium voltage: 0.067414, 0.398425, 0.00682496, 0.012864, 0.0287747, 0.0973785, 0.0401638, 0.0469722, 0.0326771, 0.00673396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 kWh (14 suppliers, which the file names only by identifier); sum of these 0.837083 kWh; lognormal variance with pedigree 0.0019, pedigree (2,2,1,1,2)
  (same comment as for hydrochloric acid, without water, in 30% solution state)
- ethylene glycol: 4.21369e-8 kg; lognormal variance with pedigree 0.0019, pedigree (2,2,1,1,2)
  (same comment as for hydrochloric acid, without water, in 30% solution state)
  properties: carbon content, fossil 0.387097, dry mass 1 kg, heating value, net 23.44 MJ, wet mass 1 kg
- hazardous waste, for incineration: -0.000127148, -3.32358e-6 kg (2 suppliers, which the file names only by identifier); sum of these -0.000130472 kg; lognormal variance with pedigree 0.0019, pedigree (2,2,1,1,2)
  (same comment as for hydrochloric acid, without water, in 30% solution state)
  production volume; name PV_BP_hazwaste_incin; = RP_PV*BP_hazwaste_incin/RP
    Calculated from production volume of reference product using the relative outputs.
  properties: carbon content, fossil 0.554667, dry mass 0.75 kg, heating value, net 17 MJ, water content 0.333333, wet mass 1 kg
  note on carbon content, fossil: Tab A.6, ecoinvent v2.2 report 13_I. C content has been calculated after data in the tables, and then referred to 1 kg DM
  note on heating value, net: Value taken from the general comment of the treatment dataset.
- hazardous waste, for underground deposit: -0.00079887 kg; name BP_hazwaste_dep; lognormal variance with pedigree 0.0019, pedigree (2,2,1,1,2)
  (same comment as for hydrochloric acid, without water, in 30% solution state)
  production volume; name PV_BP_hazwaste_dep; = RP_PV*BP_hazwaste_dep/RP
    Calculated from production volume of reference product using the relative outputs.
  properties: carbon content, fossil 0.554667, dry mass 1 kg, wet mass 1 kg
  note on carbon content, fossil: Tab A.6, ecoinvent v2.2 report 13_I, average hazardous waste composition was used, and referred to 0% water mass. No waste-specific emission are currently inventoried for underground deposits. Accordingly, no waste composition must be specified. For generic, average waste to underground deposit deposition in a 200 liter steel drum without cement solidification is assumed (ecoinvent v2.2 report 13_I).
- heat, from steam, in chemical industry: 0.654994 MJ; lognormal variance with pedigree 0.0019, pedigree (2,2,1,1,2)
  (same comment as for hydrochloric acid, without water, in 30% solution state)
  properties: heating value, net 1 MJ
- hydrochloric acid, without water, in 30% solution state: 0.0123483 kg; lognormal variance with pedigree 0.0019, pedigree (2,2,1,1,2)
  (same comment as for hydrochloric acid, without water, in 30% solution state)
  properties: dry mass 1 kg, heating value, net 3.32 MJ, wet mass 1 kg
- hydrogen peroxide, without water, in 50% solution state: 0.000117583 kg; lognormal variance with pedigree 0.0019, pedigree (2,2,1,1,2)
  (same comment as for hydrochloric acid, without water, in 30% solution state)
  properties: dry mass 1 kg, heating value, net 7.13 MJ, wet mass 1 kg
- hydrogen, gaseous, low pressure: 7.4991e-6 kg; lognormal variance with pedigree 0.0019, pedigree (2,2,1,1,2)
  (same comment as for hydrochloric acid, without water, in 30% solution state)
  properties: dry mass 1 kg, heating value, net 120.21 MJ, wet mass 1 kg
- inert waste: -0.00088215 kg; name BP_inertwaste; lognormal variance with pedigree 0.0019, pedigree (2,2,1,1,2)
  (same comment as for hydrochloric acid, without water, in 30% solution state)
  production volume; name PV_BP_inertwaste; = RP_PV*BP_inertwaste/RP
    Calculated from production volume of reference product using the relative outputs.
  properties: dry mass 1 kg, wet mass 1 kg
- light fuel oil: 7.109e-7 kg; lognormal variance with pedigree 0.0019, pedigree (2,2,1,1,2)
  (same comment as for hydrochloric acid, without water, in 30% solution state)
  properties: carbon content, fossil 0.862, dry mass 1 kg, heating value, net 42.6 MJ, wet mass 1 kg
- natural gas, high pressure: 1.60639e-6, 0.00023039 m3 (2 suppliers, which the file names only by identifier); sum of these 0.000231996 m3; lognormal variance with pedigree 0.0019, pedigree (2,2,1,1,2)
  (same comment as for hydrochloric acid, without water, in 30% solution state)
  properties: carbon content, fossil 0.741, dry mass 0.735 kg, heating value, gross 40 MJ, heating value, net 36 MJ, wet mass 0.735 kg
  note on heating value, gross: At standard conditions; based on Meili et al. (2022) section 5.2
- nitrogen, liquid: 0.00434509 kg; lognormal variance with pedigree 0.0019, pedigree (2,2,1,1,2)
  (same comment as for hydrochloric acid, without water, in 30% solution state)
  properties: dry mass 1 kg, wet mass 1 kg
- oxygen, liquid: 2.37218e-7 kg; lognormal variance with pedigree 0.0019, pedigree (2,2,1,1,2)
  (same comment as for hydrochloric acid, without water, in 30% solution state)
  properties: dry mass 1 kg, wet mass 1 kg
- perfluoropentane: 3.00382e-8 kg; lognormal variance with pedigree 0.0019, pedigree (2,2,1,1,2)
  (same comment as for hydrochloric acid, without water, in 30% solution state)
  properties: carbon content, fossil 0.0953262, dry mass 1 kg, heating value, net 6.32 MJ, wet mass 1 kg
- platinum: 1.41561e-9 kg; lognormal variance with pedigree 0.0019, pedigree (2,2,1,1,2)
  Proxy for electrode, assumed to be 0.1 wt% Pt with TiO2.
  Literature data, representative for min. 75 % of European (EU + GB, NO, CH) production capacity, based on installed nameplate capacity.
  Based on EuroChlor (2022): Chlorine (The Chlor-Alkali Process), An Eco-Profile and Environmental Product Declaration of the European Chlor-Alkali Industry.
  properties: dry mass 1 kg, wet mass 1 kg
- potassium carbonate: 9.07942e-6 kg; lognormal variance with pedigree 0.0019, pedigree (2,2,1,1,2)
  (same comment as for hydrochloric acid, without water, in 30% solution state)
  properties: carbon content, fossil 0.0869565, dry mass 1 kg, heating value, net 2.63 MJ, wet mass 1 kg
- potassium chloride: 0.00181001 kg; lognormal variance with pedigree 0.0019, pedigree (2,2,1,1,2)
  (same comment as for hydrochloric acid, without water, in 30% solution state)
  properties: dry mass 1 kg, wet mass 1 kg
- refrigerant R134a: 1.27287e-6 kg; lognormal variance with pedigree 0.0019, pedigree (2,2,1,1,2)
  (same comment as for hydrochloric acid, without water, in 30% solution state)
  properties: carbon content, fossil 0.235294, dry mass 1 kg, heating value, net 9.51 MJ, wet mass 1 kg
- soda ash, dense: 0.00226359 kg; lognormal variance with pedigree 0.0019, pedigree (2,2,1,1,2)
  (same comment as for hydrochloric acid, without water, in 30% solution state)
  properties: carbon content, fossil 0.11322, dry mass 1 kg, heating value, net 3.43 MJ, wet mass 1 kg
- sodium chloride, powder: 0.649311 kg; lognormal variance with pedigree 0.0019, pedigree (2,2,1,1,2)
  (same comment as for hydrochloric acid, without water, in 30% solution state)
  properties: dry mass 1 kg, wet mass 1 kg
- sodium hydrogen sulfite: 0.00067888 kg; lognormal variance with pedigree 0.0019, pedigree (2,2,1,1,2)
  (same comment as for hydrochloric acid, without water, in 30% solution state)
  properties: dry mass 1 kg, wet mass 1 kg
- sodium sulfide: 1.46868e-5 kg; lognormal variance with pedigree 0.0019, pedigree (2,2,1,1,2)
  (same comment as for hydrochloric acid, without water, in 30% solution state)
  properties: dry mass 1 kg, wet mass 1 kg
- sodium sulfite: 0.000126495 kg; lognormal variance with pedigree 0.0019, pedigree (2,2,1,1,2)
  (same comment as for hydrochloric acid, without water, in 30% solution state)
  properties: dry mass 1 kg, wet mass 1 kg
- sulfuric acid: 0.00521148 kg; lognormal variance with pedigree 0.0019, pedigree (2,2,1,1,2)
  (same comment as for hydrochloric acid, without water, in 30% solution state)
  properties: dry mass 1 kg, wet mass 1 kg
- titanium dioxide: 1.4142e-6 kg; lognormal variance with pedigree 0.0019, pedigree (2,2,1,1,2)
  (same comment as for platinum)
  properties: dry mass 1 kg, wet mass 1 kg
- wastewater, average: -1.04284e-5, -0.000414952 m3 (2 suppliers, which the file names only by identifier); sum of these -0.00042538 m3; lognormal variance with pedigree 0.0019, pedigree (2,2,1,1,2)
  (same comment as for hydrochloric acid, without water, in 30% solution state)
  production volume; name PV_BP_wastewater; = RP_PV*BP_wastewater/RP
    Calculated from production volume of reference product using the relative outputs.
  properties: carbon content, non-fossil 0.194039, dry mass 0.346837 kg, mass concentration, TOC 0.1091 kg/m3, mass concentration, calcium 0.039453 kg/m3, mass concentration, chlorine 0.030031 kg/m3, mass concentration, hydrogen 0.013365 kg/m3, mass concentration, nitrogen 0.031015 kg/m3, mass concentration, oxygen 0.069824 kg/m3, mass concentration, sodium 0.06456 kg/m3, mass concentration, sulfur 0.015602 kg/m3, water content 2882.2, wet mass 1000 kg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
  note on carbon content, non-fossil: 0.0673 kg TOC/m3 (Tab A.17, ecoinvent v2.2 report 13_I). TOC was considered as Total Carbon.
- water, deionised: 0.533907, 0.00192193 kg (2 suppliers, which the file names only by identifier); sum of these 0.535829 kg; lognormal variance with pedigree 0.0019, pedigree (2,2,1,1,2)
  (same comment as for hydrochloric acid, without water, in 30% solution state)
  properties: wet mass 1 kg

## Inputs from nature
- Water, cooling, unspecified natural origin [natural resource, in water]: 0.0119618 m3; lognormal variance with pedigree 0.0019, pedigree (2,2,1,1,2)
  (same comment as for hydrochloric acid, without water, in 30% solution state)

## Emissions to nature
- Ammonia [air, unspecified]: 6.58337e-8 kg; lognormal variance with pedigree 0.0413, pedigree (2,2,1,1,2)
  (same comment as for hydrochloric acid, without water, in 30% solution state)
- Carbon dioxide, fossil [air, unspecified]: 0.000467667 kg; lognormal variance with pedigree 0.0019, pedigree (2,2,1,1,2)
  (same comment as for hydrochloric acid, without water, in 30% solution state)
- Carbon monoxide, fossil [air, unspecified]: 6.11847e-7 kg; lognormal variance with pedigree 0.6513, pedigree (2,2,1,1,2)
  (same comment as for hydrochloric acid, without water, in 30% solution state)
- Chlorine [air, unspecified]: 1.04013e-7 kg; lognormal variance with pedigree 0.0413, pedigree (2,2,1,1,2)
  (same comment as for hydrochloric acid, without water, in 30% solution state)
- Chloro-fluoromethane [air, unspecified]: 2.05678e-8 kg; lognormal variance with pedigree 0.1213, pedigree (2,2,1,1,2)
  (same comment as for hydrochloric acid, without water, in 30% solution state)
- Difluoromethane [air, unspecified]: 3.10745e-8 kg; lognormal variance with pedigree 0.1213, pedigree (2,2,1,1,2)
  (same comment as for hydrochloric acid, without water, in 30% solution state)
- Dinitrogen monoxide [air, unspecified]: 2.87866e-9 kg; lognormal variance with pedigree 0.0413, pedigree (2,2,1,1,2)
  (same comment as for hydrochloric acid, without water, in 30% solution state)
- Hydrochloric acid [air, unspecified]: 1.44681e-7 kg; lognormal variance with pedigree 0.0413, pedigree (2,2,1,1,2)
  (same comment as for hydrochloric acid, without water, in 30% solution state)
- Hydrogen [air, unspecified]: 0.00105078 kg; lognormal variance with pedigree 0.0413, pedigree (2,2,1,1,2)
  (same comment as for hydrochloric acid, without water, in 30% solution state)
- Mercury II [air, unspecified]: 6.25796e-12 kg; lognormal variance with pedigree 0.6513, pedigree (2,2,1,1,2)
  (same comment as for hydrochloric acid, without water, in 30% solution state)
- Methane, fossil [air, unspecified]: 4.15946e-9 kg; lognormal variance with pedigree 0.0413, pedigree (2,2,1,1,2)
  (same comment as for hydrochloric acid, without water, in 30% solution state)
- Nitrogen oxides [air, unspecified]: 1.27572e-6 kg; lognormal variance with pedigree 0.0413, pedigree (2,2,1,1,2)
  (same comment as for hydrochloric acid, without water, in 30% solution state)
- Particulate Matter, < 2.5 um [air, unspecified]: 3.50446e-10 kg; lognormal variance with pedigree 0.3013, pedigree (2,2,1,1,2)
  (same comment as for hydrochloric acid, without water, in 30% solution state)
- Particulate Matter, > 10 um [air, unspecified]: 2.11533e-6 kg; lognormal variance with pedigree 0.0413, pedigree (2,2,1,1,2)
  (same comment as for hydrochloric acid, without water, in 30% solution state)
- Particulate Matter, > 2.5 um and < 10um [air, unspecified]: 1.22656e-9 kg; lognormal variance with pedigree 0.1213, pedigree (2,2,1,1,2)
  Proxy for PFPE (perfluoropolyether).
  Literature data, representative for min. 75 % of European (EU + GB, NO, CH) production capacity, based on installed nameplate capacity.
  Based on EuroChlor (2022): Chlorine (The Chlor-Alkali Process), An Eco-Profile and Environmental Product Declaration of the European Chlor-Alkali Industry.
- Sulfur oxides [air, unspecified]: 2.08599e-11 kg; lognormal variance with pedigree 0.0413, pedigree (2,2,1,1,2)
  (same comment as for hydrochloric acid, without water, in 30% solution state)
- 1,1,1-Trichloroethane [water, unspecified]: 6.7586e-10 kg; lognormal variance with pedigree 0.3013, pedigree (2,2,1,1,2)
  Proxy for chloroorganics.
  Literature data, representative for min. 75 % of European (EU + GB, NO, CH) production capacity, based on installed nameplate capacity.
  Based on EuroChlor (2022): Chlorine (The Chlor-Alkali Process), An Eco-Profile and Environmental Product Declaration of the European Chlor-Alkali Industry.
- 2-Chlorophenol [water, unspecified]: 2.50318e-11 kg; lognormal variance with pedigree 0.3013, pedigree (2,2,1,1,2)
  Proxy for pentachlorophenol.
  Literature data, representative for min. 75 % of European (EU + GB, NO, CH) production capacity, based on installed nameplate capacity.
  Based on EuroChlor (2022): Chlorine (The Chlor-Alkali Process), An Eco-Profile and Environmental Product Declaration of the European Chlor-Alkali Industry.
- AOX, Adsorbable Organic Halides [water, unspecified]: 3.44762e-7 kg; lognormal variance with pedigree 0.3013, pedigree (2,2,1,1,2)
  (same comment as for hydrochloric acid, without water, in 30% solution state)
- Aluminium III [water, unspecified]: 3.06689e-8 kg; lognormal variance with pedigree 0.6513, pedigree (2,2,1,1,2)
  (same comment as for hydrochloric acid, without water, in 30% solution state)
- Ammonium [water, unspecified]: 2.06126e-8 kg; lognormal variance with pedigree 0.0413, pedigree (2,2,1,1,2)
  (same comment as for hydrochloric acid, without water, in 30% solution state)
- Arsenic ion [water, unspecified]: 7.26257e-10 kg; lognormal variance with pedigree 0.6513, pedigree (2,2,1,1,2)
  (same comment as for hydrochloric acid, without water, in 30% solution state)
- BOD5, Biological Oxygen Demand [water, unspecified]: 2.59553e-7 kg; lognormal variance with pedigree 0.0413, pedigree (2,2,1,1,2)
  (same comment as for hydrochloric acid, without water, in 30% solution state)
- Bromate [water, unspecified]: 4.64645e-8 kg; lognormal variance with pedigree 0.0413, pedigree (2,2,1,1,2)
  (same comment as for hydrochloric acid, without water, in 30% solution state)
- COD, Chemical Oxygen Demand [water, unspecified]: 3.39733e-6 kg; lognormal variance with pedigree 0.0413, pedigree (2,2,1,1,2)
  (same comment as for hydrochloric acid, without water, in 30% solution state)
- Cadmium II [water, unspecified]: 1.18901e-11 kg; lognormal variance with pedigree 0.6513, pedigree (2,2,1,1,2)
  (same comment as for hydrochloric acid, without water, in 30% solution state)
- Carbon tetrachloride [water, unspecified]: 1.18275e-11 kg; lognormal variance with pedigree 0.3013, pedigree (2,2,1,1,2)
  (same comment as for hydrochloric acid, without water, in 30% solution state)
- Chlorate [water, unspecified]: 0.000115505 kg; lognormal variance with pedigree 0.0413, pedigree (2,2,1,1,2)
  (same comment as for hydrochloric acid, without water, in 30% solution state)
- Chloride [water, unspecified]: 0.0125348 kg; lognormal variance with pedigree 0.0413, pedigree (2,2,1,1,2)
  (same comment as for hydrochloric acid, without water, in 30% solution state)
- Chlorine [water, unspecified]: 5.8436e-8 kg; lognormal variance with pedigree 0.0413, pedigree (2,2,1,1,2)
  (same comment as for hydrochloric acid, without water, in 30% solution state)
- Chloroform [water, unspecified]: 2.04623e-8 kg; lognormal variance with pedigree 0.3013, pedigree (2,2,1,1,2)
  Proxy for trichloromethane.
  Literature data, representative for min. 75 % of European (EU + GB, NO, CH) production capacity, based on installed nameplate capacity.
  Based on EuroChlor (2022): Chlorine (The Chlor-Alkali Process), An Eco-Profile and Environmental Product Declaration of the European Chlor-Alkali Industry.
- Chromium III [water, unspecified]: 7.3779e-9 kg; lognormal variance with pedigree 0.6513, pedigree (2,2,1,1,2)
  (same comment as for hydrochloric acid, without water, in 30% solution state)
- Copper ion [water, unspecified]: 2.7366e-8 kg; lognormal variance with pedigree 0.6513, pedigree (2,2,1,1,2)
  (same comment as for hydrochloric acid, without water, in 30% solution state)
- Cyanide [water, unspecified]: 1.70796e-9 kg; lognormal variance with pedigree 0.0413, pedigree (2,2,1,1,2)
  (same comment as for hydrochloric acid, without water, in 30% solution state)
- DOC, Dissolved Organic Carbon [water, unspecified]: 1.03195e-6 kg; lognormal variance with pedigree 0.0413, pedigree (2,2,1,1,2)
  Assumption DOC = TOC.
- Dichloromethane [water, surface water]: 8.01019e-10 kg; lognormal variance with pedigree 0.0413, pedigree (2,2,1,1,2)
  (same comment as for hydrochloric acid, without water, in 30% solution state)
- Dioxins, measured as 2,3,7,8-tetrachlorodibenzo-p-dioxin [water, unspecified]: 4.23455e-11 kg; lognormal variance with pedigree 0.3013, pedigree (2,2,1,1,2)
  (same comment as for hydrochloric acid, without water, in 30% solution state)
- Fluoride [water, unspecified]: 8.52172e-8 kg; lognormal variance with pedigree 0.0413, pedigree (2,2,1,1,2)
  (same comment as for hydrochloric acid, without water, in 30% solution state)
- Hexachlorobenzene [water, unspecified]: 5.80321e-9 kg; lognormal variance with pedigree 0.3013, pedigree (2,2,1,1,2)
  (same comment as for hydrochloric acid, without water, in 30% solution state)
- Iron ion [water, unspecified]: 2.62607e-7 kg; lognormal variance with pedigree 0.6513, pedigree (2,2,1,1,2)
  (same comment as for hydrochloric acid, without water, in 30% solution state)
- Lead II [water, unspecified]: 1.2393e-9 kg; lognormal variance with pedigree 0.6513, pedigree (2,2,1,1,2)
  (same comment as for hydrochloric acid, without water, in 30% solution state)
- Mercury II [water, unspecified]: 2.71876e-9 kg; lognormal variance with pedigree 0.6513, pedigree (2,2,1,1,2)
  (same comment as for hydrochloric acid, without water, in 30% solution state)
- Nickel II [water, unspecified]: 1.32595e-8 kg; lognormal variance with pedigree 0.6513, pedigree (2,2,1,1,2)
  (same comment as for hydrochloric acid, without water, in 30% solution state)
- Nitrate [water, unspecified]: 2.73676e-6 kg; lognormal variance with pedigree 0.0413, pedigree (2,2,1,1,2)
  (same comment as for hydrochloric acid, without water, in 30% solution state)
- Nitrogen [water, unspecified]: 9.29538e-7 kg; lognormal variance with pedigree 0.0413, pedigree (2,2,1,1,2)
  (same comment as for hydrochloric acid, without water, in 30% solution state)
- Pentachlorobenzene [water, unspecified]: 1.03507e-8 kg; lognormal variance with pedigree 0.0413, pedigree (2,2,1,1,2)
  (same comment as for hydrochloric acid, without water, in 30% solution state)
- Phenol [water, unspecified]: 5.87831e-11 kg; lognormal variance with pedigree 0.3013, pedigree (2,2,1,1,2)
  (same comment as for hydrochloric acid, without water, in 30% solution state)
- Phosphorus [water, unspecified]: 1.30544e-7 kg; lognormal variance with pedigree 0.0413, pedigree (2,2,1,1,2)
  (same comment as for hydrochloric acid, without water, in 30% solution state)
- Sodium I [water, unspecified]: 0.000120875 kg; lognormal variance with pedigree 0.6513, pedigree (2,2,1,1,2)
  (same comment as for hydrochloric acid, without water, in 30% solution state)
- Sulfate [water, unspecified]: 0.000725297 kg; lognormal variance with pedigree 0.0413, pedigree (2,2,1,1,2)
  (same comment as for hydrochloric acid, without water, in 30% solution state)
- Suspended solids, unspecified [water, unspecified]: 4.97017e-6 kg; lognormal variance with pedigree 0.3013, pedigree (2,2,1,1,2)
  (same comment as for hydrochloric acid, without water, in 30% solution state)
- TOC, Total Organic Carbon [water, unspecified]: 1.03195e-6 kg; lognormal variance with pedigree 0.0413, pedigree (2,2,1,1,2)
  (same comment as for hydrochloric acid, without water, in 30% solution state)
- Tetrachloroethylene [water, unspecified]: 3.7965e-11 kg; lognormal variance with pedigree 0.3013, pedigree (2,2,1,1,2)
  (same comment as for hydrochloric acid, without water, in 30% solution state)
- Tin ion [water, unspecified]: 6.9264e-11 kg; lognormal variance with pedigree 0.6513, pedigree (2,2,1,1,2)
  (same comment as for hydrochloric acid, without water, in 30% solution state)
- Tributyltin compounds [water, unspecified]: 2.35091e-10 kg; lognormal variance with pedigree 0.6513, pedigree (2,2,1,1,2)
  Proxy for organotin compounds.
  Literature data, representative for min. 75 % of European (EU + GB, NO, CH) production capacity, based on installed nameplate capacity.
  Based on EuroChlor (2022): Chlorine (The Chlor-Alkali Process), An Eco-Profile and Environmental Product Declaration of the European Chlor-Alkali Industry.
- Water [water, ocean]: 0.00124677 m3; lognormal variance with pedigree 0.0019, pedigree (2,2,1,1,2)
  (same comment as for hydrochloric acid, without water, in 30% solution state)
- Water [water, surface water]: 0.00841605 m3; lognormal variance with pedigree 0.0019, pedigree (2,2,1,1,2)
  (same comment as for hydrochloric acid, without water, in 30% solution state)
- Water [water, unspecified]: 0.00226117 m3; lognormal variance with pedigree 0.0019, pedigree (2,2,1,1,2)
  (same comment as for hydrochloric acid, without water, in 30% solution state)
- Zinc II [water, unspecified]: 2.94087e-7 kg; lognormal variance with pedigree 0.6513, pedigree (2,2,1,1,2)
  (same comment as for hydrochloric acid, without water, in 30% solution state)
