# soybean production

Dataset: EcoSpold 2, unit process
Geography: US-NE
Time period: 2014-01-01 to 2023-12-31
Technology level: current
Classification: ISIC rev.4 ecoinvent: 0111:Growing of cereals (except rice), leguminous crops and oil seeds
Synonyms: soya, soybean cultivation, soy production
Scenario: Business-as-Usual
System model: Allocation, cut-off by classification
Generated by: Juanita Barrera
Database: ecoinvent
isCopyrightProtected: true
accessRestrictedTo: 1

## General comment
This dataset represents the production of 1 kg of soybean (fresh matter) in the US state of Nebraska at farm, with a pre-drying moisture content of 14.5%. This dataset includes cultivation of the field prior to planting, field treatments, planting, applications of nutrients and pesticides, and harvest.
The average yield of soybean grown in Nebraska for the 2014-2021 seasons was 3,954 kg/ha (wet mass) (USDA NASS (2021)). The dataset reflects the average soybean produced in Nebraska from 2014 to 2021, inclusive, as that period allows for at least one value from USDA statistics for most parameters and generally three or more. It reflects the mix of tillage practices (44% no till, 41% reduced till, 15% conventional tillage) (CTIC (2020a) ) and rotations (100% in rotation with maize) for soy bean. About 95% of planted soybean is genetically engineered for herbicide tolerance (USDA NASS 2022). This dataset reflects practices consistent with that.
Area, productivity, use of mineral and organic fertilisers and pesticides, and irrigation inputs are based on farmer data reported to the U.S. Department of Agriculture. Because soybean is primarily grown in annual rotation with maize, lime use is based on soil pH and guidance from agricultural extension offices for maize cultivation and its application is associated with the maize production system; this dataset does not include lime application attributed to soybean. Field operations and equipment types and fuel use are based on materials provided to growers by the agricultural extension office(s), including farm budgets, and on survey information agricultural extension office(s) collect from growers, in conjunction with row spacing data from USDA. Drainage (tile or ditch) is installed on 63.6% based on state-level agricultural survey data from USDA. Irrigation is included based on share of crop irrigated (73.7% over the time period, USDA NASS (2018)). Chemigation is included in this and is not treated as an additional operation.
Area cultivated for soybean in Nebraska increased by 14% between 2000 and 2021 (USDA NASS data, 5 year rolling averages) US NRCS data indicates that total cropland in Nebraska has expanded over the same period by 4% (NRCS 2020a). The expansion of cropland for all crops in Nebraska in this period was supplied 86% from CRP land, 12% from Rangeland, 2% from Forest land The total cropland change 1997 to 2017 was 4.4% for all crops in Nebraska (NRCS 2020a).
Soil characteristics are based on IFA soil survey data (pH) and NRCS and USGS analysis (SOM, clay, slope). No anti-erosion practices are assumed in the dataset; instead, the erosion soil loss reported in the U.S. Natural Resources Conservation Service's Natural Resource Inventory is used.
References: USDA NASS (2021) Area, Production, Yield by State - Soybean - 2010-2021. US Department of Agriculture (USDA) National Agricultural Statistics Service. https://quickstats.nass.usda.gov (direct query: https://quickstats.nass.usda.gov/results/331F88CC-004E-34D2-B825-F8F65DAC7879)
USDA NASS (2018) 2018 Irrigation and Water Management Survey (2017 Census of Agriculture). US Department of Agriculture (USDA). https://www.nass.usda.gov/Publications/AgCensus/2017/Online_Resources/Farm_and_Ranch_Irrigation_Survey/index.php
NRCS (2020a) Land Cover/use of non-Federal rural land, by State and year, in the 2017 National Resources Inventory. USDA, Natural Resources Conservation Service. http://www.nrcs.usda.gov/Internet/NRCS_RCA/reports/nri_crop_nat.html, https://www.nrcs.usda.gov/wps/portal/nrcs/rca/national/technical/nra/rca/text/#NRI%20Cropland
CTIC (2020a) OpTIS - Operational Tillage Information System. Conservation Technology Information Center (CTIC). https://www.ctic.org/optis_tabular_query accessed March 23, 2021
Iowa Soil Survey & Digital Soil Data: ISPAID. Version 8.1.1 (2017). https://www.extension.iastate.edu/soils/ispaid

## Included activities start
This activity starts with soil cultivation after the harvest of the previous crop.

## Included activities end
This dataset includes cultivation of the field prior to planting, field treatments, planting, applications of nutrients and pesticides, and harvest. It ends with harvested maize grain at the farm gate, prior to storage.

## Geography
Production of soy bean in Nebraska (US-NE).

## Technology
This dataset reflects current practice for soy bean in Nebraska as of 2022.

## Time period
The valid period covers 2014-01-01 through 2021-12-31 based on primary data sources. The production volumes, areas and applications are covered by data throughout the time period (annual for production and area, alternate years for applications). Due to disruption in 2020, some USDA data was reported for 2021 instead. Because the specific pesticides used show time-dependent trends, the most recent 3 years of data are used to avoid underweighting the most dominant pesticides currently used and to avoid skewing impacts based on compounds no longer in use. Field operations are based on current enterprise crop budgets and change little year to year. Data for manure applications were only available for time periods prior to the valid period but represent the best available option.

## Reference product
- soybean: 1 kg; By-product classification allocatable product; CPC 01412: Soya beans, other; HS2017 120110: Soya beans; seed, whether or not broken
  This dataset represents the production of 1 kg of soy bean (fresh matter) in the US state of Nebraska at farm, with a pre-drying moisture content of 14.5%. This dataset includes cultivation of the field prior to planting, field treatments, planting, applications of nutrients and pesticides, and harvest.
  production volume 1.0304e7 kg; name pv_soy
    Average annual production of soybean in Nebraska 2017-2021: 10.3 Mt/year (source SOY, BEAN - PRODUCTION, MEASURED IN Metric Tonne (converted from BU) US Department of Agriculture (USDA NASS) 2021a (direct query https://quickstats.nass.usda.gov/results/331F88CC-004E-34D2-B825-F8F65DAC7879)
  property carbon content, non-fossil 0.47886
    Biogene carbon content of soybean on a dry matter basis 51.778%
    Carbon content of biomass fractions from Rouwenhorst, Frank Jzn, Scheffers & van Dijken 1991 (carbohydrates and proteins) and Nemecek and Kägi 2007 (lipids, fibres ash). Carbohydrate, protein, lipid and fibre contents of from Feedipedia.
    Sources:Heuzé V., Tran G., Nozière P., Lessire M., Lebas F. (2017) Soybean seeds. Feedipedia, a programme by INRAE, CIRAD, AFZ and FAO. https://www.feedipedia.org/node/42 Last updated on July 4, 2017, 10:37. .
    Rouwenhorst, Frank Jzn, Scheffers & van Dijken (1991) Determination of protein concentration by total organic carbon analysis. Journal of Biochemical and Biophysical Methods, 22:119–128.. . https://www.sciencedirect.com/science/article/abs/pii/0165022X9190024Q
    Nemecek T. & Kägi T. (2007) Life Cycle Inventories of Swiss and European Agricultural Production Systems. Final report ecoinvent V2.0 No. 15a. Agroscope Reckenholz-Taenikon Research Station ART, Swiss Centre for Life Cycle Inventories, Zurich and Dübendorf, Switzerland, retrieved from: www.ecoinvent.ch. .
  property energy content 15.9851 MJ
    The gross energy content of soybean is 18.7MJ/kg on a dry matter basis, 87.2% dry matter as fed for North American soybean (Feedipedia - soybean 2017). At the harvest moisture content of 13.1% (2014-2021, USDA NASS 2021a), the energy content of soybean is 16.3MJ/kg product weight.
    Source(s):
    Heuzé V., Tran G., Lebas F. (2017) Maize grain. Feedipedia, a programme by INRAE, CIRAD, AFZ and FAO. https://www.feedipedia.org/node/556 Last updated on September 7, 2017, 14:29. .
    USDA NASS (2021) SOYBEAN, AT HARVEST, GRAIN - MOISTURE, 5 YEAR AVG, MEASURED IN PCT. US Department of Agriculture (USDA). https://quickstats.nass.usda.gov (direct query: https://quickstats.nass.usda.gov/results/13FC0C89-E211-3D0B-A9C5-BCFC35728512)
  property price 0.256916 EUR2005
    The price per kg of soybean is considered for the years 2014-2021 for the state of Nebraska in the US. The values were retrieved in $/BU [1] and converted into $/kg considering a conversion factor of 1/27.22 [2]. References: [1] US Department of Agriculture (NASS), Quickstat, TabLe "SOYBEANS - PRICE RECEIVED, MEASURED IN $ / BU", accessed on 25.08.2023, available at: https://quickstats.nass.usda.gov/ [2] https://www.rayglen.com/grain-conversion-calculator/
    The prices were converted to EUR based on the annual exchange rates published by the European Central Bank (https://sdw.ecb.europa.eu/quickview.do?SERIES_KEY=120.EXR.A.AUD.EUR.SP00.A, last accessed on 2023-06-01) and adjusted for inflation relative to 2005 using the producer price index (PPI) of the euro area, published by eurostat (https://ec.europa.eu/eurostat/databrowser/view/STS_INPP_A__custom_6416181/default/table?lang=en, last accessed on 2023-06-01).
  properties: carbon allocation 0.409339 kg, carbon content 0.47886, carbon content, fossil 0, dry mass 0.854819 kg, water content 0.169839, water in wet mass 0.145181 kg, wet mass 1 kg
## Inputs from technosphere
- NPK (15-15-15) fertiliser: 0.000309642 kg; normal variance with pedigree 7.078e-9, pedigree (2,1,2,1,1)
  3.1E-4 kg NPK (15-15-15) fertiliser/kg soybean
  Quantities of specific fertiliser are calculated based on US fertiliser market share and nutrient compositions from IFA data to meet total nutrient demand N-P-K-S: 2.86--13.38--1.18--0.77 kg/ha (USDA NASS data for 2015, 2017, 2018, 2020), over reported cropped area of specified crop (includes all rotation patterns): quantity of N applied to treated acres times percent of planted soy bean acres treated (USDA NASS) times share of N supplied by compound in U.S. consumption mix (ecoinvent and IFA 2019) times mass compound per mass N in compound.
  Sources:
  USDA NASS (2021) SOYBEAN- APPLICATIONS, MEASURED IN LB / ACRE / YEAR, AVG (fertilizer and pesticides, amount, number of applications) - 2000-2021. US Department of Agriculture (USDA) National Agricultural Statistics Service. https://quickstats.nass.usda.gov (direct query: https://quickstats.nass.usda.gov/results/1D738304-38A8-3977-B7BA-B67A7AF33530) ; Ecoinvent U.S. consumption mix for N fertilisers, from IFA data; IFA (2021) Nutrient content in percentage - IFA Fertilizer Converter. International Fertilizer Association. https://www.ifastat.org/converter/fertilizer-converter/ accessed 2021-06-24
  properties: dry mass 1 kg, nitrogen content 0.15, phosphorus content 0.15, potassium content 0.15, wet mass 1 kg
  note on nitrogen content: Nitrogen content (on a dry matter basis) of NPK (15-15-15) fertiliser is calculated from the molecular formula of the substance ().
  note on phosphorus content: Phosphorus content (on a dry matter basis) of NPK (15-15-15) fertiliser is calculated from the molecular formula of the substance ().
  note on potassium content: Potassium content (on a dry matter basis) of NPK (15-15-15) fertiliser is calculated from the molecular formula of the substance ().
- [sulfonyl]urea-compound: 2.76048e-5 kg; normal variance with pedigree 1.18709e-13, pedigree (1,2,2,1,1)
  This exchange is an aggregate of proxies for applied pesticide(s) Chlorimuron, Fomesafen, Fomesafen Sodium, Saflufenacil, Sulfentrazone, Thifensulfuron, Tribenuron (3.187E-3 kg/ha {1,2,1,1,1}; 1.435E-3 kg/ha {1,4,1,1,1}; 3.328E-2 kg/ha {1,2,1,1,1}; 2.547E-3 kg/ha {1,2,1,1,1}; 6.548E-2 kg/ha {1,4,1,1,1}; 1.014E-3 kg/ha {1,2,1,1,1}; 2.221E-3 kg/ha {1,2,1,1,1}, respectively).
  Average over state-wide reported cropped area of soybean for all tillage practices (CTIC 2020a) and across all rotation patterns (Socolar et al 2021 ) - calculated from specified herbicide/insecticide/fungicide quantity applied to treated acres weighted by share of acres treated with that herbicide/insecticide/fungicide (2015,2017,2018,2020-USDA NASS data, USDA NASS 2021e).
  Sources:
  CTIC (2020a) OpTIS - Operational Tillage Information System. Conservation Technology Information Center (CTIC). https://www.ctic.org/optis_tabular_query accessed March 23, 2021
  Socolar Y, Goldstein B R, de Valpine P, Bowles T M (2021) Biophysical and policy factors predict simplified crop rotations in the US Midwest. Environ. Res. Lett. 16 054045. https://iopscience.iop.org/article/10.1088/1748-9326/abf9ca
  USDA NASS (2021) SOYBEAN- APPLICATIONS, MEASURED IN LB / ACRE / YEAR, AVG (fertilizer and pesticides, amount, number of applications) - 2000-2021. US Department of Agriculture (USDA) National Agricultural Statistics Service. https://quickstats.nass.usda.gov (direct query: https://quickstats.nass.usda.gov/results/1D738304-38A8-3977-B7BA-B67A7AF33530)
  USDA NASS (2021) Applications - fertilizers and pesticides - number, amount, - Soybean, Illinois - 2000-2021. US Department of Agriculture (USDA) National Agricultural Statistics Service. https://quickstats.nass.usda.gov (direct query: https://quickstats.nass.usda.gov/results/CBB93A96-1EAC-3BFF-87F0-5E4AECFE034D)
  properties: carbon content, fossil 0.540853, dry mass 1 kg, wet mass 1 kg
- [thio]carbamate-compound: 2.06624e-5 kg; normal variance with pedigree 2.52081e-13, pedigree (1,2,2,1,1)
  This exchange is an aggregate of proxies for applied pesticide(s) Clethodim, Pyroxasulfone, Mesotrione (3.799E-2 kg/ha {1,2,1,1,1}; 2.168E-2 kg/ha {1,2,1,1,1}; 2.203E-2 kg/ha {1,2,1,1,1}, respectively).
  Average over state-wide reported cropped area of soybean for all tillage practices (CTIC 2020a) and across all rotation patterns (Socolar et al 2021 ) - calculated from specified herbicide/insecticide/fungicide quantity applied to treated acres weighted by share of acres treated with that herbicide/insecticide/fungicide (2015,2017,2018,2020-USDA NASS data, USDA NASS 2021e).
  Sources:
  CTIC (2020a) OpTIS - Operational Tillage Information System. Conservation Technology Information Center (CTIC). https://www.ctic.org/optis_tabular_query accessed March 23, 2021
  Socolar Y, Goldstein B R, de Valpine P, Bowles T M (2021) Biophysical and policy factors predict simplified crop rotations in the US Midwest. Environ. Res. Lett. 16 054045. https://iopscience.iop.org/article/10.1088/1748-9326/abf9ca
  USDA NASS (2021) SOYBEAN- APPLICATIONS, MEASURED IN LB / ACRE / YEAR, AVG (fertilizer and pesticides, amount, number of applications) - 2000-2021. US Department of Agriculture (USDA) National Agricultural Statistics Service. https://quickstats.nass.usda.gov (direct query: https://quickstats.nass.usda.gov/results/1D738304-38A8-3977-B7BA-B67A7AF33530)
  USDA NASS (2021) Applications - fertilizers and pesticides - number, amount, - Soybean, Illinois - 2000-2021. US Department of Agriculture (USDA) National Agricultural Statistics Service. https://quickstats.nass.usda.gov (direct query: https://quickstats.nass.usda.gov/results/CBB93A96-1EAC-3BFF-87F0-5E4AECFE034D)
  properties: carbon content, fossil 0.626349, dry mass 1 kg, wet mass 1 kg
- acetamide-anillide-compound, unspecified: 3.79395e-5 kg; normal variance with pedigree 2.86538e-12, pedigree (1,2,2,1,1)
  This exchange is an aggregate of proxies for applied pesticide(s) Acetochlor, Dimethenamid-P, Flumioxazin (1.002E-1 kg/ha {1,2,1,1,1}; 3.252E-2 kg/ha {1,2,1,1,1}; 1.726E-2 kg/ha {1,2,1,1,1}, respectively).
  Average over state-wide reported cropped area of soybean for all tillage practices (CTIC 2020a) and across all rotation patterns (Socolar et al 2021 ) - calculated from specified herbicide/insecticide/fungicide quantity applied to treated acres weighted by share of acres treated with that herbicide/insecticide/fungicide (2015,2017,2018,2020-USDA NASS data, USDA NASS 2021e).
  Sources:
  CTIC (2020a) OpTIS - Operational Tillage Information System. Conservation Technology Information Center (CTIC). https://www.ctic.org/optis_tabular_query accessed March 23, 2021
  Socolar Y, Goldstein B R, de Valpine P, Bowles T M (2021) Biophysical and policy factors predict simplified crop rotations in the US Midwest. Environ. Res. Lett. 16 054045. https://iopscience.iop.org/article/10.1088/1748-9326/abf9ca
  USDA NASS (2021) SOYBEAN- APPLICATIONS, MEASURED IN LB / ACRE / YEAR, AVG (fertilizer and pesticides, amount, number of applications) - 2000-2021. US Department of Agriculture (USDA) National Agricultural Statistics Service. https://quickstats.nass.usda.gov (direct query: https://quickstats.nass.usda.gov/results/1D738304-38A8-3977-B7BA-B67A7AF33530)
  USDA NASS (2021) Applications - fertilizers and pesticides - number, amount, - Soybean, Illinois - 2000-2021. US Department of Agriculture (USDA) National Agricultural Statistics Service. https://quickstats.nass.usda.gov (direct query: https://quickstats.nass.usda.gov/results/CBB93A96-1EAC-3BFF-87F0-5E4AECFE034D)
  properties: carbon content, fossil 0.659175, dry mass 1 kg, wet mass 1 kg
- ammonia, anhydrous, liquid: 0.000218136 kg; normal variance with pedigree 3.51274e-9, pedigree (2,1,2,1,1)
  2.18E-4 kg ammonia, anhydrous, liquid/kg soybean
  Quantities of specific fertiliser are calculated based on US fertiliser market share and nutrient compositions from IFA data to meet total nutrient demand N-P-K-S: 2.86--13.38--1.18--0.77 kg/ha (USDA NASS data for 2015, 2017, 2018, 2020), over reported cropped area of specified crop (includes all rotation patterns): quantity of N applied to treated acres times percent of planted soy bean acres treated (USDA NASS) times share of N supplied by compound in U.S. consumption mix (ecoinvent and IFA 2019) times mass compound per mass N in compound.
  Sources:
  USDA NASS (2021) SOYBEAN- APPLICATIONS, MEASURED IN LB / ACRE / YEAR, AVG (fertilizer and pesticides, amount, number of applications) - 2000-2021. US Department of Agriculture (USDA) National Agricultural Statistics Service. https://quickstats.nass.usda.gov (direct query: https://quickstats.nass.usda.gov/results/1D738304-38A8-3977-B7BA-B67A7AF33530) ; Ecoinvent U.S. consumption mix for N fertilisers, from IFA data; IFA (2021) Nutrient content in percentage - IFA Fertilizer Converter. International Fertilizer Association. https://www.ifastat.org/converter/fertilizer-converter/ accessed 2021-06-24
  properties: dry mass 1 kg, wet mass 1 kg
- ammonium nitrate: 3.35152e-5 kg; normal variance with pedigree 8.29228e-11, pedigree (2,1,2,1,1)
  3.35E-5 kg ammonium nitrate/kg soybean
  Quantities of specific fertiliser are calculated based on US fertiliser market share and nutrient compositions from IFA data to meet total nutrient demand N-P-K-S: 2.86--13.38--1.18--0.77 kg/ha (USDA NASS data for 2015, 2017, 2018, 2020), over reported cropped area of specified crop (includes all rotation patterns): quantity of N applied to treated acres times percent of planted soy bean acres treated (USDA NASS) times share of N supplied by compound in U.S. consumption mix (ecoinvent and IFA 2019) times mass compound per mass N in compound.
  Sources:
  USDA NASS (2021) SOYBEAN- APPLICATIONS, MEASURED IN LB / ACRE / YEAR, AVG (fertilizer and pesticides, amount, number of applications) - 2000-2021. US Department of Agriculture (USDA) National Agricultural Statistics Service. https://quickstats.nass.usda.gov (direct query: https://quickstats.nass.usda.gov/results/1D738304-38A8-3977-B7BA-B67A7AF33530) ; Ecoinvent U.S. consumption mix for N fertilisers, from IFA data; IFA (2021) Nutrient content in percentage - IFA Fertilizer Converter. International Fertilizer Association. https://www.ifastat.org/converter/fertilizer-converter/ accessed 2021-06-24
  properties: dry mass 1 kg, wet mass 1 kg
- ammonium nitrate phosphate: 3.03176e-5 kg; normal variance with pedigree 6.78548e-11, pedigree (2,1,2,1,1)
  3.03E-5 kg ammonium nitrate phosphate/kg soybean
  Quantities of specific fertiliser are calculated based on US fertiliser market share and nutrient compositions from IFA data to meet total nutrient demand N-P-K-S: 2.86--13.38--1.18--0.77 kg/ha (USDA NASS data for 2015, 2017, 2018, 2020), over reported cropped area of specified crop (includes all rotation patterns): quantity of N applied to treated acres times percent of planted soy bean acres treated (USDA NASS) times share of N supplied by compound in U.S. consumption mix (ecoinvent and IFA 2019) times mass compound per mass N in compound.
  Sources:
  USDA NASS (2021) SOYBEAN- APPLICATIONS, MEASURED IN LB / ACRE / YEAR, AVG (fertilizer and pesticides, amount, number of applications) - 2000-2021. US Department of Agriculture (USDA) National Agricultural Statistics Service. https://quickstats.nass.usda.gov (direct query: https://quickstats.nass.usda.gov/results/1D738304-38A8-3977-B7BA-B67A7AF33530) ; Ecoinvent U.S. consumption mix for N fertilisers, from IFA data; IFA (2021) Nutrient content in percentage - IFA Fertilizer Converter. International Fertilizer Association. https://www.ifastat.org/converter/fertilizer-converter/ accessed 2021-06-24
  properties: dry mass 1 kg, nitrogen content 0.22, phosphorus content 0.0960126, wet mass 1 kg
  note on nitrogen content: Nitrogen content (on a dry matter basis) of ammonium nitrate phosphate is calculated from the molecular formula of the nutrient present in the substance.
  note on phosphorus content: Phosphorus content (on a dry matter basis) of ammonium nitrate phosphate is calculated from the molecular formula of the nutrient present in the substance.
- ammonium sulfate: 0.000109783 kg; normal variance with pedigree 8.8973e-10, pedigree (2,1,2,1,1)
  1.1E-4 kg ammonium sulfate/kg soybean
  Quantities of specific fertiliser are calculated based on US fertiliser market share and nutrient compositions from IFA data to meet total nutrient demand N-P-K-S: 2.86--13.38--1.18--0.77 kg/ha (USDA NASS data for 2015, 2017, 2018, 2020), over reported cropped area of specified crop (includes all rotation patterns): quantity of N applied to treated acres times percent of planted soy bean acres treated (USDA NASS) times share of N supplied by compound in U.S. consumption mix (ecoinvent and IFA 2019) times mass compound per mass N in compound.
  Sources:
  USDA NASS (2021) SOYBEAN- APPLICATIONS, MEASURED IN LB / ACRE / YEAR, AVG (fertilizer and pesticides, amount, number of applications) - 2000-2021. US Department of Agriculture (USDA) National Agricultural Statistics Service. https://quickstats.nass.usda.gov (direct query: https://quickstats.nass.usda.gov/results/1D738304-38A8-3977-B7BA-B67A7AF33530) ; Ecoinvent U.S. consumption mix for N fertilisers, from IFA data; IFA (2021) Nutrient content in percentage - IFA Fertilizer Converter. International Fertilizer Association. https://www.ifastat.org/converter/fertilizer-converter/ accessed 2021-06-24
  properties: dry mass 1 kg, wet mass 1 kg
- application of plant protection product, by airplane: 3.20337e-5 ha; lognormal variance with pedigree 0.0206, pedigree (4,4,3,1,3)
  0.1267 ha/ha (3.2E-5 ha/kg soybean) application of plant protection product, by airplane
  The dataset has an effective number of passes for application of pesticides of 0.36 ha: 1.10 applications of herbicides on 18.9% of cropped area, 1.00 applications of insecticides on 8.2% of cropped area, 1.00 applications of fungicides on 7.4% of cropped area (USDA NASS 2021e). Application by sprayer accounts for 65% (0.24passes) and aircraft for 35% (0.13 passes). The budgets for soybean in Nebraska do not provide information for aerial pesticide application as an individual operation. However, aerial application is in common use in Nebraska. An aerial pesticide application rate of 35% has been estimated from custom rate surveys for contracted farm operations (Crop Science Extension & Outreach, University of Illinois 2012; University of Kentucky Extension n.d.; Crop Science Extension & Outreach, University of Illinois (2012) Illinois Agronomy Handbook. Crop Science Extension & Outreach, University of Illinois . http://extension.cropsciences.illinois.edu/handbook/ ; University of Kentucky Extension (n.d.) A Comprehensive Guide to Corn Management in Kentucky (ID-139). University of Kentucky Extension. http://www2.ca.uky.edu/agcomm/pubs/id/id139/id139.htm ).
  Because aerial application is almost universally contracted service, it is most often not included in crop-specific enterprise budgets as a separate line item, instead being included under "custom" or "miscellaneous". Consequently, this dataset uses the ratio of custom farm rate survey responses for aerial application to the total respondents to provide a state crop level average estimate of aerial applications. This value covers all farmers responding and does not distinguish among crops. include aerial treatment of 20% of irrigated acres twice over the season (2 passes) and 20 of dryland acres once over the season (1 pass) The National Agricultural Aviation Association's estimates that approximately 28% of all US cropland (excluding range, pasture, and forest lands) is treated by aircraft annually (NAAA 2019, NAAA 2020).
  Field operations are as identified in crop- and rotation-specific enterprise crop budgets supplied by the regional agricultural extension office and matched to equipment type in the budget or crop guidance. (UNL Extension 2020; UNL Extension 2021; Klein R and McClure G 2021a; Klein R and McClure G 2021b). Operations are matched to equipment type and where multiple options are available, the share of each is determined from guidance and annual farmer survey data (Custom Rate Summaries) for contracted operations/equipment.Where an operation applies only to a portion of the harvested area, the number of passes has been scaled by the % of harvested area to which it applies (e.g., manure spreading or insecticide) as indicated by USDA statistics (applications) or USDA reports (manure use) or as otherwise indicated in enterprise crop budgets.
  Source(s):
  Crop Science Extension & Outreach, University of Illinois (2012) Illinois Agronomy Handbook. Crop Science Extension & Outreach, University of Illinois . http://extension.cropsciences.illinois.edu/handbook/ ; University of Kentucky Extension (n.d.) A Comprehensive Guide to Corn Management in Kentucky (ID-139). University of Kentucky Extension. http://www2.ca.uky.edu/agcomm/pubs/id/id139/id139.htm ; Nemecek T, Bengoa X, Lansche J, et al (2015) Methodological Guidelines for the Life Cycle Inventory of Agricultural Products, Version 3.0. 84.. . ; Nemecek T. & Kägi T. (2007) Life Cycle Inventories of Swiss and European Agricultural Production Systems. Final report ecoinvent V2.0 No. 15a. Agroscope Reckenholz-Taenikon Research Station ART, Swiss Centre for Life Cycle Inventories, Zurich and Dübendorf, Switzerland, retrieved from: www.ecoinvent.ch. . ; UNL Extension (2020) Nebraska Crop Budgets. Nebraska Extension, University of Nebraska–Lincoln Institute of Agriculture and Natural Resources. https://cropwatch.unl.edu/budgets, https://cropwatch.unl.edu/Budgets/2020/2020-NE-crop-budget-intro.pdf ; UNL Extension (2021) Nebraska Crop Budgets. Nebraska Extension, University of Nebraska–Lincoln Institute of Agriculture and Natural Resources. https://cropwatch.unl.edu/Budgets/2021/2021-all-nebraska-crop-budgets-updated-021521.pdf ; Klein R and McClure G (2021a) 2021 Nebraska Crop Budgets EC872 - Soybean Dryland (tables 57, 58, 59). Nebraska Extension - Institute of Agriculture and Natural Resources, Universoty of Nebraska-Lincoln. https://cropwatch.unl.edu/Budgets/2021/2021-Soybeans-021521.pdf ; Klein R and McClure G (2021b) 2021 Nebraska Crop Budgets EC872 - Irrigated Soybean (tables 60 to 66). Nebraska Extension - Institute of Agriculture and Natural Resources, Universoty of Nebraska-Lincoln. https://cropwatch.unl.edu/Budgets/2021/2021-Soybeans-021521.pdf
- application of plant protection product, by field sprayer: 9.21861e-5 ha; lognormal variance with pedigree 0.0206, pedigree (4,4,3,1,3)
  0.3645 ha/ha (9.22E-5 ha/kg soybean) market for application of plant protection product, by sprayer
  The dataset has an effective number of passes for application of pesticides of 0.36 ha: 1.10 applications of herbicides on 18.9% of cropped area, 1.00 applications of insecticides on 8.2% of cropped area, 1.00 applications of fungicides on 7.4% of cropped area (USDA NASS 2021e). Application by sprayer accounts for 65% (0.24passes) and aircraft for 35% (0.13 passes). The budgets for soybean in Nebraska do not provide information for aerial pesticide application as an individual operation. However, aerial application is in common use in Nebraska. An aerial pesticide application rate of 35% has been estimated from custom rate surveys for contracted farm operations (Crop Science Extension & Outreach, University of Illinois 2012; University of Kentucky Extension n.d.; Crop Science Extension & Outreach, University of Illinois (2012) Illinois Agronomy Handbook. Crop Science Extension & Outreach, University of Illinois . http://extension.cropsciences.illinois.edu/handbook/ ; University of Kentucky Extension (n.d.) A Comprehensive Guide to Corn Management in Kentucky (ID-139). University of Kentucky Extension. http://www2.ca.uky.edu/agcomm/pubs/id/id139/id139.htm ).
  Because aerial application is almost universally contracted service, it is most often not included in crop-specific enterprise budgets as a separate line item, instead being included under "custom" or "miscellaneous". Consequently, this dataset uses the ratio of custom farm rate survey responses for aerial application to the total respondents to provide a state crop level average estimate of aerial applications. This value covers all farmers responding and does not distinguish among crops. include aerial treatment of 20% of irrigated acres twice over the season (2 passes) and 20 of dryland acres once over the season (1 pass) The National Agricultural Aviation Association's estimates that approximately 28% of all US cropland (excluding range, pasture, and forest lands) is treated by aircraft annually (NAAA 2019, NAAA 2020).
  Field operations are as identified in crop- and rotation-specific enterprise crop budgets supplied by the regional agricultural extension office and matched to equipment type in the budget or crop guidance. (UNL Extension 2020; UNL Extension 2021; Klein R and McClure G 2021a; Klein R and McClure G 2021b). Operations are matched to equipment type and where multiple options are available, the share of each is determined from guidance and annual farmer survey data (Custom Rate Summaries) for contracted operations/equipment.Where an operation applies only to a portion of the harvested area, the number of passes has been scaled by the % of harvested area to which it applies (e.g., manure spreading or insecticide) as indicated by USDA statistics (applications) or USDA reports (manure use) or as otherwise indicated in enterprise crop budgets.
  Source(s):
  Crop Science Extension & Outreach, University of Illinois (2012) Illinois Agronomy Handbook. Crop Science Extension & Outreach, University of Illinois . http://extension.cropsciences.illinois.edu/handbook/ ; University of Kentucky Extension (n.d.) A Comprehensive Guide to Corn Management in Kentucky (ID-139). University of Kentucky Extension. http://www2.ca.uky.edu/agcomm/pubs/id/id139/id139.htm ; Nemecek T, Bengoa X, Lansche J, et al (2015) Methodological Guidelines for the Life Cycle Inventory of Agricultural Products, Version 3.0. 84.. . ; Nemecek T. & Kägi T. (2007) Life Cycle Inventories of Swiss and European Agricultural Production Systems. Final report ecoinvent V2.0 No. 15a. Agroscope Reckenholz-Taenikon Research Station ART, Swiss Centre for Life Cycle Inventories, Zurich and Dübendorf, Switzerland, retrieved from: www.ecoinvent.ch. . ; UNL Extension (2020) Nebraska Crop Budgets. Nebraska Extension, University of Nebraska–Lincoln Institute of Agriculture and Natural Resources. https://cropwatch.unl.edu/budgets, https://cropwatch.unl.edu/Budgets/2020/2020-NE-crop-budget-intro.pdf ; UNL Extension (2021) Nebraska Crop Budgets. Nebraska Extension, University of Nebraska–Lincoln Institute of Agriculture and Natural Resources. https://cropwatch.unl.edu/Budgets/2021/2021-all-nebraska-crop-budgets-updated-021521.pdf ; Klein R and McClure G (2021a) 2021 Nebraska Crop Budgets EC872 - Soybean Dryland (tables 57, 58, 59). Nebraska Extension - Institute of Agriculture and Natural Resources, Universoty of Nebraska-Lincoln. https://cropwatch.unl.edu/Budgets/2021/2021-Soybeans-021521.pdf ; Klein R and McClure G (2021b) 2021 Nebraska Crop Budgets EC872 - Irrigated Soybean (tables 60 to 66). Nebraska Extension - Institute of Agriculture and Natural Resources, Universoty of Nebraska-Lincoln. https://cropwatch.unl.edu/Budgets/2021/2021-Soybeans-021521.pdf
- atrazine: 3.51614e-5 kg; normal variance with pedigree 1.90248e-11, pedigree (1,2,2,1,1)
  applied pesticide(s) atrazine (1.39E-1 kg/ha {1,4,1,1,1}).
  Average over state-wide reported cropped area of soybean for all tillage practices (CTIC 2020a) and across all rotation patterns (Socolar et al 2021 ) - calculated from specified herbicide/insecticide/fungicide quantity applied to treated acres weighted by share of acres treated with that herbicide/insecticide/fungicide (2015,2017,2018,2020-USDA NASS data, USDA NASS 2021e).
  Sources:
  CTIC (2020a) OpTIS - Operational Tillage Information System. Conservation Technology Information Center (CTIC). https://www.ctic.org/optis_tabular_query accessed March 23, 2021
  Socolar Y, Goldstein B R, de Valpine P, Bowles T M (2021) Biophysical and policy factors predict simplified crop rotations in the US Midwest. Environ. Res. Lett. 16 054045. https://iopscience.iop.org/article/10.1088/1748-9326/abf9ca
  USDA NASS (2021) SOYBEAN- APPLICATIONS, MEASURED IN LB / ACRE / YEAR, AVG (fertilizer and pesticides, amount, number of applications) - 2000-2021. US Department of Agriculture (USDA) National Agricultural Statistics Service. https://quickstats.nass.usda.gov (direct query: https://quickstats.nass.usda.gov/results/1D738304-38A8-3977-B7BA-B67A7AF33530)
  USDA NASS (2021) Applications - fertilizers and pesticides - number, amount, - Soybean, Illinois - 2000-2021. US Department of Agriculture (USDA) National Agricultural Statistics Service. https://quickstats.nass.usda.gov (direct query: https://quickstats.nass.usda.gov/results/CBB93A96-1EAC-3BFF-87F0-5E4AECFE034D)
  properties: carbon content, fossil 0.446512, dry mass 1 kg, wet mass 1 kg
- benzo[thia]diazole-compound: 9.57393e-7 kg; normal variance with pedigree 2.61432e-18, pedigree (1,4,2,1,1)
  This exchange is an aggregate of proxies for applied pesticide(s) Flumetsulam, Fluthiacet-Methyl (3.376E-3 kg/ha {1,2,1,1,1}; 4.098E-4 kg/ha {1,2,1,1,1}, respectively).
  Average over state-wide reported cropped area of soybean for all tillage practices (CTIC 2020a) and across all rotation patterns (Socolar et al 2021 ) - calculated from specified herbicide/insecticide/fungicide quantity applied to treated acres weighted by share of acres treated with that herbicide/insecticide/fungicide (2015,2017,2018,2020-USDA NASS data, USDA NASS 2021e).
  Sources:
  CTIC (2020a) OpTIS - Operational Tillage Information System. Conservation Technology Information Center (CTIC). https://www.ctic.org/optis_tabular_query accessed March 23, 2021
  Socolar Y, Goldstein B R, de Valpine P, Bowles T M (2021) Biophysical and policy factors predict simplified crop rotations in the US Midwest. Environ. Res. Lett. 16 054045. https://iopscience.iop.org/article/10.1088/1748-9326/abf9ca
  USDA NASS (2021) SOYBEAN- APPLICATIONS, MEASURED IN LB / ACRE / YEAR, AVG (fertilizer and pesticides, amount, number of applications) - 2000-2021. US Department of Agriculture (USDA) National Agricultural Statistics Service. https://quickstats.nass.usda.gov (direct query: https://quickstats.nass.usda.gov/results/1D738304-38A8-3977-B7BA-B67A7AF33530)
  USDA NASS (2021) Applications - fertilizers and pesticides - number, amount, - Soybean, Illinois - 2000-2021. US Department of Agriculture (USDA) National Agricultural Statistics Service. https://quickstats.nass.usda.gov (direct query: https://quickstats.nass.usda.gov/results/CBB93A96-1EAC-3BFF-87F0-5E4AECFE034D)
  properties: carbon content, fossil 0.499869, dry mass 1 kg, wet mass 1 kg
- benzoic-compound: 0.000126725 kg; normal variance with pedigree 3.96295e-11, pedigree (1,2,2,1,1)
  This exchange is an aggregate of proxies for applied pesticide(s) 2,4-D 2-Choline Salt, 2,4-D dimethylamine salt, Bapma Salt of Dicamba, Dicamba diglyceride salt, Dicamba Dimethylamine Salt, Dicamba potassium salt, Dicamba sodium salt, Dicamba Bapma (1.174E-1 kg/ha {1,2,1,1,1}; 4.927E-2 kg/ha {1,2,1,1,1}; 8.16E-2 kg/ha {1,2,1,1,1}; 4.193E-2 kg/ha {1,2,1,1,1}; 5.28E-2 kg/ha {1,2,1,1,1}; 8.966E-2 kg/ha {1,2,1,1,1}; 4.726E-2 kg/ha {1,2,1,1,1}; 2.116E-2 kg/ha {1,2,1,1,1}, respectively).
  Average over state-wide reported cropped area of soybean for all tillage practices (CTIC 2020a) and across all rotation patterns (Socolar et al 2021 ) - calculated from specified herbicide/insecticide/fungicide quantity applied to treated acres weighted by share of acres treated with that herbicide/insecticide/fungicide (2015,2017,2018,2020-USDA NASS data, USDA NASS 2021e).
  Sources:
  CTIC (2020a) OpTIS - Operational Tillage Information System. Conservation Technology Information Center (CTIC). https://www.ctic.org/optis_tabular_query accessed March 23, 2021
  Socolar Y, Goldstein B R, de Valpine P, Bowles T M (2021) Biophysical and policy factors predict simplified crop rotations in the US Midwest. Environ. Res. Lett. 16 054045. https://iopscience.iop.org/article/10.1088/1748-9326/abf9ca
  USDA NASS (2021) SOYBEAN- APPLICATIONS, MEASURED IN LB / ACRE / YEAR, AVG (fertilizer and pesticides, amount, number of applications) - 2000-2021. US Department of Agriculture (USDA) National Agricultural Statistics Service. https://quickstats.nass.usda.gov (direct query: https://quickstats.nass.usda.gov/results/1D738304-38A8-3977-B7BA-B67A7AF33530)
  USDA NASS (2021) Applications - fertilizers and pesticides - number, amount, - Soybean, Illinois - 2000-2021. US Department of Agriculture (USDA) National Agricultural Statistics Service. https://quickstats.nass.usda.gov (direct query: https://quickstats.nass.usda.gov/results/CBB93A96-1EAC-3BFF-87F0-5E4AECFE034D)
  properties: carbon content, fossil 0.405853, dry mass 1 kg, wet mass 1 kg
- combine harvesting, soybean: 0.000252886 ha; lognormal variance with pedigree 0.0206, pedigree (4,4,3,1,3)
  2.53E-4 ha/kg combine harvesting ( 1 pass per year).
  Field operations are as identified in crop- and rotation-specific enterprise crop budgets supplied by the regional agricultural extension office and matched to equipment type in the budget or crop guidance. Operations are matched to equipment type and where multiple options are available, the share of each is determined from guidance and annual farmer survey data (Custom Rate Summaries) for contracted operations/equipment. Field cultivation and tillage operations are specific to the tillage regime used. Soybean is 41% reduced till, 44% no till, and 15% conventional till in Nebraska (CTIC 2020a).Used with harvesting cart.
  Sources:
  UNL Extension (2020) Nebraska Crop Budgets. Nebraska Extension, University of Nebraska–Lincoln Institute of Agriculture and Natural Resources. https://cropwatch.unl.edu/budgets, https://cropwatch.unl.edu/Budgets/2020/2020-NE-crop-budget-intro.pdf , UNL Extension (2021) Nebraska Crop Budgets. Nebraska Extension, University of Nebraska–Lincoln Institute of Agriculture and Natural Resources. https://cropwatch.unl.edu/Budgets/2021/2021-all-nebraska-crop-budgets-updated-021521.pdf , Klein R and McClure G (2021a) 2021 Nebraska Crop Budgets EC872 - Soybean Dryland (tables 57, 58, 59). Nebraska Extension - Institute of Agriculture and Natural Resources, Universoty of Nebraska-Lincoln. https://cropwatch.unl.edu/Budgets/2021/2021-Soybeans-021521.pdf , Klein R and McClure G (2021b) 2021 Nebraska Crop Budgets EC872 - Irrigated Soybean (tables 60 to 66). Nebraska Extension - Institute of Agriculture and Natural Resources, Universoty of Nebraska-Lincoln. https://cropwatch.unl.edu/Budgets/2021/2021-Soybeans-021521.pdf ; CTIC (2020a) OpTIS - Operational Tillage Information System. Conservation Technology Information Center (CTIC). https://www.ctic.org/optis_tabular_query accessed March 23, 2021
- cyclic N-compound: 5.80038e-6 kg; normal variance with pedigree 4.27413e-16, pedigree (1,2,2,1,1)
  This exchange is an aggregate of proxies for applied pesticide(s) Cyproconazole, Propiconazole, Prothioconazole, Tetraconazole, Cafrebtrazone (1.945E-3 kg/ha {1,2,1,1,1}; 6.319E-3 kg/ha {1,4,1,1,1}; 3.822E-3 kg/ha {1,2,1,1,1}; 7.741E-3 kg/ha {1,2,1,1,1}; 3.11E-3 kg/ha {1,4,1,1,1}, respectively).
  Average over state-wide reported cropped area of soybean for all tillage practices (CTIC 2020a) and across all rotation patterns (Socolar et al 2021 ) - calculated from specified herbicide/insecticide/fungicide quantity applied to treated acres weighted by share of acres treated with that herbicide/insecticide/fungicide (2015,2017,2018,2020-USDA NASS data, USDA NASS 2021e).
  Sources:
  CTIC (2020a) OpTIS - Operational Tillage Information System. Conservation Technology Information Center (CTIC). https://www.ctic.org/optis_tabular_query accessed March 23, 2021
  Socolar Y, Goldstein B R, de Valpine P, Bowles T M (2021) Biophysical and policy factors predict simplified crop rotations in the US Midwest. Environ. Res. Lett. 16 054045. https://iopscience.iop.org/article/10.1088/1748-9326/abf9ca
  USDA NASS (2021) SOYBEAN- APPLICATIONS, MEASURED IN LB / ACRE / YEAR, AVG (fertilizer and pesticides, amount, number of applications) - 2000-2021. US Department of Agriculture (USDA) National Agricultural Statistics Service. https://quickstats.nass.usda.gov (direct query: https://quickstats.nass.usda.gov/results/1D738304-38A8-3977-B7BA-B67A7AF33530)
  USDA NASS (2021) Applications - fertilizers and pesticides - number, amount, - Soybean, Illinois - 2000-2021. US Department of Agriculture (USDA) National Agricultural Statistics Service. https://quickstats.nass.usda.gov (direct query: https://quickstats.nass.usda.gov/results/CBB93A96-1EAC-3BFF-87F0-5E4AECFE034D)
  properties: carbon content, fossil 0.641962, dry mass 1 kg, wet mass 1 kg
- diammonium phosphate: 5.05294e-5 kg; normal variance with pedigree 1.88486e-10, pedigree (2,1,2,1,1)
  5.05E-5 kg diammonium phosphate/kg soybean
  Quantities of specific fertiliser are calculated based on US fertiliser market share and nutrient compositions from IFA data to meet total nutrient demand N-P-K-S: 2.86--13.38--1.18--0.77 kg/ha (USDA NASS data for 2015, 2017, 2018, 2020), over reported cropped area of specified crop (includes all rotation patterns): quantity of N applied to treated acres times percent of planted soy bean acres treated (USDA NASS) times share of N supplied by compound in U.S. consumption mix (ecoinvent and IFA 2019) times mass compound per mass N in compound.
  Sources:
  Statistical
  properties: dry mass 1 kg, nitrogen content 0.18, phosphorus content 0.200754, wet mass 1 kg
  note on nitrogen content: Nitrogen content (on a dry matter basis) of diammonium phosphate is calculated from the molecular formula of the nutrient present in the substance.
  note on phosphorus content: Phosphorus content (on a dry matter basis) of diammonium phosphate is calculated from the molecular formula of the nutrient present in the substance.
- diazole-compound: 6.37755e-7 kg; normal variance with pedigree 1.28692e-19, pedigree (1,2,2,1,1)
  Proxy for applied pesticide(s) Fluxapyroxad (2.522E-3 kg/ha {1,2,1,1,1}).
  Average over state-wide reported cropped area of soybean for all tillage practices (CTIC 2020a) and across all rotation patterns (Socolar et al 2021 ) - calculated from specified herbicide/insecticide/fungicide quantity applied to treated acres weighted by share of acres treated with that herbicide/insecticide/fungicide (2015,2017,2018,2020-USDA NASS data, USDA NASS 2021e).
  Sources:
  CTIC (2020a) OpTIS - Operational Tillage Information System. Conservation Technology Information Center (CTIC). https://www.ctic.org/optis_tabular_query accessed March 23, 2021
  Socolar Y, Goldstein B R, de Valpine P, Bowles T M (2021) Biophysical and policy factors predict simplified crop rotations in the US Midwest. Environ. Res. Lett. 16 054045. https://iopscience.iop.org/article/10.1088/1748-9326/abf9ca
  USDA NASS (2021) SOYBEAN- APPLICATIONS, MEASURED IN LB / ACRE / YEAR, AVG (fertilizer and pesticides, amount, number of applications) - 2000-2021. US Department of Agriculture (USDA) National Agricultural Statistics Service. https://quickstats.nass.usda.gov (direct query: https://quickstats.nass.usda.gov/results/1D738304-38A8-3977-B7BA-B67A7AF33530)
  USDA NASS (2021) Applications - fertilizers and pesticides - number, amount, - Soybean, Illinois - 2000-2021. US Department of Agriculture (USDA) National Agricultural Statistics Service. https://quickstats.nass.usda.gov (direct query: https://quickstats.nass.usda.gov/results/CBB93A96-1EAC-3BFF-87F0-5E4AECFE034D)
  properties: carbon content, fossil 0.541859, dry mass 1 kg, wet mass 1 kg
- diesel, burned in agricultural machinery: 0.0296403 MJ; lognormal variance with pedigree 0.0206, pedigree (4,4,3,1,3)
  2.96E-2 MJ/kg diesel, burned in agricultural machinery
  Based on agricultural extension expert estimates of annual costs for haulage - moving grain from field to storage - and general fuel use (enterprise crop budgets including IA, NE, IL) and farmer survey data (Iowa Farm Custom Rate Survey, 2021 (ISU), Wisconsin Farm Custom Rate Survey 2021 (USDA, NASS, Wisconsin Field Office)).
  Field operations are as identified in crop- and rotation-specific enterprise crop budgets supplied by the regional agricultural extension office and matched to equipment type in the budget or crop guidance. Operations are matched to equipment type and where multiple options are available, the share of each is determined from guidance and annual farmer survey data (Custom Rate Summaries) for contracted operations/equipment.
  Sources:
  ISU Extension 2021; UNL Extension 2020; Langemeier MR, Nielsen B, Vyn TJ, Casteel S, and Johnson B 2021; Plastina, Johanns, Gleisner, Qualman 2021; WI NASS 2021
  Klein R and McClure G 2021a
  Klein R and McClure G 2021b
- dinitroaniline-compound: 9.29066e-5 kg; normal variance with pedigree 2.57597e-11, pedigree (1,4,2,1,1)
  This exchange is an aggregate of proxies for applied pesticide(s) Azoxystrobin, Picoxystrobin, Pyraclostrobin, Trifloxystrobin, Pendimethalin, Trifluralin (6.892E-3 kg/ha {1,2,1,1,1}; 8.902E-3 kg/ha {1,2,1,1,1}; 7.213E-3 kg/ha {1,2,1,1,1}; 2.354E-2 kg/ha {1,2,1,1,1}; 1.66E-1 kg/ha {1,4,1,1,1}; 1.548E-1 kg/ha {1,2,1,1,1}, respectively).
  Average over state-wide reported cropped area of soybean for all tillage practices (CTIC 2020a) and across all rotation patterns (Socolar et al 2021 ) - calculated from specified herbicide/insecticide/fungicide quantity applied to treated acres weighted by share of acres treated with that herbicide/insecticide/fungicide (2015,2017,2018,2020-USDA NASS data, USDA NASS 2021e).
  Sources:
  CTIC (2020a) OpTIS - Operational Tillage Information System. Conservation Technology Information Center (CTIC). https://www.ctic.org/optis_tabular_query accessed March 23, 2021
  Socolar Y, Goldstein B R, de Valpine P, Bowles T M (2021) Biophysical and policy factors predict simplified crop rotations in the US Midwest. Environ. Res. Lett. 16 054045. https://iopscience.iop.org/article/10.1088/1748-9326/abf9ca
  USDA NASS (2021) SOYBEAN- APPLICATIONS, MEASURED IN LB / ACRE / YEAR, AVG (fertilizer and pesticides, amount, number of applications) - 2000-2021. US Department of Agriculture (USDA) National Agricultural Statistics Service. https://quickstats.nass.usda.gov (direct query: https://quickstats.nass.usda.gov/results/1D738304-38A8-3977-B7BA-B67A7AF33530)
  USDA NASS (2021) Applications - fertilizers and pesticides - number, amount, - Soybean, Illinois - 2000-2021. US Department of Agriculture (USDA) National Agricultural Statistics Service. https://quickstats.nass.usda.gov (direct query: https://quickstats.nass.usda.gov/results/CBB93A96-1EAC-3BFF-87F0-5E4AECFE034D)
  properties: carbon content, fossil 0.55516, dry mass 1 kg, wet mass 1 kg
- diphenylether-compound: 4.96016e-6 kg; normal variance with pedigree 1.88356e-15, pedigree (1,4,2,1,1)
  This exchange is an aggregate of proxies for applied pesticide(s) Acifluorfen, Fluazifop-P-Butyl (1.426E-2 kg/ha {1,2,1,1,1}; 5.352E-3 kg/ha {1,2,1,1,1}, respectively).
  Average over state-wide reported cropped area of soybean for all tillage practices (CTIC 2020a) and across all rotation patterns (Socolar et al 2021 ) - calculated from specified herbicide/insecticide/fungicide quantity applied to treated acres weighted by share of acres treated with that herbicide/insecticide/fungicide (2015,2017,2018,2020-USDA NASS data, USDA NASS 2021e).
  Sources:
  CTIC (2020a) OpTIS - Operational Tillage Information System. Conservation Technology Information Center (CTIC). https://www.ctic.org/optis_tabular_query accessed March 23, 2021
  Socolar Y, Goldstein B R, de Valpine P, Bowles T M (2021) Biophysical and policy factors predict simplified crop rotations in the US Midwest. Environ. Res. Lett. 16 054045. https://iopscience.iop.org/article/10.1088/1748-9326/abf9ca
  USDA NASS (2021) SOYBEAN- APPLICATIONS, MEASURED IN LB / ACRE / YEAR, AVG (fertilizer and pesticides, amount, number of applications) - 2000-2021. US Department of Agriculture (USDA) National Agricultural Statistics Service. https://quickstats.nass.usda.gov (direct query: https://quickstats.nass.usda.gov/results/1D738304-38A8-3977-B7BA-B67A7AF33530)
  USDA NASS (2021) Applications - fertilizers and pesticides - number, amount, - Soybean, Illinois - 2000-2021. US Department of Agriculture (USDA) National Agricultural Statistics Service. https://quickstats.nass.usda.gov (direct query: https://quickstats.nass.usda.gov/results/CBB93A96-1EAC-3BFF-87F0-5E4AECFE034D)
  properties: carbon content, fossil 0.560061, dry mass 1 kg, wet mass 1 kg
- fertilising, by broadcaster: 0.000301877 ha; lognormal variance with pedigree 0.0206, pedigree (4,4,3,1,3)
  1.1937 ha/ha (3.02E-4 ha/kg soybean) fertilising, by broadcaster
  The dataset has an effective number of passes for application of mineral fertilisers (NPKS) of 1.30: 1.08 N applications on 41.0% of cropped area, 1.05 P applications on 46.5% of cropped area, 1.03 K applications on 16.0% of cropped area, and 1.03 S applications on 20.7% of cropped area (USDA NASS 2021e, NPKS data from 2015, 2017, 2018, 2020). Applications of N are split between anhydrous ammonia and other NPK fertilisers because they are generally applied differently, with different equipment. Anhydrous ammonia application (knifing/injection) is calculated as market share of N that is anhydrous ammonia * total N applications. Other N application is then: total USDA N applications less applications of anhydrous ammoni. (here, 25.21%). Thus, the dataset includes 0.33 anhydrous ammonia applications via injection (0.25 * 41.0% of crop area with applied N) and 1.19 other fertiliser applications via broadcast.
  Field operations are as identified in crop- and rotation-specific enterprise crop budgets supplied by the regional agricultural extension office and matched to equipment type in the budget or crop guidance. (UNL Extension 2020; UNL Extension 2021; Klein R and McClure G 2021a; Klein R and McClure G 2021b). Operations are matched to equipment type and where multiple options are available, the share of each is determined from guidance and annual farmer survey data (Custom Rate Summaries) for contracted operations/equipment. Where an operation applies only to a portion of the harvested area, the number of passes has been scaled by the % of harvested area to which it applies (e.g., manure spreading or insecticide) as indicated by USDA statistics (applications) or USDA reports (manure use) or as otherwise indicated in enterprise crop budgets.
  Source(s):
  USDA NASS (2021) SOYBEAN- APPLICATIONS, MEASURED IN LB / ACRE / YEAR, AVG (fertilizer and pesticides, amount, number of applications) - 2000-2021. US Department of Agriculture (USDA) National Agricultural Statistics Service. https://quickstats.nass.usda.gov (direct query: https://quickstats.nass.usda.gov/results/1D738304-38A8-3977-B7BA-B67A7AF33530) ; UNL Extension (2020) Nebraska Crop Budgets. Nebraska Extension, University of Nebraska–Lincoln Institute of Agriculture and Natural Resources. https://cropwatch.unl.edu/budgets, https://cropwatch.unl.edu/Budgets/2020/2020-NE-crop-budget-intro.pdf ; UNL Extension (2021) Nebraska Crop Budgets. Nebraska Extension, University of Nebraska–Lincoln Institute of Agriculture and Natural Resources. https://cropwatch.unl.edu/Budgets/2021/2021-all-nebraska-crop-budgets-updated-021521.pdf ; Klein R and McClure G (2021a) 2021 Nebraska Crop Budgets EC872 - Soybean Dryland (tables 57, 58, 59). Nebraska Extension - Institute of Agriculture and Natural Resources, Universoty of Nebraska-Lincoln. https://cropwatch.unl.edu/Budgets/2021/2021-Soybeans-021521.pdf ; Klein R and McClure G (2021b) 2021 Nebraska Crop Budgets EC872 - Irrigated Soybean (tables 60 to 66). Nebraska Extension - Institute of Agriculture and Natural Resources, Universoty of Nebraska-Lincoln. https://cropwatch.unl.edu/Budgets/2021/2021-Soybeans-021521.pdf
- fertilising, by injection: 2.80969e-5 ha; lognormal variance with pedigree 0.0206, pedigree (4,4,3,1,3)
  0.1111 ha/ha (2.81E-5 ha/kg soybean) fertilising, by injection
  The dataset has an effective number of passes for application of mineral fertilisers (NPKS) of 1.30: 1.08 N applications on 41.0% of cropped area, 1.05 P applications on 46.5% of cropped area, 1.03 K applications on 16.0% of cropped area, and 1.03 S applications on 20.7% of cropped area (USDA NASS 2021e, NPKS data from 2015, 2017, 2018, 2020). Applications of N are split between anhydrous ammonia and other NPK fertilisers because they are generally applied differently, with different equipment. Anhydrous ammonia application (knifing/injection) is calculated as market share of N that is anhydrous ammonia * total N applications. Other N application is then: total USDA N applications less applications of anhydrous ammoni. (here, 25.21%). Thus, the dataset includes 0.33 anhydrous ammonia applications via injection (0.25 * 41.0% of crop area with applied N) and 1.19 other fertiliser applications via broadcast.
  Field operations are as identified in crop- and rotation-specific enterprise crop budgets supplied by the regional agricultural extension office and matched to equipment type in the budget or crop guidance. (UNL Extension 2020; UNL Extension 2021; Klein R and McClure G 2021a; Klein R and McClure G 2021b). Operations are matched to equipment type and where multiple options are available, the share of each is determined from guidance and annual farmer survey data (Custom Rate Summaries) for contracted operations/equipment. Where an operation applies only to a portion of the harvested area, the number of passes has been scaled by the % of harvested area to which it applies (e.g., manure spreading or insecticide) as indicated by USDA statistics (applications) or USDA reports (manure use) or as otherwise indicated in enterprise crop budgets.
  Source(s):
  USDA NASS (2021) SOYBEAN- APPLICATIONS, MEASURED IN LB / ACRE / YEAR, AVG (fertilizer and pesticides, amount, number of applications) - 2000-2021. US Department of Agriculture (USDA) National Agricultural Statistics Service. https://quickstats.nass.usda.gov (direct query: https://quickstats.nass.usda.gov/results/1D738304-38A8-3977-B7BA-B67A7AF33530) ; UNL Extension (2020) Nebraska Crop Budgets. Nebraska Extension, University of Nebraska–Lincoln Institute of Agriculture and Natural Resources. https://cropwatch.unl.edu/budgets, https://cropwatch.unl.edu/Budgets/2020/2020-NE-crop-budget-intro.pdf ; UNL Extension (2021) Nebraska Crop Budgets. Nebraska Extension, University of Nebraska–Lincoln Institute of Agriculture and Natural Resources. https://cropwatch.unl.edu/Budgets/2021/2021-all-nebraska-crop-budgets-updated-021521.pdf ; Klein R and McClure G (2021a) 2021 Nebraska Crop Budgets EC872 - Soybean Dryland (tables 57, 58, 59). Nebraska Extension - Institute of Agriculture and Natural Resources, Universoty of Nebraska-Lincoln. https://cropwatch.unl.edu/Budgets/2021/2021-Soybeans-021521.pdf ; Klein R and McClure G (2021b) 2021 Nebraska Crop Budgets EC872 - Irrigated Soybean (tables 60 to 66). Nebraska Extension - Institute of Agriculture and Natural Resources, Universoty of Nebraska-Lincoln. https://cropwatch.unl.edu/Budgets/2021/2021-Soybeans-021521.pdf
- glyphosate: 0.000251721 kg; normal variance with pedigree 3.1233e-9, pedigree (1,2,2,1,1)
  applied pesticide(s) Glyphosate, Glyphosate dimethylamine salt, Glyphosate isopropylamine salt, Glyphosate Potassium Salt (6.013E-2 kg/ha {1,4,1,1,1}; 1.024E-1 kg/ha {1,2,1,1,1}; 3.946E-1 kg/ha {1,4,1,1,1}; 4.383E-1 kg/ha {1,4,1,1,1}, respectively).
  Average over state-wide reported cropped area of soybean for all tillage practices (CTIC 2020a) and across all rotation patterns (Socolar et al 2021 ) - calculated from specified herbicide/insecticide/fungicide quantity applied to treated acres weighted by share of acres treated with that herbicide/insecticide/fungicide (2015,2017,2018,2020-USDA NASS data, USDA NASS 2021e).
  Sources:
  CTIC (2020a) OpTIS - Operational Tillage Information System. Conservation Technology Information Center (CTIC). https://www.ctic.org/optis_tabular_query accessed March 23, 2021
  Socolar Y, Goldstein B R, de Valpine P, Bowles T M (2021) Biophysical and policy factors predict simplified crop rotations in the US Midwest. Environ. Res. Lett. 16 054045. https://iopscience.iop.org/article/10.1088/1748-9326/abf9ca
  USDA NASS (2021) SOYBEAN- APPLICATIONS, MEASURED IN LB / ACRE / YEAR, AVG (fertilizer and pesticides, amount, number of applications) - 2000-2021. US Department of Agriculture (USDA) National Agricultural Statistics Service. https://quickstats.nass.usda.gov (direct query: https://quickstats.nass.usda.gov/results/1D738304-38A8-3977-B7BA-B67A7AF33530)
  USDA NASS (2021) Applications - fertilizers and pesticides - number, amount, - Soybean, Illinois - 2000-2021. US Department of Agriculture (USDA) National Agricultural Statistics Service. https://quickstats.nass.usda.gov (direct query: https://quickstats.nass.usda.gov/results/CBB93A96-1EAC-3BFF-87F0-5E4AECFE034D)
  properties: carbon content, fossil 0.214286, dry mass 1 kg, wet mass 1 kg
- harvesting, use of harvesting cart: 0.000252886 kg; lognormal variance with pedigree 0.0206, pedigree (4,4,3,1,3)
  2.53E-4 ha/kg [change to kg/kg] harvesting, use of harvesting cart (1 pass per year).
  Used alongside combine harvester. Field operations are as identified in crop- and rotation-specific enterprise crop budgets supplied by the regional agricultural extension office and matched to equipment type in the budget or crop guidance. Operations are matched to equipment type and where multiple options are available, the share of each is determined from guidance and annual farmer survey data (Custom Rate Summaries) for contracted operations/equipment.
  Sources:
  UNL Extension (2020) Nebraska Crop Budgets. Nebraska Extension, University of Nebraska–Lincoln Institute of Agriculture and Natural Resources. https://cropwatch.unl.edu/budgets, https://cropwatch.unl.edu/Budgets/2020/2020-NE-crop-budget-intro.pdf ; UNL Extension (2021) Nebraska Crop Budgets. Nebraska Extension, University of Nebraska–Lincoln Institute of Agriculture and Natural Resources. https://cropwatch.unl.edu/Budgets/2021/2021-all-nebraska-crop-budgets-updated-021521.pdf ; Klein R and McClure G (2021a) 2021 Nebraska Crop Budgets EC872 - Soybean Dryland (tables 57, 58, 59). Nebraska Extension - Institute of Agriculture and Natural Resources, Universoty of Nebraska-Lincoln. https://cropwatch.unl.edu/Budgets/2021/2021-Soybeans-021521.pdf ; Klein R and McClure G (2021b) 2021 Nebraska Crop Budgets EC872 - Irrigated Soybean (tables 60 to 66). Nebraska Extension - Institute of Agriculture and Natural Resources, Universoty of Nebraska-Lincoln. https://cropwatch.unl.edu/Budgets/2021/2021-Soybeans-021521.pdf
- irrigation: 0.384351 m3; lognormal variance with pedigree 0.0038, pedigree (1,3,3,1,2)
  1,519.9 m3/ha (3.84E-1 m3/kg soybean) irrigation. Water applied for irrigation (2,061 m3/irrigated ha, 2013, 2018, from USDA NASS (2018)), weighted by the share of acres irrigated (73.7%. average over 2010-2018 from USDA NASS (2021); percent of harvested irrigated acres not reported 2019-2021).
  Sources:
  USDA NASS (2018) 2018 Irrigation and Water Management Survey (2017 Census of Agriculture). US Department of Agriculture (USDA). https://www.nass.usda.gov/Publications/AgCensus/2017/Online_Resources/Farm_and_Ranch_Irrigation_Survey/index.php
  properties: dry mass 0.11 kg, water content 9089.91, wet mass 1000 kg
- land use change, annual crop: 3.82806e-5 ha; lognormal variance with pedigree 0.082025, pedigree (1,1,3,2,1)
  Area cultivated for soybean in Nebraska increased by 14% between 2000 and 2021 (USDA NASS data, 5 year rolling averages) US NRCS data indicates that total cropland in Nebraska has expanded over the same period by 4% (NRCS 2020a). The expansion of cropland for all crops in Nebraska in this period was supplied 86% from CRP land, 12% from Rangeland, 2% from Forest land comparing five year rolling averages for the beginning and end of the 20 year time horizon.
  Calculated value from ecoinvent Crop LCI tool, 0.15137 divided by the yield in kg/ha. Land use change is allocated to all crops and activities that grew in the last 20 years for the US, and only to them, according to their respective area increase. Crop production and natural land areas in all countries use data from 1989 to 2012 (FAOSTAT 2012), as well as for country climates and soil types (EU-JRC 2010c). Crops for which planted area decreased are not attributed LUC impacts or credits. Land use change (LUC) combines land transformation areas calculated with the adapted 'Direct Land Use Change Assessment Tool' version 2014 developed by Blonk Consultants and the carbon losses from soil organic carbon (SOC) and vegetation (VEG) as calculated in ecoinvent v3. See 'WFLDB-Guidelines.pdf', available at https://ecoquery.ecoinvent.org/File/Reports.
- manure, solid, cattle: 0.0657433 kg; lognormal variance with pedigree 0.0118, pedigree (4,3,3,1,2)
  The total effective manure application rate of 260 kg/ha (0.066 kg/kg soybean) is calculated from USDA ERS data for amount of manure applied (11.4 kg/ha; 0.07 kg/kg soybean) on share of crop area treated (2.3%) (years available: 2002, 2006) USDA ARMS 2015. The manure data has significant uncertainty due to both the age of the available data and the statistical limitations imposed by confidentiality for USDA survey respondents.
  None of the applied manure is in liquid form, calculated from the share of dry, semi-dry and slurry and lagoon manure applied from ARMS data. 100.% of manure from cattle. USDA data shows zero share from swine manure.USDA data shows zero share from poultry manure. Cattle manure is apportioned between solid and liquid consistent with USDA estimated shares . Total mass solid manure is 6.57E-2 kg/kg soybean. USDA ARMS (2015) Agricultural Resource Management Survey (ARMS) Farm Financial and Crop Production Practices: Manure Table, Corn. USDA. https://data.ers.usda.gov/reports.aspx?ID=17883
  properties: carbon content, non-fossil 0.441, dry mass 0.22 kg, water content 3.5454, wet mass 1 kg
- metolachlor: 5.5675e-5 kg; normal variance with pedigree 2.98976e-11, pedigree (1,2,2,1,1)
  applied pesticide(s) Metolachlor, S-Metolachlor (2.919E-2 kg/ha {1,4,1,1,1}; 1.91E-1 kg/ha {1,2,1,1,1}, respectively).
  Average over state-wide reported cropped area of soybean for all tillage practices (CTIC 2020a) and across all rotation patterns (Socolar et al 2021 ) - calculated from specified herbicide/insecticide/fungicide quantity applied to treated acres weighted by share of acres treated with that herbicide/insecticide/fungicide (2015,2017,2018,2020-USDA NASS data, USDA NASS 2021e).
  Sources:
  CTIC (2020a) OpTIS - Operational Tillage Information System. Conservation Technology Information Center (CTIC). https://www.ctic.org/optis_tabular_query accessed March 23, 2021
  Socolar Y, Goldstein B R, de Valpine P, Bowles T M (2021) Biophysical and policy factors predict simplified crop rotations in the US Midwest. Environ. Res. Lett. 16 054045. https://iopscience.iop.org/article/10.1088/1748-9326/abf9ca
  USDA NASS (2021) SOYBEAN- APPLICATIONS, MEASURED IN LB / ACRE / YEAR, AVG (fertilizer and pesticides, amount, number of applications) - 2000-2021. US Department of Agriculture (USDA) National Agricultural Statistics Service. https://quickstats.nass.usda.gov (direct query: https://quickstats.nass.usda.gov/results/1D738304-38A8-3977-B7BA-B67A7AF33530)
  USDA NASS (2021) Applications - fertilizers and pesticides - number, amount, - Soybean, Illinois - 2000-2021. US Department of Agriculture (USDA) National Agricultural Statistics Service. https://quickstats.nass.usda.gov (direct query: https://quickstats.nass.usda.gov/results/CBB93A96-1EAC-3BFF-87F0-5E4AECFE034D)
  properties: carbon content, fossil 0.633803, dry mass 1 kg, wet mass 1 kg
- monoammonium phosphate: 0.000408194 kg; normal variance with pedigree 1.23005e-8, pedigree (2,1,2,1,1)
  4.08E-4 kg monoammonium phosphate/kg soybean
  Quantities of specific fertiliser are calculated based on US fertiliser market share and nutrient compositions from IFA data to meet total nutrient demand N-P-K-S: 2.86--13.38--1.18--0.77 kg/ha (USDA NASS data for 2015, 2017, 2018, 2020), over reported cropped area of specified crop (includes all rotation patterns): quantity of N applied to treated acres times percent of planted soy bean acres treated (USDA NASS) times share of N supplied by compound in U.S. consumption mix (ecoinvent and IFA 2019) times mass compound per mass N in compound.
  Sources:
  USDA NASS (2021) SOYBEAN- APPLICATIONS, MEASURED IN LB / ACRE / YEAR, AVG (fertilizer and pesticides, amount, number of applications) - 2000-2021. US Department of Agriculture (USDA) National Agricultural Statistics Service. https://quickstats.nass.usda.gov (direct query: https://quickstats.nass.usda.gov/results/1D738304-38A8-3977-B7BA-B67A7AF33530) ; Ecoinvent U.S. consumption mix for N fertilisers, from IFA data; IFA (2021) Nutrient content in percentage - IFA Fertilizer Converter. International Fertilizer Association. https://www.ifastat.org/converter/fertilizer-converter/ accessed 2021-06-24
  properties: dry mass 1 kg, nitrogen content 0.084, phosphorus content 0.226939, wet mass 1 kg
  note on nitrogen content: Nitrogen content (on a dry matter basis) of monoammonium phosphate is calculated from the molecular formula of the nutrient present in the substance.
  note on phosphorus content: Phosphorus content (on a dry matter basis) of monoammonium phosphate is calculated from the molecular formula of the nutrient present in the substance.
- organophosphorus-compound, unspecified: 1.54195e-5 kg; normal variance with pedigree 4.39763e-14, pedigree (1,4,2,1,1)
  Proxy for applied pesticide(s) Glufosinate ammonium (6.097E-2 kg/ha {1,2,1,1,1}).
  Average over state-wide reported cropped area of soybean for all tillage practices (CTIC 2020a) and across all rotation patterns (Socolar et al 2021 ) - calculated from specified herbicide/insecticide/fungicide quantity applied to treated acres weighted by share of acres treated with that herbicide/insecticide/fungicide (2015,2017,2018,2020-USDA NASS data, USDA NASS 2021e).
  Sources:
  CTIC (2020a) OpTIS - Operational Tillage Information System. Conservation Technology Information Center (CTIC). https://www.ctic.org/optis_tabular_query accessed March 23, 2021
  Socolar Y, Goldstein B R, de Valpine P, Bowles T M (2021) Biophysical and policy factors predict simplified crop rotations in the US Midwest. Environ. Res. Lett. 16 054045. https://iopscience.iop.org/article/10.1088/1748-9326/abf9ca
  USDA NASS (2021) SOYBEAN- APPLICATIONS, MEASURED IN LB / ACRE / YEAR, AVG (fertilizer and pesticides, amount, number of applications) - 2000-2021. US Department of Agriculture (USDA) National Agricultural Statistics Service. https://quickstats.nass.usda.gov (direct query: https://quickstats.nass.usda.gov/results/1D738304-38A8-3977-B7BA-B67A7AF33530)
  USDA NASS (2021) Applications - fertilizers and pesticides - number, amount, - Soybean, Illinois - 2000-2021. US Department of Agriculture (USDA) National Agricultural Statistics Service. https://quickstats.nass.usda.gov (direct query: https://quickstats.nass.usda.gov/results/CBB93A96-1EAC-3BFF-87F0-5E4AECFE034D)
  properties: carbon content, fossil 0.260898, dry mass 1 kg, wet mass 1 kg
- packaging, for fertilisers: 0.0180465 kg; name packaging_f; lognormal variance with pedigree 0.1708, pedigree (4,3,2,5,4)
  The total amount of mineral and/or synthetic fertilisers needed for the production of soybean is calculated to be circa 34.741kg/ha. The total amount of applied mineral fertiliser is doubled to account for the packaging of the diluted product. Lime is not delivered packaged. Thus, 0.018 kg/ha of packaging for fertilisers is calculated with this exchange.
  properties: carbon content, fossil 0.825301, dry mass 1 kg, price 0.0642 EUR2005, wet mass 1 kg
  note on carbon content, fossil: Considering a chemical formula (C2H4)n for polyethylene, carbon content-fossil is calculated to be 0.856286 kg of Carbon per kg of dry mass.
- packaging, for pesticides: 0.00135566 kg; name packaging_p; lognormal variance with pedigree 0.0514, pedigree (4,3,2,5,4)
  The total amount of active substance/s of pesticides used for the production of soybean is calculated to be about 2.68 kg/ha (2015,2017,2018,2020-USDA NASS data, USDA NASS 2021e). The total amount of active substance/s is doubled in order to account for the packaging of the diluted product of pesticides that are applied. Therefore, 5.36kg of packaging for pesticides per ha of soybean( 1.36E-3kg/kg) is calculated with this exchange.
  properties: carbon content, fossil 0.85714, dry mass 1 kg, price 0.0642 EUR2005, wet mass 1 kg
- pesticide, unspecified: 2.06195e-6 kg; normal variance with pedigree 5.62483e-17, pedigree (1,4,2,1,1)
  This exchange is an aggregate of proxies for applied pesticide(s) Pydiflumetofen, Flumiclorac-Pentyl (4.778E-3 kg/ha {1,2,1,1,1}; 3.376E-3 kg/ha {1,2,1,1,1}, respectively).
  Average over state-wide reported cropped area of soybean for all tillage practices (CTIC 2020a) and across all rotation patterns (Socolar et al 2021 ) - calculated from specified herbicide/insecticide/fungicide quantity applied to treated acres weighted by share of acres treated with that herbicide/insecticide/fungicide (2015,2017,2018,2020-USDA NASS data, USDA NASS 2021e).
  Sources:
  CTIC (2020a) OpTIS - Operational Tillage Information System. Conservation Technology Information Center (CTIC). https://www.ctic.org/optis_tabular_query accessed March 23, 2021
  Socolar Y, Goldstein B R, de Valpine P, Bowles T M (2021) Biophysical and policy factors predict simplified crop rotations in the US Midwest. Environ. Res. Lett. 16 054045. https://iopscience.iop.org/article/10.1088/1748-9326/abf9ca
  USDA NASS (2021) SOYBEAN- APPLICATIONS, MEASURED IN LB / ACRE / YEAR, AVG (fertilizer and pesticides, amount, number of applications) - 2000-2021. US Department of Agriculture (USDA) National Agricultural Statistics Service. https://quickstats.nass.usda.gov (direct query: https://quickstats.nass.usda.gov/results/1D738304-38A8-3977-B7BA-B67A7AF33530)
  USDA NASS (2021) Applications - fertilizers and pesticides - number, amount, - Soybean, Illinois - 2000-2021. US Department of Agriculture (USDA) National Agricultural Statistics Service. https://quickstats.nass.usda.gov (direct query: https://quickstats.nass.usda.gov/results/CBB93A96-1EAC-3BFF-87F0-5E4AECFE034D)
  properties: carbon content, fossil 0.486978, dry mass 1 kg, wet mass 1 kg
- phenoxy-compound: 3.98591e-6 kg; normal variance with pedigree 1.96357e-16, pedigree (1,4,2,1,1)
  This exchange is an aggregate of proxies for applied pesticide(s) Benzovindiflupyr, Cloransulam - Methyl, Lactofen, Quizalofop-P-Ethyl (1.634E-3 kg/ha {1,4,1,1,1}; 3.192E-3 kg/ha {1,2,1,1,1}; 9.21E-3 kg/ha {1,4,1,1,1}; 1.726E-3 kg/ha {1,2,1,1,1}, respectively).
  Average over state-wide reported cropped area of soybean for all tillage practices (CTIC 2020a) and across all rotation patterns (Socolar et al 2021 ) - calculated from specified herbicide/insecticide/fungicide quantity applied to treated acres weighted by share of acres treated with that herbicide/insecticide/fungicide (2015,2017,2018,2020-USDA NASS data, USDA NASS 2021e).
  Sources:
  CTIC (2020a) OpTIS - Operational Tillage Information System. Conservation Technology Information Center (CTIC). https://www.ctic.org/optis_tabular_query accessed March 23, 2021
  Socolar Y, Goldstein B R, de Valpine P, Bowles T M (2021) Biophysical and policy factors predict simplified crop rotations in the US Midwest. Environ. Res. Lett. 16 054045. https://iopscience.iop.org/article/10.1088/1748-9326/abf9ca
  USDA NASS (2021) SOYBEAN- APPLICATIONS, MEASURED IN LB / ACRE / YEAR, AVG (fertilizer and pesticides, amount, number of applications) - 2000-2021. US Department of Agriculture (USDA) National Agricultural Statistics Service. https://quickstats.nass.usda.gov (direct query: https://quickstats.nass.usda.gov/results/1D738304-38A8-3977-B7BA-B67A7AF33530)
  USDA NASS (2021) Applications - fertilizers and pesticides - number, amount, - Soybean, Illinois - 2000-2021. US Department of Agriculture (USDA) National Agricultural Statistics Service. https://quickstats.nass.usda.gov (direct query: https://quickstats.nass.usda.gov/results/CBB93A96-1EAC-3BFF-87F0-5E4AECFE034D)
  properties: carbon content, fossil 0.532559, dry mass 1 kg, wet mass 1 kg
- planting, by drill: 0.000103407 ha; lognormal variance with pedigree 0.0206, pedigree (4,4,3,1,3)
  1.03E-4 ha/kg planting (0.409 effective pass(es) per year).
  Field operations are as identified in crop- and rotation-specific enterprise crop budgets supplied by the regional agricultural extension office and matched to equipment type in the budget or crop guidance. Operations are matched to equipment type and where multiple options are available, the share of each is determined from guidance and annual farmer survey data (Custom Rate Summaries) for contracted operations/equipment. Field cultivation and tillage operations are specific to the tillage regime used. Soybean is 41% reduced till, 44% no till, and 15% conventional till in Nebraska (CTIC 2020a).Sowing with till and no-till planters based on share of field type. This operation is for planting on reduced till fields only.
  Sources:
  UNL Extension (2020) Nebraska Crop Budgets. Nebraska Extension, University of Nebraska–Lincoln Institute of Agriculture and Natural Resources. https://cropwatch.unl.edu/budgets, https://cropwatch.unl.edu/Budgets/2020/2020-NE-crop-budget-intro.pdf , UNL Extension (2021) Nebraska Crop Budgets. Nebraska Extension, University of Nebraska–Lincoln Institute of Agriculture and Natural Resources. https://cropwatch.unl.edu/Budgets/2021/2021-all-nebraska-crop-budgets-updated-021521.pdf , Klein R and McClure G (2021a) 2021 Nebraska Crop Budgets EC872 - Soybean Dryland (tables 57, 58, 59). Nebraska Extension - Institute of Agriculture and Natural Resources, Universoty of Nebraska-Lincoln. https://cropwatch.unl.edu/Budgets/2021/2021-Soybeans-021521.pdf , Klein R and McClure G (2021b) 2021 Nebraska Crop Budgets EC872 - Irrigated Soybean (tables 60 to 66). Nebraska Extension - Institute of Agriculture and Natural Resources, Universoty of Nebraska-Lincoln. https://cropwatch.unl.edu/Budgets/2021/2021-Soybeans-021521.pdf ; CTIC (2020a) OpTIS - Operational Tillage Information System. Conservation Technology Information Center (CTIC). https://www.ctic.org/optis_tabular_query accessed March 23, 2021
- planting, by no till drill: 0.0001105 ha; lognormal variance with pedigree 0.0206, pedigree (4,4,3,1,3)
  1.1E-4 ha/kg planting (0.437 effective pass(es) per year).
  Field operations are as identified in crop- and rotation-specific enterprise crop budgets supplied by the regional agricultural extension office and matched to equipment type in the budget or crop guidance. Operations are matched to equipment type and where multiple options are available, the share of each is determined from guidance and annual farmer survey data (Custom Rate Summaries) for contracted operations/equipment. Field cultivation and tillage operations are specific to the tillage regime used. Soybean is 41% reduced till, 44% no till, and 15% conventional till in Nebraska (CTIC 2020a).Sowing with till and no-till planters based on share of field type. This operation is for planting on no till fields only.
  Sources:
  UNL Extension (2020) Nebraska Crop Budgets. Nebraska Extension, University of Nebraska–Lincoln Institute of Agriculture and Natural Resources. https://cropwatch.unl.edu/budgets, https://cropwatch.unl.edu/Budgets/2020/2020-NE-crop-budget-intro.pdf , UNL Extension (2021) Nebraska Crop Budgets. Nebraska Extension, University of Nebraska–Lincoln Institute of Agriculture and Natural Resources. https://cropwatch.unl.edu/Budgets/2021/2021-all-nebraska-crop-budgets-updated-021521.pdf , Klein R and McClure G (2021a) 2021 Nebraska Crop Budgets EC872 - Soybean Dryland (tables 57, 58, 59). Nebraska Extension - Institute of Agriculture and Natural Resources, Universoty of Nebraska-Lincoln. https://cropwatch.unl.edu/Budgets/2021/2021-Soybeans-021521.pdf , Klein R and McClure G (2021b) 2021 Nebraska Crop Budgets EC872 - Irrigated Soybean (tables 60 to 66). Nebraska Extension - Institute of Agriculture and Natural Resources, Universoty of Nebraska-Lincoln. https://cropwatch.unl.edu/Budgets/2021/2021-Soybeans-021521.pdf ; CTIC (2020a) OpTIS - Operational Tillage Information System. Conservation Technology Information Center (CTIC). https://www.ctic.org/optis_tabular_query accessed March 23, 2021
- planting, by row crop planter: 3.89789e-5 ha; lognormal variance with pedigree 0.0206, pedigree (4,4,3,1,3)
  3.9E-5 ha/kg planting (0.154 effective pass(es) per year).
  Field operations are as identified in crop- and rotation-specific enterprise crop budgets supplied by the regional agricultural extension office and matched to equipment type in the budget or crop guidance. Operations are matched to equipment type and where multiple options are available, the share of each is determined from guidance and annual farmer survey data (Custom Rate Summaries) for contracted operations/equipment. Field cultivation and tillage operations are specific to the tillage regime used. Soybean is 41% reduced till, 44% no till, and 15% conventional till in Nebraska (CTIC 2020a).Sowing with till and no-till planters based on share of field type. This operation is for planting on conventionally tilled fields only.
  Sources:
  UNL Extension (2020) Nebraska Crop Budgets. Nebraska Extension, University of Nebraska–Lincoln Institute of Agriculture and Natural Resources. https://cropwatch.unl.edu/budgets, https://cropwatch.unl.edu/Budgets/2020/2020-NE-crop-budget-intro.pdf , UNL Extension (2021) Nebraska Crop Budgets. Nebraska Extension, University of Nebraska–Lincoln Institute of Agriculture and Natural Resources. https://cropwatch.unl.edu/Budgets/2021/2021-all-nebraska-crop-budgets-updated-021521.pdf , Klein R and McClure G (2021a) 2021 Nebraska Crop Budgets EC872 - Soybean Dryland (tables 57, 58, 59). Nebraska Extension - Institute of Agriculture and Natural Resources, Universoty of Nebraska-Lincoln. https://cropwatch.unl.edu/Budgets/2021/2021-Soybeans-021521.pdf , Klein R and McClure G (2021b) 2021 Nebraska Crop Budgets EC872 - Irrigated Soybean (tables 60 to 66). Nebraska Extension - Institute of Agriculture and Natural Resources, Universoty of Nebraska-Lincoln. https://cropwatch.unl.edu/Budgets/2021/2021-Soybeans-021521.pdf ; CTIC (2020a) OpTIS - Operational Tillage Information System. Conservation Technology Information Center (CTIC). https://www.ctic.org/optis_tabular_query accessed March 23, 2021
- potassium chloride: 0.000342243 kg; normal variance with pedigree 1.60925e-8, pedigree (2,1,2,1,1)
  3.42E-4 kg potassium chloride/kg soybean
  Quantities of specific fertiliser are calculated based on US fertiliser market share and nutrient compositions from IFA data to meet total nutrient demand N-P-K-S: 2.86--13.38--1.18--0.77 kg/ha (USDA NASS data for 2015, 2017, 2018, 2020). Quantity of specific fertiliser calculated from: average total N application (2010, 2014, 2016, 2018) reported cropped area of specified crop (includes all rotation patterns) and share of fertilisers in U.S. consumption mix (ecoinvent and IFA 2019) times each fertiliser's K2O to N ratio (IFA), subtracted from the application rate for the necessary nutrient, and multiplied by the mass of the compound over the mass of K2O in the compound.
  Sources:
  USDA NASS (2021) SOYBEAN- APPLICATIONS, MEASURED IN LB / ACRE / YEAR, AVG (fertilizer and pesticides, amount, number of applications) - 2000-2021. US Department of Agriculture (USDA) National Agricultural Statistics Service. https://quickstats.nass.usda.gov (direct query: https://quickstats.nass.usda.gov/results/1D738304-38A8-3977-B7BA-B67A7AF33530) ; Ecoinvent U.S. consumption mix for N fertilisers, from IFA data; IFA (2021) Nutrient content in percentage - IFA Fertilizer Converter. International Fertilizer Association. https://www.ifastat.org/converter/fertilizer-converter/ accessed 2021-06-24
  properties: dry mass 1 kg, wet mass 1 kg
- potassium nitrate: 1.43396e-5 kg; normal variance with pedigree 1.51797e-11, pedigree (2,1,2,1,1)
  1.43E-5 kg potassium nitrate/kg soybean
  Quantities of specific fertiliser are calculated based on US fertiliser market share and nutrient compositions from IFA data to meet total nutrient demand N-P-K-S: 2.86--13.38--1.18--0.77 kg/ha (USDA NASS data for 2015, 2017, 2018, 2020), over reported cropped area of specified crop (includes all rotation patterns): quantity of N applied to treated acres times percent of planted soy bean acres treated (USDA NASS) times share of N supplied by compound in U.S. consumption mix (ecoinvent and IFA 2019) times mass compound per mass N in compound.
  Sources:
  USDA NASS (2021) SOYBEAN- APPLICATIONS, MEASURED IN LB / ACRE / YEAR, AVG (fertilizer and pesticides, amount, number of applications) - 2000-2021. US Department of Agriculture (USDA) National Agricultural Statistics Service. https://quickstats.nass.usda.gov (direct query: https://quickstats.nass.usda.gov/results/1D738304-38A8-3977-B7BA-B67A7AF33530) ; Ecoinvent U.S. consumption mix for N fertilisers, from IFA data; IFA (2021) Nutrient content in percentage - IFA Fertilizer Converter. International Fertilizer Association. https://www.ifastat.org/converter/fertilizer-converter/ accessed 2021-06-24
  properties: dry mass 1 kg, wet mass 1 kg
- pyrethroid-compound: 9.52381e-7 kg; normal variance with pedigree 4.096e-19, pedigree (1,2,2,1,1)
  This exchange is an aggregate of proxies for applied pesticide(s) Bifenthrin, Zeta-Cypermethrin (3.094E-3 kg/ha {1,2,1,1,1}; 6.725E-4 kg/ha {1,4,1,1,1}, respectively).
  Average over state-wide reported cropped area of soybean for all tillage practices (CTIC 2020a) and across all rotation patterns (Socolar et al 2021 ) - calculated from specified herbicide/insecticide/fungicide quantity applied to treated acres weighted by share of acres treated with that herbicide/insecticide/fungicide (2015,2017,2018,2020-USDA NASS data, USDA NASS 2021e).
  Sources:
  CTIC (2020a) OpTIS - Operational Tillage Information System. Conservation Technology Information Center (CTIC). https://www.ctic.org/optis_tabular_query accessed March 23, 2021
  Socolar Y, Goldstein B R, de Valpine P, Bowles T M (2021) Biophysical and policy factors predict simplified crop rotations in the US Midwest. Environ. Res. Lett. 16 054045. https://iopscience.iop.org/article/10.1088/1748-9326/abf9ca
  USDA NASS (2021) SOYBEAN- APPLICATIONS, MEASURED IN LB / ACRE / YEAR, AVG (fertilizer and pesticides, amount, number of applications) - 2000-2021. US Department of Agriculture (USDA) National Agricultural Statistics Service. https://quickstats.nass.usda.gov (direct query: https://quickstats.nass.usda.gov/results/1D738304-38A8-3977-B7BA-B67A7AF33530)
  USDA NASS (2021) Applications - fertilizers and pesticides - number, amount, - Soybean, Illinois - 2000-2021. US Department of Agriculture (USDA) National Agricultural Statistics Service. https://quickstats.nass.usda.gov (direct query: https://quickstats.nass.usda.gov/results/CBB93A96-1EAC-3BFF-87F0-5E4AECFE034D)
  properties: carbon content, fossil 0.623, dry mass 1 kg, wet mass 1 kg
- pyridine-compound: 2.76859e-5 kg; normal variance with pedigree 8.12552e-13, pedigree (1,2,2,1,1)
  This exchange is an aggregate of proxies for applied pesticide(s) Imazethapyr, Imazethapyr, Ammon, Paraquat (8.336E-3 kg/ha {1,2,1,1,1}; 1.031E-2 kg/ha {1,4,1,1,1}; 9.084E-2 kg/ha {1,2,1,1,1}, respectively).
  Average over state-wide reported cropped area of soybean for all tillage practices (CTIC 2020a) and across all rotation patterns (Socolar et al 2021 ) - calculated from specified herbicide/insecticide/fungicide quantity applied to treated acres weighted by share of acres treated with that herbicide/insecticide/fungicide (2015,2017,2018,2020-USDA NASS data, USDA NASS 2021e).
  Sources:
  CTIC (2020a) OpTIS - Operational Tillage Information System. Conservation Technology Information Center (CTIC). https://www.ctic.org/optis_tabular_query accessed March 23, 2021
  Socolar Y, Goldstein B R, de Valpine P, Bowles T M (2021) Biophysical and policy factors predict simplified crop rotations in the US Midwest. Environ. Res. Lett. 16 054045. https://iopscience.iop.org/article/10.1088/1748-9326/abf9ca
  USDA NASS (2021) SOYBEAN- APPLICATIONS, MEASURED IN LB / ACRE / YEAR, AVG (fertilizer and pesticides, amount, number of applications) - 2000-2021. US Department of Agriculture (USDA) National Agricultural Statistics Service. https://quickstats.nass.usda.gov (direct query: https://quickstats.nass.usda.gov/results/1D738304-38A8-3977-B7BA-B67A7AF33530)
  USDA NASS (2021) Applications - fertilizers and pesticides - number, amount, - Soybean, Illinois - 2000-2021. US Department of Agriculture (USDA) National Agricultural Statistics Service. https://quickstats.nass.usda.gov (direct query: https://quickstats.nass.usda.gov/results/CBB93A96-1EAC-3BFF-87F0-5E4AECFE034D)
  properties: carbon content, fossil 0.344279, dry mass 1 kg, wet mass 1 kg
- single superphosphate: 0.000761761 kg; normal variance with pedigree 2.28071e-8, pedigree (2,1,2,1,1)
  7.62E-4 kg superphosphate/kg soybean
  Quantities of specific fertiliser are calculated based on US fertiliser market share and nutrient compositions from IFA data to meet total nutrient demand N-P-K-S: 2.86--13.38--1.18--0.77 kg/ha (USDA NASS data for 2015, 2017, 2018, 2020). Quantity of specific fertiliser calculated from: average total N application (2010, 2014, 2016, 2018) reported cropped area of specified crop (includes all rotation patterns) and share of fertilisers in U.S. consumption mix (ecoinvent and IFA 2019) times each fertiliser's P2O5 to N ratio (IFA), subtracted from the application rate for the necessary nutrient, and multiplied by the mass of the compound over the mass of P2O5 in the compound.
  Sources:
  USDA NASS (2021) SOYBEAN- APPLICATIONS, MEASURED IN LB / ACRE / YEAR, AVG (fertilizer and pesticides, amount, number of applications) - 2000-2021. US Department of Agriculture (USDA) National Agricultural Statistics Service. https://quickstats.nass.usda.gov (direct query: https://quickstats.nass.usda.gov/results/1D738304-38A8-3977-B7BA-B67A7AF33530) ; Ecoinvent U.S. consumption mix for N fertilisers, from IFA data; IFA (2021) Nutrient content in percentage - IFA Fertilizer Converter. International Fertilizer Association. https://www.ifastat.org/converter/fertilizer-converter/ accessed 2021-06-24
  properties: dry mass 1 kg, phosphorus content 0.0916484, wet mass 1 kg
- solid manure loading and spreading, by hydraulic loader and spreader: 5.74935e-6 kg; lognormal variance with pedigree 0.0206, pedigree (4,4,3,1,3)
  2.27E-2 kg/ha (5.75E-6 kg/kg soybean) solid manure loading and spreading, by hydraulic loader and spreader
  The total effective manure application rate of 260 kg/ha (0.066 kg/kg soybean) is calculated from USDA ERS data for amount of manure applied (11.4 kg/ha; 0.07 kg/kg soybean) on share of crop area treated (2.3%) (years available: 2002, 2006) USDA ARMS 2015. The manure data has significant uncertainty due to both the age of the available data and the statistical limitations imposed by confidentiality for USDA survey respondents.
  None of the applied manure is in liquid form, calculated from the share of dry, semi-dry and slurry and lagoon manure applied from ARMS data. 100.% of manure from cattle. USDA data shows zero share from swine manure.USDA data shows zero share from poultry manure. Cattle manure is apportioned between solid and liquid consistent with USDA estimated shares The effective application rates are 260. kg solid manure per ha (0.E+0 kg/kg soybean).
  Field operations are as identified in crop- and rotation-specific enterprise crop budgets supplied by the regional agricultural extension office and matched to equipment type in the budget or crop guidance. (UNL Extension 2020; UNL Extension 2021). Operations are matched to equipment type and where multiple options are available, the share of each is determined from guidance and annual farmer survey data (Custom Rate Summaries) for contracted operations/equipment. Where an operation applies only to a portion of the harvested area, the number of passes has been scaled by the % of harvested area to which it applies (e.g., manure spreading or insecticide) as indicated by USDA statistics (applications) or USDA reports (manure use) or as otherwise indicated in enterprise crop budgets.
  Source(s):
  USDA ARMS (2015) Agricultural Resource Management Survey (ARMS) Farm Financial and Crop Production Practices: Manure Table, Corn. USDA. https://data.ers.usda.gov/reports.aspx?ID=17883
  Beegle D and Peters J. (2019) Common Manure Test Results Conversions. National Cooperative Extension Resource, Livestock And Poultry Environmental Learning Community (Lpelc). https://lpelc.org/common-manure-test-results-conversions/ accessed October 5, 2021
  Wilson M (2021) Manure Characteristics. University of Minnesota Extension. https://extension.umn.edu/manure-management/manure-characteristics; https://drive.google.com/file/d/1-c8bx_75YSsQZTNFB_YFVD-uw_SbX1dB/view?usp=sharing
  Klein R and McClure G 2021a
  Klein R and McClure G 2021b
- soybean seed, for sowing: 0.0113261 kg; normal variance with pedigree 7.28346, pedigree (2,3,2,3,2)
  Each planted hectare uses 44.79 kg seed (1.13E-2 kg/kg soybean). This value is calculated from a seeding rate of 296,526 seeds/ha (Mueller N, Rees J, Thompson L. 2020; ) and an average seed count of 6,621 seeds/kg (averaged from Geyer A, Hankinson M, McCormic J, and Lindsey L 2021, Plansek T 2021). About 95% of planted soybean is genetically engineered for herbicide tolerance (USDA NASS 2022). Germination of 90.0% and stand losses are accounted for in the seeding rate (Beals S 2020; Knox S et al 2019; Staton M, Chilvers M, Tiedje C. 2022) Sources:
  Mueller N, Rees J, Thompson L. (2020) Soybean Seeding Rate On-Farm Research. University of Nebraska–Lincoln Extension, Institute of Agriculture and Natural Resources. https://cropwatch.unl.edu/2020/soybean-seeding-rate-farm-research#:~:text=Key%20Point%3A%20The%20Nebraska%20On,farms%2C%20and%20fields%20in%20Nebraska. , Rees J, Thompson L, Mueller N. (2018) What On-Farm Research has Taught Us about Soybean Seeding Rates. University of Nebraska–Lincoln Extension, Institute of Agriculture and Natural Resources. https://cropwatch.unl.edu/2018/what-farm-research-has-taught-us-about-soybean-seeding-rates , USDA NASS. (2020). Crops/Stocks Survey (or Agricultural Survey) for the years 2000-20 - Recent Trends in GE Adoption. US Department of Agriculture (USDA). https://www.ers.usda.gov/data-products/adoption-of-genetically-engineered-crops-in-the-us/documentation/ , Beals S (2020) Seed Quality Update. Illinois crop improvement association-Seed Lab Report. https://www.ilcrop.com/illinois-seed-news/seed-lab-report/seed-quality-update/ ; Knox S et al (2019) Soybean Seed Germination Concerns. University of Nebraska–Lincoln Extension, Institute of Agriculture and Natural Resources. https://cropwatch.unl.edu/2019/soybean-seed-germination-concerns ; Staton M, Chilvers M, Tiedje C. (2022) Seed Quality Considerations. Michigan State University Extension. https://www.canr.msu.edu/news/soybean_seed_quality_considerations#:~:text=While%20much%20of%20the%20soybean,and%20it%20is%20always%20conservative. ;Geyer A, Hankinson M, McCormic J, and Lindsey L (2021) 2021 OHIO SOYBEAN PERFORMANCE TRIALS. Ohio State University Extension and OARDC. https://ohiocroptest.cfaes.osu.edu/soy2020/ ;Plansek T (2021) Beyer, Corteva in 'two-dog battle' over U.S. soy market. Reuters. April 9, 2021. . https://www.reuters.com/article/us-usa-soybeans-seeds-focus/bayer-corteva-in-two-dog-battle-over-u-s-soy-market-idUSKBN2BW1IE Accessed May 23, 2022., Mekonnen et al (2018) Water, Energy, and Carbon Footprints of Bioethanol from the U.S. and Brazil. Environ. Sci. Technol. 52:14508–14518. Mesfin M. Mekonnen, Thiago L. Romanelli, Chittaranjan Ray, Arjen Y. Hoekstra, Adam J. Liska, and Christopher M.U. Neale. https://pubs.acs.org/doi/10.1021/acs.est.8b03359
  properties: carbon content, non-fossil 0.43596, dry mass 0.89 kg, water content 0.123596, wet mass 1 kg
- tebuconazole: 1.54559e-6 kg; normal variance with pedigree 7.10296e-17, pedigree (1,2,2,1,1)
  Average over state-wide reported cropped area of soybean for all tillage practices (CTIC 2020a) and across all rotation patterns (Socolar et al 2021 ) - calculated from specified herbicide/insecticide/fungicide quantity applied to treated acres weighted by share of acres treated with that herbicide/insecticide/fungicide (2015,2017,2018,2020-USDA NASS data, USDA NASS 2021e).
  Sources:
  CTIC (2020a) OpTIS - Operational Tillage Information System. Conservation Technology Information Center (CTIC). https://www.ctic.org/optis_tabular_query accessed March 23, 2021
  Socolar Y, Goldstein B R, de Valpine P, Bowles T M (2021) Biophysical and policy factors predict simplified crop rotations in the US Midwest. Environ. Res. Lett. 16 054045. https://iopscience.iop.org/article/10.1088/1748-9326/abf9ca
  USDA NASS (2021) SOYBEAN- APPLICATIONS, MEASURED IN LB / ACRE / YEAR, AVG (fertilizer and pesticides, amount, number of applications) - 2000-2021. US Department of Agriculture (USDA) National Agricultural Statistics Service. https://quickstats.nass.usda.gov (direct query: https://quickstats.nass.usda.gov/results/1D738304-38A8-3977-B7BA-B67A7AF33530)
  USDA NASS (2021) Applications - fertilizers and pesticides - number, amount, - Soybean, Illinois - 2000-2021. US Department of Agriculture (USDA) National Agricultural Statistics Service. https://quickstats.nass.usda.gov (direct query: https://quickstats.nass.usda.gov/results/CBB93A96-1EAC-3BFF-87F0-5E4AECFE034D)
- tillage, cultivating, chiselling: 3.89789e-5 ha; lognormal variance with pedigree 0.0206, pedigree (4,4,3,1,3)
  3.9E-5 ha/kg tillage, cultivating, chiselling (0.154 effective pass(es) per year).
  Field operations are as identified in crop- and rotation-specific enterprise crop budgets supplied by the regional agricultural extension office and matched to equipment type in the budget or crop guidance. Operations are matched to equipment type and where multiple options are available, the share of each is determined from guidance and annual farmer survey data (Custom Rate Summaries) for contracted operations/equipment. Field cultivation and tillage operations are specific to the tillage regime used. Soybean is 41% reduced till, 44% no till, and 15% conventional till in Nebraska (CTIC 2020a).This operation applies only to conventionally tilled fields.
  Sources:
  UNL Extension (2020) Nebraska Crop Budgets. Nebraska Extension, University of Nebraska–Lincoln Institute of Agriculture and Natural Resources. https://cropwatch.unl.edu/budgets, https://cropwatch.unl.edu/Budgets/2020/2020-NE-crop-budget-intro.pdf , UNL Extension (2021) Nebraska Crop Budgets. Nebraska Extension, University of Nebraska–Lincoln Institute of Agriculture and Natural Resources. https://cropwatch.unl.edu/Budgets/2021/2021-all-nebraska-crop-budgets-updated-021521.pdf , Klein R and McClure G (2021a) 2021 Nebraska Crop Budgets EC872 - Soybean Dryland (tables 57, 58, 59). Nebraska Extension - Institute of Agriculture and Natural Resources, Universoty of Nebraska-Lincoln. https://cropwatch.unl.edu/Budgets/2021/2021-Soybeans-021521.pdf , Klein R and McClure G (2021b) 2021 Nebraska Crop Budgets EC872 - Irrigated Soybean (tables 60 to 66). Nebraska Extension - Institute of Agriculture and Natural Resources, Universoty of Nebraska-Lincoln. https://cropwatch.unl.edu/Budgets/2021/2021-Soybeans-021521.pdf ; CTIC (2020a) OpTIS - Operational Tillage Information System. Conservation Technology Information Center (CTIC). https://www.ctic.org/optis_tabular_query accessed March 23, 2021
- tillage, harrowing, by rotary harrow: 3.89789e-5 ha; lognormal variance with pedigree 0.0206, pedigree (4,4,3,1,3)
  3.9E-5 ha/kg tillage, disking (0.154 effective pass(es) per year).
  Field operations are as identified in crop- and rotation-specific enterprise crop budgets supplied by the regional agricultural extension office and matched to equipment type in the budget or crop guidance. Operations are matched to equipment type and where multiple options are available, the share of each is determined from guidance and annual farmer survey data (Custom Rate Summaries) for contracted operations/equipment. Field cultivation and tillage operations are specific to the tillage regime used. Soybean is 41% reduced till, 44% no till, and 15% conventional till in Nebraska (CTIC 2020a).This operation applies only to conventionally tilled fields.
  Sources:
  UNL Extension (2020) Nebraska Crop Budgets. Nebraska Extension, University of Nebraska–Lincoln Institute of Agriculture and Natural Resources. https://cropwatch.unl.edu/budgets, https://cropwatch.unl.edu/Budgets/2020/2020-NE-crop-budget-intro.pdf , UNL Extension (2021) Nebraska Crop Budgets. Nebraska Extension, University of Nebraska–Lincoln Institute of Agriculture and Natural Resources. https://cropwatch.unl.edu/Budgets/2021/2021-all-nebraska-crop-budgets-updated-021521.pdf , Klein R and McClure G (2021a) 2021 Nebraska Crop Budgets EC872 - Soybean Dryland (tables 57, 58, 59). Nebraska Extension - Institute of Agriculture and Natural Resources, Universoty of Nebraska-Lincoln. https://cropwatch.unl.edu/Budgets/2021/2021-Soybeans-021521.pdf , Klein R and McClure G (2021b) 2021 Nebraska Crop Budgets EC872 - Irrigated Soybean (tables 60 to 66). Nebraska Extension - Institute of Agriculture and Natural Resources, Universoty of Nebraska-Lincoln. https://cropwatch.unl.edu/Budgets/2021/2021-Soybeans-021521.pdf ; CTIC (2020a) OpTIS - Operational Tillage Information System. Conservation Technology Information Center (CTIC). https://www.ctic.org/optis_tabular_query accessed March 23, 2021
- tillage, harrowing, by spring tine harrow: 0.000103407 ha; lognormal variance with pedigree 0.0206, pedigree (4,4,3,1,3)
  1.03E-4 ha/kg tillage, cultivating, by strip tiller (0.409 effective pass(es) per year).
  Field operations are as identified in crop- and rotation-specific enterprise crop budgets supplied by the regional agricultural extension office and matched to equipment type in the budget or crop guidance. Operations are matched to equipment type and where multiple options are available, the share of each is determined from guidance and annual farmer survey data (Custom Rate Summaries) for contracted operations/equipment. Field cultivation and tillage operations are specific to the tillage regime used. Soybean is 41% reduced till, 44% no till, and 15% conventional till in Nebraska (CTIC 2020a).This operation applies to reduced till fields only.
  Sources:
  UNL Extension (2020) Nebraska Crop Budgets. Nebraska Extension, University of Nebraska–Lincoln Institute of Agriculture and Natural Resources. https://cropwatch.unl.edu/budgets, https://cropwatch.unl.edu/Budgets/2020/2020-NE-crop-budget-intro.pdf , UNL Extension (2021) Nebraska Crop Budgets. Nebraska Extension, University of Nebraska–Lincoln Institute of Agriculture and Natural Resources. https://cropwatch.unl.edu/Budgets/2021/2021-all-nebraska-crop-budgets-updated-021521.pdf , Klein R and McClure G (2021a) 2021 Nebraska Crop Budgets EC872 - Soybean Dryland (tables 57, 58, 59). Nebraska Extension - Institute of Agriculture and Natural Resources, Universoty of Nebraska-Lincoln. https://cropwatch.unl.edu/Budgets/2021/2021-Soybeans-021521.pdf , Klein R and McClure G (2021b) 2021 Nebraska Crop Budgets EC872 - Irrigated Soybean (tables 60 to 66). Nebraska Extension - Institute of Agriculture and Natural Resources, Universoty of Nebraska-Lincoln. https://cropwatch.unl.edu/Budgets/2021/2021-Soybeans-021521.pdf ; CTIC (2020a) OpTIS - Operational Tillage Information System. Conservation Technology Information Center (CTIC). https://www.ctic.org/optis_tabular_query accessed March 23, 2021
- tillage, rotary cultivator: 0.000505771 ha; lognormal variance with pedigree 0.0206, pedigree (4,4,3,1,3)
  5.06E-4 ha/kg tillage, rotary cultivator (2. effective pass(es) per year).
  Field operations are as identified in crop- and rotation-specific enterprise crop budgets supplied by the regional agricultural extension office and matched to equipment type in the budget or crop guidance. Operations are matched to equipment type and where multiple options are available, the share of each is determined from guidance and annual farmer survey data (Custom Rate Summaries) for contracted operations/equipment. Field cultivation and tillage operations are specific to the tillage regime used. Soybean is 41% reduced till, 44% no till, and 15% conventional till in Nebraska (CTIC 2020a).This operation applies to fields under all tillage regimes.
  Sources:
  UNL Extension (2020) Nebraska Crop Budgets. Nebraska Extension, University of Nebraska–Lincoln Institute of Agriculture and Natural Resources. https://cropwatch.unl.edu/budgets, https://cropwatch.unl.edu/Budgets/2020/2020-NE-crop-budget-intro.pdf , UNL Extension (2021) Nebraska Crop Budgets. Nebraska Extension, University of Nebraska–Lincoln Institute of Agriculture and Natural Resources. https://cropwatch.unl.edu/Budgets/2021/2021-all-nebraska-crop-budgets-updated-021521.pdf , Klein R and McClure G (2021a) 2021 Nebraska Crop Budgets EC872 - Soybean Dryland (tables 57, 58, 59). Nebraska Extension - Institute of Agriculture and Natural Resources, Universoty of Nebraska-Lincoln. https://cropwatch.unl.edu/Budgets/2021/2021-Soybeans-021521.pdf , Klein R and McClure G (2021b) 2021 Nebraska Crop Budgets EC872 - Irrigated Soybean (tables 60 to 66). Nebraska Extension - Institute of Agriculture and Natural Resources, Universoty of Nebraska-Lincoln. https://cropwatch.unl.edu/Budgets/2021/2021-Soybeans-021521.pdf ; CTIC (2020a) OpTIS - Operational Tillage Information System. Conservation Technology Information Center (CTIC). https://www.ctic.org/optis_tabular_query accessed March 23, 2021
- triazine-compound: 7.70709e-6 kg; normal variance with pedigree 4.39157e-14, pedigree (1,2,2,1,1)
  Proxy for applied pesticide(s) Metribuzin (3.048E-2 kg/ha {1,4,1,1,1}).
  Average over state-wide reported cropped area of soybean for all tillage practices (CTIC 2020a) and across all rotation patterns (Socolar et al 2021 ) - calculated from specified herbicide/insecticide/fungicide quantity applied to treated acres weighted by share of acres treated with that herbicide/insecticide/fungicide (2015,2017,2018,2020-USDA NASS data, USDA NASS 2021e).
  Sources:
  CTIC (2020a) OpTIS - Operational Tillage Information System. Conservation Technology Information Center (CTIC). https://www.ctic.org/optis_tabular_query accessed March 23, 2021
  Socolar Y, Goldstein B R, de Valpine P, Bowles T M (2021) Biophysical and policy factors predict simplified crop rotations in the US Midwest. Environ. Res. Lett. 16 054045. https://iopscience.iop.org/article/10.1088/1748-9326/abf9ca
  USDA NASS (2021) SOYBEAN- APPLICATIONS, MEASURED IN LB / ACRE / YEAR, AVG (fertilizer and pesticides, amount, number of applications) - 2000-2021. US Department of Agriculture (USDA) National Agricultural Statistics Service. https://quickstats.nass.usda.gov (direct query: https://quickstats.nass.usda.gov/results/1D738304-38A8-3977-B7BA-B67A7AF33530)
  USDA NASS (2021) Applications - fertilizers and pesticides - number, amount, - Soybean, Illinois - 2000-2021. US Department of Agriculture (USDA) National Agricultural Statistics Service. https://quickstats.nass.usda.gov (direct query: https://quickstats.nass.usda.gov/results/CBB93A96-1EAC-3BFF-87F0-5E4AECFE034D)
  properties: carbon content, fossil 0.475616, dry mass 1 kg, wet mass 1 kg
- triple superphosphate: 0.00643395 kg; normal variance with pedigree 1.627e-6, pedigree (2,1,2,1,1)
  6.43E-3 kg triple superphosphate/kg soybean
  Quantities of specific fertiliser are calculated based on US fertiliser market share and nutrient compositions from IFA data to meet total nutrient demand N-P-K-S: 2.86--13.38--1.18--0.77 kg/ha (USDA NASS data for 2015, 2017, 2018, 2020). Quantity of specific fertiliser calculated from: average total N application (2010, 2014, 2016, 2018) reported cropped area of specified crop (includes all rotation patterns) and share of fertilisers in U.S. consumption mix (ecoinvent and IFA 2019) times each fertiliser's P2O5 to N ratio (IFA), subtracted from the application rate for the necessary nutrient, and multiplied by the mass of the compound over the mass of P2O5 in the compound.
  Sources:
  USDA NASS (2021) SOYBEAN- APPLICATIONS, MEASURED IN LB / ACRE / YEAR, AVG (fertilizer and pesticides, amount, number of applications) - 2000-2021. US Department of Agriculture (USDA) National Agricultural Statistics Service. https://quickstats.nass.usda.gov (direct query: https://quickstats.nass.usda.gov/results/1D738304-38A8-3977-B7BA-B67A7AF33530) ; Ecoinvent U.S. consumption mix for N fertilisers, from IFA data; IFA (2021) Nutrient content in percentage - IFA Fertilizer Converter. International Fertilizer Association. https://www.ifastat.org/converter/fertilizer-converter/ accessed 2021-06-24
  properties: dry mass 1 kg, phosphorus content 0.200754, wet mass 1 kg
  note on phosphorus content: Phosphorus content (on a dry matter basis) of triple superphosphate is calculated from the molecular formula of the nutrient present in the substance.
- urea: 0.000399266 kg; normal variance with pedigree 1.17683e-8, pedigree (2,1,2,1,1)
  3.99E-4 kg urea/kg soybean
  Quantities of specific fertiliser are calculated based on US fertiliser market share and nutrient compositions from IFA data to meet total nutrient demand N-P-K-S: 2.86--13.38--1.18--0.77 kg/ha (USDA NASS data for 2015, 2017, 2018, 2020), over reported cropped area of specified crop (includes all rotation patterns): quantity of N applied to treated acres times percent of planted soy bean acres treated (USDA NASS) times share of N supplied by compound in U.S. consumption mix (ecoinvent and IFA 2019) times mass compound per mass N in compound.
  Sources:
  USDA NASS (2021) SOYBEAN- APPLICATIONS, MEASURED IN LB / ACRE / YEAR, AVG (fertilizer and pesticides, amount, number of applications) - 2000-2021. US Department of Agriculture (USDA) National Agricultural Statistics Service. https://quickstats.nass.usda.gov (direct query: https://quickstats.nass.usda.gov/results/1D738304-38A8-3977-B7BA-B67A7AF33530) ; Ecoinvent U.S. consumption mix for N fertilisers, from IFA data; IFA (2021) Nutrient content in percentage - IFA Fertilizer Converter. International Fertilizer Association. https://www.ifastat.org/converter/fertilizer-converter/ accessed 2021-06-24
  properties: carbon content, fossil 0.2, dry mass 1 kg, wet mass 1 kg

- urea ammonium nitrate mix: 0.000673358 kg; normal variance with pedigree 3.34721e-8, pedigree (2,1,2,1,1)
  6.73E-4 kg urea ammonium nitrate mix/kg soybean
  Quantities of specific fertiliser are calculated based on US fertiliser market share and nutrient compositions from IFA data to meet total nutrient demand N-P-K-S: 2.86--13.38--1.18--0.77 kg/ha (USDA NASS data for 2015, 2017, 2018, 2020), over reported cropped area of specified crop (includes all rotation patterns): quantity of N applied to treated acres times percent of planted soy bean acres treated (USDA NASS) times share of N supplied by compound in U.S. consumption mix (ecoinvent and IFA 2019) times mass compound per mass N in compound.
  Sources:
  USDA NASS (2021) SOYBEAN- APPLICATIONS, MEASURED IN LB / ACRE / YEAR, AVG (fertilizer and pesticides, amount, number of applications) - 2000-2021. US Department of Agriculture (USDA) National Agricultural Statistics Service. https://quickstats.nass.usda.gov (direct query: https://quickstats.nass.usda.gov/results/1D738304-38A8-3977-B7BA-B67A7AF33530) ; Ecoinvent U.S. consumption mix for N fertilisers, from IFA data; IFA (2021) Nutrient content in percentage - IFA Fertilizer Converter. International Fertilizer Association. https://www.ifastat.org/converter/fertilizer-converter/ accessed 2021-06-24
  properties: carbon content, fossil 0.0879977, dry mass 0.75 kg, hydrogen content 0.095042, nitrogen content 0.401231, oxygen content 0.749063, water content 0.333333, wet mass 1 kg
  note on carbon content, fossil: Carbon content, fossil is calculated based on the chemical formula of the substance.
  note on hydrogen content: Hydrogen content (on a dry matter basis) of urea ammonium nitrate mix is calculated from the molecular formula of the substance (CH6N4O4).
  note on nitrogen content: Nitrogen content (on a dry matter basis) of urea ammonium nitrate mix is calculated from the molecular formula of the substance (CH6N4O4).
  note on oxygen content: Oxygen content (on a dry matter basis) of urea ammonium nitrate mix is calculated from the molecular formula of the substance (CH6N4O4).
- waste polyethylene: -0.0194022 kg; name waste_pe; = packaging_f+packaging_p; lognormal variance with pedigree 0.002625, pedigree (2,3,2,2,2)
  This waste is derived from the sum of packaging of pesticide and fertilizer.
  production volume; = waste_pe*pv_soy
    Calculated from production volume of reference product using the relative outputs.
  properties: carbon content, fossil 0.825301, dry mass 0.996 kg, heating value, net 42.47 MJ, water content 0.00401606, wet mass 1 kg
  note on carbon content, fossil: C content in 1 kg DM was calculated using data in Tab A.1, ecoinvent v2.2 report 13_I
  note on heating value, net: Value taken from the general comment of the treatment dataset.

## Inputs from nature
- Carbon dioxide, in air [natural resource, in air]: 1.49429 kg; lognormal variance with pedigree 0.0015, pedigree (2,2,2,1,1)
  (same comment as for soybean)
- Energy, gross calorific value, in biomass [natural resource, biotic]: 15.9851 MJ; lognormal variance with pedigree 0.1235, pedigree (3,3,2,3,5)
  (same comment as for soybean)
- Occupation, annual crop, irrigated [natural resource, land]: 1.8649 m2*year; lognormal variance with pedigree 0.0029, pedigree (2,2,2,1,1)
  Land occupation per year (annual growing season). Land is under rotation with other annual crop production (~80% corn-soy, ~20% corn-corn, Socolar et al 2021 ). US NRCS data indicates that total cropland in Nebraska has expanded 4% over the last 20 years, 14% of which was supplied by conversion of pasture, range and forest land, the remainder from land idled under the Conservation Reserve Program (CRP) (NRCS 2020a).
  Annual production is 10.3 million tonnes from US Department of Agriculture (USDA NASS) 2021a on 2.2 million ha planted and 2.4 million ha harvested. Thus occupation is 02.529 ha/t or 25288.563 m2/t (2.5.289m2/kg). This overall land use is split into irrigated (73.74%) and non-irrigated (26.26%) based on agricultural census data () (1.86E+0 m2 planted/kg harvested maize of irrigated land, and 6.64E-1 m2 planted/kg harvested maize of non-irrigated land).
  Sources:
- Occupation, annual crop, non-irrigated [natural resource, land]: 0.663957 m2*year; lognormal variance with pedigree 0.0029, pedigree (2,2,2,1,1)
  (same comment as for Occupation, annual crop, irrigated)
- Transformation, from annual crop, irrigated [natural resource, land]: 1.8649 m2; lognormal variance with pedigree 0.0089, pedigree (2,2,2,1,1)
  Transformation of land for planting. Land is under rotation with other annual crop production (~80% corn-soy, ~20% corn-corn, Socolar et al 2021 ). US NRCS data indicates that total cropland in Nebraska has expanded 4% over the last 20 years, 14% of which was supplied by conversion of pasture, range and forest land, the remainder from land idled under the Conservation Reserve Program (CRP) (NRCS 2020a).
  Annual production is 10.3 million tonnes from US Department of Agriculture (USDA NASS) 2021a on 2.2 million ha planted and 2.4 million ha harvested. Thus occupation is 02.529 ha/t or 25288.563 m2/t (2.5.289m2/kg). This overall land use is split into irrigated (73.74%) and non-irrigated (26.26%) based on agricultural census data () (1.86E+0 m2 planted/kg harvested maize of irrigated land, and 6.64E-1 m2 planted/kg harvested maize of non-irrigated land).
  Sources:
- Transformation, from annual crop, non-irrigated [natural resource, land]: 0.663957 m2; lognormal variance with pedigree 0.0089, pedigree (2,2,2,1,1)
  (same comment as for Transformation, from annual crop, irrigated)
- Transformation, to annual crop, irrigated [natural resource, land]: 1.8649 m2; lognormal variance with pedigree 0.0089, pedigree (2,2,2,1,1)
  (same comment as for Transformation, from annual crop, irrigated)
- Transformation, to annual crop, non-irrigated [natural resource, land]: 0.663957 m2; lognormal variance with pedigree 0.0089, pedigree (2,2,2,1,1)
  (same comment as for Transformation, from annual crop, irrigated)
## Emissions to nature
- Ammonia [air, non-urban air or from high stacks]: 0.00024315 kg; lognormal variance with pedigree 0.0172, pedigree (2,3,4,1,1)
  Ammonia volatilised from applied mineral and organic fertilisers, 1.0 kg NH3/ha (2.43E-4kg NH3/kg soybean) total, 0.2 kg NH3/ha (2.43E-4 kg NH3/kg soybean) from synthetic fertilisers, 0.7 kg NH3/ha (1.82E-4 kg NH3/kg soybean) from manure. NH3 from volatilisation of mineral fertilisers is calculated using Tier 2 emission factors (temperate climate, specific fertiliser) from the European Environment Agency, EMEP/EEA 3Da1, Table3.2 (EEA 2019). NH3 from manure application is calculated with emission factors provided in EMEP/EEA 3.D.a.2.a (Animal manure applied to soils) (EEA 2019) for manure types used as (fraction TAN in total N)*(EF manure spreading per TAN) for each animal group and type. (kg NH3-N/kg N applied: cattle, solid: 0.474). The emissions from manure calculated here do not account for the change in N mineralization and phosphate runoff with incorporation type or time. Where impacts from manure application are expected to be significant, this should be considered as N volatilisation during and after application of manure ranges from as low as 1% N with direct injection to ~5% with immediate incorporation to 20-40% without incorporation (Sawyer J, Mallarino A P (2016) Using Manure Nutrients for Crop Production. Cooperative Extension Service, Iowa State University of Science and Technology. https://store.extension.iastate.edu/product/12874 and Midwast Plan Services MWPS-18, 3ed)..
- Carbon dioxide, fossil [air, non-urban air or from high stacks]: 0.000186534 kg; lognormal variance with pedigree 0.0092, pedigree (2,3,4,1,1)
  CO2 emissions from use of urea fertilisers and lime, 7.38E-1 kg/ha (1.87E-4 kg/kg soybean): 7.376E-1 kg/ha from urea and urea ammonium nitrate; 0.E+0 kg/ha from lime.
  Emissions are calculated following the IPCC NIR Guidelines, §11.3 and §11.4, using IPCC NIR equations 11.12 (lime) and 11.13 (urea) (mass of lime/urea * emissions factor for lime/urea) with Tier 1 emissions factors (IPCC 2006b). EF limestone = 0.12 kg CO2-C/kg limestone (0.06-0.12, uniform) and EF urea = 0.2 kg CO2-C/kg urea (0.1-0.2, uniform) applied to both urea and the approximately 35% of UAN that is urea. The result is converted from kg CO2-C to kg CO2 (multiplying by the molar mass of CO2/mass of C in CO2 = 44.01/12)
- Dinitrogen monoxide [air, non-urban air or from high stacks]: 0.000173662 kg; lognormal variance with pedigree 0.0392, pedigree (2,3,4,1,1)
  Direct and indirect N2O emissions from fertilizer and manure use and crop cultivation. direct emissions: 0.71 kgN2O/ha (1.77E-4 kg N2O/kg soybean), 5.7E-4 kg N2O/ha from synthetic fertiliser N and 7.9E-5 kg N2O/ha from manure N, 4.52E-1kg N2O/ha from crop residues
- Nitrogen oxides [air, non-urban air or from high stacks]: 3.85655e-5 kg; lognormal variance with pedigree 0.0392, pedigree (2,3,4,1,1)
  NOx emissions from fertilizer and manure nitrification after N loss from NH3, as NO2, 1.53E-1 kg NO2/ha (3.86E-5kg NO2/kg soybean): 1.05E-1 kg NO2/ha from fertilisers; 4.8E-2 kg NO2/ha from manure. Calculated according to EEA/EMEP guidance, EF_NO_Managed Soils = 0.04 kg NO2/kg N fertiliser and manure N applied (range 0.005 to 0.104, 95% CL), from Table 3.1, Tier 1 EFs for source category 3.D, EMEP/EEA Guidebook 2019.
- Water [air, non-urban air or from high stacks]: 0.00670994 m3; lognormal variance with pedigree 0.0015, pedigree (2,2,2,1,1)
  Irrigation water released to air via evapotranspiration. Calculated by the ecoinvent agricultural LCI tool.
- 2,4-D [soil, agricultural]: 2.96939e-5 kg; normal variance with pedigree 9.67664e-12, pedigree (2,2,2,1,1)
  2,4-D emission to agricultural soil (1.174E-01 kg/ha). Pesticides are assumed to be ultimately 100% emitted to soil. Average over state-wide reported cropped area of soybean for all tillage practices (CTIC 2020a) and across all rotation patterns (Socolar et al 2021 ) - calculated from specified herbicide/insecticide/fungicide quantity applied to treated acres weighted by share of acres treated with that herbicide/insecticide/fungicide (2015,2017,2018,2020-USDA NASS data, USDA NASS 2021e)
  Sources:
  CTIC (2020a) OpTIS - Operational Tillage Information System. Conservation Technology Information Center (CTIC). https://www.ctic.org/optis_tabular_query accessed March 23, 2021
  Socolar Y, Goldstein B R, de Valpine P, Bowles T M (2021) Biophysical and policy factors predict simplified crop rotations in the US Midwest. Environ. Res. Lett. 16 054045. https://iopscience.iop.org/article/10.1088/1748-9326/abf9ca
  USDA NASS (2021) SOYBEAN- APPLICATIONS, MEASURED IN LB / ACRE / YEAR, AVG (fertilizer and pesticides, amount, number of applications) - 2000-2021. US Department of Agriculture (USDA) National Agricultural Statistics Service. https://quickstats.nass.usda.gov (direct query: https://quickstats.nass.usda.gov/results/1D738304-38A8-3977-B7BA-B67A7AF33530)
  USDA NASS (2021) Applications - fertilizers and pesticides - number, amount, - Soybean, Illinois - 2000-2021. US Department of Agriculture (USDA) National Agricultural Statistics Service. https://quickstats.nass.usda.gov (direct query: https://quickstats.nass.usda.gov/results/CBB93A96-1EAC-3BFF-87F0-5E4AECFE034D)
- 2,4-D dimethylamine salt [soil, agricultural]: 1.24605e-5 kg; normal variance with pedigree 3.00053e-13, pedigree (2,2,2,1,1)
  2,4-D amines emission to agricultural soil (4.927E-02 kg/ha). Pesticides are assumed to be ultimately 100% emitted to soil. Average over state-wide reported cropped area of soybean for all tillage practices (CTIC 2020a) and across all rotation patterns (Socolar et al 2021 ) - calculated from specified herbicide/insecticide/fungicide quantity applied to treated acres weighted by share of acres treated with that herbicide/insecticide/fungicide (2015,2017,2018,2020-USDA NASS data, USDA NASS 2021e)
  Sources:
  CTIC (2020a) OpTIS - Operational Tillage Information System. Conservation Technology Information Center (CTIC). https://www.ctic.org/optis_tabular_query accessed March 23, 2021
  Socolar Y, Goldstein B R, de Valpine P, Bowles T M (2021) Biophysical and policy factors predict simplified crop rotations in the US Midwest. Environ. Res. Lett. 16 054045. https://iopscience.iop.org/article/10.1088/1748-9326/abf9ca
  USDA NASS (2021) SOYBEAN- APPLICATIONS, MEASURED IN LB / ACRE / YEAR, AVG (fertilizer and pesticides, amount, number of applications) - 2000-2021. US Department of Agriculture (USDA) National Agricultural Statistics Service. https://quickstats.nass.usda.gov (direct query: https://quickstats.nass.usda.gov/results/1D738304-38A8-3977-B7BA-B67A7AF33530)
  USDA NASS (2021) Applications - fertilizers and pesticides - number, amount, - Soybean, Illinois - 2000-2021. US Department of Agriculture (USDA) National Agricultural Statistics Service. https://quickstats.nass.usda.gov (direct query: https://quickstats.nass.usda.gov/results/CBB93A96-1EAC-3BFF-87F0-5E4AECFE034D)
- Acetochlor [soil, agricultural]: 2.53515e-5 kg; normal variance with pedigree 5.14127e-12, pedigree (2,2,2,1,1)
  Acetochlor emission to agricultural soil (1.002E-01 kg/ha). Pesticides are assumed to be ultimately 100% emitted to soil. Average over state-wide reported cropped area of soybean for all tillage practices (CTIC 2020a) and across all rotation patterns (Socolar et al 2021 ) - calculated from specified herbicide/insecticide/fungicide quantity applied to treated acres weighted by share of acres treated with that herbicide/insecticide/fungicide (2015,2017,2018,2020-USDA NASS data, USDA NASS 2021e)
  Sources:
  CTIC (2020a) OpTIS - Operational Tillage Information System. Conservation Technology Information Center (CTIC). https://www.ctic.org/optis_tabular_query accessed March 23, 2021
  Socolar Y, Goldstein B R, de Valpine P, Bowles T M (2021) Biophysical and policy factors predict simplified crop rotations in the US Midwest. Environ. Res. Lett. 16 054045. https://iopscience.iop.org/article/10.1088/1748-9326/abf9ca
  USDA NASS (2021) SOYBEAN- APPLICATIONS, MEASURED IN LB / ACRE / YEAR, AVG (fertilizer and pesticides, amount, number of applications) - 2000-2021. US Department of Agriculture (USDA) National Agricultural Statistics Service. https://quickstats.nass.usda.gov (direct query: https://quickstats.nass.usda.gov/results/1D738304-38A8-3977-B7BA-B67A7AF33530)
  USDA NASS (2021) Applications - fertilizers and pesticides - number, amount, - Soybean, Illinois - 2000-2021. US Department of Agriculture (USDA) National Agricultural Statistics Service. https://quickstats.nass.usda.gov (direct query: https://quickstats.nass.usda.gov/results/CBB93A96-1EAC-3BFF-87F0-5E4AECFE034D)
- Acifluorfen [soil, agricultural]: 3.6067e-6 kg; normal variance with pedigree 2.10619e-15, pedigree (2,2,2,1,1)
  Acifluorfen emission to agricultural soil (1.426E-02 kg/ha). Pesticides are assumed to be ultimately 100% emitted to soil. Average over state-wide reported cropped area of soybean for all tillage practices (CTIC 2020a) and across all rotation patterns (Socolar et al 2021 ) - calculated from specified herbicide/insecticide/fungicide quantity applied to treated acres weighted by share of acres treated with that herbicide/insecticide/fungicide (2015,2017,2018,2020-USDA NASS data, USDA NASS 2021e)
  Sources:
  CTIC (2020a) OpTIS - Operational Tillage Information System. Conservation Technology Information Center (CTIC). https://www.ctic.org/optis_tabular_query accessed March 23, 2021
  Socolar Y, Goldstein B R, de Valpine P, Bowles T M (2021) Biophysical and policy factors predict simplified crop rotations in the US Midwest. Environ. Res. Lett. 16 054045. https://iopscience.iop.org/article/10.1088/1748-9326/abf9ca
  USDA NASS (2021) SOYBEAN- APPLICATIONS, MEASURED IN LB / ACRE / YEAR, AVG (fertilizer and pesticides, amount, number of applications) - 2000-2021. US Department of Agriculture (USDA) National Agricultural Statistics Service. https://quickstats.nass.usda.gov (direct query: https://quickstats.nass.usda.gov/results/1D738304-38A8-3977-B7BA-B67A7AF33530)
  USDA NASS (2021) Applications - fertilizers and pesticides - number, amount, - Soybean, Illinois - 2000-2021. US Department of Agriculture (USDA) National Agricultural Statistics Service. https://quickstats.nass.usda.gov (direct query: https://quickstats.nass.usda.gov/results/CBB93A96-1EAC-3BFF-87F0-5E4AECFE034D)
- Atrazine [soil, agricultural]: 3.51614e-5 kg; normal variance with pedigree 1.90248e-11, pedigree (2,2,4,3,2)
  atrazine emission to agricultural soil (1.390E-01 kg/ha). Pesticides are assumed to be ultimately 100% emitted to soil. Average over state-wide reported cropped area of soybean for all tillage practices (CTIC 2020a) and across all rotation patterns (Socolar et al 2021 ) - calculated from specified herbicide/insecticide/fungicide quantity applied to treated acres weighted by share of acres treated with that herbicide/insecticide/fungicide (2015,2017,2018,2020-USDA NASS data, USDA NASS 2021e)
  NASS does not contain numerical values for a number of pesticides widely used in soybean, are reported have no numerical data reported in NASS, as the values are hidden. For the most significant of those (those with more than 10 non-zero but withheld entries), the dataset uses other NASS entries to estimate the quantity if numerical entries are available. The quantity used in the dataset for those pesticides is taken from maize if available, because the widespread one-year soybean-maize rotation cycle leads to more consistent usages. For the ones not covered in the numerical data for maize, the national average from NASS data is used if NASS contains non-withheld data. Where no numerical data are available in NASS, the item is excluded to avoid inconsistency with the pesticide usage matrix based on NASS data.
  Pesticide data is sometimes withheld in the NASS database to avoid disclosing data for individual operations (denoted with "D" in the data returned for the query, indicating a non-zero but withheld value). Where there is obfuscated, non-zero data for particular compounds, the crop-specific U.S. average (calculated from the USDA NASS data, which covers a subset of states, generally those with non-negligible production of the particular crop) are used. For states with all (D) entries (i.e., the compound has been reported as used – non-zero -- but data cannot be shown), the average quantity and variability of the application rate for that compound across all of the specific crop in the US in the same time period is used. For states with a single non-D data year in the dataset timeframe, that data value is uded and the variability is set to the variability of the application rate for that compound across all of the specific crop in the US in the relevant time period.
  Note that this U.S. soy average value and standard deviation is neither production nor area weighted, as the application rate depends on many factors and this value is intended to represent the range of use. Instead, the average percent of treated acres for the class in that state is used. That is, if the average share of planted area across all non-zero, non-withheld values for fungicide treatment is 15%, then the US average application rate for the withheld data fungicide is scaled by 15% to reflect the effective average treatment per ha for that compound on the particular crop in the state.
  Sources:
  CTIC (2020a) OpTIS - Operational Tillage Information System. Conservation Technology Information Center (CTIC). https://www.ctic.org/optis_tabular_query accessed March 23, 2021
  Socolar Y, Goldstein B R, de Valpine P, Bowles T M (2021) Biophysical and policy factors predict simplified crop rotations in the US Midwest. Environ. Res. Lett. 16 054045. https://iopscience.iop.org/article/10.1088/1748-9326/abf9ca
  USDA NASS (2021) SOYBEAN- APPLICATIONS, MEASURED IN LB / ACRE / YEAR, AVG (fertilizer and pesticides, amount, number of applications) - 2000-2021. US Department of Agriculture (USDA) National Agricultural Statistics Service. https://quickstats.nass.usda.gov (direct query: https://quickstats.nass.usda.gov/results/1D738304-38A8-3977-B7BA-B67A7AF33530)
  USDA NASS (2021) Applications - fertilizers and pesticides - number, amount, - Soybean, Illinois - 2000-2021. US Department of Agriculture (USDA) National Agricultural Statistics Service. https://quickstats.nass.usda.gov (direct query: https://quickstats.nass.usda.gov/results/CBB93A96-1EAC-3BFF-87F0-5E4AECFE034D)
- Azoxystrobin [soil, agricultural]: 1.74299e-6 kg; normal variance with pedigree 1.14878e-16, pedigree (2,2,2,1,1)
  Azoxystrobin emission to agricultural soil (6.892E-03 kg/ha). Pesticides are assumed to be ultimately 100% emitted to soil. Average over state-wide reported cropped area of soybean for all tillage practices (CTIC 2020a) and across all rotation patterns (Socolar et al 2021 ) - calculated from specified herbicide/insecticide/fungicide quantity applied to treated acres weighted by share of acres treated with that herbicide/insecticide/fungicide (2015,2017,2018,2020-USDA NASS data, USDA NASS 2021e)
  Sources:
  CTIC (2020a) OpTIS - Operational Tillage Information System. Conservation Technology Information Center (CTIC). https://www.ctic.org/optis_tabular_query accessed March 23, 2021
  Socolar Y, Goldstein B R, de Valpine P, Bowles T M (2021) Biophysical and policy factors predict simplified crop rotations in the US Midwest. Environ. Res. Lett. 16 054045. https://iopscience.iop.org/article/10.1088/1748-9326/abf9ca
  USDA NASS (2021) SOYBEAN- APPLICATIONS, MEASURED IN LB / ACRE / YEAR, AVG (fertilizer and pesticides, amount, number of applications) - 2000-2021. US Department of Agriculture (USDA) National Agricultural Statistics Service. https://quickstats.nass.usda.gov (direct query: https://quickstats.nass.usda.gov/results/1D738304-38A8-3977-B7BA-B67A7AF33530)
  USDA NASS (2021) Applications - fertilizers and pesticides - number, amount, - Soybean, Illinois - 2000-2021. US Department of Agriculture (USDA) National Agricultural Statistics Service. https://quickstats.nass.usda.gov (direct query: https://quickstats.nass.usda.gov/results/CBB93A96-1EAC-3BFF-87F0-5E4AECFE034D)
- Benzovindiflupyr [soil, agricultural]: 4.13124e-7 kg; normal variance with pedigree 3.62558e-19, pedigree (2,2,2,1,1)
  Benzovindiflupyr emission to agricultural soil (1.634E-03 kg/ha). Pesticides are assumed to be ultimately 100% emitted to soil. Average over state-wide reported cropped area of soybean for all tillage practices (CTIC 2020a) and across all rotation patterns (Socolar et al 2021 ) - calculated from specified herbicide/insecticide/fungicide quantity applied to treated acres weighted by share of acres treated with that herbicide/insecticide/fungicide (2015,2017,2018,2020-USDA NASS data, USDA NASS 2021e)
  Sources:
  CTIC (2020a) OpTIS - Operational Tillage Information System. Conservation Technology Information Center (CTIC). https://www.ctic.org/optis_tabular_query accessed March 23, 2021
  Socolar Y, Goldstein B R, de Valpine P, Bowles T M (2021) Biophysical and policy factors predict simplified crop rotations in the US Midwest. Environ. Res. Lett. 16 054045. https://iopscience.iop.org/article/10.1088/1748-9326/abf9ca
  USDA NASS (2021) SOYBEAN- APPLICATIONS, MEASURED IN LB / ACRE / YEAR, AVG (fertilizer and pesticides, amount, number of applications) - 2000-2021. US Department of Agriculture (USDA) National Agricultural Statistics Service. https://quickstats.nass.usda.gov (direct query: https://quickstats.nass.usda.gov/results/1D738304-38A8-3977-B7BA-B67A7AF33530)
  USDA NASS (2021) Applications - fertilizers and pesticides - number, amount, - Soybean, Illinois - 2000-2021. US Department of Agriculture (USDA) National Agricultural Statistics Service. https://quickstats.nass.usda.gov (direct query: https://quickstats.nass.usda.gov/results/CBB93A96-1EAC-3BFF-87F0-5E4AECFE034D)
- Bifenthrin [soil, agricultural]: 7.82313e-7 kg; normal variance with pedigree 4.66207e-18, pedigree (2,2,2,1,1)
  Bifenthrin emission to agricultural soil (3.094E-03 kg/ha). Pesticides are assumed to be ultimately 100% emitted to soil. Average over state-wide reported cropped area of soybean for all tillage practices (CTIC 2020a) and across all rotation patterns (Socolar et al 2021 ) - calculated from specified herbicide/insecticide/fungicide quantity applied to treated acres weighted by share of acres treated with that herbicide/insecticide/fungicide (2015,2017,2018,2020-USDA NASS data, USDA NASS 2021e)
  Sources:
  CTIC (2020a) OpTIS - Operational Tillage Information System. Conservation Technology Information Center (CTIC). https://www.ctic.org/optis_tabular_query accessed March 23, 2021
  Socolar Y, Goldstein B R, de Valpine P, Bowles T M (2021) Biophysical and policy factors predict simplified crop rotations in the US Midwest. Environ. Res. Lett. 16 054045. https://iopscience.iop.org/article/10.1088/1748-9326/abf9ca
  USDA NASS (2021) SOYBEAN- APPLICATIONS, MEASURED IN LB / ACRE / YEAR, AVG (fertilizer and pesticides, amount, number of applications) - 2000-2021. US Department of Agriculture (USDA) National Agricultural Statistics Service. https://quickstats.nass.usda.gov (direct query: https://quickstats.nass.usda.gov/results/1D738304-38A8-3977-B7BA-B67A7AF33530)
  USDA NASS (2021) Applications - fertilizers and pesticides - number, amount, - Soybean, Illinois - 2000-2021. US Department of Agriculture (USDA) National Agricultural Statistics Service. https://quickstats.nass.usda.gov (direct query: https://quickstats.nass.usda.gov/results/CBB93A96-1EAC-3BFF-87F0-5E4AECFE034D)
- Cadmium II [soil, agricultural]: 3.93244e-8 kg; normal variance with pedigree 0.04, pedigree (4,4,5,2,4)
  Emissions of heavy metals to soil are estimated based on the SALCA-heavy metal model (Freiermuth 2006) following the procedure in the ecoinvent agricultural LCI tool (Faist Emmenegger, Délerce-Mauris and Porté 2018 Models Integrated in Ecoinvent LCI Calculation Tool for Crop Production). The balance of heavy metal emissions to soils includes the net change from erosion, leaching, crop removal and fertilizer, manure, lime, planting and deposition. The crop system carries a share of heavy metals emissions based on the ratio of cropping additions to total additions (additions to crop system divided by additions to crop system plus depostion from air and present in soils) Sources for heavy metals contents include: Heavy-metal contents of plant material, maize (mg/kg dry matter, from Freiermuth 2006). ; Leaching of heavy metals to surface water (Wolfensberger & Dinkel 1997), where drainage is installed ; Deposition of heavy metals to soils, mg per ha per year (Freiermuth 2006). ; Deposition of heavy metals to soils, mg per ha per year (Freiermuth 2006). ; Average heavy metal contents in crop soils, mg per kg soil, based on data for Switzerland (from Keller & Desaules, 2001). state and regional erosion rates are from US NRC National Resources Inventory, 2017. and Drainage on all cropland acres state-wide, including tile drainage (41.7%,) and ditch drainage (15.9%). USDA (2018) 2017 Census of Agriculture, Volume 1, Chapter 2: State Level Data - Table 41. Land Use Practices: 2017 and 2012 (live table: https://www.nass.usda.gov/Quick_Stats/CDQT/chapter/2/table/41/state/US). US Department of Agriculture (USDA). https://www.nass.usda.gov/Publications/AgCensus/2017/Full_Report/Volume_1,_Chapter_2_US_State_Level/st99_2_0041_0041.pdf . Fertilizer, manure and pesticide application rates are based on USDA NASS data.
  (N.B. The uncertainty associated with manure data increases the uncertainty of the heavy metal emissions.)
  Sources:
  Freiermuth (2006) SALCA-Schwermetall - Modell zur Berechnung der Schwermetall- flüsse in der Landwirtschaftlichen Ökobilanz. Agroscope FAL Zürich-Reckenholz . https://www.agroscope.admin.ch/dam/agroscope/de/dokumente/themen/umwelt-ressourcen/produktionssysteme/salca-schwermetall.pdf.download.pdf/SALCA-Schwermetall.pdf
  Faist Emmenegger M, Reinhard J, Zah R (2009) Sustainability Quick Check for Biofuels - in- termediate background report. With contributions from T. Ziep, R. Weichbrodt, Prof. Dr. V. Wohlgemuth, FHTW Berlin and A. Roches, R. Freiermuth Knuchel, Dr. G. Gaillard, Agroscope Reckenholz-Tänikon. Dübendorf. . https://www.researchgate.net/profile/Rainer-Zah/publication/230725635_SQCB_-_Sustainability_Quick_Check_for_Biofuels_Second_draft_18th_February_2009_-_Intermediate_Background_Report_With_contributions_from_T_Ziep_R_Weichbrodt_Prof_Dr_V_Wohlgemuth_FHTW_Berlin_and_A_Roche/links/56b458fb08ae1f8aa45392e6/SQCB-Sustainability-Quick-Check-for-Biofuels-Second-draft-18th-February-2009-Intermediate-Background-Report-With-contributions-from-T-Ziep-R-Weichbrodt-Prof-Dr-V-Wohlgemuth-FHTW-Berlin-and-A-R.pdf
  Prasuhn, V (2006) Erfassung der PO4-Austräge für die Ökobilanzierung. SALCA-Phosphor. Zü-rich, CH, Agrocope FAL Reckenholz. Agrocope.
  Faist Emmenegger, Délerce-Mauris and Porté (2018) 2018 Models Integrated in Ecoinvent LCI Calculation Tool for Crop Production. .
- Carfentrazone-ethyl [soil, agricultural]: 7.86356e-7 kg; normal variance with pedigree 4.75921e-18, pedigree (2,2,2,1,1)
  Carfentrazone-ethyl emission to agricultural soil (3.110E-03 kg/ha). Pesticides are assumed to be ultimately 100% emitted to soil. Average over state-wide reported cropped area of soybean for all tillage practices (CTIC 2020a) and across all rotation patterns (Socolar et al 2021 ) - calculated from specified herbicide/insecticide/fungicide quantity applied to treated acres weighted by share of acres treated with that herbicide/insecticide/fungicide (2015,2017,2018,2020-USDA NASS data, USDA NASS 2021e)
  Sources:
  CTIC (2020a) OpTIS - Operational Tillage Information System. Conservation Technology Information Center (CTIC). https://www.ctic.org/optis_tabular_query accessed March 23, 2021
  Socolar Y, Goldstein B R, de Valpine P, Bowles T M (2021) Biophysical and policy factors predict simplified crop rotations in the US Midwest. Environ. Res. Lett. 16 054045. https://iopscience.iop.org/article/10.1088/1748-9326/abf9ca
  USDA NASS (2021) SOYBEAN- APPLICATIONS, MEASURED IN LB / ACRE / YEAR, AVG (fertilizer and pesticides, amount, number of applications) - 2000-2021. US Department of Agriculture (USDA) National Agricultural Statistics Service. https://quickstats.nass.usda.gov (direct query: https://quickstats.nass.usda.gov/results/1D738304-38A8-3977-B7BA-B67A7AF33530)
  USDA NASS (2021) Applications - fertilizers and pesticides - number, amount, - Soybean, Illinois - 2000-2021. US Department of Agriculture (USDA) National Agricultural Statistics Service. https://quickstats.nass.usda.gov (direct query: https://quickstats.nass.usda.gov/results/CBB93A96-1EAC-3BFF-87F0-5E4AECFE034D)
- Chlorimuron-ethyl [soil, agricultural]: 8.06052e-7 kg; normal variance with pedigree 5.25422e-18, pedigree (2,2,2,1,1)
  Chlorimuron-ethyl emission to agricultural soil (3.187E-03 kg/ha). Pesticides are assumed to be ultimately 100% emitted to soil. Average over state-wide reported cropped area of soybean for all tillage practices (CTIC 2020a) and across all rotation patterns (Socolar et al 2021 ) - calculated from specified herbicide/insecticide/fungicide quantity applied to treated acres weighted by share of acres treated with that herbicide/insecticide/fungicide (2015,2017,2018,2020-USDA NASS data, USDA NASS 2021e)
  Sources:
  CTIC (2020a) OpTIS - Operational Tillage Information System. Conservation Technology Information Center (CTIC). https://www.ctic.org/optis_tabular_query accessed March 23, 2021
  Socolar Y, Goldstein B R, de Valpine P, Bowles T M (2021) Biophysical and policy factors predict simplified crop rotations in the US Midwest. Environ. Res. Lett. 16 054045. https://iopscience.iop.org/article/10.1088/1748-9326/abf9ca
  USDA NASS (2021) SOYBEAN- APPLICATIONS, MEASURED IN LB / ACRE / YEAR, AVG (fertilizer and pesticides, amount, number of applications) - 2000-2021. US Department of Agriculture (USDA) National Agricultural Statistics Service. https://quickstats.nass.usda.gov (direct query: https://quickstats.nass.usda.gov/results/1D738304-38A8-3977-B7BA-B67A7AF33530)
  USDA NASS (2021) Applications - fertilizers and pesticides - number, amount, - Soybean, Illinois - 2000-2021. US Department of Agriculture (USDA) National Agricultural Statistics Service. https://quickstats.nass.usda.gov (direct query: https://quickstats.nass.usda.gov/results/CBB93A96-1EAC-3BFF-87F0-5E4AECFE034D)
- Chromium III [soil, agricultural]: -7.43426e-6 kg; normal variance with pedigree 0.04, pedigree (4,4,5,2,4)
  (same comment as for Cadmium II)
- Clethodim [soil, agricultural]: 9.60689e-6 kg; normal variance with pedigree 1.0602e-13, pedigree (2,2,2,1,1)
  Clethodim emission to agricultural soil (3.799E-02 kg/ha). Pesticides are assumed to be ultimately 100% emitted to soil. Average over state-wide reported cropped area of soybean for all tillage practices (CTIC 2020a) and across all rotation patterns (Socolar et al 2021 ) - calculated from specified herbicide/insecticide/fungicide quantity applied to treated acres weighted by share of acres treated with that herbicide/insecticide/fungicide (2015,2017,2018,2020-USDA NASS data, USDA NASS 2021e)
  Sources:
  CTIC (2020a) OpTIS - Operational Tillage Information System. Conservation Technology Information Center (CTIC). https://www.ctic.org/optis_tabular_query accessed March 23, 2021
  Socolar Y, Goldstein B R, de Valpine P, Bowles T M (2021) Biophysical and policy factors predict simplified crop rotations in the US Midwest. Environ. Res. Lett. 16 054045. https://iopscience.iop.org/article/10.1088/1748-9326/abf9ca
  USDA NASS (2021) SOYBEAN- APPLICATIONS, MEASURED IN LB / ACRE / YEAR, AVG (fertilizer and pesticides, amount, number of applications) - 2000-2021. US Department of Agriculture (USDA) National Agricultural Statistics Service. https://quickstats.nass.usda.gov (direct query: https://quickstats.nass.usda.gov/results/1D738304-38A8-3977-B7BA-B67A7AF33530)
  USDA NASS (2021) Applications - fertilizers and pesticides - number, amount, - Soybean, Illinois - 2000-2021. US Department of Agriculture (USDA) National Agricultural Statistics Service. https://quickstats.nass.usda.gov (direct query: https://quickstats.nass.usda.gov/results/CBB93A96-1EAC-3BFF-87F0-5E4AECFE034D)
- Cloransulam-methyl [soil, agricultural]: 8.07292e-7 kg; normal variance with pedigree 5.28663e-18, pedigree (2,2,2,1,1)
  Cloransulam-methyl emission to agricultural soil (3.192E-03 kg/ha). Pesticides are assumed to be ultimately 100% emitted to soil. Average over state-wide reported cropped area of soybean for all tillage practices (CTIC 2020a) and across all rotation patterns (Socolar et al 2021 ) - calculated from specified herbicide/insecticide/fungicide quantity applied to treated acres weighted by share of acres treated with that herbicide/insecticide/fungicide (2015,2017,2018,2020-USDA NASS data, USDA NASS 2021e)
  Sources:
  CTIC (2020a) OpTIS - Operational Tillage Information System. Conservation Technology Information Center (CTIC). https://www.ctic.org/optis_tabular_query accessed March 23, 2021
  Socolar Y, Goldstein B R, de Valpine P, Bowles T M (2021) Biophysical and policy factors predict simplified crop rotations in the US Midwest. Environ. Res. Lett. 16 054045. https://iopscience.iop.org/article/10.1088/1748-9326/abf9ca
  USDA NASS (2021) SOYBEAN- APPLICATIONS, MEASURED IN LB / ACRE / YEAR, AVG (fertilizer and pesticides, amount, number of applications) - 2000-2021. US Department of Agriculture (USDA) National Agricultural Statistics Service. https://quickstats.nass.usda.gov (direct query: https://quickstats.nass.usda.gov/results/1D738304-38A8-3977-B7BA-B67A7AF33530)
  USDA NASS (2021) Applications - fertilizers and pesticides - number, amount, - Soybean, Illinois - 2000-2021. US Department of Agriculture (USDA) National Agricultural Statistics Service. https://quickstats.nass.usda.gov (direct query: https://quickstats.nass.usda.gov/results/CBB93A96-1EAC-3BFF-87F0-5E4AECFE034D)
- Copper ion [soil, agricultural]: -5.14517e-6 kg; normal variance with pedigree 0.04, pedigree (4,4,5,2,4)
  (same comment as for Cadmium II)
- Cyproconazole [soil, agricultural]: 4.91938e-7 kg; normal variance with pedigree 7.28949e-19, pedigree (2,2,2,1,1)
  Cyproconazole emission to agricultural soil (1.945E-03 kg/ha). Pesticides are assumed to be ultimately 100% emitted to soil. Average over state-wide reported cropped area of soybean for all tillage practices (CTIC 2020a) and across all rotation patterns (Socolar et al 2021 ) - calculated from specified herbicide/insecticide/fungicide quantity applied to treated acres weighted by share of acres treated with that herbicide/insecticide/fungicide (2015,2017,2018,2020-USDA NASS data, USDA NASS 2021e)
  Sources:
  CTIC (2020a) OpTIS - Operational Tillage Information System. Conservation Technology Information Center (CTIC). https://www.ctic.org/optis_tabular_query accessed March 23, 2021
  Socolar Y, Goldstein B R, de Valpine P, Bowles T M (2021) Biophysical and policy factors predict simplified crop rotations in the US Midwest. Environ. Res. Lett. 16 054045. https://iopscience.iop.org/article/10.1088/1748-9326/abf9ca
  USDA NASS (2021) SOYBEAN- APPLICATIONS, MEASURED IN LB / ACRE / YEAR, AVG (fertilizer and pesticides, amount, number of applications) - 2000-2021. US Department of Agriculture (USDA) National Agricultural Statistics Service. https://quickstats.nass.usda.gov (direct query: https://quickstats.nass.usda.gov/results/1D738304-38A8-3977-B7BA-B67A7AF33530)
  USDA NASS (2021) Applications - fertilizers and pesticides - number, amount, - Soybean, Illinois - 2000-2021. US Department of Agriculture (USDA) National Agricultural Statistics Service. https://quickstats.nass.usda.gov (direct query: https://quickstats.nass.usda.gov/results/CBB93A96-1EAC-3BFF-87F0-5E4AECFE034D)
- Dicamba [soil, agricultural]: 8.45705e-5 kg; normal variance with pedigree 1.7686e-11, pedigree (2,2,2,1,1)
  Dicamba emission to agricultural soil (3.344E-01 kg/ha). Pesticides are assumed to be ultimately 100% emitted to soil. Average over state-wide reported cropped area of soybean for all tillage practices (CTIC 2020a) and across all rotation patterns (Socolar et al 2021 ) - calculated from specified herbicide/insecticide/fungicide quantity applied to treated acres weighted by share of acres treated with that herbicide/insecticide/fungicide (2015,2017,2018,2020-USDA NASS data, USDA NASS 2021e)
  Sources:
  CTIC (2020a) OpTIS - Operational Tillage Information System. Conservation Technology Information Center (CTIC). https://www.ctic.org/optis_tabular_query accessed March 23, 2021
  Socolar Y, Goldstein B R, de Valpine P, Bowles T M (2021) Biophysical and policy factors predict simplified crop rotations in the US Midwest. Environ. Res. Lett. 16 054045. https://iopscience.iop.org/article/10.1088/1748-9326/abf9ca
  USDA NASS (2021) SOYBEAN- APPLICATIONS, MEASURED IN LB / ACRE / YEAR, AVG (fertilizer and pesticides, amount, number of applications) - 2000-2021. US Department of Agriculture (USDA) National Agricultural Statistics Service. https://quickstats.nass.usda.gov (direct query: https://quickstats.nass.usda.gov/results/1D738304-38A8-3977-B7BA-B67A7AF33530)
  USDA NASS (2021) Applications - fertilizers and pesticides - number, amount, - Soybean, Illinois - 2000-2021. US Department of Agriculture (USDA) National Agricultural Statistics Service. https://quickstats.nass.usda.gov (direct query: https://quickstats.nass.usda.gov/results/CBB93A96-1EAC-3BFF-87F0-5E4AECFE034D)
- Dimethenamid-P [soil, agricultural]: 8.22421e-6 kg; normal variance with pedigree 5.69421e-14, pedigree (2,2,2,1,1)
  Dimethenamid-P emission to agricultural soil (3.252E-02 kg/ha). Pesticides are assumed to be ultimately 100% emitted to soil. Average over state-wide reported cropped area of soybean for all tillage practices (CTIC 2020a) and across all rotation patterns (Socolar et al 2021 ) - calculated from specified herbicide/insecticide/fungicide quantity applied to treated acres weighted by share of acres treated with that herbicide/insecticide/fungicide (2015,2017,2018,2020-USDA NASS data, USDA NASS 2021e)
  Sources:
  CTIC (2020a) OpTIS - Operational Tillage Information System. Conservation Technology Information Center (CTIC). https://www.ctic.org/optis_tabular_query accessed March 23, 2021
  Socolar Y, Goldstein B R, de Valpine P, Bowles T M (2021) Biophysical and policy factors predict simplified crop rotations in the US Midwest. Environ. Res. Lett. 16 054045. https://iopscience.iop.org/article/10.1088/1748-9326/abf9ca
  USDA NASS (2021) SOYBEAN- APPLICATIONS, MEASURED IN LB / ACRE / YEAR, AVG (fertilizer and pesticides, amount, number of applications) - 2000-2021. US Department of Agriculture (USDA) National Agricultural Statistics Service. https://quickstats.nass.usda.gov (direct query: https://quickstats.nass.usda.gov/results/1D738304-38A8-3977-B7BA-B67A7AF33530)
  USDA NASS (2021) Applications - fertilizers and pesticides - number, amount, - Soybean, Illinois - 2000-2021. US Department of Agriculture (USDA) National Agricultural Statistics Service. https://quickstats.nass.usda.gov (direct query: https://quickstats.nass.usda.gov/results/CBB93A96-1EAC-3BFF-87F0-5E4AECFE034D)
- Fluazifop-P-butyl [soil, agricultural]: 1.35346e-6 kg; normal variance with pedigree 4.17673e-17, pedigree (2,2,2,1,1)
  Fluazifop-P-butyl emission to agricultural soil (5.352E-03 kg/ha). Pesticides are assumed to be ultimately 100% emitted to soil. Average over state-wide reported cropped area of soybean for all tillage practices (CTIC 2020a) and across all rotation patterns (Socolar et al 2021 ) - calculated from specified herbicide/insecticide/fungicide quantity applied to treated acres weighted by share of acres treated with that herbicide/insecticide/fungicide (2015,2017,2018,2020-USDA NASS data, USDA NASS 2021e)
  Sources:
  CTIC (2020a) OpTIS - Operational Tillage Information System. Conservation Technology Information Center (CTIC). https://www.ctic.org/optis_tabular_query accessed March 23, 2021
  Socolar Y, Goldstein B R, de Valpine P, Bowles T M (2021) Biophysical and policy factors predict simplified crop rotations in the US Midwest. Environ. Res. Lett. 16 054045. https://iopscience.iop.org/article/10.1088/1748-9326/abf9ca
  USDA NASS (2021) SOYBEAN- APPLICATIONS, MEASURED IN LB / ACRE / YEAR, AVG (fertilizer and pesticides, amount, number of applications) - 2000-2021. US Department of Agriculture (USDA) National Agricultural Statistics Service. https://quickstats.nass.usda.gov (direct query: https://quickstats.nass.usda.gov/results/1D738304-38A8-3977-B7BA-B67A7AF33530)
  USDA NASS (2021) Applications - fertilizers and pesticides - number, amount, - Soybean, Illinois - 2000-2021. US Department of Agriculture (USDA) National Agricultural Statistics Service. https://quickstats.nass.usda.gov (direct query: https://quickstats.nass.usda.gov/results/CBB93A96-1EAC-3BFF-87F0-5E4AECFE034D)
- Flumetsulam [soil, agricultural]: 8.53758e-7 kg; normal variance with pedigree 6.61297e-18, pedigree (2,2,2,1,1)
  Flumetsulam emission to agricultural soil (3.376E-03 kg/ha). Pesticides are assumed to be ultimately 100% emitted to soil. Average over state-wide reported cropped area of soybean for all tillage practices (CTIC 2020a) and across all rotation patterns (Socolar et al 2021 ) - calculated from specified herbicide/insecticide/fungicide quantity applied to treated acres weighted by share of acres treated with that herbicide/insecticide/fungicide (2015,2017,2018,2020-USDA NASS data, USDA NASS 2021e)
  Sources:
  CTIC (2020a) OpTIS - Operational Tillage Information System. Conservation Technology Information Center (CTIC). https://www.ctic.org/optis_tabular_query accessed March 23, 2021
  Socolar Y, Goldstein B R, de Valpine P, Bowles T M (2021) Biophysical and policy factors predict simplified crop rotations in the US Midwest. Environ. Res. Lett. 16 054045. https://iopscience.iop.org/article/10.1088/1748-9326/abf9ca
  USDA NASS (2021) SOYBEAN- APPLICATIONS, MEASURED IN LB / ACRE / YEAR, AVG (fertilizer and pesticides, amount, number of applications) - 2000-2021. US Department of Agriculture (USDA) National Agricultural Statistics Service. https://quickstats.nass.usda.gov (direct query: https://quickstats.nass.usda.gov/results/1D738304-38A8-3977-B7BA-B67A7AF33530)
  USDA NASS (2021) Applications - fertilizers and pesticides - number, amount, - Soybean, Illinois - 2000-2021. US Department of Agriculture (USDA) National Agricultural Statistics Service. https://quickstats.nass.usda.gov (direct query: https://quickstats.nass.usda.gov/results/CBB93A96-1EAC-3BFF-87F0-5E4AECFE034D)
- Flumiclorac-pentyl [soil, agricultural]: 8.53758e-7 kg; normal variance with pedigree 6.61297e-18, pedigree (2,2,2,1,1)
  Flumiclorac-Pentyl emission to agricultural soil (3.376E-03 kg/ha). Pesticides are assumed to be ultimately 100% emitted to soil. Average over state-wide reported cropped area of soybean for all tillage practices (CTIC 2020a) and across all rotation patterns (Socolar et al 2021 ) - calculated from specified herbicide/insecticide/fungicide quantity applied to treated acres weighted by share of acres treated with that herbicide/insecticide/fungicide (2015,2017,2018,2020-USDA NASS data, USDA NASS 2021e)
  Sources:
  CTIC (2020a) OpTIS - Operational Tillage Information System. Conservation Technology Information Center (CTIC). https://www.ctic.org/optis_tabular_query accessed March 23, 2021
  Socolar Y, Goldstein B R, de Valpine P, Bowles T M (2021) Biophysical and policy factors predict simplified crop rotations in the US Midwest. Environ. Res. Lett. 16 054045. https://iopscience.iop.org/article/10.1088/1748-9326/abf9ca
  USDA NASS (2021) SOYBEAN- APPLICATIONS, MEASURED IN LB / ACRE / YEAR, AVG (fertilizer and pesticides, amount, number of applications) - 2000-2021. US Department of Agriculture (USDA) National Agricultural Statistics Service. https://quickstats.nass.usda.gov (direct query: https://quickstats.nass.usda.gov/results/1D738304-38A8-3977-B7BA-B67A7AF33530)
  USDA NASS (2021) Applications - fertilizers and pesticides - number, amount, - Soybean, Illinois - 2000-2021. US Department of Agriculture (USDA) National Agricultural Statistics Service. https://quickstats.nass.usda.gov (direct query: https://quickstats.nass.usda.gov/results/CBB93A96-1EAC-3BFF-87F0-5E4AECFE034D)
- Flumioxazin [soil, agricultural]: 4.36384e-6 kg; normal variance with pedigree 4.51369e-15, pedigree (2,2,2,1,1)
  Flumioxazin emission to agricultural soil (1.726E-02 kg/ha). Pesticides are assumed to be ultimately 100% emitted to soil. Average over state-wide reported cropped area of soybean for all tillage practices (CTIC 2020a) and across all rotation patterns (Socolar et al 2021 ) - calculated from specified herbicide/insecticide/fungicide quantity applied to treated acres weighted by share of acres treated with that herbicide/insecticide/fungicide (2015,2017,2018,2020-USDA NASS data, USDA NASS 2021e)
  Sources:
  CTIC (2020a) OpTIS - Operational Tillage Information System. Conservation Technology Information Center (CTIC). https://www.ctic.org/optis_tabular_query accessed March 23, 2021
  Socolar Y, Goldstein B R, de Valpine P, Bowles T M (2021) Biophysical and policy factors predict simplified crop rotations in the US Midwest. Environ. Res. Lett. 16 054045. https://iopscience.iop.org/article/10.1088/1748-9326/abf9ca
  USDA NASS (2021) SOYBEAN- APPLICATIONS, MEASURED IN LB / ACRE / YEAR, AVG (fertilizer and pesticides, amount, number of applications) - 2000-2021. US Department of Agriculture (USDA) National Agricultural Statistics Service. https://quickstats.nass.usda.gov (direct query: https://quickstats.nass.usda.gov/results/1D738304-38A8-3977-B7BA-B67A7AF33530)
  USDA NASS (2021) Applications - fertilizers and pesticides - number, amount, - Soybean, Illinois - 2000-2021. US Department of Agriculture (USDA) National Agricultural Statistics Service. https://quickstats.nass.usda.gov (direct query: https://quickstats.nass.usda.gov/results/CBB93A96-1EAC-3BFF-87F0-5E4AECFE034D)
- Fluthiacet-methyl [soil, agricultural]: 1.03635e-7 kg; normal variance with pedigree 1.43577e-21, pedigree (2,2,2,1,1)
  Fluthiacet-methyl emission to agricultural soil (4.098E-04 kg/ha). Pesticides are assumed to be ultimately 100% emitted to soil. Average over state-wide reported cropped area of soybean for all tillage practices (CTIC 2020a) and across all rotation patterns (Socolar et al 2021 ) - calculated from specified herbicide/insecticide/fungicide quantity applied to treated acres weighted by share of acres treated with that herbicide/insecticide/fungicide (2015,2017,2018,2020-USDA NASS data, USDA NASS 2021e)
  Sources:
  CTIC (2020a) OpTIS - Operational Tillage Information System. Conservation Technology Information Center (CTIC). https://www.ctic.org/optis_tabular_query accessed March 23, 2021
  Socolar Y, Goldstein B R, de Valpine P, Bowles T M (2021) Biophysical and policy factors predict simplified crop rotations in the US Midwest. Environ. Res. Lett. 16 054045. https://iopscience.iop.org/article/10.1088/1748-9326/abf9ca
  USDA NASS (2021) SOYBEAN- APPLICATIONS, MEASURED IN LB / ACRE / YEAR, AVG (fertilizer and pesticides, amount, number of applications) - 2000-2021. US Department of Agriculture (USDA) National Agricultural Statistics Service. https://quickstats.nass.usda.gov (direct query: https://quickstats.nass.usda.gov/results/1D738304-38A8-3977-B7BA-B67A7AF33530)
  USDA NASS (2021) Applications - fertilizers and pesticides - number, amount, - Soybean, Illinois - 2000-2021. US Department of Agriculture (USDA) National Agricultural Statistics Service. https://quickstats.nass.usda.gov (direct query: https://quickstats.nass.usda.gov/results/CBB93A96-1EAC-3BFF-87F0-5E4AECFE034D)
- Fluxapyroxad [soil, agricultural]: 6.37755e-7 kg; normal variance with pedigree 2.05908e-18, pedigree (2,2,2,1,1)
  Fluxapyroxad emission to agricultural soil (2.522E-03 kg/ha). Pesticides are assumed to be ultimately 100% emitted to soil. Average over state-wide reported cropped area of soybean for all tillage practices (CTIC 2020a) and across all rotation patterns (Socolar et al 2021 ) - calculated from specified herbicide/insecticide/fungicide quantity applied to treated acres weighted by share of acres treated with that herbicide/insecticide/fungicide (2015,2017,2018,2020-USDA NASS data, USDA NASS 2021e)
  Sources:
  CTIC (2020a) OpTIS - Operational Tillage Information System. Conservation Technology Information Center (CTIC). https://www.ctic.org/optis_tabular_query accessed March 23, 2021
  Socolar Y, Goldstein B R, de Valpine P, Bowles T M (2021) Biophysical and policy factors predict simplified crop rotations in the US Midwest. Environ. Res. Lett. 16 054045. https://iopscience.iop.org/article/10.1088/1748-9326/abf9ca
  USDA NASS (2021) SOYBEAN- APPLICATIONS, MEASURED IN LB / ACRE / YEAR, AVG (fertilizer and pesticides, amount, number of applications) - 2000-2021. US Department of Agriculture (USDA) National Agricultural Statistics Service. https://quickstats.nass.usda.gov (direct query: https://quickstats.nass.usda.gov/results/1D738304-38A8-3977-B7BA-B67A7AF33530)
  USDA NASS (2021) Applications - fertilizers and pesticides - number, amount, - Soybean, Illinois - 2000-2021. US Department of Agriculture (USDA) National Agricultural Statistics Service. https://quickstats.nass.usda.gov (direct query: https://quickstats.nass.usda.gov/results/CBB93A96-1EAC-3BFF-87F0-5E4AECFE034D)
- Fomesafen [soil, agricultural]: 8.77803e-6 kg; normal variance with pedigree 1.8475e-14, pedigree (2,2,2,1,1)
  Fomesafen emission to agricultural soil (3.471E-02 kg/ha). Pesticides are assumed to be ultimately 100% emitted to soil. Average over state-wide reported cropped area of soybean for all tillage practices (CTIC 2020a) and across all rotation patterns (Socolar et al 2021 ) - calculated from specified herbicide/insecticide/fungicide quantity applied to treated acres weighted by share of acres treated with that herbicide/insecticide/fungicide (2015,2017,2018,2020-USDA NASS data, USDA NASS 2021e)
  Sources:
  CTIC (2020a) OpTIS - Operational Tillage Information System. Conservation Technology Information Center (CTIC). https://www.ctic.org/optis_tabular_query accessed March 23, 2021
  Socolar Y, Goldstein B R, de Valpine P, Bowles T M (2021) Biophysical and policy factors predict simplified crop rotations in the US Midwest. Environ. Res. Lett. 16 054045. https://iopscience.iop.org/article/10.1088/1748-9326/abf9ca
  USDA NASS (2021) SOYBEAN- APPLICATIONS, MEASURED IN LB / ACRE / YEAR, AVG (fertilizer and pesticides, amount, number of applications) - 2000-2021. US Department of Agriculture (USDA) National Agricultural Statistics Service. https://quickstats.nass.usda.gov (direct query: https://quickstats.nass.usda.gov/results/1D738304-38A8-3977-B7BA-B67A7AF33530)
  USDA NASS (2021) Applications - fertilizers and pesticides - number, amount, - Soybean, Illinois - 2000-2021. US Department of Agriculture (USDA) National Agricultural Statistics Service. https://quickstats.nass.usda.gov (direct query: https://quickstats.nass.usda.gov/results/CBB93A96-1EAC-3BFF-87F0-5E4AECFE034D)
- Glufosinate ammonium [soil, agricultural]: 1.54195e-5 kg; normal variance with pedigree 7.0362e-13, pedigree (2,2,2,1,1)
  Glufosinate ammonium emission to agricultural soil (6.097E-02 kg/ha). Pesticides are assumed to be ultimately 100% emitted to soil. Average over state-wide reported cropped area of soybean for all tillage practices (CTIC 2020a) and across all rotation patterns (Socolar et al 2021 ) - calculated from specified herbicide/insecticide/fungicide quantity applied to treated acres weighted by share of acres treated with that herbicide/insecticide/fungicide (2015,2017,2018,2020-USDA NASS data, USDA NASS 2021e)
  Sources:
  CTIC (2020a) OpTIS - Operational Tillage Information System. Conservation Technology Information Center (CTIC). https://www.ctic.org/optis_tabular_query accessed March 23, 2021
  Socolar Y, Goldstein B R, de Valpine P, Bowles T M (2021) Biophysical and policy factors predict simplified crop rotations in the US Midwest. Environ. Res. Lett. 16 054045. https://iopscience.iop.org/article/10.1088/1748-9326/abf9ca
  USDA NASS (2021) SOYBEAN- APPLICATIONS, MEASURED IN LB / ACRE / YEAR, AVG (fertilizer and pesticides, amount, number of applications) - 2000-2021. US Department of Agriculture (USDA) National Agricultural Statistics Service. https://quickstats.nass.usda.gov (direct query: https://quickstats.nass.usda.gov/results/1D738304-38A8-3977-B7BA-B67A7AF33530)
  USDA NASS (2021) Applications - fertilizers and pesticides - number, amount, - Soybean, Illinois - 2000-2021. US Department of Agriculture (USDA) National Agricultural Statistics Service. https://quickstats.nass.usda.gov (direct query: https://quickstats.nass.usda.gov/results/CBB93A96-1EAC-3BFF-87F0-5E4AECFE034D)
- Glyphosate [soil, agricultural]: 0.000251721 kg; normal variance with pedigree 3.1233e-9, pedigree (2,2,2,1,1)
  Glyphosate emission to agricultural soil (9.954E-01 kg/ha). Pesticides are assumed to be ultimately 100% emitted to soil. Average over state-wide reported cropped area of soybean for all tillage practices (CTIC 2020a) and across all rotation patterns (Socolar et al 2021 ) - calculated from specified herbicide/insecticide/fungicide quantity applied to treated acres weighted by share of acres treated with that herbicide/insecticide/fungicide (2015,2017,2018,2020-USDA NASS data, USDA NASS 2021e)
  Sources:
  CTIC (2020a) OpTIS - Operational Tillage Information System. Conservation Technology Information Center (CTIC). https://www.ctic.org/optis_tabular_query accessed March 23, 2021
  Socolar Y, Goldstein B R, de Valpine P, Bowles T M (2021) Biophysical and policy factors predict simplified crop rotations in the US Midwest. Environ. Res. Lett. 16 054045. https://iopscience.iop.org/article/10.1088/1748-9326/abf9ca
  USDA NASS (2021) SOYBEAN- APPLICATIONS, MEASURED IN LB / ACRE / YEAR, AVG (fertilizer and pesticides, amount, number of applications) - 2000-2021. US Department of Agriculture (USDA) National Agricultural Statistics Service. https://quickstats.nass.usda.gov (direct query: https://quickstats.nass.usda.gov/results/1D738304-38A8-3977-B7BA-B67A7AF33530)
  USDA NASS (2021) Applications - fertilizers and pesticides - number, amount, - Soybean, Illinois - 2000-2021. US Department of Agriculture (USDA) National Agricultural Statistics Service. https://quickstats.nass.usda.gov (direct query: https://quickstats.nass.usda.gov/results/CBB93A96-1EAC-3BFF-87F0-5E4AECFE034D)
- Imazethapyr [soil, agricultural]: 4.71434e-6 kg; normal variance with pedigree 6.83124e-16, pedigree (2,2,2,1,1)
  Imazethapyr emission to agricultural soil (1.864E-02 kg/ha). Pesticides are assumed to be ultimately 100% emitted to soil. Average over state-wide reported cropped area of soybean for all tillage practices (CTIC 2020a) and across all rotation patterns (Socolar et al 2021 ) - calculated from specified herbicide/insecticide/fungicide quantity applied to treated acres weighted by share of acres treated with that herbicide/insecticide/fungicide (2015,2017,2018,2020-USDA NASS data, USDA NASS 2021e)
  Sources:
  CTIC (2020a) OpTIS - Operational Tillage Information System. Conservation Technology Information Center (CTIC). https://www.ctic.org/optis_tabular_query accessed March 23, 2021
  Socolar Y, Goldstein B R, de Valpine P, Bowles T M (2021) Biophysical and policy factors predict simplified crop rotations in the US Midwest. Environ. Res. Lett. 16 054045. https://iopscience.iop.org/article/10.1088/1748-9326/abf9ca
  USDA NASS (2021) SOYBEAN- APPLICATIONS, MEASURED IN LB / ACRE / YEAR, AVG (fertilizer and pesticides, amount, number of applications) - 2000-2021. US Department of Agriculture (USDA) National Agricultural Statistics Service. https://quickstats.nass.usda.gov (direct query: https://quickstats.nass.usda.gov/results/1D738304-38A8-3977-B7BA-B67A7AF33530)
  USDA NASS (2021) Applications - fertilizers and pesticides - number, amount, - Soybean, Illinois - 2000-2021. US Department of Agriculture (USDA) National Agricultural Statistics Service. https://quickstats.nass.usda.gov (direct query: https://quickstats.nass.usda.gov/results/CBB93A96-1EAC-3BFF-87F0-5E4AECFE034D)
- Lactofen [soil, agricultural]: 2.32899e-6 kg; normal variance with pedigree 3.66206e-16, pedigree (2,2,2,1,1)
  Lactofen emission to agricultural soil (9.210E-03 kg/ha). Pesticides are assumed to be ultimately 100% emitted to soil. Average over state-wide reported cropped area of soybean for all tillage practices (CTIC 2020a) and across all rotation patterns (Socolar et al 2021 ) - calculated from specified herbicide/insecticide/fungicide quantity applied to treated acres weighted by share of acres treated with that herbicide/insecticide/fungicide (2015,2017,2018,2020-USDA NASS data, USDA NASS 2021e)
  Sources:
  CTIC (2020a) OpTIS - Operational Tillage Information System. Conservation Technology Information Center (CTIC). https://www.ctic.org/optis_tabular_query accessed March 23, 2021
  Socolar Y, Goldstein B R, de Valpine P, Bowles T M (2021) Biophysical and policy factors predict simplified crop rotations in the US Midwest. Environ. Res. Lett. 16 054045. https://iopscience.iop.org/article/10.1088/1748-9326/abf9ca
  USDA NASS (2021) SOYBEAN- APPLICATIONS, MEASURED IN LB / ACRE / YEAR, AVG (fertilizer and pesticides, amount, number of applications) - 2000-2021. US Department of Agriculture (USDA) National Agricultural Statistics Service. https://quickstats.nass.usda.gov (direct query: https://quickstats.nass.usda.gov/results/1D738304-38A8-3977-B7BA-B67A7AF33530)
  USDA NASS (2021) Applications - fertilizers and pesticides - number, amount, - Soybean, Illinois - 2000-2021. US Department of Agriculture (USDA) National Agricultural Statistics Service. https://quickstats.nass.usda.gov (direct query: https://quickstats.nass.usda.gov/results/CBB93A96-1EAC-3BFF-87F0-5E4AECFE034D)
- Lead II [soil, agricultural]: -2.3131e-7 kg; normal variance with pedigree 0.04, pedigree (4,4,5,2,4)
  (same comment as for Cadmium II)
- Mercury II [soil, agricultural]: -8.21484e-8 kg; normal variance with pedigree 0.04, pedigree (4,4,5,2,4)
  (same comment as for Cadmium II)
- Mesotrione [soil, agricultural]: 5.5719e-6 kg; normal variance with pedigree 1.19969e-14, pedigree (2,2,4,3,2)
  Mesotrione emission to agricultural soil (2.203E-02 kg/ha). Pesticides are assumed to be ultimately 100% emitted to soil. Average over state-wide reported cropped area of soybean for all tillage practices (CTIC 2020a) and across all rotation patterns (Socolar et al 2021 ) - calculated from specified herbicide/insecticide/fungicide quantity applied to treated acres weighted by share of acres treated with that herbicide/insecticide/fungicide (2015,2017,2018,2020-USDA NASS data, USDA NASS 2021e)
  NASS does not contain numerical values for a number of pesticides widely used in soybean, are reported have no numerical data reported in NASS, as the values are hidden. For the most significant of those (those with more than 10 non-zero but withheld entries), the dataset uses other NASS entries to estimate the quantity if numerical entries are available. The quantity used in the dataset for those pesticides is taken from maize if available, because the widespread one-year soybean-maize rotation cycle leads to more consistent usages. For the ones not covered in the numerical data for maize, the national average from NASS data is used if NASS contains non-withheld data. Where no numerical data are available in NASS, the item is excluded to avoid inconsistency with the pesticide usage matrix based on NASS data.
  Pesticide data is sometimes withheld in the NASS database to avoid disclosing data for individual operations (denoted with "D" in the data returned for the query, indicating a non-zero but withheld value). Where there is obfuscated, non-zero data for particular compounds, the crop-specific U.S. average (calculated from the USDA NASS data, which covers a subset of states, generally those with non-negligible production of the particular crop) are used. For states with all (D) entries (i.e., the compound has been reported as used – non-zero -- but data cannot be shown), the average quantity and variability of the application rate for that compound across all of the specific crop in the US in the same time period is used. For states with a single non-D data year in the dataset timeframe, that data value is uded and the variability is set to the variability of the application rate for that compound across all of the specific crop in the US in the relevant time period.
  Note that this U.S. soy average value and standard deviation is neither production nor area weighted, as the application rate depends on many factors and this value is intended to represent the range of use. Instead, the average percent of treated acres for the class in that state is used. That is, if the average share of planted area across all non-zero, non-withheld values for fungicide treatment is 15%, then the US average application rate for the withheld data fungicide is scaled by 15% to reflect the effective average treatment per ha for that compound on the particular crop in the state.
  Sources:
  CTIC (2020a) OpTIS - Operational Tillage Information System. Conservation Technology Information Center (CTIC). https://www.ctic.org/optis_tabular_query accessed March 23, 2021
  Socolar Y, Goldstein B R, de Valpine P, Bowles T M (2021) Biophysical and policy factors predict simplified crop rotations in the US Midwest. Environ. Res. Lett. 16 054045. https://iopscience.iop.org/article/10.1088/1748-9326/abf9ca
  USDA NASS (2021) SOYBEAN- APPLICATIONS, MEASURED IN LB / ACRE / YEAR, AVG (fertilizer and pesticides, amount, number of applications) - 2000-2021. US Department of Agriculture (USDA) National Agricultural Statistics Service. https://quickstats.nass.usda.gov (direct query: https://quickstats.nass.usda.gov/results/1D738304-38A8-3977-B7BA-B67A7AF33530)
  USDA NASS (2021) Applications - fertilizers and pesticides - number, amount, - Soybean, Illinois - 2000-2021. US Department of Agriculture (USDA) National Agricultural Statistics Service. https://quickstats.nass.usda.gov (direct query: https://quickstats.nass.usda.gov/results/CBB93A96-1EAC-3BFF-87F0-5E4AECFE034D)
- Metolachlor [soil, agricultural]: 7.38095e-6 kg; normal variance with pedigree 3.69408e-14, pedigree (2,2,2,1,1)
  Metolachlor emission to agricultural soil (2.919E-02 kg/ha). Pesticides are assumed to be ultimately 100% emitted to soil. Average over state-wide reported cropped area of soybean for all tillage practices (CTIC 2020a) and across all rotation patterns (Socolar et al 2021 ) - calculated from specified herbicide/insecticide/fungicide quantity applied to treated acres weighted by share of acres treated with that herbicide/insecticide/fungicide (2015,2017,2018,2020-USDA NASS data, USDA NASS 2021e)
  Sources:
  CTIC (2020a) OpTIS - Operational Tillage Information System. Conservation Technology Information Center (CTIC). https://www.ctic.org/optis_tabular_query accessed March 23, 2021
  Socolar Y, Goldstein B R, de Valpine P, Bowles T M (2021) Biophysical and policy factors predict simplified crop rotations in the US Midwest. Environ. Res. Lett. 16 054045. https://iopscience.iop.org/article/10.1088/1748-9326/abf9ca
  USDA NASS (2021) SOYBEAN- APPLICATIONS, MEASURED IN LB / ACRE / YEAR, AVG (fertilizer and pesticides, amount, number of applications) - 2000-2021. US Department of Agriculture (USDA) National Agricultural Statistics Service. https://quickstats.nass.usda.gov (direct query: https://quickstats.nass.usda.gov/results/1D738304-38A8-3977-B7BA-B67A7AF33530)
  USDA NASS (2021) Applications - fertilizers and pesticides - number, amount, - Soybean, Illinois - 2000-2021. US Department of Agriculture (USDA) National Agricultural Statistics Service. https://quickstats.nass.usda.gov (direct query: https://quickstats.nass.usda.gov/results/CBB93A96-1EAC-3BFF-87F0-5E4AECFE034D)
- Metribuzin [soil, agricultural]: 7.70709e-6 kg; normal variance with pedigree 4.39157e-14, pedigree (2,2,2,1,1)
  Metribuzin emission to agricultural soil (3.048E-02 kg/ha). Pesticides are assumed to be ultimately 100% emitted to soil. Average over state-wide reported cropped area of soybean for all tillage practices (CTIC 2020a) and across all rotation patterns (Socolar et al 2021 ) - calculated from specified herbicide/insecticide/fungicide quantity applied to treated acres weighted by share of acres treated with that herbicide/insecticide/fungicide (2015,2017,2018,2020-USDA NASS data, USDA NASS 2021e)
  Sources:
  CTIC (2020a) OpTIS - Operational Tillage Information System. Conservation Technology Information Center (CTIC). https://www.ctic.org/optis_tabular_query accessed March 23, 2021
  Socolar Y, Goldstein B R, de Valpine P, Bowles T M (2021) Biophysical and policy factors predict simplified crop rotations in the US Midwest. Environ. Res. Lett. 16 054045. https://iopscience.iop.org/article/10.1088/1748-9326/abf9ca
  USDA NASS (2021) SOYBEAN- APPLICATIONS, MEASURED IN LB / ACRE / YEAR, AVG (fertilizer and pesticides, amount, number of applications) - 2000-2021. US Department of Agriculture (USDA) National Agricultural Statistics Service. https://quickstats.nass.usda.gov (direct query: https://quickstats.nass.usda.gov/results/1D738304-38A8-3977-B7BA-B67A7AF33530)
  USDA NASS (2021) Applications - fertilizers and pesticides - number, amount, - Soybean, Illinois - 2000-2021. US Department of Agriculture (USDA) National Agricultural Statistics Service. https://quickstats.nass.usda.gov (direct query: https://quickstats.nass.usda.gov/results/CBB93A96-1EAC-3BFF-87F0-5E4AECFE034D)
- Nickel II [soil, agricultural]: -2.50106e-6 kg; normal variance with pedigree 0.04, pedigree (4,4,5,2,4)
  (same comment as for Cadmium II)
- Paraquat [soil, agricultural]: 2.29716e-5 kg; normal variance with pedigree 3.46594e-12, pedigree (2,2,2,1,1)
  Paraquat emission to agricultural soil (9.084E-02 kg/ha). Pesticides are assumed to be ultimately 100% emitted to soil. Average over state-wide reported cropped area of soybean for all tillage practices (CTIC 2020a) and across all rotation patterns (Socolar et al 2021 ) - calculated from specified herbicide/insecticide/fungicide quantity applied to treated acres weighted by share of acres treated with that herbicide/insecticide/fungicide (2015,2017,2018,2020-USDA NASS data, USDA NASS 2021e)
  Sources:
  CTIC (2020a) OpTIS - Operational Tillage Information System. Conservation Technology Information Center (CTIC). https://www.ctic.org/optis_tabular_query accessed March 23, 2021
  Socolar Y, Goldstein B R, de Valpine P, Bowles T M (2021) Biophysical and policy factors predict simplified crop rotations in the US Midwest. Environ. Res. Lett. 16 054045. https://iopscience.iop.org/article/10.1088/1748-9326/abf9ca
  USDA NASS (2021) SOYBEAN- APPLICATIONS, MEASURED IN LB / ACRE / YEAR, AVG (fertilizer and pesticides, amount, number of applications) - 2000-2021. US Department of Agriculture (USDA) National Agricultural Statistics Service. https://quickstats.nass.usda.gov (direct query: https://quickstats.nass.usda.gov/results/1D738304-38A8-3977-B7BA-B67A7AF33530)
  USDA NASS (2021) Applications - fertilizers and pesticides - number, amount, - Soybean, Illinois - 2000-2021. US Department of Agriculture (USDA) National Agricultural Statistics Service. https://quickstats.nass.usda.gov (direct query: https://quickstats.nass.usda.gov/results/CBB93A96-1EAC-3BFF-87F0-5E4AECFE034D)
- Pendimethalin [soil, agricultural]: 4.19914e-5 kg; normal variance with pedigree 3.8699e-11, pedigree (2,2,2,1,1)
  Pendimethalin emission to agricultural soil (1.660E-01 kg/ha). Pesticides are assumed to be ultimately 100% emitted to soil. Average over state-wide reported cropped area of soybean for all tillage practices (CTIC 2020a) and across all rotation patterns (Socolar et al 2021 ) - calculated from specified herbicide/insecticide/fungicide quantity applied to treated acres weighted by share of acres treated with that herbicide/insecticide/fungicide (2015,2017,2018,2020-USDA NASS data, USDA NASS 2021e)
  Sources:
  CTIC (2020a) OpTIS - Operational Tillage Information System. Conservation Technology Information Center (CTIC). https://www.ctic.org/optis_tabular_query accessed March 23, 2021
  Socolar Y, Goldstein B R, de Valpine P, Bowles T M (2021) Biophysical and policy factors predict simplified crop rotations in the US Midwest. Environ. Res. Lett. 16 054045. https://iopscience.iop.org/article/10.1088/1748-9326/abf9ca
  USDA NASS (2021) SOYBEAN- APPLICATIONS, MEASURED IN LB / ACRE / YEAR, AVG (fertilizer and pesticides, amount, number of applications) - 2000-2021. US Department of Agriculture (USDA) National Agricultural Statistics Service. https://quickstats.nass.usda.gov (direct query: https://quickstats.nass.usda.gov/results/1D738304-38A8-3977-B7BA-B67A7AF33530)
  USDA NASS (2021) Applications - fertilizers and pesticides - number, amount, - Soybean, Illinois - 2000-2021. US Department of Agriculture (USDA) National Agricultural Statistics Service. https://quickstats.nass.usda.gov (direct query: https://quickstats.nass.usda.gov/results/CBB93A96-1EAC-3BFF-87F0-5E4AECFE034D)
- Picoxystrobin [soil, agricultural]: 2.25113e-6 kg; normal variance with pedigree 3.19641e-16, pedigree (2,2,2,1,1)
  Picoxystrobin emission to agricultural soil (8.902E-03 kg/ha). Pesticides are assumed to be ultimately 100% emitted to soil. Average over state-wide reported cropped area of soybean for all tillage practices (CTIC 2020a) and across all rotation patterns (Socolar et al 2021 ) - calculated from specified herbicide/insecticide/fungicide quantity applied to treated acres weighted by share of acres treated with that herbicide/insecticide/fungicide (2015,2017,2018,2020-USDA NASS data, USDA NASS 2021e)
  Sources:
  CTIC (2020a) OpTIS - Operational Tillage Information System. Conservation Technology Information Center (CTIC). https://www.ctic.org/optis_tabular_query accessed March 23, 2021
  Socolar Y, Goldstein B R, de Valpine P, Bowles T M (2021) Biophysical and policy factors predict simplified crop rotations in the US Midwest. Environ. Res. Lett. 16 054045. https://iopscience.iop.org/article/10.1088/1748-9326/abf9ca
  USDA NASS (2021) SOYBEAN- APPLICATIONS, MEASURED IN LB / ACRE / YEAR, AVG (fertilizer and pesticides, amount, number of applications) - 2000-2021. US Department of Agriculture (USDA) National Agricultural Statistics Service. https://quickstats.nass.usda.gov (direct query: https://quickstats.nass.usda.gov/results/1D738304-38A8-3977-B7BA-B67A7AF33530)
  USDA NASS (2021) Applications - fertilizers and pesticides - number, amount, - Soybean, Illinois - 2000-2021. US Department of Agriculture (USDA) National Agricultural Statistics Service. https://quickstats.nass.usda.gov (direct query: https://quickstats.nass.usda.gov/results/CBB93A96-1EAC-3BFF-87F0-5E4AECFE034D)
- Propiconazole [soil, agricultural]: 1.59793e-6 kg; normal variance with pedigree 8.11501e-17, pedigree (2,2,2,1,1)
  Propiconazole emission to agricultural soil (6.319E-03 kg/ha). Pesticides are assumed to be ultimately 100% emitted to soil. Average over state-wide reported cropped area of soybean for all tillage practices (CTIC 2020a) and across all rotation patterns (Socolar et al 2021 ) - calculated from specified herbicide/insecticide/fungicide quantity applied to treated acres weighted by share of acres treated with that herbicide/insecticide/fungicide (2015,2017,2018,2020-USDA NASS data, USDA NASS 2021e)
  Sources:
  CTIC (2020a) OpTIS - Operational Tillage Information System. Conservation Technology Information Center (CTIC). https://www.ctic.org/optis_tabular_query accessed March 23, 2021
  Socolar Y, Goldstein B R, de Valpine P, Bowles T M (2021) Biophysical and policy factors predict simplified crop rotations in the US Midwest. Environ. Res. Lett. 16 054045. https://iopscience.iop.org/article/10.1088/1748-9326/abf9ca
  USDA NASS (2021) SOYBEAN- APPLICATIONS, MEASURED IN LB / ACRE / YEAR, AVG (fertilizer and pesticides, amount, number of applications) - 2000-2021. US Department of Agriculture (USDA) National Agricultural Statistics Service. https://quickstats.nass.usda.gov (direct query: https://quickstats.nass.usda.gov/results/1D738304-38A8-3977-B7BA-B67A7AF33530)
  USDA NASS (2021) Applications - fertilizers and pesticides - number, amount, - Soybean, Illinois - 2000-2021. US Department of Agriculture (USDA) National Agricultural Statistics Service. https://quickstats.nass.usda.gov (direct query: https://quickstats.nass.usda.gov/results/CBB93A96-1EAC-3BFF-87F0-5E4AECFE034D)
- Prothioconazole [soil, agricultural]: 9.66553e-7 kg; normal variance with pedigree 1.08633e-17, pedigree (2,2,2,1,1)
  Prothioconazol emission to agricultural soil (3.822E-03 kg/ha). Pesticides are assumed to be ultimately 100% emitted to soil. Average over state-wide reported cropped area of soybean for all tillage practices (CTIC 2020a) and across all rotation patterns (Socolar et al 2021 ) - calculated from specified herbicide/insecticide/fungicide quantity applied to treated acres weighted by share of acres treated with that herbicide/insecticide/fungicide (2015,2017,2018,2020-USDA NASS data, USDA NASS 2021e)
  Sources:
  CTIC (2020a) OpTIS - Operational Tillage Information System. Conservation Technology Information Center (CTIC). https://www.ctic.org/optis_tabular_query accessed March 23, 2021
  Socolar Y, Goldstein B R, de Valpine P, Bowles T M (2021) Biophysical and policy factors predict simplified crop rotations in the US Midwest. Environ. Res. Lett. 16 054045. https://iopscience.iop.org/article/10.1088/1748-9326/abf9ca
  USDA NASS (2021) SOYBEAN- APPLICATIONS, MEASURED IN LB / ACRE / YEAR, AVG (fertilizer and pesticides, amount, number of applications) - 2000-2021. US Department of Agriculture (USDA) National Agricultural Statistics Service. https://quickstats.nass.usda.gov (direct query: https://quickstats.nass.usda.gov/results/1D738304-38A8-3977-B7BA-B67A7AF33530)
  USDA NASS (2021) Applications - fertilizers and pesticides - number, amount, - Soybean, Illinois - 2000-2021. US Department of Agriculture (USDA) National Agricultural Statistics Service. https://quickstats.nass.usda.gov (direct query: https://quickstats.nass.usda.gov/results/CBB93A96-1EAC-3BFF-87F0-5E4AECFE034D)
- Pydiflumetofen [soil, agricultural]: 1.20819e-6 kg; normal variance with pedigree 2.65216e-17, pedigree (2,2,2,1,1)
  Pydiflumetofen emission to agricultural soil (4.778E-03 kg/ha). Pesticides are assumed to be ultimately 100% emitted to soil. Average over state-wide reported cropped area of soybean for all tillage practices (CTIC 2020a) and across all rotation patterns (Socolar et al 2021 ) - calculated from specified herbicide/insecticide/fungicide quantity applied to treated acres weighted by share of acres treated with that herbicide/insecticide/fungicide (2015,2017,2018,2020-USDA NASS data, USDA NASS 2021e)
  Sources:
  CTIC (2020a) OpTIS - Operational Tillage Information System. Conservation Technology Information Center (CTIC). https://www.ctic.org/optis_tabular_query accessed March 23, 2021
  Socolar Y, Goldstein B R, de Valpine P, Bowles T M (2021) Biophysical and policy factors predict simplified crop rotations in the US Midwest. Environ. Res. Lett. 16 054045. https://iopscience.iop.org/article/10.1088/1748-9326/abf9ca
  USDA NASS (2021) SOYBEAN- APPLICATIONS, MEASURED IN LB / ACRE / YEAR, AVG (fertilizer and pesticides, amount, number of applications) - 2000-2021. US Department of Agriculture (USDA) National Agricultural Statistics Service. https://quickstats.nass.usda.gov (direct query: https://quickstats.nass.usda.gov/results/1D738304-38A8-3977-B7BA-B67A7AF33530)
  USDA NASS (2021) Applications - fertilizers and pesticides - number, amount, - Soybean, Illinois - 2000-2021. US Department of Agriculture (USDA) National Agricultural Statistics Service. https://quickstats.nass.usda.gov (direct query: https://quickstats.nass.usda.gov/results/CBB93A96-1EAC-3BFF-87F0-5E4AECFE034D)
- Pyraclostrobin [soil, agricultural]: 1.82398e-6 kg; normal variance with pedigree 1.37764e-16, pedigree (2,2,2,1,1)
  Pyraclostrobin (prop) emission to agricultural soil (7.213E-03 kg/ha). Pesticides are assumed to be ultimately 100% emitted to soil. Average over state-wide reported cropped area of soybean for all tillage practices (CTIC 2020a) and across all rotation patterns (Socolar et al 2021 ) - calculated from specified herbicide/insecticide/fungicide quantity applied to treated acres weighted by share of acres treated with that herbicide/insecticide/fungicide (2015,2017,2018,2020-USDA NASS data, USDA NASS 2021e)
  Sources:
  CTIC (2020a) OpTIS - Operational Tillage Information System. Conservation Technology Information Center (CTIC). https://www.ctic.org/optis_tabular_query accessed March 23, 2021
  Socolar Y, Goldstein B R, de Valpine P, Bowles T M (2021) Biophysical and policy factors predict simplified crop rotations in the US Midwest. Environ. Res. Lett. 16 054045. https://iopscience.iop.org/article/10.1088/1748-9326/abf9ca
  USDA NASS (2021) SOYBEAN- APPLICATIONS, MEASURED IN LB / ACRE / YEAR, AVG (fertilizer and pesticides, amount, number of applications) - 2000-2021. US Department of Agriculture (USDA) National Agricultural Statistics Service. https://quickstats.nass.usda.gov (direct query: https://quickstats.nass.usda.gov/results/1D738304-38A8-3977-B7BA-B67A7AF33530)
  USDA NASS (2021) Applications - fertilizers and pesticides - number, amount, - Soybean, Illinois - 2000-2021. US Department of Agriculture (USDA) National Agricultural Statistics Service. https://quickstats.nass.usda.gov (direct query: https://quickstats.nass.usda.gov/results/CBB93A96-1EAC-3BFF-87F0-5E4AECFE034D)
- Pyroxasulfone [soil, agricultural]: 5.48363e-6 kg; normal variance with pedigree 1.12546e-14, pedigree (2,2,2,1,1)
  Pyroxasulfone emission to agricultural soil (2.168E-02 kg/ha). Pesticides are assumed to be ultimately 100% emitted to soil. Average over state-wide reported cropped area of soybean for all tillage practices (CTIC 2020a) and across all rotation patterns (Socolar et al 2021 ) - calculated from specified herbicide/insecticide/fungicide quantity applied to treated acres weighted by share of acres treated with that herbicide/insecticide/fungicide (2015,2017,2018,2020-USDA NASS data, USDA NASS 2021e)
  Sources:
  CTIC (2020a) OpTIS - Operational Tillage Information System. Conservation Technology Information Center (CTIC). https://www.ctic.org/optis_tabular_query accessed March 23, 2021
  Socolar Y, Goldstein B R, de Valpine P, Bowles T M (2021) Biophysical and policy factors predict simplified crop rotations in the US Midwest. Environ. Res. Lett. 16 054045. https://iopscience.iop.org/article/10.1088/1748-9326/abf9ca
  USDA NASS (2021) SOYBEAN- APPLICATIONS, MEASURED IN LB / ACRE / YEAR, AVG (fertilizer and pesticides, amount, number of applications) - 2000-2021. US Department of Agriculture (USDA) National Agricultural Statistics Service. https://quickstats.nass.usda.gov (direct query: https://quickstats.nass.usda.gov/results/1D738304-38A8-3977-B7BA-B67A7AF33530)
  USDA NASS (2021) Applications - fertilizers and pesticides - number, amount, - Soybean, Illinois - 2000-2021. US Department of Agriculture (USDA) National Agricultural Statistics Service. https://quickstats.nass.usda.gov (direct query: https://quickstats.nass.usda.gov/results/CBB93A96-1EAC-3BFF-87F0-5E4AECFE034D)
- Quizalofop-p-ethyl [soil, agricultural]: 4.36508e-7 kg; normal variance with pedigree 4.51883e-19, pedigree (2,2,2,1,1)
  Quizalofop-p-ethyl emission to agricultural soil (1.726E-03 kg/ha). Pesticides are assumed to be ultimately 100% emitted to soil. Average over state-wide reported cropped area of soybean for all tillage practices (CTIC 2020a) and across all rotation patterns (Socolar et al 2021 ) - calculated from specified herbicide/insecticide/fungicide quantity applied to treated acres weighted by share of acres treated with that herbicide/insecticide/fungicide (2015,2017,2018,2020-USDA NASS data, USDA NASS 2021e)
  Sources:
  CTIC (2020a) OpTIS - Operational Tillage Information System. Conservation Technology Information Center (CTIC). https://www.ctic.org/optis_tabular_query accessed March 23, 2021
  Socolar Y, Goldstein B R, de Valpine P, Bowles T M (2021) Biophysical and policy factors predict simplified crop rotations in the US Midwest. Environ. Res. Lett. 16 054045. https://iopscience.iop.org/article/10.1088/1748-9326/abf9ca
  USDA NASS (2021) SOYBEAN- APPLICATIONS, MEASURED IN LB / ACRE / YEAR, AVG (fertilizer and pesticides, amount, number of applications) - 2000-2021. US Department of Agriculture (USDA) National Agricultural Statistics Service. https://quickstats.nass.usda.gov (direct query: https://quickstats.nass.usda.gov/results/1D738304-38A8-3977-B7BA-B67A7AF33530)
  USDA NASS (2021) Applications - fertilizers and pesticides - number, amount, - Soybean, Illinois - 2000-2021. US Department of Agriculture (USDA) National Agricultural Statistics Service. https://quickstats.nass.usda.gov (direct query: https://quickstats.nass.usda.gov/results/CBB93A96-1EAC-3BFF-87F0-5E4AECFE034D)
- S-Metolachlor [soil, agricultural]: 4.8294e-5 kg; normal variance with pedigree 6.77065e-11, pedigree (2,2,2,1,1)
  S-metolachlor emission to agricultural soil (1.910E-01 kg/ha). Pesticides are assumed to be ultimately 100% emitted to soil. Average over state-wide reported cropped area of soybean for all tillage practices (CTIC 2020a) and across all rotation patterns (Socolar et al 2021 ) - calculated from specified herbicide/insecticide/fungicide quantity applied to treated acres weighted by share of acres treated with that herbicide/insecticide/fungicide (2015,2017,2018,2020-USDA NASS data, USDA NASS 2021e)
  Sources:
  CTIC (2020a) OpTIS - Operational Tillage Information System. Conservation Technology Information Center (CTIC). https://www.ctic.org/optis_tabular_query accessed March 23, 2021
  Socolar Y, Goldstein B R, de Valpine P, Bowles T M (2021) Biophysical and policy factors predict simplified crop rotations in the US Midwest. Environ. Res. Lett. 16 054045. https://iopscience.iop.org/article/10.1088/1748-9326/abf9ca
  USDA NASS (2021) SOYBEAN- APPLICATIONS, MEASURED IN LB / ACRE / YEAR, AVG (fertilizer and pesticides, amount, number of applications) - 2000-2021. US Department of Agriculture (USDA) National Agricultural Statistics Service. https://quickstats.nass.usda.gov (direct query: https://quickstats.nass.usda.gov/results/1D738304-38A8-3977-B7BA-B67A7AF33530)
  USDA NASS (2021) Applications - fertilizers and pesticides - number, amount, - Soybean, Illinois - 2000-2021. US Department of Agriculture (USDA) National Agricultural Statistics Service. https://quickstats.nass.usda.gov (direct query: https://quickstats.nass.usda.gov/results/CBB93A96-1EAC-3BFF-87F0-5E4AECFE034D)
- Saflufenacil [soil, agricultural]: 6.44063e-7 kg; normal variance with pedigree 2.32238e-18, pedigree (2,2,2,1,1)
  Saflufenacil emission to agricultural soil (2.547E-03 kg/ha). Pesticides are assumed to be ultimately 100% emitted to soil. Average over state-wide reported cropped area of soybean for all tillage practices (CTIC 2020a) and across all rotation patterns (Socolar et al 2021 ) - calculated from specified herbicide/insecticide/fungicide quantity applied to treated acres weighted by share of acres treated with that herbicide/insecticide/fungicide (2015,2017,2018,2020-USDA NASS data, USDA NASS 2021e)
  Sources:
  CTIC (2020a) OpTIS - Operational Tillage Information System. Conservation Technology Information Center (CTIC). https://www.ctic.org/optis_tabular_query accessed March 23, 2021
  Socolar Y, Goldstein B R, de Valpine P, Bowles T M (2021) Biophysical and policy factors predict simplified crop rotations in the US Midwest. Environ. Res. Lett. 16 054045. https://iopscience.iop.org/article/10.1088/1748-9326/abf9ca
  USDA NASS (2021) SOYBEAN- APPLICATIONS, MEASURED IN LB / ACRE / YEAR, AVG (fertilizer and pesticides, amount, number of applications) - 2000-2021. US Department of Agriculture (USDA) National Agricultural Statistics Service. https://quickstats.nass.usda.gov (direct query: https://quickstats.nass.usda.gov/results/1D738304-38A8-3977-B7BA-B67A7AF33530)
  USDA NASS (2021) Applications - fertilizers and pesticides - number, amount, - Soybean, Illinois - 2000-2021. US Department of Agriculture (USDA) National Agricultural Statistics Service. https://quickstats.nass.usda.gov (direct query: https://quickstats.nass.usda.gov/results/CBB93A96-1EAC-3BFF-87F0-5E4AECFE034D)
- Sulfentrazone [soil, agricultural]: 1.65586e-5 kg; normal variance with pedigree 9.35733e-13, pedigree (2,2,2,1,1)
  Sulfentrazone emission to agricultural soil (6.548E-02 kg/ha). Pesticides are assumed to be ultimately 100% emitted to soil. Average over state-wide reported cropped area of soybean for all tillage practices (CTIC 2020a) and across all rotation patterns (Socolar et al 2021 ) - calculated from specified herbicide/insecticide/fungicide quantity applied to treated acres weighted by share of acres treated with that herbicide/insecticide/fungicide (2015,2017,2018,2020-USDA NASS data, USDA NASS 2021e)
  Sources:
  CTIC (2020a) OpTIS - Operational Tillage Information System. Conservation Technology Information Center (CTIC). https://www.ctic.org/optis_tabular_query accessed March 23, 2021
  Socolar Y, Goldstein B R, de Valpine P, Bowles T M (2021) Biophysical and policy factors predict simplified crop rotations in the US Midwest. Environ. Res. Lett. 16 054045. https://iopscience.iop.org/article/10.1088/1748-9326/abf9ca
  USDA NASS (2021) SOYBEAN- APPLICATIONS, MEASURED IN LB / ACRE / YEAR, AVG (fertilizer and pesticides, amount, number of applications) - 2000-2021. US Department of Agriculture (USDA) National Agricultural Statistics Service. https://quickstats.nass.usda.gov (direct query: https://quickstats.nass.usda.gov/results/1D738304-38A8-3977-B7BA-B67A7AF33530)
  USDA NASS (2021) Applications - fertilizers and pesticides - number, amount, - Soybean, Illinois - 2000-2021. US Department of Agriculture (USDA) National Agricultural Statistics Service. https://quickstats.nass.usda.gov (direct query: https://quickstats.nass.usda.gov/results/CBB93A96-1EAC-3BFF-87F0-5E4AECFE034D)
- Tebuconazole [soil, agricultural]: 1.54559e-6 kg; normal variance with pedigree 7.10296e-17, pedigree (2,2,4,3,2)
  Tebuconazole emission to agricultural soil (6.112E-03 kg/ha). Pesticides are assumed to be ultimately 100% emitted to soil. Average over state-wide reported cropped area of soybean for all tillage practices (CTIC 2020a) and across all rotation patterns (Socolar et al 2021 ) - calculated from specified herbicide/insecticide/fungicide quantity applied to treated acres weighted by share of acres treated with that herbicide/insecticide/fungicide (2015,2017,2018,2020-USDA NASS data, USDA NASS 2021e)
  NASS does not contain numerical values for a number of pesticides widely used in soybean, are reported have no numerical data reported in NASS, as the values are hidden. For the most significant of those (those with more than 10 non-zero but withheld entries), the dataset uses other NASS entries to estimate the quantity if numerical entries are available. The quantity used in the dataset for those pesticides is taken from maize if available, because the widespread one-year soybean-maize rotation cycle leads to more consistent usages. For the ones not covered in the numerical data for maize, the national average from NASS data is used if NASS contains non-withheld data. Where no numerical data are available in NASS, the item is excluded to avoid inconsistency with the pesticide usage matrix based on NASS data.
  Pesticide data is sometimes withheld in the NASS database to avoid disclosing data for individual operations (denoted with "D" in the data returned for the query, indicating a non-zero but withheld value). Where there is obfuscated, non-zero data for particular compounds, the crop-specific U.S. average (calculated from the USDA NASS data, which covers a subset of states, generally those with non-negligible production of the particular crop) are used. For states with all (D) entries (i.e., the compound has been reported as used – non-zero -- but data cannot be shown), the average quantity and variability of the application rate for that compound across all of the specific crop in the US in the same time period is used. For states with a single non-D data year in the dataset timeframe, that data value is uded and the variability is set to the variability of the application rate for that compound across all of the specific crop in the US in the relevant time period.
  Note that this U.S. soy average value and standard deviation is neither production nor area weighted, as the application rate depends on many factors and this value is intended to represent the range of use. Instead, the average percent of treated acres for the class in that state is used. That is, if the average share of planted area across all non-zero, non-withheld values for fungicide treatment is 15%, then the US average application rate for the withheld data fungicide is scaled by 15% to reflect the effective average treatment per ha for that compound on the particular crop in the state.
  Sources:
  CTIC (2020a) OpTIS - Operational Tillage Information System. Conservation Technology Information Center (CTIC). https://www.ctic.org/optis_tabular_query accessed March 23, 2021
  Socolar Y, Goldstein B R, de Valpine P, Bowles T M (2021) Biophysical and policy factors predict simplified crop rotations in the US Midwest. Environ. Res. Lett. 16 054045. https://iopscience.iop.org/article/10.1088/1748-9326/abf9ca
  USDA NASS (2021) SOYBEAN- APPLICATIONS, MEASURED IN LB / ACRE / YEAR, AVG (fertilizer and pesticides, amount, number of applications) - 2000-2021. US Department of Agriculture (USDA) National Agricultural Statistics Service. https://quickstats.nass.usda.gov (direct query: https://quickstats.nass.usda.gov/results/1D738304-38A8-3977-B7BA-B67A7AF33530)
  USDA NASS (2021) Applications - fertilizers and pesticides - number, amount, - Soybean, Illinois - 2000-2021. US Department of Agriculture (USDA) National Agricultural Statistics Service. https://quickstats.nass.usda.gov (direct query: https://quickstats.nass.usda.gov/results/CBB93A96-1EAC-3BFF-87F0-5E4AECFE034D)
- Tetraconazole [soil, agricultural]: 1.9576e-6 kg; normal variance with pedigree 1.82792e-16, pedigree (2,2,2,1,1)
  Tetraconazole emission to agricultural soil (7.741E-03 kg/ha). Pesticides are assumed to be ultimately 100% emitted to soil. Average over state-wide reported cropped area of soybean for all tillage practices (CTIC 2020a) and across all rotation patterns (Socolar et al 2021 ) - calculated from specified herbicide/insecticide/fungicide quantity applied to treated acres weighted by share of acres treated with that herbicide/insecticide/fungicide (2015,2017,2018,2020-USDA NASS data, USDA NASS 2021e)
  Sources:
  CTIC (2020a) OpTIS - Operational Tillage Information System. Conservation Technology Information Center (CTIC). https://www.ctic.org/optis_tabular_query accessed March 23, 2021
  Socolar Y, Goldstein B R, de Valpine P, Bowles T M (2021) Biophysical and policy factors predict simplified crop rotations in the US Midwest. Environ. Res. Lett. 16 054045. https://iopscience.iop.org/article/10.1088/1748-9326/abf9ca
  USDA NASS (2021) SOYBEAN- APPLICATIONS, MEASURED IN LB / ACRE / YEAR, AVG (fertilizer and pesticides, amount, number of applications) - 2000-2021. US Department of Agriculture (USDA) National Agricultural Statistics Service. https://quickstats.nass.usda.gov (direct query: https://quickstats.nass.usda.gov/results/1D738304-38A8-3977-B7BA-B67A7AF33530)
  USDA NASS (2021) Applications - fertilizers and pesticides - number, amount, - Soybean, Illinois - 2000-2021. US Department of Agriculture (USDA) National Agricultural Statistics Service. https://quickstats.nass.usda.gov (direct query: https://quickstats.nass.usda.gov/results/CBB93A96-1EAC-3BFF-87F0-5E4AECFE034D)
- Thifensulfuron-methyl [soil, agricultural]: 2.56362e-7 kg; normal variance with pedigree 5.37614e-20, pedigree (2,2,2,1,1)
  Thifensulfuron-methyl emission to agricultural soil (1.014E-03 kg/ha). Pesticides are assumed to be ultimately 100% emitted to soil. Average over state-wide reported cropped area of soybean for all tillage practices (CTIC 2020a) and across all rotation patterns (Socolar et al 2021 ) - calculated from specified herbicide/insecticide/fungicide quantity applied to treated acres weighted by share of acres treated with that herbicide/insecticide/fungicide (2015,2017,2018,2020-USDA NASS data, USDA NASS 2021e)
  Sources:
  CTIC (2020a) OpTIS - Operational Tillage Information System. Conservation Technology Information Center (CTIC). https://www.ctic.org/optis_tabular_query accessed March 23, 2021
  Socolar Y, Goldstein B R, de Valpine P, Bowles T M (2021) Biophysical and policy factors predict simplified crop rotations in the US Midwest. Environ. Res. Lett. 16 054045. https://iopscience.iop.org/article/10.1088/1748-9326/abf9ca
  USDA NASS (2021) SOYBEAN- APPLICATIONS, MEASURED IN LB / ACRE / YEAR, AVG (fertilizer and pesticides, amount, number of applications) - 2000-2021. US Department of Agriculture (USDA) National Agricultural Statistics Service. https://quickstats.nass.usda.gov (direct query: https://quickstats.nass.usda.gov/results/1D738304-38A8-3977-B7BA-B67A7AF33530)
  USDA NASS (2021) Applications - fertilizers and pesticides - number, amount, - Soybean, Illinois - 2000-2021. US Department of Agriculture (USDA) National Agricultural Statistics Service. https://quickstats.nass.usda.gov (direct query: https://quickstats.nass.usda.gov/results/CBB93A96-1EAC-3BFF-87F0-5E4AECFE034D)
- Tribenuron [soil, agricultural]: 5.61683e-7 kg; normal variance with pedigree 1.23886e-18, pedigree (2,2,2,1,1)
  Tribenuron emission to agricultural soil (2.221E-03 kg/ha). Pesticides are assumed to be ultimately 100% emitted to soil. Average over state-wide reported cropped area of soybean for all tillage practices (CTIC 2020a) and across all rotation patterns (Socolar et al 2021 ) - calculated from specified herbicide/insecticide/fungicide quantity applied to treated acres weighted by share of acres treated with that herbicide/insecticide/fungicide (2015,2017,2018,2020-USDA NASS data, USDA NASS 2021e)
  Sources:
  CTIC (2020a) OpTIS - Operational Tillage Information System. Conservation Technology Information Center (CTIC). https://www.ctic.org/optis_tabular_query accessed March 23, 2021
  Socolar Y, Goldstein B R, de Valpine P, Bowles T M (2021) Biophysical and policy factors predict simplified crop rotations in the US Midwest. Environ. Res. Lett. 16 054045. https://iopscience.iop.org/article/10.1088/1748-9326/abf9ca
  USDA NASS (2021) SOYBEAN- APPLICATIONS, MEASURED IN LB / ACRE / YEAR, AVG (fertilizer and pesticides, amount, number of applications) - 2000-2021. US Department of Agriculture (USDA) National Agricultural Statistics Service. https://quickstats.nass.usda.gov (direct query: https://quickstats.nass.usda.gov/results/1D738304-38A8-3977-B7BA-B67A7AF33530)
  USDA NASS (2021) Applications - fertilizers and pesticides - number, amount, - Soybean, Illinois - 2000-2021. US Department of Agriculture (USDA) National Agricultural Statistics Service. https://quickstats.nass.usda.gov (direct query: https://quickstats.nass.usda.gov/results/CBB93A96-1EAC-3BFF-87F0-5E4AECFE034D)
- Trifloxystrobin [soil, agricultural]: 5.95262e-6 kg; normal variance with pedigree 1.56275e-14, pedigree (2,2,2,1,1)
  Trifloxystrobin emission to agricultural soil (2.354E-02 kg/ha). Pesticides are assumed to be ultimately 100% emitted to soil. Average over state-wide reported cropped area of soybean for all tillage practices (CTIC 2020a) and across all rotation patterns (Socolar et al 2021 ) - calculated from specified herbicide/insecticide/fungicide quantity applied to treated acres weighted by share of acres treated with that herbicide/insecticide/fungicide (2015,2017,2018,2020-USDA NASS data, USDA NASS 2021e)
  Sources:
  CTIC (2020a) OpTIS - Operational Tillage Information System. Conservation Technology Information Center (CTIC). https://www.ctic.org/optis_tabular_query accessed March 23, 2021
  Socolar Y, Goldstein B R, de Valpine P, Bowles T M (2021) Biophysical and policy factors predict simplified crop rotations in the US Midwest. Environ. Res. Lett. 16 054045. https://iopscience.iop.org/article/10.1088/1748-9326/abf9ca
  USDA NASS (2021) SOYBEAN- APPLICATIONS, MEASURED IN LB / ACRE / YEAR, AVG (fertilizer and pesticides, amount, number of applications) - 2000-2021. US Department of Agriculture (USDA) National Agricultural Statistics Service. https://quickstats.nass.usda.gov (direct query: https://quickstats.nass.usda.gov/results/1D738304-38A8-3977-B7BA-B67A7AF33530)
  USDA NASS (2021) Applications - fertilizers and pesticides - number, amount, - Soybean, Illinois - 2000-2021. US Department of Agriculture (USDA) National Agricultural Statistics Service. https://quickstats.nass.usda.gov (direct query: https://quickstats.nass.usda.gov/results/CBB93A96-1EAC-3BFF-87F0-5E4AECFE034D)
- Trifluralin [soil, agricultural]: 3.91445e-5 kg; normal variance with pedigree 2.9224e-11, pedigree (2,2,2,1,1)
  Trifluralin emission to agricultural soil (1.548E-01 kg/ha). Pesticides are assumed to be ultimately 100% emitted to soil. Average over state-wide reported cropped area of soybean for all tillage practices (CTIC 2020a) and across all rotation patterns (Socolar et al 2021 ) - calculated from specified herbicide/insecticide/fungicide quantity applied to treated acres weighted by share of acres treated with that herbicide/insecticide/fungicide (2015,2017,2018,2020-USDA NASS data, USDA NASS 2021e)
  Sources:
  CTIC (2020a) OpTIS - Operational Tillage Information System. Conservation Technology Information Center (CTIC). https://www.ctic.org/optis_tabular_query accessed March 23, 2021
  Socolar Y, Goldstein B R, de Valpine P, Bowles T M (2021) Biophysical and policy factors predict simplified crop rotations in the US Midwest. Environ. Res. Lett. 16 054045. https://iopscience.iop.org/article/10.1088/1748-9326/abf9ca
  USDA NASS (2021) SOYBEAN- APPLICATIONS, MEASURED IN LB / ACRE / YEAR, AVG (fertilizer and pesticides, amount, number of applications) - 2000-2021. US Department of Agriculture (USDA) National Agricultural Statistics Service. https://quickstats.nass.usda.gov (direct query: https://quickstats.nass.usda.gov/results/1D738304-38A8-3977-B7BA-B67A7AF33530)
  USDA NASS (2021) Applications - fertilizers and pesticides - number, amount, - Soybean, Illinois - 2000-2021. US Department of Agriculture (USDA) National Agricultural Statistics Service. https://quickstats.nass.usda.gov (direct query: https://quickstats.nass.usda.gov/results/CBB93A96-1EAC-3BFF-87F0-5E4AECFE034D)
- Zeta-cypermethrin [soil, agricultural]: 1.70068e-7 kg; normal variance with pedigree 1.04123e-20, pedigree (2,2,2,1,1)
  Zeta-cypermethrin emission to agricultural soil (6.725E-04 kg/ha). Pesticides are assumed to be ultimately 100% emitted to soil. Average over state-wide reported cropped area of soybean for all tillage practices (CTIC 2020a) and across all rotation patterns (Socolar et al 2021 ) - calculated from specified herbicide/insecticide/fungicide quantity applied to treated acres weighted by share of acres treated with that herbicide/insecticide/fungicide (2015,2017,2018,2020-USDA NASS data, USDA NASS 2021e)
  Sources:
  CTIC (2020a) OpTIS - Operational Tillage Information System. Conservation Technology Information Center (CTIC). https://www.ctic.org/optis_tabular_query accessed March 23, 2021
  Socolar Y, Goldstein B R, de Valpine P, Bowles T M (2021) Biophysical and policy factors predict simplified crop rotations in the US Midwest. Environ. Res. Lett. 16 054045. https://iopscience.iop.org/article/10.1088/1748-9326/abf9ca
  USDA NASS (2021) SOYBEAN- APPLICATIONS, MEASURED IN LB / ACRE / YEAR, AVG (fertilizer and pesticides, amount, number of applications) - 2000-2021. US Department of Agriculture (USDA) National Agricultural Statistics Service. https://quickstats.nass.usda.gov (direct query: https://quickstats.nass.usda.gov/results/1D738304-38A8-3977-B7BA-B67A7AF33530)
  USDA NASS (2021) Applications - fertilizers and pesticides - number, amount, - Soybean, Illinois - 2000-2021. US Department of Agriculture (USDA) National Agricultural Statistics Service. https://quickstats.nass.usda.gov (direct query: https://quickstats.nass.usda.gov/results/CBB93A96-1EAC-3BFF-87F0-5E4AECFE034D)
- Zinc II [soil, agricultural]: -5.62384e-6 kg; normal variance with pedigree 0.04, pedigree (4,4,5,2,4)
  (same comment as for Cadmium II)

- Cadmium II [water, ground-]: 7.77214e-10 kg; lognormal variance with pedigree 0.180025, pedigree (4,4,5,2,4)
  Emissions of heavy metals to surface water arise from leaching (when drainage is present) and erosion. Emissions are estimated based on the SALCA-heavy metal model (Freiermuth 2006) following the procedure in the ecoinvent agricultural LCI tool (Faist Emmenegger, Délerce-Mauris and Porté 2018 Models Integrated in Ecoinvent LCI Calculation Tool for Crop Production). The crop system carries a share of heavy metals emissions based on the ratio of cropping additions to total additions (additions to crop system divided by additions to crop system plus depostion from air and present in soils) Sources for heavy metals contents include: Leaching of heavy metals to surface water (Wolfensberger & Dinkel 1997), where drainage is installed ; Average heavy metal contents in crop soils, mg per kg soil, based on data for Switzerland (from Keller & Desaules, 2001). erosion rates are from US NRC National Resources Inventory, 2017. and Drainage on all cropland acres state-wide, including tile drainage (41.7%,) and ditch drainage (15.9%). USDA (2018) 2017 Census of Agriculture, Volume 1, Chapter 2: State Level Data - Table 41. Land Use Practices: 2017 and 2012 (live table: https://www.nass.usda.gov/Quick_Stats/CDQT/chapter/2/table/41/state/US). US Department of Agriculture (USDA). https://www.nass.usda.gov/Publications/AgCensus/2017/Full_Report/Volume_1,_Chapter_2_US_State_Level/st99_2_0041_0041.pdf . Fertilizer, manure and pesticide application rates are based on USDA NASS data.
  (N.B. The uncertainty associated with manure data increases the uncertainty of the heavy metal emissions.)
  Sources:
  Freiermuth (2006) SALCA-Schwermetall - Modell zur Berechnung der Schwermetall- flüsse in der Landwirtschaftlichen Ökobilanz. Agroscope FAL Zürich-Reckenholz . https://www.agroscope.admin.ch/dam/agroscope/de/dokumente/themen/umwelt-ressourcen/produktionssysteme/salca-schwermetall.pdf.download.pdf/SALCA-Schwermetall.pdf
  Faist Emmenegger M, Reinhard J, Zah R (2009) Sustainability Quick Check for Biofuels - in- termediate background report. With contributions from T. Ziep, R. Weichbrodt, Prof. Dr. V. Wohlgemuth, FHTW Berlin and A. Roches, R. Freiermuth Knuchel, Dr. G. Gaillard, Agroscope Reckenholz-Tänikon. Dübendorf. . https://www.researchgate.net/profile/Rainer-Zah/publication/230725635_SQCB_-_Sustainability_Quick_Check_for_Biofuels_Second_draft_18th_February_2009_-_Intermediate_Background_Report_With_contributions_from_T_Ziep_R_Weichbrodt_Prof_Dr_V_Wohlgemuth_FHTW_Berlin_and_A_Roche/links/56b458fb08ae1f8aa45392e6/SQCB-Sustainability-Quick-Check-for-Biofuels-Second-draft-18th-February-2009-Intermediate-Background-Report-With-contributions-from-T-Ziep-R-Weichbrodt-Prof-Dr-V-Wohlgemuth-FHTW-Berlin-and-A-R.pdf
  Prasuhn, V (2006) Erfassung der PO4-Austräge für die Ökobilanzierung. SALCA-Phosphor. Zü-rich, CH, Agrocope FAL Reckenholz. Agrocope.
  Faist Emmenegger, Délerce-Mauris and Porté (2018) 2018 Models Integrated in Ecoinvent LCI Calculation Tool for Crop Production. .
- Cadmium II [water, surface water]: 7.54562e-8 kg; lognormal variance with pedigree 0.180025, pedigree (4,4,5,2,4)
  (same comment as for Cadmium II)
- Chromium III [water, ground-]: 3.28493e-7 kg; lognormal variance with pedigree 0.180025, pedigree (4,4,5,2,4)
  (same comment as for Cadmium II)
- Chromium III [water, surface water]: 1.00449e-5 kg; lognormal variance with pedigree 0.180025, pedigree (4,4,5,2,4)
  (same comment as for Cadmium II)
- Copper ion [water, ground-]: 4.12194e-8 kg; lognormal variance with pedigree 0.180025, pedigree (4,4,5,2,4)
  (same comment as for Cadmium II)
- Copper ion [water, surface water]: 3.42253e-6 kg; lognormal variance with pedigree 0.180025, pedigree (4,4,5,2,4)
  (same comment as for Cadmium II)
- Lead II [water, ground-]: 2.05158e-11 kg; lognormal variance with pedigree 0.180025, pedigree (4,4,5,2,4)
  (same comment as for Cadmium II)
- Lead II [water, surface water]: 9.2628e-6 kg; lognormal variance with pedigree 0.180025, pedigree (4,4,5,2,4)
  (same comment as for Cadmium II)
- Mercury II [water, ground-]: 3.99483e-12 kg; lognormal variance with pedigree 0.180025, pedigree (4,4,5,2,4)
  (same comment as for Cadmium II)
- Mercury II [water, surface water]: 2.8644e-7 kg; lognormal variance with pedigree 0.180025, pedigree (4,4,5,2,4)
  (same comment as for Cadmium II)
- Nickel II [water, surface water]: 9.2256e-6 kg; lognormal variance with pedigree 0.180025, pedigree (4,4,5,2,4)
  (same comment as for Cadmium II)
- Nitrate [water, ground-]: 0.00855196 kg; lognormal variance with pedigree 0.0409, pedigree (2,2,2,1,1)
  The total nitrate leaching/runoff is 9.291E+1kg NO3/kg/ha (8.552E-3kg NO3/kg soybean), 2.186E+0kg NO3/ha from fertilisers, 1.004E+0kg NO3/ha kg/kg soybean, 9.46E+1kg NO3/ha from soil mineralization, and -4.886E+0kg NO3 N uptake. Nitrate leaching is calculated with the SQCB-NO3 model (Faist Emmenegger et al. 2009) using general (state-level) parameters for slope and clay content, local precipitation and irrigation data.
  Sources:
  Faist Emmenegger M, Reinhard J, Zah R (2009) Sustainability Quick Check for Biofuels - in- termediate background report. With contributions from T. Ziep, R. Weichbrodt, Prof. Dr. V. Wohlgemuth, FHTW Berlin and A. Roches, R. Freiermuth Knuchel, Dr. G. Gaillard, Agroscope Reckenholz-Tänikon. Dübendorf. . https://www.researchgate.net/profile/Rainer-Zah/publication/230725635_SQCB_-_Sustainability_Quick_Check_for_Biofuels_Second_draft_18th_February_2009_-_Intermediate_Background_Report_With_contributions_from_T_Ziep_R_Weichbrodt_Prof_Dr_V_Wohlgemuth_FHTW_Berlin_and_A_Roche/links/56b458fb08ae1f8aa45392e6/SQCB-Sustainability-Quick-Check-for-Biofuels-Second-draft-18th-February-2009-Intermediate-Background-Report-With-contributions-from-T-Ziep-R-Weichbrodt-Prof-Dr-V-Wohlgemuth-FHTW-Berlin-and-A-R.pdf
  DeBruin J and Butzen S (2020) Nitrogen uptake by corn . Pioneer. https://www.pioneer.com/us/agronomy/nitrogen_uptake_corn.html accessed 11-20-2021
  Fan, Y., Wang, Z., Liao, D. et al. Uptake and utilization of nitrogen, phosphorus and potassium as related to yield advantage in soybean-soybean intercropping under different row configurations. Sci Rep 10, 9504 (2020). https://doi.org/10.1038/s41598-020-66459-y
  Hollinger S E (1995) Midwestern Climate Center Soils Atlas and Database. Crop Science Extension & Outreach, University of Illinois . https://www.isws.illinois.edu/pubdoc/C/ISWSC-179.pdf
  Bruulsema T and Jones J D (2021) Soil Test Summary 2020. Foundation for Agronomic Research and Plant Nutrition Canada present this 2020 summary of soil test levels in North America. Foundation for Agronomic Research, Plant Nutrition Canada. https://soiltest.tfi.org/about/about_soil_test_summary accessed August 30, 2021
  ISU Extension (2021) Crop Production Costs Budgets - tabulated. Cooperative Extension Service, Iowa State University of Science and Technology. https://www.extension.iastate.edu/agdm/crops/pdf/a1-20.pdf 63.6% is emitted to surface water and 36.4% to ground water, since 63.6% of cropland in Nebraska has drainage (USDA 2018).
- Nitrate [water, surface water]: 0.0149425 kg; lognormal variance with pedigree 0.0409, pedigree (2,2,2,1,1)
  (same comment as for Nitrate)
- Phosphate [water, ground-]: 3.5404e-5 kg; lognormal variance with pedigree 0.0428, pedigree (2,4,2,1,1)
  Phosphate leaching to ground water 0.14 kg PO4/ha (3.54E-5 kg/kg soybean): 7.E-2 kg PO4/ha from manure and 7.E-2 kg PO4/ha from leaching from arable land. Phosphate leaching to ground water is calculated using the SALCA-P model (Prasuhn 2006) with an average leaching factor for arable lands and the amount of phosphate in any applied manure, as implemented in the ecoinvent agricultural LCI tool (see Ecoinvent_Too_Model_Description_20191015.pdf). Does not incorporate state or county data on soils, slope or conservation drainage infrastructure. Calculated with the ecoinvent agricultural LCI tool.
- Phosphate [water, surface water]: 4.60389e-5 kg; lognormal variance with pedigree 0.0428, pedigree (2,4,2,1,1)
  Phosphate runoff to surface water 0.182kg PO4/ha (4.604E-5: 1.199E-3 kg PO4/ha from manure, 5.856E-3 kg PO4/ha from mineral fertilisers, and 1.75E-1 kg PO4/ha from leaching from arable landPhosphate runoff to surface water is calculated using the SALCA-P model (Prasuhn 2006) with an average leaching factor for arable lands and the amount of phosphate in any applied solid manure, liquid manure and mineral fertilisers, as implemented in the ecoinvent agricultural LCI tool (see Ecoinvent_Too_Model_Description_20191015.pdf). Does not incorporate state or county data on soils, slope or conservation drainage infrastructure. Calculated with the ecoinvent agricultural LCI tool. (1.199E-3 kg PO4/ha from manure, 5.856E-3 kg PO4/ha from mineral fertilisers, and 1.75E-1 kg PO4/ha from leaching from arable land)
- Phosphorus [water, surface water]: 3.75833e-6 kg; lognormal variance with pedigree 0.0502, pedigree (3,2,4,3,1)
  Phosphorus emissions to surface water are based on the SALCA-P model (Prasuhn 2006), but using state-specific data for agricultural land (not crop-specific). The erosion and soil test values encompass the state-wide reported cropped area of soybean in Illinois for all tillage practices (OPTiS 2020) and across all rotation patterns (Socolar et al 2021).Soil Phosphorus losses are calculated from an annual soil loss from water erosion on agricultural soils in Illinois of 9.953t/ha/year (NRCS 2020b)with a Phosphorus soil concentration of 20mg/kg soil, the median value from 473,736 soil test samples reported for Illinois in the 2020 Soil Test Survey, (the average of the 2005, 2010, 2015, and 2020 median soil Phosphorus concentrations is 27.5mg/kg soil) (Bruulsema T and Jones J D 2021).No enrichment factor has been applied, because the phosphorus soil concentration samples are specifically agricultural land in the study area and thus any enrichment as a result of synthetic and organic fertilisers is already caputred in the soil test.An active cultivation duration of 6.8 months (0.56 year), covering cultivation through harvest (from weekly progress reports,USDA NASS 2021d), is used to adjust the annual erosion to the crop share (see Faist-Emmenegger et al 2009).No adjustment has been made for the presence of drainage (installed on 57.6% of crop land, USDA 2018) or any anti-erosion practices.Sources:
  NRCS (2020) Soil losses from erosion (water and wind) on cultivated cropland, in the 2017 National Resources Inventory. USDA, Natural Resources Conservation Service. http://www.nrcs.usda.gov/Internet/NRCS_RCA/reports/nri_crop_nat.html ; Bruulsema T and Jones J D (2021) Soil Test Summary 2020. Foundation for Agronomic Research and Plant Nutrition Canada present this 2020 summary of soil test levels in North America. Foundation for Agronomic Research, Plant Nutrition Canada. https://soiltest.tfi.org/about/about_soil_test_summary accessed August 30, 2021; USDA NASS (2021) SOYBEAN - PROGRESS (planted, emerged, harvested) - 2000-2021. US Department of Agriculture (USDA) National Agricultural Statistics Service. https://quickstats.nass.usda.gov (direct query: https://quickstats.nass.usda.gov/results/D4FD1D7C-CD14-3824-A2F3-D076E9778695) ; USDA (2018) 2017 Census of Agriculture, Volume 1, Chapter 2: State Level Data - Table 41. Land Use Practices: 2017 and 2012 (live table: https://www.nass.usda.gov/Quick_Stats/CDQT/chapter/2/table/41/state/US). US Department of Agriculture (USDA). https://www.nass.usda.gov/Publications/AgCensus/2017/Full_Report/Volume_1,_Chapter_2_US_State_Level/st99_2_0041_0041.pdf ; Prasuhn, V (2006) Erfassung der PO4-Austräge für die Ökobilanzierung. SALCA-Phosphor. Zü-rich, CH, Agrocope FAL Reckenholz. Agrocope. ; Faist Emmenegger M, Reinhard J, Zah R (2009) Sustainability Quick Check for Biofuels - in- termediate background report. With contributions from T. Ziep, R. Weichbrodt, Prof. Dr. V. Wohlgemuth, FHTW Berlin and A. Roches, R. Freiermuth Knuchel, Dr. G. Gaillard, Agroscope Reckenholz-Tänikon. Dübendorf. . https://www.researchgate.net/profile/Rainer-Zah/publication/230725635_SQCB_-_Sustainability_Quick_Check_for_Biofuels_Second_draft_18th_February_2009_-_Intermediate_Background_Report_With_contributions_from_T_Ziep_R_Weichbrodt_Prof_Dr_V_Wohlgemuth_FHTW_Berlin_and_A_Roche/links/56b458fb08ae1f8aa45392e6/SQCB-Sustainability-Quick-Check-for-Biofuels-Second-draft-18th-February-2009-Intermediate-Background-Report-With-contributions-from-T-Ziep-R-Weichbrodt-Prof-Dr-V-Wohlgemuth-FHTW-Berlin-and-A-R.pdf
- Water [water, ground-]: 0.360652 m3; lognormal variance with pedigree 0.0015, pedigree (2,2,2,1,1)
  Irrigation water not taken up by crop. Calculated by the ecoinvent agricultural LCI tool.
- Water [water, surface water]: 0.0169886 m3; lognormal variance with pedigree 0.0015, pedigree (2,2,2,1,1)
  Irrigation water not taken up by crop. Calculated by the ecoinvent agricultural LCI tool.
- Zinc II [water, ground-]: 2.66464e-8 kg; lognormal variance with pedigree 0.180025, pedigree (4,4,5,2,4)
  (same comment as for Cadmium II)
- Zinc II [water, surface water]: 2.60775e-5 kg; lognormal variance with pedigree 0.180025, pedigree (4,4,5,2,4)
  (same comment as for Cadmium II)

## Sampling procedure
Data is obtained from state, county and national statistics, agricultural extension offices, and published literature. Data for production, yields, applications of NPKS fertilisers, applications of pesticides, row width, and irrigation (if any) was obtained from the US Dept of Agriculture's National Agricultural Statistics Service and in most cases provides high-quality data spanning the dataset time period. Field operations and energy use are from enterprise crop budgets provided by local agricultural extensions offices and their farmer survey data. Literature data is used where USDA and agricultural extension guidance and data are not available. Uncertainty distribution types and statistical parameters have been based where possible on the underlying data itself, primarily normal distributions for data from USDA NASS. Otherwise, lognormal distributions are selected for use with Pedigree scores.

## Extrapolations
Mineral fertiliser applications are crop and location (state and sub-state levels) specific for nutrient applied, based on survey data compiled by the USDA National Agricultural Statistics Service. Specific fertilisers are extrapolated from mineral fertiliser applications to soy bean in Nebraska and market consumption in the US (ecoinvent and IFA 2019). Organic fertiliser types are extrapolated from animal manure use data for soybean in Nebraska (state-level) based on data collected by the USDA Economic Research Service for 2010, 2005 and 2000 and current materials on livestock levels. Where available data for liquid/slurry/solid shares and/or for animal source shares are incomplete, the shares have been normalized using the data provided. Rotations are based on published analysis and classification of Cropland Data Layer GIS data for 2012-2018 and other sources (Socolar et al 2021 ). The US average is used for the state level values based on similarity shown in source maps, with the exception of MO and KS (significantly more area multi-crop rotations, with rotations of alfalfa and oats). More than 75% of Midwestern soy is in annual rotation with corn, the remainder in more complex rotations involving oats, alfalfa or/and pasture on multiyear schedules. Generally soy rotations alternate years. Rotations that are predominantly corn/soy (e.g., CPCSCS & SCPCSC) have also been grouped as corn-soy rotation, assuming the overall trend will continue and the year of pasture is intermittent. The rotation pattern is assumed to be steady throughout the period, consistent with number of years classified. Data about tillage practices are from crop-specific GIS data for soy encompassing the dataset years (OpTIS 2020). Soil characteristics, including pH and clay content, are extrapolated from (Hollinger S E 1995) and (Bruulsema T and Jones J D 2021) data reported for 2020 (pH, SOM) and 1995 (clay and slope), and taken as valid for the full time period. Slope is consistent with 2009 USGS data showing 69% of the crop on farmland with slope under 1% and 83% less than 2%. Drainage tile data from 2012 (reported to USDA for the 2012 agricultural census) is extrapolated as valid from that date through the rest of the time period of the dataset and the distribution of drainage is treated as homogenous for all field crops. Machine usage is modelled with midwestern US diesel consumption and field operations set out by the regional agricultural extension office and crop budgets (Lazarus 2020, ISU 2015-2021). Machine sizes (power) are approximate but based on common, recent surveys and equipment analyses (Lazarus 2020). Transports are modelled with standard distances. Emissions are calculated with standard methods according to ecoinvent documentation (Nemecek and Schnetzer, 2011. '01 crop production-direct field emissions natural resources' v1.2, August 2011, available at ) and the World Food LCA Database guidelines and the ecoinvent agricultural LCI tool. Pesticide data is sometimes withheld in the NASS database to avoid disclosing data for individual operations (denoted with "D" in the data returned for the query, indicating a non-zero but withheld value). Where there is obfuscated, non-zero data for particular compounds, the crop-specific U.S. average (calculated from the USDA NASS data, which covers a subset of states, generally those with non-negligible production of the particular crop) are used. For states with all (D) entries (i.e., the compound has been reported as used – non-zero -- but data cannot be shown), the average quantity and variability of the application rate for that compound across all of the specific crop in the US in the same time period is used. For states with a single non-D data year in the dataset timeframe, that data value is uded and the variability is set to the variability of the application rate for that compound across all of the specific crop in the US in the relevant time period.
Note that this U.S. soybean average value and standard deviation is neither production nor area weighted, as the application rate depends on many factors and this value is intended to represent the range of use. Instead, the average percent of treated acres for the class in that state is used. That is, if the average share of planted area across all non-zero, non-withheld values for fungicide treatment is 15%, then the US average application rate for the withheld data fungicide is scaled by 15% to reflect the effective average treatment per ha for that compound on the particular crop in the state.
