# coke production, wet quenching

Dataset: EcoSpold 2, unit process
Geography: CN
Time period: 2013-01-01 to 2024-12-31
Technology level: current
Classification: ISIC rev.4 ecoinvent: 1910:Manufacture of coke oven products
Synonyms: CWQ
Scenario: Business-as-Usual
System model: Allocation, cut-off by classification
Generated by: Johannes Müller
Published in: Xin Liu 2016
Database: ecoinvent
isCopyrightProtected: true
accessRestrictedTo: 1

## General comment
This multioutput-process represents the supply of coke by using the wet quenching (CWQ) technology, producing coal gas, coal tar, sulfur and benzene as a byproduct whithin the geography of China.
The dataset is based on the article “Life cycle environmental performance of by-product coke production in China” from Liu, X. and Yuan, Z. (2016).

## Included activities start
Activity starts with the reception of coal at plant-site.

## Included activities end
The activity ends with the supply of 1 kg of coke, considering the by-product recovery, to the chinese and global market. Transport is not included.

## Geography
Domestic coking coal reserves for coke production are very rich
and centrally distributed in Shanxi, Anhui and Shandong Provinces,
which accounted for approximately 70% of the Chinese total coking
coal resources (Fan, W.T., 2005. Chinese Coking Coal Resources, Production and Quality. China National Coal Association, Beijing, China.) By that it is assumed for the entire country.

## Technology
Wet quenching plays a significant role in the production of coke and is the traditional procedure. In the coke-making process, coal is heated in an oxygen-depleted environment to remove volatile components and produce coke. Wet quenching is employed to rapidly cool down the hot coke and stabilize its structure. The coke is typically transferred to a quenching tower, where it comes into contact with water sprays or is submerged in water. This immediate cooling prevents the coke from further reacting with oxygen, which could result in its combustion. Additionally, wet quenching helps to harden and strengthen the coke, making it more suitable for transportation and handling.

## Reference product
- coke: 1 MJ; name RP_coke; = LHV_coke; By-product classification allocatable product; CPC 33100: Coke and semi-coke of coal, of lignite or of peat; retort carbon; HS2017 270400: Coke and semi-coke; of coal, lignite or peat, whether or not agglomerated; retort carbon
  Reference product is given for 1 kg, thus converted by the lower heating value of 28.6
  production volume 1.05667e13 MJ; name PV_coke; = 4.79824E+11 * 0.77*LHV_coke
    University Texas assumes 23% accounting for dry quenching for coke production in China in 2010, The remaining 77% coke production is assumed to be wet quenching. https://sites.utexas.edu/mecc/2014/02/08/chinas-coke-problem/. Production volume for coke in Chinafor 2021 is 4.79824E+11 kg second U.S. Energy Information Administration (EIA) https://www.eia.gov/international/data/world/coal-and-coke/coal-and-coke-production?pd=1&p=02&u=1&f=A&v=mapbubble&a=-&i=none&vo=value&t=C&g=none&l=249--38&s=315532800000&e=1609459200000&&ev=false
  property heating value, net 28.6 MJ; name LHV_coke
  property price 0.00791364 EUR2005
    Calculated as price based on: 2018 to 2022 prices calculated from Import/Export data (total trades (USD) divided by total weight (kg) in Germany and China) from UN Trade data statistics (http://data.un.org/Explorer.aspx, Accessed 13 September 2023). Data from UN trade are in mass unit. Calorific value (lower) of 28.6 MJ/kg has been used to convert to MJ.
  properties: allocation factor 0.791267, carbon allocation 0.0285664 kg, carbon content 0.869149, carbon content, fossil 0.869149, carbon content, non-fossil 0, dry mass 0.0328671 kg, true value 0.22633, water content 0.0638298, water in wet mass 0.0020979 kg, wet mass 0.034965 kg

## Inputs from technosphere
- aluminium chloride: 3.22178e-6 kg; lognormal variance with pedigree 0.0033, pedigree (2,2,3,1,1)
  Literature value.
- chemical, inorganic: 2.1414e-7 kg; lognormal variance with pedigree 0.0033, pedigree (2,2,3,1,1)
  Used as proxy for sodium dihydrogen phosphate.
  properties: carbon content, fossil 0.003, dry mass 1 kg, wet mass 1 kg
  note on carbon content, fossil: This dataset is an unweighted average of 20 inorganic substances (listed in Tab 88.1, ecoinvent v2.2 report 8, part II), being part of the top100 chemicals included in this database. The C-content has also been calculated as an unweighted average of the C content of the substances composing this dataset.
- coal gas: 0.118822 MJ; = 0.22604 * 19; lognormal variance with pedigree 0.0033, pedigree (2,2,3,1,1)
  Calculated value. Data provider provides 0.22604 m3 multiplied with the heating value of 19 MJ/m3. Gas is provided by the by-product of the own process. Taken from literature.
  properties: carbon content, fossil 0.288181, dry mass 0.0294737 kg, wet mass 0.0294737 kg
- electricity, medium voltage: 0.000928217 kWh; lognormal variance with pedigree 0.0033, pedigree (2,2,3,1,1)
  Literature value.
- glucose: 2.18594e-6 kg; lognormal variance with pedigree 0.0033, pedigree (2,2,3,1,1)
  Literature value.
  properties: heating value, net 20.19 MJ
- hard coal: 0.03901 kg; lognormal variance with pedigree 0.0033, pedigree (2,2,3,1,1)
  Literature value.
  properties: carbon content, fossil 0.845, dry mass 0.94 kg, heating value, net 27.91 MJ, water content 0.0638298, wet mass 1 kg
  note on carbon content, fossil: C content 75-94% (specified in Tab 1.1, report 6, part VI). A mean content of 0.845 kg C/ kg dry hard coal was considered
  note on heating value, net: Based on the Characterization factor of Hard coal in the CED method
- nitrogen, liquid: 6.08667e-5 kg; lognormal variance with pedigree 0.0033, pedigree (2,2,3,1,1)
  Literature value.
  properties: dry mass 1 kg, wet mass 1 kg
- petroleum: 3.403e-5 kg; lognormal variance with pedigree 0.0033, pedigree (2,2,3,1,1)
  Used as a proxy to Wash Oil.
  According to Liu, X., & Yuan, Z. (2016). Life cycle environmental performance of by-product coke production in China
  properties: carbon content, fossil 0.84, dry mass 1 kg, heating value, net 43.4 MJ, wet mass 1 kg
- phosphoric acid, fertiliser grade, without water, in 70% solution state: 1.98647e-7 kg; lognormal variance with pedigree 0.0033, pedigree (2,2,3,1,1)
  Used as proxy for fungicide
  properties: dry mass 1 kg, wet mass 1 kg
- polyacrylamide: 2.35167e-8 kg; lognormal variance with pedigree 0.0033, pedigree (2,2,3,1,1)
  Literature value.
  properties: carbon content, fossil 0.51, dry mass 1 kg, heating value, net 23.88 MJ, wet mass 1 kg
- potassium carbonate: 3.62433e-8 kg; lognormal variance with pedigree 0.0033, pedigree (2,2,3,1,1)
  Used as proxy for desulphuriser.
  According to <https://www.researchgate.net/publication/284730278_Desulphurization_of_Petroleum_Coke>
  properties: carbon content, fossil 0.0869565, dry mass 1 kg, heating value, net 2.63 MJ, wet mass 1 kg
- sodium hydroxide, without water, in 50% solution state: 7.968e-5 kg; lognormal variance with pedigree 0.0033, pedigree (2,2,3,1,1)
  Literature value.
  properties: dry mass 1 kg, heating value, net 3.03 MJ, wet mass 1 kg
- sodium tripolyphosphate: 5.9262e-7 kg; lognormal variance with pedigree 0.0033, pedigree (2,2,3,1,1)
  Proxy for scale inhibitor in water treatment.
  Liu, X., & Yuan, Z. (2016). Life cycle environmental performance of by-product coke production in China
  properties: dry mass 1 kg, wet mass 1 kg
- steam, in chemical industry: 0.00747 kg; lognormal variance with pedigree 0.0033, pedigree (2,2,3,1,1)
  Literature value.
  properties: wet mass 1 kg
- wastewater, average: -6.86133e-5 m3; name BP_ww; = water/1000
  Calculated Value. Wastewater stream added to close the mass balance.
  production volume; = PV_coke*BP_ww/RP_coke
    Calculated from production volume of reference product using the relative outputs.
  properties: carbon content, non-fossil 0.194039, dry mass 0.346837 kg, mass concentration, TOC 0.1091 kg/m3, mass concentration, calcium 0.039453 kg/m3, mass concentration, chlorine 0.030031 kg/m3, mass concentration, hydrogen 0.013365 kg/m3, mass concentration, nitrogen 0.031015 kg/m3, mass concentration, oxygen 0.069824 kg/m3, mass concentration, sodium 0.06456 kg/m3, mass concentration, sulfur 0.015602 kg/m3, water content 2882.2, wet mass 1000 kg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
  note on carbon content, non-fossil: 0.0673 kg TOC/m3 (Tab A.17, ecoinvent v2.2 report 13_I). TOC was considered as Total Carbon.
- water, decarbonised: 0.0686133 kg; name water; lognormal variance with pedigree 0.0033, pedigree (2,2,3,1,1)
  Literature value.
  properties: wet mass 1 kg

## Inputs from nature
- Oxygen [natural resource, in air]: 0.010463 kg; = co2*8/11
  Oxygen demand for CO2. Added for mass balance.

## Emissions to nature
- Acenaphthene [air, non-urban air or from high stacks]: 9.13e-9 kg; lognormal variance with pedigree 0.3027, pedigree (2,2,3,1,1)
  Literature value.
- Acenaphthylene [air, non-urban air or from high stacks]: 3.84567e-8 kg; lognormal variance with pedigree 0.3027, pedigree (2,2,3,1,1)
  Literature value.
- Ammonia [air, non-urban air or from high stacks]: 2.3074e-6 kg; lognormal variance with pedigree 0.0427, pedigree (2,2,3,1,1)
  Literature value.
- Anthracene [air, non-urban air or from high stacks]: 3.67967e-8 kg; lognormal variance with pedigree 0.0427, pedigree (2,2,3,1,1)
  Literature value.
- Arsenic ion [air, non-urban air or from high stacks]: 1.26132e-9 kg; lognormal variance with pedigree 0.6527, pedigree (2,2,3,1,1)
  Literature value.
- Benz(a)anthracene [air, non-urban air or from high stacks]: 1.494e-8 kg; lognormal variance with pedigree 0.3027, pedigree (2,2,3,1,1)
  Literature value.
- Benzo(a)pyrene [air, non-urban air or from high stacks]: 3.26467e-8 kg; lognormal variance with pedigree 0.3027, pedigree (2,2,3,1,1)
  Literature value.
- Benzo(b)fluoranthene [air, non-urban air or from high stacks]: 1.18967e-8 kg; lognormal variance with pedigree 0.3027, pedigree (2,2,3,1,1)
  Literature value.
- Benzo(ghi)perylene [air, non-urban air or from high stacks]: 1.577e-8 kg; lognormal variance with pedigree 0.3027, pedigree (2,2,3,1,1)
  Literature value.
- Benzo(k)fluoranthene [air, non-urban air or from high stacks]: 5.81e-9 kg; lognormal variance with pedigree 0.3027, pedigree (2,2,3,1,1)
  Literature value.
- Cadmium II [air, non-urban air or from high stacks]: 7.47e-12 kg; lognormal variance with pedigree 0.6527, pedigree (2,2,3,1,1)
  Literature value.
- Carbon dioxide, fossil [air, non-urban air or from high stacks]: 0.0143867 kg; name co2; lognormal variance with pedigree 0.0033, pedigree (2,2,3,1,1)
  Literature value.
- Carbon monoxide, fossil [air, non-urban air or from high stacks]: 1.93667e-5 kg; lognormal variance with pedigree 0.6527, pedigree (2,2,3,1,1)
  Literature value.
- Chromium III [air, non-urban air or from high stacks]: 4.41615e-9 kg; lognormal variance with pedigree 0.6527, pedigree (2,2,3,1,1)
  Literature value.
- Chrysene [air, non-urban air or from high stacks]: 1.05133e-8 kg; lognormal variance with pedigree 0.3027, pedigree (2,2,3,1,1)
  Literature value.
- Cobalt II [air, non-urban air or from high stacks]: 1.04635e-9 kg; lognormal variance with pedigree 0.6527, pedigree (2,2,3,1,1)
  Literature value.
- Copper ion [air, non-urban air or from high stacks]: 4.31628e-9 kg; lognormal variance with pedigree 0.6527, pedigree (2,2,3,1,1)
  Literature value.
- Cyanide [air, non-urban air or from high stacks]: 4.15e-7 kg; lognormal variance with pedigree 0.0427, pedigree (2,2,3,1,1)
  Literature value.
- Dibenz(a,h)anthracene [air, non-urban air or from high stacks]: 3.32e-9 kg; lognormal variance with pedigree 0.3027, pedigree (2,2,3,1,1)
  Literature value.
- Dioxins, measured as 2,3,7,8-tetrachlorodibenzo-p-dioxin [air, non-urban air or from high stacks]: 6.64e-15 kg; lognormal variance with pedigree 0.3027, pedigree (2,2,3,1,1)
  Proxy for Polychlorinated dibenzo-p-dioxinsanddibenzofurans (PCDD/Fs)
- Fluoranthene [air, non-urban air or from high stacks]: 5.42267e-8 kg; lognormal variance with pedigree 0.0427, pedigree (2,2,3,1,1)
  Literature value.
- Fluorene [air, non-urban air or from high stacks]: 2.37933e-8 kg; lognormal variance with pedigree 0.3027, pedigree (2,2,3,1,1)
  Literature value.
- Hexachlorobenzene [air, non-urban air or from high stacks]: 1.162e-14 kg; lognormal variance with pedigree 0.3027, pedigree (2,2,3,1,1)
  Literature value.
- Hydrogen sulfide [air, non-urban air or from high stacks]: 2.21333e-6 kg; lognormal variance with pedigree 0.0427, pedigree (2,2,3,1,1)
  Literature value.
- Indeno(1,2,3-cd)pyrene [air, non-urban air or from high stacks]: 1.577e-8 kg; lognormal variance with pedigree 0.3027, pedigree (2,2,3,1,1)
  Literature value.
- Iron ion [air, non-urban air or from high stacks]: 1.10667e-11 kg; lognormal variance with pedigree 0.6527, pedigree (2,2,3,1,1)
  Literature value.
- Lead II [air, non-urban air or from high stacks]: 1.62099e-9 kg; lognormal variance with pedigree 0.6527, pedigree (2,2,3,1,1)
  Literature value.
- Methane, fossil [air, non-urban air or from high stacks]: 6.36333e-6 kg; lognormal variance with pedigree 0.0427, pedigree (2,2,3,1,1)
  Literature value.
- Naphthalene [air, non-urban air or from high stacks]: 1.78727e-7 kg; lognormal variance with pedigree 0.3027, pedigree (2,2,3,1,1)
  Literature value.
- Nickel II [air, non-urban air or from high stacks]: 3.18167e-10 kg; lognormal variance with pedigree 0.6527, pedigree (2,2,3,1,1)
  Literature value.
- Nitrogen oxides [air, non-urban air or from high stacks]: 1.10667e-5 kg; lognormal variance with pedigree 0.0427, pedigree (2,2,3,1,1)
  Literature value.
- Particulate Matter, < 2.5 um [air, non-urban air or from high stacks]: 5.90022e-6 kg; = 6.7E-04 *0.31830; lognormal variance with pedigree 0.3027, pedigree (2,2,3,1,1)
  Calculated value. PM ratio from global dataset, given PM 6.7E-04 in literature.
- Particulate Matter, > 10 um [air, non-urban air or from high stacks]: 9.93714e-6 kg; = 6.7E-04 *0.53608; lognormal variance with pedigree 0.0427, pedigree (2,2,3,1,1)
  Calculated value. PM ratio from global dataset, given PM 6.7E-04 in literature.
- Particulate Matter, > 2.5 um and < 10um [air, non-urban air or from high stacks]: 2.69931e-6 kg; = 6.7E-04 *0.14562; lognormal variance with pedigree 0.1227, pedigree (2,2,3,1,1)
  Calculated value. PM ratio from global dataset, given PM 6.7E-04 in literature.
- Pentachlorobenzene [air, non-urban air or from high stacks]: 1.05133e-14 kg; lognormal variance with pedigree 0.3027, pedigree (2,2,3,1,1)
  Literature value.
- Phenanthrene [air, non-urban air or from high stacks]: 1.5687e-7 kg; lognormal variance with pedigree 0.0427, pedigree (2,2,3,1,1)
  Literature value.
- Phenol [air, non-urban air or from high stacks]: 3.32e-6 kg; lognormal variance with pedigree 0.3027, pedigree (2,2,3,1,1)
  Literature value.
- Polychlorinated biphenyls [air, non-urban air or from high stacks]: 4.03933e-14 kg; lognormal variance with pedigree 0.3027, pedigree (2,2,3,1,1)
  Literature value.
- Pyrene [air, non-urban air or from high stacks]: 3.32e-8 kg; lognormal variance with pedigree 0.3027, pedigree (2,2,3,1,1)
  Literature value.
- Sulfur dioxide [air, non-urban air or from high stacks]: 3.12633e-5 kg; lognormal variance with pedigree 0.0033, pedigree (2,2,3,1,1)
  Literature value.
- Vanadium V [air, non-urban air or from high stacks]: 8.57667e-11 kg; lognormal variance with pedigree 0.6527, pedigree (2,2,3,1,1)
  Literature value.
- Zinc II [air, non-urban air or from high stacks]: 3.35846e-9 kg; lognormal variance with pedigree 0.6527, pedigree (2,2,3,1,1)
  Literature value.
- Ammonium [water, surface water]: 4.21363e-7 kg; lognormal variance with pedigree 0.0427, pedigree (2,2,3,1,1)
  Used instead of ammonia as in the literature source
- BOD5, Biological Oxygen Demand [water, surface water]: 2.07708e-6 kg; = COD*0.5; lognormal variance with pedigree 0.0427, pedigree (2,2,3,1,1)
  Calculated value based on estimation.
- Benzo(a)pyrene [water, surface water]: 5.00767e-14 kg; lognormal variance with pedigree 0.3027, pedigree (2,2,3,1,1)
  Literature value.
- COD, Chemical Oxygen Demand [water, surface water]: 4.15415e-6 kg; name COD; lognormal variance with pedigree 0.0427, pedigree (2,2,3,1,1)
  Literature value.
- Cyanide [water, surface water]: 1.411e-8 kg; lognormal variance with pedigree 0.3027, pedigree (2,2,3,1,1)
  Literature value.
- DOC, Dissolved Organic Carbon [water, surface water]: 4.15415e-6 kg; = COD; lognormal variance with pedigree 0.0427, pedigree (2,2,3,1,1)
  Calculated value based on estimation.
- Hydrogen sulfide [water, surface water]: 4.70333e-9 kg; lognormal variance with pedigree 0.0427, pedigree (2,2,3,1,1)
  Literature value.
- Oils, unspecified [water, surface water]: 1.59637e-7 kg; lognormal variance with pedigree 0.3027, pedigree (2,2,3,1,1)
  Literature value.
- Phenol [water, surface water]: 9.40667e-9 kg; lognormal variance with pedigree 0.3027, pedigree (2,2,3,1,1)
  Literature value.
- Suspended solids, unspecified [water, surface water]: 2.70027e-7 kg; lognormal variance with pedigree 0.0427, pedigree (2,2,3,1,1)
  Literature value.
- TOC, Total Organic Carbon [water, surface water]: 1.53857e-6 kg; name TOC; = COD/2.7; lognormal variance with pedigree 0.0427, pedigree (2,2,3,1,1)
  Calculated value based on estimation.

## Sampling procedure
Bases on a study that compiles LCI data pertaining to most of the life cycle stages of "byproduct" coke production through site-specific interviews and measurements. Nevertheless, for upstream processes like raw material extraction, production, transportation, and certain processes lacking emission data, it relies on background information from commercial inventory databases, expert estimations, and published literature. The majority of the data concerning coke production is sourced from medium-sized coke production enterprises located in Shanxi Province and Jiangsu Province, China, with annual production capacities ranging from 0.7 to 1 million tons of metallurgical coke.
The study's system boundaries encompass several stages, including raw material acquisition, on-site coal preparation, thermal distillation, coke handling and storage, and by-product recovery. Air pollutants generated during charging, pushing, quenching, coke screening, and combustion are collected using air pollution control devices (APCDs).
The authors primarily focus on-site air emissions and water pollutants, as all solid wastes generated during production are collected and reintegrated with coals. Emissions of conventional air pollutants such as PM, SO2, and NO2 are calculated based on on-site environmental monitoring data. CO2, CH4, and CO emissions are derived from the Ecoinvent Database v2.2.

## Extrapolations
This dataset is built based on the results of the study by Liu and Yuan (2016). For more information, please see the published source.
