# refrigerant R134a production

Dataset: EcoSpold 2, unit process
Geography: RoW
Time period: 1999-01-01 to 2023-12-31
Technology level: current
Classification: ISIC rev.4 ecoinvent: 2011:Manufacture of basic chemicals
Synonyms: 811-97-2; Norflurane; 1,1,1,2-TETRAFLUOROETHANE; Ethane 1,1,1,2-tetrafluoro-; 1,2,2,2-Tetrafluoroethane; HFC-134a
Scenario: Business-as-Usual
System model: Allocation, cut-off by classification
Generated by: Thomas Heck
Published in: Heck, T. 2007
Database: ecoinvent
isCopyrightProtected: true
accessRestrictedTo: 1

## General comment
This dataset represents the production of 1 kg of tetrafluoroethane (R-134a). Tetrafluoroethane is a gaseous fluorocarbon with a faint ether-like odour. It is used primarily as a refrigerant for “high-temperature” refrigeration, such as domestic refrigerators and automobile air conditioners. Tetrafluoroethane is also used in heat pumps, both in pure form and in widespread refrigerant mixtures (WPZ). Other potential uses include application in plastic foam blowing, as a solvent for special cleaning applications, as an aerosol propellant for medical inhalers, and as a fire extinguishant in place of halons.
This dataset is based on data given in Frischknecht (1999). It is assumed that the tetrafluoroethane is produced 50% by hydrofluorination of trichloroethylene and 50% by hydrofluorination of tetrachloroethylene.
References:
R. Frischknecht (1999) Umweltrelevanz natürlicher Kältemittel; Ökobilanzen von Wärmepumpen und Kälteanlagen, Bundesamt für Energie, Bern. http://www.waermepumpe.ch/.
Wärmepumpen-Testzentrum (WPZ) Winterthur-Töss. Testliste. Stand April 2003. http://www.wpz.ch/

## Included activities start
From reception of trichloroethylene and tetrachloroethylene at the factory gate.

## Included activities end
This activity ends with the production of refrigerant R134a. Emissions during production process are included. This dataset doesn´t include an output of hydrochloric acid, however 1.07 respectively 2,2 kg of hydrochloric acid are produced both with the trichloroethylene and with the tetrachloroethylene process.

## Geography
The data are based on estimations and do not have a specific geographical origin. They are assumed to be representative of this geography.

## Technology
Several processes exist to produce tetrafluoroethane commercially. The most common are hydrofluorination of trichloroethylene or tetrachloroethylene (=perchlorethylene) and isomerisation/hydroluorination of 1,1,2-trichlor-1,2,2-trifluorethane.

## Reference product
- refrigerant R134a: 1 kg; name RP; By-product classification allocatable product; CPC 34110: Hydrocarbons and their halogenated, sulphonated, nitrated or nitrosated derivatives; HS2017 290339: Fluorinated, brominated or iodinated derivatives of acyclic hydrocarbons; other than ethylene dibromide (IS[...]; CAS 811-97-2
  The refrigerant R134a (1,1,1,2-tetrafluoroethane , CH2FCF3) is a chlorine-free refrigerant and is used as working substance in heat pumps both in pure form and as refrigerant mix. R134a has a GWP (100) of 1300 years.
  production volume 2.55e8 kg; name RP_PV
    Double of the amount reported by AFEAS, since they estimate that their reported values is approximately half of the global production (Source: AFEAS (2007): Production and sales of fluorocarbons <http://www.afeas.org>)
  property heating value, net 9.51 MJ
    LHV is calculated based on the elemental composition of the substance. Based on the CAS number of the substance (000811-97-2), which is found manually, the chemical formula of the substance is found to be: C2H2F4, (PubChem 2020).
    Reference: Kim, S., Chen, J., Cheng, T., Gindulyte, A., He, J., He, S., Li, Q., Shoemaker, B. A., Thiessen, P. A., Yu, B., Zaslavsky, L., Zhang, J., & Bolton, E. E. (2019). PubChem 2019 update: improved access to chemical data. Nucleic acids research, 47(D1), D1102–D1109. https://doi.org/10.1093/nar/gky1033
  properties: carbon allocation 0.235294 kg, carbon content 0.235294, carbon content, fossil 0.235294, carbon content, non-fossil 0, dry mass 1 kg, price 5 EUR2005, water content 0, water in wet mass 0 kg, wet mass 1 kg

## Inputs from technosphere
All rows: source Frischknecht R. 1999
- chlorine, liquid: 0.385 kg; lognormal variance with pedigree 0.042, pedigree (1,1,5,5,1)
  Estimation. For the production of 0,5 kg of R134a using the tetrachloroethylene process.
  properties: dry mass 1 kg, wet mass 1 kg
- electricity, medium voltage: 0.0342298, 0.682808, 0.229421, 0.0104823, 0.00209803, 0.000450494, 0.0705105 kWh (7 suppliers, which the file names only by identifier); sum of these 1.03 kWh; lognormal variance with pedigree 0.0526, pedigree (1,3,5,5,1)
  Estimation. For the production of 0,5 kg of R134a using the trichloroethylene process 0,75 kWh of electricity is used; for the production of 0,5 kg R134a using the tetrachloroethylene process 0,265 kWh of electricity is used.
- heat, district or industrial, natural gas: 0.368605, 22.4314 MJ (2 suppliers, which the file names only by identifier); sum of these 22.8 MJ; lognormal variance with pedigree 0.0526, pedigree (1,3,5,5,1)
  Estimation. For the production of 0,5 kg of R134a using the trichloroethylene process 19 MJ of thermal energy is used; for the production of 0,5 kg R134a using the tetrachloroethylene process 2,4 MJ steam and 1,9 MJ natural gas are used.
  properties: heating value, net 1 MJ
- hydrogen fluoride: 0.845 kg; lognormal variance with pedigree 0.042, pedigree (1,1,5,5,1)
  Estimation. For the production of 0,5 kg of R134a using the trichloroethylene process 0,415 kg hydrogen fluoride is used; for the production of 0,5 kg R134a using the tetrachloroethylene process 0,43 kg hydrogen fluoride is used.
  properties: dry mass 1 kg, heating value, net 6.06 MJ, wet mass 1 kg
- hydrogen, gaseous, medium pressure, merchant: 0.0122857, 0.00771429 kg (2 suppliers, which the file names only by identifier); sum of these 0.02 kg; lognormal variance with pedigree 0.042, pedigree (1,1,5,5,1)
  Estimation. For the production of 0,5 kg of R134a using the tetrachloroethylene process.
  properties: dry mass 1 kg, heating value, net 120.21 MJ, wet mass 1 kg
- tetrachloroethylene: 0.9 kg; lognormal variance with pedigree 0.042, pedigree (1,1,5,5,1)
  Estimation. For the production of 0,5 kg of R134a using the tetrachloroethylene process.
  properties: carbon content, fossil 0.146341, dry mass 1 kg, heating value, net 4.39 MJ, wet mass 1 kg
- trichloroethylene: 0.68 kg; lognormal variance with pedigree 0.042, pedigree (1,1,5,5,1)
  Estimation. For the production of 0,5 kg of R134a using the trichloroethylene process.
  properties: carbon content, fossil 0.184615, dry mass 1 kg, heating value, net 6.46 MJ, wet mass 1 kg

## Emissions to nature
- 1,1,1,2-Tetrafluoroethane [air, unspecified]: 0.0019 kg; lognormal variance with pedigree 0.33, pedigree (5,5,5,5,5)
  Estimation based on expert judgement. A loss of about 0.19 wt% of R134 is assumed.
- 1,1,2-Trichloro-1,2,2-trifluoroethane [air, unspecified]: 0.001 kg; lognormal variance with pedigree 0.33, pedigree (5,5,5,5,5)
  Estimation based on expert judgement. During manufacturing, the intermediate products HCFC-124 (trichloroethylene process) and CFC-113 (tetrachloroethylene process) are produced. HCFC-124 and CFC-113 belong to the group of chlorinated hydrocarbon fluids and have damaging effects on the climate and depleting effects on the ozone layer. The estimated emissions amount to 0.002 kg CFC-113 per kg R134a produced using the tetrachloroethylene route.
- 2-Chloro-1,1,1,2-tetrafluoroethane [air, unspecified]: 0.001 kg; lognormal variance with pedigree 0.33, pedigree (5,5,5,5,5)
  Estimation based on expert judgement. During manufacturing, the intermediate products HCFC-124 (trichloroethylene process) and CFC-113 (tetrachloroethylene process) are produced. HCFC-124 and CFC-113 belong to the group of chlorinated hydrocarbon fluids and have damaging effects on the climate and depleting effects on the ozone layer. The estimated emissions amount to 0.002 kg HCFC-124 per kg R134a produced using the trichloroethylene route.

## Sampling procedure
Based on literature and estimations.

## Extrapolations
This dataset has been copied from an original dataset covering the geography RER. The uncertainty has been adjusted accordingly.

## Review by Emilia Moreno Ruiz 2017-09-01
This dataset was additionally reviewed in a separate review process by Eric Johnson of Atlantic Consulting as well as Emilia Moreno Ruiz and Gregor Wernet of ecoinvent.
