# sand quarry operation, extraction from river bed

Dataset: EcoSpold 2, unit process
Geography: BR
Time period: 2015-01-01 to 2023-12-31
Technology level: current
Classification: ISIC rev.4 ecoinvent: 0810:Quarrying of stone, sand and clay
Synonyms: natural sand; river bed sand; aggregate; sand
Scenario: Business-as-Usual
System model: Allocation, cut-off by classification
Share of production covered: 0.14 %
Generated by: [Current User]
Published in: Silva, F. B. 2017
Database: ecoinvent
isCopyrightProtected: true
accessRestrictedTo: 1

## General comment
This dataset describes mining of natural sand from riverbed deposits and its processing. Mining of sand from riverbed deposits represents 70% of Brazilian production of sand for construction (MME, 2009), being the other 30% extracted from open pits. Pumps dredge the slurry, which consists of sand, water, clay, silt, and gravel, from the river bed. The sand is separated from the slurry and transported by a vessel to the loading ports, where the sand is washed to clean fines and transported to the storage piles and loaded in trucks for delivery (does not the delivery itself). The sand’s coproducts (clay, silt, and gravel) return to the river during the process not being recovered for economic purposes, furthermore they don’t receive any allocation. Sand is not sorted by grain size in this dataset.
The dataset includes the sand extraction and processing, as well as equipment maintenance. Machinery is taken into account within the dataset "diesel, burned in building machine", as all machinery runs on diesel. Administration buildings and the quarry’s end of life are not taken into account. Data were collected from literature and some additional data were measured in one quarry located in the state of Rio Grande do Sul, Brazil, with current technology.
The representativeness of the dataset on a national scale is low ( >1%).

## Included activities start
From the extraction of sand from the river bed by dredging.

## Included activities end
The activities end with the sand in storage piles at the loading port. Includes the dredging of the slurry (a mix of sand, water, clay, silt, and gravel). The sand is separated from the slurry and transported by a vessel to the loading ports, where the sand is washed to clean fines and transported to the storage piles and loaded in trucks for delivery (does not include the delivery itself). The dataset also includes the land use for sand processing (at river bank). Machinery is considered within the dataset "diesel burned in building machine". Occupation of the river is not considered since mining occurs in a barge. Recultivation of closed mines is not taken into account due to lack of data. Administration buildings not included. No dust included because it is a wet process. Sand sorting by grain size is not included.

## Geography
This dataset represents production of sand representative for Brazil. Data were collected from Brazilian literature; some data come from primary data collection in Brazil.
Some values were taken from the dataset sand quarry operation, extraction from open pit mine/BR (accessed 20170828)

## Technology
Typical technology for sand dredging in Brazil.
The technology involves two steps: extraction and processing. Sand is the only product from this process, even though gravel can be extracted, it is not recovered. Suction Hopper Dredger (autonomous vessels that perform all stages of sand mining, i.e., extraction, loading, transport, and unloading) is considered. Extraction and loading stages are executed by centrifugal pumps powered by diesel engines. The pumps dredge the sand from the riverbed, along with water, clay, silt, and gravel, are extracted, forming the slurry. This fluid is pumped through the pipeline up to the vessel top where it is poured into steel sieves. Coarse materials (gravel, leaves, and sticks) are retained by the sieves and are returned to the river. The rest of the slurry (sand, water, and mud) falls into big chambers inside the vessel. Sand decants faster from the slurry, due its density and size, and deposits at the chamber’s bottom. Most of the water overflows from the vessel to the river, carrying a great amount of the mud (silt and clay). Auxiliary suction pumps drain water surplus of the sand to lower the cargo weight.
After completing the extraction and loading stages, the same vessel transports the dredged sand until loading ports. The pulp is then pumped to the loading port by pipelines to semi-closed chambers at the loading port. Sand deposits at the bottom of the port’s chambers, water returns to the river carrying part of the fines. Some companies may sort the sand by grain size in this stage. In the end, Sand is washed to clean the fines and is transported by heavy equipment to storage piles.
Dredged sand from alluvial deposits can generate several local environmental issues. Problems related with changes in the natural sedimentation process, erosion of margins, changes in the stream bed conditions, changes in the suspended sediments of river water and even problems related with local and regional sand availability. “Continued and indiscriminate sand mining not only changes the physical characteristics of the river basin environments, but also disturbs its closely linked flora, fauna, and human life” (PADMALAL; MAYA, 2014)
None of these problems were assessed in this dataset due the lack of data, but they should be taken in consideration.
For further information, please refer to Padmalal, D. & Maya, K., 2014. Sand Mining, Dordrecht: Springer Netherlands. Available at: http://link.springer.com/10.1007/978-94-017-9144-1.
Image source: Bernardo Jardim Ribeiro https://goo.gl/EcJiNy

## Time period
The time period is set to the year 2015 as the data were collected in the year 2015

## Parameters
- diesel consumption for port operations: 0.000566 l; name diesel_port; lognormal variance with pedigree 0.0032, pedigree (2,4,1,1,1)
  Measured value, nonverified measurement from one company. Diesel used for port operations with excavators, liter per kg of produced sand.
  Uncertainty: Default basic uncertainty
- diesel consumption for pump operation: 0.00025 l; name diesel_pump; lognormal variance with pedigree 0.0106, pedigree (3,5,1,1,1)
  Calculated Value for diesel used in the mining process with pumps for dredging. Theoretical data for pump’s flows and consumptions obtained from one pump industry in Brazil. Flows rates can vary from 700 up to 2100 m3/h (head height of 10 m). Diesel consumption for the pumps is in average 16,7 liter/h. (Itubombas, Comercial especification for the pumps http://itubombas.com.br/arquivos/especificacoes-tecnicas.pdf)
  Uncertainty: Default basic uncertainty
- diesel consumption for transport operation: 0.000572262 l; name diesel_transport; = 8,74E-06/diesel_density*55; lognormal variance with pedigree 0.128, pedigree (1,5,1,1,1)
  Calculated value, liters of diesel used in the internal transport within the industrial process. Sand is mined with “Suction Hopper dredgers”, that is, barges that transport the sand from the river to the port, diesel consumption was estimated from ecoinvent process "transport, freight, inland waterways, barge tanker”. The transport considers 1kg for 55km of distance (measured distance mine-port of one industry).
  Uncertainty: Default basic uncertainty

## Reference product
- sand: 1 kg; By-product classification allocatable product; CPC 15310: Natural sands; HS2017 250590: Sands; natural, (other than silica and quartz sands), whether or not coloured, (other than metal-bearing sa[...]
  Sand used as aggregate for construction, usually applied in concrete production, mortar production, pavement layers, among others. According to the Brazilian standard ABNT NBR 7211, fine aggregates (which include sand) have a particle size of less than 4,75mm. Sand is not sorted by grain size in this dataset.
  production volume 1.862e11 kg; name sand_PV
    Estimated value. Annual production of sand for civil construction in Brazil for 2014, according to the Brazilian Department of Mineral Extraction - DNPM (2015). The share of sand extracted from alluvial deposits roughly is estimated in 70% of the national production (MME, 2009). To adjust production volume for the year of 2016, cement production data from the National Union of the Cement Industry in Brazil (SNIC) for 2014 and 2016 were used, assuming that there is a direct correlation between cement and sand production.
    For more information, please refer to Quaresma, L. Technical report 31: Sand for civil construction (Relatório Técnico 31: Perfil de areia para construção civil). 2009, page 4, goo.gl/hJ3aDb
  property price 0.00651133 EUR2005
    Price, average unit value, dollars per metric ton in 2022 of construction sand and gravel of 11 USD/metric ton. Same price for the products "sand" and "gravel, round", since they are quarried together. The price is the annual average free-on-board
    plant prices, usually at the first point of sale or captive use, as reported by construction-sand-and-gravel-producing companies. This value does not include transportation from the plant or yard to the consumer. it does, however, include all costs of mining, processing, in-plant transportation, overhead, and profit. Value retrieved from USGS, Mineral Commodity Summaries 2023, accessed on 20230918: https://pubs.usgs.gov/periodicals/mcs2023/mcs2023-sand-gravel.pdf from https://www.usgs.gov/centers/national-minerals-information-center/construction-sand-and-gravel-statistics-and
    The price was converted to EUR based on the annual exchange rates published by the European Central Bank (https://sdw.ecb.europa.eu/quickview.do?SERIES_KEY=120.EXR.A.USD.EUR.SP00.A, last accessed on 2023-06-01) and adjusted for inflation relative to 2005 using the producer price index (PPI) of the euro area, published by eurostat (https://ec.europa.eu/eurostat/databrowser/view/STS_INPP_A__custom_6416181/default/table?lang=en, last accessed on 2023-06-01).
  property water in wet mass 0.05 kg; name water_sand
  properties: carbon allocation 0 kg, carbon content 0, carbon content, fossil 0, carbon content, non-fossil 0, dry mass 0.95 kg, water content 0.0526316, wet mass 1 kg

## Inputs from technosphere
- building, hall: 1.13e-7 m2; lognormal variance with pedigree 0.32, pedigree (3,4,4,1,3)
  Approximation,administrative infrastructure is considered to be equal to the dataset sand quarry operation, extraction from open pit mine/BR (accessed 20170828).
  Uncertainty: Default basic uncertainty.
- diesel, burned in building machine: 0.0499108 MJ; = (diesel_pump+diesel_transport+diesel_port)*net_cal_value*35.952; source Duarte, J. 2017; lognormal variance with pedigree 0.0186, pedigree (3,5,4,1,1)
  Calculated Value, see parameters, based on annual production of river sand from Rio Grande do Sul state. “diesel, burned in building machine” is a proxy for Diesel consumption with pumps for dredging, internal transport from the river mine area to the port, and port processing operations.
  Uncertainty: Default basic uncertainty
  property density 0.84 kg/l; name diesel_density
  property heating value, net 1 MJ; name net_cal_value
  note on heating value, net: Literature value, net heating value, Table 5.1 (Weidema et al., 2013) per liter of diesel (MJ / liter)
- electricity, medium voltage: 0.00013 kWh; lognormal variance with pedigree 0.0112, pedigree (2,4,4,1,1)
  Measured Value, electricity for administrative purposes, based on nonverified measurements of one industry.
  Uncertainty: Default basic uncertainty
- scrap steel: -1.8e-5 kg; = steel; lognormal variance with pedigree 0.0186, pedigree (4,4,1,1,3)
  Estimation. Same amount as the input.
  Uncertainty: Default basic uncertainty
  production volume; = sand_PV * steel
    Calculated value from production volume of reference product using the relative outputs.
  properties: carbon content, fossil 0.005, dry mass 1 kg, wet mass 1 kg
- steel, low-alloyed, hot rolled: 1.8e-5 kg; name steel; lognormal variance with pedigree 0.0266, pedigree (4,4,4,1,3)
  Approximation, maintenance of equipment is considered to be equal to the dataset sand quarry operation, extraction from open pit mine/BR (accessed 20170828).
  Uncertainty: Default basic uncertainty
  property carbon content, fossil 0.005; name cc_steel
  properties: dry mass 1 kg, wet mass 1 kg
  note on carbon content, fossil: Low alloyed steel composition given in Tab. 3.2 ecoinvent v2.2 report 10_partII. Steel assumed to have a C content of 0.5%
- synthetic rubber: 3.44e-6 kg; name rubber; lognormal variance with pedigree 0.0266, pedigree (4,4,4,1,3)
  (same comment as for steel, low-alloyed, hot rolled)
  property carbon content, fossil 0.871949; name cc_rubber
  properties: dry mass 1 kg, heating value, net 26.42 MJ, wet mass 1 kg
  note on carbon content, fossil: EPDM (Ethylene-propene-diene terpolymer) rubber is a terpolymer of ethylene, propene, and a diene with the residual unsaturated portion of the diene in the side chain (ecoinvent v2.2 report 7-part XX & Ullmann). Chemical formula (deduced from Evidences of Solvent-Induced Miscibility in Polychloroprene-co-Ethylene-Propene Diene Terpolymer Blends, Dubey et al., Journal of Applied Polymer Science, 2009, 111:1884–1891): C20H35
- waste rubber, unspecified: -3.44e-6 kg; = rubber; lognormal variance with pedigree 0.0186, pedigree (4,4,1,1,3)
  Estimation. Same amount as the input.
  Uncertainty: Default basic uncertainty
  production volume; = sand_PV * rubber
    Calculated value from production volume of reference product using the relative outputs.
  properties: carbon content, fossil 0.871949, dry mass 1 kg, heating value, net 27.19 MJ, wet mass 1 kg
  note on heating value, net: Value taken from the general comment of the treatment dataset.

## Inputs from nature
- Occupation, mineral extraction site [natural resource, land]: 0.015476 m2*year; = land*100; lognormal variance with pedigree 0.0506, pedigree (2,4,4,1,1)
  Measured Value, occupation x service life estimation (100y) of the loading port. No occupation of the river considered since mining occurs in a barge.
  Uncertainty: Default basic uncertainty
- Sand, unspecified [natural resource, in ground]: 0.95 kg; = sand*.95; source Calliari, L. 2000, p. 26; lognormal variance with pedigree 0.0186, pedigree (3,5,4,1,1)
  Estimated value. No losses considered in the process. For 1 kg of wet sand for construction with 5% of humidity, 0.95 kg of sand comes from the environment.
  Uncertainty: Default basic uncertainty
- Transformation, from forest, unspecified [natural resource, land]: 7.738e-5 m2; = land*0.5; lognormal variance with pedigree 0.1306, pedigree (2,4,4,1,1)
  Measured Value, loading ports installation occur on the margin of rivers with special permissions. According to local environmental law, constructions on the riverside should protect at least 30 m of distance for riparian forest recovery. (Brazilian Law Nº 12.651, from 2012), in this case, the transformation, from the forest, considered as 50% of the original area. Transformation of the river is not considered.
  Uncertainty: Default basic uncertainty
- Transformation, from wetland, inland (non-use) [natural resource, land]: 7.738e-5 m2; = land*0.5; lognormal variance with pedigree 0.1306, pedigree (2,4,4,1,1)
  Measured Value, loading ports installation occur on the margin of rivers with special permissions. According to local environmental law, constructions on the riverside should protect at least 30 m of distance for riparian forest recovery. (Brazilian Law Nº 12.651, from 2012), in this case, the transformation, from the wetland, considered as 50% of the original area. Transformation of the river is not considered.
  Uncertainty: Default basic uncertainty
- Transformation, to mineral extraction site [natural resource, land]: 0.00015476 m2; name land; lognormal variance with pedigree 0.1306, pedigree (2,4,4,1,1)
  Measured Value, occupation and production estimate of one company with 5 different loading ports, based on aerial images. The total area of the ports is 2.69E+5 m2, while the production of sand is1.03E+09 kg.
  Transformation of the river is not considered.
- Water, river [natural resource, in water]: 0.0002 m3; name water_pulp; lognormal variance with pedigree 0.0112, pedigree (2,4,4,1,1)
  Estimation. Water in the sand before evaporation.
  Uncertainty: Default basic uncertainty
- Water, well, in ground [natural resource, in water]: 0.008 m3; name sand_wash; lognormal variance with pedigree 0.0112, pedigree (2,4,4,1,1)
  Measured Value, water used to wash the sand in the port. Value based on nonverified measurement of one industry. A system with recirculation uses 80 liters of water per ton of sand. The system recovers 90% of the water, only 8 L are spent.
  Uncertainty: Default basic uncertainty
  property carbon content, fossil 0; name CC_water
  property dry mass 0.1101 kg; name DM_water
  property water content 9081.65; name WC_water
  property water in wet mass 999.89 kg; name WWM_water
  property wet mass 1000 kg; name WM_water

## Emissions to nature
- Water [air, unspecified]: 0.00015 m3; = water_pulp-(water_sand/1000); lognormal variance with pedigree 0.0112, pedigree (2,4,4,1,1)
  Estimation. Water that evaporates in the process.
  Uncertainty: Default basic uncertainty
- Water [water, unspecified]: 0.008 m3; = sand_wash; lognormal variance with pedigree 0.0112, pedigree (2,4,4,1,1)
  Measured Value, water used to wash the sand in the port. Value based on nonverified measurement of one industry. A system with recirculation uses 80 liters of water per ton of sand. The system recovers 90% of the water, only 8 L are spent. The water discharged in the river is considered not polluted.
  Uncertainty: Default basic uncertainty

## Sampling procedure
Data collection is mainly based on literature review. Estimate of diesel consumption was based on the annual production of sand from river bed deposits in the state of Rio Grande do Sul and on fuel consumption data gathered from dredge specifications. Complementary primary data were collected from one company's loading port, located in the state of Rio Grande do Sul (Brazil), thus with limited representativeness on a national scale. Data regarding building infrastructure and maintenance of rubber and steel parts were approximated from data for sand extraction from open pits in Brazil. Uncertainty was estimated using default basic uncertainty values, and additional uncertainty was estimated using Pedigree scores.

## Extrapolations
Data from a specific state (Rio Grande do Sul) and a small sample (one quarry) is extrapolated to represent the production in the whole country (Brazil). The representativeness of the dataset on a national scale is low (<1%). Pedigree scores for completeness have been adjusted accordingly.
