# paclobutrazol production

Dataset: EcoSpold 2, unit process
Geography: GLO
Time period: 2020-01-01 to 2023-12-31
Technology level: current
Classification: ISIC rev.4 ecoinvent: 2011:Manufacture of basic chemicals
Synonyms: PBZ
Scenario: Business-as-Usual
System model: Allocation, cut-off by classification
Generated by: Daria Dellenbach
Database: ecoinvent
isCopyrightProtected: true
accessRestrictedTo: 1

## General comment
This dataset represents the production of 1 kg of paclobutrazol. Emissions are estimated. Energy consumptions, infrastructure and transports are calculated with standard values. A yield of 95% per chemical step was assumed.
Paclobutrazol is an organic substance with the CAS no.: 076738-62-0. It is called '(2RS,3RS)-1-(4-Chlorophenyl)-4,4-dimethyl-2-(1H-1,2,4-triazol-1-yl)-3-pentanol' under IUPAC naming and its molecular formula is: C15H20ClN3O. It is solid under normal conditions of temperature and pressure as a white, crystalline solid. It is modelled as a pure substance. Paclobutrazol is used as a growth retardant for ornamentals, amenity trees, apple and pear orchards and for the reduction of lodging in grass seed. As additional benefits, it improves the resistance to drought stress, supports the production of darker green leaves, increases resistance against fungi and bacteria and enhanced development of roots. Paclobutrazole is degraded very slowly and thus effective in soil for several years.
Reference(s):
Unger T., (1996). Pesticide Synthesis Handbook, Noyes Publication.
Sauter H., Zeeh B., (2009): Plant Growth Regulators, in Ullmanns Encyclopedia of Industrial Chemistry, Weinheim, Wiley-VCH.
Chemiepark GENDORF, Umwelterklärung 2016, https://www.gendorf.de/Nachbarn/Umweltschutz/Industrie%20und%20Nachhaltigkeit
Chemiepark GENDORF, Umwelterklärung 2017, https://www.gendorf.de/Nachbarn/Umweltschutz/Industrie%20und%20Nachhaltigkeit
Chemiepark GENDORF, Umwelterklärung 2020, https://www.gendorf.de/Nachbarn/Umweltschutz/Industrie%20und%20Nachhaltigkeit
Fletcher R. A., Gilley A., Sankhla N., Davis T. D., (2010). Triazoles as Plant Growth Regulators and Stress Protectants. Horticultural Reviews. John Wiley & Sons, Ltd: 55–138. doi:10.1002/9780470650776.ch3.
Rademacher W., (2000). Growth Retardants: Effects on Gibberellin Biosynthesis and Other Metabolic Pathways. Annual Review of Plant Physiology and Plant Molecular Biology. 51 (1): 501–531. doi:10.1146/annurev.arplant.51.1.501.
Hischier, R. (2005) Establishing Life Cycle Inventories of Chemicals Based on Differing Data Availability (9 pp). The International Journal of Life Cycle Assessment, Volume 10, Issue 1, pp 59–67. 10.1065/lca2004.10.181.7

## Included activities start
Cradle to gate. The activity starts when the raw materials enter the process.

## Included activities end
Production of paclobutrazol production including materials, energy uses, infrastructure and emissions.

## Technology
Paclobutrazole is a plant growth retardant produced in five steps from 1,2,4-triazole (from carbon monoxide and ammonia), bromo pinacolone and p-chloro benzyl chloride:
CO + NH3--> CH3NO
2 CH3NO + H4N2--> C2H3N3 + 2 H2O
C2H3N3 + C6H11OBr --> C8H13ON3 + HBr
C8H13ON3 + C7H6Cl2 --> C15H18ClON3 + HCl
C15H18ClON3 + NaBH4 + H2O --> C15H20ClON3 + NaOH + BH3
Bromo pinacolone (C6H11OBr) is produced from acetone:
2C3H6O + H2 --> C6H14O2
C6H14O2 --> C6H12O + H2O
C6H12O + C16H36BrN --> C6H11OBr + C16H37N
p-Chloro benzyl chloride is produced from toluene:
C7H8 + 2FeCl3 --> C7H7Cl + 2FeCl2 + HCl
C7H7Cl + Cl2 --> C7H6Cl2 + HCl
Sodium hydroxide is added to neutralize the formed hydrochloric acid.
Reference(s):
Unger T., (1996). Pesticide Synthesis Handbook, Noyes Publication.
Sauter H., Zeeh B., (2009): Plant Growth Regulators, in Ullmanns Encyclopedia of Industrial Chemistry, Weinheim, Wiley-VCH.
Fletcher R. A., Gilley A., Sankhla N., Davis T. D., (2010). Triazoles as Plant Growth Regulators and Stress Protectants. Horticultural Reviews. John Wiley & Sons, Ltd: 55–138. doi:10.1002/9780470650776.ch3.
Rademacher W., (2000). Growth Retardants: Effects on Gibberellin Biosynthesis and Other Metabolic Pathways. Annual Review of Plant Physiology and Plant Molecular Biology. 51 (1): 501–531. doi:10.1146/annurev.arplant.51.1.501.

## Reference product
- paclobutrazol: 1 kg; name RP; By-product classification allocatable product; CPC 34619: Other nitrogenous fertilizers and mixtures, n.e.c.; HS2017 310229: Fertilizers, mineral or chemical; nitrogenous, other than ammonium sulphate; CAS 76738-62-0
  production volume 32002.6 kg; name PV_RP; = (6250+12.9)/(0.0357+0.1600)
    Calculated value. The global production volume is extrapolated from the German and US production volumes using the global average GDP (constant 2017 international USD from 2015-2019). The annual production value of Germany in the year 2017 is 6250 kg and the US production volume in 2017 is 12.9 kg. This value is divided by the German share of global GDP, 3.57% (2015-2019), and the US share, 16.00% (2015-2019). References: Bundesamt für Verbraucherschutz und Lebensmittelsicherheit (2018): Absatz an Pflanzenschutzmitteln in der Bundesrepublik Deutschland 2017, available here: https://www.bvl.bund.de/SharedDocs/Downloads/04_Pflanzenschutzmittel/01_meldungen_par_64/meld_par_64_2017.pdf?__blob=publicationFile&v=2, accessed 07-06-2022. U.S. Geological Survey (2018): Estimated Annual Agricultural Pesticide Use, available here: https://water.usgs.gov/nawqa/pnsp/usage/maps/county-level/, accessed 07-06-2022. World bank (2022): GDP, available here: https://data.worldbank.org/indicator/NY.GDP.MKTP.PP.KD, accessed 17-05-2022.
  property price 8.35049 EUR2005
    The price is calculated based on price information from Made-in-China (available here: https://ynltchem.en.made-in-china.com/product/IFXEjwMoPlcv/China-Paclobutrazol-95-Technical-Grade-25-Sc-15-Wp-Plant-Hormones-for-Mango-Tree-and-etc.html, last accessed 2022-08-04).
    The prices were converted to EUR based on the annual exchange rates published by the European Central Bank (https://sdw.ecb.europa.eu/quickview.do?SERIES_KEY=120.EXR.A.USD.EUR.SP00.A, last accessed on 2022-02-15) and adjusted for inflation relative to 2005 using the producer price index (PPI) of the euro area, published by eurostat (https://appsso.eurostat.ec.europa.eu/nui/show.do?dataset=sts_inpp_a&lang=en, last accessed on 2022-05-04).
  properties: carbon allocation 0.613234 kg, carbon content 0.613234, carbon content, fossil 0.613234, carbon content, non-fossil 0, dry mass 1 kg, water content 0, water in wet mass 0 kg, wet mass 1 kg

## Inputs from technosphere
- acetone, liquid: 0.338587, 0.104717 kg (2 suppliers, which the file names only by identifier); sum of these 0.443304 kg; lognormal variance with pedigree 0.010025, pedigree (2,5,2,2,2)
  Calculated based on stoichiometry. See technology comment for the description of the reaction.
  properties: carbon content, fossil 0.62069, dry mass 1 kg, heating value, net 31.32 MJ, wet mass 1 kg
- ammonia, anhydrous, liquid: 0.00326248, 0.014016, 0.00633315, 0.0701989, 0.00296735, 0.000663782, 0.0243952, 0.00209706, 0.00646414 kg (9 suppliers, which the file names only by identifier); sum of these 0.130398 kg; lognormal variance with pedigree 0.010025, pedigree (2,5,2,2,2)
  (same comment as for acetone, liquid)
  properties: dry mass 1 kg, wet mass 1 kg
- bromine: 0.609998 kg; lognormal variance with pedigree 0.010025, pedigree (2,5,2,2,2)
  (same comment as for acetone, liquid)
  properties: dry mass 1 kg, wet mass 1 kg
- carbon monoxide: 0.053545, 0.160922 kg (2 suppliers, which the file names only by identifier); sum of these 0.214467 kg; lognormal variance with pedigree 0.010025, pedigree (2,5,2,2,2)
  (same comment as for acetone, liquid)
  properties: carbon content, fossil 0.428571, dry mass 1 kg, heating value, net 12.99 MJ, wet mass 1 kg
- chemical factory, organics: 2.176e-9 unit; lognormal variance with pedigree 0.3494, pedigree (2,5,2,4,4)
  Calculated based on literature data published by the industry. For this activity, no information was readily available concerning infrastructure and land-use. Therefore, the infrastructure is estimated based on data from two chemical factories, the BASF site of Ludwigshafen and the chemical factory in Gendorf (which are both located in Germany), which produce a wide range of chemical substances. Based on this data, the following assumptions are made: the built area amounts to about 4.2 ha, the plant has an average output of 50'000 t/a and a lifespan of fifty years. The estimated infrastructure amount is therefore 4.00 E-10 units per kg of produced chemical. Since this process comprises 10 reactions to produce the final product, the default value was scaled up. To produce 1 kg of output, 4.44 kg of intermediate products are necessary. The value was therefore scaled up with the factor 5.44. References: Althaus H.-J., Chudacoff M., Hischier R., Jungbluth N., Osses M. and Primas A. (2007) Life Cycle Inventories of Chemicals. ecoinvent report No. 8, v2.0. EMPA Dübendorf, Swiss Centre for Life Cycle Inventories, Dübendorf, CH. Gendorf (2000) Umwelterklärung 2000, Werk Gendorf. Werk Gendorf, Burgkirchen.
- chlorine, liquid: 0.0452474, 0.226195 kg (2 suppliers, which the file names only by identifier); sum of these 0.271442 kg; lognormal variance with pedigree 0.010025, pedigree (2,5,2,2,2)
  (same comment as for acetone, liquid)
  properties: dry mass 1 kg, wet mass 1 kg
- compressed air, 1000 kPa gauge: 1.74832, 0.711428 m3 (2 suppliers, which the file names only by identifier); sum of these 2.45975 m3; lognormal variance with pedigree 0.05, pedigree (2,5,2,4,4)
  Calculated based on literature data published by the GENDORF Chemical Park. The factory produced an average of 2462760 tonnes of chemical substances (including intermediates) per year in the years 2015-2019. The average consumption of compressed air in the years 2015-2019 was 1113557454 m3 per year. This equals 0.45216 m3/kg chemical produced. Since this process comprises 10 reactions to produce the final product, the default value was scaled up. To produce 1 kg of output, 4.44 kg of intermediate products are necessary. The value was therefore scaled up with the factor 5.44. References: Chemiepark GENDORF, Umwelterklärung 2016, https://www.gendorf.de/Nachbarn/Umweltschutz/Industrie%20und%20Nachhaltigkeit Chemiepark GENDORF, Umwelterklärung 2017, https://www.gendorf.de/Nachbarn/Umweltschutz/Industrie%20und%20Nachhaltigkeit Chemiepark GENDORF, Umwelterklärung 2020, https://www.gendorf.de/Nachbarn/Umweltschutz/Industrie%20und%20Nachhaltigkeit
- electricity, medium voltage: 2.17089 kWh; lognormal variance with pedigree 0.05, pedigree (2,5,2,4,4)
  Calculated based on literature data published by the GENDORF Chemical Park. The factory produced an average of 2462760 tonnes of chemical substances (including intermediates) per year in the years 2015-2019. The average consumption of electricity in the years 2015-2019 was 982796751 kWh per year. This equals 0.39906 kWh/kg chemical produced. Since this process comprises 10 reactions to produce the final product, the default value was scaled up. To produce 1 kg of output, 4.44 kg of intermediate products are necessary. The value was therefore scaled up with the factor 5.44. References: Chemiepark GENDORF, Umwelterklärung 2016, https://www.gendorf.de/Nachbarn/Umweltschutz/Industrie%20und%20Nachhaltigkeit Chemiepark GENDORF, Umwelterklärung 2017, https://www.gendorf.de/Nachbarn/Umweltschutz/Industrie%20und%20Nachhaltigkeit Chemiepark GENDORF, Umwelterklärung 2020, https://www.gendorf.de/Nachbarn/Umweltschutz/Industrie%20und%20Nachhaltigkeit
- heat, district or industrial, natural gas: 10.2626 MJ; lognormal variance with pedigree 0.05, pedigree (2,5,2,4,4)
  Calculated based on literature data published by the GENDORF Chemical Park. The factory produced an average of 2462760 tonnes of chemical substances (including intermediates) per year in the years 2015-2019. The average consumption of natural gas in the years 2015-2019 was 4645920000 MJ per year. This equals 1.8865 MJ/kg chemical produced. Since this process comprises 10 reactions to produce the final product, the default value was scaled up. To produce 1 kg of output, 4.44 kg of intermediate products are necessary. The value was therefore scaled up with the factor 5.44. References: Chemiepark GENDORF, Umwelterklärung 2016, https://www.gendorf.de/Nachbarn/Umweltschutz/Industrie%20und%20Nachhaltigkeit Chemiepark GENDORF, Umwelterklärung 2017, https://www.gendorf.de/Nachbarn/Umweltschutz/Industrie%20und%20Nachhaltigkeit Chemiepark GENDORF, Umwelterklärung 2020, https://www.gendorf.de/Nachbarn/Umweltschutz/Industrie%20und%20Nachhaltigkeit
  properties: heating value, net 1 MJ
- heat, from steam, in chemical industry: 0.960996, 0.169436 MJ (2 suppliers, which the file names only by identifier); sum of these 1.13043 MJ; lognormal variance with pedigree 0.05, pedigree (2,5,2,4,4)
  Calculated based on literature data published by the GENDORF Chemical Park. The factory produced an average of 2462760 tonnes of chemical substances (including intermediates) per year in the years 2015-2019. The average consumption of steam (internal and external sources) in the years 2015-2019 was 511785800 MJ per year. This equals 0.2078 MJ/kg chemical produced. Since this process comprises 10 reactions to produce the final product, the default value was scaled up. To produce 1 kg of output, 4.44 kg of intermediate products are necessary. The value was therefore scaled up with the factor 5.44. References: Chemiepark GENDORF, Umwelterklärung 2016, https://www.gendorf.de/Nachbarn/Umweltschutz/Industrie%20und%20Nachhaltigkeit Chemiepark GENDORF, Umwelterklärung 2017, https://www.gendorf.de/Nachbarn/Umweltschutz/Industrie%20und%20Nachhaltigkeit Chemiepark GENDORF, Umwelterklärung 2020, https://www.gendorf.de/Nachbarn/Umweltschutz/Industrie%20und%20Nachhaltigkeit
  properties: heating value, net 1 MJ
- hydrazine: 0.0813791, 0.0406896 kg (2 suppliers, which the file names only by identifier); sum of these 0.122069 kg; lognormal variance with pedigree 0.010025, pedigree (2,5,2,2,2)
  (same comment as for acetone, liquid)
  properties: dry mass 1 kg, heating value, net 15.13 MJ, wet mass 1 kg
- hydrogen, gaseous, medium pressure, merchant: 0.000879209, 0.00420066, 0.00263763 kg (3 suppliers, which the file names only by identifier); sum of these 0.0077175 kg; lognormal variance with pedigree 0.010025, pedigree (2,5,2,2,2)
  (same comment as for acetone, liquid)
  properties: dry mass 1 kg, heating value, net 120.21 MJ, wet mass 1 kg
- iron(III) chloride, without water, in 40% solution state: 1.23572 kg; lognormal variance with pedigree 0.010025, pedigree (2,5,2,2,2)
  (same comment as for acetone, liquid)
  properties: dry mass 1 kg, wet mass 1 kg
- nitrogen, liquid: 0.063223, 0.0173543 kg (2 suppliers, which the file names only by identifier); sum of these 0.0805773 kg; lognormal variance with pedigree 0.05, pedigree (2,5,2,4,4)
  Calculated based on literature data published by the GENDORF Chemical Park. The factory produced an average of 2462760 tonnes of chemical substances (including intermediates) per year in the years 2015-2019. The average consumption of nitrogen, liquid in the years 2015-2019 was 29168033 m3 per year. This equals 0.014812 kg/kg chemical produced. The density to convert to kg was assumed to be 1.2506 kg/m3. Since this process comprises 10 reactions to produce the final product, the default value was scaled up. To produce 1 kg of output, 4.44 kg of intermediate products are necessary. The value was therefore scaled up with the factor 5.44. References: Chemiepark GENDORF, Umwelterklärung 2016, https://www.gendorf.de/Nachbarn/Umweltschutz/Industrie%20und%20Nachhaltigkeit Chemiepark GENDORF, Umwelterklärung 2017, https://www.gendorf.de/Nachbarn/Umweltschutz/Industrie%20und%20Nachhaltigkeit Chemiepark GENDORF, Umwelterklärung 2020, https://www.gendorf.de/Nachbarn/Umweltschutz/Industrie%20und%20Nachhaltigkeit
  properties: dry mass 1 kg, wet mass 1 kg
- sodium hydroxide, without water, in 50% solution state: 0.0363325, 0.372075 kg (2 suppliers, which the file names only by identifier); sum of these 0.408407 kg; lognormal variance with pedigree 0.01, pedigree (2,5,2,1,2)
  Sodium hydroxide was added to neutralise the formed acid. Calculated based on stoichiometry. See technology comment for the description of the reaction.
  properties: dry mass 1 kg, heating value, net 3.03 MJ, wet mass 1 kg
- sodium tetrahydridoborate: 0.144111 kg; lognormal variance with pedigree 0.010025, pedigree (2,5,2,2,2)
  (same comment as for acetone, liquid)
  properties: dry mass 1 kg, heating value, net 12.81 MJ, wet mass 1 kg
- tap water: 0.1224 kg; lognormal variance with pedigree 0.05, pedigree (2,5,2,4,4)
  Calculated based on literature data published by the GENDORF Chemical Park. The factory produced an average of 2462760 tonnes of chemical substances (including intermediates) per year in the years 2015-2019. The average consumption of tap water in the years 2015-2019 was 55352 t per year. This equals 0.0225 kg/kg chemical produced. Since this process comprises 10 reactions to produce the final product, the default value was scaled up. To produce 1 kg of output, 4.44 kg of intermediate products are necessary. The value was therefore scaled up with the factor 5.44. References: Chemiepark GENDORF, Umwelterklärung 2016, https://www.gendorf.de/Nachbarn/Umweltschutz/Industrie%20und%20Nachhaltigkeit Chemiepark GENDORF, Umwelterklärung 2017, https://www.gendorf.de/Nachbarn/Umweltschutz/Industrie%20und%20Nachhaltigkeit Chemiepark GENDORF, Umwelterklärung 2020, https://www.gendorf.de/Nachbarn/Umweltschutz/Industrie%20und%20Nachhaltigkeit
  properties: carbon content, fossil 0.00178991, dry mass 0.000337476 kg, water content 2962.17, wet mass 1 kg
  note on carbon content, fossil: Bicarbonate content is 2.93 mol/m3. CO2 content is 0.1 mol/m3 (ecoinvent v2.2 report 8, Tab 93.1).
- toluene, liquid: 0.310328, 0.0406477 kg (2 suppliers, which the file names only by identifier); sum of these 0.350976 kg; lognormal variance with pedigree 0.010025, pedigree (2,5,2,2,2)
  (same comment as for acetone, liquid)
  properties: carbon content, fossil 0.913043, dry mass 1 kg, heating value, net 38.17 MJ, wet mass 1 kg
- wastewater, average: -5.96131e-8, -9.9199e-6, -2.37205e-6, -3.53186e-8 m3 (4 suppliers, which the file names only by identifier); sum of these -1.23869e-5 m3; lognormal variance with pedigree 0.0498, pedigree (2,5,1,4,4)
  Calculated based on literature data published by the GENDORF Chemical Park. The factory produced an average of 2462760 tonnes of chemical substances (including intermediates) per year in the years 2015-2019. The average ouput of wastewater going to an external wastewater treatment plant in the years 2015-2019 was 5608 m3 per year. This equals 0.000002277 m3/kg chemical produced. Since this process comprises 10 reactions to produce the final product, the default value was scaled up. To produce 1 kg of output, 4.44 kg of intermediate products are necessary. The value was therefore scaled up with the factor 5.44. References: Chemiepark GENDORF, Umwelterklärung 2016, https://www.gendorf.de/Nachbarn/Umweltschutz/Industrie%20und%20Nachhaltigkeit Chemiepark GENDORF, Umwelterklärung 2017, https://www.gendorf.de/Nachbarn/Umweltschutz/Industrie%20und%20Nachhaltigkeit Chemiepark GENDORF, Umwelterklärung 2020, https://www.gendorf.de/Nachbarn/Umweltschutz/Industrie%20und%20Nachhaltigkeit
  production volume; name PV_wastewater; = (BP_wastewater* PV_RP/RP)
    Calculated from the production volume of the reference product in proportion to the respective output amounts.
  properties: carbon content, non-fossil 0.194039, dry mass 0.346837 kg, water content 2882.2, wet mass 1000 kg
  note on carbon content, non-fossil: 0.0673 kg TOC/m3 (Tab A.17, ecoinvent v2.2 report 13_I). TOC was considered as Total Carbon.

## Inputs from nature
- Water, cooling, unspecified natural origin [natural resource, in water]: 0.0800061 m3; lognormal variance with pedigree 0.05, pedigree (2,5,2,4,4)
  Calculated based on literature data published by the GENDORF Chemical Park. The factory produced an average of 2462760 tonnes of chemical substances (including intermediates) per year in the years 2015-2019. The average amount of cooling water released in the years 2015-2019 was 34408800 t per year. It was assumed that 5% of the cooling water was emitted to air during its use, therefore, to calculate the input of cooling water, the output value reported by GENDORF was scaled up by the factor 1/0.95. This equals 0.014707 m3/kg chemical produced. Since this process comprises 10 reactions to produce the final product, the default value was scaled up. To produce 1 kg of output, 4.44 kg of intermediate products are necessary. The value was therefore scaled up with the factor 5.44. References: Chemiepark GENDORF, Umwelterklärung 2016, https://www.gendorf.de/Nachbarn/Umweltschutz/Industrie%20und%20Nachhaltigkeit Chemiepark GENDORF, Umwelterklärung 2017, https://www.gendorf.de/Nachbarn/Umweltschutz/Industrie%20und%20Nachhaltigkeit Chemiepark GENDORF, Umwelterklärung 2020, https://www.gendorf.de/Nachbarn/Umweltschutz/Industrie%20und%20Nachhaltigkeit
- Water, river [natural resource, in water]: 0.00525194 m3; lognormal variance with pedigree 0.05, pedigree (2,5,2,4,4)
  Calculated based on literature data published by the GENDORF Chemical Park. The factory produced an average of 2462760 tonnes of chemical substances (including intermediates) per year in the years 2015-2019. The average consumption of river water in the years 2015-2019 was 22000820 t per year. However, since the cooling water is modelled as an input, the amount of river water was adjusted to avoid double counting. 55% of the input amount of cooling water was deducted from the amount of river water, as that is the share of river water versus well water. This equals 0.00096543 m3/kg chemical produced. Since this process comprises 10 reactions to produce the final product, the default value was scaled up. To produce 1 kg of output, 4.44 kg of intermediate products are necessary. The value was therefore scaled up with the factor 5.44. References: Chemiepark GENDORF, Umwelterklärung 2016, https://www.gendorf.de/Nachbarn/Umweltschutz/Industrie%20und%20Nachhaltigkeit Chemiepark GENDORF, Umwelterklärung 2017, https://www.gendorf.de/Nachbarn/Umweltschutz/Industrie%20und%20Nachhaltigkeit Chemiepark GENDORF, Umwelterklärung 2020, https://www.gendorf.de/Nachbarn/Umweltschutz/Industrie%20und%20Nachhaltigkeit
- Water, well, in ground [natural resource, in water]: 0.00444187 m3; lognormal variance with pedigree 0.05, pedigree (2,5,2,4,4)
  Calculated based on literature data published by the GENDORF Chemical Park. The factory produced an average of 2462760 tonnes of chemical substances (including intermediates) per year in the years 2015-2019. The average consumption of well water in the years 2015-2019 was 18607480 t per year. However, since the cooling water is modelled as an input, the amount of well water was adjusted to avoid double counting. 45% of the input amount of cooling water was deducted from the amount of well water, as that is the share of well water versus river water. This equals 0.00081652 m3/kg chemical produced. Since this process comprises 10 reactions to produce the final product, the default value was scaled up. To produce 1 kg of output, 4.44 kg of intermediate products are necessary. The value was therefore scaled up with the factor 5.44. References: Chemiepark GENDORF, Umwelterklärung 2016, https://www.gendorf.de/Nachbarn/Umweltschutz/Industrie%20und%20Nachhaltigkeit Chemiepark GENDORF, Umwelterklärung 2017, https://www.gendorf.de/Nachbarn/Umweltschutz/Industrie%20und%20Nachhaltigkeit Chemiepark GENDORF, Umwelterklärung 2020, https://www.gendorf.de/Nachbarn/Umweltschutz/Industrie%20und%20Nachhaltigkeit

## Emissions to nature
- Acetone [air, unspecified]: 0.000780629 kg; lognormal variance with pedigree 0.049425, pedigree (2,5,2,2,2)
  Calculated losses, based on the boiling point of a chemical, to water or to air. In addition, unreacted chemicals are assumed to go to wastewater treatment, which has a conversion rate in biological treatment of 95% of carbon into carbon dioxide. The remaining 5% are released as emissions to water.
- Ammonia [air, unspecified]: 0.000616317 kg; lognormal variance with pedigree 0.049425, pedigree (2,5,2,2,2)
  (same comment as for Acetone)
- Bromine [air, unspecified]: 0.00118619 kg; lognormal variance with pedigree 0.049425, pedigree (2,5,2,2,2)
  (same comment as for Acetone)
- Carbon dioxide, fossil [air, unspecified]: 0.609674 kg; lognormal variance with pedigree 0.010025, pedigree (2,5,2,2,2)
  Calculated based on the carbon content of unreacted chemical substances. The unreacted chemicals are assumed to go to wastewater treatment, which has a conversion rate in biological treatment of 95% of carbon into carbon dioxide. The remaining 5% are released as emissions to water, unspecified.
- Carbon monoxide, fossil [air, unspecified]: 0.00101367 kg; lognormal variance with pedigree 0.659425, pedigree (2,5,2,2,2)
  (same comment as for Acetone)
- Chlorine [air, unspecified]: 0.00128295 kg; lognormal variance with pedigree 0.049425, pedigree (2,5,2,2,2)
  (same comment as for Acetone)
- Hydrogen [air, unspecified]: 3.64762e-5 kg; lognormal variance with pedigree 0.049425, pedigree (2,5,2,2,2)
  (same comment as for Acetone)
- Nitrogen [air, unspecified]: 0.0805773 kg; lognormal variance with pedigree 0.0894, pedigree (2,5,2,4,4)
  Calculated value. The amount of nitrogen released to air is equal to the amount of nitrogen entering the activity. Since this process comprises 10 reactions to produce the final product, the default value was scaled up. To produce 1 kg of output, 4.44 kg of intermediate products are necessary. The value was therefore scaled up with the factor 5.44.
- Water [air, unspecified]: 0.0079968 m3; lognormal variance with pedigree 0.0894, pedigree (2,5,2,4,4)
  Calculated based on literature data published by the GENDORF Chemical Park. The factory produced an average of 2462760 tonnes of chemical substances (including intermediates) per year in the years 2015-2019. To determine the emissions of water to air, the difference of all water inputs (from river, well, tap water and cooling) and outputs (wastewater, emissions to water) was calculated. The average ouput of water to air in the years 2015-2019 was 3620444 m3 per year. This equals 0.00147 m3/kg chemical produced. For more information on the other water exchanges please consult the respective exchange comment. Since this process comprises 10 reactions to produce the final product, the default value was scaled up. To produce 1 kg of output, 4.44 kg of intermediate products are necessary. The value was therefore scaled up with the factor 5.44. References: Chemiepark GENDORF, Umwelterklärung 2016, https://www.gendorf.de/Nachbarn/Umweltschutz/Industrie%20und%20Nachhaltigkeit Chemiepark GENDORF, Umwelterklärung 2017, https://www.gendorf.de/Nachbarn/Umweltschutz/Industrie%20und%20Nachhaltigkeit Chemiepark GENDORF, Umwelterklärung 2020, https://www.gendorf.de/Nachbarn/Umweltschutz/Industrie%20und%20Nachhaltigkeit
- Ammonium [water, unspecified]: 0.00617053 kg; lognormal variance with pedigree 0.049425, pedigree (2,5,2,2,2)
  (same comment as for Acetone)
- BOD5, Biological Oxygen Demand [water, unspecified]: 0.0291554 kg; lognormal variance with pedigree 0.049425, pedigree (2,5,2,2,2)
  Calculated value. The BOD, COD, TOC and BOD5 are calculated based on the amount and type of emissions released to water in the same activity.
- Bromine [water, unspecified]: 0.571279 kg; lognormal variance with pedigree 0.049425, pedigree (2,5,2,2,2)
  (same comment as for Acetone)
- COD, Chemical Oxygen Demand [water, unspecified]: 0.0291554 kg; lognormal variance with pedigree 0.049425, pedigree (2,5,2,2,2)
  (same comment as for BOD5, Biological Oxygen Demand)
- Chloride [water, unspecified]: 1.24904 kg; lognormal variance with pedigree 0.049425, pedigree (2,5,2,2,2)
  Calculated losses, based on the boiling point of a chemical, to water or to air. In addition, unreacted chemicals are assumed to go to wastewater treatment, which has a conversion rate in biological treatment of 95% of carbon into carbon dioxide. The remaining 5% are released as emissions to water. This value includes as well emissions from acid neutralisation.
- DOC, Dissolved Organic Carbon [water, unspecified]: 0.00874935 kg; lognormal variance with pedigree 0.049425, pedigree (2,5,2,2,2)
  (same comment as for BOD5, Biological Oxygen Demand)
- Iron ion [water, unspecified]: 0.38012 kg; lognormal variance with pedigree 0.659425, pedigree (2,5,2,2,2)
  (same comment as for Acetone)
- Sodium I [water, unspecified]: 0.234747 kg; lognormal variance with pedigree 0.049425, pedigree (2,5,2,2,2)
  (same comment as for Chloride)
- TOC, Total Organic Carbon [water, unspecified]: 0.00874935 kg; lognormal variance with pedigree 0.049425, pedigree (2,5,2,2,2)
  (same comment as for BOD5, Biological Oxygen Demand)
- Water [water, unspecified]: 0.0820016 m3; lognormal variance with pedigree 0.0894, pedigree (2,5,2,4,4)
  Calculated based on literature data published by the GENDORF Chemical Park. The factory produced an average of 2462760 tonnes of chemical substances (including intermediates) per year in the years 2015-2019. The amount of water released back to the environment consists of the sum of the amount of process water treated in the internal WWTP that is then released back to the environment and the amount of cooling water released back to the environment. The average ouput of the internal WWTP in the years 2015-2019 was 2628800 m3 and that of cooling water released back to the environment was 34408800 m3. This gives a yearly average of 37037600 m3 emissions of water to water. This equals 0.01504 m3/kg chemical produced. This value includes as well process emissions. Since this process comprises 10 reactions to produce the final product, the default value was scaled up. To produce 1 kg of output, 4.44 kg of intermediate products are necessary. The value was therefore scaled up with the factor 5.44. References: Chemiepark GENDORF, Umwelterklärung 2016, https://www.gendorf.de/Nachbarn/Umweltschutz/Industrie%20und%20Nachhaltigkeit Chemiepark GENDORF, Umwelterklärung 2017, https://www.gendorf.de/Nachbarn/Umweltschutz/Industrie%20und%20Nachhaltigkeit Chemiepark GENDORF, Umwelterklärung 2020, https://www.gendorf.de/Nachbarn/Umweltschutz/Industrie%20und%20Nachhaltigkeit

## Sampling procedure
Literature data and stoichiometric calculation. This inventory is partially based on a generic model of the production of chemicals. The data generated by this model have been improved with compound-specific data when available. The model of the production of chemicals is using specific industry or literature data wherever possible and more generic data on chemical production processes to fill compound-specific data gaps when necessary. The basic principles of the model have been published in literature (Hischier, 2005). The model has been updated and extended with newly available data from the chemical industry. In the model, unreacted fractions are treated in a waste treatment process, and emissions reported are after a waste treatment process that is included in the scope of this dataset. For volatile reactants, a small level of evaporation is assumed. Solvents and catalysts are mostly recycled in closed-loop systems within the scope of the dataset and reported flows are for losses from this system. The main source of information for the values for heat, electricity, water (process and cooling), nitrogen, chemical factory is industry data from the GENDORF Chemical Park. The values are a 5-year average of data from 2015 to 2019 published by the GENDORF Chemical Park, which is based in Germany and produced an average of 2462760 tonnes of chemical substances in the years 2015-2019. Reference(s): Hischier, R. (2005) Establishing Life Cycle Inventories of Chemicals Based on Differing Data Availability (9 pp). The International Journal of Life Cycle Assessment, Volume 10, Issue 1, pp 59–67. 10.1065/lca2004.10.181.7 Chemiepark GENDORF, Umwelterklärung 2016, https://www.gendorf.de/Nachbarn/Umweltschutz/Industrie%20und%20Nachhaltigkeit Chemiepark GENDORF, Umwelterklärung 2017, https://www.gendorf.de/Nachbarn/Umweltschutz/Industrie%20und%20Nachhaltigkeit Chemiepark GENDORF, Umwelterklärung 2020, https://www.gendorf.de/Nachbarn/Umweltschutz/Industrie%20und%20Nachhaltigkeit Unger T., (1996). Pesticide Synthesis Handbook, Noyes Publication. Sauter H., Zeeh B., (2009): Plant Growth Regulators, in Ullmanns Encyclopedia of Industrial Chemistry, Weinheim, Wiley-VCH. Fletcher R. A., Gilley A., Sankhla N., Davis T. D., (2010). Triazoles as Plant Growth Regulators and Stress Protectants. Horticultural Reviews. John Wiley & Sons, Ltd: 55–138. doi:10.1002/9780470650776.ch3. Rademacher W., (2000). Growth Retardants: Effects on Gibberellin Biosynthesis and Other Metabolic Pathways. Annual Review of Plant Physiology and Plant Molecular Biology. 51 (1): 501–531. doi:10.1146/annurev.arplant.51.1.501.
