# treatment of waste wire plastic, municipal incineration FAE

Dataset: EcoSpold 2, unit process
Geography: CH
Time period: 2006-01-01 to 2023-12-31
Technology level: current
Classification: ISIC rev.4 ecoinvent: 3821:Treatment and disposal of non-hazardous waste
Synonyms: polymers waste, part of Waste Electrical and Electronic Equipment (WEEE)
Scenario: Business-as-Usual
System model: Allocation, cut-off by classification
Generated by: Nikolia Stoikou
Database: ecoinvent
isCopyrightProtected: true
accessRestrictedTo: 1

## General comment
The process represents the treatment of 'waste wire plastic' in a municipal solid waste incinerator (MSWI). Recommended use of this dataset: For disposal of small amounts of wiring isolation, which goes to incineration as wire in a part of a larger item or in small amounts only. Large amounts of separated wire will not be disposed in incinerators, but rather go to recycling.Inventoried waste consists of fraction: 100% wiring plastic; . Waste composition (wet, in ppmw): gross heating value 26.81 MJ/kg; net heating value 25.95 MJ/kg; H2O 35500; O 22438; H 72167; C 530500; S 806.42; N 1069; P na; B na; Cl 305150; Br 50.232; F 14.281; I na; Ag na; As 1.8346; Ba 198.45; Cd 12.007; Co 21.87; Cr 31.397; Cu 24205; Hg 0.58871; Mn 63.112; Mo na; Ni 14.22; Pb 17.077; Sb 32.095; Se 2.0277; Sn 252.09; V 860.3; Zn 141.51; Be 0.4828; Sc na; Sr 85.455; Ti 965.59; Tl 0.38624; W na; Si na; Fe 2982.5; Ca 781.16; Al 193.12; K na; Mg 28.932; Na 1415.1. Share of carbon in initial waste input that is biogenic 0%.Share of metals in waste not oxidised and bulk-recyclable (exclude very small or thin parts) Iron: 0%; Alu: 0%; Copper: 0%.Recovery of metal scrap from bottom ash to recycling: 0g iron scrap, 0g aluminium scrap, 0g copper scrap. From this waste, the FLUWA process in the technology mix recovers 0.011kg (DM) of a hydroxide sludge to be recycled in zinc furnaces. Net energy production: 3.05MJ/kg electric energy and 6.5MJ/kg thermal energy.

## Included activities start
The activity starts with the waste being available at the gate of the treatment facility. Collection and transportation of the waste to the treatment plant is not included.

## Included activities end
The activity ends with the waste being treated and waste-specific emissions from the incineration process and auxiliary material consumption for flue gas cleaning are released to the environment (air and water). Infrastructure and waste-specific energy demands for Municipal Solid Waste Incineration (MSWI) and net energy generation are included.

## Geography
Modelling parameters affecting the treatment technology are specific to this geography and to the technology mix encountered in Switzerland in 2012.

## Technology
The waste is treated in the incineration plant with flue gas cleaning. Incineration is the controlled combustion of a waste and it includes fly ash extraction (FAE). Auxiliary material consumption for this step of air pollution control (APC) are included in the process. Air polution control includes electrostatic precipitator for fly ash (ESP), wet flue gas scrubber and 25% SNCR , 42.77% SCR-high dust , 32.68% SCR-low dust -DeNOx facilities and 0% without DeNOx (weighted according to mass of burnt waste). Efficiency of iron scrap separation from slag : 58%. Efficiency of aluminium scrap separation from slag : 31%. Efficiency of copper scrap separation from slag : 31%. The technology mix for this dataset includes a filter ash treatment (FLUWA) of a share of 46.22%. Gross electric efficiency technology mix 15.84% and Gross thermal efficiency technology mix 28.51%

## Reference product
- heat, for reuse in municipal waste incineration only: 1 MJ; By-product classification allocatable product; CPC 17300: Steam and hot water
  net useful heat generated from this waste and used in internal MSWI plant energy redistribution.
  production volume 4.25876e6 MJ
    calculated in proportion to incinerated waste input
  property price 0.0106 EUR2005
    Average European district heat price from Ecoheatcool and Euroheat 2005-2006, Ecoheat Work package 1: The European heat market. Final report. 10.6 EUR/GJ i s the price of district heat. http://www.solarthermalworld.org/files/Ecoheatcool%20WP1%20Web.pdf?download
  properties: carbon allocation 0 kg, carbon content 0, exergy 0.1842 MJ, true value relation 0.1842
