# ammonium thiocyanate production

Dataset: EcoSpold 2, unit process
Geography: GLO
Time period: 2000-01-01 to 2023-12-31
Technology level: current
Classification: ISIC rev.4 ecoinvent: 2011:Manufacture of basic chemicals
Classification: EcoSpold01Categories: chemicals/organics
Tags: ConvertedDataset
Scenario: Business-as-Usual
System model: Allocation, cut-off by classification
Share of production covered: 100 %
Generated by: Jürgen Sutter
Published in: Sutter, J. 2007
Database: ecoinvent
isCopyrightProtected: true
accessRestrictedTo: 1

## General comment
This dataset represents the production of 1 kg of ammonium thiocyanate from carbon disulfide and ammonia. Raw materials are modelled with a stoichiometric calculation. Energy consumption is modelled with data from a similar process. The emissions are estimated. Infrastructure is included with a default value.
[This dataset was already contained in the ecoinvent database version 2. It was not individually updated during the transfer to ecoinvent version 3. Life Cycle Impact Assessment results may still have changed, as they are affected by changes in the supply chain, i.e. in other datasets. This dataset was generated following the ecoinvent quality guidelines for version 2. It may have been subject to central changes described in the ecoinvent version 3 change report (http://www.ecoinvent.org/database/ecoinvent-version-3/reports-of-changes/), and the results of the central updates were reviewed extensively. The changes added e.g. consistent water flows and other information throughout the database. The documentation of this dataset can be found in the ecoinvent reports of version 2, which are still available via the ecoinvent website. The change report linked above covers all central changes that were made during the conversion process.]

## Included activities start
From reception of ammonia and carbon disulfide as input materials at the factory gate.

## Included activities end
This activity ends with 1 kg of ammonium thiocyanate. 100%. The dataset includes the input materials, energy uses, infrastructure and emissions.

## Geography
The inventory is modelled for the world.

## Technology
The process considered is amination of carbon disulfide.
This continuous, pressure-free process is carried out in two steps. In the first step CS2 and ammonia gas are reacted in the presence of water over activated charcoal at ca. 50 °C in an in-terface reactor to give ammonium dithiocarbamate.
The latter is decomposed in the second step at 95 – 100 °C on activated charcoal.
If the NH3 and CS2 used are of high purity, the 35 – 45 % ammonium thiocyanate solution formed can be marketed after concentration without further purification. The crystals, which are produced by vacuum evaporation and centrifugation, are of higher purity. In this process, apart from H2S and excess CS2, no other waste substances are formed. After CS2 and H2S have been separated, the former can be recycled and the latter can be used, for example, for sulfur production in the Claus process.
Claus process:
2H2S + O2 → 2S + 2H2O
From sulfur carbon disulfide is produced. The
CS2 production reaction is:
CH4 + 4 S → CS2 + 2 H2S
There is also a one-step variant of this process in which the reaction of NH3 with CS2 and decomposition take place at ca. 115 °C and 5 bar.
The whole chemical equation with included desulfurizing and CS2-production from the recovered sulfur is:
CS2 + 4 NH3 + 2 O2 + CH4→ 2NH4SCN + 4H2O
Hoek, Theo van: Thiocyanates, Inorganic. In: Ullmann's Encyclopedia of Industrial Chemistry, Seventh Edition, 2004 Electronic Release (ed. Fiedler E., Grossmann G., Kersebohm D., Weiss G. and Witte C.). 7 th Electronic Release Edition. Wiley InterScience, New York, Online-Version under: http://www.mrw.interscience.wiley.com/emrw/9783527306732/home

## Time period
Time of publications

## Parameters
- fraction, cooling water, cooling pond system, to air: 0.032 dimensionless; name fraction_CW_CP_to_air; lognormal variance with pedigree 0.0413, pedigree (2,3,1,3,1)
  Calculated based on literature value (Scown, C.D., 2011, Water Footprint of U.S. Transportation Fuels and supplying information of the article) (Vionnet, S., Quantis Water Database - Technical Report, 2012).
- fraction, cooling water, once-through system, to air: 0.004 dimensionless; name fraction_CW_OT_to_air; lognormal variance with pedigree 0.0413, pedigree (2,3,1,3,1)
  (same comment as for fraction, cooling water, cooling pond system, to air)
- fraction, cooling water, recirculating system, to air: 0.771 dimensionless; name fraction_CW_R_to_air; lognormal variance with pedigree 0.0413, pedigree (2,3,1,3,1)
  (same comment as for fraction, cooling water, cooling pond system, to air)
- fraction, cooling water, to air: 0.3875 dimensionless; name fraction_CW_to_air; = (0.5*fraction_CW_OT_to_air)+(0.5*fraction_CW_R_to_air); lognormal variance with pedigree 0.092025, pedigree (4,4,3,2,4)
  Calculated value based on literature value (see comments of the other parametres present in this dataset) and expert opinion. In the case when no industry/literature data are available about the type of cooling or directly fraction, cooling water, to air specific for the process a default assumption is applied. It is assumed that the once-through cooling system is used in 50% of all cases and recirculating system is used in another 50% of all cases.

## Reference product
- ammonium thiocyanate: 1 kg; By-product classification allocatable product; CPC 34270: Cyanides, cyanide oxides and complex cyanides; fulminates, cyanates and thiocyanates; silicates; borates; perb[…]; HS2017 283719: Cyanides and cyanide oxides; other than of sodium; CAS 1762-95-4
  EcoSpold01Location=GLO
  Ammonium thiocyanate is a white, hygroscopic salt which forms stable monoclinic crystals below 90 - 92 °C. At higher temperatures it is converted to the rhombic form.
  Ammonium thiocyanate is readily soluble in many polar solvents, such as ethanol and acetone.
  Most of the ammonium thiocyanate is produced as an intermediate in the production of other inorganic thiocyanates. It is also used as the starting material for compounds such as aminothiazoles.
  Large quantities of ammonium thiocyanate are used in agriculture. It is used to combat worms in cattle and, as a mixture with aminotriazole, reinforces the activity of the latter as a broad-spectrum herbicide. Ammonium thiocyanate is also used as a raw material or the production of other herbicides, such as diallates, triallates and tricyclazoles. It is also used as a raw material for fungicides, such as methyl isothiocyanate.
  Ammonium thiocyanate is extensively used in photography as an accelerator with sodium thiosulfate in fixing baths, where it removes undeveloped silver (Ag+). Addition of ammonium thiocyanate to electrolytic cells in the production of ammonium peroxodisulfate, (NH4)2S2O8 considerably increases the yield.
  Ammonium thiocyanate is used as a solvent for cellulose, which can also be spun. In the textile industry ammonium thiocyanate is widely used to improve desired properties.
  In the steel industry ammonium thiocyanate is used for coating and as a corrosion inhibitor against acidic gases. It is used as an additive for silver and tin plating baths and for etching aluminum.
  Because of the neutron-absorbing properties of hafnium, only hafnium-free zirconium can be used in nuclear technology. Following their extraction, Zr and Hf are dissolved in aqueous ammonium thiocyanate so that the Hf(SCN)4 complex can subsequently be extracted with an organic solvent.
  Ammonium thiocyanate can also be used as a component for energy storage in combination with heat pumps, in vulcanization, for the production of fire-extinguishing agents, and in absorbents for ammonia or steam.
  production volume 1 kg
    Unknown
    Dummy value to be replaced by measured, estimated or calculated value
  property heating value, net 11.15 MJ
    LHV is calculated based on the elemental composition of the substance. Based on the CAS number of the substance (001762-95-4), the chemical formula of the substance is found to be: CH4N2S, (PubChem 2020).
    Reference: Kim, S., Chen, J., Cheng, T., Gindulyte, A., He, J., He, S., Li, Q., Shoemaker, B. A., Thiessen, P. A., Yu, B., Zaslavsky, L., Zhang, J., & Bolton, E. E. (2019). PubChem 2019 update: improved access to chemical data. Nucleic acids research, 47(D1), D1102–D1109. https://doi.org/10.1093/nar/gky1033
  property price 0.426848 EUR2005
    Calculated based on inputs: The price of the product has been calculated as a sum of the values of the material and energy inputs for this product. This value is therefore a rough estimation. It may underestimate the real price since there are additional expenses when producing any product. These expences can include for example labour costs, treatment of waste materials and profit for the producer. Please consider carefully whether this level of data quality is acceptable for your application.
  properties: carbon allocation 0.157895 kg, carbon content 0.157895, carbon content, fossil 0.157895, carbon content, non-fossil 0, dry mass 1 kg, water content 0, water in wet mass 0 kg, wet mass 1 kg

## Inputs from technosphere
- ammonia, anhydrous, liquid: 0.011306, 0.048572, 0.0219473, 0.243272, 0.0102833, 0.00230031, 0.0845407, 0.00726729, 0.0224012 kg (9 suppliers, which the file names only by identifier); sum of these 0.45189 kg; source van Hoek T. 2004; lognormal variance with pedigree 0.076, pedigree (4,5,5,1,1)
  Stoichiometric calculation with a yield of 95 %
  EcoSpold01Location=RER
  Uncertainty: Stoechiometric calculation
  properties: dry mass 1 kg, wet mass 1 kg
- carbon disulfide: 0.52632 kg; source van Hoek T. 2004; lognormal variance with pedigree 0.076, pedigree (4,5,5,1,1)
  Stoichiometric calculation with a yield of 95 %
  EcoSpold01Location=GLO
  Uncertainty: Stoechiometric calculation
  properties: carbon content, fossil 0.157895, dry mass 1 kg, heating value, net 32.72 MJ, wet mass 1 kg
- chemical factory, organics: 4e-10 unit; lognormal variance with pedigree 0.3846, pedigree (2,4,5,5,4)
  Calculated based on literature data published by the industry. For this activity, no information was readily available concerning infrastructure and land-use. Therefore, the infrastructure is estimated based on data from two chemical factories, the BASF site of Ludwigshafen and the chemical factory in Gendorf (which are both located in Germany), which produce a wide range of chemical substances. Based on this data, the following assumptions are made: the built area amounts to about 4.2 ha, the plant has an average output of 50'000 t/a and a lifespan of fifty years. The estimated infrastructure amount is therefore 4.00 E-10 units per kg of produced chemical.
  References:
  Althaus H.-J., Chudacoff M., Hischier R., Jungbluth N., Osses M. and Primas A. (2007) Life Cycle Inventories of Chemicals. ecoinvent report No. 8, v2.0. EMPA Dübendorf, Swiss Centre for Life Cycle Inventories, Dübendorf, CH.
  Gendorf (2000) Umwelterklärung 2000, Werk Gendorf. Werk Gendorf, Burgkirchen.
  EcoSpold01Location=RER
  Uncertainty: Estimation
- electricity, medium voltage: 0.399063 kWh; source Gendorf 2000; lognormal variance with pedigree 0.0852, pedigree (2,4,5,5,4)
  EcoSpold01Location=UCTE
  Calculated based on literature data published by the GENDORF Chemical Park. The factory produced an average of 2462760 tonnes of chemical substances (including intermediates) per year in the years 2015-2019. The average consumption of electricity in the years 2015-2019 was 982796751 kWh per year. This equals 0.39906 kWh/kg chemical produced.
  References:
  Chemiepark GENDORF, Umwelterklärung 2016, https://www.gendorf.de/Nachbarn/Umweltschutz/Industrie%20und%20Nachhaltigkeit
  Chemiepark GENDORF, Umwelterklärung 2017, https://www.gendorf.de/Nachbarn/Umweltschutz/Industrie%20und%20Nachhaltigkeit
  Chemiepark GENDORF, Umwelterklärung 2020, https://www.gendorf.de/Nachbarn/Umweltschutz/Industrie%20und%20Nachhaltigkeit
  Uncertainty: Estimation
- heat, district or industrial, natural gas: 1.88647 MJ; source Gendorf 2000; lognormal variance with pedigree 0.0852, pedigree (2,4,5,5,4)
  Calculated based on literature data published by the GENDORF Chemical Park. The factory produced an average of 2462760 tonnes of chemical substances (including intermediates) per year in the years 2015-2019. The average consumption of natural gas in the years 2015-2019 was 4645920000 MJ per year. This equals 1.8865 MJ/kg chemical produced.
  References:
  Chemiepark GENDORF, Umwelterklärung 2016, https://www.gendorf.de/Nachbarn/Umweltschutz/Industrie%20und%20Nachhaltigkeit
  Chemiepark GENDORF, Umwelterklärung 2017, https://www.gendorf.de/Nachbarn/Umweltschutz/Industrie%20und%20Nachhaltigkeit
  Chemiepark GENDORF, Umwelterklärung 2020, https://www.gendorf.de/Nachbarn/Umweltschutz/Industrie%20und%20Nachhaltigkeit
  EcoSpold01Location=RER
  Uncertainty: Estimation
  properties: heating value, net 1 MJ
- heat, from steam, in chemical industry: 0.176662, 0.0311477 MJ (2 suppliers, which the file names only by identifier); sum of these 0.20781 MJ; lognormal variance with pedigree 0.0852, pedigree (2,4,5,5,4)
  Calculated based on literature data published by the GENDORF Chemical Park. The factory produced an average of 2462760 tonnes of chemical substances (including intermediates) per year in the years 2015-2019. The average consumption of steam (internal and external sources) in the years 2015-2019 was 511785800 MJ per year. This equals 0.2078 MJ/kg chemical produced.
  References:
  Chemiepark GENDORF, Umwelterklärung 2016, https://www.gendorf.de/Nachbarn/Umweltschutz/Industrie%20und%20Nachhaltigkeit
  Chemiepark GENDORF, Umwelterklärung 2017, https://www.gendorf.de/Nachbarn/Umweltschutz/Industrie%20und%20Nachhaltigkeit
  Chemiepark GENDORF, Umwelterklärung 2020, https://www.gendorf.de/Nachbarn/Umweltschutz/Industrie%20und%20Nachhaltigkeit
  properties: heating value, net 1 MJ
- natural gas, high pressure: 0.130692 m3; source van Hoek T. 2004; lognormal variance with pedigree 0.076, pedigree (4,5,5,1,1)
  (same comment as for ammonia, anhydrous, liquid)
  properties: carbon content, fossil 0.602381, dry mass 0.84 kg, heating value, gross 40 MJ, heating value, net 36 MJ, wet mass 0.84 kg
  note on carbon content, fossil: An average C content of 0.506 kg C/ m3 has been assumed (this average has been calculated using data in Tab 3.5, ecoinvent v2.2 report 6_V
  note on heating value, net: Literature value, Source: Christoph Meili;Niels Jungbluth;Maresa Bussa (2021) Life cycle inventories of crude oil and natural gas extraction. ESU-services Ltd. commissioned by BAFU & VSG, Schaffhausen, Switzerland, http://esu-services.ch/data/public-lci-reports/
- wastewater, average: -1.09589e-8, -1.82361e-6, -4.36062e-7, -6.49273e-9 m3 (4 suppliers, which the file names only by identifier); sum of these -2.27712e-6 m3; lognormal variance with pedigree 0.0452, pedigree (2,4,1,5,4)
  Calculated based on literature data published by the GENDORF Chemical Park. The factory produced an average of 2462760 tonnes of chemical substances (including intermediates) per year in the years 2015-2019. The average ouput of wastewater going to an external wastewater treatment plant in the years 2015-2019 was 5608 m3 per year. This equals 0.000002277 m3/kg chemical produced.
  References:
  Chemiepark GENDORF, Umwelterklärung 2016, https://www.gendorf.de/Nachbarn/Umweltschutz/Industrie%20und%20Nachhaltigkeit
  Chemiepark GENDORF, Umwelterklärung 2017, https://www.gendorf.de/Nachbarn/Umweltschutz/Industrie%20und%20Nachhaltigkeit
  Chemiepark GENDORF, Umwelterklärung 2020, https://www.gendorf.de/Nachbarn/Umweltschutz/Industrie%20und%20Nachhaltigkeit
  properties: carbon content, non-fossil 0.194039, dry mass 0.346837 kg, mass concentration, TOC 0.1091 kg/m3, mass concentration, calcium 0.039453 kg/m3, mass concentration, chlorine 0.030031 kg/m3, mass concentration, hydrogen 0.013365 kg/m3, mass concentration, nitrogen 0.031015 kg/m3, mass concentration, oxygen 0.069824 kg/m3, mass concentration, sodium 0.06456 kg/m3, mass concentration, sulfur 0.015602 kg/m3, water content 2882.2, wet mass 1000 kg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
  note on carbon content, non-fossil: 0.0673 kg TOC/m3 (Tab A.17, ecoinvent v2.2 report 13_I). TOC was considered as Total Carbon.

## Inputs from nature
- Water, cooling, unspecified natural origin [natural resource, in water]: 0.014707 m3; source Gendorf 2000; lognormal variance with pedigree 0.0852, pedigree (2,4,5,5,4)
  Calculated based on literature data published by the GENDORF Chemical Park. The factory produced an average of 2462760 tonnes of chemical substances (including intermediates) per year in the years 2015-2019. The average amount of cooling water released in the years 2015-2019 was 34408800 t per year. It was assumed that 5% of the cooling water was emitted to air during its use, therefore, to calculate the input of cooling water, the output value reported by GENDORF was scaled up by the factor 1/0.95. This equals 0.014707 m3/kg chemical produced.
  References:
  Chemiepark GENDORF, Umwelterklärung 2016, https://www.gendorf.de/Nachbarn/Umweltschutz/Industrie%20und%20Nachhaltigkeit
  Chemiepark GENDORF, Umwelterklärung 2017, https://www.gendorf.de/Nachbarn/Umweltschutz/Industrie%20und%20Nachhaltigkeit
  Chemiepark GENDORF, Umwelterklärung 2020, https://www.gendorf.de/Nachbarn/Umweltschutz/Industrie%20und%20Nachhaltigkeit
  Uncertainty: Estimation
- Water, river [natural resource, in water]: 0.000965426 m3; lognormal variance with pedigree 0.0852, pedigree (2,4,5,5,4)
  Calculated based on literature data published by the GENDORF Chemical Park. The factory produced an average of 2462760 tonnes of chemical substances (including intermediates) per year in the years 2015-2019. The average consumption of river water in the years 2015-2019 was 22000820 t per year. However, since the cooling water is modelled as an input, the amount of river water was adjusted to avoid double counting. 55% of the input amount of cooling water was deducted from the amount of river water, as that is the share of river water versus well water. This equals 0.00096543 m3/kg chemical produced.
  References:
  Chemiepark GENDORF, Umwelterklärung 2016, https://www.gendorf.de/Nachbarn/Umweltschutz/Industrie%20und%20Nachhaltigkeit
  Chemiepark GENDORF, Umwelterklärung 2017, https://www.gendorf.de/Nachbarn/Umweltschutz/Industrie%20und%20Nachhaltigkeit
  Chemiepark GENDORF, Umwelterklärung 2020, https://www.gendorf.de/Nachbarn/Umweltschutz/Industrie%20und%20Nachhaltigkeit
- Water, well, in ground [natural resource, in water]: 0.000816522 m3; lognormal variance with pedigree 0.0852, pedigree (2,4,5,5,4)
  Calculated based on literature data published by the GENDORF Chemical Park. The factory produced an average of 2462760 tonnes of chemical substances (including intermediates) per year in the years 2015-2019. The average consumption of well water in the years 2015-2019 was 18607480 t per year. However, since the cooling water is modelled as an input, the amount of well water was adjusted to avoid double counting. 45% of the input amount of cooling water was deducted from the amount of well water, as that is the share of well water versus river water. This equals 0.00081652 m3/kg chemical produced.
  References:
  Chemiepark GENDORF, Umwelterklärung 2016, https://www.gendorf.de/Nachbarn/Umweltschutz/Industrie%20und%20Nachhaltigkeit
  Chemiepark GENDORF, Umwelterklärung 2017, https://www.gendorf.de/Nachbarn/Umweltschutz/Industrie%20und%20Nachhaltigkeit
  Chemiepark GENDORF, Umwelterklärung 2020, https://www.gendorf.de/Nachbarn/Umweltschutz/Industrie%20und%20Nachhaltigkeit

## Emissions to nature
- Ammonia [air, urban air close to ground]: 0.00090377 kg; lognormal variance with pedigree 0.218, pedigree (4,5,5,5,5)
  Estimation. It is assumed that 100% of the electricity consumed is converted to waste heat and that 100% of the waste heat is released to the air.
  As approximation the air emissions occurring from the purge vent, the distillation vent and fugitive emission sources for NH3 were estimated as 0.2 % of the CH4 input.
  Uncertainty: Estimation
- Carbon dioxide, fossil [air, urban air close to ground]: 0.026235 kg; lognormal variance with pedigree 0.1786, pedigree (4,5,5,5,5)
  Estimation. It is assumed that 100% of the electricity consumed is converted to waste heat and that 100% of the waste heat is released to the air.
  As approximation the air emissions of CO2 were estimated from burning of co-products.
  Uncertainty: Estimation
- Carbon disulfide [air, urban air close to ground]: 0.0010526 kg; lognormal variance with pedigree 0.188, pedigree (4,5,5,5,5)
  Estimation. It is assumed that 100% of the electricity consumed is converted to waste heat and that 100% of the waste heat is released to the air.
  As approximation the air emissions occurring from the purge vent, the distillation vent and fugitive emission sources for C2S were estimated as 0.2 % of the CH4 input.
  Uncertainty: Estimation
- Methane, fossil [air, urban air close to ground]: 0.00055402 kg; lognormal variance with pedigree 0.188, pedigree (4,5,5,5,5)
  Estimation. It is assumed that 100% of the electricity consumed is converted to waste heat and that 100% of the waste heat is released to the air.
  As an approximation the air emissions occurring from the purge vent, the distillation vent and fugitive emission sources for CH4 were estimated as 1% of the CH4 input.
  Uncertainty: Estimation
- Water [air, unspecified]: 0.00147008 m3; lognormal variance with pedigree 0.1246, pedigree (2,4,5,5,4)
  Calculated based on literature data published by the GENDORF Chemical Park. The factory produced an average of 2462760 tonnes of chemical substances (including intermediates) per year in the years 2015-2019. To determine the emissions of water to air, the difference of all water inputs (from river, well, tap water and cooling) and outputs (wastewater, emissions to water) was calculated. The average ouput of water to air in the years 2015-2019 was 3620444 m3 per year. This equals 0.00147 m3/kg chemical produced. For more information on the other water exchanges please consult the respective exchange comment.
  References:
  Chemiepark GENDORF, Umwelterklärung 2016, https://www.gendorf.de/Nachbarn/Umweltschutz/Industrie%20und%20Nachhaltigkeit
  Chemiepark GENDORF, Umwelterklärung 2017, https://www.gendorf.de/Nachbarn/Umweltschutz/Industrie%20und%20Nachhaltigkeit
  Chemiepark GENDORF, Umwelterklärung 2020, https://www.gendorf.de/Nachbarn/Umweltschutz/Industrie%20und%20Nachhaltigkeit
  property fraction, origin: fresh water 0; name fraction_origin_fresh_water
  property fraction, origin: salt water 0; name fraction_origin_salt_water
  property fraction, origin: unspecified 1; name fraction_origin_unspecified
- Ammonium [water, surface water]: 0.0036151 kg; lognormal variance with pedigree 0.188, pedigree (4,5,5,5,5)
  Estimation. Calculated from mass balance as remaining amount of unreacted ammonium (4.8 % of the input). For the ammonia within the waste water a removal efficiency of 50% was assumed. The nitrogen emitted to air (N2) and remaining in the sewage sludge was neglected.
  Uncertainty: Estimation
- BOD5, Biological Oxygen Demand [water, surface water]: 0.00347 kg; lognormal variance with pedigree 0.188, pedigree (4,5,5,5,5)
  Calculated value from the water emissions. BOD = COD
  Uncertainty: Calculated from the water emissions
- COD, Chemical Oxygen Demand [water, surface water]: 0.00347 kg; lognormal variance with pedigree 0.188, pedigree (4,5,5,5,5)
  Calculated value from the water emissions, precisely from the amount of CS2 in the treated waste water, assuming a carbon conversion of 96%
  Uncertainty: Calculated from the water emissions
- DOC, Dissolved Organic Carbon [water, surface water]: 0.000399 kg; lognormal variance with pedigree 0.188, pedigree (4,5,5,5,5)
  Calculated value from the water emissions. TOC = DOC
  Uncertainty: Calculated from the water emissions
- Sulfide [water, surface water]: 0.0025263 kg; lognormal variance with pedigree 0.188, pedigree (4,5,5,5,5)
  Estimation. The carbon disulfide emission to water is calculated as sulfide emission.
  Calculated from mass balance as remaining amount of unreacted carbon disulfide (4.8 % of the input). Further it was assumed that this wastewater is treated in a internal wastewater plant. The removal efficiency for carbon disulfide was assumed with 90%. The carbon contained in the removed carbon disulfide was accounted as CO2 emissions to air.
  Uncertainty: Estimation
- TOC, Total Organic Carbon [water, surface water]: 0.000399 kg; lognormal variance with pedigree 0.188, pedigree (4,5,5,5,5)
  Calculated value from the water emissions.
  Uncertainty: Calculated from the water emissions
- Water [water, unspecified]: 0.0150391 m3; lognormal variance with pedigree 0.1246, pedigree (2,4,5,5,4)
  Calculated based on literature data published by the GENDORF Chemical Park. The factory produced an average of 2462760 tonnes of chemical substances (including intermediates) per year in the years 2015-2019. The amount of water released back to the environment consists of the sum of the amount of process water treated in the internal WWTP that is then released back to the environment and the amount of cooling water released back to the environment. The average ouput of the internal WWTP in the years 2015-2019 was 2628800 m3 and that of cooling water released back to the environment was 34408800 m3. This gives a yearly average of 37037600 m3 emissions of water to water. This equals 0.01504 m3/kg chemical produced.
  References:
  Chemiepark GENDORF, Umwelterklärung 2016, https://www.gendorf.de/Nachbarn/Umweltschutz/Industrie%20und%20Nachhaltigkeit
  Chemiepark GENDORF, Umwelterklärung 2017, https://www.gendorf.de/Nachbarn/Umweltschutz/Industrie%20und%20Nachhaltigkeit
  Chemiepark GENDORF, Umwelterklärung 2020, https://www.gendorf.de/Nachbarn/Umweltschutz/Industrie%20und%20Nachhaltigkeit
  property carbon content, fossil 0; name C_content_fossil
  property carbon content, non-fossil 0; name C_content_non_fossil
  property dry mass 0 kg; name DM
  property fraction, origin: fresh water 0; name fraction_origin_fresh_water_Ww
  property fraction, origin: salt water 0; name fraction_origin_salt_water_Ww
  property fraction, origin: unspecified 1; name fraction_origin_unspecified_Ww
  property water in wet mass 1000 kg; name WWM
  property wet mass 1000 kg; name WM

## Sampling procedure
Standard values

## Extrapolations
Energy consumptions, emissions, infrastructure and transports are calculated with standard values.

## Review by Roland Hischier 2007-09-21
passed.
-

## Review by Roland Hischier 2011-09-23
Transfer of documentation done.
