# tap water production, underground water with disinfection

Dataset: EcoSpold 2, unit process
Geography: ZA
Time period: 2012-01-01 to 2023-12-31
Technology level: current
Classification: EcoSpold01Categories: water supply/production
Classification: ISIC rev.4 ecoinvent: 3600:Water collection, treatment and supply
Synonyms: potable water
Scenario: Business-as-Usual
System model: Allocation, cut-off by classification
Generated by: Laura Rubio
Published in: Gmünder S. 2017
Database: ecoinvent
isCopyrightProtected: true
accessRestrictedTo: 1

## General comment
This dataset is created as a child of the global dataset with edited production volume for this geography.
This dataset represents production of 1 kg of tap water under pressure at facility gate, ready for distribution in network. This dataset is approximating the inventory for underground water pumping and disinfection using chlorine using data from two facilities of different technology in Quebec. Chlorine consumption is estimated using data from the artificial recharged wells dataset and energy inputs are estimated using data from underground water without treatment dataset.
[This dataset is meant to replace the following datasets:
- tap water production and supply, GLO, 2000 - 2000]

## Included activities start
From the intake pumping of raw surface water into the water treatment plant.

## Included activities end
This dataset ends with the production of tap water, at facility gate, under pressure. It includes energy for intake pumping, lighting and heating of the building as well as the energy of the pump pressurizing water to the beginning of the network. Infrastructure for the facility is estimated. It excludes energy for pumping stations and water losses within the network which is included in the tap water market. Emissions to the environment occurring during the treatment and during the distribution were not considered as they are assumed negligible. Main substance in water that would be released in the environment are assumed to be considered in wastewater processes.

## Geography
Extrapolated from data from two plants in Quebec (Canada).The uncertainty was adjusted accordingly.

## Time period
The time period is set from 2012 to the year 2017 as it is the latest update period for data.

## Reference product
- tap water: 1 kg; name tapwater; By-product classification allocatable product; CPC 18000: Natural water; CAS 7732-18-5
  production volume 5.56009e11 kg; name PV_tapwater; = 4149318500000*0.134
    Calculated value based on AQUASTAT total tap water production volume (AQUASTAT, 2010) - <http://www.fao.org/nr/water/aquastat/data/popups/itemDefn.html?id=4251>. Further water treatment technology mix was based on “ Survey of disinfection efficiency of small drinking water treatment plants : Challenges facing small water treatment plants in South Africa” report- Momba, M. N. B., Obi, C. L., & Thompson, P. (2009), which complied data from 181 small conventional treatment plants in varoius parts of the country. Overall the production technology shares, present in the ecoinvent database, are calculated to be as follows; tap water production, conventional treatment (86.6%) followed by underground water with disinfection treatment (13.4%)
  property price 0.000397 EUR2005
    Converted from EU price by using Purchasing Power Parities (0.8458 in 2003 and 0.8426 in 2004)
  properties: carbon allocation 6.08566e-7 kg, carbon content 0.0017899, carbon content, fossil 0.0017899, carbon content, non-fossil 0, dry mass 0.00034 kg, water content 2940.18, water in wet mass 0.99966 kg, wet mass 1 kg

## Inputs from technosphere
- chlorine, liquid: 1.40443e-6 kg; lognormal variance with pedigree 0.0146, pedigree (4,4,3,5,1)
  Estimated value, taken from the "tap water production, underground water with disinfection, GLO" dataset (accessed 20170920) as it was considered adequate also for this dataset. Based on chlorine consumption for disinfection from the artificial recharged wells dataset.
  properties: dry mass 1 kg, wet mass 1 kg
- electricity, medium voltage: 0.000399 kWh; lognormal variance with pedigree 0.0146, pedigree (4,4,3,5,1)
  EcoSpold01Location=UCTE
  Estimated value,taken from the "tap water production, underground water with disinfection, GLO" dataset (accessed 20170920) as it was considered adequate also for this dataset. Represents electricity consumption for pumping underground water and pressurizing tap water at facility gate. Value is based on energy consumption from the underground without treatment dataset.
- pump station: 2.0568e-11 unit; lognormal variance with pedigree 0.0466, pedigree (5,4,3,5,1)
  Approximated process, taken from the "tap water production, underground water with disinfection, GLO" dataset (accessed 20170920) as it was considered adequate also for this dataset. Used to represent facility pumping both intake and at facility gate. Value taken directly from ecoinvent V2.2 tap water, at user module.
- water pump operation, diesel: 1.49144e-5 MJ; = diesel_use*density_diesel*NHV; lognormal variance with pedigree 0.004, pedigree (1,1,3,5,1)
  Calculated value, taken from the "tap water production, underground water with disinfection, GLO" dataset (accessed 20170920) as it was considered adequate also for this dataset
  Uncertainty: Calculated variable. Uncertainty will be determined from propagation of uncertainty factors of underlying variables.
  property density 0.84 kg/l; name density_diesel
  property fuel input in physical units, L 4.11e-7 l; name diesel_use
  property heating value, net 43.2 MJ; name NHV
  properties: price 0.07 EUR2005
  note on fuel input in physical units, L: Estimated value. Represents diesel volume consumed in a year for routine runs of emergency generators. Value is based on diesel consumption from the underground water without treatment dataset.
  note on heating value, net: Literature. net (lower) heating (calorific) value for diesel in MJ/kg

## Inputs from nature
- Water, well, in ground [natural resource, in water]: 0.001 m3; name waterIn_1
  Measured value, taken from the "tap water production, underground water with disinfection, GLO" dataset (accessed 20170920) as it was considered adequate also for this dataset. Data provider reported that no loss occurs thoughout water treatment.

## Sampling procedure
Based on data collected from two treatment plants using underground water and with disinfection, located in Quebec (Canada). See corresponding Quebec dataset for more information.

## Extrapolations
Underground water with disinfection accounts for 13.4% of the total tap water supply. The data was extrapolated from two underground water with disinfection tap water production facilities in Quebec (Canada). The South African production volumen data was used for regionalizing the dataset, the remaining exchanges were copied from the global dataset. The uncertainty has been changed accordingly.

## Review by Philippe Loubet 2017-11-23
The overall quality of this datasets is acceptable.
In the future it would be desirable to create (or to check) the inventory from south african data.
