# phthalimide production

Dataset: EcoSpold 2, unit process
Geography: RoW
Time period: 2010-01-01 to 2023-12-31
Technology level: current
Classification: ISIC rev.4 ecoinvent: 2011:Manufacture of basic chemicals
Synonyms: C8H5NO2
Scenario: Business-as-Usual
System model: Allocation, cut-off by classification
Share of production covered: 100 %
Generated by: Jürgen Sutter
Database: ecoinvent
isCopyrightProtected: true
accessRestrictedTo: 1

## General comment
The process “phthalimide, at plant, GLO" is modelled for the production of phthalimide from phthalic anhydride. Raw materials are modelled with a stoechiometric calculation. Emissions are estimated. Energy consumptions, infrastructure and transports are calculated with standard values.
Phthalimide (C8H5O2N; CAS 8050-41-6, 1,3-dioxoisoindoline) crystallizes from solution as white needles or prisms, while sublimation produces platelets. The compound is sparingly soluble in water (0.3 g at 20 °C, 0.9 g at 50 °C, 2.2 g at 100 °C in 100 g of water) and readily soluble in acetic acid, sodium hydroxide solution, or potassium hydroxide solution. Phthalimide is produced almost exclusively from phthalic anhydride and ammonia: C8H4O3 + 2 NH3 → C8H5NO2 + 3 H2O. Processes based on phthalic anhydride and urea or oxidative ammonolysis of o-xylene are also known.
Production from Phthalic Anhydride and Ammonia
The continuous processes for producing phthalimide are particularly important industrially. One of the continuous processes is carried out in an externally heated, vertical reaction tube filled with packing material. A gas-tight connection links the bottom of the reaction tube to a sublimation chamber from which a discharge arm discharges the phthalimide through a slot by means of a screw conveyor. The exhaust gases are discharged from the sublimation chamber via built-in baffles.
Molten phthalic anhydride and excess ammonia are continuously fed into the reaction tube at the top and are reacted at 250–280 °C. The reaction gases are cooled to 170–180 °C in the sublimation chamber, and solid phthalimide is deposited and discharged. Water and excess ammonia are removed via an exhaust-gas pipe. A 98 % yield of phthalimide is obtained with a purity of 99 %.
Another continuous process for producing phthalimide from phthalic anhydride is a countercurrent process. Molten phthalic anhydride is continuously fed to the head of a reactor while ammonia is continuously fed to the bottom. The temperature increases from ≥ 150 °C at the top of the reactor to a maximum of 270 °C at the bottom. The molten phthalimide emerging from the bottom of the reactor with a purity of 99 % is cooled and flaked or dissolved in aqueous alkali, and supplied as a starting material for further syntheses, e.g., to produce anthranilic acid.
The exhaust gas from the head of the reactor, which is composed of water vapor, sublimed phthalimide and phthalic anhydride, and ammonia, is fed to the bottom of a scrubbing column where it is scrubbed in countercurrent with molten phthalimide from the bottom of the reactor. The melt taken from the bottom of the scrubbing column, which contains unreacted phthalic anhydride, is returned to the reactor, while the exhaust gas from the scrubbing column, which contains predominantly water vapor and phthalimide, is dissolved in aqueous alkali, and the solution is used to produce anthranilic acid.
Production from Phthalic Anhydride and Urea
Solvent-Free Process
A mixture of phthalic anhydride and urea is introduced into a heatable, tiltable reaction vessel. Mounted on the cover of the vessel is an extraction tube for the reaction gases, CO2 and water vapor. The reactor is heated to 130–140 °C until the contents are molten, and as soon as the elimination of CO2 and water starts, heating is ceased. The heat of reaction causes the temperature to rise to ca. 160 °C. The reaction is complete when the contents of the reactor have swelled to several times their original volume as a result of foaming and have solidified.
The cover of the reactor is then removed. The pure phthalimide is discharged into a collecting vessel by tilting the reactor, is cooled and ground, and used without further treatment. The yield is > 90 %.
Production in a Solvent
Phthalic acid or phthalic anhydride can be reacted with urea in the presence of a solvent to form phthalimide. Suitable solvents are substituted and unsubstituted hydrocarbons and aromatics and heteroaromatics such as n-propylbenzene, cumene, 1,2-dichlorbenzene, and picoline. Urea must be insoluble in the reaction medium, while phthalic acid or phthalic anhydride must be only slightly soluble. The reaction is carried out below the boiling point of the solvent, normally at 160–170 °C. When the reaction is complete, the pure phthalimide is filtered off and washed with water. The yield is 95–100 %.
Production from o-Xylene
o-Xylene is reacted in the gas phase with ammonia in the presence of a metal-oxide catalyst as oxygen donor. Phthalimide, phthalamide, or phthalonitrile can be selectively produced, depending on how the reaction is controlled.
Phthalimide is of industrial importance as the starting material for producing anthranilic acid by Hofmann degradation, and a large number of primary amines can be produced by the Gabriel synthesis. Phthalimide is an intermediate in the production of agricultural pesticides and wood preservatives, pigments, and pharmaceuticals.
Frischknecht R., Jungbluth N., Althaus H.-J., Doka G., Dones R., Heck T., Hellweg S., Hischier R., Nemecek T., Rebitzer G. and Spielmann M. (2007) Overview and Methodology. Final report ecoinvent v2.0 No. 1. Swiss Centre for Life Cycle Inventories, Dübendorf, CH, retrieved from: www.ecoinvent.org.
Gendorf (2000) Umwelterklärung 2000, Werk Gendorf. Werk Gendorf, Burgkirchen as pdf-File under: http://www.gendorf.de/pdf/umwelterklaerung2000.pdf
Peter M. Lorz, Friedrich K. Towae, Walter Enke, Rudolf Jäckh, Naresh Bhargava, Wolfgang Hillesheim: Phthalic Acid and Derivatives. Published online: 2000. In: Ullmann's Encyclopedia of Industrial Chemistry, Seventh Edition, 2004 Electronic Release (ed. Fiedler E., Grossmann G., Kersebohm D., Weiss G. and Witte C.). 7 th Electronic Release Edition. Wiley InterScience, New York, Online-Version under: DOI: 10.1002/14356007.a20_181.pub2

## Included activities end
production of phthalimide including materials, energy uses, infrastructure, and emissions

## Geography
The inventory is modelled for the world.

## Technology
reaction of phthalic anhydride with ammonia

## Time period
Time of publications

## Parameters
- fraction, cooling water, cooling pond system, to air: 0.032 dimensionless; name fraction_CW_CP_to_air; lognormal variance with pedigree 0.0413, pedigree (2,3,1,3,1)
  Calculated based on literature value (Scown, C.D., 2011, Water Footprint of U.S. Transportation Fuels and supplying information of the article) (Vionnet, S., Quantis Water Database - Technical Report, 2012).
- fraction, cooling water, once-through system, to air: 0.004 dimensionless; name fraction_CW_OT_to_air; lognormal variance with pedigree 0.0413, pedigree (2,3,1,3,1)
  (same comment as for fraction, cooling water, cooling pond system, to air)
- fraction, cooling water, recirculating system, to air: 0.771 dimensionless; name fraction_CW_R_to_air; lognormal variance with pedigree 0.0413, pedigree (2,3,1,3,1)
  (same comment as for fraction, cooling water, cooling pond system, to air)
- fraction, cooling water, to air: 0.3875 dimensionless; name fraction_CW_to_air; = (0.5*fraction_CW_OT_to_air)+(0.5*fraction_CW_R_to_air); lognormal variance with pedigree 0.092025, pedigree (4,4,3,2,4)
  Calculated value based on literature value (see comments of the other parametres present in this dataset) and expert opinion. In the case when no industry/literature data are available about the type of cooling or directly fraction, cooling water, to air specific for the process a default assumption is applied. It is assumed that the once-through cooling system is used in 50% of all cases and recirculating system is used in another 50% of all cases.

## Reference product
- phthalimide: 1 kg; By-product classification allocatable product; CPC 34150: Amine-function compounds; oxygen-function amino-compounds, except lysine and its esters and salts thereof and […]; HS2017 292519: Imides and their derivatives; other than saccharin and glutethimide (INN); CAS 85-41-6
  EcoSpold01Location=RER
  production volume 6.7e6 kg
    Expert judgement
  property carbon content, fossil 0.653068
    Calculated based on molecular structure. See tab "chemicals".
  property heating value, net 23.91 MJ
    LHV is calculated based on the elemental composition of the substance. Based on the CAS number of the substance (000085-41-6 ), which is found manually, the chemical formula of the substance is found to be: C8H5NO2, (PubChem 2020).
    Reference: Kim, S., Chen, J., Cheng, T., Gindulyte, A., He, J., He, S., Li, Q., Shoemaker, B. A., Thiessen, P. A., Yu, B., Zaslavsky, L., Zhang, J., & Bolton, E. E. (2019). PubChem 2019 update: improved access to chemical data. Nucleic acids research, 47(D1), D1102–D1109. https://doi.org/10.1093/nar/gky1033
  property price 1.05234 EUR2005
    Calculated based on inputs: The price of the product has been calculated as a sum of the values of the material and energy inputs for this product. This value is therefore a rough estimation. It may underestimate the real price since there are additional expenses when producing any product. These expences can include for example labour costs, treatment of waste materials and profit for the producer. Please consider carefully whether this level of data quality is acceptable for your application.
  properties: carbon allocation 0.653068 kg, carbon content 0.653068, carbon content, non-fossil 0, dry mass 1 kg, water content 0, water in wet mass 0 kg, wet mass 1 kg

## Inputs from technosphere
- ammonia, anhydrous, liquid: 0.00664427, 0.0128979, 0.142965, 0.00604321, 0.00135184, 0.0496825, 0.0042708, 0.0131647 kg (8 suppliers, which the file names only by identifier); sum of these 0.23702 kg; lognormal variance with pedigree 0.0655, pedigree (4,5,5,1,1)
  EcoSpold01Location=RER
  As there was no data available for the consumption of ammonia a default yield of 95 % is used (Frischknecht et al. 2007).
  Uncertainty: Stoechiometric calculation
  properties: dry mass 1 kg, wet mass 1 kg
- chemical factory, organics: 4e-10 unit; lognormal variance with pedigree 0.3846, pedigree (2,4,5,5,4)
  Calculated based on literature data published by the industry. For this activity, no information was readily available concerning infrastructure and land-use. Therefore, the infrastructure is estimated based on data from two chemical factories, the BASF site of Ludwigshafen and the chemical factory in Gendorf (which are both located in Germany), which produce a wide range of chemical substances. Based on this data, the following assumptions are made: the built area amounts to about 4.2 ha, the plant has an average output of 50'000 t/a and a lifespan of fifty years. The estimated infrastructure amount is therefore 4.00 E-10 units per kg of produced chemical.
  References:
  Althaus H.-J., Chudacoff M., Hischier R., Jungbluth N., Osses M. and Primas A. (2007) Life Cycle Inventories of Chemicals. ecoinvent report No. 8, v2.0. EMPA Dübendorf, Swiss Centre for Life Cycle Inventories, Dübendorf, CH.
  Gendorf (2000) Umwelterklärung 2000, Werk Gendorf. Werk Gendorf, Burgkirchen.
  EcoSpold01Location=RER
  Uncertainty: Estimation
- electricity, medium voltage: 0.013262, 0.264547, 0.088887, 0.00406128, 0.00081286, 0.000174539, 0.0273186 kWh (7 suppliers, which the file names only by identifier); sum of these 0.399063 kWh; lognormal variance with pedigree 0.0852, pedigree (2,4,5,5,4)
  Calculated based on literature data published by the GENDORF Chemical Park. The factory produced an average of 2462760 tonnes of chemical substances (including intermediates) per year in the years 2015-2019. The average consumption of electricity in the years 2015-2019 was 982796751 kWh per year. This equals 0.39906 kWh/kg chemical produced.
  References:
  Chemiepark GENDORF, Umwelterklärung 2016, https://www.gendorf.de/Nachbarn/Umweltschutz/Industrie%20und%20Nachhaltigkeit
  Chemiepark GENDORF, Umwelterklärung 2017, https://www.gendorf.de/Nachbarn/Umweltschutz/Industrie%20und%20Nachhaltigkeit
  Chemiepark GENDORF, Umwelterklärung 2020, https://www.gendorf.de/Nachbarn/Umweltschutz/Industrie%20und%20Nachhaltigkeit
  EcoSpold01Location=UCTE
  Uncertainty: Estimation
- heat, district or industrial, natural gas: 0.0304984, 1.85597 MJ (2 suppliers, which the file names only by identifier); sum of these 1.88647 MJ; lognormal variance with pedigree 0.0852, pedigree (2,4,5,5,4)
  Calculated based on literature data published by the GENDORF Chemical Park. The factory produced an average of 2462760 tonnes of chemical substances (including intermediates) per year in the years 2015-2019. The average consumption of natural gas in the years 2015-2019 was 4645920000 MJ per year. This equals 1.8865 MJ/kg chemical produced.
  References:
  Chemiepark GENDORF, Umwelterklärung 2016, https://www.gendorf.de/Nachbarn/Umweltschutz/Industrie%20und%20Nachhaltigkeit
  Chemiepark GENDORF, Umwelterklärung 2017, https://www.gendorf.de/Nachbarn/Umweltschutz/Industrie%20und%20Nachhaltigkeit
  Chemiepark GENDORF, Umwelterklärung 2020, https://www.gendorf.de/Nachbarn/Umweltschutz/Industrie%20und%20Nachhaltigkeit
  properties: heating value, net 1 MJ
- heat, from steam, in chemical industry: 0.20781 MJ; lognormal variance with pedigree 0.0852, pedigree (2,4,5,5,4)
  EcoSpold01Location=RER
  Calculated based on literature data published by the GENDORF Chemical Park. The factory produced an average of 2462760 tonnes of chemical substances (including intermediates) per year in the years 2015-2019. The average consumption of steam (internal and external sources) in the years 2015-2019 was 511785800 MJ per year. This equals 0.2078 MJ/kg chemical produced.
  References:
  Chemiepark GENDORF, Umwelterklärung 2016, https://www.gendorf.de/Nachbarn/Umweltschutz/Industrie%20und%20Nachhaltigkeit
  Chemiepark GENDORF, Umwelterklärung 2017, https://www.gendorf.de/Nachbarn/Umweltschutz/Industrie%20und%20Nachhaltigkeit
  Chemiepark GENDORF, Umwelterklärung 2020, https://www.gendorf.de/Nachbarn/Umweltschutz/Industrie%20und%20Nachhaltigkeit
  Uncertainty: Estimation
  properties: heating value, net 1 MJ
- phthalic anhydride: 1.0001 kg; lognormal variance with pedigree 0.0655, pedigree (4,5,5,1,1)
  EcoSpold01Location=RER
  Ullm,anns 2004 reports a yield of 98% for the phthalimide production based on phthalic anhydride.
  Uncertainty: Stoechiometric calculation
  properties: carbon content, fossil 0.648649, dry mass 1 kg, heating value, net 22.93 MJ, wet mass 1 kg
- wastewater, average: -2.26904e-6, -8.07865e-9 m3 (2 suppliers, which the file names only by identifier); sum of these -2.27712e-6 m3; lognormal variance with pedigree 0.0452, pedigree (2,4,1,5,4)
  Calculated based on literature data published by the GENDORF Chemical Park. The factory produced an average of 2462760 tonnes of chemical substances (including intermediates) per year in the years 2015-2019. The average ouput of wastewater going to an external wastewater treatment plant in the years 2015-2019 was 5608 m3 per year. This equals 0.000002277 m3/kg chemical produced.
  References:
  Chemiepark GENDORF, Umwelterklärung 2016, https://www.gendorf.de/Nachbarn/Umweltschutz/Industrie%20und%20Nachhaltigkeit
  Chemiepark GENDORF, Umwelterklärung 2017, https://www.gendorf.de/Nachbarn/Umweltschutz/Industrie%20und%20Nachhaltigkeit
  Chemiepark GENDORF, Umwelterklärung 2020, https://www.gendorf.de/Nachbarn/Umweltschutz/Industrie%20und%20Nachhaltigkeit
  properties: carbon content, non-fossil 0.194039, dry mass 0.346837 kg, mass concentration, TOC 0.1091 kg/m3, mass concentration, calcium 0.039453 kg/m3, mass concentration, chlorine 0.030031 kg/m3, mass concentration, hydrogen 0.013365 kg/m3, mass concentration, nitrogen 0.031015 kg/m3, mass concentration, oxygen 0.069824 kg/m3, mass concentration, sodium 0.06456 kg/m3, mass concentration, sulfur 0.015602 kg/m3, water content 2882.2, wet mass 1000 kg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
  note on carbon content, non-fossil: 0.0673 kg TOC/m3 (Tab A.17, ecoinvent v2.2 report 13_I). TOC was considered as Total Carbon.

## Inputs from nature
- Water, cooling, unspecified natural origin [natural resource, in water]: 0.014707 m3; lognormal variance with pedigree 0.0852, pedigree (2,4,5,5,4)
  Calculated based on literature data published by the GENDORF Chemical Park. The factory produced an average of 2462760 tonnes of chemical substances (including intermediates) per year in the years 2015-2019. The average amount of cooling water released in the years 2015-2019 was 34408800 t per year. It was assumed that 5% of the cooling water was emitted to air during its use, therefore, to calculate the input of cooling water, the output value reported by GENDORF was scaled up by the factor 1/0.95. This equals 0.014707 m3/kg chemical produced.
  References:
  Chemiepark GENDORF, Umwelterklärung 2016, https://www.gendorf.de/Nachbarn/Umweltschutz/Industrie%20und%20Nachhaltigkeit
  Chemiepark GENDORF, Umwelterklärung 2017, https://www.gendorf.de/Nachbarn/Umweltschutz/Industrie%20und%20Nachhaltigkeit
  Chemiepark GENDORF, Umwelterklärung 2020, https://www.gendorf.de/Nachbarn/Umweltschutz/Industrie%20und%20Nachhaltigkeit
  Uncertainty: Estimation
- Water, river [natural resource, in water]: 0.000965426 m3; lognormal variance with pedigree 0.0852, pedigree (2,4,5,5,4)
  Calculated based on literature data published by the GENDORF Chemical Park. The factory produced an average of 2462760 tonnes of chemical substances (including intermediates) per year in the years 2015-2019. The average consumption of river water in the years 2015-2019 was 22000820 t per year. However, since the cooling water is modelled as an input, the amount of river water was adjusted to avoid double counting. 55% of the input amount of cooling water was deducted from the amount of river water, as that is the share of river water versus well water. This equals 0.00096543 m3/kg chemical produced.
  References:
  Chemiepark GENDORF, Umwelterklärung 2016, https://www.gendorf.de/Nachbarn/Umweltschutz/Industrie%20und%20Nachhaltigkeit
  Chemiepark GENDORF, Umwelterklärung 2017, https://www.gendorf.de/Nachbarn/Umweltschutz/Industrie%20und%20Nachhaltigkeit
  Chemiepark GENDORF, Umwelterklärung 2020, https://www.gendorf.de/Nachbarn/Umweltschutz/Industrie%20und%20Nachhaltigkeit
- Water, well, in ground [natural resource, in water]: 0.000816522 m3; lognormal variance with pedigree 0.0852, pedigree (2,4,5,5,4)
  Calculated based on literature data published by the GENDORF Chemical Park. The factory produced an average of 2462760 tonnes of chemical substances (including intermediates) per year in the years 2015-2019. The average consumption of well water in the years 2015-2019 was 18607480 t per year. However, since the cooling water is modelled as an input, the amount of well water was adjusted to avoid double counting. 45% of the input amount of cooling water was deducted from the amount of well water, as that is the share of well water versus river water. This equals 0.00081652 m3/kg chemical produced.
  References:
  Chemiepark GENDORF, Umwelterklärung 2016, https://www.gendorf.de/Nachbarn/Umweltschutz/Industrie%20und%20Nachhaltigkeit
  Chemiepark GENDORF, Umwelterklärung 2017, https://www.gendorf.de/Nachbarn/Umweltschutz/Industrie%20und%20Nachhaltigkeit
  Chemiepark GENDORF, Umwelterklärung 2020, https://www.gendorf.de/Nachbarn/Umweltschutz/Industrie%20und%20Nachhaltigkeit

## Emissions to nature
- Ammonia [air, urban air close to ground]: 0.00047403 kg; lognormal variance with pedigree 0.1786, pedigree (4,5,5,5,5)
  There was no data available on process emissions to air for the phthalimide production. As approximation the air emissions occurring from the purge vent, the distillation vent and fugitive emission sources were estimated to 0.2% of the ammonia input.
  Uncertainty: Estimation
- Carbon dioxide, fossil [air, urban air close to ground]: 0.041627 kg; lognormal variance with pedigree 0.1786, pedigree (4,5,5,5,5)
  The remaining amount of unreacted phthalic anhydride is assumed to leave the production process with the waste water. Further it was assumed that this wastewater is treated in a internal wastewater plant. The removal efficiency for phthalic anhydride is assumed with 100%. The carbon contained in the removed phthalic anhydride is accounted as CO2 emissions to air.
  Uncertainty: Estimation
- Water [air, unspecified]: 0.00147008 m3; lognormal variance with pedigree 0.1246, pedigree (2,4,5,5,4)
  Calculated based on literature data published by the GENDORF Chemical Park. The factory produced an average of 2462760 tonnes of chemical substances (including intermediates) per year in the years 2015-2019. To determine the emissions of water to air, the difference of all water inputs (from river, well, tap water and cooling) and outputs (wastewater, emissions to water) was calculated. The average ouput of water to air in the years 2015-2019 was 3620444 m3 per year. This equals 0.00147 m3/kg chemical produced. For more information on the other water exchanges please consult the respective exchange comment.
  References:
  Chemiepark GENDORF, Umwelterklärung 2016, https://www.gendorf.de/Nachbarn/Umweltschutz/Industrie%20und%20Nachhaltigkeit
  Chemiepark GENDORF, Umwelterklärung 2017, https://www.gendorf.de/Nachbarn/Umweltschutz/Industrie%20und%20Nachhaltigkeit
  Chemiepark GENDORF, Umwelterklärung 2020, https://www.gendorf.de/Nachbarn/Umweltschutz/Industrie%20und%20Nachhaltigkeit
  property fraction, origin: fresh water 0; name fraction_origin_fresh_water
  property fraction, origin: salt water 0; name fraction_origin_salt_water
  property fraction, origin: unspecified 1; name fraction_origin_unspecified
- Ammonium [water, surface water]: 0.0011377 kg; lognormal variance with pedigree 0.1786, pedigree (4,5,5,5,5)
  The remaining amount of unreacted ammonia is assumed to leave the production process with the waste water. Further it was assumed that this wastewater is treated in a internal wastewater plant. For the ammonia within the waste water a removal efficiency of 50% was assumed. The nitrogen emitted to air (N2) and remaining in the sewage sludge was neglected.
  Uncertainty: Estimation
- Water [water, unspecified]: 0.0150391 m3; lognormal variance with pedigree 0.1246, pedigree (2,4,5,5,4)
  Calculated based on literature data published by the GENDORF Chemical Park. The factory produced an average of 2462760 tonnes of chemical substances (including intermediates) per year in the years 2015-2019. The amount of water released back to the environment consists of the sum of the amount of process water treated in the internal WWTP that is then released back to the environment and the amount of cooling water released back to the environment. The average ouput of the internal WWTP in the years 2015-2019 was 2628800 m3 and that of cooling water released back to the environment was 34408800 m3. This gives a yearly average of 37037600 m3 emissions of water to water. This equals 0.01504 m3/kg chemical produced.
  References:
  Chemiepark GENDORF, Umwelterklärung 2016, https://www.gendorf.de/Nachbarn/Umweltschutz/Industrie%20und%20Nachhaltigkeit
  Chemiepark GENDORF, Umwelterklärung 2017, https://www.gendorf.de/Nachbarn/Umweltschutz/Industrie%20und%20Nachhaltigkeit
  Chemiepark GENDORF, Umwelterklärung 2020, https://www.gendorf.de/Nachbarn/Umweltschutz/Industrie%20und%20Nachhaltigkeit
  property fraction, origin: fresh water 0; name fraction_origin_fresh_water_Ww
  property fraction, origin: salt water 0; name fraction_origin_salt_water_Ww
  property fraction, origin: unspecified 1; name fraction_origin_unspecified_Ww

## Sampling procedure
Literature data

## Extrapolations
Emissions are modelled with standard methods.
