# printing ink production, rotogravure, product in 55% toluene solution state

Dataset: EcoSpold 2, unit process
Geography: RoW
Time period: 2000-01-01 to 2023-12-31
Technology level: current
Classification: EcoSpold01Categories: paintings/production
Classification: ISIC rev.4 ecoinvent: 2022:Manufacture of paints, varnishes and similar coatings, printing ink and mas
Tags: ConvertedDataset
Scenario: Business-as-Usual
System model: Allocation, cut-off by classification
Generated by: Roland Hischier
Published in: Hischier R. 2007
Database: ecoinvent
isCopyrightProtected: true
accessRestrictedTo: 1

## General comment
The functional unit represent 1 kg of printing color (black and colored mixed!) for the rotogravure printing sector.
[This dataset was already contained in the ecoinvent database version 2. It was not individually updated during the transfer to ecoinvent version 3. Life Cycle Impact Assessment results may still have changed, as they are affected by changes in the supply chain, i.e. in other datasets. This dataset was generated following the ecoinvent quality guidelines for version 2. It may have been subject to central changes described in the ecoinvent version 3 change report (http://www.ecoinvent.org/database/ecoinvent-version-3/reports-of-changes/), and the results of the central updates were reviewed extensively. The changes added e.g. consistent water flows and other information throughout the database. The documentation of this dataset can be found in the ecoinvent reports of version 2, which are still available via the ecoinvent website. The change report linked above covers all central changes that were made during the conversion process.]
[NEW TEXT for v3] The dataset represents solution. The solvent is NOT part of the dataset ... but needs to be added in order to have a full balance.

## Included activities end
Material inputs (solvents, binders, pigments) estimation of energy consumption. No emissions to air/water nor solid wastes included.

## Geography
Composition is based on information from a Swiss producer and the offset printing colour dataset.

## Technology
estimation, based on data from offset printing plus personal communications

## Parameters
- fraction, cooling water, cooling pond system, to air: 0.032 dimensionless; name fraction_CW_CP_to_air; lognormal variance with pedigree 0.0413, pedigree (2,3,1,3,1)
  Calculated based on literature value (Scown, C.D., 2011, Water Footprint of U.S. Transportation Fuels and supplying information of the article) (Vionnet, S., Quantis Water Database - Technical Report, 2012).
- fraction, cooling water, once-through system, to air: 0.004 dimensionless; name fraction_CW_OT_to_air; lognormal variance with pedigree 0.0413, pedigree (2,3,1,3,1)
  (same comment as for fraction, cooling water, cooling pond system, to air)
- fraction, cooling water, recirculating system, to air: 0.771 dimensionless; name fraction_CW_R_to_air; lognormal variance with pedigree 0.0413, pedigree (2,3,1,3,1)
  (same comment as for fraction, cooling water, cooling pond system, to air)
- fraction, cooling water, to air: 0.3875 dimensionless; name fraction_CW_to_air; = (0.5*fraction_CW_OT_to_air)+(0.5*fraction_CW_R_to_air); lognormal variance with pedigree 0.092025, pedigree (4,4,3,2,4)
  Calculated value based on literature value (see comments of the other parametres present in this dataset) and expert opinion. In the case when no industry/literature data are available about the type of cooling or directly fraction, cooling water, to air specific for the process a default assumption is applied. It is assumed that the once-through cooling system is used in 50% of all cases and recirculating system is used in another 50% of all cases.

## Reference product
- printing ink, rotogravure, without solvent, in 55% toluene solution state: 1 kg; By-product classification allocatable product; CPC 35130: Printing ink; HS2017 3215: Ink; printing, writing or drawing ink and other inks; whether or not concentrated or solid
  EcoSpold01Location=RER
  production volume 2.67763 kg
    This is a placeholder value that does not reflect real-world production volumes. This dataset does not currently require a real-world production volume to work in the database framework, and no actual data were collected yet. This has no negative effect on the results of the ecoinvent database.
  property carbon content, fossil 0.414587
    C content was calculated as an addition of C content in the raw materials.
  property carbon content, non-fossil 0.284447
    C content was calculated as an addition of C content in the raw materials.
  property heating value, net 21.18 MJ
    LHV is calculated based on the Carbon content of the product. More details can be found on the respective documentation.
  property price 6.9 EUR2005
    Calculated value based on data from United Nations Commodity Trade Statistics Database (comtrade.un.org). UN comtrade category: 321519 Printing ink, other than black. Year 2005. Using exchange rate of 1EURO = 1.209 USD. Average of price of import into 5 main markets (EU, US, JP, IN and CN).
  properties: carbon allocation 0.699034 kg, carbon content 0.699034, dry mass 1 kg, water content 0, water in wet mass 0 kg, wet mass 1 kg

## Inputs from technosphere
- alkyd resin, long oil, without solvent, in 70% white spirit solution state: 0.689 kg; lognormal variance with pedigree 0.1246, pedigree (3,3,5,5,4)
  Estimation, based on information from producer about offset
  EcoSpold01Location=RER
  Uncertainty: estimation, based on information from producer about offset
  properties: carbon content, fossil 0.268755, carbon content, non-fossil 0.412906, dry mass 1 kg, heating value, net 20.65 MJ, wet mass 1 kg
  note on carbon content, fossil: C content was calculated as an addition of C content in the raw materials.
- carbon black: 0.1555 kg; lognormal variance with pedigree 0.1246, pedigree (3,3,5,5,4)
  EcoSpold01Location=GLO
  Estimation, based on information from producer about offset
  Uncertainty: estimation, based on information from producer about offset
  properties: carbon content, fossil 0.85, dry mass 1 kg, heating value, net 25.76 MJ, wet mass 1 kg
- chemical factory, organics: 4e-10 unit; lognormal variance with pedigree 0.5, pedigree (5,5,5,5,5)
  Estimation
  EcoSpold01Location=RER
  Uncertainty: estimation
- electricity, medium voltage: 0.0259216, 0.517078, 0.173736, 0.00793808, 0.0015888, 0.000341151, 0.0533963 kWh (7 suppliers, which the file names only by identifier); sum of these 0.78 kWh; lognormal variance with pedigree 0.1246, pedigree (3,3,5,5,4)
  Estimation, based on information from producer about offset
  EcoSpold01Location=UCTE
  Uncertainty: estimation, based on information from producer about offset
- heat, district or industrial, natural gas: 0.0313638, 1.90864 MJ (2 suppliers, which the file names only by identifier); sum of these 1.94 MJ; lognormal variance with pedigree 0.1246, pedigree (3,3,5,5,4)
  (same comment as for alkyd resin, long oil, without solvent, in 70% white spirit solution s)
  properties: heating value, net 1 MJ
- heat, district or industrial, other than natural gas: 1.9391, 0.00089835 MJ (2 suppliers, which the file names only by identifier); sum of these 1.94 MJ; lognormal variance with pedigree 0.1246, pedigree (3,3,5,5,4)
  EcoSpold01Location=RER
  Estimation, based on information from producer about offset
  Uncertainty: estimation, based on information from producer about offset
  properties: heating value, net 1 MJ
- polyethylene terephthalate, granulate, amorphous: 0.1555 kg; lognormal variance with pedigree 0.1246, pedigree (3,3,5,5,4)
  (same comment as for alkyd resin, long oil, without solvent, in 70% white spirit solution s)
  properties: carbon content, fossil 0.625, dry mass 1 kg, heating value, net 22.95 MJ, wet mass 1 kg
  note on carbon content, fossil: Polymer of the ethylen terephtalate monomer (C10H8O4)n (ecoinvent v2.2 report 11_II), MW=192 g/mol

## Inputs from nature
- Water, cooling, unspecified natural origin [natural resource, in water]: 0.001667 m3; name water_cooling_UNO_input; lognormal variance with pedigree 0.1246, pedigree (3,3,5,5,4)
  Estimation, based on information from producer about offset
  Uncertainty: estimation, based on information from producer about offset

## Emissions to nature
- Water [air, unspecified]: 0.000645962 m3; name water_to_air_unspecified; = water_cooling_UNO_input*fraction_CW_to_air; lognormal variance with pedigree 0.0827, pedigree (2,2,5,5,1)
  Calculated value based on literature values and expert opinion. See comments in the parametres' comment field.
  property fraction, origin: fresh water 0; name fraction_origin_fresh_water
  property fraction, origin: salt water 0; name fraction_origin_salt_water
  property fraction, origin: unspecified 1; name fraction_origin_unspecified
- Water [water, unspecified]: 0.00102104 m3; name water_to_water_unspecified; = water_cooling_UNO_input*(1-fraction_CW_to_air); lognormal variance with pedigree 0.0827, pedigree (2,2,5,5,1)
  (same comment as for Water)
  property carbon content, fossil 0; name C_content_fossil
  property carbon content, non-fossil 0; name C_content_non_fossil
  property dry mass 0 kg; name DM
  property fraction, origin: fresh water 0; name fraction_origin_fresh_water_Ww
  property fraction, origin: salt water 0; name fraction_origin_salt_water_Ww
  property fraction, origin: unspecified 1; name fraction_origin_unspecified_Ww
  property water in wet mass 1000 kg; name WWM
  property wet mass 1000 kg; name WM

## Extrapolations
This dataset has been copied from an original dataset covering the geography RER. The uncertainty has been adjusted accordingly.

## Review by Hans-Jörg Althaus 2003-07-02
passed
