# power adapter production, for smartphone

Dataset: EcoSpold 2, unit process
Geography: GLO
Time period: 2007-01-01 to 2023-12-31
Technology level: current
Classification: ISIC rev.4 ecoinvent: 2710:Manufacture of electric motors, generators, transformers and electricity di
Synonyms: mobile charger, electronic power supply
Scenario: Business-as-Usual
System model: Allocation, cut-off by classification
Generated by: Johannes Müller
Database: ecoinvent
isCopyrightProtected: true
accessRestrictedTo: 1

## General comment
This activity represents the production of on unit of power adapter, for smartphone with a weight of 0.0597kg . The data is composed of a weighted average between switched-mode chargers and linear external power supplies. It is assumed that switched-mode chargers take up 80% of the market. The dataset does not include a cable to connect a device. For the production volume the sum of the production volumes of smartphones and tablet were used.
Source:
- V. Monier, S. Mudgal, L. Turunen, K. Schischke, C. Ciaglia, and N. F. Nissen, “Preparatory Studies for Eco-design Requirements of EuPs, Battery chargers and external power supplies, Final report,” 2007.

## Included activities start
From reception of materials and auxiliares at the factory gate.

## Included activities end
The activity includes the materials, processes, tap water and energy use (included through processing datasets) for the production of one mobile phone external power supply. The dataset includes the exchange "used IT accessory" to take into account the disposal. Data on factory, accessoires and packaging are not included.

## Geography
Geography GLO was chosen because the dataset aims to represent the production of an average electronic device.

## Technology
Production efforts for the processing of steel (sheet rolling), plastics (injection moulding), metals (metal working, average for copper product manufacturing) and the soldering of components to the printed wiring board (mounting, surface mount technology, Pb-free solder), water and energy use are included.

## Time period
Data for composition are from 2007 but represent current technology.

## Reference product
- power adapter, for smartphone: 1 unit; name RP; By-product classification allocatable product; CPC 46121: Electrical transformers; HS2017 850431: Electrical transformers; n.e.c. in item no. 8504.2, having a power handling capacity not exceeding 1kVA
  production volume 1.5601e9 unit; name PV_RP; = 1416000000+144100000
    Sum of sold Smartphones and Tablet in 2019.
    Smartphones (1.416e9): Units sold from 4Q18: 383E6, 1Q19: 311E6, 2Q19:346.3E6, 3Q19:375.2E6. Source: Trendforce Corp, (2019, January 29). Global Smartphone Market Cooling in 2019 with a YoY Decline of 10% in Production Volume, Says TrendForce [Press Release]. Retrieved from https://press.trendforce.com/press/20190129-3208.html, Trendforce Corp, (2019, May 16). Apple Fell to Number Three in 1Q19, While a Worsening US-China Trade Dispute May Add Insult to Injury, Says TrendForce [Press Release]. Retrieved from https://press.trendforce.com/press/20190516-3245.html, Trendforce Corp, (2019, November 28). Global Smartphone Production Volume Grows 9.2% in 3Q19, with Minor Projected Decline in 4Q19, Says TrendForce [Press Release]. Retrieved from https://press.trendforce.com/press/20191128-3313.html
    Tablets (144.1e6): IDC Worldwide Quarterly PCD Tracker (2020, January 30). Worldwide Tablet Shipments Continue to Decline in Q4 2019, According to IDC [Press Release]. Retrieved from https://www.idc.com/getdoc.jsp?containerId=prUS45959420
  property dry mass 0.0597 kg; = BP_used
  property price 1.63669 EUR2005
    Calculated based on inputs: The price of the product has been calculated as a sum of the values of the material and energy inputs for this product. This value is therefore a rough estimation. It may underestimate the real price since there are additional expenses when producing any product. These expences can include for example labour costs, treatment of waste materials and profit for the producer. Please consider carefully whether this level of data quality is acceptable for your application.
  properties: carbon allocation 0.0294016 kg, carbon content 0.492489, carbon content, fossil 0.492079, carbon content, non-fossil 0.000409144, water content 0, water in wet mass 0 kg, wet mass 0.0597 kg

## Inputs from technosphere
- acrylonitrile-butadiene-styrene copolymer: 0.0096 kg; name absc; lognormal variance with pedigree 0.0526, pedigree (1,4,5,5,3)
  Literature Value. Represents housing.
  properties: carbon content, fossil 0.853081, dry mass 1 kg, heating value, net 35.58 MJ, wet mass 1 kg
- capacitor, electrolyte type, < 2cm height: 0.0022 kg; lognormal variance with pedigree 0.0526, pedigree (1,4,5,5,3)
  Literature Value.
  properties: carbon content, fossil 0.189636, carbon content, non-fossil 0.0222053, dry mass 1 kg, wet mass 1 kg
- capacitor, for surface-mounting: 0.0001 kg; lognormal variance with pedigree 0.0526, pedigree (1,4,5,5,3)
  Literature Value.
  properties: dry mass 1 kg, wet mass 1 kg
- copper, cathode: 0.0018 kg; name copper; = 0.6*0.003; lognormal variance with pedigree 0.0526, pedigree (1,4,5,5,3)
  Literature Value. 60% Cu of 0.003kg CuZn38
  properties: dry mass 1 kg, wet mass 1 kg
- diode, glass-, for surface-mounting: 0.0013 kg; lognormal variance with pedigree 0.0526, pedigree (1,4,5,5,3)
  Literature Value.
  properties: carbon content, fossil 0.00928779, dry mass 1 kg, wet mass 1 kg
- electricity, medium voltage: 1.666 kWh; lognormal variance with pedigree 0.0526, pedigree (1,4,5,5,3)
  Literature Value. Production effort.
- ferrite: 0.0004 kg; lognormal variance with pedigree 0.0526, pedigree (1,4,5,5,3)
  Literature Value. Represents ferrite beads.
  properties: dry mass 1 kg, wet mass 1 kg
- inductor, ring core choke type: 0.0248 kg; lognormal variance with pedigree 0.0526, pedigree (1,4,5,5,3)
  Literature Value.
  properties: carbon content, fossil 0.445934, dry mass 1 kg, wet mass 1 kg
- injection moulding: 0.0237 kg; = pc+absc; lognormal variance with pedigree 0.0526, pedigree (1,4,5,5,3)
  Service representing the processing of plastics.
- integrated circuit, logic type: 0.0001 kg; lognormal variance with pedigree 0.0526, pedigree (1,4,5,5,3)
  Literature Value.
  properties: carbon content, fossil 0.221701, dry mass 1 kg, wet mass 1 kg
- metal working, average for copper product manufacturing: 0.003 kg; = zinc+copper; lognormal variance with pedigree 0.0526, pedigree (1,4,5,5,3)
  Service representing the processing of CuZn38
- mounting, surface mount technology, Pb-free solder: 0.000766871 m2; = pwb; lognormal variance with pedigree 0.0526, pedigree (1,4,5,5,3)
  Service representing the mounting of components on the printed wiring board.
- polycarbonate: 0.0120782, 0.00202179 kg (2 suppliers, which the file names only by identifier); sum of these 0.0141 kg; lognormal variance with pedigree 0.0526, pedigree (1,4,5,5,3)
  Literature Value. Represents housing.
  properties: carbon content, fossil 0.755906, dry mass 1 kg, heating value, net 29.57 MJ, wet mass 1 kg
- printed wiring board, for surface mounting, Pb free surface: 0.000766871 m2; name pwb; = 0.0025/3.26; lognormal variance with pedigree 0.0526, pedigree (1,4,5,5,3)
  Calculated Value. Converted to m2 with factor 3.26kg/m2 (dry mass of printed wiring board)
  properties: carbon content, fossil 0.109783, dry mass 3.26 kg, wet mass 3.26 kg
- resistor, metal film type, through-hole mounting: 0.0003 kg; lognormal variance with pedigree 0.0526, pedigree (1,4,5,5,3)
  Literature Value.
  properties: carbon content, fossil 0.029003, dry mass 1 kg, wet mass 1 kg
- resistor, surface-mounted: 0.0003 kg; lognormal variance with pedigree 0.0526, pedigree (1,4,5,5,3)
  Literature Value.
  properties: carbon content, fossil 0.00893558, dry mass 1 kg, wet mass 1 kg
- sheet rolling, chromium steel: 0.0006 kg; = steel; lognormal variance with pedigree 0.0526, pedigree (1,4,5,5,3)
  Service representing the processing of steel.
- steel, chromium steel 18/8, hot rolled: 0.0006 kg; name steel; = 0.0003+0.0003; lognormal variance with pedigree 0.0526, pedigree (1,4,5,5,3)
  Literature Value. Steel from housing (0.0003kg)+Heatsink(0.0003kg)
  properties: carbon content, fossil 0.0008, dry mass 1 kg, wet mass 1 kg
  note on carbon content, fossil: Stainless steel model is the grade 304 steel (18/8 stainless, 18% chromium 8% nickel; max. 0.08% C)
- tap water: 12 kg; lognormal variance with pedigree 0.0526, pedigree (1,4,5,5,3)
  Literature Value. Production effort.
  properties: carbon content, fossil 0.00178991, dry mass 0.000337476 kg, water content 2962.17, wet mass 1 kg
  note on carbon content, fossil: Bicarbonate content is 2.93 mol/m3. CO2 content is 0.1 mol/m3 (ecoinvent v2.2 report 8, Tab 93.1).
- transistor, surface-mounted: 0.0004 kg; lognormal variance with pedigree 0.0526, pedigree (1,4,5,5,3)
  Literature Value.
  properties: carbon content, fossil 0.083636, dry mass 1 kg, wet mass 1 kg
- used IT accessory: -0.0597 kg; name BP_used; lognormal variance with pedigree 0.0206, pedigree (1,4,4,5,3)
  Calculated Value. Sum of the weights of all inputs to dataset.
  production volume; = PV_RP * (BP_used/abs(RP))
    Calculated Value.
  properties: carbon content, fossil 0.470164, dry mass 1 kg, wet mass 1 kg
- zinc: 0.0012 kg; = 0.4*0.003; lognormal variance with pedigree 0.0526, pedigree (1,4,5,5,3)
  Literature Value. 40% Zn of 0.003kg CuZn38
  properties: dry mass 1 kg, wet mass 1 kg

## Sampling procedure
Information on the included materials are obtained through the bill of materials directly from manufacturers or through dismantling and weighing of the components.

## Extrapolations
The dataset represents a weighted average between four different power adapter. 80% of the data is composed of three switched-mode chargers, each representing 26.7% of the data. The remaining 20% is composed of one linear power supply.
