# drying, sewage sludge

Dataset: EcoSpold 2, unit process
Geography: RoW
Time period: 2013-01-01 to 2023-12-31
Technology level: current
Classification: ISIC rev.4 ecoinvent: 3821:Treatment and disposal of non-hazardous waste
Scenario: Business-as-Usual
System model: Allocation, cut-off by classification
Generated by: [System]
Database: ecoinvent
isCopyrightProtected: true
accessRestrictedTo: 1

## General comment
The dataset contains the drying of raw sludge with a dry matter content of 5% up to 92%. The drying includes mechanical dewatering followed by thermal drying. Dried sewage sludge could be used as fertilizer or as alternative fuel and raw material in the clinker production.
The total heat demand for drying of mechanically dewatered sewage sludge (30% dry mass) to dried sewage sludge (92% dry mass) is 340.489 MJ per m3 raw sewage sludge input (5% dry mass). The heat demand is assumed to be covered to 50% by natural gas, 30% light fuel oil, 10% heat from borehole heat pump, and to 10% from waste heat. These values are based on calculation tool from ESU Services [ESU_SewageSludgeDrying.xls] which uses Vetter & Burger, 2006 as reference for energy requirements.

## Included activities start
The activity starts with the raw sewage sludge in a silo.

## Included activities end
The activity ends with the dried sewage sludge ready to be shiped; infrastructure is disregarded.

## Reference product
- raw sewage sludge: -1 kg; name m_sludge_raw; = -m_sludge_dried*(1-0.08)/(1-0.95); By-product classification Waste; CPC 39920: Sewage sludge; HS2017 382520: Residual products of the chemical or allied industries, not elsewhere specified or included; sewage sludge
  scaling the reduction in water content of 95% to 8% to 1 kg output
  production volume 4.83226e9 kg; name p_sludge_raw; = 46000000/685434*72689734
    extrapolated from Swiss production volumes via Global/Swiss GDP
  property heating value, net 3.2 MJ
    Value taken from the general comment of the treatment dataset.
  property price 0 EUR2005
    Waste products are assigned a price of zero as they are assumed to require further treatment.
  properties: carbon allocation 0.02048 kg, carbon content 0.4096, carbon content, fossil 0, carbon content, non-fossil 0.4096, dry mass 0.05 kg, water content 19, water in wet mass 0.95 kg, wet mass 1 kg

## Inputs from technosphere
- electricity, medium voltage: 6.28505e-5, 0.00125373, 0.000421248, 1.9247e-5, 3.85226e-6, 8.27167e-7, 8.75439e-5, 0.000129467, 0.000271237 kWh (9 suppliers, which the file names only by identifier); sum of these 0.00225 kWh; = (ABS(m_sludge_raw)-ABS(m_sludge_raw)*(1-0.95)/0.3)*2.7/1000; source Vetter, H. 2006; lognormal variance with pedigree 0.4706, pedigree (2,5,5,5,5)
  The electricity demand represents the electricity requirements for mechanical dewatering of raw sewage sludge of 2.7 kWh/t of removed water, dewatered from 5% dry mass to 30% dry mass. This value is based on Vetter & Burger (2006) as reference for energy requirements.
- heat, district or industrial, natural gas: 0.00205581, 0.125106, 0.0462022 MJ (3 suppliers, which the file names only by identifier); sum of these 0.173364 MJ; = (ABS(m_sludge_raw)*(1-0.95)/0.3-ABS(m_sludge_dried))*(1000+715)/2/1000*3.6*0.5; source Vetter, H. 2006; lognormal variance with pedigree 0.3426, pedigree (2,1,5,5,1)
  Heat required for the dewatering of mechanically dried sludge (dry matter content of 30%) to dried sewage sludge with a dry matter content of 95%. The heat requirement lies between 715 kWh and 1000 kWh per t of removed water, converted to MJ with 3.6 MJ/kWh. 50% of the required heat are covered with fuel oil, 50% with heat from composting gas and heat pumps.
  properties: heating value, net 1 MJ
- heat, district or industrial, other than natural gas: 0.168986, 7.82879e-5, 0.00430017 MJ (3 suppliers, which the file names only by identifier); sum of these 0.173364 MJ; = (ABS(m_sludge_raw)*(1-0.95)/0.3-ABS(m_sludge_dried))*(1000+715)/2/1000*3.6*0.5; source Vetter, H. 2006; lognormal variance with pedigree 0.3426, pedigree (2,1,5,5,1)
  (same comment as for heat, district or industrial, natural gas)
  properties: heating value, net 1 MJ
- sewage sludge, dried: -0.0543478 kg; name m_sludge_dried
  production volume; = p_sludge_raw*0.05/0.92
    Conversion of the use of raw sludge in cement kilns by scaling down the input from a water content of 95% to 8%.
  property dry mass 0.92 kg; name dm
  property water in wet mass 0.08 kg; name wwm
  properties: carbon content, non-fossil 0.4096, heating value, net 11.6 MJ, water content 0.0869565, wet mass 1 kg
- wastewater, average: -0.000760978, -0.000181965, -2.70937e-6 m3 (3 suppliers, which the file names only by identifier); sum of these -0.000945652 m3; = (ABS(m_sludge_raw)-m_sludge_dried)/1000; source Vetter, H. 2006
  converting the difference in weight as water loss from kg to m3; the selected intermediate exchange is used as a proxy due to the lack of data on the process specific composition of the waste water.
  production volume; = ABS(p_sludge_raw/m_sludge_raw*m_waste_water)
    extrapolated from Swiss production volumes via Global/Swiss GDP
  properties: carbon content, non-fossil 0.194039, dry mass 0.346837 kg, water content 2882.2, wet mass 1000 kg
  note on carbon content, non-fossil: 0.0673 kg TOC/m3 (Tab A.17, ecoinvent v2.2 report 13_I). TOC was considered as Total Carbon.

## Sampling procedure
Literature
