# cement production, Portland

Dataset: EcoSpold 2, unit process
Geography: RoW
Time period: 2005-01-01 to 2023-12-31
Technology level: current
Classification: ISIC rev.4 ecoinvent: 2394:Manufacture of cement, lime and plaster
Synonyms: Portland cement; CEM I
Scenario: Business-as-Usual
System model: Allocation, cut-off by classification
Generated by: [System]
Database: ecoinvent
isCopyrightProtected: true
accessRestrictedTo: 1

## General comment
The dataset describes the production of Portland cement (CEM I) for the GLO geography.

## Included activities start
The activity starts with the reception of raw materials in the cement plant. In plants which are integrated with clinker production, clinker is stored in the silo after cooling in the upstream process.

## Included activities end
This activity ends with the Portland cement produced in the cement mill. The dataset does not include packaging and administration.

## Geography
This dataset is a weighted average built from the following geographies: IN, US, Europe without Switzerland, PE, TN, CA-QC, ZA, BR, CH.

## Technology
To produce the Portland cement, the clinker (>90%) is ground with gypsum and with other materials, such as limestone.

## Time period
This dataset is considered valid from the earliest start date (2005) until the latest end date (2022) of the regional datasets with the same activity name.

## Reference product
- cement, Portland: 1 kg; name RP; By-product classification allocatable product; CPC 37440: Portland cement, aluminous cement, slag cement and similar hydraulic cements, except in the form of clinkers; HS2017 252329: Cement; portland, other than white, whether or not artificially coloured; CAS 65997-15-1
  The amount of this exchange is calculated as a weighted average of the IN, US, Europe without Switzerland, PE, TN, CA-QC, ZA, BR and CH datasets, according to their production volumes. For more details, please consult the regional datasets with same activity name.
  production volume 1.70761e12 kg; name PV_RP; = 4130000*10^6*0.4773
    Total global production volume of hydraulic cement in 2019: 4'130'000'000 ton. Source: USGS (2019). U.S. Geological Survey, Minerals Yearbook Annual Tables, 2019. Available at: https://www.usgs.gov/centers/national-minerals-information-center/cement-statistics-and-information
    Market share of Portland cement of 47.73% was estimated from global production volume amounts of hydraulic cement (4.4E+12 kg) (USGS, 2022) and of Portland cement in (2.1E+12 kg) (IMARC Group, 2022) in 2021. Sources: U.S. Geological Survey, Mineral Commodity Summaries, January 2022. Available at: https://pubs.usgs.gov/periodicals/mcs2022/mcs2022-cement.pdf IMARC Group. Portland Cement Market: Global Industry Trends, Share, Size, Growth, Opportunity and Forecast 2022-2027. Available at: https://www.imarcgroup.com/portland-cement-market
  property price 0.0541 EUR2005
    2005 import and export prices (total trades (USD) divided by total weight (kg) in China, India, USA, Japan, Russia and Europe, major producers and consumers (http://www.cementchina.net/freport/showfre.asp?id=749) from UN Commodity Trade Statistics Database (http://data.un.org/Explorer.aspxDatabase [Accessed 2 July 2010]). Commodity: Portland cement, other than white cement
  properties: carbon allocation 0 kg, carbon content 0, carbon content, fossil 0, carbon content, non-fossil 0, dry mass 1 kg, water content 0, water in wet mass 0 kg, wet mass 1 kg

## Inputs from technosphere
- cement factory: 5.33694e-11 unit; lognormal variance with pedigree 0.366, pedigree (4,5,5,5,3)
  (same comment as for cement, Portland)
- clinker: 0.00572456, 0.911957, 0.00439218 kg (3 suppliers, which the file names only by identifier); sum of these 0.922074 kg; lognormal variance with pedigree 0.2106, pedigree (5,5,5,5,5)
  (same comment as for cement, Portland)
  properties: dry mass 1 kg, wet mass 1 kg
- diethylene glycol: 5.78782e-6 kg; lognormal variance with pedigree 0.3009, pedigree (2,2,2,5,1)
  (same comment as for cement, Portland)
  properties: carbon content, fossil 0.45283, dry mass 1 kg, heating value, net 25.14 MJ, wet mass 1 kg
- electricity, medium voltage: 4.32771e-6, 4.90326e-5, 0.000492922, 6.25251e-5, 2.18772e-6, 5.56109e-6, 5.09796e-5, 0.000484867, 2.1538e-6, 0.000635371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 kWh (92 suppliers, which the file names only by identifier); sum of these 0.0418542 kWh; lognormal variance with pedigree 0.0336, pedigree (3,3,4,5,1)
  (same comment as for cement, Portland)
- ethylene glycol: 0.000187452 kg; lognormal variance with pedigree 0.0606, pedigree (3,5,5,5,3)
  (same comment as for cement, Portland)
  properties: carbon content, fossil 0.387097, dry mass 1 kg, heating value, net 23.44 MJ, wet mass 1 kg
- gypsum, mineral: 0.0465502 kg; lognormal variance with pedigree 0.0386, pedigree (3,3,4,5,1)
  (same comment as for cement, Portland)
  properties: dry mass 1 kg, wet mass 1 kg
- heat, district or industrial, natural gas: 4.41102e-5 MJ; lognormal variance with pedigree 3.0999, pedigree (2,2,2,5,1)
  (same comment as for cement, Portland)
  properties: heating value, net 1 MJ
- heat, district or industrial, other than natural gas: 0.000135926 MJ; lognormal variance with pedigree 2.2249, pedigree (2,2,2,5,1)
  (same comment as for cement, Portland)
  properties: heating value, net 1 MJ
- iron sulfate: 4.32572e-6 kg; lognormal variance with pedigree 0.0106, pedigree (1,1,4,5,1)
  (same comment as for cement, Portland)
  properties: dry mass 1 kg, wet mass 1 kg
- limestone, crushed, for mill: 0.0311388 kg; lognormal variance with pedigree 0.026, pedigree (3,4,4,5,1)
  (same comment as for cement, Portland)
  properties: carbon content, fossil 0.117492, dry mass 0.998 kg, water content 0.00200401, wet mass 1 kg
- lubricating oil: 9.36583e-8 kg; lognormal variance with pedigree 0.711, pedigree (5,5,5,5,5)
  (same comment as for cement, Portland)
  properties: carbon content, fossil 0.75, dry mass 1 kg, heating value, net 40.2 MJ, wet mass 1 kg
  note on carbon content, fossil: Lubricating oil is produced from diesel. C-content/dry mass of fats and oils considered 75%, from: ecoinvent v2.2 report, n 15a, pg 40
  note on heating value, net: Literature value, Source: IPCC 2006, 2006 IPCC Guidelines for National Greenhouse Gas Inventories, Prepared by the National Greenhouse Gas Inventories Programme, Eggleston H.S., Buendia L., Miwa K., Ngara T. and Tanabe K. (eds). Published: IGES, Japan
- sand: 0.000218185 kg; lognormal variance with pedigree 0.0048, pedigree (1,4,2,5,1)
  (same comment as for cement, Portland)
  properties: dry mass 1 kg, wet mass 1 kg
- scrap steel: -3.12326e-6 kg; name BP_1; lognormal variance with pedigree 0.615, pedigree (5,5,5,5,5)
  (same comment as for cement, Portland)
  production volume; = PV_RP*BP_1/RP
    Calculated from the production volume of the reference product in proportion to the respective output amounts.
  properties: dry mass 1 kg, wet mass 1 kg
- steel, low-alloyed: 0.000108222 kg; lognormal variance with pedigree 0.615, pedigree (5,5,5,5,5)
  (same comment as for cement, Portland)
  properties: carbon content, fossil 0.005, dry mass 1 kg, wet mass 1 kg
- synthetic rubber: 7.69955e-8 kg; lognormal variance with pedigree 0.6689, pedigree (2,2,2,5,1)
  (same comment as for cement, Portland)
  properties: carbon content, fossil 0.871949, dry mass 1 kg, heating value, net 26.42 MJ, wet mass 1 kg
  note on carbon content, fossil: EPDM (Ethylene-propene-diene terpolymer) rubber is a terpolymer of ethylene, propene, and a diene with the residual unsaturated portion of the diene in the side chain (ecoinvent v2.2 report 7-part XX & Ullmann). Chemical formula (deduced from Evidences of Solvent-Induced Miscibility in Polychloroprene-co-Ethylene-Propene Diene Terpolymer Blends, Dubey et al., Journal of Applied Polymer Science, 2009, 111:1884–1891): C20H35
- tap water: 4.39137e-8, 1.26718e-5 kg (2 suppliers, which the file names only by identifier); sum of these 1.27157e-5 kg; lognormal variance with pedigree 0.6809, pedigree (2,2,2,5,1)
  (same comment as for cement, Portland)
  properties: carbon content, fossil 0.00178991, dry mass 0.000337476 kg, water content 2962.17, wet mass 1 kg
  note on carbon content, fossil: Bicarbonate content is 2.93 mol/m3. CO2 content is 0.1 mol/m3 (ecoinvent v2.2 report 8, Tab 93.1).
- waste mineral oil: -9.36583e-8 kg; name BP_2; lognormal variance with pedigree 0.711, pedigree (5,5,5,5,5)
  (same comment as for cement, Portland)
  production volume; = PV_RP*BP_2/RP
    (same comment as for scrap steel)
  properties: carbon content, fossil 0.864444, dry mass 0.9 kg, heating value, net 34.7 MJ, water content 0.111111, wet mass 1 kg
  note on carbon content, fossil: Tab A.6, ecoinvent v2.2 report 13_I. C content has been calculated after data in the tables, and then referred to 1 kg DM
  note on heating value, net: Value taken from the general comment of the treatment dataset.
- waste rubber, unspecified: -7.69955e-8 kg; name BP_3; lognormal variance with pedigree 0.6687, pedigree (2,2,1,5,1)
  (same comment as for cement, Portland)
  production volume; = PV_RP*BP_3/RP
    (same comment as for scrap steel)
  properties: carbon content, fossil 0.853, dry mass 1 kg, heating value, net 27.19 MJ, wet mass 1 kg
- wastewater, average: -1.27157e-8 m3; name BP_4; lognormal variance with pedigree 0.6807, pedigree (2,2,1,5,1)
  (same comment as for cement, Portland)
  production volume; = PV_RP*BP_4/RP
    (same comment as for scrap steel)
  properties: carbon content, non-fossil 0.194039, dry mass 0.346837 kg, mass concentration, TOC 0.1091 kg/m3, mass concentration, calcium 0.039453 kg/m3, mass concentration, chlorine 0.030031 kg/m3, mass concentration, hydrogen 0.013365 kg/m3, mass concentration, nitrogen 0.031015 kg/m3, mass concentration, oxygen 0.069824 kg/m3, mass concentration, sodium 0.06456 kg/m3, mass concentration, sulfur 0.015602 kg/m3, water content 2882.2, wet mass 1000 kg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
  note on carbon content, non-fossil: 0.0673 kg TOC/m3 (Tab A.17, ecoinvent v2.2 report 13_I). TOC was considered as Total Carbon.
- water, harvested from rainwater: 3.48146e-5 kg; lognormal variance with pedigree 1.6319, pedigree (2,2,2,5,1)
  (same comment as for cement, Portland)
  properties: carbon content, fossil 0.0017899, dry mass 0.00034 kg, water content 2940.2, wet mass 1 kg

## Inputs from nature
- Water, river [natural resource, in water]: 1.08741e-6 m3; lognormal variance with pedigree 0.2769, pedigree (2,2,2,5,1)
  (same comment as for cement, Portland)
- Water, unspecified natural origin [natural resource, in water]: 1.78019e-8 m3; lognormal variance with pedigree 1.7189, pedigree (2,2,2,5,1)
  (same comment as for cement, Portland)
- Water, well, in ground [natural resource, in water]: 4.95472e-7 m3; lognormal variance with pedigree 0.4169, pedigree (2,2,2,5,1)
  (same comment as for cement, Portland)

## Emissions to nature
- Heat, waste [air, unspecified]: 0.102564 MJ; lognormal variance with pedigree 0.068, pedigree (3,5,4,5,3)
  (same comment as for cement, Portland)
- Water [air, unspecified]: 1.64191e-6 m3; lognormal variance with pedigree 0.1108, pedigree (2,4,2,5,1)
  (same comment as for cement, Portland)

## Sampling procedure
This dataset was built as a weighted average of regional datasets of the same activityName. Weights are based on production volumes.
IN: production volume = 9.46e+10 kg/year, weight = 0.359
US: production volume = 8.63e+10 kg/year, weight = 0.3274
Europe without Switzerland: production volume = 6.47e+10 kg/year, weight = 0.2454
PE: production volume = 4.44e+09 kg/year, weight = 0.01685
TN: production volume = 3.92e+09 kg/year, weight = 0.01486
CA-QC: production volume = 3.57e+09 kg/year, weight = 0.01355
ZA: production volume = 3.48e+09 kg/year, weight = 0.01321
BR: production volume = 2.31e+09 kg/year, weight = 0.008769
CH: production volume = 2.38e+08 kg/year, weight = 0.0009031

## Extrapolations
This dataset was built as a weighted average of regional datasets of the same activityName. See sampling procedure for details.
Uncertainty has been adjusted accordingly.
