# paper production, newsprint, recycled

Dataset: EcoSpold 2, unit process
Geography: CH
Time period: 2012-01-01 to 2023-12-31
Technology level: current
Classification: ISIC rev.4 ecoinvent: 1701:Manufacture of pulp, paper and paperboard
Classification: EcoSpold01Categories: paper & cardboard/graphic paper
Scenario: Business-as-Usual
System model: Allocation, cut-off by classification
Share of production covered: 100 %
Generated by: Melanie Haupt
Published in: Melanie Haupt 2018
Database: ecoinvent
isCopyrightProtected: true
accessRestrictedTo: 1

## General comment
This process represents the production of newsprint in Switzerland from sorted waste paper, i.e. including some deinked pulp (DIP). The process comprises wood handling, mechanical pulping and bleaching, deinking of waste paper, paper production, energy production on-site (including energy recovery from internal residues) and internal wastewater treatment. The input of waste paper is sourced from small businesses and households and brought either directly to the paper recycling plants or to intermediate recyclers and sorters. Sorting of incoming paper and the by-products connected to this has been excluded, since sorting of unsorted waste paper is modeled in a separate activity. Besides paper for recovery, softwood, either as thinning wood from forest, or as chips from wood industry, is the main raw material used for the production of newsprint in Switzerland. Not included is the transport of waste paper and other process inputs to the paper mill.
Reference: M. Haupt et al. (2018), Life cycle inventories of waste management processes, Data in Brief 19 (2018) 1441-1457. DOI: https://doi.org/10.1016/j.wasman.2018.03.035

## Included activities start
The activity starts with "waste paper, sorted" being available to the recycling facility.

## Included activities end
The activity ends with "waste paper, sorted" being recycled and "paper, newsprint" available for transportation at the gates of the recycling facility.

## Geography
Data are sourced from plants located or activities taking place in Switzerland and/or relevant literature sources.

## Technology
Technology encountered in CH for the underlined time frame.

## Time period
Data refer to a study performed in 2012.

## Parameters
- fraction, cooling water, cooling pond system, to air: 0.032 dimensionless; name fraction_CW_CP_to_air; lognormal variance with pedigree 0.0413, pedigree (2,3,1,3,1)
  Calculated based on literature value (Scown, C.D., 2011, Water Footprint of U.S. Transportation Fuels and supplying information of the article) (Vionnet, S., Quantis Water Database - Technical Report, 2012).
- fraction, cooling water, once-through system, to air: 0.004 dimensionless; name fraction_CW_OT_to_air; lognormal variance with pedigree 0.0413, pedigree (2,3,1,3,1)
  (same comment as for fraction, cooling water, cooling pond system, to air)
- fraction, cooling water, recirculating system, to air: 0.771 dimensionless; name fraction_CW_R_to_air; lognormal variance with pedigree 0.0413, pedigree (2,3,1,3,1)
  (same comment as for fraction, cooling water, cooling pond system, to air)
- fraction, cooling water, to air: 0.3875 dimensionless; name fraction_CW_to_air; = (0.5*fraction_CW_OT_to_air)+(0.5*fraction_CW_R_to_air); lognormal variance with pedigree 0.092025, pedigree (4,4,3,2,4)
  Calculated value based on literature value (see comments of the other parametres present in this dataset) and expert opinion. In the case when no industry/literature data are available about the type of cooling or directly fraction, cooling water, to air specific for the process a default assumption is applied. It is assumed that the once-through cooling system is used in 50% of all cases and recirculating system is used in another 50% of all cases.
- fraction, process water, to air: 0.15 dimensionless; name fraction_PW_to_air; lognormal variance with pedigree 0.092025, pedigree (4,4,3,2,4)
  Literature value. In case when no industry/process specific data are available, default evaporation fraction value is used. This value is 15% and is based on literature (Statistics Canada, 2007 & Shaffer, K.H., 2008, Consumptive water use in the Great Lakes Basin, USGS & Shiklomanov, 2003, World Water Resources at the Beginning of the 21st Century) and has been approved by an expert.

## Reference product
- paper, newsprint: 1 kg; name RP; By-product classification allocatable product; CPC 32121: Newsprint; HS2017 4802: Uncoated paper and paperboard, used for writing, printing or other graphics, non perforated punch-cards and p[...]
  production volume 3.53e8 kg; name PV_RP
    Based on Haupt et al., the amount of fibres recovered for paper production is reported to be 353 000 tonnes. The values is found in figure 5, "MFA of paper and cardboard recycling in Switzerland 2012"
    Reference: Haupt, Melanie & Vadenbo, Carl & Hellweg, Stefanie. (2017). Do We Have the Right Performance Indicators for the Circular Economy?: Insight into the Swiss Waste Management System. Journal of Industrial Ecology. vol. 21, no. 3, pp. 615-627.
  property carbon content, fossil 0.0116283; name RP_C_content_fossil
    fossil carbon content on a dry matter basis
  property carbon content, non-fossil 0.482; name RP_C_content_non_fossil
    biogenic carbon content on a dry matter basis, estimated based on composition of input materials (sortet waste paper, pulpwood and fillers)
  property dry mass 0.945 kg; name RP_DM
  property price 0.433 EUR2005
    Export prices for the World+ according to: http://faostat.fao.org/site/626/DesktopDefault.aspx?PageID=626#ancor downloaded 27 April 2009; calculated as export value divided by export volume.
  property water content 0.0582011; name RP_water_content
  property water in wet mass 0.055 kg; name RP_WWM
  property wet mass 1 kg; name RP_WM
  properties: carbon allocation 0.466479 kg, carbon content 0.493628, heating value, net 14.11 MJ

## Inputs from technosphere
- DTPA, diethylenetriaminepentaacetic acid: 0.000582526 kg; lognormal variance with pedigree 0.0092, pedigree (2,1,4,1,1)
  Data collected for the two large newsprint paper mills in operation in Switzerland. Both are integrated mills, producing their own deinked pulp from waste paper and their own mechanical pulp from primary materials. Main raw material in both cases is waste paper (post-consumer or productin resdiues). For more detail see the supporting information in M. Haupt et al. (2018), Life cycle inventories of waste management processes, Data inBrief19(2018)1441-1457.
  properties: carbon content, fossil 0.427481, dry mass 1 kg, heating value, net 12.95 MJ, wet mass 1 kg
  note on carbon content, fossil: Fossil C content was calculated after fossil C contents of chemicals used in the production of the paper (in Tab 8.6 ecoinvent v2.2 report 11_III, part 8). C14H23N3O10
- EDTA, ethylenediaminetetraacetic acid: 0.00041967 kg; lognormal variance with pedigree 0.0092, pedigree (2,1,4,1,1)
  (same comment as for DTPA, diethylenetriaminepentaacetic acid)
  properties: carbon content, fossil 0.410959, dry mass 1 kg, heating value, net 19.09 MJ, wet mass 1 kg
  note on carbon content, fossil: Fossil C content was calculated after fossil C contents of chemicals used in the production of the paper (in Tab 8.6 ecoinvent v2.2 report 11_III, part 8). C10H16N2O8
- aluminium sulfate, powder: 0.00195871 kg; lognormal variance with pedigree 0.0092, pedigree (2,1,4,1,1)
  (same comment as for DTPA, diethylenetriaminepentaacetic acid)
  properties: dry mass 1 kg, wet mass 1 kg
- ash from deinking sludge: -0.0154798 kg; name BP1; lognormal variance with pedigree 0.0012, pedigree (2,1,1,1,1)
  Data collected for the two large newsprint paper mills in operation in Switzerland. Both are integrated mills, producing their own deinked pulp from waste paper and their own mechanical pulp from primary materials. Main raw material in both cases is waste paper (post-consumer or productin resdiues). The energy production located on paper mill sites is not only based on internal residues but also includes residues from other processes. For more detail see the supporting information in M. Haupt et al. (2018), Life cycle inventories of waste management processes, Data in Brief 19 (2018) 1441-1457. https://doi.org/10.1016/j.wasman.2018.03.035
  production volume; = PV_RP/RP*BP1
    Calculated based on the production volume of the reference product.
  property carbon content, fossil 0; name BP1_C_content_fossil
  property carbon content, non-fossil 0; name BP1_C_content_non_fossil
  property dry mass 1 kg; name BP1_DM
  property water content 0; name BP1_water_content
  property water in wet mass 0 kg; name BP1_WWM
  property wet mass 1 kg; name BP1_WM
- bentonite: 0.000507814 kg; lognormal variance with pedigree 0.0092, pedigree (2,1,4,1,1)
  (same comment as for DTPA, diethylenetriaminepentaacetic acid)
- chemical, inorganic: 0.00773739 kg; lognormal variance with pedigree 0.0092, pedigree (2,1,4,1,1)
  (same comment as for DTPA, diethylenetriaminepentaacetic acid)
- chemical, organic: 0.00523096 kg; lognormal variance with pedigree 0.0092, pedigree (2,1,4,1,1)
  (same comment as for DTPA, diethylenetriaminepentaacetic acid)
  properties: carbon content, fossil 0.628, dry mass 1 kg, heating value, net 19.03 MJ, wet mass 1 kg
  note on carbon content, fossil: Fossil C content was calculated after fossil C contents of chemicals used in the production of the paper (in Tab 8.6 ecoinvent v2.2 report 11_III, part 8). This dataset is an unweighted average of 20 organic substances (listed in Tab 88.1, ecoinvent v2.2 report 8, part II), being part of the top100 chemicals included in this database. The C-content has also been calculated as an unweighted average of the C content of the substances composing this dataset.
- deinking emulsion, in paper production: 0.000338241 kg; lognormal variance with pedigree 0.0092, pedigree (2,1,4,1,1)
  (same comment as for DTPA, diethylenetriaminepentaacetic acid)
  properties: carbon content, fossil 0.00369863, carbon content, non-fossil 0.078, dry mass 1 kg, heating value, net 2.48 MJ, wet mass 1 kg
  note on carbon content, fossil: Fossil C content was calculated after fossil C contents of chemicals used in the production of the paper (in Tab 8.6 ecoinvent v2.2 report 11_III, part 8). Mixture of hydrogen peroxide (0.217), sodium hydroxide (0.258), silica (0.412) and fatty acid (0.104), and EDTA (0.009)
  note on carbon content, non-fossil: Biogenic C content was calculated after biogenic C contents of chemicals used in the production of the paper (in Tab 8.6 ecoinvent v2.2 report 11_III, part 8). The cellulose content in 1 kg of paper (on a wet mas basis) was estimated as (1-chemical content), C content of cellulose was considered 0.44 kgC/kg dry mass (ecoinvent v2.2 report, n 15a, pg 40) Mixture of hydrogen peroxide (0.217), sodium hydroxide (0.258), silica (0.412) and fatty acid (0.104), and EDTA (0.009)
- electricity, high voltage: 0.0203364 kWh; lognormal variance with pedigree 0.0092, pedigree (2,1,4,1,1)
  (same comment as for DTPA, diethylenetriaminepentaacetic acid)
- electricity, medium voltage: 1.08399 kWh; lognormal variance with pedigree 0.0092, pedigree (2,1,4,1,1)
  (same comment as for DTPA, diethylenetriaminepentaacetic acid)
- fatty acid: 0.00223085 kg; lognormal variance with pedigree 0.0092, pedigree (2,1,4,1,1)
  (same comment as for DTPA, diethylenetriaminepentaacetic acid)
  properties: carbon content, non-fossil 0.75, dry mass 1 kg, heating value, net 22.73 MJ, wet mass 1 kg
  note on carbon content, non-fossil: Biogenic C content was calculated after biogenic C contents of chemicals used in the production of the paper (in Tab 8.6 ecoinvent v2.2 report 11_III, part 8). The cellulose content in 1 kg of paper (on a wet mas basis) was estimated as (1-chemical content), C content of cellulose was considered 0.44 kgC/kg dry mass (ecoinvent v2.2 report, n 15a, pg 40) C-content/dry mass of fats and oils considered 75%, from: ecoinvent v2.2 report, n 15a, pg 40
- heavy fuel oil: 0.00101 kg; lognormal variance with pedigree 0.0092, pedigree (2,1,4,1,1)
  (same comment as for DTPA, diethylenetriaminepentaacetic acid)
  properties: carbon content, fossil 0.849, dry mass 1 kg, heating value, net 41.2 MJ, wet mass 1 kg
  note on carbon content, fossil: Fossil C content was calculated after fossil C contents of chemicals used in the production of the paper (in Tab 8.6 ecoinvent v2.2 report 11_III, part 8). C-content is 84.9% (ecoinvent v2.2 report 6_IV, Tab 3.18)
- hydrogen peroxide, without water, in 50% solution state: 0.0132435 kg; lognormal variance with pedigree 0.0092, pedigree (2,1,4,1,1)
  (same comment as for DTPA, diethylenetriaminepentaacetic acid)
  properties: dry mass 1 kg, heating value, net 7.13 MJ, wet mass 1 kg
- inert waste, for final disposal: -0.00226628 kg; name BP4; lognormal variance with pedigree 0.0012, pedigree (2,1,1,1,1)
  Non-paper materials in the waste paper input, sorted out on-site and dischared as inert waste or municipal solid waste.
  production volume; = PV_RP/RP*BP4
    Calculated based on the production volume of the reference product.
  property carbon content, fossil 0; name BP4_C_content_fossil
  property carbon content, non-fossil 0; name BP4_C_content_non_fossil
  property dry mass 0.995 kg; name BP4_DM
  property water content 0.00502513; name BP4_water_content
  property water in wet mass 0.005 kg; name BP4_WWM
  property wet mass 1 kg; name BP4_WM
- light fuel oil: 0.000313036 kg; lognormal variance with pedigree 0.0092, pedigree (2,1,4,1,1)
  (same comment as for DTPA, diethylenetriaminepentaacetic acid)
  properties: heating value, net 42.6 MJ
- lime: 0.00503211 kg; lognormal variance with pedigree 0.0092, pedigree (2,1,4,1,1)
  (same comment as for DTPA, diethylenetriaminepentaacetic acid)
- malusil: 0.00188617 kg; lognormal variance with pedigree 0.0092, pedigree (2,1,4,1,1)
  (same comment as for DTPA, diethylenetriaminepentaacetic acid)
  properties: dry mass 1 kg, wet mass 1 kg
- municipal solid waste: -0.0185333 kg; name BP5; lognormal variance with pedigree 0.0173, pedigree (4,3,4,3,1)
  (same comment as for inert waste, for final disposal)
  production volume; = PV_RP/RP*BP5
    Calculated based on the production volume of the reference product.
  property carbon content, fossil 0.171549; name BP5_C_content_fossil
  property carbon content, non-fossil 0.261655; name BP5_C_content_non_fossil
  property dry mass 0.771 kg; name BP5_DM
  property water content 0.297017; name BP5_water_content
  property water in wet mass 0.229 kg; name BP5_WWM
  property wet mass 1 kg; name BP5_WM
  properties: heating value, net 11.74 MJ
  note on heating value, net: Value taken from the general comment of the treatment dataset.
- naphtha: 8.26523e-5 kg; lognormal variance with pedigree 0.0092, pedigree (2,1,4,1,1)
  (same comment as for DTPA, diethylenetriaminepentaacetic acid)
  properties: heating value, net 45 MJ
- natural gas, high pressure: 0.0933719 m3; lognormal variance with pedigree 0.0092, pedigree (2,1,4,1,1)
  (same comment as for DTPA, diethylenetriaminepentaacetic acid)
  properties: carbon content, fossil 0.602381, dry mass 0.84 kg, heating value, gross 40 MJ, heating value, net 36 MJ, wet mass 0.84 kg
  note on carbon content, fossil: An average C content of 0.506 kg C/ m3 has been assumed (this average has been calculated using data in Tab 3.5, ecoinvent v2.2 report 6_V
  note on heating value, net: Literature value, Source: Christoph Meili;Niels Jungbluth;Maresa Bussa (2021) Life cycle inventories of crude oil and natural gas extraction. ESU-services Ltd. commissioned by BAFU & VSG, Schaffhausen, Switzerland, http://esu-services.ch/data/public-lci-reports/
- neutralising agent, sodium hydroxide-equivalent: 0.00264487 kg; lognormal variance with pedigree 0.0092, pedigree (2,1,4,1,1)
  (same comment as for DTPA, diethylenetriaminepentaacetic acid)
- nitrogen, liquid: 0.000119011 kg; lognormal variance with pedigree 0.0092, pedigree (2,1,4,1,1)
  (same comment as for DTPA, diethylenetriaminepentaacetic acid)
  properties: dry mass 1 kg, wet mass 1 kg
- optical brighteners, for paper production: 9.91827e-5 kg; lognormal variance with pedigree 0.0092, pedigree (2,1,4,1,1)
  (same comment as for DTPA, diethylenetriaminepentaacetic acid)
  properties: heating value, net 16.9 MJ
- paper mill, integrated: 6.19458e-11 unit; lognormal variance with pedigree 0.1786, pedigree (4,5,5,5,5)
  Input of (immobile) infrastructure modelled with an activity link to the supplying activity (construction) of matching geography.
- phosphoric acid, industrial grade, without water, in 85% solution state: 7.64533e-5 kg; lognormal variance with pedigree 0.0092, pedigree (2,1,4,1,1)
  (same comment as for DTPA, diethylenetriaminepentaacetic acid)
- phosphorus, white, liquid: 1.87911e-5 kg; lognormal variance with pedigree 0.0092, pedigree (2,1,4,1,1)
  (same comment as for DTPA, diethylenetriaminepentaacetic acid)
  properties: dry mass 1 kg, wet mass 1 kg
- polyacrylamide: 0.000367803 kg; lognormal variance with pedigree 0.0092, pedigree (2,1,4,1,1)
  (same comment as for DTPA, diethylenetriaminepentaacetic acid)
  properties: heating value, net 23.88 MJ
- potato starch: 0.000557903 kg; lognormal variance with pedigree 0.0092, pedigree (2,1,4,1,1)
  (same comment as for DTPA, diethylenetriaminepentaacetic acid)
  properties: heating value, net 10.66 MJ
- pulpwood, softwood, measured as solid wood under bark: 0.00024454 m3; name pulpwood; lognormal variance with pedigree 0.0092, pedigree (2,1,4,1,1)
  Reported as thinnings from forest going into the pulping process. Data collected for the two large newsprint paper mills in operation in Switzerland. Both are integrated mills, producing their own deinked pulp from waste paper and their own mechanical pulp from primary materials. Main raw material in both cases is waste paper (post-consumer or productin resdiues). For more detail see the supporting information in M. Haupt et al. (2018), Life cycle inventories of waste management processes, Data inBrief19(2018)1441-1457.
  property dry mass 425.92 kg; name dryMass; = (1+0.1)*387.2
  property water in wet mass 596.288 kg; name water_in_wetMass; = wetMass - dryMass
  property wet mass 1022.21 kg; name wetMass
  properties: carbon content, non-fossil 0.494, heating value, net 4483.78 MJ, water content 1.4
  note on carbon content, non-fossil: Biogenic C content was calculated after biogenic C contents of chemicals used in the production of the paper (in Tab 8.6 ecoinvent v2.2 report 11_III, part 8). The cellulose content in 1 kg of paper (on a wet mas basis) was estimated as (1-chemical content), C content of cellulose was considered 0.44 kgC/kg dry mass (ecoinvent v2.2 report, n 15a, pg 40) C content of dry mass is 0.494 kgC/kg dry wood (ecoinvent v2.2 report 9)
  note on heating value, net: Value based on "softwood forestry, mixed species, sustainable forest management"The property is based on a value of 11.58MJ/kg
- residual softwood, wet: 0.000165037 m3; name res_softwood; = 5.57E-02/0.75/ res_softwood_DM; lognormal variance with pedigree 0.022, pedigree (4,1,4,1,1)
  Input of waste wood / bark, sourced externally from wood processing industry, here approximated by residual softwood (wet).
  Data collected for the two large newsprint paper mills in operation in Switzerland. Both are integrated mills, producing their own deinked pulp from waste paper and their own mechanical pulp from primary materials. Main raw material in both cases is waste paper (post-consumer or productin resdiues). For more detail see the supporting information in M. Haupt et al. (2018), Life cycle inventories of waste management processes, Data in Brief 19 (2018) 1441-1457.
  property dry mass 450 kg; name res_softwood_DM
  property water in wet mass 315 kg; name res_softwood_WWM
  property wet mass 765 kg; name res_softwood_WM
  properties: carbon content, non-fossil 0.494, heating value, net 5962.7 MJ, water content 0.7
- retention aid, for paper production: 8.14287e-5 kg; lognormal variance with pedigree 0.0092, pedigree (2,1,4,1,1)
  (same comment as for DTPA, diethylenetriaminepentaacetic acid)
  properties: carbon content, fossil 0.5, dry mass 1 kg, heating value, net 15.15 MJ, wet mass 1 kg
  note on carbon content, fossil: Fossil C content was calculated after fossil C contents of chemicals used in the production of the paper (in Tab 8.6 ecoinvent v2.2 report 11_III, part 8). The functional unit represents 1 kg of retention aids. Raw material approximated by acrylic acid (ecoinvent v2.2 report 11-III, pg 297). Acrylic acid formula is C3H4O2.
- silica sand: 0.00723879 kg; lognormal variance with pedigree 0.0092, pedigree (2,1,4,1,1)
  (same comment as for DTPA, diethylenetriaminepentaacetic acid)
- sodium dithionite, anhydrous: 0.00246794 kg; lognormal variance with pedigree 0.0092, pedigree (2,1,4,1,1)
  (same comment as for DTPA, diethylenetriaminepentaacetic acid)
  properties: dry mass 1 kg, wet mass 1 kg
- sodium hydroxide, without water, in 50% solution state: 0.00794196 kg; lognormal variance with pedigree 0.0092, pedigree (2,1,4,1,1)
  (same comment as for DTPA, diethylenetriaminepentaacetic acid)
  properties: dry mass 1 kg, heating value, net 3.03 MJ, wet mass 1 kg
- sodium hypochlorite, without water, in 15% solution state: 7.85196e-5 kg; lognormal variance with pedigree 0.0092, pedigree (2,1,4,1,1)
  (same comment as for DTPA, diethylenetriaminepentaacetic acid)
- sodium silicate, solid: 0.0044905 kg; lognormal variance with pedigree 0.0092, pedigree (2,1,4,1,1)
  (same comment as for DTPA, diethylenetriaminepentaacetic acid)
- sodium silicate, spray powder, 80%: 0.0104416 kg; lognormal variance with pedigree 0.0092, pedigree (2,1,4,1,1)
  (same comment as for DTPA, diethylenetriaminepentaacetic acid)
  properties: dry mass 1 kg, wet mass 1 kg
- sulfur dioxide, liquid: 0.00290179 kg; lognormal variance with pedigree 0.0092, pedigree (2,1,4,1,1)
  (same comment as for DTPA, diethylenetriaminepentaacetic acid)
  properties: dry mass 1 kg, wet mass 1 kg
- sulfuric acid: 0.000246652 kg; lognormal variance with pedigree 0.0092, pedigree (2,1,4,1,1)
  (same comment as for DTPA, diethylenetriaminepentaacetic acid)
  properties: dry mass 1 kg, wet mass 1 kg
- tap water: 2.04309e-8 kg; name tap_water; lognormal variance with pedigree 0.0092, pedigree (2,1,4,1,1)
  (same comment as for DTPA, diethylenetriaminepentaacetic acid)
- thermo-mechanical pulp: 0.000137983 kg; lognormal variance with pedigree 0.0092, pedigree (2,1,4,1,1)
  (same comment as for DTPA, diethylenetriaminepentaacetic acid)
  properties: heating value, net 14.97 MJ
- urea: 0.00306135 kg; lognormal variance with pedigree 0.0092, pedigree (2,1,4,1,1)
  The exchange has been updated from "urea, as N" into "urea" and therefore its amount has been scaled (multiplied) from 0.0014 kg by 2.1438 kg of "urea" per kg of "urea, as N". Original comment of the exchange is: Data collected for the two large newsprint paper mills in operation in Switzerland. Both are integrated mills, producing their own deinked pulp from waste paper and their own mechanical pulp from primary materials. Main raw material in both cases is waste paper (post-consumer or productin resdiues). For more detail see the supporting information in M. Haupt et al. (2018), Life cycle inventories of waste management processes, Data inBrief19(2018)1441-1457.
- waste mineral oil: -8.83639e-6 kg; name BP2; lognormal variance with pedigree 0.0012, pedigree (2,1,1,1,1)
  (same comment as for DTPA, diethylenetriaminepentaacetic acid)
  production volume; = PV_RP/RP*BP2
    Calculated based on the production volume of the reference product.
  properties: carbon content, fossil 0.864444, dry mass 0.9 kg, heating value, net 34.7 MJ, water content 0.111111, wet mass 1 kg
  note on carbon content, fossil: Tab A.6, ecoinvent v2.2 report 13_I. C content has been calculated after data in the tables, and then referred to 1 kg DM
- waste paper, sorted: 1.33333 kg; name waste_paper_input; = 1/0.75; lognormal variance with pedigree 0.0452, pedigree (3,4,5,4,1)
  Inventory reported in Haupt et al. (2018) here converted to output of recycled newsprint, based on 0.75 kg secondary newsprint per kg waste paper input.
  properties: carbon content, non-fossil 0.448889, dry mass 0.9 kg, heating value, net 14.11 MJ, water content 0.111111, wet mass 1 kg
- wood ash mixture, pure: -0.0420215 kg; name BP8; = (pulpwood + res_softwood)*(0.0632/0.000616); lognormal variance with pedigree 0.0106, pedigree (3,1,4,1,1)
  Wood ash amount (0.0808 kg wood ash per kg waste paper input) reported in Haupt et al. (2018) appears too high in relation to the woody biomass input. Instead, the wood ash generation was here estimated based on the combined input of pulpwood and residual wood, and using the relative ash output in Hischier (2007), as found in "paper, newsprint, at plant, CH" in ecoinvent 2.2: 0.0632 kg wood ash for 0.000616 m3 industrial wood under bark and industrial residue wood (both softwood). The uncertainty information has been adjusted accordingly. The activity link to "treatment of wood ash mixture, pure, sanitary landfill [CH]", found in the superseeded version in this dataset, is kept also for this update.
  Reference: Hischier, R. (2007) Life Cycle Inventories of Packagings and Graphical Paper. ecoinvent-Report No. 11. Swiss Centre for Life Cycle Inventories, Dübendorf, Switzerland.
  production volume; = PV_RP/RP*BP8
    Calculated based on the production volume of the reference product.
  property carbon content, fossil 0; name BP8_C_content_fossil
  property carbon content, non-fossil 0.012; name BP8_C_content_non_fossil
  property dry mass 1 kg; name BP8_DM
  property water content 0; name BP8_water_content
  property water in wet mass 0 kg; name BP8_WWM
  property wet mass 1 kg; name BP8_WM

## Inputs from nature
- Water, cooling, unspecified natural origin [natural resource, in water]: 0.0218667 m3; name water_cooling_UNO_input; = 1.64E-02/0.75; lognormal variance with pedigree 0.0092, pedigree (2,1,4,1,1)
  Inventory reported in Haupt et al. (2018) here converted to output of recycled newsprint, based on 0.75 kg secondary newsprint per kg waste paper input.
  Data collected for the two large newsprint paper mills in operation in Switzerland. Both are integrated mills, producing their own deinked pulp from waste paper and their own mechanical pulp from primary materials. Main raw material in both cases is waste paper (post-consumer or productin resdiues). For more detail see the supporting information in M. Haupt et al. (2018), Life cycle inventories of waste management processes, Data inBrief19(2018)1441-1457.
- Water, unspecified natural origin [natural resource, in water]: 0.00404 m3; name water_UNO_input; = 3.03E-03/0.75; lognormal variance with pedigree 0.0092, pedigree (2,1,4,1,1)
  (same comment as for Water, cooling, unspecified natural origin)

## Emissions to nature
- Acetaldehyde [air, urban air close to ground]: 2.87218e-7 kg; lognormal variance with pedigree 0.1286, pedigree (2,5,5,1,4)
  (same comment as for DTPA, diethylenetriaminepentaacetic acid)
- Acetic acid [air, urban air close to ground]: 5.07766e-7 kg; lognormal variance with pedigree 0.1286, pedigree (2,5,5,1,4)
  (same comment as for DTPA, diethylenetriaminepentaacetic acid)
- Acetone [air, urban air close to ground]: 6.64478e-10 kg; lognormal variance with pedigree 0.1286, pedigree (2,5,5,1,4)
  (same comment as for DTPA, diethylenetriaminepentaacetic acid)
- Ammonia [air, urban air close to ground]: 8.04865e-6 kg; lognormal variance with pedigree 0.1286, pedigree (2,5,5,1,4)
  (same comment as for DTPA, diethylenetriaminepentaacetic acid)
- Arsenic ion [air, urban air close to ground]: 4.69554e-9 kg; lognormal variance with pedigree 0.7386, pedigree (2,5,5,1,4)
  (same comment as for DTPA, diethylenetriaminepentaacetic acid)
- Benzene [air, urban air close to ground]: 5.56738e-6 kg; lognormal variance with pedigree 0.1286, pedigree (2,5,5,1,4)
  (same comment as for DTPA, diethylenetriaminepentaacetic acid)
- Benzo(a)pyrene [air, urban air close to ground]: 9.79505e-10 kg; lognormal variance with pedigree 0.1286, pedigree (2,5,5,1,4)
  (same comment as for DTPA, diethylenetriaminepentaacetic acid)
- Bromine [air, urban air close to ground]: 2.78632e-7 kg; lognormal variance with pedigree 0.1286, pedigree (2,5,5,1,4)
  (same comment as for DTPA, diethylenetriaminepentaacetic acid)
- Butane [air, urban air close to ground]: 2.37633e-6 kg; lognormal variance with pedigree 0.1286, pedigree (2,5,5,1,4)
  (same comment as for DTPA, diethylenetriaminepentaacetic acid)
- Cadmium II [air, urban air close to ground]: 3.38921e-9 kg; lognormal variance with pedigree 0.7386, pedigree (2,5,5,1,4)
  (same comment as for DTPA, diethylenetriaminepentaacetic acid)
- Calcium II [air, urban air close to ground]: 2.71184e-5 kg; lognormal variance with pedigree 0.1286, pedigree (2,5,5,1,4)
  (same comment as for DTPA, diethylenetriaminepentaacetic acid)
- Carbon dioxide, fossil [air, urban air close to ground]: 0.192707 kg; lognormal variance with pedigree 0.0892, pedigree (2,5,5,1,4)
  (same comment as for DTPA, diethylenetriaminepentaacetic acid)
- Carbon dioxide, non-fossil [air, urban air close to ground]: 0.438926 kg; lognormal variance with pedigree 0.0892, pedigree (2,5,5,1,4)
  (same comment as for DTPA, diethylenetriaminepentaacetic acid)
- Carbon monoxide, fossil [air, urban air close to ground]: 7.31092e-6 kg; lognormal variance with pedigree 0.7386, pedigree (2,5,5,1,4)
  (same comment as for DTPA, diethylenetriaminepentaacetic acid)
- Carbon monoxide, non-fossil [air, urban air close to ground]: 0.000222678 kg; lognormal variance with pedigree 0.7386, pedigree (2,5,5,1,4)
  (same comment as for DTPA, diethylenetriaminepentaacetic acid)
- Chlorine [air, urban air close to ground]: 8.3641e-7 kg; lognormal variance with pedigree 0.1286, pedigree (2,5,5,1,4)
  (same comment as for DTPA, diethylenetriaminepentaacetic acid)
- Chromium III [air, urban air close to ground]: 1.84316e-8 kg; lognormal variance with pedigree 0.7386, pedigree (2,5,5,1,4)
  (same comment as for DTPA, diethylenetriaminepentaacetic acid)
- Chromium VI [air, urban air close to ground]: 1.86209e-10 kg; lognormal variance with pedigree 0.7386, pedigree (2,5,5,1,4)
  (same comment as for DTPA, diethylenetriaminepentaacetic acid)
- Cobalt II [air, urban air close to ground]: 1.45797e-10 kg; lognormal variance with pedigree 0.7386, pedigree (2,5,5,1,4)
  (same comment as for DTPA, diethylenetriaminepentaacetic acid)
- Copper ion [air, urban air close to ground]: 1.38098e-7 kg; lognormal variance with pedigree 0.7386, pedigree (2,5,5,1,4)
  (same comment as for DTPA, diethylenetriaminepentaacetic acid)
- Dinitrogen monoxide [air, urban air close to ground]: 1.19719e-5 kg; lognormal variance with pedigree 0.1286, pedigree (2,5,5,1,4)
  (same comment as for DTPA, diethylenetriaminepentaacetic acid)
- Dioxins, measured as 2,3,7,8-tetrachlorodibenzo-p-dioxin [air, urban air close to ground]: 1.43939e-13 kg; lognormal variance with pedigree 0.1286, pedigree (2,5,5,1,4)
  (same comment as for DTPA, diethylenetriaminepentaacetic acid)
- Ethanol [air, urban air close to ground]: 1.32968e-9 kg; lognormal variance with pedigree 0.1286, pedigree (2,5,5,1,4)
  (same comment as for DTPA, diethylenetriaminepentaacetic acid)
- Ethyl benzene [air, urban air close to ground]: 1.38964e-7 kg; lognormal variance with pedigree 0.1286, pedigree (2,5,5,1,4)
  (same comment as for DTPA, diethylenetriaminepentaacetic acid)
- Fluorine [air, urban air close to ground]: 2.31778e-7 kg; lognormal variance with pedigree 0.1286, pedigree (2,5,5,1,4)
  (same comment as for DTPA, diethylenetriaminepentaacetic acid)
- Formaldehyde [air, urban air close to ground]: 9.87213e-7 kg; lognormal variance with pedigree 0.1286, pedigree (2,5,5,1,4)
  (same comment as for DTPA, diethylenetriaminepentaacetic acid)
- Heat, waste [air, urban air close to ground]: 8.78862 MJ; lognormal variance with pedigree 0.1286, pedigree (2,5,5,1,4)
  (same comment as for DTPA, diethylenetriaminepentaacetic acid)
- Hexachlorobenzene [air, urban air close to ground]: 3.33447e-14 kg; lognormal variance with pedigree 0.1286, pedigree (2,5,5,1,4)
  (same comment as for DTPA, diethylenetriaminepentaacetic acid)
- Hydrocarbons, aliphatic, alkanes, unspecified [air, urban air close to ground]: 4.24151e-6 kg; lognormal variance with pedigree 0.1286, pedigree (2,5,5,1,4)
  (same comment as for DTPA, diethylenetriaminepentaacetic acid)
- Hydrocarbons, aliphatic, unsaturated [air, urban air close to ground]: 1.43866e-5 kg; lognormal variance with pedigree 0.1286, pedigree (2,5,5,1,4)
  (same comment as for DTPA, diethylenetriaminepentaacetic acid)
- Hydrocarbons, aromatic [air, urban air close to ground]: 2.21293e-9 kg; lognormal variance with pedigree 0.1286, pedigree (2,5,5,1,4)
  (same comment as for DTPA, diethylenetriaminepentaacetic acid)
- Hydrochloric acid [air, urban air close to ground]: 1.12129e-8 kg; lognormal variance with pedigree 0.1286, pedigree (2,5,5,1,4)
  (same comment as for DTPA, diethylenetriaminepentaacetic acid)
- Hydrogen fluoride [air, urban air close to ground]: 1.10113e-9 kg; lognormal variance with pedigree 0.1286, pedigree (2,5,5,1,4)
  (same comment as for DTPA, diethylenetriaminepentaacetic acid)
- Iron ion [air, urban air close to ground]: 7.95866e-10 kg; lognormal variance with pedigree 0.1286, pedigree (2,5,5,1,4)
  (same comment as for DTPA, diethylenetriaminepentaacetic acid)
- Lead II [air, urban air close to ground]: 1.1652e-7 kg; lognormal variance with pedigree 0.7386, pedigree (2,5,5,1,4)
  (same comment as for DTPA, diethylenetriaminepentaacetic acid)
- Magnesium [air, urban air close to ground]: 1.67282e-6 kg; lognormal variance with pedigree 0.1286, pedigree (2,5,5,1,4)
  (same comment as for DTPA, diethylenetriaminepentaacetic acid)
- Manganese II [air, urban air close to ground]: 7.91522e-7 kg; lognormal variance with pedigree 0.1286, pedigree (2,5,5,1,4)
  (same comment as for DTPA, diethylenetriaminepentaacetic acid)
- Mercury II [air, urban air close to ground]: 1.51888e-9 kg; lognormal variance with pedigree 0.7386, pedigree (2,5,5,1,4)
  (same comment as for DTPA, diethylenetriaminepentaacetic acid)
- Methane, fossil [air, urban air close to ground]: 6.80089e-6 kg; lognormal variance with pedigree 0.1286, pedigree (2,5,5,1,4)
  (same comment as for DTPA, diethylenetriaminepentaacetic acid)
- Methane, non-fossil [air, urban air close to ground]: 1.8565e-6 kg; lognormal variance with pedigree 0.1286, pedigree (2,5,5,1,4)
  (same comment as for DTPA, diethylenetriaminepentaacetic acid)
- Methanol [air, urban air close to ground]: 2.25135e-9 kg; lognormal variance with pedigree 0.1286, pedigree (2,5,5,1,4)
  (same comment as for DTPA, diethylenetriaminepentaacetic acid)
- Molybdenum VI [air, urban air close to ground]: 7.05519e-11 kg; lognormal variance with pedigree 0.1286, pedigree (2,5,5,1,4)
  (same comment as for DTPA, diethylenetriaminepentaacetic acid)
- NMVOC, non-methane volatile organic compounds [air, urban air close to ground]: 2.78219e-6 kg; lognormal variance with pedigree 0.1286, pedigree (2,5,5,1,4)
  (same comment as for DTPA, diethylenetriaminepentaacetic acid)
- Nickel II [air, urban air close to ground]: 3.07266e-8 kg; lognormal variance with pedigree 0.7386, pedigree (2,5,5,1,4)
  (same comment as for DTPA, diethylenetriaminepentaacetic acid)
- Nitrogen oxides [air, urban air close to ground]: 0.000558772 kg; lognormal variance with pedigree 0.1286, pedigree (2,5,5,1,4)
  (same comment as for DTPA, diethylenetriaminepentaacetic acid)
- PAH, polycyclic aromatic hydrocarbons [air, urban air close to ground]: 8.52264e-8 kg; lognormal variance with pedigree 0.3886, pedigree (2,5,5,1,4)
  (same comment as for DTPA, diethylenetriaminepentaacetic acid)
- Particulate Matter, < 2.5 um [air, urban air close to ground]: 0.00021428 kg; lognormal variance with pedigree 0.3886, pedigree (2,5,5,1,4)
  (same comment as for DTPA, diethylenetriaminepentaacetic acid)
- Particulate Matter, > 10 um [air, urban air close to ground]: 4.41504e-8 kg; lognormal variance with pedigree 0.1286, pedigree (2,5,5,1,4)
  (same comment as for DTPA, diethylenetriaminepentaacetic acid)
- Particulate Matter, > 2.5 um and < 10um [air, urban air close to ground]: 2.21031e-8 kg; lognormal variance with pedigree 0.2086, pedigree (2,5,5,1,4)
  (same comment as for DTPA, diethylenetriaminepentaacetic acid)
- Pentachlorophenol [air, urban air close to ground]: 3.75231e-11 kg; lognormal variance with pedigree 0.1286, pedigree (2,5,5,1,4)
  (same comment as for DTPA, diethylenetriaminepentaacetic acid)
- Pentane [air, urban air close to ground]: 4.05924e-6 kg; lognormal variance with pedigree 0.1286, pedigree (2,5,5,1,4)
  (same comment as for DTPA, diethylenetriaminepentaacetic acid)
- Phosphorus [air, urban air close to ground]: 1.38964e-6 kg; lognormal variance with pedigree 0.1286, pedigree (2,5,5,1,4)
  (same comment as for DTPA, diethylenetriaminepentaacetic acid)
- Potassium I [air, urban air close to ground]: 0.000108536 kg; lognormal variance with pedigree 0.1286, pedigree (2,5,5,1,4)
  (same comment as for DTPA, diethylenetriaminepentaacetic acid)
- Propane [air, urban air close to ground]: 6.7523e-7 kg; lognormal variance with pedigree 0.1286, pedigree (2,5,5,1,4)
  (same comment as for DTPA, diethylenetriaminepentaacetic acid)
- Propionic acid [air, urban air close to ground]: 6.74404e-8 kg; lognormal variance with pedigree 0.1286, pedigree (2,5,5,1,4)
  (same comment as for DTPA, diethylenetriaminepentaacetic acid)
- Selenium IV [air, urban air close to ground]: 5.28958e-11 kg; lognormal variance with pedigree 0.1286, pedigree (2,5,5,1,4)
  (same comment as for DTPA, diethylenetriaminepentaacetic acid)
- Sodium I [air, urban air close to ground]: 6.02253e-6 kg; lognormal variance with pedigree 0.1286, pedigree (2,5,5,1,4)
  (same comment as for DTPA, diethylenetriaminepentaacetic acid)
- Sulfur dioxide [air, urban air close to ground]: 1.76541e-5 kg; lognormal variance with pedigree 0.0892, pedigree (2,5,5,1,4)
  (same comment as for DTPA, diethylenetriaminepentaacetic acid)
- Toluene [air, urban air close to ground]: 2.06486e-6 kg; lognormal variance with pedigree 0.1286, pedigree (2,5,5,1,4)
  (same comment as for DTPA, diethylenetriaminepentaacetic acid)
- Vanadium V [air, urban air close to ground]: 1.1524e-8 kg; lognormal variance with pedigree 0.1286, pedigree (2,5,5,1,4)
  (same comment as for DTPA, diethylenetriaminepentaacetic acid)
- Water [air, urban air close to ground]: 0.00913132 m3; name water_to_air; = (water_cooling_UNO_input*fraction_CW_to_air)+(water_UNO_input*fraction_PW_to_air)+(tap_water*fraction_PW_to_air)+ res_softwood* res_softwood_WWM/1000; lognormal variance with pedigree 0.1287, pedigree (5,5,5,3,2)
  The model for calculating water released back to the environment ("Water, to air" / "Water, to water") has been adopted from "paper production, newprint, recycled, GLO, 2000".
  Original comment: "Calculated value based on literature values and expert opinion. See comments in the parametres" comment field."
  Reference: Hischier (2007) Life Cycle Inventories of Packaging and Graphical Papers. ecoinvent report No. 11. Swiss Centre for Life Cycle Inventories. Dübendorf, Switzerland.
  property fraction, origin: fresh water 0; name fraction_origin_fresh_water
  property fraction, origin: salt water 0; name fraction_origin_salt_water
  property fraction, origin: unspecified 1; name fraction_origin_unspecified
- Zinc II [air, urban air close to ground]: 1.42923e-6 kg; lognormal variance with pedigree 0.7386, pedigree (2,5,5,1,4)
  (same comment as for DTPA, diethylenetriaminepentaacetic acid)
- m-Xylene [air, urban air close to ground]: 5.56125e-7 kg; lognormal variance with pedigree 0.1286, pedigree (2,5,5,1,4)
  (same comment as for DTPA, diethylenetriaminepentaacetic acid)
- AOX, Adsorbable Organic Halides [water, surface water]: 8.99581e-7 kg; lognormal variance with pedigree 0.0486, pedigree (2,1,4,1,1)
  (same comment as for DTPA, diethylenetriaminepentaacetic acid)
- BOD5, Biological Oxygen Demand [water, surface water]: 0.00646787 kg; lognormal variance with pedigree 0.0486, pedigree (2,1,4,1,1)
  (same comment as for DTPA, diethylenetriaminepentaacetic acid)
- COD, Chemical Oxygen Demand [water, surface water]: 0.0075041 kg; lognormal variance with pedigree 0.0486, pedigree (2,1,4,1,1)
  (same comment as for DTPA, diethylenetriaminepentaacetic acid)
- Chloride [water, surface water]: 0.000454345 kg; lognormal variance with pedigree 0.0486, pedigree (2,1,4,1,1)
  (same comment as for DTPA, diethylenetriaminepentaacetic acid)
- DOC, Dissolved Organic Carbon [water, surface water]: 0.00431571 kg; lognormal variance with pedigree 0.0486, pedigree (2,1,4,1,1)
  (same comment as for DTPA, diethylenetriaminepentaacetic acid)
- Nitrogen [water, surface water]: 3.59832e-5 kg; lognormal variance with pedigree 0.0486, pedigree (2,1,4,1,1)
  (same comment as for DTPA, diethylenetriaminepentaacetic acid)
- Phosphorus [water, surface water]: 4.4979e-6 kg; lognormal variance with pedigree 0.0486, pedigree (2,1,4,1,1)
  (same comment as for DTPA, diethylenetriaminepentaacetic acid)
- Sulfate [water, surface water]: 0.00393994 kg; lognormal variance with pedigree 0.0486, pedigree (2,1,4,1,1)
  (same comment as for DTPA, diethylenetriaminepentaacetic acid)
- Suspended solids, unspecified [water, surface water]: 0.00203829 kg; lognormal variance with pedigree 0.0486, pedigree (2,1,4,1,1)
  (same comment as for DTPA, diethylenetriaminepentaacetic acid)
- TOC, Total Organic Carbon [water, surface water]: 0.00431571 kg; lognormal variance with pedigree 0.0486, pedigree (2,1,4,1,1)
  (same comment as for DTPA, diethylenetriaminepentaacetic acid)
- Water [water, surface water]: 0.0168274 m3; name water_to_water; = water_cooling_UNO_input*(1-fraction_CW_to_air)+water_UNO_input*(1-fraction_PW_to_air)+tap_water*(1-fraction_PW_to_air); lognormal variance with pedigree 0.1287, pedigree (5,5,5,3,2)
  (same comment as for Water)
  property fraction, origin: fresh water 0; name fraction_origin_fresh_water_1
  property fraction, origin: salt water 0; name fraction_origin_salt_water_1
  property fraction, origin: unspecified 1; name fraction_origin_unspecified_1

## Sampling procedure
Data for the recycling process was derived from the annual reports of the two paper producing companies in Switzerland (Perlen Papier AG and Utzenstorf Papier AG) and inventories were then finalized in close collaboration with the industrial partners. The processes used in these two companies are similar, but the mix of chemicals used differs significantly. The presented inventory represents a production volume weighted average of the two companies and describes the recycling of waste paper into newspaper. Some chemicals are not represented in the database and could therefore not be included specifically. Instead, the chemicals were grouped into organic and inorganic chemicals and included in the analysis as sum parameter.

## Extrapolations
The inventory was compiled primarily witih industry data with the corresponding dataset available in ecoinvent v3.3 as the starting-point. Chemicals are listed according to the availability of chemicals in ecoinvent v3.3 (the other chemicals are summarized as inorganic/organic chemicals). Collected waste paper is not only processed to newsprint but also to graphical paper (in one of the two paper mills).The largest difference between the production of newsprint and graphical paper is the addition of fillers and primary pulp.The mix of chemicals is almost identical for both processes (based on internal reports). The recycling process to newsprint is, however, representative for 91% of the waste paper recycled in Switzerland and was assumed as sole pathway here.

Assumptions for waste-derived fuel inputs listed in the inventory for "paper recycling to secondary fibers for newsprint production CH" in Haupt et al. (2018):
* Waste wood, post-consumer: Reported as 5.57E-02 kg (dry) per kg sorted waste paper input, used for on-site energy production. This input is here approximated with "residual softwood, wet".
* Sludge from pulp and paper: reported as 1.33E-2 kWh input of pulp and paper sludge from other processes per kg of waste paper input; it is used for on-site energy generation. Original data source stated 3172 tonne external sludge used for energy purposes for the production of 192654 tonne of newsprints at one of the paper mills in the study of Haupt et al. (2018) [This flow has been set to 0, i.e. cut off, in the current version of the dataset due to its marginal contribution towards meeting the process energy requirements and to avoid turning the dataset into a "speciality production", i.e. representing an activity that relies on a material for treatment as an input, but which is not a treatment activitiy in itself.]
* Other biomass: Reported as 1.38E-3 kWh input of biomass residues from other processes per kg of waste paper input. Original data source stated 329 tonne other biomass used for energy purposes for the production of 192654 tonne of newsprints at one of the paper mills in the study of Haupt et al. (2018). This input is here approximated with "sludge from pulp and paper"

*Note: The energy production located on paper mill sites is not only based on internal residues but may also include residues from other processes. One of the paper mills in the study of Haupt et al. (2018) reported an input of 3172t sludge from other (but similar) processes and an additional input of 329t other (unspecified) biomass for an output of 192564t newsprint (35% of national production). This input exchange has been excluded in the current version of the dataset due to its marginal contribution towards meeting the process energy requirements. The choice was made in accordance with the ecoinvent Association.

Missing exchange properties and the model for calculating water released back to the environment ("Water, to air" / "Water, to water") have been adopted from "paper production, newprint, recycled, GLO, 2000".

Compared to the inventory reported in Haupt et al. (2018), the inputs of freight transport reported have omitted from this activity as these requirements are covered in the market activities of the inputs and outputs to/from technosphere in the ecoinvent database v3.
