# sawnwood production, hardwood, dried (u=10%), planed

Dataset: EcoSpold 2, unit process
Geography: Europe without Switzerland
Time period: 2014-01-01 to 2023-12-31
Technology level: current
Classification: ISIC rev.4 ecoinvent: 1610:Sawmilling and planing of wood
Scenario: Business-as-Usual
System model: Allocation, cut-off by classification
Generated by: Frank Werner
Database: ecoinvent
isCopyrightProtected: true
accessRestrictedTo: 1

## General comment
This activity is providing a more generic sawnwood product, combining inputs from the specific products issued from planing. The relative contribution is based on their Production Volumes.

## Included activities start
Entry of the specific products issued of the planing activity

## Included activities end
Delivery of the generic planed product

## Reference product
- sawnwood, hardwood, dried (u=10%), planed: 1 m3; By-product classification allocatable product; CPC 31102: Wood, sawn or chipped lengthwise, sliced or peeled, of a thickness exceeding 6 mm, of non-coniferous wood; HS2017 4407: Wood sawn or chipped lengthwise, sliced or peeled, whether or not planed, sanded or end-jointed, of a thickne[...]
  production volume 9.27211e6 m3; = 0.287*3.2307E+07
    50% of the Production Volume issued from the planing has been made accesible as this generic product.
    The Production Volumes have been downscaled from GLO to RER using the relative GDP values 2011 (source: United Nations, <http://data.un.org/Glossary.aspx?q=GDP+%28current+US%24%29>, accessed 20130726).
  property heating value, net 9569.82 MJ
    LHV is calculated based on the Carbon content of the product. More details can be found on the respective documentation.The property is based on a value of 13.38MJ/kg
  property price 265 EUR2005
    Temporary price data. Calculated as 90% of purchasers price based on: 2004 export prices for the World+ according to: http://faostat.fao.org/site/626/DesktopDefault.aspx?PageID=626#ancor downloaded 28 April 2009; calculated as export value divided by export volume.
  properties: carbon allocation 303.514 kg, carbon content 0.494, carbon content, fossil 0, carbon content, non-fossil 0.494, dry mass 614.4 kg, water content 0.1, water in wet mass 61.44 kg, wet mass 675.84 kg

## Inputs from technosphere
- sawnwood, beam, hardwood, dried (u=10%), planed: 0.324978 m3; lognormal variance with pedigree 0.1101, pedigree (3,1,4,3,1)
  based on estimated production volumes; see activity datasets
  properties: carbon content, non-fossil 0.494, dry mass 614.4 kg, heating value, net 9045.69 MJ, water content 0.1, wet mass 675.84 kg
- sawnwood, board, hardwood, dried (u=10%), planed: 0.49239 m3; lognormal variance with pedigree 0.1101, pedigree (3,1,4,3,1)
  based on estimated production volumes; see activity datasets
  properties: carbon content, non-fossil 0.494, dry mass 614.4 kg, heating value, net 9045.69 MJ, water content 0.1, wet mass 675.84 kg
- sawnwood, lath, hardwood, dried (u=10%), planed: 0.182632 m3; lognormal variance with pedigree 0.1101, pedigree (3,1,4,3,1)
  based on estimated production volumes; see activity datasets
  properties: carbon content, non-fossil 0.494, dry mass 614.4 kg, heating value, net 9045.69 MJ, water content 0.1, wet mass 675.85 kg
