# xenon and krypton purification, air separation

Dataset: EcoSpold 2, unit process
Geography: CA-QC
Time period: 1998-01-01 to 2023-12-31
Technology level: current
Classification: EcoSpold01Categories: chemicals/inorganics
Classification: ISIC rev.4 ecoinvent: 2011:Manufacture of basic chemicals
Tags: recontextualization
Scenario: Business-as-Usual
System model: Allocation, cut-off by classification
Generated by: Pascal Lesage
Published in: Althaus H.-J. 2007
Database: ecoinvent
isCopyrightProtected: true
accessRestrictedTo: 1

## General comment
The process describes the production of pure xenon and krypton derived from a crude concentrate from a cryogenic air separation process. As products only gaseous xenon and gaseous krypton were considered. Oxygen that is used as carrier material and returned to the air separation process is not considered.
Child dataset exchanges identical to GLO dataset. Created to enable linking to regional markets (e.g. for electricity). Data quality indicators adjusted accordingly.

## Included activities end
Xenon, krypron as ressource, Electricity for process, cooling water and waste heat. Estimation for process infrastructure .

## Geography
Data from an producer in europe. Further data from a study from New Zealand.
Child dataset exchanges identical to GLO dataset. Created to enable linking to regional markets (e.g. for electricity). Data quality indicators adjusted accordingly.

## Technology
Kr-Xe-concentrate with 99.7% O2 is obtained from a side column of large air separation plants. Processes as purification and further distillation and the achieved yield may vary. Data represents an average process.

## Parameters
- Quebec gross domestic product 2011: 3.11e11 USD(2011); name quebecGDP2011; lognormal variance with pedigree 0.0006, pedigree (1,1,1,1,1)
  Quebec Gross domestic product for 2011, expressed in 2011 USD. Source: Institut de la statistique du Québec. Converted from CAD to USD using a yearly average exchange rate of 0.989 CAD/USD (Source: bank of Canada).
- fraction, cooling water, cooling pond system, to air: 0.032 dimensionless; name fraction_CW_CP_to_air; lognormal variance with pedigree 0.0413, pedigree (2,3,1,3,1)
  Calculated based on literature value (Scown, C.D., 2011, Water Footprint of U.S. Transportation Fuels and supplying information of the article) (Vionnet, S., Quantis Water Database - Technical Report, 2012).
- fraction, cooling water, once-through system, to air: 0.004 dimensionless; name fraction_CW_OT_to_air; lognormal variance with pedigree 0.0413, pedigree (2,3,1,3,1)
  (same comment as for fraction, cooling water, cooling pond system, to air)
- fraction, cooling water, recirculating system, to air: 0.771 dimensionless; name fraction_CW_R_to_air; lognormal variance with pedigree 0.0413, pedigree (2,3,1,3,1)
  (same comment as for fraction, cooling water, cooling pond system, to air)
- fraction, cooling water, to air: 0.3875 dimensionless; name fraction_CW_to_air; = (0.5*fraction_CW_OT_to_air)+(0.5*fraction_CW_R_to_air); lognormal variance with pedigree 0.092025, pedigree (4,4,3,2,4)
  Calculated value based on literature value (see comments of the other parametres present in this dataset) and expert opinion. In the case when no industry/literature data are available about the type of cooling or directly fraction, cooling water, to air specific for the process a default assumption is applied. It is assumed that the once-through cooling system is used in 50% of all cases and recirculating system is used in another 50% of all cases.
- world gross domestic product 2011: 7e13 USD(2011); name worldGDP2011; lognormal variance with pedigree 0.0006, pedigree (1,1,1,1,1)
  World Gross domestic product for 2011, expressed in 2011 USD. Source: World Bank.

## Reference product
- krypton, gaseous: 1 kg; name krypton_gaseous_output; By-product classification allocatable product; CPC 34210: Hydrogen, nitrogen, oxygen, carbon dioxide and rare gases; inorganic oxygen compounds of non-metals n.e.c.; HS2017 280429: Gases, rare; other than argon; CAS 7439-90-9
  production volume 44.9763 kg
    Gross approximation of Quebec production volume using relative value of Quebec GDP to world GDP
  property carbon content, fossil 0; name C_content_fossil
  property carbon content, non-fossil 0; name C_content_non_fossil
  property dry mass 1 kg; name DM
  property price 12.8 EUR2005
    Temporary price data. Calculated as 90% of purchasers price based on: 2004 prices for World Import/Export data (US$ and tonnes) from UN Commodity Trade Statistics Database (http://data.un.org/Explorer.aspxDatabase [Accessed 2 July 2010]). Due to lack of data on the specific chemical compound, data on 'Rare gases other than argon' were used.
  property water content 0; name water_content
  property water in wet mass 0 kg; name WWM
  property wet mass 1 kg; name WM
  properties: allocation factor 0.573617, carbon allocation 0 kg, carbon content 0, true value 11.456

## Inputs from technosphere
- air separation facility: 3.20457e-7 unit; lognormal variance with pedigree 0.6481, pedigree (5,5,5,3,5)
  Estimated value
  Uncertainty: E
- electricity, medium voltage: 221.115 kWh; lognormal variance with pedigree 0.054025, pedigree (3,4,5,2,1)
  Estimated value; data from an average process, estimations
  Uncertainty: D

## Inputs from nature
- Krypton [natural resource, in air]: 0.573617 kg; lognormal variance with pedigree 0.2106, pedigree (5,5,5,5,5)
  Calculated value; ressource input determined from output
  Uncertainty: R
- Water, cooling, unspecified natural origin [natural resource, in water]: 0.448639 m3; name water_cooling_UNO_input; lognormal variance with pedigree 0.124025, pedigree (3,4,5,2,4)
  Estimated value, assumtions of technology used for cooling
  Uncertainty: A
- Xenon [natural resource, in air]: 0.0672959 kg; lognormal variance with pedigree 0.2106, pedigree (5,5,5,5,5)
  Calculated value; ressource input determined from output
  Uncertainty: R

## Emissions to nature
- Water [air, unspecified]: 0.173848 m3; name water_to_air_unspecified; = (water_cooling_UNO_input*fraction_CW_to_air)
  Calculated value based on literature values and expert opinion. See comments in the parametres" comment field.
- Water [water, unspecified]: 0.274792 m3; name water_to_water_unspecified; = water_cooling_UNO_input*(1-fraction_CW_to_air)
  (same comment as for Water)

## Sampling procedure
Production amount world-wide about 30-40 t/a for xenon and 300-400 t/a for krypton. Amount of production represented in Europe is not known.

## Extrapolations
Energy data represent an average process. Cooling water demand extrapolated from the assumed technology with cooling tower. Infrastructure represents only a rougth estimate.Child dataset exchanges identical to GLO dataset. Created to enable linking to regional markets (e.g. for electricity). Data quality indicators adjusted accordingly.
