# harvesting, by potato harvester

Dataset: EcoSpold 2, unit process
Geography: US
Time period: 2021-01-01 to 2023-12-31
Technology level: current
Classification: ISIC rev.4 ecoinvent: 0161:Support activities for crop production
Scenario: Business-as-Usual
System model: Allocation, cut-off by classification
Generated by: Juanita Barrera
Database: ecoinvent
isCopyrightProtected: true
accessRestrictedTo: 1

## General comment
This dataset models the service of harvesting potatoes with a complete harvester, medium, moving apron bunker, 1-row. Potato production was not included. The functional unit (FU) is one ha harvested and the operation time is 13.4 h/FU.

## Included activities start
The activity starts from the agricultural field foreseen to be processed.

## Included activities end
This activity ends with the delivery of harvested potatoes. The dataset includes the diesel fuel consumption and the amount of agricultural machinery and of the shed attributed to a complete harvesting work. It was also taken into consideration the amount of emissions to the air from combustion and the emission to the soil from tyre abrasion during the work process. The following activities were considered part of the work process: preliminary work at the farm, such as attaching the adequate machine to the tractor; driving to field (with an assumed distance of 1 km); field work (for a parcel of land of 1 ha surface); driving to farm and concluding work, like uncoupling the machine. The overlapping during the field work is considered. The dataset doesn't include the dust other than from combustion and noise.

## Geography
The inventory is extrapolated from the geography of Switzerland. Data quality indicators are adjusted accordingly.

## Technology
Fuel consumption and emissions per kg diesel have been extrapolated to the US, but others inputs were taken from the original values.

## Reference product
- harvesting, by potato harvester: 1 ha; By-product classification allocatable product; CPC 86119: Other support services to crop production
  production volume 369930 ha
    The production volume is estimated considering the total amount of the potato crop area for the US. Source FAOSTAT data year 2020.
  property price 139.995 EUR2005
    The price is from the year 2015. The price is estimated as a proxy based on the source: https://coststudyfiles.ucdavis.edu/uploads/cs_public/4e/f5/4ef54da3-114e-4952-a66a-049765b9a747/15potatofreshmktklamathfinaldraftdec10.pdf. The prices were adjusted for inflation relative to 2005 using the producer price index (PPI) of the euro area, published by eurostat (https://ec.europa.eu/eurostat/databrowser/view/STS_INPP_A__custom_6416181/default/table?lang=en, last accessed on 2023-06-01).
  properties: carbon allocation 0 kg, carbon content 0

## Inputs from technosphere
- agricultural machinery, unspecified: 26.6 kg; lognormal variance with pedigree 0.3042, pedigree (1,4,2,5,1)
  proxy from "harvesting, by complete harvester, ground crops, CH"
- diesel: 16.1824 kg; lognormal variance with pedigree 0.3022, pedigree (1,4,2,1,1)
  Helsel, 2007 Fuel Requirements and Energy Savings Tips for Field Operations, The State University of New Jersey Available at: https://njaes.rutgers.edu/pubs/publication.php?pid=FS1068
  properties: carbon content, fossil 0.865, dry mass 1 kg, heating value, net 42.8 MJ, wet mass 1 kg
- shed: 0.0556 m2; lognormal variance with pedigree 0.0048, pedigree (1,4,2,5,1)
  proxy from "harvesting, by complete harvester, ground crops, CH"
- tractor, 4-wheel, agricultural: 6.14 kg; lognormal variance with pedigree 0.3042, pedigree (1,4,2,5,1)
  proxy from "harvesting, by complete harvester, ground crops, CH"

## Emissions to nature
- Ammonia [air, non-urban air or from high stacks]: 0.000324224 kg; lognormal variance with pedigree 0.058325, pedigree (1,2,2,2,3)
  adapted from "harvesting, by complete harvester, ground crops, CH" to match the diesel consumption
- Benzene [air, non-urban air or from high stacks]: 0.000118057 kg; lognormal variance with pedigree 0.058325, pedigree (1,2,2,2,3)
  (same comment as for Ammonia)
- Benzo(a)pyrene [air, non-urban air or from high stacks]: 4.86048e-7 kg; lognormal variance with pedigree 0.658325, pedigree (1,2,2,2,3)
  (same comment as for Ammonia)
- Cadmium II [air, non-urban air or from high stacks]: 1.61824e-7 kg; lognormal variance with pedigree 0.658325, pedigree (1,2,2,2,3)
  (same comment as for Ammonia)
- Carbon dioxide, fossil [air, non-urban air or from high stacks]: 50.3325 kg; lognormal variance with pedigree 0.018325, pedigree (1,2,2,2,3)
  (same comment as for Ammonia)
- Carbon monoxide, fossil [air, non-urban air or from high stacks]: 0.185436 kg; lognormal variance with pedigree 0.652225, pedigree (1,4,2,2,1)
  (same comment as for Ammonia)
- Chromium III [air, non-urban air or from high stacks]: 8.12e-7 kg; lognormal variance with pedigree 0.658325, pedigree (1,2,2,2,3)
  (same comment as for Ammonia)
- Copper ion [air, non-urban air or from high stacks]: 2.75274e-5 kg; lognormal variance with pedigree 0.658325, pedigree (1,2,2,2,3)
  (same comment as for Ammonia)
- Dinitrogen monoxide [air, non-urban air or from high stacks]: 0.0019465 kg; lognormal variance with pedigree 0.058325, pedigree (1,2,2,2,3)
  (same comment as for Ammonia)
- Methane, fossil [air, non-urban air or from high stacks]: 0.00209047 kg; lognormal variance with pedigree 0.058325, pedigree (1,2,2,2,3)
  (same comment as for Ammonia)
- NMVOC, non-methane volatile organic compounds [air, non-urban air or from high stacks]: 0.0979008 kg; lognormal variance with pedigree 0.042225, pedigree (1,4,2,2,1)
  (same comment as for Ammonia)
- Nickel II [air, non-urban air or from high stacks]: 1.1345e-6 kg; lognormal variance with pedigree 0.658325, pedigree (1,2,2,2,3)
  (same comment as for Ammonia)
- Nitrogen oxides [air, non-urban air or from high stacks]: 0.932937 kg; lognormal variance with pedigree 0.042225, pedigree (1,4,2,2,1)
  (same comment as for Ammonia)
- PAH, polycyclic aromatic hydrocarbons [air, non-urban air or from high stacks]: 5.33271e-5 kg; lognormal variance with pedigree 0.318325, pedigree (1,2,2,2,3)
  (same comment as for Ammonia)
- Particulate Matter, < 2.5 um [air, non-urban air or from high stacks]: 0.0326528 kg; lognormal variance with pedigree 0.318325, pedigree (1,2,2,2,3)
  (same comment as for Ammonia)
- Selenium IV [air, non-urban air or from high stacks]: 1.61824e-7 kg; lognormal variance with pedigree 0.058325, pedigree (1,2,2,2,3)
  (same comment as for Ammonia)
- Sulfur dioxide [air, non-urban air or from high stacks]: 0.0163552 kg; lognormal variance with pedigree 0.018325, pedigree (1,2,2,2,3)
  (same comment as for Ammonia)
- Zinc II [air, non-urban air or from high stacks]: 1.61824e-5 kg; lognormal variance with pedigree 0.658325, pedigree (1,2,2,2,3)
  (same comment as for Ammonia)
- Cadmium II [soil, agricultural]: 4.01e-6 kg; lognormal variance with pedigree 0.0442, pedigree (1,4,2,5,1)
  proxy from "harvesting, by complete harvester, ground crops, CH"
- Lead II [soil, agricultural]: 1.82e-5 kg; lognormal variance with pedigree 0.0442, pedigree (1,4,2,5,1)
  proxy from "harvesting, by complete harvester, ground crops, CH"
- Zinc II [soil, agricultural]: 0.0104 kg; lognormal variance with pedigree 0.0442, pedigree (1,4,2,5,1)
  (same comment as for Ammonia)

## Extrapolations
The dataset is modeled for agricultural production system in US. Data Quality indicators are adjusted accordingly.
