# power sawing, without catalytic converter

Dataset: EcoSpold 2, unit process
Geography: RoW
Time period: 2011-01-01 to 2023-12-31
Technology level: current
Classification: ISIC rev.4 ecoinvent: 1610:Sawmilling and planing of wood
Classification: EcoSpold01Categories: wooden materials/extraction
Synonyms: chain saw; chainsaw
Scenario: Business-as-Usual
System model: Allocation, cut-off by classification
Generated by: Frank Werner
Published in: Magnusson R. 2010
Database: ecoinvent
isCopyrightProtected: true
accessRestrictedTo: 1

## General comment
The inventory represents the operation of a professional power saw with a fuel consumption of 1.6 kg of standard two-stroke petrol blend (0.75 kg/l) for power saws per working hour and with a power output of about 3.1 - 3.2 kW.
The chain is replaced every 65 service hours; the running rail (blade) is replaced every 200 hours. The resulting amount of wear and tear parts per productive machine hour (PMH) is inventoried in the respective infrastructure dataset.
For the generation of the emissions profile, the follwing sources have been used:
Personal written comunication by Husqvarna AB
Ålander, T., E. Antikainen, T. Raunemaa, E. Elonen, A. Rautiola and K. Torkkell (2005): Particle emissions from a small two-stroke engine: effects of fuel, lubricating oil, and exhaust aftertreatment on particle characteristics. Aerosol Science and Technology, 39(2): 151 — 161.
Magnusson, R., C. Nilsson and B. Andersson (2002): Emissions of aldehydes and ketones from a two-stroke engine using ethanol and ethanol-blended gasoline as fuel. Environmental Science & Technology, 36(8): 1656-1664.
Magnusson, R., C. Nilsson, K. Andersson, B. Andersson, U. Rannug and C. Östman (2000): Effect of gasoline and lubricant on emissions and
mutagenicity of particles and semivolatiles in chain saw exhaust. Environmental Science & Technology, 24(14): 2918–2924.
Arithmetic means of specific emissions were calculated if reported by several sources (and if not calculated directly as document in the dataset). Cumulative emissions inventoried as NMVOC and PAH are calculated as the amount of the respective emissions that have not been inventoried as individual substances.
When extending the dataset to specific types of fuels or lubricants, the following source could be taken into account:
Magnusson, R. and C. Nilsson (2011): The influence of oxygenated fuels on emissions of aldehydes and ketones from a two-stroke spark ignition engine. Fuel, 90(3): 1145-1154.
Magnusson, R., C. Nilsson, K. Andersson, B. Andersson, R. Gieling, K. Wiberg, C. Östman and U. Rannug (2010): Determination of Chemical Composition and Mutagenicity in Particles from Chainsaw Exhaust. Experimental Set-Up, Stability and Results from Two Different Fuels. Environmental Technology, 21(7): 819 - 829.

## Included activities start
Service beginning with the input of fuel into the power saw.

## Included activities end
Includes the input of machinery infrastructure, the input of fuel, lubricants/greases as well as their disposal, and the emissions into air from fuel consumption. Wood is not included in the dataset.

## Geography
Data sourced from several European studies

## Technology
The module represents average technology used in Europe around 2010

## Parameters
- lifetime of machine, productive machine hours: 2500 hour; name total_PMH
  total service life of power saw according to producer information

## Reference product
- power sawing, without catalytic converter: 1 hour; By-product classification allocatable product; CPC 88311: Wood manufacturing services
  production volume 1.1519e10 hour; name p_power_sawing; = 6000000*total_PMH
    1,00,000 chainsaws with 2500 PMH,
  property price 1.41653 EUR2005
    Calculated based on inputs: The price of the product has been calculated as a sum of the values of the material and energy inputs for this product. This value is therefore a rough estimation. It may underestimate the real price since there are additional expenses when producing any product. These expences can include for example labour costs, treatment of waste materials and profit for the producer. Please consider carefully whether this level of data quality is acceptable for your application.
  properties: carbon allocation 0 kg, carbon content 0

## Inputs from technosphere
- petrol, two-stroke blend: 1.6 kg; name m_petrol; source Willared, J. 2011; lognormal variance with pedigree 0.046, pedigree (4,5,4,5,1)
  average consumption per working hour; reference for normalizing values from different sources
  EcoSpold01Location=RER
  properties: heating value, net 43.2 MJ
  note on heating value, net: Assumed equal to "petroleum". LHV for petroleum: Based on literature, page 7, Report6, part 4
- power saw, without catalytic converter: 0.0004 unit; = 1/total_PMH; source Kellenberger D. 2007; lognormal variance with pedigree 0.576, pedigree (4,5,4,5,1)
  calculated based on producer information
- vegetable oil, refined: 0.54 kg; name m_lubricating_oil; source Kellenberger D. 2007; lognormal variance with pedigree 0.0206, pedigree (3,5,4,5,1)
  lubricating oil for chain
  properties: carbon content, non-fossil 0.768, dry mass 1 kg, heating value, net 38.4 MJ, wet mass 1 kg
  note on heating value, net: Values is approximated from HHV from "vegetable oil, crude". Source: Radovanovic,M.; Zivanovic,T.; Stojiljkovic,D.; Jovanovic,V.; Jerinic,N.; Knezevic,S. et.al. Utilization of sunflower husk as a fuel for industrial boilers - 20 years experience. Proc. 5th Eur. Conf. on Industrial Furnaces&Boilers 2000,vol.2,p.221-233. Available at: https://phyllis.nl/Biomass/View/2152

## Emissions to nature
- Acetaldehyde [air, non-urban air or from high stacks]: 0.000687 kg; source Magnusson R. 2000; lognormal variance with pedigree 0.178, pedigree (1,5,4,5,5)
  various sources: Magnussen et al (2002), Magnussen et al. (2000), Spielmann et al. 2007) as adequate
- Acetone [air, non-urban air or from high stacks]: 0.000157 kg; source Magnusson R. 2002; lognormal variance with pedigree 0.178, pedigree (1,5,4,5,5)
- Acrolein [air, non-urban air or from high stacks]: 4.41e-5 kg; source Magnusson R. 2002; lognormal variance with pedigree 0.21, pedigree (1,5,5,5,5)
- Benzaldehyde [air, non-urban air or from high stacks]: 0.000461 kg; source Magnusson R. 2002; lognormal variance with pedigree 0.21, pedigree (1,5,5,5,5)
- Benzo(a)pyrene [air, non-urban air or from high stacks]: 2.38e-7 kg; source Magnusson R. 2000; lognormal variance with pedigree 0.47, pedigree (1,5,5,5,5)
- Carbon dioxide, fossil [air, non-urban air or from high stacks]: 2.14709 kg; = m_petrol*0.8472*0.43199/12*(12+2*16); source Willared, J. 2011; lognormal variance with pedigree 0.0506, pedigree (1,5,5,5,1)
  calculated based on a C content of petrol of 0.847 kg C/kg and 43% of carbon content emitted as CO2 (personal communication power saw producer)
- Carbon monoxide, fossil [air, non-urban air or from high stacks]: 0.980683 kg; = m_petrol*0.8472*0.31006/12*(12+16); source Willared, J. 2011; lognormal variance with pedigree 0.6686, pedigree (2,5,4,5,1)
  calculated based on a C content of petrol of 0.8472 kg C/kg and 31% of carbon content emitted as CO (personal communication power saw producer)
- Dinitrogen monoxide [air, non-urban air or from high stacks]: 8.64e-5 kg; source Spielmann, M. 2007; lognormal variance with pedigree 0.178, pedigree (1,5,4,5,5)
- Formaldehyde [air, non-urban air or from high stacks]: 0.0351 kg; source Magnusson R. 2000; lognormal variance with pedigree 0.178, pedigree (1,5,4,5,5)
  (same comment as for Acetaldehyde)
- Methane, fossil [air, non-urban air or from high stacks]: 0.0413 kg; source Spielmann, M. 2007; lognormal variance with pedigree 0.178, pedigree (1,5,4,5,5)
- NMVOC, non-methane volatile organic compounds [air, non-urban air or from high stacks]: 0.298 kg; lognormal variance with pedigree 0.18, pedigree (3,5,4,5,5)
  amount of NMVOC emissions that are not inventoried as individual substances based on total NMVOC emissions of 26% of carbon content (personal communication by power saw producer) and based on a C content of petrol of 0.857 kg C/kg and excluding PAH, which are inventoried separately
- Nitrogen oxides [air, non-urban air or from high stacks]: 0.0086 kg; source Willared, J. 2011; lognormal variance with pedigree 0.178, pedigree (1,5,4,5,5)
  personal communication of power chain producer
- PAH, polycyclic aromatic hydrocarbons [air, non-urban air or from high stacks]: 5.95e-5 kg; lognormal variance with pedigree 0.438, pedigree (1,5,4,5,5)
  amount of PAH that are not inventoried as individual substances as quantified based on Magnussen et al (2002) and Magnussen et al. (2000)
- Pentane [air, non-urban air or from high stacks]: 0.0342 kg; source Magnusson R. 2002; lognormal variance with pedigree 0.178, pedigree (1,5,4,5,5)
- Propanal [air, non-urban air or from high stacks]: 0.000124 kg; source Magnusson R. 2002; lognormal variance with pedigree 0.178, pedigree (1,5,4,5,5)
- Sulfur dioxide [air, non-urban air or from high stacks]: 3.2e-5 kg; = m_petrol*0.00001/32*(32+2*16); source Schweizer Bundesrat 2003; lognormal variance with pedigree 0.01, pedigree (1,1,4,5,1)
  calculated based on an assumed S content of 0.001 % (by mass) as the threshold value for the Swiss tax on sulfur in Petrol
- Toluene [air, non-urban air or from high stacks]: 0.0332 kg; source Magnusson R. 2002; lognormal variance with pedigree 0.178, pedigree (1,5,4,5,5)
- Oils, non-fossil [soil, forestry]: 0.054 kg; = m_lubricating_oil*0.1; source Kellenberger D. 2007; lognormal variance with pedigree 0.11, pedigree (1,5,5,5,1)
  10% of the oil from lubricating the chain

## Sampling procedure
producer data and data from several scientific papers (emission measurements from different types of power saws, different fuels and additives)

## Extrapolations
See geography This dataset has been copied from an original dataset covering the geography RER. The uncertainty has been adjusted accordingly.

## Review by Emilia Moreno Ruiz 2014-05-21
updated GLO, copy of newest local DS
