# treatment of waste plastic plaster, inert material landfill

Dataset: EcoSpold 2, unit process
Geography: RoW
Time period: 1995-01-01 to 2023-12-31
Technology level: current
Classification: ISIC rev.4 ecoinvent: 3821:Treatment and disposal of non-hazardous waste
Scenario: Business-as-Usual
System model: Allocation, cut-off by classification
Generated by: Gabor Doka (obsolete)
Published in: Doka G. 2007
Database: ecoinvent
isCopyrightProtected: true
accessRestrictedTo: 1

## General comment
This dataset represents the activity of waste disposal of 'waste plastic plaster, for final disposal' in an inert material landfill.

## Included activities start
The activity starts with the waste being available at the gate of the treatment facility. Collection and transportation of the waste to the treatment plant is not included.

## Included activities end
The activity ends with the waste being treated and no direct emissions from inert material landfill (leachate) are inventoried, as they are considered negligible. The dataset contains only exchanges to process-specific burdens (energy, land use) and infrastructure.

## Geography
Modelling parameters affecting the treatment technology are not specific to this geography.

## Technology
Inert material landfill with leachate collection system and renaturation after closure. 50% of the sites is equipped with a base seal.

## Reference product
- waste plastic plaster, for final disposal: -1 kg; By-product classification Waste; CPC 39270: Waste, parings and scrap of plastics; HS2017 391590: Plastics n.e.c. in heading no. 3915; waste, parings and scrap
  production volume 9660.32 kg; = 82*118.8087851
    Production volume amount was scaled from the respective Swiss value. GDP scaling was employed with Switzerland accounting for roughly 0.8% of the global GDP.
  property carbon content, fossil 0.54
    C content was calculated for 1 kg DM, using data in Tab A.4, ecoinvent v2.2 report 13_I.
  property heating value, net 16.36 MJ
    LHV is calculated based on the Carbon content of the product. More details can be found on the respective documentation.
  property price 0 EUR2005
    Waste products are assigned a price of zero as they are assumed to require further treatment.
  properties: carbon allocation 0.54 kg, carbon content 0.54, carbon content, non-fossil 0, dry mass 1 kg, water content 0, water in wet mass 0 kg, wet mass 1 kg

## Inputs from technosphere
- inert material landfill: 1.48e-9 unit; lognormal variance with pedigree 0.042, pedigree (1,1,5,5,1)
  landfill infrastructure per kg waste, uncerteinty heeded in module.
- process-specific burdens, inert material landfill: 1 kg; lognormal variance with pedigree 0.042, pedigree (1,1,5,5,1)
  process-specific burdens per kg waste, uncerteinty heeded in module.

## Extrapolations
This dataset has been copied from an original dataset covering the geography CH. The uncertainty has been adjusted accordingly.

## Review by Niels Jungbluth 2003-05-28
Passed.
