# hardwood forestry, eucalyptus ssp., planted forest management

Dataset: EcoSpold 2, unit process
Geography: BR-SP
Time period: 2012-01-01 to 2023-12-31
Technology level: current
Classification: ISIC rev.4 ecoinvent: 0210:Silviculture and other forestry activities
Synonyms: energy wood; wood fuel
Scenario: Business-as-Usual
System model: Allocation, cut-off by classification
Generated by: Leticia De Santi Barrantes
Published in: Folegatti-Matsuura M. 2018
Database: ecoinvent
isCopyrightProtected: true
accessRestrictedTo: 1

## General comment
This dataset represents the production of 1 kg of eucalyptus wood fuel (fresh matter) from planted forest management as the prevailing management practices in a region that concentrates wood for energy purposes production in Brazil. Assumed wood basic density of 529 kg.m³-1. The actitivity lasts 14 years with 2 harvesting events. MAI is 50 m³/ha.year-1 in the first harvest and 40 m³/ha.year-1 in the second, resulting in a total of 633.8 m³.ha-1. Final moisture content of storage is 25%. The total amount of mineral fertilizers (N-P-K) and pesticides (glyphosate, sufluramide and flumioxazine) apllied are 131 kg N.ha-1; 55 kg P2O5.ha-1; 171 kg K2O.ha-1 and 17.6 kg pesticides.ha-1, respectively. Specie mainly cultivated is E. urograndis, in a rate of 1666 seedlings.hectare-1.
Source: BRUSCHINELLI (2014) [https://www.embrapa.br/busca-de-noticias/-/noticia/2301345/projeto-analisa-desempenho-socioambiental-da-producao-de-eucalipto] access 10 mar 2016
The process steps are showed below:
Source: Barrantes (2016), Master Thesis (not published yet)
References:
Canals, 2003: Contributions to LCA Methodology for Agricultural Systems. Site-dependency and soil degradation impact assessment: http://www.tdx.cat/handle/10803/3155
Nemecek & Schnetzer: Methods of assessment of direct field emissions for LCIs of agricultural production systems, Data v3.0 (2011): http://www.ecoinvent.org/fileadmin/talkpages/pages/01-01-crop-production/01_crop_production_-_direct_field_emissions___natural_resources_v1.1.pdf
Novais & Smyth (1999) Fósforo em solo e planta em condições tropicais. Viçosa: Universidade Federal de Viçosa, p. 399.
Novaes, Renan M. L. et al. (2017) Estimating 20-year land use change and derived CO2 emissions associated with crops, parture and forestry in Brazil and each of its 27 states. Global Change Biology, 2017, 1-13.
Nemecek T., Bengoa X., Lansche J., Mouron P., Riedener E., Rossi V. & Humbert S. (2015) Methodological Guidelines for the Life Cycle Inventory of Agricultural Products. Version 3.0, July 2015. World Food LCA Database (WFLDB). Quantis and Agroscope, Lausanne and Zurich, Switzerland.

## Included activities start
Activity starts with the establishment of the eucalyptus plantation in the first year, covers the maintenance during six years and the first harvesting in the seventh. Eucalyptus sprouts are conducted to regrowth and the same process is repited. Considering both rotation periods, the operations are:
1) starting from the seedling cultivation in a greenhouse of the region and transport to the field, liming, pit opening and seedling planting; 2) starting from the regrowth of the plants in the field after the first rotation is finished (there is no seedlings cultivation and planting activities);
1) the 6 years after establishment cover 3 fertilising, weed chemical control and ant control; 2) in the second rotation this 6 years cover just 1 fertilizing, weed chemical control and ant control;
In both situations 1) and 2), rotation period is 7 years, while in situation 2) the yield is 20% lower.

## Included activities end
The processing of wood is not performed as the final product are logs for energy. This activity ends with the logs at the forest road and includes time for drying in air before transportation. The dataset does not include the seedling production and the infrastructure building, just the maintenance of firebreaks (two times in 14 years) and forest roads (annually).

## Geography
The inventory is modelled for the state of São Paulo, in Brazil.

## Technology
Cultivation of wood to generate energy inside industries. Small scale of plantations (inside Brazilian proportions - 5,000 ha) with low level of mechanization. Most operations are manual except the pit opening and harvesting operations. Machines used in the harvesting step are: chainsaw to fell trees, tractor coupled to a trailer auto loadable to extract the wood from the field to the forest boarder and forestry loader to load the transportation vehicle.

## Time period
Time period of the most of the data collected for this dataset.

## Parameters
- LUC_crop_specific: 1 dimensionless
  This parameter allows to switch between a "crop specific" and a "country specific" approach when calculating the LUC of a crop. By default, the chosen approach is "crop specific", so the value of the parameter is 1. If you want to apply a "country specific" approach, turn the parameter to 0.
- clay content into soil: 50 % (obsolete); name Clay_content; lognormal variance with pedigree 0.216, pedigree (5,5,5,5,5)
  This value represents the fraction of clay content into soil (%).
  Used in the SQCB-NO3 model for the calculation of leaching of NO3.
- land transformation to: 0.00298258 m2/kg; name T_t; = 1000/(yield*density); lognormal variance with pedigree 0.008, pedigree (1,1,1,1,1)
  This value will be used to transform exchanges per ha to exchanges per kg of cleft timber. From Folegatti et al. (2016).
  Uncertainty: Variance of log-transformed data as recommended by Ecoinvent for "Land use, transformation" for agriculture.
- nitrogen in crop residues: 9002.94 kg N/ha; name Ncrop_residues; lognormal variance with pedigree 0.2106, pedigree (5,5,5,5,5)
  This value represents the nitrogen contained in the crop residues (kg N/ha). Used for the calculation of emissions of N2O to the air.
  From Barreto et al. (2008).
- nitrogen uptake by plant: 150 kg N/ha; name Nuptake_plant; lognormal variance with pedigree 0.2106, pedigree (5,5,5,5,5)
  This value represents the N taken by plant during its growth (kg N/ha). Used in the SQCB-NO3 model for the calculation of leaching of NO3.
  From Nemececk & Schnetzer (2011),
- organic nitrogen into soil: 7785 kg N/ha; name Norg_soil; lognormal variance with pedigree 0.2106, pedigree (5,5,5,5,5)
  Norg is the mass of organic nitrogen contained in the upper 50 cm of soil per ha. Naturally only a fraction of this mass is mineralised and, hence, available for uptake by plants and leaching to the ground water.
  This fraction is determined by the mineralisation rate, which is 1.6% here and implicitly included in the regression coefficient of the term Norg. Used in the SQCB-NO3 model for the calculation of leaching of NO3. From Gatto (2010).
- precipitation, annual: 1254 mm/year; name precipitation; lognormal variance with pedigree 0.2106, pedigree (5,5,5,5,5)
  This value represents the average annual precipitation in BR-SP.
  Used in the SQCB-NO3 model for the calculation of leaching of NO3.
- rooting depth: 2.5 m; name root_depth; lognormal variance with pedigree 0.2106, pedigree (5,5,5,5,5)
  This value represents the rooting depth of the crop (m).
  Used in the SQCB-NO3 model for the calculation of leaching of NO3.
  From Foelkel (2016).
- soil eroded: 7277.2 kg/ha.yr; name soil_eroded; lognormal variance with pedigree 0.2106, pedigree (5,5,5,5,5)
  This value represents the quantity of soil eroded in 14 years (kg/ha). Used for the calculation of P emissions through water erosion to surface water. From Silva et al. (2010).
- total liming: 900 kg/ha; name L_total; lognormal variance with pedigree 0.2106, pedigree (5,5,5,5,5)
  This value represents the total limestone applied (kg N/ha).
- total nitrogen: 131.03 kg/ha; name N_total; lognormal variance with pedigree 0.2106, pedigree (5,5,5,5,5)
  This value represents the total nitrogen in mineral fertilisers (kg N/ha).
- yield, hardwood, m3: 633.8 m³/ha; name yield; lognormal variance with pedigree 0.2106, pedigree (5,5,5,5,5)
  refers to the yield in the first harvest of the forest in 7th year plus the yield achieved in the second harvest in 14th year (20% lower)

## Reference product
- cleft timber, measured as dry mass: 1 kg; name REF_PRODUCT; By-product classification allocatable product; CPC 3110: Wood, sawn or chipped lengthwise, sliced or peeled, of a thickness exceeding 6 mm; railway or tramway sleepers […]; HS2017 4401: Fuel wood, in logs, billets, twigs, faggots or similar forms; wood in chip or particles; sawdust and wood was[...]
  1 kg of dry mass, including bark. The total yield is 633,8 m³.ha-1 with a final moisture content at storage of 25%.
  production volume 3.26122e9 kg; name RP_PV_1; = 6164880 * density
    The production of cleft timber from eucalyptus in São Paulo (BR), in 2016, is 6164880 m³ (IBGE - PEVS, 2014).
  property basic density 529 kg/m3; name density
    Assumed the average wood density found in the literature.
  property carbon content, fossil 0; name cleft_timber_C_content_fossil
    fossil carbon content on a dry matter basis
  property carbon content, non-fossil 0.494; name cleft_timber_C_content_non_fossil
    biogene carbon content on a dry matter basis
  property dry mass 0.75 kg; name cleft_timber_DM; = cleft_timber_WM - cleft_timber_WWM
  property heating value, gross 20.4556 MJ; name gross_energy; = UnitConversion(4889, 'kilocalorie thermochemical', 'MJ')
    According to Quirino et al. (2005).
  property price 0.073 EUR2005
    Calculated based on data from FAOSTAT (accessed 20140429). The price is calculated by using data on total world import quantity (m3) and import value (1000 USD), year 2005. 3411751 m3 of Wood Fuel Trd was imported in the world in 2005. The import value was 161229000 USD. The calculated price is thus (161229000/3411751=47.3*0.8=) 38.1 Euro/m3. The density of cleft timber, measured as dry mass is 541.2 kg/m3. The recalculated price is (1/541.2*38.1=) 0.07 Euro/kg. Using the same approach the calculated price for 2010 was 0.112 Euro/kg.
  property water content 0.333333; = cleft_timber_WWM / cleft_timber_DM
  property water in wet mass 0.25 kg; name cleft_timber_WWM
  property wet mass 1 kg; name cleft_timber_WM
  properties: carbon allocation 0.3705 kg, carbon content 0.494, heating value, net 14.46 MJ

## Inputs from technosphere
- ammonium nitrate: 0.000852388 kg; name N_an; = (100.02 / yield / density)*2.85731828339295; lognormal variance with pedigree 0.0052, pedigree (3,3,3,1,1)
  The exchange has been updated from 'ammonium nitrate, as N' into 'ammonium nitrate' and therefore its amount has been scaled (multiplied) from 0.0003 kg by 2.8573 kg of 'ammonium nitrate' per kg of 'ammonium nitrate, as N'. Original comment of the exchange is: Ammonium nitrate as source of N. N is applied through NPK-fertilizer and was converted using the NPK formulation. Amount for typical system from Folegatti et al. (2016).
  Original values per ha were attributed to total volume of wood produced per hectare (changing the reference product from ha to m3) and to density (changing the reference product from m3 to kg).
  properties: dry mass 1 kg, wet mass 1 kg
- ammonium sulfate: 5.96516e-5 kg; name N_as; = 20 / yield / density; lognormal variance with pedigree 0.0052, pedigree (3,3,3,1,1)
  Ammonium sulfate as source of N. N is applied through NPK-fertilizer and was converted using the NPK formulation. Amount for typical system from Folegatti et al. (2016).
  Original values per ha were attributed to total volume of wood produced per hectare (changing the reference product from ha to m3) and to density (changing the reference product from m3 to kg).
  properties: dry mass 1 kg, wet mass 1 kg
- diesel, burned in agricultural machinery: 0.020195 MJ; = 6.771E+03 / yield / density; lognormal variance with pedigree 0.3046, pedigree (3,3,3,1,1)
  Related to diesel for maintenance of forest road in the end of the first and second rotation period (7th and 14th year) PLUS the diesel consumed for maintenance of firebreaks (once a year) PLUS diesel consumed to loading the transport vehicles. Amount for typical system from Folegatti et al. (2016).
  Original values per ha were attributed to total volume of wood produced per hectare (changing the reference product from ha to m3) and to density (changing the reference product from m3 to kg).
- eucalyptus seedling, for planting: 0.00521951 unit; name seedling; = 1.75E+03 / yield / density; lognormal variance with pedigree 0.0052, pedigree (3,3,3,1,1)
  Amount for typical system from Folegatti et al. (2016).
  Original values per ha were attributed to total volume of wood produced per hectare (changing the reference product from ha to m3) and to density (changing the reference product from m3 to kg).
  properties: carbon content, non-fossil 0.494, dry mass 0.6 kg, water content 0.666667, wet mass 1 kg
- glyphosate: 1.39585e-5 kg; = 4.68 / yield / density; lognormal variance with pedigree 0.0052, pedigree (3,3,3,1,1)
  (same comment as for eucalyptus seedling, for planting)
  properties: carbon content, fossil 0.214286, dry mass 1 kg, wet mass 1 kg
- gravel, crushed: 0.0453461 kg; name gravel; = 15203.64 / yield / density; lognormal variance with pedigree 0.0052, pedigree (3,3,3,1,1)
  Related to the input of gravel for maintenance of forest roads in the end of both rotation periods. Amount for typical system from Folegatti et al. (2016).
  Original values per ha were attributed to total volume of wood produced per hectare (changing the reference product from ha to m3) and to density (changing the reference product from m3 to kg).
  properties: dry mass 1 kg, wet mass 1 kg
- inorganic nitrogen fertiliser, as N: 3.28084e-5 kg; name N_fert; = 11 / yield / density; lognormal variance with pedigree 0.0052, pedigree (3,3,3,1,1)
  Nitrogen fertiliser is representing monoammonium phosphate as source of N. N is applied through NPK-fertilizer and was converted using the NPK formulation. Amount for typical system from Folegatti et al. (2016).
  Original values per ha were attributed to total volume of wood produced per hectare (changing the reference product from ha to m3) and to density (changing the reference product from m3 to kg).
  properties: dry mass 1 kg, wet mass 1 kg
- inorganic phosphorus fertiliser, as P2O5: 0.000164072 kg; = 55.01 / yield / density; lognormal variance with pedigree 0.0052, pedigree (3,3,3,1,1)
  "Monoammonium phosphate as source of P2O5. P2O5 is applied through NPK-fertilizer and was converted using the NPK formulation. Amount for typical system from Folegatti et al. (2016).
  Original values per ha were attributed to total volume of wood produced per hectare (changing the reference product from ha to m3) and to density (changing the reference product from m3 to kg)."
  properties: dry mass 1 kg, wet mass 1 kg
- land use change, forest, intensive: 1.87903e-5 ha; = 0.0000187902536445636*LUC_crop_specific+(0*(1-LUC_crop_specific))
  Calculated value. Land use change (LUC) from Novaes et al. (2017).
- lime: 0.00268432 kg; name limestone; = L_total / yield / density; lognormal variance with pedigree 0.0052, pedigree (3,3,3,1,1)
  (same comment as for eucalyptus seedling, for planting)
  properties: carbon content, fossil 0.120005, dry mass 1 kg, wet mass 1 kg
- pesticide, unspecified: 3.05714e-7 kg; name pesticides; = 0.1025 / yield / density; lognormal variance with pedigree 0.0052, pedigree (3,3,3,1,1)
  Related to the input of pesticide to aint control - sulfluramide (0.0525 kg ha-1) plus the pesticide to pre-emergent weed control - isoxaflutole (0.05 kg ha-1). Amount for typical system from Folegatti et al. (2016).
  Original values per ha were attributed to total volume of wood produced per hectare (changing the reference product from ha to m3) and to density (changing the reference product from m3 to kg).
  properties: carbon content, fossil 0.486978, dry mass 1 kg, wet mass 1 kg
- potassium chloride: 0.000807311 kg; = (171 / yield / density)*1.58289736294535; lognormal variance with pedigree 0.0052, pedigree (3,3,3,1,1)
  The exchange has been updated from 'potassium chloride, as K2O' into 'potassium chloride' and therefore its amount has been scaled (multiplied) from 0.0005 kg by 1.5829 kg of 'potassium chloride' per kg of 'potassium chloride, as K2O'. Original comment of the exchange is: Potassium chloride as source of K2O. K2O is applied through NPK-fertilizer and was converted using the NPK formulation. Amount for typical system from Folegatti et al. (2016).
  Original values per ha were attributed to total volume of wood produced per hectare (changing the reference product from ha to m3) and to density (changing the reference product from m3 to kg).
  properties: dry mass 1 kg, wet mass 1 kg
- power sawing, with catalytic converter: 0.000209317 hour; = 70.18 / yield / density; lognormal variance with pedigree 0.0052, pedigree (3,3,3,1,1)
  Input covers hand-held gasoline-driven equipment used for open the hole where seedlings are planted (0.34 h/ha) and harvesting with chainsaw (0.74 h/ha). Amount for typical system from Folegatti et al. (2016).
  Original values per ha were attributed to total volume of wood produced per hectare (changing the reference product from ha to m3) and to density (changing the reference product from m3 to kg).
- tap water: 0.00262467 kg; name water; = 880 / yield / density; lognormal variance with pedigree 0.0052, pedigree (3,3,3,1,1)
  Related to water consumption to dilution of pesticides and fertilizers applied with costal pump. Amount for typical system from Folegatti et al. (2016).
  Original values per ha were attributed to total volume of wood produced per hectare (changing the reference product from ha to m3) and to density (changing the reference product from m3 to kg).
  properties: carbon content, fossil 0.00178991, dry mass 0.000337476 kg, water content 2962.17, wet mass 1 kg
  note on carbon content, fossil: Bicarbonate content is 2.93 mol/m3. CO2 content is 0.1 mol/m3 (ecoinvent v2.2 report 8, Tab 93.1).
- transport, tractor and trailer, agricultural: 0.0101921 metric ton*km; = 3417.21 / yield / density; lognormal variance with pedigree 0.1246, pedigree (3,3,3,1,1)
  Covers the extraction of wood from the harvest place to the border of the road. Amount for typical system from Folegatti et al. (2016).
  Original values per ha were attributed to total volume of wood produced per hectare (changing the reference product from ha to m3) and to density (changing the reference product from m3 to kg).
- waste concrete gravel: -0.0453461 kg; name BP_amount_1; = gravel; lognormal variance with pedigree 0.0032, pedigree (3,3,1,1,1)
  Results from the input of gravel.
  production volume; = RP_PV_1 * (BP_amount_1 / REF_PRODUCT)
    Calculated from production volume of reference product using the relative outputs.
  properties: dry mass 1 kg, wet mass 1 kg

## Inputs from nature
- Carbon dioxide, in air [natural resource, in air]: 1.3585 kg; = 44/12 * ( cleft_timber_C_content_non_fossil * REF_PRODUCT * cleft_timber_DM ); source Nemecek, T. 2011; lognormal variance with pedigree 0.0986, pedigree (4,5,5,5,4)
  Resource input, referring to total biomass harvested, i.e. wood including bark. CO2 absorbed during photosyntesis. See "3.1 CO2 from the Atmosphere" in Nemececk & Schnetzer (2011).
- Energy, gross calorific value, in biomass [natural resource, biotic]: 20.4556 MJ; = gross_energy; lognormal variance with pedigree 0.0986, pedigree (4,5,5,5,4)
  Calorific value of Eucalyptus wood.
- Occupation, forest, intensive [natural resource, land]: 0.0417561 m2*year; = T_t*14; lognormal variance with pedigree 0.0061, pedigree (3,2,3,1,1)
  Area occupied for the production of wood over two rotation periods; 1 ha produces 633.8 m³/ha during 14 years.
- Transformation, from forest, intensive [natural resource, land]: 0.000149129 m2; = T_t/20; lognormal variance with pedigree 0.011325, pedigree (2,2,3,2,2)
  Transformation related to the area occupied for the production of wood over two rotation periods.
- Transformation, to forest, intensive [natural resource, land]: 0.000149129 m2; = T_t/20; lognormal variance with pedigree 0.011325, pedigree (2,2,3,2,2)
  (same comment as for Transformation, from forest, intensive)

## Emissions to nature
- Ammonia [air, non-urban air or from high stacks]: 1.33923e-5 kg; name NH3; = 17/14*((N_fert*0.466461632733939*0.093)+(N_an*0.349978511603734*0.030)+(N_as*0.011)); source Nemecek T. 2015; lognormal variance with pedigree 0.138, pedigree (4,5,5,5,4)
  NH3 emissions from applied mineral fertilisers are calculated according to Agrammon model available in EEA/EMEP (2013), page 35. Constant emission factors are: 1.1% for ammonium sulphate, 3% for ammonium nitrate and 9.3% for mono-ammonium phosphate; in soils with pH<=7 (brazilian conditions).
- Carbon dioxide, fossil [air, non-urban air or from high stacks]: 0.00123031 kg; = limestone * 0.125 * 44/12; source Nemecek T. 2015; lognormal variance with pedigree 0.0986, pedigree (4,5,5,5,4)
  Emissions of CO2 to air from limestone application.
- Dinitrogen monoxide [air, non-urban air or from high stacks]: 0.000428101 kg; name N2O; = 44/28*(0.01*(N_total+ Ncrop_residues)+ (0.01*14/17*NH3) + 0.0075*14/62*NO3) / yield / density; source Nemecek, T. 2011; lognormal variance with pedigree 0.138, pedigree (4,5,5,5,4)
  Emissions of N2O to the air are calculated through the showed mathematical relation that is in accordance with "2.4 EMISSIONS OF N2O TO THE AIR" in Nemecek & Schnetzer (2011).
  Original values per ha were attributed to total volume of wood produced per hectare (changing the reference product from ha to m3) and to density (changing the reference product from m3 to kg).
- Nitrogen oxides [air, non-urban air or from high stacks]: 8.99012e-5 kg; = N2O*0.21; source Nemecek, T. 2011; lognormal variance with pedigree 0.0407, pedigree (4,3,3,3,1)
  Emissions of NOx to the air are calculated through the showed mathematical relation that is in accordance with "2.5 EMISSIONS OF NOX TO THE AIR" in Nemecek & Schnetzer (2011).
  Uncertainty: Variance of log-transformed data as recommended by Ecoinvent for "NOX, N2O" for agriculture.
- Water [air, non-urban air or from high stacks]: 2.62467e-6 m3; name water_air; = water/1000; lognormal variance with pedigree 0.0986, pedigree (4,5,5,5,4)
  It is assumed that the total water applied evaporates.
- Cadmium II [soil, forestry]: 4.89889e-9 kg; = 1.6425E-03 / yield / density; source Milà i Canals, L. 2003; lognormal variance with pedigree 0.188, pedigree (4,5,5,5,4)
  Emissions of heavy metals to soil and surface water estimated from mineral fertilisers and liming as recommended by Canals (2003). Due to lack of data about metal content in wood, it was considered zero absorption.
  Original values per ha were attributed to total volume of wood produced per hectare (changing the reference product from ha to m3) and to density (changing the reference product from m3 to kg).
- Chromium III [soil, forestry]: 8.31603e-8 kg; = 2.7882E-02 / yield / density; source Milà i Canals, L. 2003; lognormal variance with pedigree 0.188, pedigree (4,5,5,5,4)
  (same comment as for Cadmium II)
- Copper ion [soil, forestry]: -9.96152e-6 kg; = -3.3399 / yield / density; source Milà i Canals, L. 2003
  "Emissions of heavy metals to soil and surface water estimated from mineral fertilisers and liming as recommended by Canals (2003). It was considered copper absorption in wood. According to Andrade et al. (2011), there is 10 mg Cu/kg wood in a similar product.
- Glyphosate [soil, agricultural]: 1.39585e-5 kg; = glyphosate; source Nemecek, T. 2011; lognormal variance with pedigree 0.131, pedigree (4,5,5,5,4)
  "All pesticides applied for crop production were assumed to end up as emissions to the soil. The amounts of pesticides used as inputs were thus simultaneously calculated as outputs (emissions to agricultural soil)", as recomended by Nemecek & Schnetzer (2011), "2.9 EMISSIONS OF PESTICIDES TO AGRICULTURAL SOIL" (page 21).
  Original values per ha were attributed to total volume of wood produced per hectare (changing the reference product from ha to m3) and to density (changing the reference product from m3 to kg).
- Isoxaflutole [soil, agricultural]: 1.49129e-7 kg; = 5E-02 / yield / density; source Nemecek, T. 2011
  (same comment as for Glyphosate)
- Lead II [soil, forestry]: 1.15506e-8 kg; = 3.8727E-03 / yield / density; source Milà i Canals, L. 2003; lognormal variance with pedigree 0.188, pedigree (4,5,5,5,4)
  (same comment as for Cadmium II)
- Nickel II [soil, forestry]: -1.75811e-7 kg; = -5.8946E-02 / yield / density; source Milà i Canals, L. 2003
  Emissions of heavy metals to soil and surface water estimated from mineral fertilisers and liming as recommended by Canals (2003), metal content in wood from Freddo et al. (1999). According to the authors, there is 0,195 mg Ni/kg wood in a similar product.
  Original values per ha were attributed to total volume of wood produced per hectare (changing the reference product from ha to m3) and to density (changing the reference product from m3 to kg).
- Pesticides, unspecified [soil, agricultural]: 1.56585e-7 kg; = 5.25E-02 / yield / density; source Nemecek, T. 2011; lognormal variance with pedigree 0.131, pedigree (4,5,5,5,4)
  "All pesticides applied for crop production were assumed to end up as emissions to the soil. The amounts of pesticides used as inputs were thus simultaneously calculated as outputs (emissions to agricultural soil)", as recomended by Nemecek & Schnetzer (2011), "2.9 EMISSIONS OF PESTICIDES TO AGRICULTURAL SOIL" (page 21).
  This exchange represents the input of sulfluramide.
  Original values per ha were attributed to total volume of wood produced per hectare (changing the reference product from ha to m3) and to density (changing the reference product from m3 to kg).
- Zinc II [soil, forestry]: -4.58363e-5 kg; = -1.5368E+01 / yield / density; source Milà i Canals, L. 2003
  Emissions of heavy metals to soil and surface water estimated from mineral fertilisers and liming as recommended by Canals (2003), metal content in wood from Andrade et al. (2011). According to the authors, there is 46 mg Zn/kg wood in a similar product.
  Original values per ha were attributed to total volume of wood produced per hectare (changing the reference product from ha to m3) and to density (changing the reference product from m3 to kg).
- Cadmium II [water, surface water]: 4.89948e-13 kg; = 1.6427E-07 / yield / density; source Milà i Canals, L. 2003; lognormal variance with pedigree 0.188, pedigree (4,5,5,5,4)
  Emissions of heavy metals to soil and surface water estimated from mineral fertilisers and liming as recommended by Canals (2003). Due to lack of data about metal content in wood, it was considered zero absorption.
- Chromium III [water, surface water]: 8.31692e-12 kg; = 2.7885E-06 / yield / density; source Milà i Canals, L. 2003; lognormal variance with pedigree 0.188, pedigree (4,5,5,5,4)
  (same comment as for Cadmium II)
- Copper ion [water, surface water]: -9.96241e-10 kg; = -3.3402E-04 / yield / density; source Milà i Canals, L. 2003
  Emissions of heavy metals to soil and surface water estimated from mineral fertilisers and liming as recommended by Canals (2003), metal content in wood from Andrade et al. (2011). According to the authors, there is 10 mg Cu/kg wood in a similar product.
- Lead II [water, surface water]: 1.15518e-12 kg; = 3.8731E-07 / yield / density; source Milà i Canals, L. 2003; lognormal variance with pedigree 0.188, pedigree (4,5,5,5,4)
  (same comment as for Cadmium II)
- Nickel II [water, surface water]: -1.75829e-11 kg; = -5.8952E-06 / yield / density; source Milà i Canals, L. 2003
  "Emissions of heavy metals to soil and surface water estimated from mineral fertilisers and liming as recommended by Canals (2003), metal content in wood from Freddo et al. (1999). According to the authors, there is 0,195 mg Ni/kg wood in a similar product.
- Nitrate [water, ground-]: 0.000336554 kg; name NO3; = 62/14*((21.37 + precipitation/(Clay_content*root_depth) * (0.0037*N_total + 0.0000601*Norg_soil - 0.00362*Nuptake_plant)) / yield / density); source Nemecek, T. 2011; lognormal variance with pedigree 0.138, pedigree (4,5,5,5,4)
  Emissions of nitrate to the groundwater are calculated through the showed mathematical relation that is in accordance with "2.2.2 The SQCB-NO3 model" in Nemececk & Schnetzer (2011), as "SALCA-NO3 model" has "Geographic scope of application: Europe"
  Original values per ha were attributed to total volume of wood produced per hectare (changing the reference product from ha to m3) and to density (changing the reference product from m3 to kg).
- Phosphorus [water, surface water]: 7.67049e-6 kg; = soil_eroded * 0.00095 * 1.86 * 0.2 / yield / density; source Nemecek, T. 2011; lognormal variance with pedigree 0.138, pedigree (4,5,5,5,4)
  Due to phosphorus low mobility in Brazilian soils, its emissions through leaching and run-off were disregarded (Novais & Smyth, 1999). Only P emission by water erosion through surface water was considered. They are calculated through the showed mathematical relation that is in accordance with "2.3.3 Phorsphorous Emissions Through Water Erosion to Surface Water" Nemecek and Schnetzer (2011).
- Zinc II [water, surface water]: -4.58423e-9 kg; = -1.5370E-03 / yield / density; source Milà i Canals, L. 2003
  "Emissions of heavy metals to soil and surface water estimated from mineral fertilisers and liming as recommended by Canals (2003), metal content in wood from Andrade et al. (2011). According to the authors, there is 46 mg Zn/kg wood in a similar product.

## Sampling procedure
The main source of data for forestry inputs and operations is a project conducted by Embrapa Florestas, Embrapa Meio Ambiente (CNPMA) and Universidade Tecnológica Federal do Paraná (UTFPR). Data are provided by producers located in the south of São Paulo state. First information was collected with 9 companies and validation data was proceeded with two of them.
Emissions from the forestry process are estimated according to Nemecek and Schnetzer (2011) and Canals (2003).

## Extrapolations
Carbon content is based on ecoinvent database
