# concrete production, 45MPa, for building construction, with cement, CEM II/B

Dataset: EcoSpold 2, unit process
Geography: GLO
Time period: 2017-01-01 to 2023-12-31
Technology level: current
Classification: ISIC rev.4 ecoinvent: 2395:Manufacture of articles of concrete, cement and plaster
Synonyms: 45MPa ready mixed concrete; ready mixed concrete; ready-mix concrete
Scenario: Business-as-Usual
System model: Allocation, cut-off by classification
Share of production covered: 35 %
Generated by: Rachel Muigai
Published in: Muigai, R. 2017
Database: ecoinvent
isCopyrightProtected: true
accessRestrictedTo: 1

## General comment
This dataset represents the production of 45MPa ready-mix concrete. Density: 2,260 kg/m³. The composition of concrete (for 1 m³) contains: Portland fly ash cement 464 kg, Water 147 kg, Gravel 1050kg, Sand 746 kg, Admixtures (air-entrainers and superplastisizers) 4.63kg. [The amount of ingredients indicated here do not include the production waste amount of 24.5kg per 1m3 of concrete adopted from "concrete production, 50MPa, RNA only, GLO 2006" dataset [accessed on 2017/12/14 ]. The production waste volume is proportionally shared between the inputs: cement, sand and gravel. The adjusted input values are indicated in the exchange section. In addition, the amount of water included here refers to the batch water. Non-process water is adopted from "concrete production, 50MPa, RNA only, GLO 2006" dataset [accessed on 2017/12/14 ]]. 45 MPa concrete is High-strength concrete should be used for suspended structural beams and slabs, and pre-cast items such as flagstones and heavy-duty floors such as workshop floors.

## Included activities start
From reception of raw materials at the ready-mix plant gate.

## Included activities end
This activity ends with the input of concrete in the mixing truck. The dataset includes the whole manufacturing processes to produce ready-mixed concrete, internal processes (material handling and mixing) and infrastructure. The dataset does not include the transportation of concrete in the mixing truck. An average of 4.64 litres of diesel is used on average transportation of 1m3 concrete.

## Geography
This dataset is a copy from the corresponding activity from South Africa. Therefore, South African data is used. For some exchanges RER-modules have been used as proxy. Data quality indicators adjusted accordingly.

## Technology
Typical technology for South Africa production.

## Parameters
- fraction, process water, to air: 0.15 dimensionless; name fraction_PW_to_air
  Rough estimation to represent water evaporation of process water. Adopted from "20MPa, RNA only, CA-QC 2006" dataset on 2017/11/05
- fraction_01: 0.8 dimensionless; name fraction_ethylene_oxide
  Literature value. Superplastisizer assumed to be 80% ehtlyne oxide. 20 MPa mix admixtures. Source: Athena and morrison Hershfield (2012): Life Cycle Assessment of Precast Concrete Commerical Buildings Cradle-to-Grave. Adopted from "20MPa, RNA only, CA-QC 2006" dataset on 2017/11/05
- fraction_02: 0.2 dimensionless; name fraction_acetic_acid
  Literature value. Superplastisizer assumed to be 20% acetic acid. 20 MPa mix admixtures. Source: Athena and morrison Hershfield (2012): Life Cycle Assessment of Precast Concrete Commerical Buildings Cradle-to-Grave. Adopted from "20MPa, RNA only, CA-QC 2006" dataset on 2017/11/05
- superplastisizer: 4.63 kg
  Estimated value from primary data collection

## Reference product
- concrete, 45MPa: 1 m3; name ref; By-product classification allocatable product; CPC 37510: Non-refractory mortars and concretes; HS2017 6810: Cement, concrete or artificial stone; whether or not reinforced, articles thereof
  45 MPa concrete is High-strength concrete should be used for suspended structural beams and slabs, and pre-cast items such as flagstones and heavy-duty floors such as workshop floors.
  production volume 11417.3 m3; name PV_ref
    The global production volume was calculated as follows: 1) The total production volume of each country was calculated 2) The production volume was scaled based on construction output (*) 3) The average of the results was assumed to be the GLO PV 4) The share of each different technology was calculated 5) The weighted average of the shares for each country was used to split the GLO PV into different technologies (*) Construction output assumed per country Country Share ZA 0.50% BR 2.01% CH 0.36% CO 0.58% IN 9.67% PE 0.31% CA-QC 0.37% RNA without CA-QC 9.03% AT 0.40% Source: OECD. 2018. Input-Output Tables. http://www.oecd.org/trade/input-outputtables.htm. United Nations Statistics Division. 2019. UN data. A world of information. http://data.un.org/. Timmer, M.P., E. Dietzenbacher, B. Los, R. Stehrer, and G.J. de Vries. 2015. An Illustrated User Guide to the World Input-Output Database: the Case of Global Automotive Production. Review of International Economics 23(3): 575-605. http://doi.wiley.com/10.1111/roie.12178. The data was adjusted based on PPP, data from: The World Bank. 2019. World Bank Open Data. https://data.worldbank.org/
  property carbon content, fossil 1e-51; name ref_C_content_fossil
    Estimated value to zero, based on components properties.
  property cement content 464 kg; name cement
    Calculated value. From primary data collection
  property dry mass 2260 kg; name ref_DM; = sand+gravel+cement
  property gravel content 1050 kg; name gravel
    Calculated value. From primary data collection
  property price 185 EUR2005
    Calculated value based on data from United Nations Commodity Trade Statistics Database (comtrade.un.org). UN comtrade category: 681019 Tiles & flagstones of cement, concrete, artificial ston. Year 2005. Using exchange rate of 1EURO = 1.209 USD. Average of price of import into 5 main markets (EU, US, JP, IN and CN).
  property sand content 746 kg; name sand
    Calculated value. From primary data collection
  property water content 0.0650442; name ref_water_content; = ref_WWM/ref_DM
  property water in wet mass 147 kg; name ref_WWM; = batch_water
  property wet mass 2407 kg; name ref_WM; = ref_WWM+ref_DM
  properties: carbon allocation 2.26e-48 kg, carbon content 1e-51

## Inputs from technosphere
- acetic acid, without water, in 98% solution state: 0.926 kg; name AA_Amount; = fraction_acetic_acid*superplastisizer; lognormal variance with pedigree 0.0022, pedigree (1,1,2,5,1)
  Superplastisizer. Primary data collection of superplasticizer (kg) per m3 of concrete
  Uncertainty: C
  property carbon content, fossil 0.400016; name AA_C_content_fossil
  properties: dry mass 1 kg, heating value, net 14.6 MJ, wet mass 1 kg
  note on carbon content, fossil: Adopted from "20MPa, RNA only, CA-QC 2006" dataset on 2017/11/05
  note on heating value, net: Based on literature, page 10, Althaus H.-J., Chudacoff M., Hischier R., Jungbluth N., Osses M. and Primas A. (2007) Life Cycle Inventories of Chemicals. Final report ecoinvent data v2.0 No. 8. EMPA, Swiss Centre for Life Cycle Inventories, Dübendorf, CH, Online-Version under: www.ecoinvent.org.
- cement, CEM II/B: 8.48769, 429.808, 30.4276 kg (3 suppliers, which the file names only by identifier); sum of these 468.723 kg; = cement*(1+ Waste/ ref_WM); lognormal variance with pedigree 0.0033, pedigree (2,1,2,5,1)
  Primary data collected from ready mix plant plant. Portland fly ash cement content in 1 m3 of concrete. Value includes production waste.
  properties: dry mass 1 kg, wet mass 1 kg
- concrete mixing factory: 4.57e-7 unit; source Kellenberger D. 2007; lognormal variance with pedigree 0.3246, pedigree (2,1,3,5,1)
  Adopted value. Adopted from "concrete production, 50MPa, RNA only, GLO 2006" dataset [accessed on 2017/12/14 ]
- diesel, burned in building machine: 15.6427 MJ; = diesel_input*1000*density_diesel*NHV_diesel*42.8; lognormal variance with pedigree 0.0022, pedigree (1,1,2,5,1)
  Ready mix plant data. Energy use in ready-mix plant. Adopted from "concrete production, 50MPa, RNA only, GLO 2006" dataset [accessed on 2017/12/14 ]
  Uncertainty: C
  property density 0.84 kg/l; name density_diesel
  property fuel input in physical units, m3 0.0004351 m3; name diesel_input; = 0.4351/1000
  property heating value, net 1 MJ; name NHV_diesel
  note on density: ecoinvent report 1, table 4.6. Adopted from "20MPa, RNA only, CA-QC 2006" dataset on 2017/11/05
  note on heating value, net: ecoinvent, report 1, table 4.6. Adopted from "20MPa, RNA only, CA-QC 2006" dataset on 2017/11/05
- electricity, medium voltage: 3.57 kWh; lognormal variance with pedigree 0.0202, pedigree (4,1,2,5,1)
  Primary data collected from ready mix plant plant. Energy use in ready-mix plant.
  Uncertainty: T
- ethylene oxide: 0.725984, 2.97802 kg (2 suppliers, which the file names only by identifier); sum of these 3.704 kg; = fraction_ethylene_oxide*superplastisizer; lognormal variance with pedigree 0.0022, pedigree (1,1,2,5,1)
  Superplastisizer. Literature value
  Uncertainty: C
  properties: carbon content, fossil 0.545455, dry mass 1 kg, heating value, net 27.53 MJ, wet mass 1 kg
- gravel, round: 0.275779, 1060.41 kg (2 suppliers, which the file names only by identifier); sum of these 1060.69 kg; = gravel*(1+Waste/Ref_WM); lognormal variance with pedigree 0.0022, pedigree (1,1,2,5,1)
  Primary data collected from ready mix plant plant. Gravel content in 1 m3 of concrete. Value includes production waste.
  Uncertainty: C
  properties: dry mass 1 kg, wet mass 1 kg
- lubricating oil: 0.0020706, 0.0098294 kg (2 suppliers, which the file names only by identifier); sum of these 0.0119 kg; source Kellenberger D. 2007; lognormal variance with pedigree 0.0146, pedigree (2,1,3,5,1)
  (same comment as for concrete mixing factory)
  properties: carbon content, fossil 0.75, dry mass 1 kg, heating value, net 40.2 MJ, wet mass 1 kg
  note on carbon content, fossil: Lubricating oil is produced from diesel. C-content/dry mass of fats and oils considered 75%, from: ecoinvent v2.2 report, n 15a, pg 40. Adopted from "20MPa, RNA only, CA-QC 2006" dataset on 2017/11/05
  note on heating value, net: Literature value, Source: IPCC 2006, 2006 IPCC Guidelines for National Greenhouse Gas Inventories, Prepared by the National Greenhouse Gas Inventories Programme, Eggleston H.S., Buendia L., Miwa K., Ngara T. and Tanabe K. (eds). Published: IGES, Japan
- sand: 11.402, 0.136519, 741.996, 0.0591939 kg (4 suppliers, which the file names only by identifier); sum of these 753.593 kg; = sand*(1+Waste/Ref_WM); lognormal variance with pedigree 0.0022, pedigree (1,1,2,5,1)
  Primary data collected from ready mix plant plant. Sand content in 1 m3 of concrete. Value includes production waste.
  Uncertainty: C
  properties: dry mass 1 kg, wet mass 1 kg
- steel, low-alloyed, hot rolled: 0.0238 kg; source Kellenberger D. 2007; lognormal variance with pedigree 0.0146, pedigree (2,1,3,5,1)
  Adopted value. From "concrete production, 50 MPa, RNA only, GLO" dataset. Accessed 20171213
  properties: carbon content, fossil 0.005, dry mass 1 kg, wet mass 1 kg
  note on carbon content, fossil: Low alloyed steel composition given in Tab. 3.2 ecoinvent v2.2 report 10_partII. Steel assumed to have a C content of 0.5%. Adopted from "20MPa, RNA only, CA-QC 2006" dataset on 2017/11/05
- tap water: 187.941 kg; = batch_water+non_process_water; lognormal variance with pedigree 0.0022, pedigree (1,1,2,5,1)
  Water use in ready-mix plant, assumed to be sourced from municipal water system. Primary data collected from ready mix plant plant. Consists of batch water and non-process water used in producing 1 m3 of concrete.
  Uncertainty: C
  property batch water 147 kg; name batch_water
  property non-process water, net 40.9412 kg; name non_process_water; = WWater*1000/(1- fraction_PW_to_air)
  properties: carbon content, fossil 0.00178991, dry mass 0.000337476 kg, water content 2962.17, wet mass 1 kg
  note on carbon content, fossil: Bicarbonate content is 2.93 mol/m3. CO2 content is 0.1 mol/m3 (ecoinvent v2.2 report 8, Tab 93.1). Adopted from "20MPa, RNA only, CA-QC 2006" dataset on 2017/11/05
  note on non-process water, net: The average water consumption (not including batch water) is 65 L/m3 of ready mixed concrete. The average amount of water disposed is 34,8 L/m3. Water not discarded is recycled back into the process or into other products. Source: Athena (2005):Cement and Structural Concrete: LCI Update 2005 An amount of 15% water evaporated to air was assumed, in order to calculate to non-process water input.: Adopted from "20MPa, RNA only, CA-QC 2006" dataset on 2017/11/05
- waste concrete: -1.67402, -22.8201, -0.0059187 kg (3 suppliers, which the file names only by identifier); sum of these -24.5 kg; source Marceau, M.L. 2007; lognormal variance with pedigree 0.0126, pedigree (2,1,1,5,1)
  Adopted from "concrete production, 50MPa, RNA only, GLO 2006" dataset [accessed on 2017/12/14 ] Solid waste consists of concrete and small amounts of paste (cement and water after aggregate has been reclaimed)
  production volume; = PV_ref*Waste/ref
    Calculated from the production volume of reference product, in proportion to the respective output amounts of 0.1% for 45MPa concrete.
  properties: carbon content, fossil 1e-51, dry mass 0.938928 kg, water content 0.0650442, wet mass 1 kg
  note on carbon content, fossil: Adopted from "20MPa, RNA only, CA-QC 2006" dataset on 2017/11/05 .Tab A.3, ecoinvent v2.2 report 13_I
- wastewater from concrete production: -0.000167479, -0.0346325 m3 (2 suppliers, which the file names only by identifier); sum of these -0.0348 m3; source Marceau, M.L. 2007; lognormal variance with pedigree 0.0126, pedigree (2,1,1,5,1)
  Adopted from "concrete production, 20MPa, RNA only, GLO 2006" dataset [accessed on 2017/12/14 ]
  production volume; = PV_ref*WWater/ref
    (same comment as for waste concrete)
  properties: carbon content, fossil 0.027074, dry mass 0.449139 kg, water content 2225.48, wet mass 1000 kg
  note on carbon content, fossil: TOC =0.01216 kg/m3 (Tab A.20, ecoinvent v2.2 report 13_I). TOC was considered as Total Carbon. Adopted from "20MPa, RNA only, CA-QC 2006" dataset on 2017/11/05

## Emissions to nature
- Carbon dioxide, fossil [air, non-urban air or from high stacks]: 8.76619 kg; = ((AA_Amount* AA_C_content_fossil)+ (EO_Amount* EO_C_content_fossil))*44/12; lognormal variance with pedigree 0.0033, pedigree (2,1,2,5,1)
  Amount of carbon dioxide, fossil to the environment due to the use of superplasticizers in the concrete mix
- Water [air, unspecified]: 0.00614118 m3; = non_process_water/1000*fraction_PW_to_air; lognormal variance with pedigree 0.0022, pedigree (1,1,2,5,1)
  Adopted value - non-process water. Adopted from "concrete production, 50 MPa, RNA only, GLO 2006" dataset [accessed on 2017/12/14 ]
  Uncertainty: C
- Chlorides, unspecified [water, unspecified]: 3.09e-9 kg; source Marceau, M.L. 2007; lognormal variance with pedigree 0.0034, pedigree (2,1,2,5,1)
  (same comment as for concrete mixing factory)
- Copper ion [water, unspecified]: 1.55e-8 kg; source Marceau, M.L. 2007; lognormal variance with pedigree 0.0034, pedigree (2,1,2,5,1)
  (same comment as for wastewater from concrete production)
- Iron ion [water, unspecified]: 1.55e-8 kg; source Marceau, M.L. 2007; lognormal variance with pedigree 0.0034, pedigree (2,1,2,5,1)
  (same comment as for concrete mixing factory)
- Oils, unspecified [water, unspecified]: 2.32e-7 kg; source Marceau, M.L. 2007; lognormal variance with pedigree 0.0034, pedigree (2,1,2,5,1)
  (same comment as for concrete mixing factory)
- Suspended solids, unspecified [water, unspecified]: 4.64e-7 kg; source Marceau, M.L. 2007; lognormal variance with pedigree 0.0034, pedigree (2,1,2,5,1)
  (same comment as for concrete mixing factory)

## Sampling procedure
The data presented in this dataset is representative of ready-mix producers who represent 35% of the concrete production market in ZA.

## Extrapolations
This dataset is a copy of the corresponding activity from South Africa.
