# casting, aluminium, lost-wax

Dataset: EcoSpold 2, unit process
Geography: RoW
Time period: 2012-01-01 to 2023-12-31
Technology level: current
Classification: ISIC rev.4 ecoinvent: 2432:Casting of non-ferrous metals
Classification: EcoSpold01Categories: metals/processing
Synonyms: Investment casting; wax molding
Tags: single enterprise data
Scenario: Business-as-Usual
System model: Allocation, cut-off by classification
Generated by: Jean-Francois Menard
Database: ecoinvent
isCopyrightProtected: true
accessRestrictedTo: 1

## General comment
This dataset represents the service of casting of aluminium parts using the lost-wax casting, or investment casting, method. This method is one of the oldest known metal working technics. While sand casting is the most frequently use casting technic, lost-wax casting is used for small, up to 32 kg, and precision parts, for exmple for the aeronautical sector. Although more expensive and intensive than sand casting or die casting, it requires less machining and surface finishing. Dataset represenst casting of 1 kg of aluminium and aluminum low-alloy parts by lost-wax casting. It includes materials and energy inputs, waste and emissions. Infrastructure are estimated. Production of metal in final part is excluded, only aluminum associated with losses and its waste management is included. Losses are estimated at 26.1% of aluminium input (or 35.3% of cast product), 97.5% are sent to recycling, the rest is lost in waste sludge.

## Included activities start
Lost-was casting starting from the reception of aluminium ingot, metal alloy ingot and other materials for casting process.

## Included activities end
This activity ends with the aluminium cast. The dataset includes mold manufacturing, melting of aluminium and alloy inputs, casting, dewaxing, cutting, grinding, straightening, machining, and non-destructive testing (NDT). The dataset does not inclue the final product material and alloying additives. Metal losses are included as generic primiary aluminium input.

## Geography
Global dataset extrapolated from regional one.

## Parameters
- waste mineral oil: 0.0109295 kg; name waste_oil; lognormal variance with pedigree 0.0052, pedigree (2,4,1,5,1)
  Measured value. Waste oil recovered. Outputs for oil include sludge from oil separator, hazardous waste for incineration, hazardous waste for underground deposit, spent solvent and waste mineral oil.
- wax, used: 0.99358 kg; name wax; lognormal variance with pedigree 0.0052, pedigree (2,4,1,5,1)
  Measured Value. Used wax sold to supplier who treats and resells it.

## Reference product
- casting, aluminium, lost-wax: 1 kg; name moldedAlu; By-product classification allocatable product; CPC 89320: Non-ferrous metal casting services
  production volume 1.5522e8 kg; name PV_moldedAl
    Approximation of the Global production volume which has been estimated by the data-provider using its production and its knowledge on the global market share.
  property price 31.9522 EUR2005
    Calculated based on inputs: The price of the product has been calculated as a sum of the values of the material and energy inputs for this product. This value is therefore a rough estimation. It may underestimate the real price since there are additional expenses when producing any product. These expences can include for example labour costs, treatment of waste materials and profit for the producer. Please consider carefully whether this level of data quality is acceptable for your application.
  properties: carbon allocation 0 kg, carbon content 0

## Inputs from technosphere
- activated carbon, granular: 0.01 kg; lognormal variance with pedigree 0.0132, pedigree (2,4,4,5,1)
  Same amount as initial proxy (carbon black) for activated carbon. Measured value.
  property carbon content, fossil 0.81; name GAC_C_content_fossil
  property carbon content, non-fossil 0; name GAC_C_content_non_fossil
  property dry mass 0.97 kg; name GAC_DM
  property water content 0.030928; name GAC_water_content
  property water in wet mass 0.03 kg; name GAC_WWM
  property wet mass 1 kg; name GAC_WM
  properties: heating value, net 30.23 MJ
  note on carbon content, fossil: Literature value. From Biomass and Bioenergy: Processing and Properties (2014) edited by Khalid Rehman Hakeem, Mohammad Jawaid, Umer Rashid (p. 252). Carbon content is in the range of 72-90%, an average value of 81% is taken.
- aluminium casting facility: 4.9e-11 unit; lognormal variance with pedigree 0.51, pedigree (5,5,5,5,5)
  Proxy. Taken directly from ecoivnent v3.0 dataset "casting, bronze, GLO 2003". Approximated value. The uncertainty was maximized accordingly.
- aluminium oxide, non-metallurgical: 1.18421, 0.200487 kg (2 suppliers, which the file names only by identifier); sum of these 1.3847 kg; lognormal variance with pedigree 0.0132, pedigree (2,4,4,5,1)
  Measured Value. Include aluminium oxide used for molding (0.9963 kg) and sand blasting (0.1221 kg) and fused white alumina used for molding (0.2663 kg).
  properties: dry mass 1 kg, wet mass 1 kg
- aluminium scrap, new: -0.34449 kg; name w_Al; lognormal variance with pedigree 0.0052, pedigree (2,4,1,5,1)
  Measured value. Aluminium scrap send to recycling.
  production volume; name PV_w_Al; = PV_moldedAl * (w_Al / moldedAlu)
    Calculated from production volume of reference product using the relative outputs.
  properties: dry mass 1 kg, price 0.806 EUR2005, wet mass 1 kg
- aluminium, primary, ingot: 0.0529388, 0.291551 kg (2 suppliers, which the file names only by identifier); sum of these 0.34449 kg; = w_Al; lognormal variance with pedigree 0.008, pedigree (1,1,4,1,1)
  Calculated value. Correspond to aluminium losses. Aluminium is either sent to an external recycler or is disposed as aluminium containing sludge.
  Uncertainty: C
  properties: dry mass 1 kg, wet mass 1 kg
- ammonia, anhydrous, liquid: 0.000697254, 0.00299549, 0.00135351, 0.0150028, 0.000634178, 0.000141863, 0.00521371, 0.000448181 kg (8 suppliers, which the file names only by identifier); sum of these 0.026487 kg; lognormal variance with pedigree 0.0132, pedigree (2,4,4,5,1)
  Measured value. Reported as ammonia anhydrous refrigerated grade.
  properties: dry mass 1 kg, wet mass 1 kg
- clay: 0.0523189, 8.03079e-6 kg (2 suppliers, which the file names only by identifier); sum of these 0.0523269 kg; lognormal variance with pedigree 0.0132, pedigree (2,4,4,5,1)
  Proxy. Reported as clay flocculent, a mix of clay, inorganic salt, and organic polymer. Measured value.
  properties: dry mass 0.965 kg, water content 0.0362694, wet mass 1 kg
- diesel, burned in diesel-electric generating set, 10MW: 0.248207 MJ; = l_diesel_input*diesel_density*NHV_diesel*42.8; lognormal variance with pedigree 0.008, pedigree (1,1,4,1,1)
  Calculated value. Reported as volume.
  Uncertainty: C
  property density 0.84 kg/l; name diesel_density
  property fuel input in physical units, L 0.00690385 l; name l_diesel_input
  property heating value, net 1 MJ; name NHV_diesel
  note on density: Density value. Value Taken from Table 5.1 of report "Overview and methodology, Data quality guideline for the ecoinvent database version 3" (ecoinvent report No. 1 (v3), 2011)
  note on heating value, net: Literature value. Net (lower) heating (calorific) value. Value Taken from Table 5.1 of report "Overview and methodology, Data quality guideline for the ecoinvent database version 3" (ecoinvent report No. 1 (v3), 2011)
- electricity, medium voltage: 2.61054, 52.0744, 1.30361, 0.799436, 11.2722, 0.160006, 0.0343569, 3.63619, 5.37748, 15.4558 kWh (10 suppliers, which the file names only by identifier); sum of these 92.724 kWh; lognormal variance with pedigree 0.0132, pedigree (2,4,4,5,1)
  Measured Value. Based on reported electricity consumption for the whole facility, including offices, over one year. From 7 to 10 times more metal is melted than in final cast part. The most of the unused metal is recoverd and internally recycled.
- ethoxylated alcohol (AE7): 0.0026919, 0.0127788 kg (2 suppliers, which the file names only by identifier); sum of these 0.0154707 kg; lognormal variance with pedigree 0.0132, pedigree (2,4,4,5,1)
  Proxy. Represents ethoxyl alcohols (C6-C10 and C12-C15) and secondary alcohol ethoxylate fraction of chemical penetrant used for non-destructive testing. Calculated value.
  properties: carbon content, fossil 0.321663, carbon content, non-fossil 0.321663, dry mass 1 kg, heating value, net 19.49 MJ, wet mass 1 kg
- fly ash and scrubber sludge: -0.0362897, -0.0919995, -0.00108896 kg (3 suppliers, which the file names only by identifier); sum of these -0.129378 kg; lognormal variance with pedigree 0.0052, pedigree (2,4,1,5,1)
  Measured value. Represents sludge from oil separator.
  production volume; name PV_sepSludge; = PV_moldedAl * (w_sep_sludge/ moldedAlu)
    Calculated from production volume of reference product using the relative outputs.
  properties: carbon content, fossil 0.167, dry mass 0.1 kg, water content 9, wet mass 1 kg
  note on carbon content, fossil: Tab A.6, ecoinvent v2.2 report 13_I. C content has been calculated after data in the tables, and then referred to 1 kg DM
- hazardous waste, for incineration: -0.379559, -0.182529, -0.00477119 kg (3 suppliers, which the file names only by identifier); sum of these -0.566859 kg; lognormal variance with pedigree 0.0052, pedigree (2,4,1,5,1)
  Measured value. Includes several hazardous waste types: sorbing agent with oil, degreasing agent, spent filtration media, green soluble wax and aerosol.
  production volume; name PV_w_hazard_inc; = PV_moldedAl / moldedAlu *w_hazard_inc
    Calculated from production volume of reference product using the relative outputs.
  properties: carbon content, fossil 0.554667, dry mass 0.75 kg, heating value, net 17 MJ, water content 0.333333, wet mass 1 kg
  note on heating value, net: Value taken from the general comment of the treatment dataset.
- hazardous waste, for underground deposit: -0.00616396, -0.095695 kg (2 suppliers, which the file names only by identifier); sum of these -0.101859 kg; lognormal variance with pedigree 0.0052, pedigree (2,4,1,5,1)
  Measured value. Includes settling inorganic sludge (high water content) and aluminium sludge (containing aluminium), other waste: fluorescent tubes, alcaline batteries and chromium contaminated leather.
  production volume; name PV_wasteHazard; = PV_moldedAl / moldedAlu * w_hazard_und
    Calculated from production volume of reference product using the relative outputs.
  properties: carbon content, fossil 0.554667, dry mass 1 kg, wet mass 1 kg
  note on carbon content, fossil: Tab A.6, ecoinvent v2.2 report 13_I, average hazardous waste composition was used, and referred to 0% water mass. No waste-specific emission are currently inventoried for underground deposits. Accordingly, no waste composition must be specified. For generic, average waste to underground deposit deposition in a 200 liter steel drum without cement solidification is assumed (ecoinvent v2.2 report 13_I).
- heat, district or industrial, natural gas: 149.493 MJ; lognormal variance with pedigree 0.008, pedigree (1,1,4,1,1)
  Calculated value. Reported as volume. Used for heating molds prior to casting
  Uncertainty: C
  property Corresponding fuel use 1.0417 MJ; name fuel_use
  property fuel input in physical units, m3 4.29 m3; name m3fuel_input
  property heating value, net 1 MJ; name Net_Heat_Value
  note on Corresponding fuel use: Lower heating value of the fuel input related to the heat/electricity output. Assume a 96% energy efficiency based on Section 5.3.6 of report "Life cycle Inventories of Energy Systems, Results for Current Systems in Switzerland and other UCTE Countries" (ecoinvent report No. 5, 2007).
  note on heating value, net: Net (lower) heating (calorific) value. Value Taken from Table 5.1 of report "Overview and methodology, Data quality guideline for the ecoinvent database version 3" (ecoinvent report No. 1 (v3), 2011).
- inert waste, for final disposal: -5.90042, -0.0384133 kg (2 suppliers, which the file names only by identifier); sum of these -5.93883 kg; lognormal variance with pedigree 0.0052, pedigree (2,4,1,5,1)
  Measured value. Includes waste ceramic mold (4.4359 kg), water based ceramic paste (1.3406 kg), aluminium oxide from sand blasting (0.1221 kg) and crucible (0.0402 kg, estimate based on silicon carbide crucible).
  production volume; name PV_w_inert; = PV_moldedAl * (w_inert / moldedAlu)
    Calculated from production volume of reference product using the relative outputs.
  properties: dry mass 0.995 kg, water content 0.00502513, wet mass 1 kg
- isopropanol: 0.068034, 0.322966 kg (2 suppliers, which the file names only by identifier); sum of these 0.391 kg; lognormal variance with pedigree 0.0132, pedigree (2,4,4,5,1)
  Measured Value. Used in mold production.
  properties: carbon content, fossil 0.6, dry mass 1 kg, heating value, net 34.3 MJ, wet mass 1 kg
- kaolin: 1.22794 kg; lognormal variance with pedigree 0.0132, pedigree (2,4,4,5,1)
  Proxy. Reported as flour calcined China clay used for mold production. Measured value.
  properties: dry mass 1 kg, wet mass 1 kg
- lubricating oil: 0.0587233, 0.278767 kg (2 suppliers, which the file names only by identifier); sum of these 0.33749 kg; lognormal variance with pedigree 0.0132, pedigree (2,4,4,5,1)
  Measured Value: Reported as mineral hydraulicl and quenching oils and used to represent mineral oil fraction of chemical penetrant used for non-destructive testing.
  properties: carbon content, fossil 0.75, dry mass 1 kg, heating value, net 40.2 MJ, wet mass 1 kg
  note on carbon content, fossil: Lubricating oil is produced from diesel. C-content/dry mass of fats and oils considered 75%, from: ecoinvent v2.2 report, n 15a, pg 40
  note on heating value, net: Literature value, Source: IPCC 2006, 2006 IPCC Guidelines for National Greenhouse Gas Inventories, Prepared by the National Greenhouse Gas Inventories Programme, Eggleston H.S., Buendia L., Miwa K., Ngara T. and Tanabe K. (eds). Published: IGES, Japan
- methyl ethyl ketone: 0.000289775, 0.000767917 kg (2 suppliers, which the file names only by identifier); sum of these 0.00105769 kg; lognormal variance with pedigree 0.0132, pedigree (2,4,4,5,1)
  Measured value. Used as paint cleaner.
  properties: carbon content, fossil 0.666667, dry mass 1 kg, heating value, net 33.63 MJ, wet mass 1 kg
- nitric acid, without water, in 50% solution state: 0.00180592, 0.00667289, 0.00289908, 0.0109966, 0.0031973, 0.00267338, 0.0234936, 0.00268331, 0.00867789 kg (9 suppliers, which the file names only by identifier); sum of these 0.0631 kg; lognormal variance with pedigree 0.0132, pedigree (2,4,4,5,1)
  Measured value. Reported value from waste inventory (from occasionally discharged basin), input assumed equivalent to output. Assumption verified by data provider.
  properties: dry mass 1 kg, wet mass 1 kg
- nitrogen, liquid: 2.64243, 0.72533 kg (2 suppliers, which the file names only by identifier); sum of these 3.36776 kg; = N2_input*N2_gas_density; lognormal variance with pedigree 0.008, pedigree (1,1,4,1,1)
  Calculated value. Reported as gas volume.
  Uncertainty: C
  properties: dry mass 1 kg, gas density 0.0011848 kg/l, input 2842.47 l, wet mass 1 kg
  note on gas density: Density at 1.013 bar and 15 C.Taken from https://encyclopedia.airliquide.com/nitrogen.
- polyethylene terephthalate, granulate, amorphous: 0.0725962 kg; = xray; lognormal variance with pedigree 0.008, pedigree (1,1,4,1,1)
  Proxy. Represents x-ray film used for non-destructive testing, PET is the mainly constituant of x-ray film. Calculated value
  Uncertainty: C
  properties: carbon content, fossil 0.625, dry mass 1 kg, heating value, net 22.95 MJ, wet mass 1 kg
- propane, burned in building machine: 0.545445 MJ; = Lpropane_input*propane_density*NHV_propane*46.46; lognormal variance with pedigree 0.008, pedigree (1,1,4,1,1)
  Calculated value. Reported as volume. Used in forklift.
  Uncertainty: C
  property density 0.00185 kg/l; name propane_density
  property fuel input in physical units, L 6.346 l; name Lpropane_input
  property heating value, net 1 MJ; name NHV_propane
  note on density: Litterature value. Gas state propane density at 15°C and 1 atm.Taken from http://www.cfbp.fr/proprietes-des-gpl/caracteristiques-generales-et-physico-chimiques-n305
  note on fuel input in physical units, L: Measured value. Reported volume represents corrected value for propane in standard condition (15oC, 1atm).
  note on heating value, net: Net (lower) heating (calorific) value in MJ/kg. Taken directly from ecoinvent v3.0 dataset "propane burned in building machine, GLO 2013".
- propylene glycol, liquid: 0.00379216, 0.00767864 kg (2 suppliers, which the file names only by identifier); sum of these 0.0114708 kg; lognormal variance with pedigree 0.0132, pedigree (2,4,4,5,1)
  Proxy. Represents polyakylene glycol fraction of chemical quencher. Measured value.
  properties: carbon content, fossil 0.473684, dry mass 1 kg, heating value, net 27.09 MJ, wet mass 1 kg
- scrap steel: -0.000867103, -0.000414423, -5.25061e-7 kg (3 suppliers, which the file names only by identifier); sum of these -0.00128205 kg; lognormal variance with pedigree 0.0052, pedigree (2,4,1,5,1)
  Measured value. Steel from waste propane cylinders (sent to recycling).
  production volume; name PV_cylinder; = PV_moldedAl / moldedAlu *cylinder
    Calculated from production volume of reference product using the relative outputs.
  properties: dry mass 1 kg, wet mass 1 kg
- silica sand: 1.5946 kg; lognormal variance with pedigree 0.0132, pedigree (2,4,4,5,1)
  Measured value. Silica sand is used in molding.
  properties: dry mass 0.99 kg, water content 0.010101, wet mass 1 kg
- silicon carbide: 0.0402336 kg; lognormal variance with pedigree 0.0132, pedigree (2,4,4,5,1)
  Measured value. Reported as silicon carbide crucibles.
  properties: carbon content, fossil 0.3, dry mass 1 kg, heating value, net 9.08 MJ, wet mass 1 kg
- sodium hydroxide, without water, in 50% solution state: 0.00660106, 0.0676003 kg (2 suppliers, which the file names only by identifier); sum of these 0.0742014 kg; lognormal variance with pedigree 0.0146, pedigree (3,4,4,5,1)
  Proxy. Reported as powder alcaline etchant. Assumed to be used in solid state, no water was added. Measured value.
  properties: dry mass 1 kg, heating value, net 3.03 MJ, wet mass 1 kg
- sodium nitrite: 0.000151415, 0.000307417 kg (2 suppliers, which the file names only by identifier); sum of these 0.000458832 kg; lognormal variance with pedigree 0.0132, pedigree (2,4,4,5,1)
  Proxy. Represents sodium nitrile fraction of chemical quencher. Measured value.
  properties: dry mass 1 kg, wet mass 1 kg
- spent solvent mixture: -0.00607247, -0.259192, -0.663345 kg (3 suppliers, which the file names only by identifier); sum of these -0.92861 kg; lognormal variance with pedigree 0.0052, pedigree (2,4,1,5,1)
  Proxy. Represents hazardous waste: solvent based degreasing agent, refractory paste, deoxidizer agent and spent nitric acid sent to treatment (0.0631 kg). Measured value.
  production volume; name PV_w_solvent; = PV_moldedAl / moldedAlu * w_solvent
    Calculated from production volume of reference product using the relative outputs.
  properties: carbon content, fossil 0.571257, dry mass 0.835 kg, heating value, net 21.7 MJ, water content 0.197605, wet mass 1 kg
  note on carbon content, fossil: Tab A.7, ecoinvent v2.2 report 13_I. C content has been calculated after data in the tables, and then referred to 1 kg DM
- steel, low-alloyed, hot rolled: 0.00522436 kg; = cylinder+ container; lognormal variance with pedigree 0.008, pedigree (1,1,4,1,1)
  Calculated value. From waste inventory.
  Uncertainty: C
  properties: carbon content, fossil 0.005, dry mass 1 kg, wet mass 1 kg
  note on carbon content, fossil: Low alloyed steel composition given in Tab. 3.2 ecoinvent v2.2 report 10_partII. Steel assumed to have a C content of 0.5%
- sulfuric acid: 0.00478029, 0.000625245 kg (2 suppliers, which the file names only by identifier); sum of these 0.00540554 kg; = sulfuric_acid_input*sulfuric_acid_density*sulfuric_acid_concentration; lognormal variance with pedigree 0.008, pedigree (1,1,4,1,1)
  Calculated value. Based on measured solution volume used, reported concentration 66 Bé which correspond to 96% (w/w). Mass of water is included in deionised water flow.
  Uncertainty: C
  properties: density 1.83 kg/l, dry mass 1 kg, input 0.00307692 l, solution concentration 0.96, wet mass 1 kg
- tap water: 0.766263, 1.1681, 2.17962, 5.87174, 29.4549, 337.068, 251.697 kg (7 suppliers, which the file names only by identifier); sum of these 628.205 kg; lognormal variance with pedigree 0.0132, pedigree (2,4,4,5,1)
  Measured value. Used for casting process (mixing, shell breaking, etc.) and for air emissions treatment (scrubbers).
  properties: carbon content, fossil 0.00178991, dry mass 0.000337476 kg, water content 2962.17, wet mass 1 kg
  note on carbon content, fossil: Bicarbonate content is 2.93 mol/m3. CO2 content is 0.1 mol/m3 (ecoinvent v2.2 report 8, Tab 93.1).
- tetraethyl orthosilicate: 1.01643 kg; lognormal variance with pedigree 0.0132, pedigree (2,4,4,5,1)
  Proxy. Reported as hydrolyzed ethyl silicate. Measured value.
  properties: heating value, net 25.61 MJ
- titanium dioxide: 0.0221401, 0.0110701 kg (2 suppliers, which the file names only by identifier); sum of these 0.0332102 kg; lognormal variance with pedigree 0.0132, pedigree (2,4,4,5,1)
  Measured value. Represents component of an ingredient used for mold production.
  properties: dry mass 1 kg, wet mass 1 kg
- waste emulsion paint, separated: -0.000641026 kg; name w_paint; lognormal variance with pedigree 0.0052, pedigree (2,4,1,5,1)
  Measured value. Used filters from air filtration treatment used for epoxy paint vapor.
  production volume; name PV_w_paint; = PV_moldedAl / moldedAlu *w_paint
    Calculated from production volume of reference product using the relative outputs.
  properties: carbon content, fossil 0.27, dry mass 1 kg, heating value, net 8.18 MJ, wet mass 1 kg
- waste mineral oil: -0.00682595, -0.721954, -0.275729 kg (3 suppliers, which the file names only by identifier); sum of these -1.00451 kg; = waste_oil+wax
  Partial proxy. Represents waste mineral oil and waste wax used for molds (sold to supplier who treats and resells it, there is no dataset in database to represent this rerefinement). Calculated value.
  production volume; name PV_w_oil; = PV_moldedAl * (w_oil / moldedAlu)
    Calculated from production volume of reference product using the relative outputs.
  properties: carbon content, fossil 0.864444, dry mass 0.9 kg, heating value, net 34.7 MJ, water content 0.111111, wet mass 1 kg
- waste paint on metal: -0.00390913, -3.31819e-5 kg (2 suppliers, which the file names only by identifier); sum of these -0.00394231 kg; lognormal variance with pedigree 0.0052, pedigree (2,4,1,5,1)
  Measured value. Used paint containers.
  production volume; name PV_container; = PV_moldedAl / moldedAlu *container
    Calculated from production volume of reference product using the relative outputs.
  properties: carbon content, fossil 0.65, dry mass 1 kg, heating value, net 19.7 MJ, wet mass 1 kg
- waste x-ray film: -0.0725962 kg; name xray; lognormal variance with pedigree 0.0052, pedigree (2,4,1,5,1)
  Measured value. Used X-ray films (sold for silver content).
  production volume; name PV_xray; = PV_moldedAl * (xray/ moldedAlu)
    Calculated from production volume of reference product using the relative outputs.
- wastewater, average: -0.00271859, -0.452387, -0.108175 m3 (3 suppliers, which the file names only by identifier); sum of these -0.56328 m3; lognormal variance with pedigree 0.0052, pedigree (2,4,1,5,1)
  Measured Value. Includes 0.1442 kg of isopropanol recovered from scrubbers (there is no specific wastewater treatment dataset in database for that substance).
  production volume; name PV_wasterWater; = PV_moldedAl / moldedAlu * w_water
    Calculated from production volume of reference product using the relative outputs.
  properties: carbon content, non-fossil 0.194039, dry mass 0.346837 kg, water content 2882.2, wet mass 1000 kg
  note on carbon content, non-fossil: 0.0673 kg TOC/m3 (Tab A.17, ecoinvent v2.2 report 13_I). TOC was considered as Total Carbon.
- water, deionised: 0.0244081, 8.78631e-5, 0.0792364 kg (3 suppliers, which the file names only by identifier); sum of these 0.103732 kg; lognormal variance with pedigree 0.0132, pedigree (2,4,4,5,1)
  Calculated value. Water content of chemical solutions, namely in collodial silica, quenching agent and sulfuric acid.
  properties: wet mass 1 kg
- wax, lost-wax casting: 0.552235 kg; name wax_investment_casting; lognormal variance with pedigree 0.0132, pedigree (2,4,4,5,1)
  Measured value. Includes different types of molding wax.
  properties: heating value, net 25.76 MJ
- zircon: 0.343032 kg; lognormal variance with pedigree 0.0132, pedigree (2,4,4,5,1)
  Measured value. Reported as zircon flour or crude zirconium silicate. Used in ceramic mold.
  properties: dry mass 1 kg, wet mass 1 kg

## Emissions to nature
- Nitrogen [air, unspecified]: 3.36776 kg; = N2; lognormal variance with pedigree 0.008, pedigree (1,1,4,1,1)
  Calculated value. Emission of nitrogen to air calculated from mass balance assuming all of nitrogen input is emitted.
  Uncertainty: C
- Propanol [air, urban air close to ground]: 0.246795 kg; lognormal variance with pedigree 0.0132, pedigree (2,4,4,5,1)
  Measured value. Fugitive emission of isopronal.
- Water [air, urban air close to ground]: 0.0649251 m3; = water_in/1000-w_water; lognormal variance with pedigree 0.008, pedigree (1,1,4,1,1)
  Calculated value. Amount from water balance. Data provider confirmed that balance of water is evaporated.
  Uncertainty: C

## Sampling procedure
Measured and estimated values from one manufacturing company.

## Extrapolations
This dataset has been copied from an original dataset covering the geography Québec. The uncertainty has been adjusted accordingly.
