# benzimidazole-compound production

Dataset: EcoSpold 2, unit process
Geography: RoW
Time period: 2000-01-01 to 2023-12-31
Technology level: current
Classification: ISIC rev.4 ecoinvent: 2021:Manufacture of pesticides and other agrochemical products
Synonyms: 1H-Benzimidazole; 1,3-Benzodiazole; 1H-Benzo[d]imidazole; O-Benzimidazole; 51-17-2
Scenario: Business-as-Usual
System model: Allocation, cut-off by classification
Share of production covered: 100 %
Generated by: Jürgen Sutter
Published in: Nemecek, T. 2007
Database: ecoinvent
isCopyrightProtected: true
accessRestrictedTo: 1

## General comment
This dataset represents the production of benzimidazole compounds (1 kg of active ingredient). Benzimidazoles are fungicidal compounds with a benzimidazole group produced by reacting ortho-phenylene diamine with a carboxylic group or a nitrile. This dataset models the production of benzimidazole compounds based on the arithmetic mean of all inputs and outputs of the production of carbendazim and ethofumesate. The raw materials are modelled with stoichiometric calculations. The energy consumption is modelled with data from a similar process. The emissions are estimated and the infrastructure is included with a default value.
References:
Nemecek T. & Kägi T. (2007) Life Cycle Inventories of Swiss and European Agricultural Production Systems. Final report ecoinvent V2.0 No. 15a. Agroscope Reckenholz-Taenikon Research Station ART, Swiss Centre for Life Cycle Inventories, Zurich and Dübendorf, CH.

## Included activities start
From reception of precursors at the factory gate.

## Included activities end
This activity ends with benzimidazole-compounds at the factory gate. The dataset includes the input materials, energy uses, infrastructure and emissions. The dataset doesn't include emulsives, additives etc.

## Geography
The inventory is modelled for Europe but is assumed to be representative of the global production.

## Technology
Benzimidazoles are fungicidal compounds with a benzimidazole group produced by reacting ortho-phenylene diamine with a carboxylic group or a nitrile.
This dataset was calculated from the arithmetic mean of all inputs and outputs of the production of carbendazim and ethofumesate.
Carbendazim is produced in four steps from ammonium thiocyanate:
CH4N2S → CH4N2S
2 CH4N2S + C2H6O4S → C4H14N4O4S3
C4H14N4O4S3 + 2 C2H3ClO2 + 2 NaOH → 2 C4H8N2O2S + Na2SO4 + 2 H2O + 2 HCl
C4H8N2O2S + C6H8N2 → C9H9N3O2 + CH4S + NH3
Precursors that are used for the carbendazim production are methyl chloroformate (C2H3ClO2) and o-phenyl diamine (C6H8N2).
Methyl chloroformate (C2H3ClO2) is produced from methanol and phosgene:
CH4O + CCl2O → C2H3ClO2 + HCl
o-Phenyl diamine (C6H8N2) is produced in three steps from chlorobenzene:
C6H5Cl + HNO3 → C6H4ClNO2 + H2O
C6H4ClNO2 + NH3 → C6H6N2O2 + HCl
C6H6N2O2 + 3 H2 → C6H8N2 + 2 H2O
Ethofumesate is produced in four steps from aniline:
C6H7N + MnO2 + H2SO4 → C6H4O2 + MnSO4 + H2 + NH3
C6H4O2 + C4H8O → C10H12O3
C10H12O3 + C2H6O → C12H16O3 + H2O
C12H16O3 + CH3ClSO2 → C13H18O5S + HCl
Precursors that are used for the ethofumesate production are isobutyraldehyde (C4H8O), methane sulfonyl chloride (CH3ClSO2), and thionyl chloride (SOCl2).
Isobutyraldehyde (C4H8O) is produced from propylene:
C3H6 + CO + H2 → C4H8O
Methane sulfonyl chloride (CH3ClSO2) is produced in three steps from methane:
CH4 + SO3 → CH4SO3
CH4SO3 + SOCl2 → CH3ClSO2 + SO2 + HCl
Thionyl chloride (SOCl2) is produced in two steps from sulphur:
S + Cl2 → SCl2
SCl2 + SO2 + Cl2 → 2 SOCl2

## Time period
Time of publications.

## Parameters
- fraction, cooling water, cooling pond system, to air: 0.032 dimensionless; name fraction_CW_CP_to_air; lognormal variance with pedigree 0.0413, pedigree (2,3,1,3,1)
  Calculated based on literature value (Scown, C.D., 2011, Water Footprint of U.S. Transportation Fuels and supplying information of the article) (Vionnet, S., Quantis Water Database - Technical Report, 2012).
- fraction, cooling water, once-through system, to air: 0.004 dimensionless; name fraction_CW_OT_to_air; lognormal variance with pedigree 0.0413, pedigree (2,3,1,3,1)
  (same comment as for fraction, cooling water, cooling pond system, to air)
- fraction, cooling water, recirculating system, to air: 0.771 dimensionless; name fraction_CW_R_to_air; lognormal variance with pedigree 0.0413, pedigree (2,3,1,3,1)
  (same comment as for fraction, cooling water, cooling pond system, to air)
- fraction, cooling water, to air: 0.3875 dimensionless; name fraction_CW_to_air; = (0.5*fraction_CW_OT_to_air)+(0.5*fraction_CW_R_to_air); lognormal variance with pedigree 0.092025, pedigree (4,4,3,2,4)
  Calculated value based on literature value (see comments of the other parametres present in this dataset) and expert opinion. In the case when no industry/literature data are available about the type of cooling or directly fraction, cooling water, to air specific for the process a default assumption is applied. It is assumed that the once-through cooling system is used in 50% of all cases and recirculating system is used in another 50% of all cases.

## Reference product
- benzimidazole-compound: 1 kg; name RP; By-product classification allocatable product; CPC 34663: Herbicides, anti-sprouting products and plant-growth regulators; HS2017 380893: Herbicides, anti-sprouting products and plant-growth regulators; other than containing goods of Subheading [...]; CAS 51-17-2
  Benzimidazoles can have different modes of action. Carbendazim, which is a fungicide, causes ß-tubuline assembly in mitosis; and Ethofumesate, which is an herbicide, is an inhibitor of lipid synthesis, not ACCase inhibition.
  production volume 530290 kg; name RP_PV
    The consumption volume in the US in 2002 (from USGS, 2002 Pesticide use Maps) of the benzimidazole-compound benomyl has been used to estimate the production volumes of this type of pesticide in the world. For that, it has been extrapolated to a Global production mix using the ha of Arable land and Permanent crops of US versus the ha of Arable land and Permanent crops in the world in 2002 (1514/179 million ha; FAOSTAT).
  property carbon content, fossil 0.529668
    C content estimated as an average of that of the pesticides Carbendazim, prochloraz and ethofumesate (Sutter 2010)
  property price 2.7956 EUR2005
    Calculated based on inputs: The price of the product has been calculated as a sum of the values of the material and energy inputs for this product. This value is therefore a rough estimation. It may underestimate the real price since there are additional expenses when producing any product. These expences can include for example labour costs, treatment of waste materials and profit for the producer. Please consider carefully whether this level of data quality is acceptable for your application.
  properties: carbon allocation 0.529668 kg, carbon content 0.529668, carbon content, non-fossil 0, dry mass 1 kg, water content 0, water in wet mass 0 kg, wet mass 1 kg

## Inputs from technosphere
- ammonia, anhydrous, liquid: 0.00108559, 0.00210735, 0.0233586, 0.000987383, 0.000220873, 0.00811747, 0.000697794, 0.00215094 kg (8 suppliers, which the file names only by identifier); sum of these 0.038726 kg; lognormal variance with pedigree 0.078, pedigree (4,5,5,5,1)
  Stoichiometric calculation, assuming an efficiency of 95% per reaction step.
  Uncertainty: S
  properties: dry mass 1 kg, wet mass 1 kg
- ammonium thiocyanate: 0.18224 kg; lognormal variance with pedigree 0.078, pedigree (4,5,5,5,1)
  (same comment as for ammonia, anhydrous, liquid)
  properties: carbon content, fossil 0.157895, dry mass 1 kg, heating value, net 11.15 MJ, wet mass 1 kg
- aniline: 0.19961 kg; lognormal variance with pedigree 0.078, pedigree (4,5,5,5,1)
  Stoichiometric calculation, assuming an efficiency of 95% per reaction step.
  Further references:
  Finley 2006. K. Thomas Finley: Benzoquinone. In: Ullmann's Encyclopedia of Industrial Chemistry, Seventh Edition, 2009 Electronic Release (ed. Fiedler E., Grossmann G., Kersebohm D., Weiss G. and Witte C.). 7 th Electronic Release Edition. Wiley InterScience, New York, Article Online Posting Date: April 15, 2006. Online-Version under: DOI: 10.1002/14356007.a03_571.pub2
  Uncertainty: S
  properties: carbon content, fossil 0.774194, dry mass 1 kg, heating value, net 32.56 MJ, wet mass 1 kg
- carbon monoxide: 0.060099 kg; lognormal variance with pedigree 0.078, pedigree (4,5,5,5,1)
  Stoichiometric calculation, assuming an efficiency of 95% per reaction step.
  Further references:
  Cornils et al. 2000. Boy Cornils, Richard W. Fischer, Christian Kohlpaintner: Butanals. In: Ullmann's Encyclopedia of Industrial Chemistry, Seventh Edition, 2009 Electronic Release (ed. Fiedler E., Grossmann G., Kersebohm D., Weiss G. and Witte C.). 7 th Electronic Release Edition. Wiley InterScience, New York, Article Online Posting Date: September 15, 2000. Online-Version under: DOI: 10.1002/14356007.a04_447
  Uncertainty: S
  properties: carbon content, fossil 0.428571, dry mass 1 kg, heating value, net 12.99 MJ, wet mass 1 kg
  note on carbon content, fossil: CO. It is assumed that CO is produced from partial combustion of heavy heating oil.
- chemical factory, organics: 2.227e-9 unit; lognormal variance with pedigree 0.3498, pedigree (2,3,5,4,3)
  Calculated based on literature data published by the industry. For this activity, no information was readily available concerning infrastructure and land-use. Therefore, the infrastructure is estimated based on data from two chemical factories, the BASF site of Ludwigshafen and the chemical factory in Gendorf (which are both located in Germany), which produce a wide range of chemical substances. Based on this data, the following assumptions are made: the built area amounts to about 4.2 ha, the plant has an average output of 50'000 t/a and a lifespan of fifty years. The estimated infrastructure amount is therefore 4.00 E-10 units per kg of produced chemical. Furthermore, for this dataset, the infrastructure amount is accounted for each production step. This may be an overestimation in some multistep syntheses.
  References:
  Althaus H.-J., Chudacoff M., Hischier R., Jungbluth N., Osses M. and Primas A. (2007) Life Cycle Inventories of Chemicals. ecoinvent report No. 8, v2.0. EMPA Dübendorf, Swiss Centre for Life Cycle Inventories, Dübendorf, CH.
  Gendorf (2000) Umwelterklärung 2000, Werk Gendorf. Werk Gendorf, Burgkirchen.'
- chlorine, liquid: 0.34914 kg; lognormal variance with pedigree 0.078, pedigree (4,5,5,5,1)
  (same comment as for ammonia, anhydrous, liquid)
  properties: dry mass 1 kg, wet mass 1 kg
- dimethylamine: 0.14352 kg; lognormal variance with pedigree 0.078, pedigree (4,5,5,5,1)
  (same comment as for ammonia, anhydrous, liquid)
  properties: carbon content, fossil 0.533333, dry mass 1 kg, heating value, net 13.47 MJ, wet mass 1 kg
- electricity, medium voltage: 0.0576078, 1.14915, 0.38611, 0.0176415, 0.00353093, 0.000758169, 0.118667 kWh (7 suppliers, which the file names only by identifier); sum of these 1.73346 kWh; lognormal variance with pedigree 0.078, pedigree (4,5,5,5,1)
  Estimation, assuming a default value, originated from the calculation of an average consumption of electricity and heat per kg of product (3.2 MJ/kg), and a resulting amount of electricity of 0.333 kWh for every reaction step per kg reaction product, considering that the demand is made up of a mix that includes 38% electricity. Additionally, reaction steps are approximated with energy consumption data, assuming that inventory flows can be estimated using process data for basic operation steps, available for specific organic chemicals.
  Further references:
  Kim S., Overcash M.: Energy in chemical manufacturing processes: gate-to-gate information for life cycle assessment. In: Journal of Chemical Technology & Biotechnology vol. 78, no. 9: 995-1005(11). 2003
  Uncertainty: E
- ethanol, without water, in 99.7% solution state, from ethylene: 0.089108 kg; lognormal variance with pedigree 0.078, pedigree (4,5,5,5,1)
  (same comment as for aniline)
  properties: carbon content, fossil 0.521739, dry mass 1 kg, heating value, net 28.1 MJ, wet mass 1 kg
  note on heating value, net: Based on literature, page 275, Report 17: Jungbluth, N., Chudacoff, M., Dauriat, A., Dinkel, F., Doka, G., Faist Emmenegger, M., Gnansounou, E., Kljun, N., Schleiss, K., Spielmann, M., Stettler, C., Sutter, J. 2007: Life Cycle Inventories of Bioenergy. ecoinvent report No. 17, Swiss Centre for Life Cycle Inventories, Dübendorf, CH.
- heat, district or industrial, natural gas: 0.136802, 8.32504 MJ (2 suppliers, which the file names only by identifier); sum of these 8.46184 MJ; lognormal variance with pedigree 0.078, pedigree (4,5,5,5,1)
  Estimation, assuming a default value, originated from the calculation of an average consumption of electricity and heat per kg of product (3.2 MJ/kg), and a resulting amount of heat of 2 MJ for every reaction step per kg reaction product, considering that the demand is made up of a mix that includes 50% natural gas. Additionally, reaction steps are approximated with energy consumption data, assuming that inventory flows can be estimated using process data for basic operation steps, available for specific organic chemicals.
  Further references:
  Kim S., Overcash M.: Energy in chemical manufacturing processes: gate-to-gate information for life cycle assessment. In: Journal of Chemical Technology & Biotechnology vol. 78, no. 9: 995-1005(11). 2003
  Uncertainty: E
  properties: heating value, net 1 MJ
- heat, district or industrial, other than natural gas: 4.72086, 0.00218709 MJ (2 suppliers, which the file names only by identifier); sum of these 4.72304 MJ; lognormal variance with pedigree 0.078, pedigree (4,5,5,5,1)
  Estimation, assuming a default value, originated from the calculation of an average consumption of electricity and heat per kg of product (3.2 MJ/kg), and a resulting amount of heat of 2 MJ for every reaction step per kg reaction product, considering that the demand is made up of a mix that includes 12% steam from external energy sources. Additionally, reaction steps are approximated with energy consumption data, assuming that inventory flows can be estimated using process data for basic operation steps, available for specific organic chemicals.
  Further references:
  Kim S., Overcash M.: Energy in chemical manufacturing processes: gate-to-gate information for life cycle assessment. In: Journal of Chemical Technology & Biotechnology vol. 78, no. 9: 995-1005(11). 2003
  Uncertainty: E
  properties: heating value, net 1 MJ
- hydrogen, gaseous, medium pressure, merchant: 0.0106136, 0.00666437 kg (2 suppliers, which the file names only by identifier); sum of these 0.017278 kg; lognormal variance with pedigree 0.078, pedigree (4,5,5,5,1)
  Stoichiometric calculation, assuming an efficiency of 95% per reaction step.
  Further references:
  Cornils et al. 2000. Boy Cornils, Richard W. Fischer, Christian Kohlpaintner: Butanals. In: Ullmann's Encyclopedia of Industrial Chemistry, Seventh Edition, 2009 Electronic Release (ed. Fiedler E., Grossmann G., Kersebohm D., Weiss G. and Witte C.). 7 th Electronic Release Edition. Wiley InterScience, New York, Article Online Posting Date: September 15, 2000. Online-Version under: DOI: 10.1002/14356007.a04_447
  Kim et al. 2003. Kim S., Overcash M.: Energy in chemical manufacturing processes: gate-to-gate information for life cycle assessment. In: Journal of Chemical Technology & Biotechnology vol. 78, no. 9: 995-1005(11). 2003
  Uncertainty: S
  properties: dry mass 1 kg, heating value, net 120.21 MJ, wet mass 1 kg
- inert waste, for final disposal: -0.31724 kg; name BP_inert_waste_for_final_disposal; lognormal variance with pedigree 0.038, pedigree (4,5,1,5,1)
  Stoichiometric calculation
  Uncertainty: S
  production volume; = RP_PV*BP_inert_waste_for_final_disposal/ABS(RP)
    Calculated from the production volume of benzimidazole-compound in proportion to the respective output amounts.
  properties: dry mass 0.995 kg, water content 0.00502513, wet mass 1 kg
- manganese concentrate: 0.18674 kg; lognormal variance with pedigree 0.078, pedigree (4,5,5,5,1)
  (same comment as for aniline)
  properties: dry mass 1 kg, wet mass 1 kg
- methanol: 0.0246386, 0.0477828, 0.00452555 kg (3 suppliers, which the file names only by identifier); sum of these 0.076947 kg; lognormal variance with pedigree 0.078, pedigree (4,5,5,5,1)
  (same comment as for ammonia, anhydrous, liquid)
  properties: carbon content, fossil 0.375, dry mass 1 kg, heating value, net 20 MJ, wet mass 1 kg
  note on heating value, net: Based on literature, page 533, Report 17: Jungbluth, N., Chudacoff, M., Dauriat, A., Dinkel, F., Doka, G., Faist Emmenegger, M., Gnansounou, E., Kljun, N., Schleiss, K., Spielmann, M., Stettler, C., Sutter, J. 2007: Life Cycle Inventories of Bioenergy. ecoinvent report No. 17, Swiss Centre for Life Cycle Inventories, Dübendorf, CH.
- monochlorobenzene: 0.26857 kg; lognormal variance with pedigree 0.078, pedigree (4,5,5,5,1)
  (same comment as for ammonia, anhydrous, liquid)
  properties: carbon content, fossil 0.642857, dry mass 1 kg, heating value, net 24.78 MJ, wet mass 1 kg
- natural gas, high pressure: 0.000737422, 0.00124394, 0.00271341, 0.000908064, 0.000212211, 0.00126304, 0.00121198, 0.00318693, 0.00123037, 0.00190303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 m3 (37 suppliers, which the file names only by identifier); sum of these 0.0955015 m3; lognormal variance with pedigree 0.078, pedigree (4,5,5,5,1)
  (same comment as for ammonia, anhydrous, liquid)
  properties: carbon content, fossil 0.602381, dry mass 0.84 kg, heating value, gross 40 MJ, heating value, net 36 MJ, wet mass 0.84 kg
  note on carbon content, fossil: An average C content of 0.506 kg C/ m3 has been assumed (this average has been calculated using data in Tab 3.5, ecoinvent v2.2 report 6_V
  note on heating value, net: Literature value, Source: Christoph Meili;Niels Jungbluth;Maresa Bussa (2021) Life cycle inventories of crude oil and natural gas extraction. ESU-services Ltd. commissioned by BAFU & VSG, Schaffhausen, Switzerland, http://esu-services.ch/data/public-lci-reports/
- nitric acid, without water, in 50% solution state: 0.00477954, 0.0176605, 0.0539203, 0.0291037, 0.00846197, 0.00707536, 0.00710165, 0.0229669 kg (8 suppliers, which the file names only by identifier); sum of these 0.15107 kg; lognormal variance with pedigree 0.078, pedigree (4,5,5,5,1)
  (same comment as for ammonia, anhydrous, liquid)
  properties: dry mass 1 kg, wet mass 1 kg
- phosgene, liquid: 0.22325 kg; lognormal variance with pedigree 0.078, pedigree (4,5,5,5,1)
  Stoichiometric calculation, assuming an efficiency of 95% per reaction step.
  Assumed to be removed with an efficiency of 100% in the wastewater treatment.
  Uncertainty: S
  properties: carbon content, fossil 0.122449, dry mass 1 kg, heating value, net 3.68 MJ, wet mass 1 kg
- propylene: 0.00083335, 0.0893157 kg (2 suppliers, which the file names only by identifier); sum of these 0.090149 kg; lognormal variance with pedigree 0.078, pedigree (4,5,5,5,1)
  (same comment as for carbon monoxide)
  properties: carbon content, fossil 0.857143, dry mass 1 kg, heating value, net 43.22 MJ, wet mass 1 kg
- sodium hydroxide, without water, in 50% solution state: 0.43509 kg; lognormal variance with pedigree 0.078, pedigree (4,5,5,5,1)
  Stoichiometric calculation, assuming an efficiency of 100%.
  Uncertainty: S
  properties: dry mass 1 kg, heating value, net 3.03 MJ, wet mass 1 kg
- sulfur: 0.077757 kg; lognormal variance with pedigree 0.078, pedigree (4,5,5,5,1)
  (same comment as for ammonia, anhydrous, liquid)
  properties: dry mass 1 kg, wet mass 1 kg
- sulfur dioxide, liquid: 0.15551 kg; lognormal variance with pedigree 0.078, pedigree (4,5,5,5,1)
  (same comment as for ammonia, anhydrous, liquid)
  properties: dry mass 1 kg, wet mass 1 kg
- sulfur trioxide: 0.38878 kg; lognormal variance with pedigree 0.078, pedigree (4,5,5,5,1)
  (same comment as for ammonia, anhydrous, liquid)
  properties: dry mass 1 kg, wet mass 1 kg
- sulfuric acid: 0.21035 kg; lognormal variance with pedigree 0.078, pedigree (4,5,5,5,1)
  (same comment as for aniline)
  properties: dry mass 1 kg, wet mass 1 kg

## Inputs from nature
- Water, cooling, unspecified natural origin [natural resource, in water]: 0.13362 m3; name water_cooling_UNO_input; source Gendorf 2000; lognormal variance with pedigree 0.078, pedigree (4,5,5,5,1)
  Estimation (24 kg of cooling water per kg produced chemical per step).
  Uncertainty: E

## Emissions to nature
- Ammonia [air, urban air close to ground]: 0.00014678 kg; lognormal variance with pedigree 0.218, pedigree (4,5,5,5,5)
  Estimation, based on the assumption that 0.2% of volatile input materials is emitted to air occurring from the purge vent, the distillation vent and fugitive emission sources.
  Uncertainty: E
- Carbon dioxide, fossil [air, urban air close to ground]: 0.3929 kg; lognormal variance with pedigree 0.1786, pedigree (4,5,5,5,5)
  Estimation, based on the assumption that 0.2% of volatile input materials is emitted to air occurring from the purge vent, the distillation vent and fugitive emission sources. Remaining gases like CH4 or CO are oxidated to CO2. The carbon contained in the removed carbon compounds from wastewater treatment was accounted as CO2 emissions to air (assuming a removal efficiency of 90%).
  Uncertainty: E
- Carbon monoxide, fossil [air, urban air close to ground]: 0.0001202 kg; lognormal variance with pedigree 0.798, pedigree (4,5,5,5,5)
  (same comment as for Ammonia)
- Ethanol [air, urban air close to ground]: 0.00017822 kg; lognormal variance with pedigree 0.188, pedigree (4,5,5,5,5)
  (same comment as for Ammonia)
- Hydrogen [air, urban air close to ground]: 0.0043269 kg; lognormal variance with pedigree 0.188, pedigree (4,5,5,5,5)
  (same comment as for Ammonia)
- Methane, fossil [air, urban air close to ground]: 0.00015551 kg; lognormal variance with pedigree 0.188, pedigree (4,5,5,5,5)
  (same comment as for Ammonia)
- Methanol [air, urban air close to ground]: 0.00015389 kg; lognormal variance with pedigree 0.188, pedigree (4,5,5,5,5)
  (same comment as for Ammonia)
- Propylene [air, urban air close to ground]: 0.0001803 kg; lognormal variance with pedigree 0.188, pedigree (4,5,5,5,5)
  (same comment as for Ammonia)
- Sulfur dioxide [air, urban air close to ground]: 0.28907 kg; lognormal variance with pedigree 0.1786, pedigree (4,5,5,5,5)
  (same comment as for Ammonia)
- Sulfur trioxide [air, urban air close to ground]: 0.00077757 kg; lognormal variance with pedigree 0.188, pedigree (4,5,5,5,5)
  (same comment as for Ammonia)
- Water [air, unspecified]: 0.0517777 m3; = (water_cooling_UNO_input*fraction_CW_to_air); lognormal variance with pedigree 0.0827, pedigree (2,2,5,5,1)
  Calculated as a fraction of the input of water. For more details, refer to the mathematical relation and the parameters.
  property fraction, origin: fresh water 0; name fraction_origin_fresh_water
  property fraction, origin: salt water 0; name fraction_origin_salt_water
  property fraction, origin: unspecified 1; name fraction_origin_unspecified
- o-Dichlorobenzene [air, urban air close to ground]: 0.00053714 kg; lognormal variance with pedigree 0.188, pedigree (4,5,5,5,5)
  (same comment as for Ammonia)
- Ammonium [water, surface water]: 0.018227 kg; lognormal variance with pedigree 0.188, pedigree (4,5,5,5,5)
  Estimation, assuming that the remaining amount of unreacted input materials leave the production process with the wastewater, wich is further treated in an internal wastewater plant. For the nitrogen containing compounds within the wastewater a removal efficiency of 50% was assumed. The nitrogen emitted to air (N2) is neglected.
  Uncertainty: E
- BOD5, Biological Oxygen Demand [water, unspecified]: 0.00591234 kg; lognormal variance with pedigree 0.218, pedigree (4,5,5,5,5)
  Calculated value. The BOD, COD, TOC and BOD5 are calculated based on the amount and type of emissions released to water in the same activity.
- COD, Chemical Oxygen Demand [water, unspecified]: 0.00591234 kg; lognormal variance with pedigree 0.218, pedigree (4,5,5,5,5)
  (same comment as for BOD5, Biological Oxygen Demand)
- Chloride [water, surface water]: 0.50172 kg; lognormal variance with pedigree 0.448, pedigree (4,5,5,5,5)
  Estimation, assuming that the remaining amount of unreacted input materials leave the production process with the wastewater, wich is further treated in an internal wastewater plant.
  Uncertainty: E
- DOC, Dissolved Organic Carbon [water, unspecified]: 0.00170001 kg; lognormal variance with pedigree 0.218, pedigree (4,5,5,5,5)
  (same comment as for BOD5, Biological Oxygen Demand)
- Ethanol [water, surface water]: 0.00042772 kg; lognormal variance with pedigree 0.448, pedigree (4,5,5,5,5)
  (same comment as for Chloride)
- Methanol [water, surface water]: 0.00075408 kg; lognormal variance with pedigree 0.448, pedigree (4,5,5,5,5)
  Estimation, assuming that the remaining amount of unreacted input materials leave the production process with the wastewater, which is further treated in an internal wastewater plant.
  Uncertainty: E
- Monochlorobenzene [water, surface water]: 0.0012891 kg; lognormal variance with pedigree 0.448, pedigree (4,5,5,5,5)
  (same comment as for Chloride)
- Nitrate [water, surface water]: 0.0074336 kg; lognormal variance with pedigree 0.188, pedigree (4,5,5,5,5)
  Estimation, assuming that the remaining amount of unreacted input materials leave the production process with the wastewater, which is further treated in an internal wastewater plant. For the nitrogen containing compounds within the wastewater a removal efficiency of 50% was assumed. The nitrogen emitted to air (N2) is neglected.
  Uncertainty: E
- Propylene [water, surface water]: 0.00043271 kg; lognormal variance with pedigree 0.448, pedigree (4,5,5,5,5)
  (same comment as for Methanol)
- Sodium I [water, surface water]: 0.25018 kg; lognormal variance with pedigree 0.798, pedigree (4,5,5,5,5)
  (same comment as for Methanol)
- Sulfate [water, surface water]: 0.10899 kg; lognormal variance with pedigree 0.188, pedigree (4,5,5,5,5)
  (same comment as for Methanol)
- Sulfur [water, surface water]: 0.0038878 kg; lognormal variance with pedigree 0.188, pedigree (4,5,5,5,5)
  (same comment as for Methanol)
- TOC, Total Organic Carbon [water, unspecified]: 0.00170001 kg; lognormal variance with pedigree 0.218, pedigree (4,5,5,5,5)
  (same comment as for BOD5, Biological Oxygen Demand)
- Water [water, unspecified]: 0.0818423 m3; = water_cooling_UNO_input*(1-fraction_CW_to_air); lognormal variance with pedigree 0.0827, pedigree (2,2,5,5,1)
  (same comment as for Water)
  property carbon content, fossil 0; name C_content_fossil
  property carbon content, non-fossil 0; name C_content_non_fossil
  property dry mass 0 kg; name DM
  property fraction, origin: fresh water 0; name fraction_origin_fresh_water_Ww
  property fraction, origin: salt water 0; name fraction_origin_salt_water_Ww
  property fraction, origin: unspecified 1; name fraction_origin_unspecified_Ww
  property water in wet mass 1000 kg; name WWM
  property wet mass 1000 kg; name WM

## Sampling procedure
Literature data.

## Extrapolations
This dataset has been copied from an original dataset covering the geography RER. The uncertainty has been adjusted accordingly.

## Review by Gregor Wernet 2017-08-04
This dataset was additionally reviewed in a separate review process by Eric Johnson of Atlantic Consulting as well as Emilia Moreno Ruiz and Gregor Wernet of ecoinvent.
