# cathode production, LFP, for Li-ion battery

Dataset: EcoSpold 2, unit process
Geography: RoW
Time period: 2018-12-31 to 2025-12-31
Technology level: current
Classification: ISIC rev.4 ecoinvent: 2720:Manufacture of batteries and accumulators
Synonyms: lithium iron phosphate cathode
Scenario: Business-as-Usual
System model: Allocation, cut-off by classification
Generated by: Eleonora Crenna
Published in: Dai, Q. 2018
Database: ecoinvent
isCopyrightProtected: true
accessRestrictedTo: 1

## General comment
This dataset represents the production of 1 kg lithium iron phosphate (LFP) cathode for Li-ion batteries. The active material lithium iron phosphate is produced via solid state process or hydrothermal process. A market mix of them is accounted for. Data are based on literature (especially Dai et al., 2018 and Moretti et al., 2019), integrated with expert judgment. For infrastructure, the ecoinvent dataset "chemical factory, organics" is accounted.
Reference:
Dai, Q., Kelly, J.C., Dunn, J. and Benavides, P.T. (2018). Update of Bill-of-materials and cathode materials production for Lithium-ion batteries in the GREET model. ANL report.
Moretti et al. (2019). A post-mortem study of stacked 16Ah graphite/LiFePO4 pouch cells cycled at 5°C. Batteries, 5, 45.

## Included activities start
The activity starts when the LFP active material and other materials enter the process at the factory.

## Included activities end
The activity ends with the production of LFP cathode at factory gate.

## Geography
This dataset is extrapolated from CN production to global.

## Technology
The positive electrode is made of the active material (LiFePO4), a conductive additive (carbon black) and a polymer binder (polyvinylidene fluoride, PVDF) mixed in ratio 89:6:5. The solvent N-methyl-2-pyrrolidone (NMP) is used to prepare the cathode slurry. The input materials are mixed to form a slurry, then the mixture is dried with the solvent evaporating away, cut and calendered to form the cathode of a Li-ion battery. The energy required to coat the aluminium conductor foil with the cathode slurry is included in this dataset, because it was not possible to separate it from the energy required for the drying step.

## Time period
The time period is from 2018 (year of the publication of data) and 2025 (assuming that this producing technology is still viable in the near future)

## Parameters
- storage capacity per cell: 0.17172; name storage_capacity_cell; = 0.159*1.08
  The storage capacity per cell is expressed in kWh per cell. It is calculated here, specifically for LFP battery cell, considering the specific energy capacity of LFP cell (0.159 kWh/kg, as in Dai et al. 2018) and the average weight of a LFP cell (1.08 kg, as reported in the technical data available at: https://lithiumsystem.ch/produkt/lithium-cell-etc-lfp-40ah/?lang=en)
  Reference:
  Dai, Q., Kelly, J. C., Dunn, J., & Benavides, P. T. (2018). Update of bill-of-materials and cathode materials production for lithium-ion batteries in the GREET model. Argonne National Laboratory.

## Reference product
- cathode, LFP, for Li-ion battery: 1 kg; By-product classification allocatable product; CPC 46430: Parts of primary cells, primary batteries and electric accumulators (including separators); HS2017 850690: Cells and batteries; primary, parts thereof
  production volume 1.7335e7 kg; = 619948187 *0.15*0.27
    The PV is expressed in kg. According to UN Comtrade (https://comtrade.un.org/data/, HS code: 850760) 619948187 kg Li-ion batteries were exported globally in 2019. Approximately 15% are LFP Li-ion batteries (Benchmark Mineral Intelligence, 2019. The Current Position of Li-ion Raw Material Supply and the Role of Recycling). LFP cathode represents approximately 27% weight of a battery pack
  property price 8.53414 EUR2005
    Converted to EUR2005. 26 $ * 0.115 kWh/kg_battery /( 0.72kg_Cell/kg_battery * 0.3676 kg_cathode/kg_cell). Price retrieved from: https://thedeepdive.ca/lithium-ion-battery-cells-cathodes-and-costs/
  properties: carbon allocation 0.0768826 kg, carbon content 0.0768826, carbon content, fossil 0.0768826, carbon content, non-fossil 0, dry mass 1 kg, water content 0, water in wet mass 0 kg, wet mass 1 kg

## Inputs from technosphere
- N-methyl-2-pyrrolidone: 0.01 kg; name solvent_input; = 0.5*0.02; lognormal variance with pedigree 0.0439, pedigree (2,4,5,3,2)
  Based on literature (Nelson et al. 2019, BatPac model). NMP is used as a solvent in the production of NMC cathode. The amount of NMP needed is higher for LFP material than for NMC due to the higher amount of CB (e.g. 6% in LFP cathode compared to 2.5% in NMC111 cathode). Approximately 98% NMP is recovered via evaporation for re-use in the production of cathode material (Emilson, E., & Dahllöf, L., 2019. Lithium‐Ion Vehicle Battery Production. IVL Technical Report).
  Reference:
  Cloutier, Julie, 2015. Est-ce que le stockage d’énergie au Québec pourrait être avantageux d’un point de vue environnemental? Analyse du cycle de vie attributionnelle et conséquentielle. MSc. Env. Dissertation, University of Sherbrooke. Available at: https://www.usherbrooke.ca/environnement/fileadmin/sites/environnement/documents/Essais_2015/Cloutier_Julie_MEnv_2015.pdf
  Nelson, P. A., Gallagher, K. G., Bloom, I. D., & Dees, D. W. (2012). Modeling the performance and cost of lithium-ion batteries for electric-drive vehicles (No. ANL-12/55). Argonne National Lab.(ANL), Argonne, IL (United States).
  properties: carbon content, fossil 0.585366, dry mass 1 kg, heating value, net 29.36 MJ, wet mass 1 kg
- carbon black: 0.06 kg; lognormal variance with pedigree 0.0439, pedigree (2,4,5,3,2)
  Literature (Dai et al., 2018; Moretti et al., 2019). LFP active material, carbon black and the binder are mixed in a ratio 89:6:5.
  Reference:
  Dai, Q., Kelly, J.C., Dunn, J. and Benavides, P.T. (2018). Update of Bill-of-materials and cathode materials production for Lithium-ion batteries in the GREET model. ANL report.
  Moretti et al. (2019). A post-mortem study of stacked 16Ah graphite/LiFePO4 pouch cells cycled at 5°C. Batteries, 5, 45.
  properties: carbon content, fossil 0.85, dry mass 1 kg, heating value, net 25.76 MJ, wet mass 1 kg
- chemical factory, organics: 4e-10 unit; lognormal variance with pedigree 0.3582, pedigree (5,5,2,5,3)
  Calculated based on literature data published by the industry. For this activity, no information was readily available concerning infrastructure and land-use. Therefore, the infrastructure is estimated based on data from two chemical factories, the BASF site of Ludwigshafen and the chemical factory in Gendorf (which are both located in Germany), which produce a wide range of chemical substances. Based on this data, the following assumptions are made: the built area amounts to about 4.2 ha, the plant has an average output of 50'000 t/a and a lifespan of fifty years. The estimated infrastructure amount is therefore 4.00 E-10 units per kg of produced chemical.
  References:
  Althaus H.-J., Chudacoff M., Hischier R., Jungbluth N., Osses M. and Primas A. (2007) Life Cycle Inventories of Chemicals. ecoinvent report No. 8, v2.0. EMPA Dübendorf, Swiss Centre for Life Cycle Inventories, Dübendorf, CH.
  Gendorf (2000) Umwelterklärung 2000, Werk Gendorf. Werk Gendorf, Burgkirchen.om ecoinvent)
- electricity, medium voltage: 0.000462815, 4.11636e-5, 0.00358902, 0.00470306, 0.00498056, 0.00253685, 0.000350377, 0.00221763, 9.36118e-5, 0.0149877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 kWh (47 suppliers, which the file names only by identifier); sum of these 0.355601 kWh; = 0.159*0.331/0.148; lognormal variance with pedigree 0.0439, pedigree (3,3,5,3,2)
  Calculated value based on Pettinger & Dong (2016). Specifically, this value results from summing the energy demand for cathode slurry preparation with NMP-based solvent, slitting and calendaring, in terms of kWh electricity per cell (0.331 kWh/cell). Original value refers to a 40 Ah, 3.7 V generic Li-ion battery. The specific energy capacity of LFP cell is 0.159 kWh/kg cell (Dai et al. 2018)
  Reference:
  Pettinger, K. H., & Dong, W. (2016). When does the operation of a battery become environmentally positive?. Journal of The Electrochemical Society, 164(1), A6274.
  Dai, Q., Kelly, J. C., Dunn, J., & Benavides, P. T. (2018). Update of bill-of-materials and cathode materials production for lithium-ion batteries in the GREET model. Argonne National Laboratory.
- heat, district or industrial, natural gas: 29.4709 MJ; = ((56+71)/2)* storage_capacity_cell/0.37; lognormal variance with pedigree 0.0499, pedigree (2,3,5,3,3)
  Literature. Original value of 56-71 MJ/kWh cell taken from Dai et al. (2017), representing the energy demand for electrode drying & NMP recovery. It refers to 43Ah, 3.7 V NMC cells. This value is calculated considering the average energy demand, the storage capacity per LFP cell (0.172 kWh/cell based on calculations - see parameters) and the share of cathode in the cell.
  Reference:
  Dai et al. (2017). Update of Life Cycle Analysis of Lithium-Ion Batteries in the GREET Model. ArgonneNational Laboratory.
  properties: heating value, net 1 MJ
- lithium iron phosphate: 0.89 kg; lognormal variance with pedigree 0.0425, pedigree (2,3,5,3,2)
  (same comment as for carbon black)
  properties: dry mass 1 kg, iron content 0.1571, lithium content 0.0574, oxygen content 0.5293, phosphorus content 0.2562, wet mass 1 kg
- polyvinylfluoride: 0.05 kg; lognormal variance with pedigree 0.0439, pedigree (2,4,5,3,2)
  Literature (Dai et al., 2018; Moretti et al., 2019). LFP active material, carbon black and the binder are mixed in a ratio 89:6:5. PVF is used as a proxy for PVDF (binder)
  Reference:
  Dai, Q., Kelly, J.C., Dunn, J. and Benavides, P.T. (2018). Update of Bill-of-materials and cathode materials production for Lithium-ion batteries in the GREET model. ANL report.
  Moretti et al. (2019). A post-mortem study of stacked 16Ah graphite/LiFePO4 pouch cells cycled at 5°C. Batteries, 5, 45.
  properties: carbon content, fossil 0.521739, dry mass 1 kg, heating value, net 23.7 MJ, wet mass 1 kg

## Emissions to nature
- N-methyl-2-pyrrolidone [air, unspecified]: 0.01 kg; = solvent_input; lognormal variance with pedigree 0.0847, pedigree (3,4,5,3,2)
  Calculated value to obtain mass balance.

## Sampling procedure
From Literature.

## Extrapolations
This dataset was extrapolated from national producers to global.
