# hot rolling, steel

Dataset: EcoSpold 2, unit process
Geography: RoW
Time period: 1997-01-01 to 2023-12-31
Technology level: current
Classification: ISIC rev.4 ecoinvent: 2410:Manufacture of basic iron and steel
Classification: EcoSpold01Categories: metals/processing
Synonyms: Hot forming
Tags: ConvertedDataset
Scenario: Business-as-Usual
System model: Allocation, cut-off by classification
Share of production covered: 0 %
Generated by: Silvio Blaser
Published in: Classen M. 2009
Database: ecoinvent
isCopyrightProtected: true
accessRestrictedTo: 1

## General comment
To achieve greater toughness, shock resistance and tensile strength, the raw steel production outputs cast ingots, slabs, billets and beam blanks are hot rolled to long or flat products or semifinished products.
[This dataset was already contained in the ecoinvent database version 2. It was not individually updated during the transfer to ecoinvent version 3. Life Cycle Impact Assessment results may still have changed, as they are affected by changes in the supply chain, i.e. in other datasets. This dataset was generated following the ecoinvent quality guidelines for version 2. It may have been subject to central changes described in the ecoinvent version 3 change report (http://www.ecoinvent.org/database/ecoinvent-version-3/reports-of-changes/), and the results of the central updates were reviewed extensively. The changes added e.g. consistent water flows and other information throughout the database. The documentation of this dataset can be found in the ecoinvent reports of version 2, which are still available via the ecoinvent website. The change report linked above covers all central changes that were made during the conversion process.]

## Included activities start
The activity starts with the reception of semifinished products at the rolling facility gates. The material on which this activity is applied it is not included as input.

## Included activities end
Includes the process steps scarfing, grinding heating, descaling, rolling and finishing. Semiclosed water circuit with water treatment plant is also included. Does not include the material being rolled.

## Geography
Data-set is representative for European Union

## Technology
Average technique for EU. Assumption: heating 100% with natural gas. Furnaces of about 10 MW are approxi-mated by furnace "> 100 kW"

## Parameters
- fraction, cooling water, cooling pond system, to air: 0.032 dimensionless; name fraction_CW_CP_to_air; lognormal variance with pedigree 0.0413, pedigree (2,3,1,3,1)
  Calculated based on literature value (Scown, C.D., 2011, Water Footprint of U.S. Transportation Fuels and supplying information of the article) (Vionnet, S., Quantis Water Database - Technical Report, 2012).
- fraction, cooling water, once-through system, to air: 0.004 dimensionless; name fraction_CW_OT_to_air; lognormal variance with pedigree 0.0413, pedigree (2,3,1,3,1)
  (same comment as for fraction, cooling water, cooling pond system, to air)
- fraction, cooling water, recirculating system, to air: 0.771 dimensionless; name fraction_CW_R_to_air; lognormal variance with pedigree 0.0413, pedigree (2,3,1,3,1)
  (same comment as for fraction, cooling water, cooling pond system, to air)
- fraction, cooling water, to air: 0.3875 dimensionless; name fraction_CW_to_air; = (0.5*fraction_CW_OT_to_air)+(0.5*fraction_CW_R_to_air); lognormal variance with pedigree 0.092025, pedigree (4,4,3,2,4)
  Calculated value based on literature value (see comments of the other parametres present in this dataset) and expert opinion. In the case when no industry/literature data are available about the type of cooling or directly fraction, cooling water, to air specific for the process a default assumption is applied. It is assumed that the once-through cooling system is used in 50% of all cases and recirculating system is used in another 50% of all cases.
- fraction, process water, to air: 0.095 dimensionless; name fraction_PW_to_air; lognormal variance with pedigree 0.092025, pedigree (4,4,3,2,4)

## Reference product
- hot rolling, steel: 1 kg; name rolling; By-product classification allocatable product; CPC 88601: Basic iron and steel manufacturing services
  EcoSpold01Location=RER
  production volume 1.59204e12 kg; name rolling_PV
    Source: worldsteel, 2020; data for 2019.
    References
    worldsteel (2020). Steel Statistical Yearbook 2020 [online].Available from: https://www.worldsteel.org/en/dam/jcr:5001dac8-0083-46f3-aadd-35aa357acbcc/Steel%2520Statistical%2520Yearbook%25202020%2520%2528concise%2520version%2529.pdf (accessed 20.07.2021).
  property price 0.0689 EUR2005
    The prices of metal processing processes were calculated by using the monetary flows (deducted the price of metal inputs) from the following metal processing activities in EU & DK IO database: 61, 62, 63 and 64. Monetary supply: (1.6E11 EUR). Value of metal input to activities: 1.2E11 EUR. 4.4E10 (=(1.6-1.2) E11) was then considered as the price of the metal processing. The monetary flow was distributed over the Ecoinvent metal processing processes. 'Chipless shaping' and 'Chipping' acounted for 86.5 % of the production volumes and 86.5% of the monetary flow was therefore ascribed to these processe. The rest of the monetary flow was ascribed to the remaining metal processing processes. Within the last categories the money flow was ditributed between the different processes on basis of their respective electricity consumption, because many of the processes not had mass units.
  properties: carbon allocation 0 kg, carbon content 0

## Inputs from technosphere
- average incineration residue: -0.000223 kg; name residue_amount; lognormal variance with pedigree 2.372, pedigree (1,1,1,5,1)
  EcoSpold01Location=CH
  calculated from max value assuming lognormal distribution
  production volume; = abs( residue_amount/ rolling)* rolling_PV
    Calculated from the production volume of hot rolling, steel in proportion to the respective output amounts.
  properties: carbon content, fossil 0.0325466, carbon content, non-fossil 0.0511208, dry mass 1 kg, wet mass 1 kg
  note on carbon content, fossil: Tab A.1, ecoinvent v2.2 report 13_I. It is considered that 61.1% of the C has a biogenic origin
- basic oxygen furnace waste: -3.27111e-5, -0.000450289 kg (2 suppliers, which the file names only by identifier); sum of these -0.000483 kg; lognormal variance with pedigree 0.572, pedigree (1,1,1,5,1)
  calculated from max value assuming lognormal distribution
  EcoSpold01Location=CH
  production volume; = abs( BOF_waste/ rolling)* rolling_PV
    (same comment as for average incineration residue)
  properties: dry mass 1 kg, wet mass 1 kg
- chemical, inorganic: 1.45e-8 kg; lognormal variance with pedigree 0.162, pedigree (1,1,5,5,1)
  calculated from max value assuming lognormal distribution
  EcoSpold01Location=GLO
  properties: carbon content, fossil 0.003, dry mass 1 kg, wet mass 1 kg
  note on carbon content, fossil: This dataset is an unweighted average of 20 inorganic substances (listed in Tab 88.1, ecoinvent v2.2 report 8, part II), being part of the top100 chemicals included in this database. The C-content has also been calculated as an unweighted average of the C content of the substances composing this dataset.
- corrugated board box: 1.46599e-12, 5.46082e-14, 3.1994e-12 kg (3 suppliers, which the file names only by identifier); sum of these 4.72e-12 kg; lognormal variance with pedigree 0.086, pedigree (4,5,5,5,3)
  EcoSpold01Location=RER
  properties: carbon content, fossil 0.00365437, carbon content, non-fossil 0.450248, dry mass 0.945 kg, heating value, net 12.86 MJ, water content 0.0582011, wet mass 1 kg
  note on carbon content, fossil: C content was calculated as an addition of C content in the raw materials.
- electric arc furnace dust: -0.00126007, -4.99278e-5 kg (2 suppliers, which the file names only by identifier); sum of these -0.00131 kg; lognormal variance with pedigree 1.172, pedigree (1,1,1,5,1)
  EcoSpold01Location=CH
  calculated from max value assuming lognormal distribution
  production volume; = abs( EAF_dust_amount/ rolling)* rolling_PV
    (same comment as for average incineration residue)
  properties: carbon content, fossil 0.01339, dry mass 0.846 kg, water content 0.182033, wet mass 1 kg
- electricity, medium voltage: 0.00465259, 0.0928088, 0.0311835, 0.00142478, 0.000285169, 6.12322e-5, 0.00958395 kWh (7 suppliers, which the file names only by identifier); sum of these 0.14 kWh; lognormal variance with pedigree 0.0446, pedigree (3,3,5,5,1)
  EcoSpold01Location=UCTE
- heat, district or industrial, natural gas: 0.0239594, 1.45804 MJ (2 suppliers, which the file names only by identifier); sum of these 1.482 MJ; lognormal variance with pedigree 0.072, pedigree (1,1,5,5,1)
  calculated from max value assuming lognormal distribution
  EcoSpold01Location=RER
  properties: heating value, net 1 MJ
- lime, hydrated, loose weight: 4.97e-5 kg; lognormal variance with pedigree 0.052, pedigree (1,1,5,5,1)
  EcoSpold01Location=CH
  calculated from max value assuming lognormal distribution
  properties: dry mass 0.997 kg, water content 0.00300903, wet mass 1 kg
- liquefied petroleum gas: 2.77264e-6, 2.66271e-5, 8.35889e-6, 1.86049e-6, 9.4575e-5, 0.000395806 kg (6 suppliers, which the file names only by identifier); sum of these 0.00053 kg; lognormal variance with pedigree 0.06, pedigree (1,5,5,5,1)
  EcoSpold01Location=RER
  properties: carbon content, fossil 0.821863, dry mass 1 kg, heating value, net 45.5 MJ, wet mass 1 kg
  note on heating value, net: Indicative value. Reference: Fuels - Higher and Lower Calorific Values, available at: https://www.engineeringtoolbox.com/fuels-higher-calorific-values-d_169.html
- lubricating oil: 0.00404 kg; lognormal variance with pedigree 0.312, pedigree (1,1,5,5,1)
  calculated from max value assuming lognormal distribution
  EcoSpold01Location=RER
  properties: carbon content, fossil 0.75, dry mass 1 kg, heating value, net 40.2 MJ, wet mass 1 kg
  note on carbon content, fossil: Lubricating oil is produced from diesel. C-content/dry mass of fats and oils considered 75%, from: ecoinvent v2.2 report, n 15a, pg 40
  note on heating value, net: Literature value, Source: IPCC 2006, 2006 IPCC Guidelines for National Greenhouse Gas Inventories, Prepared by the National Greenhouse Gas Inventories Programme, Eggleston H.S., Buendia L., Miwa K., Ngara T. and Tanabe K. (eds). Published: IGES, Japan
- municipal solid waste: -1.24486e-13, -1.47822e-14, -9.20008e-14, -7.02351e-11, -1.0344e-14, -3.32024e-15, -7.50466e-15, -3.12421e-13 kg (8 suppliers, which the file names only by identifier); sum of these -7.08e-11 kg; lognormal variance with pedigree 0.0286, pedigree (2,5,1,5,3)
  EcoSpold01Location=CH
  production volume; = abs( MSW_amount/ rolling)* rolling_PV
    (same comment as for average incineration residue)
  properties: carbon content, fossil 0.171549, carbon content, non-fossil 0.261655, dry mass 0.771 kg, heating value, net 11.74 MJ, water content 0.297017, wet mass 1 kg
  note on carbon content, fossil: MSW composition in tab 4.1, ecoinvent v2.2 report 13_I. C content referred to 1 kg DM
  note on heating value, net: Value taken from the general comment of the treatment dataset.
- oxygen, liquid: 0.00714 kg; lognormal variance with pedigree 0.06, pedigree (1,5,5,5,1)
  EcoSpold01Location=RER
  properties: dry mass 1 kg, wet mass 1 kg
- packaging film, low density polyethylene: 1.89e-11 kg; lognormal variance with pedigree 0.086, pedigree (4,5,5,5,3)
  EcoSpold01Location=RER
  properties: carbon content, fossil 0.857143, dry mass 1 kg, heating value, net 42.47 MJ, wet mass 1 kg
  note on carbon content, fossil: Polyethylene is formed out of a huge amount of ethylene monomers (C2H4) (ecoinvent v2.2 report 11_II). MW=28 g/mol
- rolling mill: 1.62e-9 unit; lognormal variance with pedigree 0.346, pedigree (3,4,5,5,1)
  EcoSpold01Location=RER
- sawnwood, softwood, raw, dried (u=20%): 1.62e-17 m3; lognormal variance with pedigree 0.086, pedigree (4,5,5,5,3)
  EcoSpold01Location=RER
  properties: carbon content, non-fossil 0.494, dry mass 450 kg, heating value, net 6514.84 MJ, water content 0.2, wet mass 540 kg
  note on carbon content, non-fossil: C content of dry mass is 0.494 kgC/kg dry wood (ecoinvent v2.2 report 9)
- sheet rolling, steel: 2.36e-11 kg; lognormal variance with pedigree 0.086, pedigree (4,5,5,5,3)
  EcoSpold01Location=RER
- sludge from steel rolling: -0.0160057, -0.000294291 kg (2 suppliers, which the file names only by identifier); sum of these -0.0163 kg; lognormal variance with pedigree 0.0206, pedigree (2,5,1,5,1)
  EcoSpold01Location=CH
  production volume; = abs( sludge_amount/ rolling)* rolling_PV
    (same comment as for average incineration residue)
  properties: carbon content, fossil 0.0123943, dry mass 0.8 kg, water content 0.25, wet mass 1 kg
- steel, unalloyed: 0.05 kg; lognormal variance with pedigree 0.068, pedigree (4,5,5,5,1)
  EcoSpold01Location=RER
  properties: carbon content, fossil 0.0025, dry mass 1 kg, wet mass 1 kg
  note on carbon content, fossil: Unalloyed steels or carbon steels are those in which the level of an individual element in no case reaches or exceeds the limiting concentration given in Tab. 3.1 ecoinvent v2.2 report 10_partII. Assumed to have a C content of 0.25%
- waste mineral oil: -0.000213 kg; name waste_oil; lognormal variance with pedigree 1.272, pedigree (1,1,1,5,1)
  calculated from max value assuming lognormal distribution
  EcoSpold01Location=CH
  production volume; = abs(waste_oil/ rolling)* rolling_PV
    (same comment as for average incineration residue)
  properties: carbon content, fossil 0.864444, dry mass 0.9 kg, heating value, net 34.7 MJ, water content 0.111111, wet mass 1 kg
  note on carbon content, fossil: Tab A.6, ecoinvent v2.2 report 13_I. C content has been calculated after data in the tables, and then referred to 1 kg DM

## Inputs from nature
- Water, cooling, unspecified natural origin [natural resource, in water]: 0.0170402 m3; name water_cooling_UNO_input; source Byers, W. 2003; lognormal variance with pedigree 0.0532, pedigree (2,3,5,5,1)
  Calculated based on literature, (Vionnet, S., Quantis Water Database - Technical Report, 2012). Water is used during steel rolling mainly for steel conditioning, respectively cooling down.
  property carbon content, fossil 0.0104329; name C_content_fossil
  property carbon content, non-fossil 0; name C_content_non_fossil
  property dry mass 0.1101 kg; name DM
  property water content 9081.65; name water_content
  property water in wet mass 999.89 kg; name WWM
  property wet mass 1000 kg; name WM
- Water, unspecified natural origin [natural resource, in water]: 0.00340803 m3; name water_UNO_input; source Byers, W. 2003; lognormal variance with pedigree 0.0546, pedigree (3,3,5,5,1)
  Calculated from max value assuming lognormal distribution
  Calculated based on literature, (Vionnet, S., Quantis Water Database - Technical Report, 2012). Water is used during steel rolling mainly for steel conditioning, respectively cooling down. Even though it is used for cooling, this water comes into contact with the product, therefore it is reported as process water.

## Emissions to nature
- Carbon monoxide, fossil [air, unspecified]: 2.24e-5 kg; lognormal variance with pedigree 0.06, pedigree (1,5,5,5,1)
- Chromium III [air, unspecified]: 3.74e-7 kg; lognormal variance with pedigree 0.812, pedigree (1,1,5,5,1)
  calculated from max value assuming lognormal distribution
- Copper ion [air, unspecified]: 7.18e-8 kg; lognormal variance with pedigree 0.042, pedigree (1,1,5,5,1)
  calculated from max value assuming lognormal distribution
- Iron ion [air, unspecified]: 6.06e-6 kg; lognormal variance with pedigree 1.232, pedigree (1,1,5,5,1)
  calculated from max value assuming lognormal distribution
- Lead II [air, unspecified]: 1.77e-8 kg; lognormal variance with pedigree 0.052, pedigree (1,1,5,5,1)
  calculated from max value assuming lognormal distribution
- Manganese II [air, unspecified]: 2.19e-7 kg; lognormal variance with pedigree 0.102, pedigree (1,1,5,5,1)
  calculated from max value assuming lognormal distribution
- NMVOC, non-methane volatile organic compounds [air, unspecified]: 0.000283 kg; lognormal variance with pedigree 0.312, pedigree (1,1,5,5,1)
  calculated from max value assuming lognormal distribution
- Nickel II [air, unspecified]: 2.44e-7 kg; lognormal variance with pedigree 0.132, pedigree (1,1,5,5,1)
  calculated from max value assuming lognormal distribution
- Nitrogen oxides [air, unspecified]: 1.31e-5 kg; lognormal variance with pedigree 0.19, pedigree (1,5,5,5,1)
- Particulate Matter, < 2.5 um [air, unspecified]: 1.79e-5 kg; lognormal variance with pedigree 1.232, pedigree (1,1,5,5,1)
  calculated from max value assuming lognormal distribution
- Particulate Matter, > 10 um [air, unspecified]: 2.75e-5 kg; lognormal variance with pedigree 0.1, pedigree (1,5,5,5,1)
- Particulate Matter, > 2.5 um and < 10um [air, unspecified]: 2.75e-5 kg; lognormal variance with pedigree 0.19, pedigree (1,5,5,5,1)
- Water [air, unspecified]: 0.00692682 m3; name water_to_air_unspecified; lognormal variance with pedigree 0.0827, pedigree (2,2,5,5,1)
  Calculated value based on literature values and expert opinion. See comments in the parametres' comment field.
  property fraction, origin: fresh water 0; name fraction_origin_fresh_water
  property fraction, origin: salt water 0; name fraction_origin_salt_water
  property fraction, origin: unspecified 1; name fraction_origin_unspecified
- Aluminium III [water, unspecified]: 1.3e-7 kg; lognormal variance with pedigree 0.832, pedigree (1,1,5,5,1)
  calculated from max value assuming lognormal distribution
- BOD5, Biological Oxygen Demand [water, unspecified]: 3.8e-5 kg; lognormal variance with pedigree 0.412, pedigree (1,1,5,5,1)
  twice the uncertainty of COD (assumption)
- COD, Chemical Oxygen Demand [water, unspecified]: 3.78e-5 kg; lognormal variance with pedigree 0.112, pedigree (1,1,5,5,1)
  calculated from max value assuming lognormal distribution
- Cadmium II [water, unspecified]: 1.37e-7 kg; lognormal variance with pedigree 0.162, pedigree (1,1,5,5,1)
  calculated from max value assuming lognormal distribution
- Chloride [water, unspecified]: 1.23e-6 kg; lognormal variance with pedigree 0.202, pedigree (1,1,5,5,1)
  calculated from max value assuming lognormal distribution
- Chromium III [water, unspecified]: 4.95e-7 kg; lognormal variance with pedigree 0.162, pedigree (1,1,5,5,1)
  calculated from max value assuming lognormal distribution
- Chromium VI [water, unspecified]: 2.75e-8 kg; lognormal variance with pedigree 0.162, pedigree (1,1,5,5,1)
  calculated from max value assuming lognormal distribution
- Copper ion [water, unspecified]: 2.66e-7 kg; lognormal variance with pedigree 0.752, pedigree (1,1,5,5,1)
  calculated from max value assuming lognormal distribution
- DOC, Dissolved Organic Carbon [water, unspecified]: 1.2e-5 kg; lognormal variance with pedigree 0.412, pedigree (1,1,5,5,1)
  twice the uncertainty of COD (assumption)
- Hydrocarbons, unspecified [water, unspecified]: 1.73e-6 kg; lognormal variance with pedigree 0.112, pedigree (1,1,5,5,1)
  calculated from max value assuming lognormal distribution
- Iron ion [water, unspecified]: 4.26e-6 kg; lognormal variance with pedigree 0.272, pedigree (1,1,5,5,1)
  calculated from max value assuming lognormal distribution
- Lead II [water, unspecified]: 2.75e-7 kg; lognormal variance with pedigree 0.162, pedigree (1,1,5,5,1)
  calculated from max value assuming lognormal distribution
- Manganese II [water, unspecified]: 5.61e-7 kg; lognormal variance with pedigree 0.272, pedigree (1,1,5,5,1)
  calculated from max value assuming lognormal distribution
- Mercury II [water, unspecified]: 2.75e-8 kg; lognormal variance with pedigree 0.162, pedigree (1,1,5,5,1)
  calculated from max value assuming lognormal distribution
- Nickel II [water, unspecified]: 7.78e-7 kg; lognormal variance with pedigree 1.792, pedigree (1,1,5,5,1)
  calculated from max value assuming lognormal distribution
- Suspended solids, unspecified [water, unspecified]: 0.000146 kg; lognormal variance with pedigree 1.032, pedigree (1,1,5,5,1)
  calculated from max value assuming lognormal distribution
- TOC, Total Organic Carbon [water, unspecified]: 1.2e-5 kg; lognormal variance with pedigree 0.412, pedigree (1,1,5,5,1)
  twice the uncertainty of COD (assumption)
- Water [water, unspecified]: 0.0135214 m3; name water_to_water_unspecified; lognormal variance with pedigree 0.0827, pedigree (2,2,5,5,1)
  (same comment as for Water)
  property fraction, origin: fresh water 0; name fraction_origin_fresh_water_Ww
  property fraction, origin: salt water 0; name fraction_origin_salt_water_Ww
  property fraction, origin: unspecified 1; name fraction_origin_unspecified_Ww
- Zinc II [water, unspecified]: 2.06e-7 kg; lognormal variance with pedigree 1.302, pedigree (1,1,5,5,1)
  calculated from max value assuming lognormal distribution

## Sampling procedure
Literature

## Extrapolations
none This dataset has been copied from an original dataset covering the geography RER. The uncertainty has been adjusted accordingly.

## Review by Roland Hischier 2003-06-17
Passed.
Exchange Aluminium, water/unspecified: SD 95 <1 NICHT erlaubt bei lognormal!
