# extrusion, co-extrusion of plastic sheets

Dataset: EcoSpold 2, unit process
Geography: RoW
Time period: 2012-01-01 to 2023-12-31
Technology level: current
Classification: EcoSpold01Categories: plastics/processing
Classification: ISIC rev.4 ecoinvent: 2220:Manufacture of plastics products
Tags: service
Scenario: Business-as-Usual
System model: Allocation, cut-off by classification
Share of production covered: 2 %
Generated by: Jürgen Reinhard
Published in: Quantis 2015
Database: ecoinvent
isCopyrightProtected: false
accessRestrictedTo: 1

## General comment
This service activity consists in transforming plastic pellets into plastic sheets of 200 microns to 2 mm thickness for the food industry. The amount of processed plastic is NOT included. The inventory refers to an INPUT of 1 kg of plastic pellets, i.e. all inputs and outputs are per kg of raw materials (excluding internal recycling), ie. T where
t (final product)= 0.969 kg / kg of raw material input
Y ( losses being recycled within the process (=internal recycling), closed loop)= 0.156 kg / kg of raw material input
t' (losses recycled in external, opened loop)= 0.031 kg / kg of raw material input
T (raw materials, exluding internal recycling)= 1 kg / kg of aw material input.
That is, an input of 1 kg of plastic pellets yields 0.969 kg of extruded plastic sheets. Losses caused during production that are recycled internally are not accounted for explicitly. However, the additional energy requirements associated with the internally recycled plastic are considered.
In detail, the activity includes:
- water and energy consumption
- required auxiliaries such like detergents and solvents
- production infrastructure
- direct emissions to air (VOC)
- wastewater treatment of the used auxiliaries
- end of life of the production wastes incinerated and recycled externally

## Included activities start
The activity starts with the arrival of the raw materials.

## Included activities end
The activity ends with the production of co-extruded plastic sheets. This process contains the auxiliaries and energy demand for the mentioned conversion process of plastics. The processed amount of plastics is NOT included into the dataset. The packaging of raw materials and final product is not considered.

## Geography
information from different French converting companies extrapolated to the GLO

## Technology
current technologies

## Time period
time to which data refer

## Parameters
- fraction, process water, to air: 0.15 dimensionless; name fraction_PW_to_air; lognormal variance with pedigree 0.092025, pedigree (4,4,3,2,4)
  Literature value. In case when no industry/process specific data are available, default evaporation fraction value is used. This value is 15% and is based on literature (Statistics Canada, 2007 & Shaffer, K.H., 2008, Consumptive water use in the Great Lakes Basin, USGS & Shiklomanov, 2003, World Water Resources at the Beginning of the 21st Century) and has been approved by an expert.

## Reference product
- extrusion, co-extrusion: 1 kg; name Ref; By-product classification allocatable product; CPC 89200: Moulding, pressing, stamping, extruding and similar plastic manufacturing services
  Service activity transforming plastic pellets into plastic sheets of 200 microns to 2 mm thickness for the food industry.
  This activity should be used as follows: If an activity requires 1 kg of plastic sheets (produced by an inline plastic sheets and thermoforming process) the user should list (i) 1/0.969 = 1.032 kg of the service and 1.032 kg of the plastic type processed.
  production volume 1.49729e9 kg; name refP; = 5.8E+07/0.037292
    The French production volume (58'000'000) was scaled according to the nominal GDP of 2005 (source: United Nations, <http://data.un.org/Glossary.aspx?q=GDP+%28current+US%24%29>, accessed 20130726) to reflect an appropriate share of the global production volume
  property price 0.123674 EUR2005
    Calculated based on inputs: The price of the product has been calculated as a sum of the values of the material and energy inputs for this product. This value is therefore a rough estimation. It may underestimate the real price since there are additional expenses when producing any product. These expences can include for example labour costs, treatment of waste materials and profit for the producer. Please consider carefully whether this level of data quality is acceptable for your application.
  properties: carbon allocation 0 kg, carbon content 0

## Inputs from technosphere
- chemical, organic: 0.00013276 kg; name solv; lognormal variance with pedigree 0.011825, pedigree (3,3,4,2,2)
  Measured value, proxy exchange: represents the detergent and solvents used during processing.
  Uncertainty: Default value taken fromTable 10.3. DQG
  properties: carbon content, fossil 0.628, dry mass 1 kg, heating value, net 19.03 MJ, wet mass 1 kg
  note on carbon content, fossil: This dataset is an unweighted average of 20 organic substances (listed in Tab 88.1, ecoinvent v2.2 report 8, part II), being part of the top100 chemicals included in this database. The C-content has also been calculated as an unweighted average of the C content of the substances composing this dataset.
- electricity, medium voltage: 0.000271164, 0.000405904, 0.000128229, 0.00238683, 0.00140089, 0.0128906, 0.00166089, 0.0201743, 4.81158e-5, 0.402431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 kWh (47 suppliers, which the file names only by identifier); sum of these 0.70955 kWh; lognormal variance with pedigree 0.010425, pedigree (2,3,4,2,2)
  EcoSpold01Location=UCTE
  Measured value: represents the electricity consumption of the entire processing step. Includes the electricity consumption required for internal recycling.
  Uncertainty: Default value taken fromTable 10.3. DQG
- extrusion, plastic pipes: 3.9e-6 kg; = tetra; lognormal variance with pedigree 0.010425, pedigree (2,3,4,2,2)
  Measured value: represents the working of the tetrafluoroethylene-based auxilliaries
  Uncertainty: Default value from Table 10.3. DQG
- heat, central or small-scale, natural gas: 7.1599e-12, 6.8622e-5 MJ (2 suppliers, which the file names only by identifier); sum of these 6.8622e-5 MJ; lognormal variance with pedigree 0.010425, pedigree (2,3,4,2,2)
  Measured value: represents the amount of heat required for the buildings.
  Uncertainty: Default value from Table 10.3. DQG
  properties: heating value, net 1 MJ
- iron scrap, unsorted: -8.8384e-6 kg; name BP_amount_1; = steel; lognormal variance with pedigree 0.002425, pedigree (2,3,1,2,2)
  Measured value: represents treatment of steel-based auxiliaries. Corresponds to the input of steel, low-alloyed.
  Uncertainty: Default value taken fromTable 10.3. DQG
  production volume; = refP * (BP_amount_1 / Ref)
    Calculated from production volume of reference product using the relative outputs.
  properties: dry mass 1 kg, price 0.149 EUR2005, wet mass 1 kg
- metal working, average for steel product manufacturing: 8.8384e-6 kg; = steel; lognormal variance with pedigree 0.010425, pedigree (2,3,4,2,2)
  Measured value: represent the working of the steel-based auxiliaries
  Uncertainty: Default value from Table 10.3. DQG
- packaging box factory: 1.38429e-9 unit; = 1/14000000/50*0.969; lognormal variance with pedigree 0.341825, pedigree (2,3,5,2,2)
  Measured value: calculated based on the lifetime (50 years) and annual capacity (14000 tons/year) of the packing box factory.
  Uncertainty: Default value from Table 10.3. DQG
- paper, woodcontaining, lightweight coated: 0.00022151 kg; lognormal variance with pedigree 0.010425, pedigree (2,3,4,2,2)
  Measured value: represent the paper labels
  Uncertainty: Default value from Table 10.3. DQG
  properties: carbon content, fossil 0.032531, carbon content, non-fossil 0.247213, dry mass 0.945 kg, heating value, net 14.11 MJ, water content 0.0582011, wet mass 1 kg
- spent solvent mixture: -1.2043e-6, -0.000131556 kg (2 suppliers, which the file names only by identifier); sum of these -0.00013276 kg; = solv; lognormal variance with pedigree 0.002425, pedigree (2,3,1,2,2)
  Measured value, proxy exchange: represents the disposal of the detergent/solvent consumed as an auxilliary during the process
  Uncertainty: Default value from Table 10.3. DQG
  production volume; = refP * (BP_amount_2 / Ref)
    Calculated from production volume of reference product using the relative outputs.
  properties: carbon content, fossil 0.571257, dry mass 0.835 kg, heating value, net 21.7 MJ, water content 0.197605, wet mass 1 kg
  note on carbon content, fossil: Tab A.7, ecoinvent v2.2 report 13_I. C content has been calculated after data in the tables, and then referred to 1 kg DM
  note on heating value, net: Value taken from the general comment of the treatment dataset.
- steel, chromium steel 18/8: 8.8384e-6 kg; name steel; lognormal variance with pedigree 0.010425, pedigree (2,3,4,2,2)
  Measured value: represents the amount of steel-based auxiliaries required during processing.
  Uncertainty: Default value taken fromTable 10.3. DQG
  properties: carbon content, fossil 0.0008, dry mass 1 kg, wet mass 1 kg
  note on carbon content, fossil: Stainless steel model is the grade 304 steel (18/8 stainless, 18% chromium 8% nickel; max. 0.08% C)
- tap water: 6.49134e-5, 9.89549e-5, 0.000184645, 0.00049742, 5.9876e-5, 0.00249525, 4.45001e-5, 0.0285544 kg (8 suppliers, which the file names only by identifier); sum of these 0.032 kg; lognormal variance with pedigree 0.010425, pedigree (2,3,4,2,2)
  Measured value: represents the water consumption of the grinding process
  Uncertainty: Default value from Table 10.3. DQG
  properties: carbon content, fossil 0.0017899, dry mass 0.00034 kg, water content 2941.18, wet mass 1 kg
- tetrafluoroethylene: 3.9e-6 kg; name tetra; lognormal variance with pedigree 0.010425, pedigree (2,3,4,2,2)
  Measured value: represents tetrafluoroethylene-based auxiliaries
  Uncertainty: Default value from Table 10.3. DQG
  properties: carbon content, fossil 0.24, dry mass 1 kg, heating value, net 7.27 MJ, wet mass 1 kg
- waste plastic, mixture: -1.07457e-5, -1.89461e-6, -1.1176e-6, -7.41512e-6, -6.68381e-7, -6.90177e-7, -1.78878e-6, -6.39335e-7, -7.71823e-7, -7.46474e-6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 kg (42 suppliers, which the file names only by identifier); sum of these -0.0409585 kg; = 0.025348141+0.015610341; lognormal variance with pedigree 0.002425, pedigree (2,3,1,2,2)
  Measured value: represents the total amount of waste plastic, mixture recycled. The first value in the mathematical relation reflects the amount of mono materials, the second value the amount of multi layer materials recycled. Should specific recycling activitiies for both types of materials become available, this exchange flow should be adapted.
  Uncertainty: Default value taken fromTable 10.3. DQG
  production volume; = refP*(wpm_r/Ref)
    Calculated from production volume of reference product using the relative outputs.
  properties: carbon content, fossil 0.747344, dry mass 0.847 kg, heating value, net 30.79 MJ, water content 0.180638, wet mass 1 kg
- waste plastic, mixture: -0.000168112 kg; name wpm_i; lognormal variance with pedigree 0.002425, pedigree (2,3,1,2,2)
  EcoSpold01Location=CH
  Measured value: represents the amount of waste plastic mixture incinerated. Modeled with a direct link to the GLO municipal solid waste incineration
  Uncertainty: Default value taken fromTable 10.3. DQG
  production volume; = refP*(wpm_i/Ref)
    Calculated from production volume of reference product using the relative outputs.
  note on carbon content, fossil: C content in 1 kg DM was calculated using data in Tab A.2, ecoinvent v2.2 report 13_I
- waste polyethylene: -4.44661e-11, -1.22157e-10, -2.46989e-10, -1.61782e-11, -1.67057e-11, -6.29726e-10, -1.23688e-10, -7.51643e-11, -2.60099e-10, -1.27246e-9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 kg (42 suppliers, which the file names only by identifier); sum of these -3.9e-6 kg; = tetra; lognormal variance with pedigree 0.002425, pedigree (2,3,1,2,2)
  Measured value, proxy exchange: represents the disposal of the tetrafluoroethylene consumed as an auxilliary during the process.
  Uncertainty: Default value from Table 10.3. DQG
  production volume; = refP * (wp / Ref)
    Calculated from production volume of reference product using the relative outputs.
  properties: carbon content, fossil 0.825301, dry mass 0.996 kg, heating value, net 42.47 MJ, water content 0.00401606, wet mass 1 kg
  note on carbon content, fossil: C content in 1 kg DM was calculated using data in Tab A.1, ecoinvent v2.2 report 13_I
- wastewater, average: -2.72e-5 m3; name wwa; = (tw-(water_to_air_unspecified*1000))/UnitConversion(1, 'm3', 'l'); lognormal variance with pedigree 0.002425, pedigree (2,3,1,2,2)
  Measured value: corresponds to the input of tap water.
  Uncertainty: Default value from Table 10.3. DQG
  production volume; = refP * (wwa / Ref)
    Calculated from production volume of reference product using the relative outputs.
  properties: carbon content, non-fossil 0.194039, dry mass 0.346837 kg, water content 2882.2, wet mass 1000 kg
  note on carbon content, non-fossil: 0.0673 kg TOC/m3 (Tab A.17, ecoinvent v2.2 report 13_I). TOC was considered as Total Carbon.

## Emissions to nature
- NMVOC, non-methane volatile organic compounds [air, unspecified]: 2.7938e-5 kg; lognormal variance with pedigree 0.049825, pedigree (2,3,4,2,2)
  Measured value:emissions generated during resin heating
  Uncertainty: Default value from Table 10.3. DQG
- Water [air, unspecified]: 4.8e-6 m3; name water_to_air_unspecified; = (tw*fraction_pw_to_air)/1000; lognormal variance with pedigree 0.010425, pedigree (2,3,4,2,2)
  Default value: 15% of the tap water evaporates

## Sampling procedure
Survey. Around 60 000 tons of thermoformed products are sold in France per year (excluding FFS process that is not considered here). The survey represents the production volume weighted average of three companies in France covering roughly 2% of the GLO market volume of this technology.

## Extrapolations
From the production volume of the three sampled to the GLO production volume of all extrusion and co extrusion of plastic sheets production facilities.

## Review by David Cornell 2014-08-14
I am satisfied the requested issues have been addressed and the data file is now satisfactory.
