# extrusion of plastic sheets and thermoforming, inline

Dataset: EcoSpold 2, unit process
Geography: RoW
Time period: 2012-01-01 to 2023-12-31
Technology level: modern
Classification: EcoSpold01Categories: plastics/processing
Classification: ISIC rev.4 ecoinvent: 2220:Manufacture of plastics products
Tags: service
Scenario: Business-as-Usual
System model: Allocation, cut-off by classification
Share of production covered: 0.4 %
Generated by: Jürgen Reinhard
Published in: Quantis 2015
Database: ecoinvent
isCopyrightProtected: false
accessRestrictedTo: 1

## General comment
This service activity represents the inline extrusion and thermoforming of plastic pellets for the food industry. That is, it includes all interventions associated with the extrusion AND thermoforming of plastic sheets, inline.The amount of plastic pellets processed is NOT included.The inventory refers to an INPUT of 1 kg of plastic pellets, i.e. all inputs and outputs are expressed per kg of raw materials (excluding internal recycling), i.e., T, where
t (final product)= 0.94 kg / kg of raw material
Y ( losses being recycled within the process (=internal recycling), closed loop)=0.29 kg / kg of raw material
t' (losses recycled in external, opened loop)= 0.06 kg / kg of raw material
T (raw materials, exluding internal recycling)=1 kg / kg of raw material
That is, an input of 1 kg of plastic yields 0.94 kg of thermoformed plastic sheets. Losses caused during production that are recycled internally are not accounted for explicitly. However, the additional energy requirements associated with the internally recycled plastic are considered.
In detail, the activity includes:
- water and energy consumptions
- required auxiliaries such like detergents and solvents
- production infrastructure
- direct emissions to air (VOC)
- wastewater treatment of the used auxiliaries
- end of life of the production wastes incinerated and recycled externally
. In case you want to model this activity with expansion gas (this service activity works without) please add the following exchange flows and numbers, respectively. without expansion with expansion
Butane input 0 0.0595 Butane emissions 0 0.0298

## Included activities start
The activity starts with the arrival of the raw materials, i.e plastic pellets.

## Included activities end
The activity ends with the production of thermoformed plastic container. This process contains the auxiliaries and energy demand for the mentioned conversion process of plastics. The processed amount of plastics is NOT included into the dataset. The packaging of raw materials and final product is not considered within the activity.

## Geography
information from different French converting companies extrapolated to the GLO

## Technology
modern technologies

## Time period
time to which data refer

## Parameters
- fraction, process water, to air: 0.15 dimensionless; name fraction_PW_to_air; lognormal variance with pedigree 0.092025, pedigree (4,4,3,2,4)
  Literature value. In case when no industry/process specific data are available, default evaporation fraction value is used. This value is 15% and is based on literature (Statistics Canada, 2007 & Shaffer, K.H., 2008, Consumptive water use in the Great Lakes Basin, USGS & Shiklomanov, 2003, World Water Resources at the Beginning of the 21st Century) and has been approved by an expert.

## Reference product
- extrusion of plastic sheets and thermoforming, inline: 1 kg; name Ref; By-product classification allocatable product; CPC 89200: Moulding, pressing, stamping, extruding and similar plastic manufacturing services
  Service activity representing the inline extrusion and thermoforming of plastic sheets for the food industry.
  This activity should be used as follows: If an activity requires 1 kg of plastic containers (produced by an inline plastic sheet extrusion and plastic sheet thermoforming process) the user should list (i) 1/0.94 = 1.0638 kg of the service and 1.0638 kg of the plastic type processed.
  production volume 3.87231e8 kg; name refP; = 1.5E+07/0.037292
    The French production volume (15'000'000) was scaled according to the nominal GDP of 2005 (source: United Nations, <http://data.un.org/Glossary.aspx?q=GDP+%28current+US%24%29>, accessed 20130726) to reflect an appropriate share of the global production volume.
  property price 0.197669 EUR2005
    Calculated based on inputs: The price of the product has been calculated as a sum of the values of the material and energy inputs for this product. This value is therefore a rough estimation. It may underestimate the real price since there are additional expenses when producing any product. These expences can include for example labour costs, treatment of waste materials and profit for the producer. Please consider carefully whether this level of data quality is acceptable for your application.
  properties: carbon allocation 0 kg, carbon content 0

## Inputs from technosphere
- aluminium scrap, post-consumer: -0.0004286 kg; name BP_amount_2; = alu; lognormal variance with pedigree 0.002425, pedigree (2,3,1,2,2)
  Measured value: represents the disposal of the aluminium mould. Corresponds to the input of aluminium, primary, ingot.
  Uncertainty: Default value taken fromTable 10.3. DQG
  production volume; = refP * (BP_amount_2 / Ref)
    Calculated from production volume of reference product using the relative outputs.
  properties: dry mass 1 kg, price 0.685 EUR2005, wet mass 1 kg
- aluminium, primary, ingot: 4.08786e-5, 0.000387721 kg (2 suppliers, which the file names only by identifier); sum of these 0.0004286 kg; lognormal variance with pedigree 0.010425, pedigree (2,3,4,2,2)
  Measured value: represent the aluminium required for the compensation of the deterioration of the moulds
  properties: dry mass 1 kg, wet mass 1 kg
- chemical, organic: 0.00023808 kg; name solv; lognormal variance with pedigree 0.010425, pedigree (2,3,4,2,2)
  Measured value, proxy exchange: represents the detergent and solvents used during processing.
  Uncertainty: Default value from Table 10.3. DQG
  properties: carbon content, fossil 0.628, dry mass 1 kg, heating value, net 19.03 MJ, wet mass 1 kg
  note on carbon content, fossil: This dataset is an unweighted average of 20 organic substances (listed in Tab 88.1, ecoinvent v2.2 report 8, part II), being part of the top100 chemicals included in this database. The C-content has also been calculated as an unweighted average of the C content of the substances composing this dataset.
- electricity, medium voltage: 0.000549436, 0.000822448, 0.000259819, 0.00483623, 0.00283851, 0.0261191, 0.00336532, 0.0408773, 9.74928e-5, 0.815411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 kWh (47 suppliers, which the file names only by identifier); sum of these 1.4377 kWh; lognormal variance with pedigree 0.010425, pedigree (2,3,4,2,2)
  Measured value: represents the electricity consumption of the entire processing step. Includes the electricity consumption required for internal recycling.
  EcoSpold01Location=UCTE
  Uncertainty: Default value taken fromTable 10.3. DQG
- extrusion, plastic film: 0.00099303 kg; = pp; lognormal variance with pedigree 0.010425, pedigree (2,3,4,2,2)
  Measured value: represents the foaming of the plastic caps
  Uncertainty: Default value from Table 10.3. DQG
- extrusion, plastic pipes: 1.866e-6 kg; = tetra; lognormal variance with pedigree 0.010425, pedigree (2,3,4,2,2)
  Measured value: represents the working of the tetrafluorethylene based auxilliaries
  Uncertainty: Default value from Table 10.3. DQG
- iron scrap, unsorted: -1.092e-6 kg; name BP_amount_3; = steel; lognormal variance with pedigree 0.002425, pedigree (2,3,1,2,2)
  Measured value: represents treatment of steel-based auxiliaries. Corresponds to the input of steel, low-alloyed.
  Uncertainty: Default value taken fromTable 10.3. DQG
  production volume; = refP * (BP_amount_3 / Ref)
    Calculated from production volume of reference product using the relative outputs.
  properties: dry mass 1 kg, price 0.149 EUR2005, wet mass 1 kg
- metal working, average for aluminium product manufacturing: 0.0004286 kg; = alu; lognormal variance with pedigree 0.0092, pedigree (1,3,4,1,1)
  Measured value: represent the working of the aluminium required for the copensation of the deterioration of the moulds
  Uncertainty: Default value from Table 10.3. DQG
- metal working, average for steel product manufacturing: 1.092e-6 kg; = steel; lognormal variance with pedigree 0.010425, pedigree (2,3,4,2,2)
  Measured value: represent the working of the steel-based auxiliaries
  Uncertainty: Default value from Table 10.3. DQG
- packaging box factory: 1.34286e-9 unit; = 1/14000000/50*0.94; lognormal variance with pedigree 0.341825, pedigree (2,3,5,2,2)
  Measured value: calculated based on the lifetime (50 years) and annual capacity (14000 tons/year) of the packing box factory.
  Uncertainty: Default value from Table 10.3. DQG
- polypropylene, granulate: 0.00099303 kg; name pp; lognormal variance with pedigree 0.010425, pedigree (2,3,4,2,2)
  Measured value: represent the plastic caps
  Uncertainty: Default value from Table 10.3. DQG
  properties: carbon content, fossil 0.857143, dry mass 1 kg, heating value, net 32.78 MJ, wet mass 1 kg
  note on heating value, net: Value extracted from "treatment of waste polypropylene, open burning"
- spent solvent mixture: -2.15969e-6, -0.00023592 kg (2 suppliers, which the file names only by identifier); sum of these -0.00023808 kg; = solv; lognormal variance with pedigree 0.002425, pedigree (2,3,1,2,2)
  Measured value, proxy exchange: represents the disposal of the detergent/solvent consumed as an auxilliary during the process
  Uncertainty: Default value taken fromTable 10.3. DQG
  production volume; = refP * (BP_amount_4 / Ref)
    Calculated from production volume of reference product using the relative outputs.
  properties: carbon content, fossil 0.571257, dry mass 0.835 kg, heating value, net 21.7 MJ, water content 0.197605, wet mass 1 kg
  note on carbon content, fossil: Tab A.7, ecoinvent v2.2 report 13_I. C content has been calculated after data in the tables, and then referred to 1 kg DM
  note on heating value, net: Value taken from the general comment of the treatment dataset.
- steel, chromium steel 18/8: 1.092e-6 kg; name steel; lognormal variance with pedigree 0.010425, pedigree (2,3,4,2,2)
  Measured value: represents the amount of steel-based auxiliaries required during processing.
  Uncertainty: Default value taken fromTable 10.3. DQG
  properties: carbon content, fossil 0.0008, dry mass 1 kg, wet mass 1 kg
  note on carbon content, fossil: Stainless steel model is the grade 304 steel (18/8 stainless, 18% chromium 8% nickel; max. 0.08% C)
- tap water: 0.000192606, 0.000293612, 0.000547865, 0.00147591, 0.00017766, 0.00740373, 0.000132037, 0.0847246 kg (8 suppliers, which the file names only by identifier); sum of these 0.094948 kg; lognormal variance with pedigree 0.010425, pedigree (2,3,4,2,2)
  Measured value: water consumption of grinding process
  Uncertainty: Default value from Table 10.3. DQG
  properties: carbon content, fossil 0.0017899, dry mass 0.00034 kg, water content 2941.18, wet mass 1 kg
- tetrafluoroethylene: 1.866e-6 kg; name tetra; lognormal variance with pedigree 0.010425, pedigree (2,3,4,2,2)
  Measured value: represents tetrafluoroethylene-based auxiliaries
  Uncertainty: Default value from Table 10.3. DQG
  properties: carbon content, fossil 0.24, dry mass 1 kg, heating value, net 7.27 MJ, wet mass 1 kg
- waste plastic, mixture: -1.55076e-5, -2.7342e-6, -1.61286e-6, -1.07011e-5, -9.64571e-7, -9.96025e-7, -2.58147e-6, -9.22653e-7, -1.11385e-6, -1.07727e-5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 kg (42 suppliers, which the file names only by identifier); sum of these -0.059109 kg; lognormal variance with pedigree 0.002425, pedigree (2,3,1,2,2)
  Measured value: represents the total amount of mono materials recycled externally.
  Uncertainty: Default value taken fromTable 10.3. DQG
  production volume; = refP*(wpm_r/Ref)
    Calculated from production volume of reference product using the relative outputs.
  properties: carbon content, fossil 0.747344, dry mass 0.847 kg, heating value, net 30.79 MJ, water content 0.180638, wet mass 1 kg
- waste polyethylene: -2.12753e-11, -5.84472e-11, -1.18175e-10, -7.74063e-12, -7.99305e-12, -3.01299e-10, -5.918e-11, -3.59632e-11, -1.24447e-10, -6.08821e-10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 kg (42 suppliers, which the file names only by identifier); sum of these -1.866e-6 kg; = tetra; lognormal variance with pedigree 0.002425, pedigree (2,3,1,2,2)
  Measured value, proxy exchange: represents the disposal of the tetrafluoroethylene consumed as an auxilliary during the process.
  Uncertainty: Default value taken fromTable 10.3. DQG
  production volume; = refP * (BP_amount_5 / Ref)
    Calculated from production volume of reference product using the relative outputs.
  properties: carbon content, fossil 0.825301, dry mass 0.996 kg, heating value, net 42.47 MJ, water content 0.00401606, wet mass 1 kg
  note on carbon content, fossil: C content in 1 kg DM was calculated using data in Tab A.1, ecoinvent v2.2 report 13_I
- waste polypropylene: -5.35387e-8, -1.0825e-7, -1.37831e-8, -2.10802e-9, -8.33743e-7, -1.0132e-8, -5.29056e-8, -3.2943e-8, -5.42099e-8, -2.00991e-8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 kg (42 suppliers, which the file names only by identifier); sum of these -0.00099303 kg; = pp; lognormal variance with pedigree 0.002425, pedigree (2,3,1,2,2)
  Measured value, proxy exchange: represents the disposal of the plastic caps consumed as an auxilliary during the process.
  Uncertainty: Default value taken fromTable 10.3. DQG
  production volume; = refP * (BP_amount_1 / Ref)
    Calculated from production volume of reference product using the relative outputs.
  properties: carbon content, fossil 0.825208, dry mass 0.841 kg, heating value, net 32.78 MJ, water content 0.189061, wet mass 1 kg
  note on heating value, net: Value assumed for all polypropylene products. Source: Phyllis2, database for (treated) biomass, algae, feedstocks for biogas production and biochar, https://phyllis.nl/Biomass/View/1186, ECN.TNO
- wastewater, average: -8.07058e-5 m3; name ww; = (tw-(water_to_air_unspecified*1000))/UnitConversion(1, 'm3', 'l'); lognormal variance with pedigree 0.002425, pedigree (2,3,1,2,2)
  Measured value: corresponds to the input of tap water
  Uncertainty: Default value from Table 10.3. DQG
  production volume; = refP * (ww / Ref)
    Calculated from production volume of reference product using the relative outputs.
  properties: carbon content, non-fossil 0.194039, dry mass 0.346837 kg, water content 2882.2, wet mass 1000 kg
  note on carbon content, non-fossil: 0.0673 kg TOC/m3 (Tab A.17, ecoinvent v2.2 report 13_I). TOC was considered as Total Carbon.

## Emissions to nature
- NMVOC, non-methane volatile organic compounds [air, unspecified]: 0.00013448 kg; lognormal variance with pedigree 0.049825, pedigree (2,3,4,2,2)
  Measured value: emissions generated during resin heating
  Uncertainty: Default value from Table 10.3. DQG
- Water [air, unspecified]: 1.42422e-5 m3; name water_to_air_unspecified; = (tw*fraction_pw_to_air)/1000; lognormal variance with pedigree 0.010425, pedigree (2,3,4,2,2)
  Default value: 15% of the tap water evaporates

## Sampling procedure
Survey with on site visit. Represents the production volume weighted average of two companies in France producing more than 3 000 tons /year with this technology covering more than 0.4% of the GLO production volume of thermoformed packaging produced with an extrusion & thermoforming inline process. For one of the two companies n-butane gas is added to expense the plastic.
Given the fact that around 60 000 tons of thermoformed products are sold in France per year (excluding FFS process that is not considered here), and that the extrusion-thermoforming inline process is less than half of the total production: the data collection captures roughly 0.4% of the total GLO production volume.

## Extrapolations
From the production volume of the two sampled to the production volume of all GLO extrusion-thermoforming inline production facilities.

## Review by David Cornell 2014-08-14
I am satisfied the requested issues have been addressed and the data file is now satisfactory.
