# electronics production, for control units

Dataset: EcoSpold 2, unit process
Geography: RER
Time period: 1990-01-01 to 2023-12-31
Technology level: current
Classification: EcoSpold01Categories: construction processes/buildings
Classification: ISIC rev.4 ecoinvent: 2710:Manufacture of electric motors, generators, transformers and electricity di
Tags: ConvertedDataset
Scenario: Business-as-Usual
System model: Allocation, cut-off by classification
Generated by: Roland Hischier
Published in: Althaus H.-J. 2007
Database: ecoinvent
isCopyrightProtected: true
accessRestrictedTo: 1

## General comment
The control unit has a composition of 46% steel (housing), 32% plastics, 14% printed wiring boards and 8% cables (various types).
[This dataset was already contained in the ecoinvent database version 2. It was not individually updated during the transfer to ecoinvent version 3. Life Cycle Impact Assessment results may still have changed, as they are affected by changes in the supply chain, i.e. in other datasets. This dataset was generated following the ecoinvent quality guidelines for version 2. It may have been subject to central changes described in the ecoinvent version 3 change report (http://www.ecoinvent.org/database/ecoinvent-version-3/reports-of-changes/), and the results of the central updates were reviewed extensively. The changes added e.g. consistent water flows and other information throughout the database. The documentation of this dataset can be found in the ecoinvent reports of version 2, which are still available via the ecoinvent website. The change report linked above covers all central changes that were made during the conversion process.]

## Included activities end
This module includes the composition of a typical control unit for devices in the industry. Included are the materials of the different components (housing, cables, mounted PWB). Not included are the final production efforts out of the components to the control unit.

## Geography
Data used has no specific geographical origin (literature values).

## Technology
estimated composition of the electronics for control units in the industry, based on literature

## Reference product
- electronics, for control units: 1 kg; By-product classification allocatable product; CPC 46220: Parts of electricity distribution or control apparatus; HS2017 853810: Electrical apparatus; parts (e.g. boards, panels, consoles, desks, cabinets, other bases), for goods of hea[...]
  EcoSpold01Location=RER
  production volume 1.32237 kg
    This is a placeholder value that does not reflect real-world production volumes. This dataset does not currently require a real-world production volume to work in the database framework, and no actual data were collected yet. This has no negative effect on the results of the ecoinvent database. The placeholder value of this activity was scaled according to the nominal GDP of 2005 (source: United Nations, http://data.un.org/Glossary.aspx?q=GDP+%28current+US%24%29, accessed 20130726) to reflect an appropriate share of the global production volume, which is also a placeholder value.
  property carbon content, fossil 0.337146
    The control unit has a composition of 46% steel (housing), 32% plastics, 14% printed wiring boards and 8% cables (various types).;
  property carbon content, non-fossil 0.00013442
    (same comment as for electronics, for control units)
  property price 40.7164 EUR2005
    Calculated based on inputs: The price of the product has been calculated as a sum of the values of the material and energy inputs for this product. This value is therefore a rough estimation. It may underestimate the real price since there are additional expenses when producing any product. These expences can include for example labour costs, treatment of waste materials and profit for the producer. Please consider carefully whether this level of data quality is acceptable for your application.
  properties: carbon allocation 0.337281 kg, carbon content 0.337281, dry mass 1 kg, water content 0, water in wet mass 0 kg, wet mass 1 kg

## Inputs from technosphere
- cable, connector for computer, without plugs: 0.123 m; lognormal variance with pedigree 0.088, pedigree (3,5,5,1,3)
  Approximation from 1 literature source
  EcoSpold01Location=GLO
  Uncertainty: approximation from 1 literature source
  properties: carbon content, fossil 0.359823, dry mass 0.065 kg, wet mass 0.065 kg
  note on carbon content, fossil: Calculated as the addition of C contents in the product composition. Then referred to 1 kg DM
- cable, network cable, category 5, without plugs: 1.11 m; lognormal variance with pedigree 0.088, pedigree (3,5,5,1,3)
  EcoSpold01Location=GLO
  Approximation from 1 literature source
  Uncertainty: approximation from 1 literature source
  properties: carbon content, fossil 0.203917, dry mass 0.036 kg, wet mass 0.036 kg
- cable, ribbon cable, 20-pin, with plugs: 0.032 kg; lognormal variance with pedigree 0.088, pedigree (3,5,5,1,3)
  (same comment as for cable, network cable, category 5, without plugs)
  properties: carbon content, fossil 0.648653, dry mass 1 kg, wet mass 1 kg
- injection moulding: 0.32 kg; lognormal variance with pedigree 0.088, pedigree (3,5,5,1,3)
  Approximation from 1 literature source
  EcoSpold01Location=RER
  Uncertainty: approximation from 1 literature source
- polyethylene, high density, granulate: 0.32193 kg; lognormal variance with pedigree 0.088, pedigree (3,5,5,1,3)
  (same comment as for injection moulding)
  properties: carbon content, fossil 0.857143, dry mass 1 kg, heating value, net 42.47 MJ, wet mass 1 kg
  note on carbon content, fossil: Polyethylene is formed out of a huge amount of ethylene monomers (C2H4) (ecoinvent v2.2 report 11_II). MW=28 g/mol
- printed wiring board mounting facility: 2.08e-7 unit; lognormal variance with pedigree 0.5761, pedigree (4,5,5,3,5)
  Rough assumption
  EcoSpold01Location=GLO
  Uncertainty: rough assumption
- printed wiring board, surface mounted, unspecified, Pb containing: 0.021 kg; lognormal variance with pedigree 0.088, pedigree (3,5,5,1,3)
  (same comment as for cable, network cable, category 5, without plugs)
  properties: carbon content, fossil 0.132522, dry mass 1 kg, wet mass 1 kg
  note on carbon content, fossil: C content was calculated as the addition of C content in the PWB components
- printed wiring board, surface mounted, unspecified, Pb free: 0.049 kg; lognormal variance with pedigree 0.088, pedigree (3,5,5,1,3)
  (same comment as for cable, connector for computer, without plugs)
  properties: carbon content, fossil 0.132522, dry mass 1 kg, wet mass 1 kg
- printed wiring board, through-hole mounted, unspecified, Pb containing: 0.021 kg; lognormal variance with pedigree 0.088, pedigree (3,5,5,1,3)
  (same comment as for cable, network cable, category 5, without plugs)
  properties: carbon content, fossil 0.132522, dry mass 1 kg, wet mass 1 kg
- printed wiring board, through-hole mounted, unspecified, Pb free: 0.049 kg; lognormal variance with pedigree 0.088, pedigree (3,5,5,1,3)
  (same comment as for cable, connector for computer, without plugs)
  properties: carbon content, fossil 0.132522, dry mass 1 kg, wet mass 1 kg
- sheet rolling, steel: 0.46 kg; lognormal variance with pedigree 0.088, pedigree (3,5,5,1,3)
  (same comment as for injection moulding)
- steel, low-alloyed, hot rolled: 0.46 kg; lognormal variance with pedigree 0.088, pedigree (3,5,5,1,3)
  (same comment as for injection moulding)
  properties: carbon content, fossil 0.005, dry mass 1 kg, wet mass 1 kg
  note on carbon content, fossil: Low alloyed steel composition given in Tab. 3.2 ecoinvent v2.2 report 10_partII. Steel assumed to have a C content of 0.5%

## Sampling procedure
own estimations & literature

## Extrapolations
see Geography and Technology

## Review by Rolf Frischknecht 2007-11-08
passed.
