# treatment of bottom ash, MSWI-WWT-SLF, refinery sludge, slag compartment

Dataset: EcoSpold 2, unit process
Geography: RoW
Time period: 1994-01-01 to 2023-12-31
Technology level: current
Classification: ISIC rev.4 ecoinvent: 3821:Treatment and disposal of non-hazardous waste
Scenario: Business-as-Usual
System model: Allocation, cut-off by classification
Generated by: Nikolia Stoikou
Database: ecoinvent
isCopyrightProtected: true
accessRestrictedTo: 1

## General comment
The process represents the treatment of controlled landfilling in slag compartment of a waste (bottom ash) that is exclusively generated in another waste treatment. Bottom ash is the by-product of municipal solid waste incineration (MSWI) of sewage sludge (with 70% water) that in turn is generated during wastewater treatment (WWT) of leachate from the sanitary landfilling (SLF) of 'refinery sludge'. Recommended use of this dataset: to be used within the specific chain of treatments for 'refinery sludge'. Share of biogenic carbon in the sludge: 0%.

## Included activities start
The activity starts with the waste being available at the gate of the treatment facility. Collection and transportation of the waste to the treatment plant is not included.

## Included activities end
The activity ends with the waste being treated and waste-specific emissions from the slag compartment landfill are released to water (short-term emissions to surface water and long-term emissions to ground water).

## Geography
Modelling parameters affecting the treatment technology are not specific to this geography.

## Technology
Slag compartment for bottom ash from incineration with base seal and leachate collection system (Landfill type D). Recultivation after closure.

## Reference product
- bottom ash, MSWI-WWT-SLF, refinery sludge: -1 kg; By-product classification Waste; CPC 39320: Ash and residue (except from the manufacture of iron or steel), containing metals or metallic compounds, excep[…]; HS2017 262110: Slag and ash; ash and residues from the incineration of municipal waste
  main reference product of this activity
  production volume 50716.4 kg
    calculated in proportion to incinerated waste reference product
  property price 0 EUR2005
    Waste products are assigned a price of zero as they are assumed to require further treatment.
  properties: cadmium content 0.000362929, calcium content 0.428399, carbon allocation 0.017147 kg, carbon content 0.019986, carbon content, fossil 0.019986, carbon content, non-fossil 0, cobalt content 0.0136705, copper content 0.00132006, dry mass 0.857951 kg, iron content 0.033008, lead content 0.00404215, mercury content 8.0744e-6, nickel content 0.0138487, nitrogen content 0.01198, oxygen content 0.366924, phosphorus content 0.0518796, sulfur content 0.0134302, water content 0.165567, water in wet mass 0.142049 kg, wet mass 1 kg, zinc content 0.0411404

## Inputs from technosphere
- process-specific burdens, slag landfill: 0.0116981, 0.988302 kg (2 suppliers, which the file names only by identifier); sum of these 1 kg
  mass-specific expenditures required for landfilling of bottom ash.
- slag landfill: 1.7778e-9 unit
  slag compartment infrastructure required for landfilling of bottom ash.

## Inputs from nature
- Organic carbon, placed in landfill [inventory indicator, waste]: 0.0085735 kg; lognormal variance with pedigree 0.28365, pedigree (1,1,5,1,1)
  Mass of organic carbon in waste (without inorganic carbon), initially put in slag compartment. The exchange represents a flow that is within the technosphere. This exchange should only be used to apply ecofactors for the Swiss LCIA method of Ecological Scarcity and not any other purpose.
  Uncertainty: Uncertainty calculated from uncertainty of composition of incinerated waste, and incinerator model uncertainty and slag compartment transfer coefficient uncertainty.
- Waste mass, total, placed in landfill [inventory indicator, waste]: 1 kg
  Mass of waste initially put in a slag compartment. The exchange represents a flow that is within the technosphere. This exchange should only be used to apply ecofactors for the Swiss LCIA method of Ecological Scarcity and not any other purpose.

## Emissions to nature
- Non-hazardous waste disposed [inventory indicator, waste]: 1 kg
  Inventory indicator for waste mass disposed. To be used in EN15804 "other data" results.
- BOD5, Biological Oxygen Demand [water, ground-, long-term]: 0.0070616 kg; lognormal variance with pedigree 0.28365, pedigree (1,1,5,1,1)
  complement of long-term emissions from incinerator bottom ash in slag compartment
  Uncertainty: Uncertainty calculated from uncertainty of composition of incinerated waste, and incinerator model uncertainty and slag compartment transfer coefficient uncertainty.
- BOD5, Biological Oxygen Demand [water, surface water]: 2.5489e-5 kg; lognormal variance with pedigree 0.77313, pedigree (1,1,5,1,1)
  short-term emissions from incinerator bottom ash in slag compartment
  Uncertainty: Uncertainty calculated from uncertainty of composition of incinerated waste, and incinerator model uncertainty and slag compartment transfer coefficient uncertainty.
- COD, Chemical Oxygen Demand [water, ground-, long-term]: 0.021589 kg; lognormal variance with pedigree 0.28365, pedigree (1,1,5,1,1)
  (same comment as for BOD5, Biological Oxygen Demand)
- COD, Chemical Oxygen Demand [water, surface water]: 7.7925e-5 kg; lognormal variance with pedigree 0.77313, pedigree (1,1,5,1,1)
  (same comment as for BOD5, Biological Oxygen Demand)
- Cadmium II [water, ground-, long-term]: 0.00031122 kg; lognormal variance with pedigree 0.74882, pedigree (1,1,5,1,1)
  (same comment as for BOD5, Biological Oxygen Demand)
- Cadmium II [water, surface water]: 1.602e-7 kg; lognormal variance with pedigree 1.4883, pedigree (1,1,5,1,1)
  (same comment as for BOD5, Biological Oxygen Demand)
- Calcium II [water, ground-, long-term]: 0.36594 kg; lognormal variance with pedigree 0.26364, pedigree (1,1,5,1,1)
  (same comment as for BOD5, Biological Oxygen Demand)
- Calcium II [water, surface water]: 0.0016037 kg; lognormal variance with pedigree 0.72903, pedigree (1,1,5,1,1)
  (same comment as for BOD5, Biological Oxygen Demand)
- Cobalt II [water, ground-, long-term]: 0.011727 kg; lognormal variance with pedigree 0.64956, pedigree (1,1,5,1,1)
  (same comment as for BOD5, Biological Oxygen Demand)
- Cobalt II [water, surface water]: 1.6317e-6 kg; lognormal variance with pedigree 1.5614, pedigree (1,1,5,1,1)
  (same comment as for BOD5, Biological Oxygen Demand)
- Copper ion [water, ground-, long-term]: 0.0011325 kg; lognormal variance with pedigree 0.80813, pedigree (1,1,5,1,1)
  (same comment as for BOD5, Biological Oxygen Demand)
- Copper ion [water, surface water]: 3.9321e-8 kg; lognormal variance with pedigree 1.9037, pedigree (1,1,5,1,1)
  (same comment as for BOD5, Biological Oxygen Demand)
- DOC, Dissolved Organic Carbon [water, ground-, long-term]: 0.0085427 kg; lognormal variance with pedigree 0.28365, pedigree (1,1,5,1,1)
  (same comment as for BOD5, Biological Oxygen Demand)
- DOC, Dissolved Organic Carbon [water, surface water]: 3.0835e-5 kg; lognormal variance with pedigree 0.77313, pedigree (1,1,5,1,1)
  (same comment as for BOD5, Biological Oxygen Demand)
- Iron ion [water, ground-, long-term]: 0.014732 kg; lognormal variance with pedigree 0.21328, pedigree (1,1,5,1,1)
  (same comment as for BOD5, Biological Oxygen Demand)
- Iron ion [water, surface water]: 2.3695e-7 kg; lognormal variance with pedigree 1.3898, pedigree (1,1,5,1,1)
  (same comment as for BOD5, Biological Oxygen Demand)
- Lead II [water, ground-, long-term]: 0.0034679 kg; lognormal variance with pedigree 0.66633, pedigree (1,1,5,1,1)
  (same comment as for BOD5, Biological Oxygen Demand)
- Lead II [water, surface water]: 6.3303e-8 kg; lognormal variance with pedigree 1.8469, pedigree (1,1,5,1,1)
  (same comment as for BOD5, Biological Oxygen Demand)
- Mercury II [water, ground-, long-term]: 6.746e-6 kg; lognormal variance with pedigree 0.96515, pedigree (1,1,5,1,1)
  (same comment as for BOD5, Biological Oxygen Demand)
- Mercury II [water, surface water]: 1.8148e-7 kg; lognormal variance with pedigree 1.2192, pedigree (1,1,5,1,1)
  (same comment as for BOD5, Biological Oxygen Demand)
- Nickel II [water, ground-, long-term]: 0.011874 kg; lognormal variance with pedigree 0.57768, pedigree (1,1,5,1,1)
  (same comment as for BOD5, Biological Oxygen Demand)
- Nickel II [water, surface water]: 7.482e-6 kg; lognormal variance with pedigree 1.2907, pedigree (1,1,5,1,1)
  (same comment as for BOD5, Biological Oxygen Demand)
- Nitrate [water, ground-, long-term]: 0.036923 kg; lognormal variance with pedigree 0.40547, pedigree (1,1,5,1,1)
  (same comment as for BOD5, Biological Oxygen Demand)
- Nitrate [water, surface water]: 0.0085953 kg; lognormal variance with pedigree 0.47226, pedigree (1,1,5,1,1)
  (same comment as for BOD5, Biological Oxygen Demand)
- Phosphate [water, ground-, long-term]: 0.0018006 kg; lognormal variance with pedigree 5.2266, pedigree (1,1,5,1,1)
  (same comment as for BOD5, Biological Oxygen Demand)
- Phosphate [water, surface water]: 3.006e-6 kg; lognormal variance with pedigree 1.7005, pedigree (1,1,5,1,1)
  (same comment as for BOD5, Biological Oxygen Demand)
- Sulfate [water, ground-, long-term]: 0.031415 kg; lognormal variance with pedigree 0.39765, pedigree (1,1,5,1,1)
  (same comment as for BOD5, Biological Oxygen Demand)
- Sulfate [water, surface water]: 0.0031524 kg; lognormal variance with pedigree 0.52548, pedigree (1,1,5,1,1)
  (same comment as for BOD5, Biological Oxygen Demand)
- TOC, Total Organic Carbon [water, ground-, long-term]: 0.0085427 kg; lognormal variance with pedigree 0.28365, pedigree (1,1,5,1,1)
  (same comment as for BOD5, Biological Oxygen Demand)
- TOC, Total Organic Carbon [water, surface water]: 3.0835e-5 kg; lognormal variance with pedigree 0.77313, pedigree (1,1,5,1,1)
  (same comment as for BOD5, Biological Oxygen Demand)
- Zinc II [water, ground-, long-term]: 0.035295 kg; lognormal variance with pedigree 0.44603, pedigree (1,1,5,1,1)
  (same comment as for BOD5, Biological Oxygen Demand)
- Zinc II [water, surface water]: 1.0507e-6 kg; lognormal variance with pedigree 1.562, pedigree (1,1,5,1,1)
  (same comment as for BOD5, Biological Oxygen Demand)
