# treatment of bottom ash, MSWI, waste paperboard, slag compartment

Dataset: EcoSpold 2, unit process
Geography: GLO
Time period: 1994-01-01 to 2023-12-31
Technology level: current
Classification: ISIC rev.4 ecoinvent: 3821:Treatment and disposal of non-hazardous waste
Scenario: Business-as-Usual
System model: Allocation, cut-off by classification
Generated by: Mattia Clementi
Database: ecoinvent
isCopyrightProtected: true
accessRestrictedTo: 1

## General comment
The process represents the treatment of controlled landfilling in slag compartment of a waste (bottom ash) that is exclusively generated in another waste treatment. Bottom ash is the by-product that is generated during the municipal solid waste incineration (MSWI) of 'waste paperboard'. Recommended use of this dataset: to be used within the specific chain of treatments for 'waste paperboard'. Share of biogenic carbon in the sludge: 100%.

## Included activities start
The activity starts with the waste being available at the gate of the treatment facility. Collection and transportation of the waste to the treatment plant is not included.

## Included activities end
The activity ends with the waste being treated and waste-specific emissions from the slag compartment landfill are released to water (short-term emissions to surface water and long-term emissions to ground water).

## Geography
Modelling parameters affecting the treatment technology are not specific to this geography.

## Technology
Slag compartment for bottom ash from incineration with base seal and leachate collection system (Landfill type D). Recultivation after closure.

## Reference product
- bottom ash, MSWI, waste paperboard: -1 kg; By-product classification Waste; CPC 3932: Ash and residue (except from the manufacture of iron or steel), containing metals or metallic compounds, except[…]; HS2017 262110: Slag and ash; ash and residues from the incineration of municipal waste
  main reference product of this activity (supply of disposal service).
  production volume 1.00828e8 kg
    calculated in proportion to incinerated waste reference product
  property price 0 EUR2005
    Waste products are assigned a price of zero as they are assumed to require further treatment.
  properties: antimony content 1.28422e-8, arsenic content 4.30246e-5, barium content 0.00350955, beryllium content 0.000120179, cadmium content 7.64151e-6, carbon allocation 0.162301 kg, carbon content 0.213458, carbon content, fossil 0, carbon content, non-fossil 0.213458, chlorine content 0.00968209, chromium content 0.000606484, cobalt content 8.76018e-5, copper content 0.00383402, dry mass 0.760342 kg, lead content 0.00171044, manganese content 0.00717642, mercury content 7.12993e-7, nickel content 0.00122689, nitrogen content 0.00315795, oxygen content 0.627635, selenium content 1.20523e-5, strontium content 0.00552271, sulfur content 0.119602, tin content 0.000309275, water content 0.315197, water in wet mass 0.239658 kg, wet mass 1 kg, zinc content 0.00229854

## Inputs from technosphere
- process-specific burdens, slag landfill: 0.00841689, 0.280494, 0.71109 kg (3 suppliers, which the file names only by identifier); sum of these 1 kg
  mass-specific expenditures required for landfilling of bottom ash.
- slag landfill: 1.7778e-9 unit
  slag compartment infrastructure required for landfilling of bottom ash.

## Inputs from nature
- Organic carbon, placed in landfill [inventory indicator, waste]: 0.08115 kg; lognormal variance with pedigree 0.052479, pedigree (1,1,5,1,1)
  Mass of organic carbon in waste (without inorganic carbon), initially put in slag compartment. The exchange represents a flow that is within the technosphere. This exchange should only be used to apply ecofactors for the Swiss LCIA method of Ecological Scarcity and not any other purpose.
  Uncertainty: Uncertainty calculated from uncertainty of composition of incinerated waste, and incinerator model uncertainty and slag compartment transfer coefficient uncertainty.
- Waste mass, total, placed in landfill [inventory indicator, waste]: 1 kg
  Mass of waste initially put in a slag compartment. The exchange represents a flow that is within the technosphere. This exchange should only be used to apply ecofactors for the Swiss LCIA method of Ecological Scarcity and not any other purpose.

## Emissions to nature
- Non-hazardous waste disposed [inventory indicator, waste]: 1 kg
  Inventory indicator for waste mass disposed. To be used in EN15804 "other data" results.
- Antimony ion [water, ground-, long-term]: 1.413e-9 kg; lognormal variance with pedigree 2.8817, pedigree (1,1,5,1,1)
  complement of long-term emissions from incinerator bottom ash in slag compartment
  Uncertainty: Uncertainty calculated from uncertainty of composition of incinerated waste, and incinerator model uncertainty and slag compartment transfer coefficient uncertainty.
- Antimony ion [water, surface water]: 6.5846e-12 kg; lognormal variance with pedigree 2.6518, pedigree (1,1,5,1,1)
  short-term emissions from incinerator bottom ash in slag compartment
  Uncertainty: Uncertainty calculated from uncertainty of composition of incinerated waste, and incinerator model uncertainty and slag compartment transfer coefficient uncertainty.
- Arsenic ion [water, ground-, long-term]: 3.2664e-5 kg; lognormal variance with pedigree 1.5695, pedigree (1,1,5,1,1)
  (same comment as for Antimony ion)
- Arsenic ion [water, surface water]: 4.9209e-8 kg; lognormal variance with pedigree 2.1696, pedigree (1,1,5,1,1)
  (same comment as for Antimony ion)
- BOD5, Biological Oxygen Demand [water, ground-, long-term]: 0.06684 kg; lognormal variance with pedigree 0.052481, pedigree (1,1,5,1,1)
  (same comment as for Antimony ion)
- BOD5, Biological Oxygen Demand [water, surface water]: 0.00024126 kg; lognormal variance with pedigree 0.54196, pedigree (1,1,5,1,1)
  (same comment as for Antimony ion)
- Barium II [water, ground-, long-term]: 0.0026681 kg; lognormal variance with pedigree 1.0561, pedigree (1,1,5,1,1)
  (same comment as for Antimony ion)
- Barium II [water, surface water]: 4.0902e-7 kg; lognormal variance with pedigree 1.9552, pedigree (1,1,5,1,1)
  (same comment as for Antimony ion)
- Beryllium II [water, ground-, long-term]: 9.132e-5 kg; lognormal variance with pedigree 1.5731, pedigree (1,1,5,1,1)
  (same comment as for Antimony ion)
- Beryllium II [water, surface water]: 5.7542e-8 kg; lognormal variance with pedigree 2.2861, pedigree (1,1,5,1,1)
  (same comment as for Antimony ion)
- COD, Chemical Oxygen Demand [water, ground-, long-term]: 0.20434 kg; lognormal variance with pedigree 0.052481, pedigree (1,1,5,1,1)
  (same comment as for Antimony ion)
- COD, Chemical Oxygen Demand [water, surface water]: 0.00073758 kg; lognormal variance with pedigree 0.54196, pedigree (1,1,5,1,1)
  (same comment as for Antimony ion)
- Cadmium II [water, ground-, long-term]: 5.8072e-6 kg; lognormal variance with pedigree 1.6012, pedigree (1,1,5,1,1)
  (same comment as for Antimony ion)
- Cadmium II [water, surface water]: 2.9893e-9 kg; lognormal variance with pedigree 2.3407, pedigree (1,1,5,1,1)
  (same comment as for Antimony ion)
- Chloride [water, ground-, long-term]: 0.0010028 kg; lognormal variance with pedigree 0.45542, pedigree (1,1,5,1,1)
  (same comment as for Antimony ion)
- Chloride [water, surface water]: 0.0063589 kg; lognormal variance with pedigree 0.43667, pedigree (1,1,5,1,1)
  (same comment as for Antimony ion)
- Chromium VI [water, ground-, long-term]: 3.0175e-6 kg; lognormal variance with pedigree 4.6158, pedigree (1,1,5,1,1)
  (same comment as for Antimony ion)
- Chromium VI [water, surface water]: 1.3187e-8 kg; lognormal variance with pedigree 2.4193, pedigree (1,1,5,1,1)
  (same comment as for Antimony ion)
- Cobalt II [water, ground-, long-term]: 6.6598e-5 kg; lognormal variance with pedigree 1.6, pedigree (1,1,5,1,1)
  (same comment as for Antimony ion)
- Cobalt II [water, surface water]: 9.2667e-9 kg; lognormal variance with pedigree 2.5118, pedigree (1,1,5,1,1)
  (same comment as for Antimony ion)
- Copper ion [water, ground-, long-term]: 0.0029151 kg; lognormal variance with pedigree 1.1208, pedigree (1,1,5,1,1)
  (same comment as for Antimony ion)
- Copper ion [water, surface water]: 1.0121e-7 kg; lognormal variance with pedigree 2.2164, pedigree (1,1,5,1,1)
  (same comment as for Antimony ion)
- DOC, Dissolved Organic Carbon [water, ground-, long-term]: 0.080859 kg; lognormal variance with pedigree 0.052481, pedigree (1,1,5,1,1)
  (same comment as for Antimony ion)
- DOC, Dissolved Organic Carbon [water, surface water]: 0.00029186 kg; lognormal variance with pedigree 0.54196, pedigree (1,1,5,1,1)
  (same comment as for Antimony ion)
- Lead II [water, ground-, long-term]: 0.0013005 kg; lognormal variance with pedigree 1.1467, pedigree (1,1,5,1,1)
  (same comment as for Antimony ion)
- Lead II [water, surface water]: 2.3739e-8 kg; lognormal variance with pedigree 2.3272, pedigree (1,1,5,1,1)
  (same comment as for Antimony ion)
- Manganese II [water, ground-, long-term]: 0.0054563 kg; lognormal variance with pedigree 0.98818, pedigree (1,1,5,1,1)
  (same comment as for Antimony ion)
- Manganese II [water, surface water]: 2.7928e-7 kg; lognormal variance with pedigree 2.0324, pedigree (1,1,5,1,1)
  (same comment as for Antimony ion)
- Mercury II [water, ground-, long-term]: 5.2792e-7 kg; lognormal variance with pedigree 1.7503, pedigree (1,1,5,1,1)
  (same comment as for Antimony ion)
- Mercury II [water, surface water]: 1.4202e-8 kg; lognormal variance with pedigree 2.0044, pedigree (1,1,5,1,1)
  (same comment as for Antimony ion)
- Nickel II [water, ground-, long-term]: 0.00093227 kg; lognormal variance with pedigree 1.2792, pedigree (1,1,5,1,1)
  (same comment as for Antimony ion)
- Nickel II [water, surface water]: 5.8743e-7 kg; lognormal variance with pedigree 1.9922, pedigree (1,1,5,1,1)
  (same comment as for Antimony ion)
- Nitrate [water, ground-, long-term]: 0.0086256 kg; lognormal variance with pedigree 0.56601, pedigree (1,1,5,1,1)
  (same comment as for Antimony ion)
- Nitrate [water, surface water]: 0.002008 kg; lognormal variance with pedigree 0.6328, pedigree (1,1,5,1,1)
  (same comment as for Antimony ion)
- Selenium IV [water, ground-, long-term]: 8.799e-6 kg; lognormal variance with pedigree 1.4469, pedigree (1,1,5,1,1)
  (same comment as for Antimony ion)
- Selenium IV [water, surface water]: 1.4574e-7 kg; lognormal variance with pedigree 1.7568, pedigree (1,1,5,1,1)
  (same comment as for Antimony ion)
- Strontium II [water, ground-, long-term]: 0.0041965 kg; lognormal variance with pedigree 1.0878, pedigree (1,1,5,1,1)
  (same comment as for Antimony ion)
- Strontium II [water, surface water]: 2.6443e-6 kg; lognormal variance with pedigree 1.8008, pedigree (1,1,5,1,1)
  (same comment as for Antimony ion)
- Sulfate [water, ground-, long-term]: 0.24794 kg; lognormal variance with pedigree 0.60337, pedigree (1,1,5,1,1)
  (same comment as for Antimony ion)
- Sulfate [water, surface water]: 0.024879 kg; lognormal variance with pedigree 0.7312, pedigree (1,1,5,1,1)
  (same comment as for Antimony ion)
- TOC, Total Organic Carbon [water, ground-, long-term]: 0.080859 kg; lognormal variance with pedigree 0.052481, pedigree (1,1,5,1,1)
  (same comment as for Antimony ion)
- TOC, Total Organic Carbon [water, surface water]: 0.00029186 kg; lognormal variance with pedigree 0.54196, pedigree (1,1,5,1,1)
  (same comment as for Antimony ion)
- Tin ion [water, ground-, long-term]: 0.00023384 kg; lognormal variance with pedigree 1.3397, pedigree (1,1,5,1,1)
  (same comment as for Antimony ion)
- Tin ion [water, surface water]: 3.7613e-9 kg; lognormal variance with pedigree 2.5377, pedigree (1,1,5,1,1)
  (same comment as for Antimony ion)
- Zinc II [water, ground-, long-term]: 0.0017476 kg; lognormal variance with pedigree 1.043, pedigree (1,1,5,1,1)
  (same comment as for Antimony ion)
- Zinc II [water, surface water]: 5.2024e-8 kg; lognormal variance with pedigree 2.159, pedigree (1,1,5,1,1)
  (same comment as for Antimony ion)
