# turpentine to generic market for solvent for paint

Dataset: EcoSpold 2, unit process
Geography: GLO
Time period: 2017-01-01 to 2023-12-31
Technology level: current
Classification: ISIC rev.4 ecoinvent: 2022:Manufacture of paints, varnishes and similar coatings, printing ink and mas
Scenario: Business-as-Usual
System model: Allocation, cut-off by classification
Generated by: Lucia Valsasina
Database: ecoinvent
isCopyrightProtected: true
accessRestrictedTo: 1

## General comment
This is a linking activity which links the product turpentine to the generic market for solvents for paint. All chemicals that enter this market provide the function of a solvent for paint.

## Included activities start
The activity starts with the reception of turpentine.

## Included activities end
The activity ends with the production of solvent for paint for the generic market

## Reference product
- solvent for paint: 1 kg; By-product classification allocatable product; CPC 35110: Paints and varnishes and related products; HS2017 381400: Solvents and thinners; organic composite solvents and thinners, n.e.c. or included, prepared paint or varni[...]
  production volume 1.53e8 kg; = 170000000*0.9
    Estimate.The global annual production of sulfate turpentine in 2015 is estimated to be 170 000 metric tonnes (Ukkonen, n.d.). No quantitative information could be found on how much of sulfate turpentine is used as solvent. Literature indicates that this is the main application of turpentine. It is therefore estimated that 90% of sulfate turpentine is used as solvents for paint.
    Ukkonen (n.d.) Pine Chemicals - Global view. Retrieved online from <https://c.ymcdn.com/sites/www.pinechemicals.org/resource/resmgr/2016_ic_-_santiago/2016_IC_Santiago-_Presentations/Monday_Speaker_2-_Keijo_Ukko.pdf>, 8.6.2018
  property heating value, net 26.16 MJ
    LHV is calculated based on the Carbon content of the product. More details can be found on the respective documentation.
  property price 1.2225 EUR2005
    Estimated value. Average of price of white spirit and turpentine.
  properties: carbon allocation 0.863404 kg, carbon content 0.863404, carbon content, fossil 0.863404, carbon content, non-fossil 0, dry mass 1 kg, water content 0, water in wet mass 0 kg, wet mass 1 kg

## Inputs from technosphere
- turpentine: 1 kg
  properties: heating value, net 26.74 MJ
