# lime production, milled, loose

Dataset: EcoSpold 2, unit process
Geography: CA-QC
Time period: 2012-01-01 to 2023-12-31
Technology level: current
Classification: ISIC rev.4 ecoinvent: 0810:Quarrying of stone, sand and clay
Classification: EcoSpold01Categories: construction materials/additives
Synonyms: agricultural lime; Pulverized limestone
Tags: single enterprise data
Scenario: Business-as-Usual
System model: Allocation, cut-off by classification
Share of production covered: 100 %
Generated by: Geneviève Martineau
Published in: Kellenberger D. 2007
Database: ecoinvent
isCopyrightProtected: true
accessRestrictedTo: 1

## General comment
This dataset represents the production of milled / pulverized limestone.
Diesel and electricity consumption was provided by the only lime producer in Quebec. No water use reported for this activity. A weighted average of their three (3) limestone plants is used.
Pulverized limestone (lime, milled, loose) includes all products which are made by grinding and screening industrial grade limestone.
These products are used in a variety of applications including:
- Rock Dust - used to suppress coal dust explosions in the coal industry.
- Agricultural - used to neutralize soil acidity, increase plant nutrients, increase organic matter, increase soil organisms, and increase trace elements.
- Exhaust Gas Scrubbers - used in industrial and power plants.
- Scrubber Reagent - used in circulating fluidized bed boilers as a reagent material for sulfur removal.
- Roofing Materials - used as a filler in asphalt shingles.
- Drilling Mud Additives - used as an essential component in drilling mud.
- Glass Stone - used as a primary ingredient in the glass making process.
- Feed Supplements - used to provide essential minerals for the animal feed industry.
Infrastructure data was extrapolated from "lime production, milled, loose, GLO 2002" ecoinvent dataset: The value of the infrastructure is normalized with a annual production capacity of about 6'000 tons of product per year. The estimated lifespan of the machines is 25 years. There are no dust emissions as the mill is a closed system.

## Included activities start
From crushed limestone

## Included activities end
This activity ends with the milled lime, at the plant gate.

This dataset includes the processes: milling, sieving, filtering, drying and storing. One part of the total heating energy for "production" and "administration" is included. Equipment included in the infrastructure: 1 crusher, 1 sieve, and 2 small silos and 1 filter.

## Geography
Quebec data are from the only company that produces limestone on the territory. Unavalable data were extrapolated based on the GLO dataset exchanges.

## Technology
The company works on a technically high level; heavy machines (excl. building machines) are operated electrically; air is recirculated in closed loop to avoid dust emissions

## Reference product
- lime: 1 kg; By-product classification allocatable product; CPC 37420: Quicklime, slaked lime and hydraulic lime; HS2017 252100: Limestone flux; limestone and other calcareous stone, of a kind used for the manufacture of lime or cement
  EcoSpold01Location=CH
  production volume 3.3e8 kg
    Primary data for 2012 milled lime production in Quebec (mainly agricultural lime). Source: Association des Producteurs de Pierre à Chaux du Québec.
  property carbon content, fossil 0.117257
    Table 3.1, ecoinvent v2.2 report 7, part VII, pg 3. MW CaCO3=100, MW MgCO3=84. C content of limestone is 0.117257 kg/kg DM
  property price 0.117 EUR2005
    Temporary price data. Calculated as 90% of purchasers price based on: 2005 import and export prices (total trades (USD) divided by total weight (kg) in biggest economies of the world: EU27, USA, Brasil, China, India, Japan and Russia) from UN Commodity Trade Statistics Database (http://data.un.org/Explorer.aspxDatabase [Accessed 2011.06.20]). Commodity: Calcium carbonate
  properties: carbon allocation 0.117023 kg, carbon content 0.117257, carbon content, non-fossil 0, dry mass 0.998 kg, heating value, net 0 MJ, water content 0.00200401, water in wet mass 0.002 kg, wet mass 1 kg

## Inputs from technosphere
- diesel, burned in building machine: 0.00358397 MJ; = diesel_consumption/building_machine_yield; lognormal variance with pedigree 0.008, pedigree (1,1,4,1,1)
  Calculated value. See Exchange properties.
  Diesel is used for on site transportation of material. Source : Questionnaire.
  Uncertainty: Calculated variable. Uncertainty will be determined from propagation of uncertainty factors of underlying variables. Uncertainty of actual relation between variables not accounted at this time.
  property fuel input in physical units, kg 8.38648e-5 kg; name diesel_consumption
  property kgFuel_Input 0.0234 kg; name building_machine_yield
  properties: heating value, net 1 MJ
  note on fuel input in physical units, kg: Amount of diesel for on site transportation of 1 kg of limestone. Source: questionnaire. Considering diesel density of 0,84 kg/l (ecoinvent report 1, Table 4.6)
  note on kgFuel_Input: Amount of diesel burned in building machine per MJ. Source: "diesel, burned in building machine, GLO 2001" dataset, ecoinvent v 3.01
- electricity, medium voltage: 0.0157584 kWh; lognormal variance with pedigree 0.0086, pedigree (1,1,4,1,1)
  Measured value. Electricity is used for conveyors, rock crushers, sieving and milling. Source: questionnaire.
  EcoSpold01Location=CH
- heat, central or small-scale, other than natural gas: 0.00141 MJ; source Kellenberger D. 2007; lognormal variance with pedigree 0.0427, pedigree (1,2,5,5,2)
  Extrapolated value, based on "lime production, milled, loose, GLO 2002" dataset.
  EcoSpold01Location=CH
  properties: heating value, net 1 MJ
- heat, district or industrial, natural gas: 0.104065 MJ; = natural_gas_consumption/NG_furnace_yield; lognormal variance with pedigree 0.008, pedigree (1,1,4,1,1)
  Calculated value. See Exchange properties.
  Natural gas is used for lime drying. Source : Questionnaire.
  Uncertainty: Calculated variable. Uncertainty will be determined from propagation of uncertainty factors of underlying variables. Uncertainty of actual relation between variables not accounted at this time.
  property corresponding fuel use, in m3 0.02849 m3; name NG_furnace_yield
  property fuel input in physical units, m3 0.00296483 m3; name natural_gas_consumption
  properties: heating value, net 1 MJ
  note on corresponding fuel use, in m3: Amount of natural gas burned in industrial furnace, per MJ. Source: "heat production, natural gas, at industrial furnace low-NOx > 100kW, GLO 2000" dataset, ecoinvent v 3.1
  note on fuel input in physical units, m3: Amount of natural gas for drying1 kg of milled limestone. Source: questionnaire - weighted average of the three Quebec sites.
- heat, district or industrial, other than natural gas: 0.0208869 MJ; = HFO_consumption/HFO_furnace_yield; lognormal variance with pedigree 0.008, pedigree (1,1,4,1,1)
  Calculated value. See Exchange properties.
  Heavy fuel oil is used for lime drying. Source : Questionnaire.
  EcoSpold01Location=CH
  Uncertainty: Calculated variable. Uncertainty will be determined from propagation of uncertainty factors of underlying variables. Uncertainty of actual relation between variables not accounted at this time.
  property fuel input in physical units, kg 0.000541515 kg; name HFO_consumption
  property kgFuel_Input 0.025926 kg; name HFO_furnace_yield
  properties: heating value, net 1 MJ
  note on fuel input in physical units, kg: Amount of heavy fuel oil (HFO) for drying1 kg of milled limestone. Source: questionnaire - weighted average of the three Quebec sites. Considering HFO density of 0,86 kg/l (ecoinvent report 1, Table 4.6)
  note on kgFuel_Input: Amount of heavy fuel oill burned in the industrial furnace per MJ. Source: "heat production, heavy fuel oil, at industrial furnace 1MW, GLO, 2000 - 2000" dataset, ecoinvent v 3.1
- industrial machine, heavy, unspecified: 0.000225 kg; source Kellenberger D. 2007; lognormal variance with pedigree 0.3712, pedigree (4,3,5,5,2)
  EcoSpold01Location=RER
  Extrapolated value, based on "lime production, milled, loose, GLO 2002" dataset.
- limestone, crushed, for mill: 1 kg; lognormal variance with pedigree 0.0086, pedigree (1,1,4,1,1)
  EcoSpold01Location=CH
  Measured value: No loss during the process. Source questionnaire.
  properties: carbon content, fossil 0.117492, dry mass 0.998 kg, water content 0.00200401, wet mass 1 kg
  note on carbon content, fossil: Table 3.1, ecoinvent v2.2 report 7, part VII, pg 3. MW CaCO3=100, MW MgCO3=84. C content of limestone is 0.117257 kg/kg DM Table 3.1, ecoinvent v2.2 report 7, part VII, pg 3. MW CaCO3=100, MW MgCO3=84

## Sampling procedure
Information provided by the only Quebec producer

## Extrapolations
A weighted average of three lime production plants in Quebec was used.
When no information available, GLO exchanges have been used as proxy for Quebec. The uncertainty has been adjusted accordingly.

See Geography and Technolgy fields for details.
