# tube insulation production, elastomere

Dataset: EcoSpold 2, unit process
Geography: RoW
Time period: 1997-01-01 to 2023-12-31
Technology level: current
Classification: ISIC rev.4 ecoinvent: 2219:Manufacture of other rubber products
Classification: EcoSpold01Categories: insulation materials/production
Synonyms: PUR; PVC; armaflex; aeroflex
Tags: ConvertedDataset
Scenario: Business-as-Usual
System model: Allocation, cut-off by classification
Share of production covered: 100 %
Generated by: Niels Jungbluth
Published in: Kellenberger D. 2007
Database: ecoinvent
isCopyrightProtected: true
accessRestrictedTo: 1

## General comment
Tube insulation materials can be used for different technical applications. Within this project their use as insulation material for warm water pipes of solar collectors is of interest. The inventory of tube insulation materials can be considered as a reliable data base for the assessment of this material in connection with technical applications. It is not meant to be used for the comparison of different insulation materials. Therefore detailed information about product properties and type of application would be necessary. Transport distances should be multiplied by 14 to account for low specific weight of 75kg/m3.
[This dataset was already contained in the ecoinvent database version 2. It was not individually updated during the transfer to ecoinvent version 3. Life Cycle Impact Assessment results may still have changed, as they are affected by changes in the supply chain, i.e. in other datasets. This dataset was generated following the ecoinvent quality guidelines for version 2. It may have been subject to central changes described in the ecoinvent version 3 change report (http://www.ecoinvent.org/database/ecoinvent-version-3/reports-of-changes/), and the results of the central updates were reviewed extensively. The changes added e.g. consistent water flows and other information throughout the database. The documentation of this dataset can be found in the ecoinvent reports of version 2, which are still available via the ecoinvent website. The change report linked above covers all central changes that were made during the conversion process.]

## Included activities end
The production of tube insulation materials is investigated from gate to gate for one producer with production places in Münster and Zeulenroda, Germany.

## Geography
Production in Germany

## Technology
The production process can roughly be divided into pre-production and finishing process. Synthetic rubber is delivered in bulk to the plant. In a first stage different raw materials are kneaded. The rubber mass is rolled out in size of the latter rubber basic furs which are brought to an intermediate storage. For a part of these furs the finishing process takes place in Zeulenroda. The bulk is further processed in Münster. These rubber basic furs are warmed up again in the next rolling mill and some necessary raw materials are added. The mass is extruded to the form of the final product. Than the tubes are brought to the batch-ovens or to the conti-ovens for vulcanisation. During this process they simultaneously blow out to their final size. The product is cut to size, labelled and packed in cardboard. Most (82%) of the production wastes are recycled within the same production process.

## Time period
Year of environmental reporting. Two different production places.

## Parameters
- fraction, process water, to air: 0.15 dimensionless; name fraction_PW_to_air; lognormal variance with pedigree 0.092025, pedigree (4,4,3,2,4)
- fraction, tap water, to air: 0.15 dimensionless; name fraction_TW_to_air; lognormal variance with pedigree 0.092025, pedigree (4,4,3,2,4)

## Reference product
- tube insulation, elastomere: 1 kg; By-product classification allocatable product; CPC 36230: Tubes, pipes and hoses of vulcanized rubber other than hard rubber; HS2017 400911: Rubber; vulcanised (other than hard rubber), tubing, piping and hoses, not reinforced or otherwise combined[...]
  SDG for output: 1.5; Estimation from aggregated figures
  EcoSpold01Location=DE
  production volume 3.75794 kg
    This is a placeholder value that does not reflect real-world production volumes. This dataset does not currently require a real-world production volume to work in the database framework, and no actual data were collected yet. This has no negative effect on the results of the ecoinvent database.
  property carbon content, fossil 0.837817
    The main raw material (93%) is synthetic rubber (Ethylene propylene diene monomer (EPDM)), that is used together with PVC (ecoinvent v2.2 report 7_XV), C2H3Cl
  property heating value, net 25.39 MJ
    LHV is calculated based on the Carbon content of the product. More details can be found on the respective documentation.
  property price 1.22 EUR2005
    From UN trade-database. Import data. (USD/kg). Category: Mixtures of natural and synthetic rubbers. Main input to product is 'synthetic rubber'.
  properties: carbon allocation 0.837817 kg, carbon content 0.837817, carbon content, non-fossil 0, dry mass 1 kg, water content 0, water in wet mass 0 kg, wet mass 1 kg

## Inputs from technosphere
- chemical, organic: 0.065 kg; lognormal variance with pedigree 0.3041, pedigree (3,2,5,5,5)
  EcoSpold01Location=GLO
  Assumption 6.5% of extrusion agent 1,1-azobisformamide
  Uncertainty: Assumption 6.5% of extrusion agent 1,1-azobisformamide
  properties: carbon content, fossil 0.628, dry mass 1 kg, heating value, net 19.03 MJ, wet mass 1 kg
  note on carbon content, fossil: This dataset is an unweighted average of 20 organic substances (listed in Tab 88.1, ecoinvent v2.2 report 8, part II), being part of the top100 chemicals included in this database. The C-content has also been calculated as an unweighted average of the C content of the substances composing this dataset.
- corrugated board box: 0.0019971, 7.43921e-5, 0.00435851 kg (3 suppliers, which the file names only by identifier); sum of these 0.00643 kg; lognormal variance with pedigree 0.0827, pedigree (2,2,5,5,1)
  EcoSpold01Location=RER
  Questionnaire, product packaging
  Uncertainty: Questionnaire, product packaging
  properties: carbon content, fossil 0.000656085, carbon content, non-fossil 0.432275, dry mass 0.945 kg, heating value, net 12.86 MJ, water content 0.0582011, wet mass 1 kg
  note on carbon content, fossil: Fossil C content was calculated after fossil C contents of chemicals used in the production of board (Tab 10-15 & 10.16 ecoinvent v2.2 report 11_III, part 10)
  note on carbon content, non-fossil: Biogenic C content was calculated after biogenic C contents of chemicals used in the production of board (Tab 10.15 & 10.16, ecoinvent v2.2 report 11_III, part 10).
- electricity, medium voltage: 0.000546625, 0.000818239, 0.00025849, 0.00481148, 0.00282398, 0.0033481, 0.0406681, 9.69939e-5, 0.811238, 0.272574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 kWh (47 suppliers, which the file names only by identifier); sum of these 1.43 kWh; lognormal variance with pedigree 0.0821, pedigree (1,2,5,5,1)
  Environmental report
  EcoSpold01Location=DE
  Uncertainty: Environmental report
- municipal solid waste: -1.32162e-6, -8.16042e-8, -5.37329e-8, -2.18183e-6, -2.59083e-7, -1.44829e-7, -1.64614e-6, -6.3913e-7, -1.61247e-6, -4.14753e-7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 kg (44 suppliers, which the file names only by identifier); sum of these -0.00128 kg; lognormal variance with pedigree 0.0421, pedigree (1,2,1,5,1)
  Environmental report
  EcoSpold01Location=CH
  Uncertainty: Environmental report
  production volume
    Calculated from the production volume of tube insulation, elastomere in proportion to the respective output amounts.
  properties: carbon content, fossil 0.171549, carbon content, non-fossil 0.261655, dry mass 0.771 kg, heating value, net 11.74 MJ, water content 0.297017, wet mass 1 kg
  note on carbon content, fossil: MSW composition in tab 4.1, ecoinvent v2.2 report 13_I. C content referred to 1 kg DM
  note on heating value, net: Value taken from the general comment of the treatment dataset.
- natural gas, high pressure: 0.000704015, 0.00118759, 0.000541792, 0.00259049, 0.000330586, 0.000866927, 0.000202597, 0.00120582, 0.00225933, 0.00115707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 m3 (58 suppliers, which the file names only by identifier); sum of these 0.117179 m3; lognormal variance with pedigree 0.0821, pedigree (1,2,5,5,1)
  Environmental report, 36.3MJ/Nm3
  EcoSpold01Location=DE
  Uncertainty: Environmental report, 36.3MJ/Nm3
  properties: carbon content, fossil 0.602381, dry mass 0.84 kg, heating value, gross 40 MJ, heating value, net 36 MJ, wet mass 0.84 kg
  note on carbon content, fossil: An average C content of 0.506 kg C/ m3 has been assumed (this average has been calculated using data in Tab 3.5, ecoinvent v2.2 report 6_V
  note on heating value, net: Literature value, Source: Christoph Meili;Niels Jungbluth;Maresa Bussa (2021) Life cycle inventories of crude oil and natural gas extraction. ESU-services Ltd. commissioned by BAFU & VSG, Schaffhausen, Switzerland, http://esu-services.ch/data/public-lci-reports/
- polyurethane, rigid foam: 0.0551 kg; lognormal variance with pedigree 0.0826, pedigree (1,3,5,5,1)
  EcoSpold01Location=RER
  Environmental report
  Uncertainty: Environmental report
  properties: carbon content, fossil 0.69089, dry mass 1 kg, heating value, net 30.67 MJ, wet mass 1 kg
  note on carbon content, fossil: Polyurethanes (PUR) is the collective name for an extensive group of polymers with very different compositions and correspondingly varied property profiles, though their molecule chain contains all a urethane group (-NH-CO-O-). All PURs are built on a common principle : they are produced by the diisocyanate polyaddition process, that links polyols and (di)isocyanates. In this dataset, an example of typical polyurethane mixture is described (Ullmann, Polyurethanes, Dieterich et al. & ecoinvent v2 report 11_II). C content was calculated as an addition of C contents in its components.
- polyvinylchloride, emulsion polymerised: 0.0095745 kg; lognormal variance with pedigree 0.1021, pedigree (3,2,5,5,3)
  Therotical assumptions
  EcoSpold01Location=RER
  Uncertainty: Therotical assumptions
  properties: carbon content, fossil 0.387097, dry mass 1 kg, heating value, net 21.5 MJ, wet mass 1 kg
  note on carbon content, fossil: Monomer is vynyl chloride, C2H3Cl (ecoinvent v2.2 report 11_II). MW=62 g/mol
- polyvinylchloride, suspension polymerised: 0.0654255 kg; lognormal variance with pedigree 0.1021, pedigree (3,2,5,5,3)
  EcoSpold01Location=RER
  Therotical assumptions
  Uncertainty: Therotical assumptions
  properties: carbon content, fossil 0.387097, dry mass 1 kg, heating value, net 21.5 MJ, wet mass 1 kg
- synthetic rubber: 0.93 kg; lognormal variance with pedigree 0.1041, pedigree (3,2,5,5,1)
  Therotical assumptions, Bulk transport
  EcoSpold01Location=RER
  Uncertainty: Therotical assumptions, Bulk transport
  properties: carbon content, fossil 0.871949, dry mass 1 kg, heating value, net 26.42 MJ, wet mass 1 kg
  note on carbon content, fossil: EPDM (Ethylene-propene-diene terpolymer) rubber is a terpolymer of ethylene, propene, and a diene with the residual unsaturated portion of the diene in the side chain (ecoinvent v2.2 report 7-part XX & Ullmann). Chemical formula (deduced from Evidences of Solvent-Induced Miscibility in Polychloroprene-co-Ethylene-Propene Diene Terpolymer Blends, Dubey et al., Journal of Applied Polymer Science, 2009, 111:1884–1891): C20H35
- tap water: 0.00271825, 0.00414374, 0.00773201, 0.0208295, 0.00250731, 0.104489, 0.00186344, 1.19572 kg (8 suppliers, which the file names only by identifier); sum of these 1.34 kg; lognormal variance with pedigree 0.0821, pedigree (1,2,5,5,1)
  EcoSpold01Location=RER
  Environmental report
  Uncertainty: Environmental report
  properties: carbon content, fossil 0.00178991, dry mass 0.000337476 kg, water content 2962.17, wet mass 1 kg
  note on carbon content, fossil: Bicarbonate content is 2.93 mol/m3. CO2 content is 0.1 mol/m3 (ecoinvent v2.2 report 8, Tab 93.1).
- tube insulation factory: 4e-9 unit; lognormal variance with pedigree 0.0821, pedigree (1,2,5,5,1)
  Environmental report
  EcoSpold01Location=DE
  Uncertainty: Environmental report
- waste plastic, mixture: -5.38963e-5, -1.96371e-5, -3.46229e-6, -2.04235e-6, -1.35507e-5, -1.22143e-6, -1.26126e-6, -3.26889e-6, -1.16835e-6, -1.41046e-6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 kg (42 suppliers, which the file names only by identifier); sum of these -0.0748 kg; lognormal variance with pedigree 0.0421, pedigree (1,2,1,5,1)
  Environmental report
  EcoSpold01Location=CH
  Uncertainty: Environmental report
  production volume
    (same comment as for municipal solid waste)
  properties: carbon content, fossil 0.747344, dry mass 0.847 kg, heating value, net 30.79 MJ, water content 0.180638, wet mass 1 kg
  note on carbon content, fossil: C content in 1 kg DM was calculated using data in Tab A.2, ecoinvent v2.2 report 13_I
- wastewater, average: -7.97633e-6, -0.0013273, -4.72569e-6 m3 (3 suppliers, which the file names only by identifier); sum of these -0.00134 m3; lognormal variance with pedigree 0.0421, pedigree (1,2,1,5,1)
  Environmental report, Sanitary and cooling water
  EcoSpold01Location=CH
  Uncertainty: Environmental report, Sanitary and cooling water
  production volume
    (same comment as for municipal solid waste)
  properties: carbon content, non-fossil 0.194039, dry mass 0.346837 kg, mass concentration, TOC 0.1091 kg/m3, mass concentration, calcium 0.039453 kg/m3, mass concentration, chlorine 0.030031 kg/m3, mass concentration, hydrogen 0.013365 kg/m3, mass concentration, nitrogen 0.031015 kg/m3, mass concentration, oxygen 0.069824 kg/m3, mass concentration, sodium 0.06456 kg/m3, mass concentration, sulfur 0.015602 kg/m3, water content 2882.2, wet mass 1000 kg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
  note on carbon content, non-fossil: 0.0673 kg TOC/m3 (Tab A.17, ecoinvent v2.2 report 13_I). TOC was considered as Total Carbon.

## Emissions to nature
- Carbon dioxide, fossil [air, urban air close to ground]: 0.225 kg; lognormal variance with pedigree 0.0821, pedigree (1,2,5,5,1)
  Environmental report, Calculated for Zeulenroda
  Uncertainty: Environmental report, Calculated for Zeulenroda
- Carbon monoxide, fossil [air, urban air close to ground]: 0.000242 kg; lognormal variance with pedigree 0.7421, pedigree (1,2,5,5,1)
  Environmental report
  Uncertainty: Environmental report
- Nitrogen oxides [air, urban air close to ground]: 0.000293 kg; lognormal variance with pedigree 0.1321, pedigree (1,2,5,5,1)
  Environmental report
  Uncertainty: Environmental report
- Particulate Matter, > 10 um [air, urban air close to ground]: 5.04e-5 kg; lognormal variance with pedigree 0.2021, pedigree (1,2,5,5,1)
  Environmental report, Aerosoles measured as dust, estimation >10um
  Uncertainty: Environmental report, Aerosoles measured as dust, estimation >10um
- Sulfur dioxide [air, urban air close to ground]: 0.0121 kg; lognormal variance with pedigree 0.1321, pedigree (1,2,5,5,1)
  Environmental report
  Uncertainty: Environmental report
- Water [air, unspecified]: 0.000201 m3; name water_to_air_unspecified; lognormal variance with pedigree 0.0827, pedigree (2,2,5,5,1)
  Calculated value based on literature values and expert opinion. See comments in the parametres' comment field.
  property fraction, origin: fresh water 1; name fraction_origin_fresh_water
  property fraction, origin: salt water 0; name fraction_origin_salt_water
  property fraction, origin: unspecified 0; name fraction_origin_unspecified

## Sampling procedure
Environmental report.

## Extrapolations
Data for one producer are used for the total production. Packaging estimated with data from a plant in TH. This dataset has been copied from an original dataset covering the geography DE. The uncertainty has been adjusted accordingly.

## Review by Daniel Kellenberger (obsolete) 2003-06-18
passed with further remark:
It seems not plausible that only two German factories cover the total German consumer market (no import?)
