# corrugated board box production

Dataset: EcoSpold 2, unit process
Geography: US
Time period: 2014-01-01 to 2023-12-31
Technology level: current
Classification: ISIC rev.4 ecoinvent: 1702:Manufacture of corrugated paper and paperboard and of containers of paper a
Synonyms: corrugated box; corrugated product
Tags: production mix
Scenario: Business-as-Usual
System model: Allocation, cut-off by classification
Share of production covered: 23 %
Generated by: Caroline Gaudreault
Published in: NCASI 2017
Database: ecoinvent
isCopyrightProtected: true
accessRestrictedTo: 1

## General comment
This dataset represents US-average corrugated products (e.g., corrugated box). It includes a share of recycled and virgin corrugating medium and linerboard inputs. Corrugated products are made of corrugated board (combined board). Corrugated board is the structure formed by bonding one or more sheets of fluted corrugating medium to one or more flat facings of linerboard. When this consists of a single facing, it is referred to as single-face board. If bonded on both sides, it becomes double-faced or single wall corrugated board. In addition to singlewall board, doublewall and triplewall corrugated boards are also produced. Typically, corrugated products are used as secondary packaging of products for shipping. The average basis weight of the U.S. industry mix is 131.6 lb/thousand square feet (msf, 0.643 kg/m2) and consists of approximately 0.6% singleface, 90.9% singlewall, 8.0% doublewall, and 0.5% triplewall.

## Included activities start
The process starts with the feeding of linerboard and corrugated medium to converting facilities. There are three types of converting facilities: corrugator plants, sheet feeder plants and sheet plants. Corrugator plants assemble linerboard and corrugating medium into corrugated sheets, and convert sheets into corrugated products (e.g., boxes) at the same location. Some corrugator plants also act as sheet feeder or sheet plants. Sheet feeder plants assemble linerboard and corrugating medium into corrugated sheets and ship them for final conversion into boxes or other corrugated products, mostly to sheet plants but also, in some cases, to corrugator plants. Sheet plants convert corrugated sheets produced mainly in sheet feeder plants, but also in some corrugator plants, into corrugated products. The ratio of corrugated products from corrugator plants is 80.4% vs. 19.6% for sheet plants.

## Included activities end
This activity ends with the printing and cutting of corrugated sheets into unfolded boxes which are then ready for delivery.

## Technology
Average of present used technology

## Reference product
- corrugated board box: 1 kg; name Box; By-product classification allocatable product; CPC 32153: Cartons, boxes, cases, record sleeves and other packing containers (except bags) of paper, paperboard, cellulo[…]; HS2017 481910: Paper and paperboard; cartons, boxes and cases, of corrugated paper or paperboard
  production volume 2.67664e10 kg; name Box_PV
    According to Fibre Box Association, the 2014 production volume of corrugated products (boxes and others) was 448 billions of sq. ft and the average basis wwight was 131.6 lb/1000 sq. ft. This is equivalent to 2.68E10 kg.
  property Quebec production volume 0 kg; name corrugatedBoardAmount_QCProdVol
  property carbon content, fossil 0.00365437
    C content was calculated as an addition of C content in the raw materials.
  property carbon content, non-fossil 0.491
    C content was calculated as an addition of C content in the raw materials.
  property heating value, net 12.86 MJ
    LHV is calculated based on the Carbon content of the product. More details can be found on the respective documentation.
  properties: carbon allocation 0.467448 kg, carbon content 0.494654, dry mass 0.945 kg, price 0.844 EUR2005, water content 0.0582011, water in wet mass 0.055 kg, wet mass 1 kg

## Inputs from technosphere
- borax, anhydrous, powder: 0.000302798 kg; lognormal variance with pedigree 0.0092, pedigree (1,3,4,1,1)
  Borax.
  properties: dry mass 1 kg, wet mass 1 kg
- coating powder: 0.000513 kg; lognormal variance with pedigree 0.0092, pedigree (1,3,4,1,1)
  Reported as coating.
  properties: carbon content, fossil 0.339435, dry mass 1 kg, heating value, net 10.28 MJ, wet mass 1 kg
- containerboard, unspecified: 1.10158 kg; lognormal variance with pedigree 0.0092, pedigree (1,3,4,1,1)
  Unspecified mix of corrugating medium (fluting) and linerboard.
  properties: carbon content, non-fossil 0.496, dry mass 0.918 kg, water content 0.0893246, wet mass 1 kg
  note on carbon content, non-fossil: 0.496 kg carbon/kg dry containerboard. Assumed to be 100% non-fossil.
- electricity, medium voltage: 0.142385 kWh; lognormal variance with pedigree 0.0092, pedigree (1,3,4,1,1)
  Data collected from converting plants.
- heat, district or industrial, other than natural gas: 2.40724e-6 MJ; lognormal variance with pedigree 0.0098, pedigree (1,3,4,1,2)
  Purchased steam: 2.41E-06 MJ. NCASI analysed e-grid data and determined that purchased steam would come mainly from bituminous coal.
  properties: corresponding fuel use, propane, furnace >100kW 1.05263 MJ, heating value, net 1 MJ
  note on corresponding fuel use, propane, furnace >100kW: Lower heating value of the fuel input related to the heat/electricity output, taken directly from ecoinvent v3.0 dataset "heat production, natural gas, at industrial furnace >100kW, GLO 2000".
- light fuel oil: 0.00324839 kg; lognormal variance with pedigree 0.0092, pedigree (1,3,4,1,1)
  Proxy for distillate fuel oil no. 2. Values reported in MJ HHV with a heat content of 39.8 MJ HHV/L. Density: 0.86 kg/L.
  property calculation property, kg 0 kg; name m_lfo
  properties: carbon content, fossil 0.862, dry mass 1 kg, heating value, net 42.6 MJ, wet mass 1 kg
  note on calculation property, kg: Mass output. Defined here for use in the combined production calculations.
- liquefied petroleum gas: 0.00101267 kg; lognormal variance with pedigree 0.0092, pedigree (1,3,4,1,1)
  Values reported in MJ HHV with a heat content of 25.5 MJ HHV/L. Density: 0.50 kg/L.
  property calculation property, kg 0 kg; name m_lpg
  properties: carbon content, fossil 0.821863, dry mass 1 kg, heating value, net 45.5 MJ, wet mass 1 kg
  note on heating value, net: Indicative value. Reference: Fuels - Higher and Lower Calorific Values, available at: https://www.engineeringtoolbox.com/fuels-higher-calorific-values-d_169.html
- maize starch: 0.0176 kg; lognormal variance with pedigree 0.0092, pedigree (1,3,4,1,1)
  Starch.
  properties: carbon content, non-fossil 0.46, dry mass 0.86 kg, heating value, net 11.64 MJ, water content 0.162791, wet mass 1 kg
  note on carbon content, non-fossil: C-content of starch is considered 46% on dry mass basis (from "Evolutionary and Biochemical Aspects", A.D. Kay and T. Vrede (in Global Ecology, 2010, Elsevier B.V., S.E. Jørgensen Ed.)).
- municipal solid waste: -0.00341582 kg; name Waste; lognormal variance with pedigree 0.0032, pedigree (1,3,3,1,1)
  It was assumed that this waste has similar composition to MSW
  production volume; = Waste*Box_PV/box
    Calculated from production volume of reference product using the relative outputs.
  properties: carbon content, fossil 0.171549, carbon content, non-fossil 0.261655, dry mass 0.771 kg, heating value, net 11.74 MJ, water content 0.297017, wet mass 1 kg
  note on carbon content, fossil: MSW composition in tab 4.1, ecoinvent v2.2 report 13_I. C content referred to 1 kg DM
  note on heating value, net: Value taken from the general comment of the treatment dataset.
- natural gas, high pressure: 0.031237 m3; lognormal variance with pedigree 0.0092, pedigree (1,3,4,1,1)
  Reported.
  property amount in multioutput activity_m3 0 m3; name natural_gas_amount_MO_m3
  properties: carbon content, fossil 0.602381, dry mass 0.84 kg, heating value, gross 40 MJ, heating value, net 36 MJ, wet mass 0.84 kg
  note on carbon content, fossil: An average C content of 0.506 kg C/ m3 has been assumed (this average has been calculated using data in Tab 3.5, ecoinvent v2.2 report 6_V
  note on heating value, gross: At standard conditions; based on Meili et al. (2022) section 5.2
- packaging box factory: 1.42857e-9 unit; = 1/14000/50; lognormal variance with pedigree 0.51, pedigree (5,5,5,5,5)
  The amount is calculated based on the annual capacity of the factory (14kt paper) and the lifetime of 50 years. See ecoinvent datasets "packaging box factory construction, RER, 1993-2000".
  Uncertainty: No data collected, the uncertainty was then maximized.
- petrol, unleaded: 1.92106e-7 kg; lognormal variance with pedigree 0.0092, pedigree (1,3,4,1,1)
  Proxy for gasoline and kerosene. Facilities provided an aggregate number for both. Assumed 100% gasoline. Values reported in MJ HHV with a heat content of 34.8 MJ HHV/L. Density: 0.75 kg/L.
  property calculation property, kg 0 kg; name m_petrol
  properties: carbon content, fossil 0.865, dry mass 1 kg, heating value, net 43.2 MJ, wet mass 1 kg
  note on heating value, net: Assumed equal to "petroleum". LHV for petroleum: Based on literature, page 7, Report6, part 4
- phenolic resin: 0.000338 kg; lognormal variance with pedigree 0.0092, pedigree (1,3,4,1,1)
  Proxy for resin.
  property amount of exchange 1 0.0007193 kg; name resin_amount1
  property amount of exchange 2 6.657e-5 kg; name resin_amount2
  properties: carbon content, fossil 0.772277, dry mass 1 kg, heating value, net 33.57 MJ, wet mass 1 kg
- printing ink, offset, without solvent, in 47.5% solution state: 0.001299 kg; lognormal variance with pedigree 0.0092, pedigree (1,3,4,1,1)
  Proxy for unspecified ink.
  properties: carbon content, fossil 0.455266, carbon content, non-fossil 0.221773, dry mass 1 kg, heating value, net 20.51 MJ, wet mass 1 kg
  note on carbon content, fossil: C content was calculated as an addition of C content in the raw materials.
- sodium hydroxide, without water, in 50% solution state: 0.000551 kg; lognormal variance with pedigree 0.0092, pedigree (1,3,4,1,1)
  Caustic, dry weight.
  properties: dry mass 1 kg, heating value, net 3.03 MJ, wet mass 1 kg
- vinyl acetate: 0.001607 kg; lognormal variance with pedigree 0.0092, pedigree (1,3,4,1,1)
  Proxy for adhesive.
  properties: carbon content, fossil 0.55814, dry mass 1 kg, heating value, net 25.35 MJ, wet mass 1 kg
- waste paperboard, sorted: -0.135135 kg; name Recycling; lognormal variance with pedigree 0.0032, pedigree (1,3,3,1,1)
  Converting scrap collected for recycling into containerboard production.
  production volume; = Box_PV*Recycling/Box
    Calculated from production volume of reference product using the relative outputs.
  property carbon content, fossil 0; name Recycling_1_C_content_fossil
  property carbon content, non-fossil 0.491; name Recycling_1_C_content_non_fossil
  properties: dry mass 0.9 kg, heating value, net 15.92 MJ, price 0.0436 EUR2005, water content 0.111111, wet mass 1 kg
- wastewater, average: -0.000251608 m3; name Wastewater; lognormal variance with pedigree 0.0032, pedigree (1,3,3,1,1)
  Wastewater sent to external treatment.
  production volume; = Wastewater*Box_PV/Box
    Calculated from production volume of reference product using the relative outputs.
  properties: carbon content, non-fossil 0.194039, dry mass 0.346837 kg, mass concentration, TOC 0.1091 kg/m3, mass concentration, calcium 0.039453 kg/m3, mass concentration, chlorine 0.030031 kg/m3, mass concentration, hydrogen 0.013365 kg/m3, mass concentration, nitrogen 0.031015 kg/m3, mass concentration, oxygen 0.069824 kg/m3, mass concentration, sodium 0.06456 kg/m3, mass concentration, sulfur 0.015602 kg/m3, water content 2882.2, wet mass 1000 kg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
  note on carbon content, non-fossil: 0.0673 kg TOC/m3 (Tab A.17, ecoinvent v2.2 report 13_I). TOC was considered as Total Carbon.
- wax, lost-wax casting: 0.00376 kg; name wax_lostwax_casting; lognormal variance with pedigree 0.0092, pedigree (1,3,4,1,1)
  Proxy for wax.
  property carbon content, fossil 0.84706; name wax_lostwax_casting_C_content_fossil
  property carbon content, non-fossil 0; name wax_lostwax_casti_C_content_non_fossil_0
  property dry mass 1 kg; name wax_lostwax_casting_DM
  property water content 0; name wax_lostwax_casting_water_content
  property water in wet mass 0 kg; name wax_lostwax_casting_WWM
  property wet mass 1 kg; name wax_lostwax_casting_WM
  properties: heating value, net 25.76 MJ

## Inputs from nature
- Oxygen [natural resource, in air]: 0.0554708 kg; = (CO2_fossil)/(16*2+12) * (16*2) + (CO_fossil)/(16+12) *16; lognormal variance with pedigree 0.0179, pedigree (2,3,4,3,3)
  Oxygen is required for the combustion process. Calculated value
- Water, unspecified natural origin [natural resource, in water]: 0.000456 m3; lognormal variance with pedigree 0.0092, pedigree (1,3,4,1,1)
  Water input

## Emissions to nature
- Acetaldehyde [air, unspecified]: 1.17158e-9 kg; lognormal variance with pedigree 0.0573, pedigree (2,3,4,3,3)
  Estimation based on fuel input data and emission factors from corresponding ecoinvent fuel combustion (see "Extrapolations" comment).
- Acetic acid [air, unspecified]: 1.75737e-7 kg; lognormal variance with pedigree 0.0573, pedigree (2,3,4,3,3)
  (same comment as for Acetaldehyde)
- Ammonia [air, unspecified]: 2.08064e-8 kg; lognormal variance with pedigree 0.0573, pedigree (2,3,4,3,3)
  (same comment as for Acetaldehyde)
- Benzene [air, unspecified]: 4.70712e-7 kg; lognormal variance with pedigree 0.0573, pedigree (2,3,4,3,3)
  (same comment as for Acetaldehyde)
- Benzo(a)pyrene [air, unspecified]: 1.55997e-11 kg; lognormal variance with pedigree 0.0573, pedigree (2,3,4,3,3)
  (same comment as for Acetaldehyde)
- Butane [air, unspecified]: 8.63799e-7 kg; lognormal variance with pedigree 0.0573, pedigree (2,3,4,3,3)
  (same comment as for Acetaldehyde)
- Carbon dioxide, fossil [air, unspecified]: 0.07627 kg; name CO2_fossil; lognormal variance with pedigree 0.0179, pedigree (2,3,4,3,3)
  (same comment as for Acetaldehyde)
- Carbon monoxide, fossil [air, unspecified]: 3.01515e-6 kg; name CO_fossil; lognormal variance with pedigree 0.6673, pedigree (2,3,4,3,3)
  (same comment as for Acetaldehyde)
- Copper ion [air, unspecified]: 9.70967e-8 kg; lognormal variance with pedigree 0.6673, pedigree (2,3,4,3,3)
  (same comment as for Acetaldehyde)
- Dinitrogen monoxide [air, unspecified]: 2.00384e-7 kg; lognormal variance with pedigree 0.0573, pedigree (2,3,4,3,3)
  (same comment as for Acetaldehyde)
- Dioxins, measured as 2,3,7,8-tetrachlorodibenzo-p-dioxin [air, unspecified]: 9.75667e-17 kg; lognormal variance with pedigree 0.0573, pedigree (2,3,4,3,3)
  (same comment as for Acetaldehyde)
- Formaldehyde [air, unspecified]: 2.41997e-7 kg; lognormal variance with pedigree 0.0573, pedigree (2,3,4,3,3)
  (same comment as for Acetaldehyde)
- Hydrocarbons, aliphatic, alkanes, unspecified [air, unspecified]: 6.65806e-8 kg; lognormal variance with pedigree 0.0573, pedigree (2,3,4,3,3)
  (same comment as for Acetaldehyde)
- Hydrocarbons, aromatic [air, unspecified]: 4.16129e-9 kg; lognormal variance with pedigree 0.0573, pedigree (2,3,4,3,3)
  (same comment as for Acetaldehyde)
- Hydrochloric acid [air, unspecified]: 1.30387e-8 kg; lognormal variance with pedigree 0.0573, pedigree (2,3,4,3,3)
  (same comment as for Acetaldehyde)
- Hydrogen fluoride [air, unspecified]: 1.24839e-9 kg; lognormal variance with pedigree 0.0573, pedigree (2,3,4,3,3)
  (same comment as for Acetaldehyde)
- Mercury II [air, unspecified]: 1.04502e-10 kg; lognormal variance with pedigree 0.6673, pedigree (2,3,4,3,3)
  (same comment as for Acetaldehyde)
- Methane, fossil [air, non-urban air or from high stacks]: 2.48187e-6 kg; lognormal variance with pedigree 0.0573, pedigree (2,3,4,3,3)
  (same comment as for Acetaldehyde)
- NMVOC, non-methane volatile organic compounds [air, unspecified]: 0.000139 kg; lognormal variance with pedigree 0.0486, pedigree (1,3,4,1,1)
  Reported by facilities under study.
- Nitrogen oxides [air, unspecified]: 5.1e-5 kg; lognormal variance with pedigree 0.0486, pedigree (1,3,4,1,1)
  Reported by facilities under study.
- PAH, polycyclic aromatic hydrocarbons [air, unspecified]: 1.17962e-8 kg; lognormal variance with pedigree 0.0573, pedigree (2,3,4,3,3)
  (same comment as for Acetaldehyde)
- Particulate Matter, < 2.5 um [air, unspecified]: 2.48187e-7 kg; lognormal variance with pedigree 0.0573, pedigree (2,3,4,3,3)
  (same comment as for Acetaldehyde)
- Particulate Matter, > 2.5 um and < 10um [air, unspecified]: 4.37287e-5 kg; lognormal variance with pedigree 0.0092, pedigree (1,3,4,1,1)
  Proxy for total particulates. Value reported by facilities under study.
- Pentane [air, unspecified]: 1.43502e-6 kg; lognormal variance with pedigree 0.0573, pedigree (2,3,4,3,3)
  (same comment as for Acetaldehyde)
- Propane [air, unspecified]: 2.37104e-7 kg; lognormal variance with pedigree 0.0573, pedigree (2,3,4,3,3)
  (same comment as for Acetaldehyde)
- Propionic acid [air, unspecified]: 2.34316e-8 kg; lognormal variance with pedigree 0.0573, pedigree (2,3,4,3,3)
  (same comment as for Acetaldehyde)
- Sulfur dioxide [air, unspecified]: 1.04e-6 kg; lognormal variance with pedigree 0.0486, pedigree (1,3,4,1,1)
  Reported by facilities under study.
- Toluene [air, unspecified]: 2.38477e-7 kg; lognormal variance with pedigree 0.0573, pedigree (2,3,4,3,3)
  (same comment as for Acetaldehyde)
- Water [air, unspecified]: 0.000216 m3; lognormal variance with pedigree 0.0098, pedigree (2,3,4,1,1)
  Water evaporated. Estimated by mass balances.
- Zinc II [air, unspecified]: 9.70967e-8 kg; lognormal variance with pedigree 0.6673, pedigree (2,3,4,3,3)
  (same comment as for Acetaldehyde)
- BOD5, Biological Oxygen Demand [water, surface water]: 4.53e-6 kg; name BOD; lognormal variance with pedigree 0.0486, pedigree (1,3,4,1,1)
  BOD from direct discharges of water
- COD, Chemical Oxygen Demand [water, unspecified]: 2.265e-5 kg; name COD; = BOD/0.2; lognormal variance with pedigree 0.25, pedigree (5,5,5,5,5)
  calculated based on ecoinvent DQG
- DOC, Dissolved Organic Carbon [water, unspecified]: 8.38889e-6 kg; = TOC; lognormal variance with pedigree 0.25, pedigree (5,5,5,5,5)
  calculated based on ecoinvent DQG
- Suspended solids, unspecified [water, surface water]: 2.52e-6 kg; lognormal variance with pedigree 0.0486, pedigree (1,3,4,1,1)
  Suspended solids from direct effluent
- TOC, Total Organic Carbon [water, unspecified]: 8.38889e-6 kg; name TOC; = COD/2.7; lognormal variance with pedigree 0.25, pedigree (5,5,5,5,5)
  calculated based on ecoinvent DQG
- Water [water, surface water]: 1.3346e-5 m3; lognormal variance with pedigree 0.0092, pedigree (1,3,4,1,1)
  Direct effluent

## Sampling procedure
Data obtained from 166 US converting facilities including: 128 corrugator plants, 7 sheet feeder plants and 31 sheet plants. Percent representativeness was determined based on the containerboard input.

## Extrapolations
Converting facilities provided air emission data for NOx, VOCs, SO2 and total particulates. The remaining emissions were estimated using ecoinvent combustion processes and fuel quantities. Distillate fuel oil: Heat, district or industrial, other than natural gas {CA-QC}| heat production, light fuel oil, at industrial furnace 1MW, Gasoline and kerosene: Heat, district or industrial, other than natural gas {CA-QC}| heat production, light fuel oil, at industrial furnace 1MW, LPG: Heat, district or industrial, other than natural gas {CA-QC}| heat production, propane, at industrial furnace >100kW and natural gas: Heat, district or industrial, natural gas {CA-QC}| heat production, natural gas, at industrial furnace >100kW.
