# trimethyl borate production

Dataset: EcoSpold 2, unit process
Geography: GLO
Time period: 2000-01-01 to 2023-12-31
Technology level: current
Classification: ISIC rev.4 ecoinvent: 2011:Manufacture of basic chemicals
Synonyms: 121-43-7; TRIMETHYL BORATE; Boric acid trimethyl ester; Trimethoxyboron; Trimethoxyborane; Methyl borate
Scenario: Business-as-Usual
System model: Allocation, cut-off by classification
Share of production covered: 100 %
Generated by: Jürgen Sutter
Published in: Sutter, J. 2007
Database: ecoinvent
isCopyrightProtected: true
accessRestrictedTo: 1

## General comment
This dataset represents the production of 1 kg of trimethyl borate by esterification of boric acid with methanol. It is a clear liquid and is soluble in organic solvents and dissolves in water with hydrolysis to boric acid and the methanol. Trimethyl borate (also known as methyl borate) is the boric acid ester of greatest commercial interest because it is used internally for the production of sodium borohydride (and diborane). Methyl borate azeotrope is used as a gaseous flux for brazing and welding, particularly in Europe. Although numerous patents have been issued on the use of boric acid esters as polymer additives, this application apparently has remained small unless there are proprietary uses that have not been disclosed. Application of small quantities of several derivatives as epoxy resin curing agents has continued with little measurable growth. Despite wide patent coverage, boric acid esters have not been used in any quantity for polymer stabilization. In the 1950s and 1960s boric acid esters derived from glycols were used extensively as gasoline additives. A mixture of these glycol derivatives is being manufactured
by U.S. Borax & Chemical Corp. under the trade name Biobor JF for the control of microorganisms in fuel systems containing water. This product can be used successfully in jet fuels, diesel fuels, and fuel oil systems that have water contamination.
Borate esters have also been patented for use as flame retardants for cotton batting, modifiers for the oxidation of hydrocarbons, starting materials for the preparation of trialkylboranes, such as triethylborane and triphenylborane, wood preservatives, hydraulic fluids (particularly alkylated glycol borates), and lubricants.
Due to the lack of production data, this dataset is based on estimations as well as data from a large chemical plant (Gendorf 2016).
References:
Sutter, J. (2007) Life Cycle Inventories of Highly Pure Chemicals. ecoinvent report No. 19. Swiss Centre for Life Cycle Inventories, Dübendorf, 2007.
Brotherton, R. J., Weber, C. J., Guibert, C. R. and Little, J. L. 2000. Boron Compounds. Ullmann's Encyclopedia of Industrial Chemistry.
Gendorf (2016) Umwelterklärung 2015, Werk Gendorf Industriepark, www.gendorf.de.

## Included activities start
From the reception of boric acid and methanol at the factory gate.

## Included activities end
This activity ends with the production of 1 kg of trimethyl borate. The system includes the process with the consumption of raw materials and energy, infrastructure and land use, as well as the generation of emissions to air and water.

## Geography
The inventory is modelled for the world. Some values are based on data from a large chemical factory located in Germany. These are assumed to be valid for this geography.

## Technology
Boric acid esters have been prepared in the laboratory by a variety of methods, but the standard approach involves the reaction of boric acid with alcohols or phenols:
This equilibrium reaction, which favors the hydrolysis products boric acid and ROH, is displaced to the right by using excess alcohol and removing water by azeotropic distillation with hydrocarbon solvents. This procedure is complicated in the case of methyl and ethyl borates by the formation of azeotropes between the alcohols and the boric acid esters. A closely related method in which boric oxide is substituted for boric acid has also been used.
The relatively easy transesterification of boric acid esters results in ready displacement of lower boiling alcohols and the preparation of higher molecular mass alkyl and aryl derivatives. A number of less practical laboratory procedures for boric acid esters have been reported, starting with boron halides, trisaminoboranes, and other boron-containing compounds.
Reference:
Brotherton, R. J., Weber, C. J., Guibert, C. R. and Little, J. L. 2000. Boron Compounds. Ullmann's Encyclopedia of Industrial Chemistry.

## Time period
Time of publications. Some values are based on data published by the Gendorf factory that were collected between 2011 and 2015. The time period has been adjusted accordingly. For more details, see the comments of the exchanges.

## Reference product
- trimethyl borate: 1 kg; name RP; By-product classification allocatable product; CPC 34160: Organo-sulphur compounds and other organo-inorganic compounds; heterocyclic compounds n.e.c.; nucleic acids an[…]; HS2017 293190: Organo-inorganic compounds; other than tetramethyl lead, tetraethyl lead, tributyltin compounds, and other [...]; CAS 121-43-7
  Trimethyl borate is a clear liquid. It is soluble in organic solvents and dissolves in water with hydrolysis to boric acid and the methanol.
  Methyl borate is the boric acid ester of greatest commercial interest because it is used internally for the production of sodium borohydride (and diborane). Methyl borate azeotrope is used as a gaseous flux for brazing and welding, particularly in Europe.
  Although numerous patents have been issued on the use of boric acid esters as polymer additives, this application apparently has remained small unless there are proprietary uses that have not been disclosed. Application of small quantities of several derivatives as epoxy resin curing agents has continued with little measurable growth. Despite wide patent coverage, boric acid esters have not been used in any quantity for polymer stabilization. In the 1950s and 1960s boric acid esters derived from glycols were used extensively as gasoline additives. A mixture of these glycol derivatives is being manufactured by U.S. Borax & Chemical Corp. under the trade name Biobor JF for the control of microorganisms in fuel systems containing water. This product can be used successfully in jet fuels, diesel fuels, and fuel oil systems that have water contamination.
  Borate esters have also been patented for use as flame retardants for cotton batting, modifiers for the oxidation of hydrocarbons, starting materials for the preparation of trialkylboranes, such as triethylborane and triphenylborane, wood preservatives, hydraulic fluids (particularly alkylated glycol borates), and lubricants.
  production volume 3.47701e6 kg; name RP_PV
    Estimated value. The global production volume is extrapolated from the European production volume based on reports from Cefic (European Chemical Industry Council), and the American Chemistry Council.
    According to Cefic (2016a) the global sales of chemicals in the year 2015 was 3 534 billion euros. The reported share of sales per region are: EU28 14.7%; Other Europe (Switzerland, Norway, Turkey, Russia and Ukraine) 2.7%; NAFTA (US, Canada and Mexico) 16.5%; Latin America 3.8%; China 39.9%; Japan 3.9%; Republic of Korea 3.2%; India 2.2%; Rest of Asia 11.9%; Rest of the World 1.3%. Cefic also reports the US total sales, which amount to 518.7 billion euros out of the global 3 534 billion euros (14.7%). The same share is reported by the American Chemistry Council (2016), according to which the USA sales account for 15% of global sales for the year 2016.
    European production volume:
    Estimated value. According to the European Chemical Agency, the consumption of Trimethyl borate for the year of 2016 is estimated to be 550000 kg. The aforementioned value is the average of the range given in the literature. According to the European Chemical Industry Council (Cefic, 2016a), the total sales of chemicals of the European Union in 2016 amounted to 519 billion euros. Chemical imports were valued at 91 billion euros for the first 11 months of 2016. Based on this, the value for the total imports for the year 2016 was extrapolated, yielding a value of 99.3 billion euros. Furthermore, Cefic (2016b) reports a trade surplus (exports-imports) of 46.4 billion euros (once again extrapolated for the whole year using the value of 42 billion euros for the first 11 months of 2016). Considering all the aforementioned information, the total chemical consumption in the EU is calculated to be 472.6 billion euros (total sales-exports+imports). It is therefore calculated that production is 110% of consumption. This value is used to scale the information on chemical consumption to production. The European production volume is therefore 605000 kg.
    Since no data were found for the global production this value was scaled accordingly.
    References:
    American Chemistry Council 2016. Outlook: U.S. Chemical Industry Continues to Outpace Industrial Output; Accounts for More Than One-Half of Construction Spending by Manufacturing Sector. Accessible at: https://www.americanchemistry.com/Media/PressReleasesTranscripts/ACC-news-releases/US-Chemical-Industry-Continues-to-Outpace-Industrial-Output.html
    European Chemical Agency, Brief profile of Trimethyl borate, Accessible at: https://echa.europa.eu/brief-profile/-/briefprofile/100.004.063
    Cefic 2016a. Facts and figures 2016 of the European chemical industry. Accessible at: http://www.cefic.org/Facts-and-Figures/Chemicals-Industry-Profile/
    Cefic 2016b. 2016: EU chemicals output posts positive growth for third year running. Accessible at: http://www.cefic.org/Documents/RESOURCES/Chemical%20Trends%20Report/March-2017-Cefic-Chemicals-Trends-Report.pdf
  property heating value, net 21 MJ
    LHV is calculated based on the elemental composition of the substance. Based on the CAS number of the substance (000121-43-7), the chemical formula of the substance is found to be: C3H9BO3, (PubChem 2020).
    Reference: Kim, S., Chen, J., Cheng, T., Gindulyte, A., He, J., He, S., Li, Q., Shoemaker, B. A., Thiessen, P. A., Yu, B., Zaslavsky, L., Zhang, J., & Bolton, E. E. (2019). PubChem 2019 update: improved access to chemical data. Nucleic acids research, 47(D1), D1102–D1109. https://doi.org/10.1093/nar/gky1033
  property price 1.31643 EUR2005
    Calculated based on inputs: The price of the product has been calculated as a sum of the values of the material and energy inputs for this product. This value is therefore a rough estimation. It may underestimate the real price since there are additional expenses when producing any product. These expences can include for example labour costs, treatment of waste materials and profit for the producer. Please consider carefully whether this level of data quality is acceptable for your application.
  properties: carbon allocation 0.346154 kg, carbon content 0.346154, carbon content, fossil 0.346154, carbon content, non-fossil 0, dry mass 1 kg, water content 0, water in wet mass 0 kg, wet mass 1 kg

## Inputs from technosphere
- boric acid, anhydrous, powder: 0.62753 kg; source Brotherton, R 2004; lognormal variance with pedigree 0.0362, pedigree (4,5,2,1,1)
  Stoechiometric calculation. The values for the consumption of the raw materials are calculated with an assumed yield of 95%.
  Uncertainty: S
  properties: dry mass 1 kg, wet mass 1 kg
- chemical factory, organics: 4e-10 unit; lognormal variance with pedigree 0.31, pedigree (2,3,2,4,3)
  Calculated based on literature data published by the industry. For this activity, no information was readily available concerning infrastructure and land-use. Therefore, the infrastructure is estimated based on data from two chemical factories, the BASF site of Ludwigshafen and the chemical factory in Gendorf (which are both located in Germany), which produce a wide range of chemical substances. Based on this data, the following assumptions are made: the built area amounts to about 4.2 ha, the plant has an average output of 50'000 t/a and a lifespan of fifty years. The estimated infrastructure amount is therefore 4.00 E-10 units per kg of produced chemical.
  References:
  Althaus H.-J., Chudacoff M., Hischier R., Jungbluth N., Osses M. and Primas A. (2007) Life Cycle Inventories of Chemicals. ecoinvent report No. 8, v2.0. EMPA Dübendorf, Swiss Centre for Life Cycle Inventories, Dübendorf, CH.
  Gendorf (2000) Umwelterklärung 2000, Werk Gendorf. Werk Gendorf, Burgkirchen.
- electricity, medium voltage: 0.00725 kWh; source Kim S. 2003; lognormal variance with pedigree 0.0386, pedigree (3,3,4,1,3)
  Literature value. The values for the energy use have been estimated with data from the literature, which gives data for the production of ethyl acetate from ethanol esterification. This process is considered to be similar to the esterification of boric acid with methanol.
  Uncertainty: E
- heat, from steam, in chemical industry: 7.51501, 1.32499 MJ (2 suppliers, which the file names only by identifier); sum of these 8.84 MJ; source Kim S. 2003; lognormal variance with pedigree 0.1786, pedigree (4,5,5,5,5)
  Estimation. The values for the energy use have been estimated with data from the literature, which gives data for the production of ethyl acetate from ethanol esterification. This process is considered to be similar to the esterification of boric acid with methanol. The value for the heat demand has been estimated as steam input found in the literature, which is the difference between the steam and the potential recovered energy, because this recovered energy is usually fed into the heating systems.
  Uncertainty: E
  properties: heating value, net 1 MJ
- methanol: 0.0880639, 0.28293, 0.548699, 0.0519676 kg (4 suppliers, which the file names only by identifier); sum of these 0.97166 kg; source Brotherton, R 2004; lognormal variance with pedigree 0.0362, pedigree (4,5,2,1,1)
  (same comment as for boric acid, anhydrous, powder)
  properties: carbon content, fossil 0.375, dry mass 1 kg, heating value, net 20 MJ, wet mass 1 kg
  note on heating value, net: Based on literature, page 533, Report 17: Jungbluth, N., Chudacoff, M., Dauriat, A., Dinkel, F., Doka, G., Faist Emmenegger, M., Gnansounou, E., Kljun, N., Schleiss, K., Spielmann, M., Stettler, C., Sutter, J. 2007: Life Cycle Inventories of Bioenergy. ecoinvent report No. 17, Swiss Centre for Life Cycle Inventories, Dübendorf, CH.
- tap water: 0.026 kg; lognormal variance with pedigree 0.0106, pedigree (2,3,2,4,3)
  Calculated based on literature data published by the industry. This value is a 5-year average of data (2011 - 2015) published by the Gendorf factory (Gendorf, 2016, Umwelterklärung, www.gendorf.de), (Gendorf, 2015, Umwelterklärung, www.gendorf.de), (Gendorf, 2014, Umwelterklärung, www.gendorf.de). The amount of tap water per kg of chemical substance produced is calculated using literature data published by the Gendorf factory based in Germany, which produces a wide range of chemical substances. The factory produced 1657400 tonnes of chemical substances in the year 2015 (Gendorf, 2016, Umwelterklärung, www.gendorf.de) and 740000 tonnes of intermediate products. The amount of tap water consumed in the year 2015 was 55100 tonnes (Gendorf, 2016, Umwelterklärung, www.gendorf.de). The resulting amount of tap water is 0.023 kg/kg of chemical product produced. The 5-year average (2011 - 2015, weighted by production volume) is 0.026 kg/kg.
  properties: carbon content, fossil 0.00178991, dry mass 0.000337476 kg, water content 2962.17, wet mass 1 kg
  note on carbon content, fossil: Bicarbonate content is 2.93 mol/m3. CO2 content is 0.1 mol/m3 (ecoinvent v2.2 report 8, Tab 93.1).
- wastewater, average: -1.09589e-8, -1.82361e-6, -4.36062e-7, -6.49273e-9 m3 (4 suppliers, which the file names only by identifier); sum of these -2.27712e-6 m3; lognormal variance with pedigree 0.0452, pedigree (2,4,1,5,4)
  Calculated based on literature data published by the GENDORF Chemical Park. The factory produced an average of 2462760 tonnes of chemical substances (including intermediates) per year in the years 2015-2019. The average ouput of wastewater going to an external wastewater treatment plant in the years 2015-2019 was 5608 m3 per year. This equals 0.000002277 m3/kg chemical produced.
  References:
  Chemiepark GENDORF, Umwelterklärung 2016, https://www.gendorf.de/Nachbarn/Umweltschutz/Industrie%20und%20Nachhaltigkeit
  Chemiepark GENDORF, Umwelterklärung 2017, https://www.gendorf.de/Nachbarn/Umweltschutz/Industrie%20und%20Nachhaltigkeit
  Chemiepark GENDORF, Umwelterklärung 2020, https://www.gendorf.de/Nachbarn/Umweltschutz/Industrie%20und%20Nachhaltigkeit
  production volume; = RP_PV*BP_wastewater_average/ABS(RP)
    Calculated from the production volume of trimethyl borate in proportion to the respective output amounts.
  properties: carbon content, non-fossil 0.194039, dry mass 0.346837 kg, water content 2882.2, wet mass 1000 kg
  note on carbon content, non-fossil: 0.0673 kg TOC/m3 (Tab A.17, ecoinvent v2.2 report 13_I). TOC was considered as Total Carbon.

## Inputs from nature
- Water, cooling, unspecified natural origin [natural resource, in water]: 0.014707 m3; lognormal variance with pedigree 0.0454, pedigree (2,4,2,5,4)
  Calculated based on literature data published by the GENDORF Chemical Park. The factory produced an average of 2462760 tonnes of chemical substances (including intermediates) per year in the years 2015-2019. The average amount of cooling water released in the years 2015-2019 was 34408800 t per year. It was assumed that 5% of the cooling water was emitted to air during its use, therefore, to calculate the input of cooling water, the output value reported by GENDORF was scaled up by the factor 1/0.95. This equals 0.014707 m3/kg chemical produced.
  References:
  Chemiepark GENDORF, Umwelterklärung 2016, https://www.gendorf.de/Nachbarn/Umweltschutz/Industrie%20und%20Nachhaltigkeit
  Chemiepark GENDORF, Umwelterklärung 2017, https://www.gendorf.de/Nachbarn/Umweltschutz/Industrie%20und%20Nachhaltigkeit
  Chemiepark GENDORF, Umwelterklärung 2020, https://www.gendorf.de/Nachbarn/Umweltschutz/Industrie%20und%20Nachhaltigkeit
- Water, river [natural resource, in water]: 0.000965426 m3; lognormal variance with pedigree 0.0454, pedigree (2,4,2,5,4)
  Calculated based on literature data published by the GENDORF Chemical Park. The factory produced an average of 2462760 tonnes of chemical substances (including intermediates) per year in the years 2015-2019. The average consumption of river water in the years 2015-2019 was 22000820 t per year. However, since the cooling water is modelled as an input, the amount of river water was adjusted to avoid double counting. 55% of the input amount of cooling water was deducted from the amount of river water, as that is the share of river water versus well water. This equals 0.00096543 m3/kg chemical produced.
  References:
  Chemiepark GENDORF, Umwelterklärung 2016, https://www.gendorf.de/Nachbarn/Umweltschutz/Industrie%20und%20Nachhaltigkeit
  Chemiepark GENDORF, Umwelterklärung 2017, https://www.gendorf.de/Nachbarn/Umweltschutz/Industrie%20und%20Nachhaltigkeit
  Chemiepark GENDORF, Umwelterklärung 2020, https://www.gendorf.de/Nachbarn/Umweltschutz/Industrie%20und%20Nachhaltigkeit
- Water, well, in ground [natural resource, in water]: 0.000816522 m3; lognormal variance with pedigree 0.0454, pedigree (2,4,2,5,4)
  Calculated based on literature data published by the GENDORF Chemical Park. The factory produced an average of 2462760 tonnes of chemical substances (including intermediates) per year in the years 2015-2019. The average consumption of well water in the years 2015-2019 was 18607480 t per year. However, since the cooling water is modelled as an input, the amount of well water was adjusted to avoid double counting. 45% of the input amount of cooling water was deducted from the amount of well water, as that is the share of well water versus river water. This equals 0.00081652 m3/kg chemical produced.
  References:
  Chemiepark GENDORF, Umwelterklärung 2016, https://www.gendorf.de/Nachbarn/Umweltschutz/Industrie%20und%20Nachhaltigkeit
  Chemiepark GENDORF, Umwelterklärung 2017, https://www.gendorf.de/Nachbarn/Umweltschutz/Industrie%20und%20Nachhaltigkeit
  Chemiepark GENDORF, Umwelterklärung 2020, https://www.gendorf.de/Nachbarn/Umweltschutz/Industrie%20und%20Nachhaltigkeit

## Emissions to nature
- Boron [air, urban air close to ground]: 0.00022267 kg; lognormal variance with pedigree 0.798, pedigree (4,5,5,5,5)
  Estimation. As approximation the air emissions occurring from the purge vent, the distillation vent and fugitive emission sources were estimated to 0.2% of the input of boric acid (calculated as boron emissions) and methanol.
  Uncertainty: E
- Carbon dioxide, fossil [air, urban air close to ground]: 0.057717 kg; lognormal variance with pedigree 0.1786, pedigree (4,5,5,5,5)
  Estimation. The carbon contained in the removed methanol is accounted as CO2 emissions to air during the waste water treatment process.
  Uncertainty: E
- Methanol [air, urban air close to ground]: 0.0019433 kg; lognormal variance with pedigree 0.188, pedigree (4,5,5,5,5)
  (same comment as for Boron)
- Water [air, unspecified]: 0.00147008 m3; lognormal variance with pedigree 0.0848, pedigree (2,4,2,5,4)
  Calculated based on literature data published by the GENDORF Chemical Park. The factory produced an average of 2462760 tonnes of chemical substances (including intermediates) per year in the years 2015-2019. To determine the emissions of water to air, the difference of all water inputs (from river, well, tap water and cooling) and outputs (wastewater, emissions to water) was calculated. The average ouput of water to air in the years 2015-2019 was 3620444 m3 per year. This equals 0.00147 m3/kg chemical produced. For more information on the other water exchanges please consult the respective exchange comment.
  References:
  Chemiepark GENDORF, Umwelterklärung 2016, https://www.gendorf.de/Nachbarn/Umweltschutz/Industrie%20und%20Nachhaltigkeit
  Chemiepark GENDORF, Umwelterklärung 2017, https://www.gendorf.de/Nachbarn/Umweltschutz/Industrie%20und%20Nachhaltigkeit
  Chemiepark GENDORF, Umwelterklärung 2020, https://www.gendorf.de/Nachbarn/Umweltschutz/Industrie%20und%20Nachhaltigkeit
  property fraction, origin: fresh water 0; name fraction_origin_fresh_water
  property fraction, origin: salt water 0; name fraction_origin_salt_water
  property fraction, origin: unspecified 1; name fraction_origin_unspecified
- BOD5, Biological Oxygen Demand [water, unspecified]: 0.00670732 kg; lognormal variance with pedigree 0.218, pedigree (4,5,5,5,5)
  Calculated value. The BOD, COD, TOC and BOD5 are calculated based on the amount and type of emissions released to water in the same activity.
- Boron [water, surface water]: 0.0053441 kg; lognormal variance with pedigree 0.798, pedigree (4,5,5,5,5)
  Estimation. The remaining amount of unreacted boric acid and methanol (4.8% of the input) is assumed to leave the production process with the wastewater. Further it is assumed that this wastewater is treated in a internal wastewater plant. The removal efficiency for methanol is assumed with 90%.
  Uncertainty: E
- COD, Chemical Oxygen Demand [water, unspecified]: 0.00670732 kg; lognormal variance with pedigree 0.218, pedigree (4,5,5,5,5)
  (same comment as for BOD5, Biological Oxygen Demand)
- DOC, Dissolved Organic Carbon [water, unspecified]: 0.0017467 kg; lognormal variance with pedigree 0.218, pedigree (4,5,5,5,5)
  (same comment as for BOD5, Biological Oxygen Demand)
- Methanol [water, surface water]: 0.004664 kg; lognormal variance with pedigree 0.448, pedigree (4,5,5,5,5)
  (same comment as for Boron)
- TOC, Total Organic Carbon [water, unspecified]: 0.0017467 kg; lognormal variance with pedigree 0.218, pedigree (4,5,5,5,5)
  (same comment as for BOD5, Biological Oxygen Demand)
- Water [water, unspecified]: 0.0150391 m3; lognormal variance with pedigree 0.0848, pedigree (2,4,2,5,4)
  Calculated based on literature data published by the GENDORF Chemical Park. The factory produced an average of 2462760 tonnes of chemical substances (including intermediates) per year in the years 2015-2019. The amount of water released back to the environment consists of the sum of the amount of process water treated in the internal WWTP that is then released back to the environment and the amount of cooling water released back to the environment. The average ouput of the internal WWTP in the years 2015-2019 was 2628800 m3 and that of cooling water released back to the environment was 34408800 m3. This gives a yearly average of 37037600 m3 emissions of water to water. This equals 0.01504 m3/kg chemical produced.
  References:
  Chemiepark GENDORF, Umwelterklärung 2016, https://www.gendorf.de/Nachbarn/Umweltschutz/Industrie%20und%20Nachhaltigkeit
  Chemiepark GENDORF, Umwelterklärung 2017, https://www.gendorf.de/Nachbarn/Umweltschutz/Industrie%20und%20Nachhaltigkeit
  Chemiepark GENDORF, Umwelterklärung 2020, https://www.gendorf.de/Nachbarn/Umweltschutz/Industrie%20und%20Nachhaltigkeit
  property carbon content, fossil 0; name C_content_fossil
  property carbon content, non-fossil 0; name C_content_non_fossil
  property dry mass 0 kg; name DM
  property fraction, origin: fresh water 0; name fraction_origin_fresh_water_Ww
  property fraction, origin: salt water 0; name fraction_origin_salt_water_Ww
  property fraction, origin: unspecified 1; name fraction_origin_unspecified_Ww
  property water in wet mass 1000 kg; name WWM
  property wet mass 1000 kg; name WM

## Sampling procedure
Data based on literature and stoichiometric calculations. Some values are calculated based on data from a large chemical factory located in Germany. For more details, see the comments of the exchanges.

## Review by Emilia Moreno Ruiz 2017-08-08
This dataset was additionally reviewed in a separate review process by Eric Johnson of Atlantic Consulting as well as Emilia Moreno Ruiz and Gregor Wernet of ecoinvent.
