# electricity production, hydro, pumped storage

Dataset: EcoSpold 2, unit process
Geography: CH
Time period: 1945-01-01 to 2023-12-31
Technology level: modern
Classification: ISIC rev.4 ecoinvent: 3510:Electric power generation, transmission and distribution
Tags: hydro power
Scenario: Business-as-Usual
System model: Allocation, cut-off by classification
Generated by: Karin Treyer
Published in: Bolliger, R. 2007
Database: ecoinvent
isCopyrightProtected: true
accessRestrictedTo: 1

## General comment
This dataset represents the production of 1 kWh of electricity in a pumped storage power plant unit on the world in 2012. The calculation of this dataset is based on data of reservoir hydro power plant units. For this, a representative sample of various types of dams in Switzerland is taken into account, i.e. 52 reservoir power plants with an annual gross production output of 17.8 TWh and an installed capacity of 9130 MW. Reservoir power plants and pumped storage power plants are dealt with together due to the fact that the construction efforts are related. Lifetime is assumed to be 150 years for the dam and 80 years for the rest of materials. The data refers to plant operation of a mix of types of dams built between 1945 and 1970; therefore they might not be representative for more modern construction, for an individual type and for small-scale and smallest-scale plants.

## Included activities start
From water pumped up from a lower to an upper reservoir.

## Included activities end
The activity ends with 1 kWh of high voltage electricity produced at the power plant and arrived at the busbar.

The dataset includes the use of pump energy (electricity, high voltage), lubricant oil, the volume of the reservoir, the mass of water passing through the turbines and an estimation of greenhouse gas emissions out of the water reservoir.

The dataset doesn"t include an analysis of net greenhouse gas emissions (due to a lack of respective information) and the hydrological and biological impacts are only rudimentary included via land use (occupation and transformation) data.

## Geography
Data represent the average of a characteristic sample of Swiss reservoir hydropower plants, valid for pumped storage hydro power plants.

## Technology
Definition of pumped storage in this dataset: The water is not being pumped for circulation reasons, but for increasing the inflow of a reservoir. Net production is the gross production minus about 1% losses. Additionally there is energy needed for pumping. The efficiency of a pumped storage hydropower plant is around 70% (p.14 in Bauer et al. 2007).

## Time period
The Annual Production Volume is valid for the year 2011.

## Parameters
- gross electricity production: 0 kWh; name gross_electricity
  Literature value/statistics. For all OECD countries, the OECD iLibrary 2014 provides data on electricity production with pumped storage hydropower plants (gross values 2012).
  For all non-OECD countries and the world, this value was not explicitely given in any statistics. However, the IEA electricity information 2014 provides data on total electricity production with hydropower, while the IEA Energy balances of non-OECD countries provides data on electricity production with hydropower excluding pumped storage.
  OECD. 2014. IEA Electricity Information Statistics: OECD - Electricity and heat generation. OECD iLibrary. Online database. DOI : 10.1787/elect-data-en
  IEA/OECD. 2014. Electricity Information 2014. Table 1.2. International Energy Agency (IEA), Paris Cedex (FR).
  IEA/OECD. 2014. Energy balances of non-OECD countries 2014. Part II. International Energy Agency (IEA), Paris Cedex (FR).
- lifetime: 150 year; lognormal variance with pedigree 0.0014, pedigree (2,2,1,3,1)
  Estimation based on experiences.
  nan
- losses from gross electricity production: 0.01 dimensionless; name losses_gross_net; lognormal variance with pedigree 0.003225, pedigree (3,3,1,2,1)
  Literature value. Generic value taken from the IEA Electricity information 2014, part I, p. I.7: "The difference between gross and net electricity production is generally observed to be about 7% for conventional thermal stations, 1% for hydro stations and 6% for nuclear."
  IEA/OECD. 2014. Electricity Information 2014. International Energy Agency (IEA), Paris Cedex (FR).
  nan
  Uncertainty: G

## Reference product
- electricity, high voltage: 1 kWh; By-product classification allocatable product; CPC 17100: Electrical energy; HS2017 271600: Electrical energy
  Estimation. This dataset is based on data of Swiss reservoir power plants. Due to the fact that pumped storage power plants do not produce hydro-electricity, the amount of electricity provided is assigned to a separate module. The creation of such a module was not possible, because no differentiation between reservoir and pumped storage power plant was made in the considered power plant sample. Separating the expenditures for the construction of the power plant is neither possible nor reasonable; therefore the same infrastructure module is used as for the construction of a reservoir power plant. As reference factor the net energy production of the reservoir power plant is used.
  production volume 0 kWh; name apv_electricity; = gross_electricity*(1-losses_gross_net)
    Literature value/calculated value. Valid for 2011.
    Based on Stolz&Frischknecht 2015, Tables 3.7, 3.6 and the SBB railway electricity mix from Itten et al. 2012 Table 3.182.
    Stolz, P., Frischnkecht, R. 2015. Umweltbilanz Strommix Schweiz 2011. Issued by treeze Ltd. for the Federal Office for the Environment, Switzerland.
    Itten, R., Frischknecht, R., Stucki, M. 2012. Life Cycle Inventories of Electricity Mixes and Grid. ESU-services Ltd., fair conulting in sustainability, Uster.
  property price 0.0977 EUR2005
    Temporary price data. Calculated as 90% of purchasers price based on: 94% of the average price (to account for a 6% loss in transformation and transmission) for electricity for industrial consumersin 2005 (excluded taxes). From IEA.
  properties: carbon allocation 0 kg, carbon content 0

## Inputs from technosphere
- electricity, high voltage: 1.43 kWh; source Bolliger, R. 2007, p. Tab. 4.3, p.41 +Tab. 5.3 p.44; lognormal variance with pedigree 0.05, pedigree (1,1,5,5,3)
  Estimation. The electricity source for pumping is not known. Hence the electricity mix of this geography is assumed to be used as pump electricity.
- hydropower plant, reservoir, alpine region: 2.10199e-13 unit; lognormal variance with pedigree 0.211, pedigree (5,5,5,5,5)
  Literature value/calculated value. The needed amount of infrastructure per kWh produced is calculated with the lifetime and the annual net energy production (16500GWh/a). The global value represents a weighted average of alpine and non-alpine reservoir pumped storage plants.
- hydropower plant, reservoir, non-alpine regions: 1.93841e-13 unit; lognormal variance with pedigree 0.211, pedigree (5,5,5,5,5)
  (same comment as for hydropower plant, reservoir, alpine region)
- lubricating oil: 7.56e-6 kg; name lubricating_oil; = 0.000009*0.84; source Vögtlin H. J. 2002, p. Tab. 5.3 p.44 in Bolliger 2007; lognormal variance with pedigree 0.132, pedigree (1,1,5,5,1)
  Estimation. This exchange has been taken over from a dataset for a Swiss reservoir power plant without pumping. For the consumption of lubricating oil during plant operation no data was available. It is assumed that both turbines and run-of-river plants need the same amount of oil hence the information about lubricating oil consumption of run-of-rivers is adopted. A consumption of lubricating oil for turbines of 9 liters per GWh is estimated. With an oil density of 0.84 kg/l this amounts to 0.007 g/kWh. The lubricating oil is in a closed loop system (i.e. cannot get into the turbined water system) and is disposed annualy as waste oil in a hazardous waste treatment plant.
  properties: carbon content, fossil 0.75, dry mass 1 kg, heating value, net 40.2 MJ, wet mass 1 kg
  note on carbon content, fossil: Lubricating oil is produced from diesel. C-content/dry mass of fats and oils considered 75%, from: ecoinvent v2.2 report, n 15a, pg 40
  note on heating value, net: Literature value, Source: IPCC 2006, 2006 IPCC Guidelines for National Greenhouse Gas Inventories, Prepared by the National Greenhouse Gas Inventories Programme, Eggleston H.S., Buendia L., Miwa K., Ngara T. and Tanabe K. (eds). Published: IGES, Japan
- waste mineral oil: -7.56e-6 kg; name waste_oil; = lubricating_oil; lognormal variance with pedigree 0.102, pedigree (1,1,3,5,3)
  Estimation. This dataset is based on data of Swiss reservoir power plants. The lubricating oil is in a closed loop system (i.e. cannot get into the turbined water system) and is disposed annualy as waste oil in a hazardous waste treatment plant. The information given is based on own assumptions.
  production volume; = apv_electricity* waste_oil
    Calculated from the production volume of electricity, high voltage in proportion to the respective output amounts.
  properties: carbon content, fossil 0.864444, dry mass 0.9 kg, heating value, net 34.7 MJ, water content 0.111111, wet mass 1 kg
  note on carbon content, fossil: Tab A.6, ecoinvent v2.2 report 13_I. C content has been calculated after data in the tables, and then referred to 1 kg DM
  note on heating value, net: Value taken from the general comment of the treatment dataset.

## Inputs from nature
- Occupation, lake, artificial [natural resource, land]: 0.018 m2*year; = transformation_from*lifetime; lognormal variance with pedigree 0.09, pedigree (1,1,5,5,3)
  Calculated value
- Transformation, from unspecified [natural resource, land]: 0.00012 m2; name transformation_from; source Bolliger, R. 2007, p. Tab. 4.3, p.41 +Tab. 5.3 p.44; lognormal variance with pedigree 0.17, pedigree (1,1,5,5,3)
  Standard values for landuse are assumed.
  The original state before setting up the reservoir has to be classified as module "transformation, from unspecified" due to the fact that various types of flooded ground can be distinguished. The flooded area partly consisted of alpine meadows and grazing land, rarely also villages had to be resettled; often impassable, rocky alpine valleys and gorges were filled with water, where only marginal vegetation and no agricultural use was possible. The definition of the character and the environmental value (e.g. forest, areas with rare mushrooms, moorlands, etc.) of the affected areas were not possible, due to the lack of information.
  Literature value/calculated value. This exchange amount is taken over from datasets for both alpine (2.3E-5) and non-alpine (2.3E-4) reservoirs. For the global dataset, the amount is calculated as weighted average of pumped storage plants alpine/non-alpine type. Regarding reservoir power stations, land (i.e. meadows, moorlands, gravel areas etc.) is mainly occupied by reservoirs. Averaged over the investigated sample and distributed over life time the specific land use amounts to 0.0035 m2a/kWh; the transformation of land amounts to 0.000023 m2/kWh (alpine reservoirs). These values are multiplied by a factor 10 for non-alpine reservoirs..
- Transformation, to industrial area [natural resource, land]: 1.22e-6 m2; name transformation_to_industrial; lognormal variance with pedigree 0.17, pedigree (1,1,5,5,3)
  Literature value/calculated value. This exchange amount is taken over from datasets for both alpine (2.3E-7) and non-alpine (2.3E-6) reservoirs. For the global dataset, the amount is calculated as weighted average of pumped storage plants alpine/non-alpine type. Regarding reservoir power stations, land (i.e. meadows, moorlands, gravel areas etc.) is mainly occupied by reservoirs. Averaged over the investigated sample and distributed over life time the specific land use amounts to 0.0035 m2a/kWh; the transformation of land amounts to 0.000023 m2/kWh (alpine reservoirs). These values are multiplied by a factor 10 for non-alpine reservoirs..
- Transformation, to lake, artificial [natural resource, land]: 0.00011878 m2; = transformation_from-transformation_to_industrial; source Bolliger, R. 2007, p. Tab. 4.3, p.41 +Tab. 5.3 p.44; lognormal variance with pedigree 0.17, pedigree (1,1,5,5,3)
  Literature value/calculated value. This exchange amount is taken over from datasets for both alpine (2.3E-5) and non-alpine (2.3E-4) reservoirs. For the global dataset, the amount is calculated as weighted average of pumped storage plants alpine/non-alpine type. Regarding reservoir power stations, land (i.e. meadows, moorlands, gravel areas etc.) is mainly occupied by reservoirs. Averaged over the investigated sample and distributed over life time the specific land use amounts to 0.0035 m2a/kWh; the transformation of land amounts to 0.000023 m2/kWh (alpine reservoirs). These values are multiplied by a factor 10 for non-alpine reservoirs..
- Volume occupied, reservoir [natural resource, in water]: 0.15 m3*year; source Eidg. Amt für Wasserwirtschaft (BWW) 1991; lognormal variance with pedigree 0.17, pedigree (1,1,5,5,3)
  Calculated value. This exchange has been taken over from a dataset for a Swiss reservoir power plant without pumping. The usable capacity of reservoirs is an important figure both for significant water supply regions and for the definition of ecological relevant indices. First of all the usable capacity is a measurement for the rearrangement of the runoff regime over time, i.e. the amount of water detracted temporarily from the natural water cycle and returned to the surface waters with delay. Depending on the type of reservoir (daily, monthly, annual reservoir) the delay takes less or more time. Second, the usable capacity of reservoirs is a measurement for the occupied volume of reservoirs. Thereby, the volume of the fluctuation area is considered, i.e. not the total reservoir volume.
- Water, turbine use, unspecified natural origin [natural resource, in water]: 4.3 m3; name water_turbine_use_UNO_input; lognormal variance with pedigree 0.05, pedigree (1,1,5,5,3)
  Calculated value. This exchange has been taken over from a dataset for a Swiss alpine reservoir power plant without pumping for the alpine type pumped storage plants. For non-alpine type plants, the amount is multiplied by a factor 10. The amount of turbined water equates to the used water amount (i.e. the water amount detracted from the river) less small losses like the evaporation of reservoirs. With respect to the ecological importance the following has to be considered: the turbined amount of water is via physical laws related to the produced amount of electricity, i.e. the turbined amount of water does not provide independent, ecological relevant information. The specific turbined amount of water (in m3/kWh) represents a value that is inversely proportional to the average net head. However, the turbined amount of water is an ecological relevant measurement in terms of representing the water amount that is in parts detracted from the natural water cycle. Based on the Swiss sample the specific turbined water amount accounts for 0.81 m3/kWh.

## Emissions to nature
- Carbon dioxide, from soil or biomass stock [air, non-urban air or from high stacks]: 0.0188137 kg; lognormal variance with pedigree 0.0992, pedigree (5,3,5,4,3)
  Hertwich, E.G. 2013. Addressing Biogenic Greenhouse Gas Emissions from Hydropower in LCA. Environmental Sciency&Technology, 47, 9604-9611
  Literature value/calculated value. Hertwich 2013 provides an analysis of greenhouse gas emissions from hydropower plants. 89 data points are available for temperate non-alpine plants, from which the average CO2 and CH4 emissions are calculated. Only 10 data points are available for temperate alpine plants which seem not to be representative, so that the greenhouse gas emissions from version 3.1 are kept. The value in the global dataset for pumped hydrpower is calculated as production volume weighted average of alpine and non-alpine type pumped storage plants.
- Dinitrogen monoxide [air, non-urban air or from high stacks]: 4.0059e-8 kg; source Dones R. 1996, p. Tab. 4.3, p.41; lognormal variance with pedigree 0.14, pedigree (1,1,5,5,3)
  Calculated value. This exchange has been taken from a dataset for a Swiss alpine reservoir power plant without pumping. Total emissions of greenhouse gases are assumed to be 0.3 CO2equivalents per kWh. Dinitrogen monoxide emissions (N2O) emerge from nitrification and denitrification processes. Based on measurements of Swiss natural lakes, gross dinitrogen monoxide emissions amount to 8-16 umol per m2 and per day. Because of the limited nitrification and denitrification processes at reservoirs in Switzerland, a maximum value of N2O-emissions ranging from 0.24 to 2.4 umol/m2 can be estimated. As a result N2O-emissions between 1.4.10^-5 and 1.4.10^-4 g N2/kWh, respectively 0.004 - 0.04 g CO2-equivalent/kWh with an average value of 7.7.10^-5 g/kWh of N2O are calculated.
- Methane, non-fossil [air, non-urban air or from high stacks]: 0.00011 kg; lognormal variance with pedigree 0.0992, pedigree (5,3,5,4,3)
  (same comment as for Carbon dioxide, from soil or biomass stock)
- Water [air, unspecified]: 0.0292217 m3; name water_to_air_unspecified; lognormal variance with pedigree 0.0487, pedigree (2,2,4,1,1)
  Calculated value based on literature values and expert opinion. See comments in the parametres" comment field.
  property fraction, origin: fresh water 1; name fraction_origin_fresh_water_Ww
  property fraction, origin: salt water 0; name fraction_origin_salt_water_Ww
  property fraction, origin: unspecified 0; name fraction_origin_unspecified_Ww
- Water [water, unspecified]: 4.27078 m3; name water_to_water_unspecified; = water_turbine_use_UNO_input-water_to_air_unspecified; lognormal variance with pedigree 0.130025, pedigree (4,4,5,2,4)
  (same comment as for Water)
  property fraction, origin: fresh water 1; name fraction_origin_fresh_water
  property fraction, origin: salt water 0; name fraction_origin_salt_water
  property fraction, origin: unspecified 0; name fraction_origin_unspecified

## Sampling procedure
Sampling procedure based on literature. Some information regarding the results is given without source notes or detailed, comprehensible derivation due to the guaranteed confidential treatment of data.

## Extrapolations
This dataset has been extrapolated from an original dataset covering the geography CH (Switzerland), which in his turn is extrapolated from a dataset for electricity production in a reservoir plant without pumping. The uncertainty has been adjusted accordingly.

## Review by Carl Vadenbo 2015-07-14
The update of the whole electricity sector for the ecoinvent v3.2 database consist of hundreds of datasets. All these datasets have passed through a streamlined review processes where the underlying modelling of production volumes, technology shares and efficiencies was reviewed in detail prior to the datasets being submitted to the database.
