# power block installation, solar tower power plant, 20 MW

Dataset: EcoSpold 2, unit process
Geography: RoW
Time period: 2010-01-01 to 2023-01-01
Technology level: current
Classification: ISIC rev.4 ecoinvent: 4220:Construction of utility projects
Tags: CSP; Concentrated Solar Power
Scenario: Business-as-Usual
System model: Allocation, cut-off by classification
Generated by: Karin Treyer
Published in: Telsnig, Thomas 2015
Database: ecoinvent
isCopyrightProtected: true
accessRestrictedTo: 1

## General comment
This activity represents the components involved for the setting up of a power block unit for electricity production with a 20 MW concentrated solar power tower plant in Upington, South Africa. The main components are pressure vessels, compressors, heat exchangers with cooling towers, steam turbine and the generators.
This dataset is entirely based on the detailed life cycle inventory as presented in the dissertation report by
Telsnig, Thomas. 2015. Standortabhängige Analyse und Bewertung solarthermischer Kraftwerke am Beispiel Südafrikas. Forschungsbericht. Band 123. ISSN 0938-1228. Institut für Energiewirtschaft und Rationelle Energieanwendung, Universität Stuttgart, Germany.

## Included activities start
The activity starts with the assembly of all needed components of the power block.

## Included activities end
The activity concludes when the solar power plant is decomissioned.

## Geography
This dataset has been extrapolated from a dataset modelled for the location Upington, South Africa. Uncertainty has not been adjusted as it is assumed that the modelled 20 MW solar tower power plant would be very similar in other parts of the world.

## Technology
Short description of components:
condensate - 3 x 50 %, 2400 gpm, 301 ft tdh, 114 oF, 250 bhp motor, 480 V 1750 rpm, multi-stage vertical turbine, mounted in below-grade cans (Solana: 200 bhp; $161,000)
Feedwater - 3 x 50 %, 3200 gpm, 4525 ft tdh, 312 oF, 4500 bhp 4.16 kV motor, variable speed drive, multi-stage horizontal turbine (Solana: 1,000 bhp; $583,000)
Component Cooling Water - 2 x 100 %, 9600 gpm, 225 ft tdh, 650 bhp, 4.16 kV Double suction, single state, horizontal split case, centrifugal Cast iron case and impeller
Turbine Oil Pit Sump - 25 gpm, 50 ft tdh, 3/4 bhp, 480 V, 1750 rpm Positive displacement, with level switch
Oily Waste Sump - 100 gpm, 50 ft tdh, 2 bhp, 480 V, 1750 rpm Positive displacement, with level switch
Fire Water - 1000 gpm, 300 ft tdh, 125 bhp motor, 480 V Single stage centrifugal, NFPA access and control panel
Air Compressors - 2 x 100 %, rotary schromiumew compressor 750 actual ft3/min delivery, 110 psig, 200 bhp, 480 V Inter- and after-coolers, carbon steel shell, stainless steel tubes Cooling water - 20 gpm, 10 psi
vacuum Pumps - 900 actual ft3/min, 300,000 ft total developed head 75 bhp motor, single stage, positive displacement with liquid seal rotor Discharge with water trap silencer
Gland Steam concretedenser Air Exhauster - Horizontal shaft axial blower 500 ft3/min, 5,000 ft total developed head, 7.5 bhp motor, 480 V
Generator - 2 pole, air cooled, 490 MVA, 0.9 lagging power factor 13.8 kV, 20500 A each phase
Turbine Generator Package: Steam Turbine - 2 cylinder (HP and IP/LP), downward exhaust
440 MWe, 1800 rpm, 1815 psia / 1,005 F / 1,005 F, 2.5 in. HgA exhaust
3,450,000 lb/hr main steam flow rate
Generator - 2 pole, air cooled, 490 MVA, 0.9 lagging power factor
13.8 kV, 20500 A each phase
Exciter - Direct drive, solid state
Turbine turbine gear and motor
Automatic voltage and stability control panel
Generator gas control panel
Lube oil reservoir - 10,000 gallons, carbon steel tank
Lube oil coolers - Straight tube / straight shell, 300 gpm oil flow
Lube oil vapor extractor - 15 bhp, 175 cfm
Primary oil pumps - Vertical centrifugal, single stage pump
250 bhp, 480 V motor, mounted on oil reservoir
Emergency oil pumps - Vertical centrifugal, single stage pump
250 bhp, 125 V DC motor, mounted on oil reservoir
Turning gear oil pumps - Vertical centrifugal, single stage pump
50 bhp, 480 V motor, mounted on oil reservoir
Jacking oil pumps - Positive displacement, horizontal
50 bhp, 480 V motor, mounted on oil reservoir
Electro-hydraulic control unit - Skid mounted with oil reservoir Seal oil pumps - 150 gpm, 200 ft total developed head, 25 bhp, 480 V
Cast iron case, carbon steel shaft and impeller, TEFC motor"

## Reference product
- power block, solar tower power plant, 20 MW: 1 unit; name RP_amount_1; By-product classification allocatable product; CPC 53262: Power plants
  Reference product unit for construction of a power block for a 20MW solar tower plant
  production volume 1 unit; name RP_PV_1
    Data about concentrating solar power plants in operation, construction and development globally are available from SolarPACES (https://solarpaces.nrel.gov/, accessed April 2019). On average 2 solar tower concentrating solar power plants per year went in operation worldwide between 2010 and 2019. This includes plants with an installed capacity other than 20MW and is used as approximate annual production volume for this dataset.
  property lifetime 30 year
    The economic lifetime of the plant is assumed to be 30 years.
  property price 2.4e7 EUR2005
    Telsnig 2015: Investment cost for the powe block of a 20MW CSP solar tower plant in South Africa (EUR2010) with limited storage capacity (see Table 4-4 in Telsnig, 2015).
    Reference(s): Telsnig, Thomas. 2015. Standortabhängige Analyse und Bewertung solarthermischer Kraftwerke am Beispiel Südafrikas. Forschungsbericht. Band 123. ISSN 0938-1228. Institut für Energiewirtschaft und Rationelle Energieanwendung, Universität Stuttgart, Germany.
  properties: carbon allocation 0 kg, carbon content 0

## Inputs from technosphere
- alkyd paint, white, without solvent, in 60% solution state: 125.552, 26.448 kg (2 suppliers, which the file names only by identifier); sum of these 152 kg; lognormal variance with pedigree 0.0197, pedigree (4,4,4,3,2)
  Paint to prevent rust of structural steel materials
  properties: carbon content, fossil 0.140367, carbon content, non-fossil 0.199629, dry mass 1 kg, heating value, net 10.3 MJ, wet mass 1 kg
  note on carbon content, fossil: C content was calculated as an addition of C content in the raw materials.
- aluminium, cast alloy: 40 kg; name aluminium_castalloy; lognormal variance with pedigree 0.0197, pedigree (4,4,4,3,2)
  Aluminium supplied for providing rolling sheets
  properties: dry mass 1 kg, wet mass 1 kg
- aluminium, wrought alloy: 340334 kg; name aluminium; lognormal variance with pedigree 0.0197, pedigree (4,4,4,3,2)
  Mainly supplied for meta working as coating in compressors, pumps etc
  properties: dry mass 1 kg, wet mass 1 kg
- brass: 1.99, 0.01 kg (2 suppliers, which the file names only by identifier); sum of these 2 kg; lognormal variance with pedigree 0.0197, pedigree (4,4,4,3,2)
  Used as red brass in transformer power distribution
  properties: dry mass 1 kg, wet mass 1 kg
- cast iron: 67659 kg; name castiron; lognormal variance with pedigree 0.0197, pedigree (4,4,4,3,2)
  Used in material composition of pumps, compressors, turbines
  properties: carbon content, fossil 0.04, dry mass 1 kg, wet mass 1 kg
  note on carbon content, fossil: Cast iron is made by remelting pig iron in small furnaces (e.g. cupola furnaces or electric arc furnaces) and poured into moulds to make castings. It usually contains 2% to 6% carbon (ecoinvent v2.2 report 10_partII). An average content of 4% was considered
- cast iron removed by milling, average: 7484 kg; lognormal variance with pedigree 0.0197, pedigree (4,4,4,3,2)
  Process of milling cast iron
  properties: carbon content, fossil 0.04, dry mass 1 kg, wet mass 1 kg
- ceramic tile: 1615 kg; name ceramic; lognormal variance with pedigree 0.0197, pedigree (4,4,4,3,2)
  Porcelain materials in transformer electrical appliances
  properties: dry mass 1 kg, wet mass 1 kg
- chromium steel removed by milling, average: 7960 kg; lognormal variance with pedigree 0.0197, pedigree (4,4,4,3,2)
  Process of milling chromesteel
  properties: carbon content, fossil 0.0008, dry mass 1 kg, wet mass 1 kg
- concrete, normal strength: 138.209, 30.35, 47.9709, 26.3606, 585.276, 245.705, 291.271, 10419.9 m3 (8 suppliers, which the file names only by identifier); sum of these 11785 m3; lognormal variance with pedigree 0.0197, pedigree (4,4,4,3,2)
  Main application in turbine-generator foundation and cooling tower foundation.
  properties: dry mass 2190 kg, water content 0.086758, wet mass 2380 kg
- copper, cathode: 10338 kg; name copper; lognormal variance with pedigree 0.0197, pedigree (4,4,4,3,2)
  Copper supplied for field wiring cables etc.
  properties: dry mass 1 kg, wet mass 1 kg
- drawing of pipe, steel: 1.27112e6 kg; lognormal variance with pedigree 0.0197, pedigree (4,4,4,3,2)
  Process done to draw pipes from steel.
- electricity, high voltage: 3.16761, 75.4512, 277.552, 113.539, 67.9818, 6323.58, 9.77647, 8.94225, 30211.3, 182.581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 kWh (36 suppliers, which the file names only by identifier); sum of these 161136 kWh; lognormal variance with pedigree 0.0197, pedigree (4,4,4,3,2)
  Electrical energy needed for processing of materials and assembly of the power block
- excavation, hydraulic digger: 300 m3; lognormal variance with pedigree 0.0197, pedigree (4,4,4,3,2)
  Excavation and backfilling. The digger is a removable unit. All the soil dislocated for initial construction is put back. Hence no end of life calculation is needed.
- expanded perlite: 118204 kg; name expandedperilite; lognormal variance with pedigree 0.0197, pedigree (4,4,4,3,2)
  Expanded perilite used for insulation
  properties: dry mass 1 kg, wet mass 1 kg
- extrusion, plastic pipes: 358 kg; lognormal variance with pedigree 0.0197, pedigree (4,4,4,3,2)
  High density polyethylene used for extrusion plastic pipes for underground concretenectivity
- glass fibre: 155 kg; name glassfibre; lognormal variance with pedigree 0.0197, pedigree (4,4,4,3,2)
  Material composition used in fuel oil storage, sand filters, and service water storage
  properties: dry mass 1 kg, wet mass 1 kg
- glass fibre reinforced plastic, polyamide, injection moulded: 327879 kg; name glassfibrereinforced; lognormal variance with pedigree 0.0197, pedigree (4,4,4,3,2)
  Material composition of cooling towers and ventilators etc.
  properties: carbon content, fossil 0.446018, dry mass 1 kg, wet mass 1 kg
- hazardous waste, for incineration: -3727.57, -1792.57, -46.8568 kg (3 suppliers, which the file names only by identifier); sum of these -5567 kg; = silicone_product; lognormal variance with pedigree 0.0137, pedigree (4,4,3,3,2)
  Disposal of the oil used for the initial filling and during operation of the pumps and transformers. Calculated based on the environmental product declarations for pumps as provided by Sulzer and for transformers as provided by ABB.
  Sulzer EPDs: https://www.sulzer.com/en/shared/about-us/2017/08/10/13/22/environmental-product-declarations (accessed May 2019)
  ABB library: https://library.abb.com/en/ (accessed May 2019)
  production volume; = RP_PV_1 * (BP_amount_10 / RP_amount_1)
    Calculated from production volume of reference product using the relative outputs.
  properties: carbon content, fossil 0.554667, dry mass 0.75 kg, heating value, net 17 MJ, water content 0.333333, wet mass 1 kg
  note on carbon content, fossil: Tab A.6, ecoinvent v2.2 report 13_I. C content has been calculated after data in the tables, and then referred to 1 kg DM
  note on heating value, net: Value taken from the general comment of the treatment dataset.
- heat, district or industrial, other than natural gas: 15791 MJ; lognormal variance with pedigree 0.0197, pedigree (4,4,4,3,2)
  Heat energy used during assembly of the power block.
  properties: corresponding fuel use, propane, furnace >100kW 1.05263 MJ, heating value, net 1 MJ
  note on corresponding fuel use, propane, furnace >100kW: Lower heating value of the fuel input related to the heat/electricity output, taken directly from ecoinvent v3.0 dataset "heat production, natural gas, at industrial furnace >100kW, GLO 2000".
- injection moulding: 7 kg; = polystyrene; lognormal variance with pedigree 0.0197, pedigree (4,4,4,3,2)
  Process to obtain polystyrene
- iron-nickel-chromium alloy: 22978 kg; name alloy; lognormal variance with pedigree 0.0197, pedigree (4,4,4,3,2)
  Material composition in steam turbines
  properties: dry mass 1 kg, wet mass 1 kg
- kraft paper: 16.3178, 130.682 kg (2 suppliers, which the file names only by identifier); sum of these 147 kg; lognormal variance with pedigree 0.0197, pedigree (4,4,4,3,2)
  Used as a proxy for electrical insulation paper
  properties: carbon content, fossil 0.0020219, carbon content, non-fossil 0.41662, dry mass 0.945 kg, heating value, net 14.11 MJ, water content 0.0582011, wet mass 1 kg
  note on carbon content, fossil: Fossil C content was calculated after fossil C contents of chemicals used in the production of the paper (in Tab 9.4 ecoinvent v2.2 report 11_III, part 9).
  note on carbon content, non-fossil: Biogenic C content was calculated after biogenic C contents of chemicals used in the production of the paper (in Tab 9.4 ecoinvent v2.2 report 11_III, part 9). The cellulose content in 1 kg of paper (on a wet mas basis) was estimated as (1-chemical content), C content of cellulose was considered 0.44 kgC/kg dry mass (ecoinvent v2.2 report, n 15a, pg 40)
- metal working, average for aluminium product manufacturing: 340290 kg; lognormal variance with pedigree 0.0197, pedigree (4,4,4,3,2)
  Coating in compressors, pumps.
- molybdenum: 574 kg; lognormal variance with pedigree 0.0197, pedigree (4,4,4,3,2)
  Material composition in steam turbines
  properties: dry mass 1 kg, wet mass 1 kg
- particleboard, cement bonded: 37.1303, 43.8697 m3 (2 suppliers, which the file names only by identifier); sum of these 81 m3; lognormal variance with pedigree 0.0197, pedigree (4,4,4,3,2)
  Used in pumps to prevent leakage
  properties: carbon content, fossil 0.0240148, carbon content, non-fossil 0.139276, dry mass 1176.78 kg, heating value, net 5765.37 MJ, water content 0.0197355, wet mass 1200 kg
- polyethylene, high density, granulate: 1416 kg; name polyethylene; lognormal variance with pedigree 0.0197, pedigree (4,4,4,3,2)
  Used for pneumatic tubing etc.
  properties: carbon content, fossil 0.857143, dry mass 1 kg, heating value, net 42.47 MJ, wet mass 1 kg
  note on carbon content, fossil: Polyethylene is formed out of a huge amount of ethylene monomers (C2H4) (ecoinvent v2.2 report 11_II). MW=28 g/mol
- polystyrene, high impact: 7 kg; name polystyrene; lognormal variance with pedigree 0.0197, pedigree (4,4,4,3,2)
  Used in air compressors
  properties: carbon content, fossil 0.923077, dry mass 1 kg, heating value, net 38.67 MJ, wet mass 1 kg
- polyvinylchloride, bulk polymerised: 3 kg; name pvc; lognormal variance with pedigree 0.0197, pedigree (4,4,4,3,2)
  Used in hypochlorinator
  properties: carbon content, fossil 0.387097, dry mass 1 kg, heating value, net 21.5 MJ, wet mass 1 kg
  note on carbon content, fossil: Monomer is vynyl chloride, C2H3Cl (ecoinvent v2.2 report 11_II). MW=62 g/mol
- reinforcing steel: 1.55787e6 kg; name steel; lognormal variance with pedigree 0.0197, pedigree (4,4,4,3,2)
  Used in construction of tanks, columns and vessels etc
  properties: carbon content, fossil 0.004, dry mass 1 kg, wet mass 1 kg
- sand: 0.574947, 0.00688398, 37.4152, 0.00298486 kg (4 suppliers, which the file names only by identifier); sum of these 38 kg; lognormal variance with pedigree 0.0197, pedigree (4,4,4,3,2)
  Used in sand filters
  properties: dry mass 1 kg, wet mass 1 kg
- scrap aluminium: -227339, -107969, -5065.67 kg (3 suppliers, which the file names only by identifier); sum of these -340374 kg; = (aluminium + aluminium_castalloy); lognormal variance with pedigree 0.0137, pedigree (4,4,3,3,2)
  aluminium disposal
  production volume; = RP_PV_1 * (BP_amount_6 / RP_amount_1)
    Calculated from production volume of reference product using the relative outputs.
  properties: dry mass 1 kg, wet mass 1 kg
- scrap copper: -6904.85, -3279.29, -153.857 kg (3 suppliers, which the file names only by identifier); sum of these -10338 kg; = copper; lognormal variance with pedigree 0.0137, pedigree (4,4,3,3,2)
  Scrap copper sent for municipal incineration
  production volume; = RP_PV_1 * (BP_amount_2 / RP_amount_1)
    Calculated from production volume of reference product using the relative outputs.
  properties: dry mass 1 kg, wet mass 1 kg
- section bar rolling, steel: 204815 kg; lognormal variance with pedigree 0.0197, pedigree (4,4,4,3,2)
  Process for using zinc to coat materials. Indicates galvanization.
- sheet rolling, aluminium: 40 kg; = aluminium_castalloy; lognormal variance with pedigree 0.0197, pedigree (4,4,4,3,2)
  Process done for coating using aluminium
- sheet rolling, chromium steel: 41 kg; lognormal variance with pedigree 0.0197, pedigree (4,4,4,3,2)
  Process done for coating using chromium steel
- sheet rolling, steel: 236 kg; lognormal variance with pedigree 0.0197, pedigree (4,4,4,3,2)
  Process done for coating using steel
- silicone product: 1834.13, 3732.87 kg (2 suppliers, which the file names only by identifier); sum of these 5567 kg; lognormal variance with pedigree 0.0197, pedigree (4,4,4,3,2)
  Used in pumps for prevention of mositure entry. End of life is neglected
  properties: carbon content, fossil 0.324324, dry mass 1 kg, heating value, net 9.83 MJ, wet mass 1 kg
- steel removed by milling, average: 24613 kg; lognormal variance with pedigree 0.0197, pedigree (4,4,4,3,2)
  Process of milling steel
  properties: carbon content, fossil 0.0025, dry mass 1 kg, wet mass 1 kg
- steel, chromium steel 18/8, hot rolled: 13010 kg; name chromesteel; lognormal variance with pedigree 0.0197, pedigree (4,4,4,3,2)
  Material composition in pumps, compressors etc.
  properties: carbon content, fossil 0.0008, dry mass 1 kg, wet mass 1 kg
  note on carbon content, fossil: Stainless steel model is the grade 304 steel (18/8 stainless, 18% chromium 8% nickel; max. 0.08% C)
- steel, low-alloyed: 260143 kg; name lowsteel; lognormal variance with pedigree 0.0197, pedigree (4,4,4,3,2)
  Material composition of cooling tower, pumps etc
  properties: carbon content, fossil 0.005, dry mass 1 kg, wet mass 1 kg
- synthetic rubber: 3 kg; name rubber; lognormal variance with pedigree 0.0197, pedigree (4,4,4,3,2)
  Used for heat absorption
  properties: carbon content, fossil 0.871949, dry mass 1 kg, heating value, net 26.42 MJ, wet mass 1 kg
  note on carbon content, fossil: EPDM (Ethylene-propene-diene terpolymer) rubber is a terpolymer of ethylene, propene, and a diene with the residual unsaturated portion of the diene in the side chain (ecoinvent v2.2 report 7-part XX & Ullmann). Chemical formula (deduced from Evidences of Solvent-Induced Miscibility in Polychloroprene-co-Ethylene-Propene Diene Terpolymer Blends, Dubey et al., Journal of Applied Polymer Science, 2009, 111:1884–1891): C20H35
- tap water: 19.7577, 30.119, 151.4, 18.2245, 759.482, 8691.13, 6489.88 kg (7 suppliers, which the file names only by identifier); sum of these 16160 kg; lognormal variance with pedigree 0.0197, pedigree (4,4,4,3,2)
  Used in the manufacturing process of pumps.
  properties: carbon content, fossil 0.00178991, dry mass 0.000337476 kg, water content 2962.17, wet mass 1 kg
  note on carbon content, fossil: Bicarbonate content is 2.93 mol/m3. CO2 content is 0.1 mol/m3 (ecoinvent v2.2 report 8, Tab 93.1).
- transformer, high voltage use: 227 kg; lognormal variance with pedigree 0.0197, pedigree (4,4,4,3,2)
  Transformer setup including substations and primary power distribution sources.
  properties: carbon content, fossil 0.262798, dry mass 1 kg, wet mass 1 kg
- waste concrete: -1.79189e6, -2.44268e7, -6335.43 kg (3 suppliers, which the file names only by identifier); sum of these -2.6225e7 kg; = (concrete+particleboard)*2200 +(expandedperilite+ceramic); lognormal variance with pedigree 0.0137, pedigree (4,4,3,3,2)
  Disposal of concrete. The density is assumed to be 2200kg/m3.
  production volume; = RP_PV_1 * (BP_amount_4 / RP_amount_1)
    Calculated from production volume of reference product using the relative outputs.
  properties: dry mass 0.5 kg, water content 1, wet mass 1 kg
- waste glass: -0.0510523, -154.553, -0.000439005, -0.00470538, -0.3904, -0.000106749, -0.000666653 kg (7 suppliers, which the file names only by identifier); sum of these -155 kg; = glassfibre; lognormal variance with pedigree 0.0137, pedigree (4,4,3,3,2)
  Disposal of glass fibre
  production volume; = RP_PV_1 * (BP_amount_5 / RP_amount_1)
    Calculated from production volume of reference product using the relative outputs.
  properties: dry mass 1 kg, heating value, net 0.05 MJ, wet mass 1 kg
  note on heating value, net: Value extracted from "treatment of waste glass, open dump, very wet infiltration class (1000mm)"
- waste paint: -16.4478, -135.49, -0.0624891 kg (3 suppliers, which the file names only by identifier); sum of these -152 kg; = paint; lognormal variance with pedigree 0.0137, pedigree (4,4,3,3,2)
  Disposal of waste paint
  production volume; = RP_PV_1 * (BP_amount_1 / RP_amount_1)
    Calculated from production volume of reference product using the relative outputs.
  properties: carbon content, fossil 0.65, dry mass 1 kg, heating value, net 19.7 MJ, wet mass 1 kg
- waste polyethylene/polypropylene product: -92366, -2771.66, -234160 kg (3 suppliers, which the file names only by identifier); sum of these -329298 kg; = polyethylene+glassfibrereinforced+pvc; lognormal variance with pedigree 0.0137, pedigree (4,4,3,3,2)
  Polyethylene disposal
  production volume; = RP_PV_1 * (BP_amount_9 / RP_amount_1)
    Calculated from production volume of reference product using the relative outputs.
  properties: carbon content, fossil 0.748045, dry mass 0.847 kg, heating value, net 42.47 MJ, water content 0.180638, wet mass 1 kg
  note on carbon content, fossil: Mixed various plastics was used to estimate the C content of this waste (Tab A.2, ecoinvent v2.2 report 13_I)
- waste polystyrene: -0.0148691, -0.000165777, -0.000993497, -0.00041035, -7.51366e-5, -6.9649, -0.0185871 kg (7 suppliers, which the file names only by identifier); sum of these -7 kg; = polystyrene; lognormal variance with pedigree 0.0137, pedigree (4,4,3,3,2)
  Disposal of waste polystyrene
  production volume; = RP_PV_1 * (BP_amount_8 / RP_amount_1)
    Calculated from production volume of reference product using the relative outputs.
  properties: carbon content, fossil 0.922579, dry mass 0.998 kg, heating value, net 38.67 MJ, water content 0.00200401, wet mass 1 kg
- waste reinforcement steel: -1.92172e6, -1334.36 kg (2 suppliers, which the file names only by identifier); sum of these -1.92306e6 kg; = (steel+lowsteel+chromesteel+zinc+molybdenum+alloy+brass+castiron); lognormal variance with pedigree 0.0137, pedigree (4,4,3,3,2)
  Disposal of all steel types used combined with cast iron, zinc, brass and molybdenum
  production volume; = RP_PV_1 * (BP_amount_3 / RP_amount_1)
    Calculated from production volume of reference product using the relative outputs.
  properties: dry mass 1 kg, wet mass 1 kg
- waste rubber, unspecified: -0.047881, -1.81155, -1.14057 kg (3 suppliers, which the file names only by identifier); sum of these -3 kg; = rubber; lognormal variance with pedigree 0.0137, pedigree (4,4,3,3,2)
  Disposal of waste rubber
  production volume; = RP_PV_1 * (BP_amount_7 / RP_amount_1)
    Calculated from production volume of reference product using the relative outputs.
  properties: carbon content, fossil 0.853, dry mass 1 kg, heating value, net 27.19 MJ, wet mass 1 kg
- wastewater, unpolluted: -0.0777717, -16.0822 m3 (2 suppliers, which the file names only by identifier); sum of these -16.16 m3; = water/1000; lognormal variance with pedigree 0.0137, pedigree (4,4,3,3,2)
  The amount of tap water input stems from the water consumption reported in the EPDs of the modelled pumps (Sulzer EPDs). It is stated in the EPDs that the water is used for testing purposes. Therefore, it is assumed to be discharged to the sewer system without pollution. Sulzer EPDs: https://www.sulzer.com/en/shared/about-us/2017/08/10/13/22/environmental-product-declarations (accessed May 2019)
  production volume; = RP_PV_1 * (BP_amount_11 / RP_amount_1)
    Calculated from production volume of reference product using the relative outputs.
  properties: carbon content, fossil 0.00178991, carbon content, non-fossil 0.00178991, dry mass 0.337476 kg, water content 2962.17, wet mass 1000 kg
  note on carbon content, fossil: Assumed to be like in tap water. Bicarbonate content is 2.93 mol/m3. CO2 content is 0.1 mol/m3 (ecoinvent v2.2 report 8, Tab 93.1).
- welding, arc, steel: 664 m; lognormal variance with pedigree 0.0197, pedigree (4,4,4,3,2)
  Reinforced steel welded using arc welding
- wire drawing, copper: 3399 kg; lognormal variance with pedigree 0.0197, pedigree (4,4,4,3,2)
  Process used to draw wires for field wiring, cables etc from available copper.
- zinc: 825 kg; lognormal variance with pedigree 0.0197, pedigree (4,4,4,3,2)
  Used for zinc coating
  properties: dry mass 1 kg, wet mass 1 kg
- zinc coat, coils: 13108 m2; lognormal variance with pedigree 0.0197, pedigree (4,4,4,3,2)
  Coating used in cooling tower

## Sampling procedure
This dataset is entirely based on the detailed life cycle inventory as presented in the dissertation report by
Telsnig, Thomas. 2015. Standortabhängige Analyse und Bewertung solarthermischer Kraftwerke am Beispiel Südafrikas. Forschungsbericht. Band 123. ISSN 0938-1228. Institut für Energiewirtschaft und Rationelle Energieanwendung, Universität Stuttgart, Germany.

Further, data in Telsnig 2015 are not shown explicitely for the downscaled 20 MW solar tower power plant. This gap is filled in the ecoinvent report.

## Extrapolations
This dataset has been extrapolated from a dataset modelled for the location Upington, South Africa. The original data modelling a 440 MW power plant have been scaled down with parameter specific linear and non-linear equations to represent a 20 MW plant design. Uncertainty has not been adjusted as it is assumed that the modelled 20 MW solar tower power plant would be very similar in other parts of the world.

## Review by Christopher Oberschelp 2017-03-13
Very detailed, structured and well-documented datasets. Main exchanges have been checked and make sense.
