# electricity production, coal, aluminium industry

Dataset: EcoSpold 2, unit process
Geography: RoW
Time period: 2015-01-01 to 2023-12-31
Technology level: current
Classification: ISIC rev.4 ecoinvent: 3510:Electric power generation, transmission and distribution
Classification: EcoSpold01Categories: hard coal/power plants
Tags: electricity, primary aluminium industry; re-labelling activity
Scenario: Business-as-Usual
System model: Allocation, cut-off by classification
Generated by: Pascal Lesage
Database: ecoinvent
isCopyrightProtected: true
accessRestrictedTo: 1

## General comment
This is a dataset used to create a global aluminium industry specific electricity market. The production volume represents the total amount of electricity from coal used globally for aluminium production (electrolysis and ingot casting).
Electricity markets specific to the aluminium-industry are needed in an LCI database because primary aluminium production is very energy intensive, and hence the location of production plants is often determined by access to large amounts of cheap electricity, which often results in an electricity mix that is different from the general grid mix of the countries where the production plants are located.
It is assumed that the production of electricity in general and in aluminium industry specific power plants is identical. Details on actual electricity generation with each technology can be found in the corresponding datasets.
The share of electricity produced using lignite and hard coal is a weighted average of the share of each coal type in aluminium-producing countries (weighted by coal power consumption for aluminium production). The share in each country is for most countries identical to the split used in ecoinvent v3.2. For countries whose electricity production is not modelled in ecoinvent, coal-based electricity is assumed to be 78% hard coal, 22% lignite (based on 'rest of world' data, i.e. on data representing all regions not covered in ecoinvent v3.2). The share of each country in producing the global amount of coal electricity used in aluminium production was calculated regional data supplied by the International Aluminium Institute [IAI] and the European Aluminium Association [EAA], country-specific aluminium production volumes (source: EAA personal communication, IAI personnal communication) and general grid mix in the respective countries (sources: International Energy Agency or ecoinvent v3.2).
Calculations are detailed in the report 'Calculating grid mixes for the aluminium industry in ecoinvent v3', available on the ecoinvent website.

## Included activities start
Re-labelling dataset, not representing a real transformation activity. Conceptually, the activity can be said to start with the production of electricity.

## Included activities end
Re-labelling dataset, not representing a real transformation activity. Conceptually, the activity can be said to end with a given amount of high voltage electricity labelled as specifically used for the production of electricity.

## Geography
All aluminium producing countries for which there is some coal power used for electrolysis.

## Time period
Production volume updated with 2015 data from IAI

## Reference product
- electricity, high voltage, aluminium industry: 1 kWh; = hard +lig; By-product classification allocatable product; CPC 17100: Electrical energy; HS2017 271600: Electrical energy
  Expressed as sum of contributing technologies (inputs) to allow uncertainty analysis: each technology share is uncertain, and in a Monte Carlo analysis will always be normalized by the sum contribution of each technology
  production volume 7.48657e9 kWh
    The production volume, which is ultimately used to determine the share of coal-based electricity in the downstream market for aluminium industry specific high voltage electricity, is calculated by multiplying the following data:
    (1) public estimates of the electricity mix used to produce aluminium for different 'aluminium production regions' (more or less continent-sized) provided by the International Aluminium Institute (IAI), see http://www.world-aluminium.org/statistics/. These estimates are based on the subset of aluminium producers that provide information to the IAI.
    (2) primary aluminium production volumes, per aluminium production region, also compiled by the IAI.
    (3) electricity requirements, per tonne primary aluminium, for both Söderberg and prebake electrolysis technologies, as well as the proportion of aluminium produced by each technology.
    (4) electricity compensating line and transformation losses from production to consumption as medium voltage electricity, Losses estimated using ecoinvent v3.2 data.
    (5) electricity consumed in ingot casting.
  property price 0.0977 EUR2005
    Calculated in temporary price data. 94% of the average price (to account for a 6% loss in transformation and transmission) for electricity for industrial consumersin 2005 (excluded taxes). From IEA.
  properties: carbon allocation 0 kg, carbon content 0

## Inputs from technosphere
- electricity, high voltage: 0.88712 kWh; name hard; lognormal variance with pedigree 0.008, pedigree (1,1,4,1,1)
  Calculated amount (see general comments).
- electricity, high voltage: 0.11288 kWh; name lig; lognormal variance with pedigree 0.008, pedigree (1,1,4,1,1)
  Calculated amount (see general comments).

## Sampling procedure
International Aluminium Institute (IAI) data used for total electricity used in the production of aluminium that is from coal power plants. ecoinvent data used to split coal-based electricity production to the respective fuels (lignite, hard coal). The cited 93% representativeness is for IAI data (data based on 93% of global aluminium production). The percent representativeness of data used to split hydroelectricity production to different types of plants (national grid proxy) is 91%.

## Extrapolations
For the split of coal-based electricity production to the respective fuels (lignite, hard coal), shares of different types of coal power plants in the countries, when available, were used as a proxy for the split relevant for the aluminium industry, else 'Rest-of-world' split (33% lignite, 67% hard coal) was used, see general comments.
