# treatment of spent nuclear fuel, conditioning

Dataset: EcoSpold 2, unit process
Geography: CN
Time period: 2002-01-01 to 2023-12-31
Technology level: current
Classification: ISIC rev.4 ecoinvent: 3822:Treatment and disposal of hazardous waste
Classification: EcoSpold01Categories: nuclear power/waste treatment
Tags: Treatment; ConvertedDataset
Scenario: Business-as-Usual
System model: Allocation, cut-off by classification
Generated by: Roberto Dones
Published in: Dones, R. 2007
Database: ecoinvent
isCopyrightProtected: true
accessRestrictedTo: 1

## General comment
Datasets established on tha basis of the modelling for CH. Difference is Chinese electricity mix, own assumption for distance travelled by spent fuel and steel using CN (coal) freight train transport.This plant is hypothesized at the same site of the repository. As first approximation the welding of lid and bottom of the canister is described with the ecoinvent module with double lenght. Electricity use is estimated hypothesizing 50 m total movement of the canister within the plant. The total spent fuel to condition is assumed to be 1800 t heavy metal, complying with the current (around 2003) Swiss scenario. This dataset has been developed with the goal to serve a preliminary estimation of the Chinese nuclear chain for the Chinese electricity mix. Hence, it cannot be used for comparisons of conditioning among countries.
[This dataset was already contained in the ecoinvent database version 2. It was not individually updated during the transfer to ecoinvent version 3. Life Cycle Impact Assessment results may still have changed, as they are affected by changes in the supply chain, i.e. in other datasets. This dataset was generated following the ecoinvent quality guidelines for version 2. It may have been subject to central changes described in the ecoinvent version 3 change report (http://www.ecoinvent.org/database/ecoinvent-version-3/reports-of-changes/), and the results of the central updates were reviewed extensively. The changes added e.g. consistent water flows and other information throughout the database. The documentation of this dataset can be found in the ecoinvent reports of version 2, which are still available via the ecoinvent website. The change report linked above covers all central changes that were made during the conversion process.]

## Included activities end
It includes transport of spent fuel elements and steel for canister, requirement of steel for canisters, steel welding, electricity consumption, and infrastructure requirement.

## Geography
Swiss conditions adapted to China.

## Technology
Estimation of current technologies

## Reference product
- spent nuclear fuel: -1 kg; By-product classification Waste; CPC 33720: Spent (irradiated) fuel elements (cartridges) of nuclear reactors; HS2017 840140: Nuclear reactors; parts thereof
  EcoSpold01Location=CN
  production volume 1 kg
    Dummy value to be replaced by value to be calculated from the demand for this treatment activity
  property price 0 EUR2005
    Waste products are assigned a price of zero as they are assumed to require further treatment.
  properties: carbon allocation 0 kg, carbon content 0, carbon content, fossil 0, carbon content, non-fossil 0, dry mass 1 kg, water content 0, water in wet mass 0 kg, wet mass 1 kg

## Inputs from technosphere
- electricity, medium voltage: 0.0024 kWh; lognormal variance with pedigree 0.16, pedigree (1,1,5,1,1)
  EcoSpold01Location=CN
  own assumption
- high level radioactive waste for final repository: -0.0023 m3
  uncertainty from dimension of container & content of U in heavy metal
  EcoSpold01Location=CH
  production volume
    Calculated from the production volume of spent nuclear fuel in proportion to the respective output amounts.
  properties: dry mass 5400 kg, wet mass 5400 kg
- nuclear spent fuel conditioning facility: 5.56e-7 unit; lognormal variance with pedigree 0.16, pedigree (1,1,5,1,1)
  EcoSpold01Location=CN
  uncertainty in the scenario;activityLink introduced to establish a direct link to the corresponding regional supply of this product
- steel, chromium steel 18/8, hot rolled: 15.7 kg; lognormal variance with pedigree 0.04, pedigree (1,1,5,1,1)
  EcoSpold01Location=RER
  variation in lenght of canister
  properties: carbon content, fossil 0.0008, dry mass 1 kg, wet mass 1 kg
  note on carbon content, fossil: Stainless steel model is the grade 304 steel (18/8 stainless, 18% chromium 8% nickel; max. 0.08% C)
- welding, arc, steel: 0.008 m; lognormal variance with pedigree 0.34, pedigree (1,1,5,1,1)
  EcoSpold01Location=RER
  own assumption

## Sampling procedure
Literature

## Review by Rolf Frischknecht 2007-09-05
passed

## Review by Emilia Moreno Ruiz 2015-10-09
price corrected
