# electricity production, lignite

Dataset: EcoSpold 2, unit process
Geography: AU
Time period: 1980-01-01 to 2023-12-31
Technology level: modern
Classification: EcoSpold01Categories: lignite/power plants
Classification: ISIC rev.4 ecoinvent: 3510:Electric power generation, transmission and distribution
Synonyms: sub-bituminous coal; brown coal
Tags: fossil fuels; lignite power; coal power
Scenario: Business-as-Usual
System model: Allocation, cut-off by classification
Generated by: Karin Treyer
Published in: Röder, A. 2007
Database: ecoinvent
isCopyrightProtected: true
accessRestrictedTo: 1

## General comment
This dataset represents the production of high voltage electricity in an average lignite power plant in Australia in 2012. "Lignite" is used as representant for "brown coal", which includes sub-bituminous coal and lignite according to the definition of the IEA electricity information 2014. (IEA. 2014. Electricity Information 2014. ISBN 978-92-64-21692-1. International Energy Agency (IEA), Paris Cedex (FR).)
All exchanges in this dataset except for emissions of SO2, NOx and particles are production-weighted averages of the figures in the datasets in ecoinvent version two, which are valid for the following 10 countries: AT, BA, CZ, DE, ES, FR, HU, PL, SI, SK. The exception values are production-weighted averages of version 2 countries and the new countries in version 3 (AU, CA, CL, ID, IN, KR, MX, MY, PE, RU, TH, TR, TW, TZ, UA, ZA)All exchanges in this dataset except for emissions of SO2, NOx and particles have been overtaken from the global dataset, which in their turn are production-weighted averages of the figures in the datasets in ecoinvent version two, which are valid for the following 10 countries: AT, BA, CZ, DE, ES, FR, HU, PL, SI, SK. The exception values have been determined using a bottom-up approach. It consists in the collection of information about country-specific single plants.
Comments on the inventory data of emissions:
- for the assessment of main characteristics (sulphur and ash content of coal, efficiency of the plant) and CO2 a bottom-up approach has been used. It consists in the collection of information about single plants.
- Halogene emissions have been estimated on the basis of the content of the species in the country-specific coal input mix, assuming average retention rates.
- For CO and particle emissions average values for the former UCTE are included (Union for the Coordination of the Transmission of Electricity, since 2009 replaced by ENTSO-E European Network of Transmission System Operators for Electricity).
- The country specific emissions of N2O depend on the share of DeNOx. - Emissions of trace elements were calculated by means of a formula (CORINAIR) using the ash content in the country-specific coal input mix and average transfer coefficients for coal power plants, taking into account the share of DeSOx installed.
- Emission of uranium and thorium radioactive isotopes were assumed proportional to the corresponding element emitted with particles; the other non-gaseous radioactive isotopes of the uranium and thorium decay chain were assumed proportional to the emitted U-238 or Th-232.
- The emission of gaseous radon and K-40 are taken from the literature.
IEA. 2009. Coal information, 2009 edition. Documentation for beyond 2020 files. International Energy Agency.
European Environment Agency (1991) CORINAIR Inventory; VOC"s Default Emission Factors
[This dataset is meant to replace the following datasets:]

## Included activities start
From the constructed lignite power plant ready to produce electricity.

From reception of lignite and operating materials at power plant gate.

## Included activities end
This activity ends with 1kWh of high voltage electricity produced at the power plant and arrived at the busbar.

This dataset includes:
- all operation and maintenance activities and materials of the power plants.

- Particle removal (dedusting of the flue gas)
- Desulfurisation and denitrification. These processes are described in separate modules; it can be decided by changing the values of NOx and SOx retained whether and how much DeNOx and DeSOx are installed.
- Cooling: It is assumed that all plants use wet cooling with a cooling tower. No cooling tower is included in this dataset (will be implemented in future versions)
- Loss of feed water
- Losses from gross electricity production, e.g. for internal use

This dataset doesn"t include
- raw materials extraction, decommissioning and waste treatment as these activities are already included in the infrastructure datasets
- transformation of the electricity produced
- The disposal of non-recycled ashes is modelled separately.
- Use of fuel oil for startup, as this can be neglected for lignite power plants because these are run for a long time (2-3 years) without being shut down.

## Technology
POWER PLANT:
Lignite power plant input is a dataset which consists of a mix of 30% 100MW power plant and 70% 500MW power plant. The plants are used for basic load with 6000 hours of operation at full capacity per year. The plants are assumed to operate 200000 hours during its lifetime.
OTHER DATA:
{{children_only_technology}}
- Share of installed capacity with desulfurisation: 20% (figure based on IEA 2012)
- Average efficiency of desulfurisation installations: 92% (rough estimation based on Dones et al. 2007
- Share of installed capacity with denitrification: 73% (figure based on IEA 2012 )
- Average efficiency of denitrification installations: 80% (estimation based on Dones et al. 2007, p.128)
- Share of installed capacity with particle filters: 98% (figure based on IEA 2012 )
- Average efficiency of particle filters: 99% (figure based on IEA 2012 )
Sources :
1) Victoria: http://new.dpi.vic.gov.au/energy-future/our-energy-story/energy-in-victoria/resources-in-victoria-map
2) Queensland: http://www.dme.qld.gov.au/Energy/power_stations.cfm
3) New South Wales: http://www.industry.nsw.gov.au/energy/electricity/generation
4) Map of Fossil Fuel Power Stations in Australia, DEWHA, http://www.ga.gov.au/fossil_fuel/
5) IEA 2012. Coal Power Database. International Energy Agency Clean Coal Centre, London
6) Australian National Pollutant Inventory, http://www.npi.gov.au/
7) IEA/OECD. 2010. Electricity Information 2010. International Energy Agency (IEA), Paris Cedex (FR). Part IV. Detailed OECD Electricity And Heat Data.
8) Dones, R., Bauer, C., Röder, A. (2007) Kohle. In: Dones, R. (Ed.) et al., Sachbilanzen von Energiesystemen: Grundlagen für den ökologischen Vergleich von Energiesystemen und den Einbezug von Energiesystemen in Ökobilanzen für die Schweiz. Final report ecoinvent No. 6-VI, Paul Scherrer Institut Villigen, Swiss Centre for Life Cycle Inventories, Dübendorf, CH.

## Time period
The Annual Production Volume is valid for the year 2012.

## Parameters
- efficiency: 0.322 dimensionless; lognormal variance with pedigree 0.003325, pedigree (3,2,1,2,2)
  Literature value/calculated value. Net electrical efficiency based on the lower heating value (LHV).
  For all OECD countries, the IEA Electricity information 2014 provides data for the year 2012 on fuel input (TJ, Net calorific value NCV) and gross electricity production (GWh) as well as heat production (TJ) in tables 8 and 9 for each country for electricity only and Combined Heat and Power (CHP) plants each. Together with the information on own use (see parameter "losses"), the net electrical efficiency based on the NCV is calculated.
  For all non-OECD countries, data from the IEA Energy balances of non-OECD countries 2014 have been used. These tables do not always provide information on how much of the electricity has been produced in electricity only and in CHP plants, but often give the total value only.
  IEA. 2014. Electricity Information 2014. ISBN 978-92-64-21692-1. International Energy Agency (IEA), Paris Cedex (FR).
  IEA/OECD. 2014. Energy balances of non-OECD countries 2014. International Energy Agency (IEA), Paris Cedex (FR).
  output relative to input (requires additional specification)
- factor: input of MJ for the production of 1 kWh: 11.1801 MJ/kWh; name factor_MJ_kWh; = 1*3.6/efficiency; lognormal variance with pedigree 0.0532, pedigree (4,4,3,4,4)
  Calculated value. 3.6 MJ = 1kWh.
  nan
- fraction, cooling water, to air: 0.0251074 dimensionless; name fraction_CW_to_air; = (WConsumption_EP_HC_recirculatingCS*recirculating_CS_fraction_from_allCS+WConsumption_EP_HC_once_through_andCP_CS*once_through_andCP_CS_fractio_from_allCS)/(WWithdrawal_EP_HC_recirculating_CS*recirculating_CS_fraction_from_allCS+WWithdrawal_EP_HC_once_through_andCP_CS*once_through_andCP_CS_fractio_from_allCS); lognormal variance with pedigree 0.092025, pedigree (4,4,3,2,4)
  Calculated
  nan
- fraction, process water, to air: 0.15 dimensionless; name fraction_PW_to_air; lognormal variance with pedigree 0.092025, pedigree (4,4,3,2,4)
  Literature value. In case when no industry/process specific data are available, default evaporation fraction value is used. This value is 15% and is based on literature (Statistics Canada, 2007 & Shaffer, K.H., 2008, Consumptive water use in the Great Lakes Basin, USGS & Shiklomanov, 2003, World Water Resources at the Beginning of the 21st Century) and has been approved by an expert.
  nan
- fraction, water, completely softened, to air: 0.15 dimensionless; name fraction_WCS_to_air; = fraction_PW_to_air; lognormal variance with pedigree 0.092025, pedigree (4,4,3,2,4)
  Calculated value. See comment in the other parametres present in this dataset. Water, completely softened is considered to be always used as process water, thus process water fractions to air are applied to all water, completely softened input flows to calculate the amount of water consumed in the processes.
  nan
- fraction, water, decarbonised, to air: 0.0251074 dimensionless; name fraction_WDC_to_air; = fraction_CW_to_air; lognormal variance with pedigree 0.092025, pedigree (4,4,3,2,4)
  Calculated value. See comments in the other parametres present in this dataset. Decarbonised water is considered to be always used as cooling water, thus cooling water fractions to air are applied to all carbonised water input flows to calculate the amount of water consumed in the processes.
  nan
- gross electricity production: 1.38076e11 kWh; name gross_electricity; lognormal variance with pedigree 0.001225, pedigree (2,1,1,2,1)
  Literature value/statistics. Taken from the IEA electricity information 2014, table 1.3. Includes electricity production in combined heat and power lignite plants.
  IEA. 2014. Electricity Information 2014. ISBN 978-92-64-21692-1. International Energy Agency (IEA), Paris Cedex (FR).
  nan
- losses from gross electricity production: 0.07 dimensionless; name gross_net_electricity; lognormal variance with pedigree 0.003525, pedigree (3,2,2,2,2)
  Calculated value. Own use of electricity plants in this country in 2012. For the OECD countries, the OECD iLibrary provides gross and net electricity values for the specific sector "Total Fuel Combustion", from which the loss value is being calculated. This value is then applied to all fossil fuel datasets, as no data on a more detailed level were available.
  OECD. 2014. IEA Electricity Information Statistics: OECD - Electricity and heat generation. OECD iLibrary. Online database. DOI : 10.1787/elect-data-en
  nan
  Uncertainty: g
- once-through and cooling pond cooling systems as a fraction of all cooling syste: 0.73 dimensionless; name once_through_andCP_CS_fractio_from_allCS; lognormal variance with pedigree 0.092025, pedigree (4,4,3,2,4)
  Calculated as an average of data available for Europe (Floerke, 2008, Future changes of freshwater needs in the electricity production sector) and USA (NERL, 2011, Estimating freshwater needs to meet future thermoelectric generation requirements).
  nan
- recirculating cooling system as a fraction of all cooling systems: 0.27 dimensionless; name recirculating_CS_fraction_from_allCS; lognormal variance with pedigree 0.092025, pedigree (4,4,3,2,4)
  (same comment as for once-through and cooling pond cooling systems as a fraction of all coo)
- water consumption, electricity production from hard coal, once-through and cooli: 0.0014 m3/kWh; name WConsumption_EP_HC_once_through_andCP_CS; lognormal variance with pedigree 0.092025, pedigree (4,4,3,2,4)
  Estimated based on literature (Scown, 2011, Water Footprint of U.S. Transportation Fuels, SI). The amount of water consumed while burning lignite and peat is assumed to be the same as in case of coal.
  nan
- water consumption, electricity production from hard coal, recirculating CS: 0.0018 m3/kWh; name WConsumption_EP_HC_recirculatingCS; lognormal variance with pedigree 0.092025, pedigree (4,4,3,2,4)
  (same comment as for water consumption, electricity production from hard coal, once-through)
- water withdrawal, electricity production from hard coal, once-through and coolin: 0.0815 m3/kWh; name WWithdrawal_EP_HC_once_through_andCP_CS; lognormal variance with pedigree 0.092025, pedigree (4,4,3,2,4)
  Estimated based on literature (Scown, 2011, Water Footprint of U.S. Transportation Fuels, SI). The amount of water withdrawn while burning lignite and peat is assumed to be the same as in case of coal.
  nan
- water withdrawal, electricity production from hard coal, recirculating CS: 0.0021 m3/kWh; name WWithdrawal_EP_HC_recirculating_CS; lognormal variance with pedigree 0.092025, pedigree (4,4,3,2,4)
  (same comment as for water withdrawal, electricity production from hard coal, once-through )

## Reference product
- electricity, high voltage: 1 kWh; name electricity; By-product classification allocatable product; CPC 17100: Electrical energy; HS2017 271600: Electrical energy
  production volume 7.12655e10 kWh; name electricity_apv; = gross_electricity*(1- gross_net_electricity)
    Calculated value
  property price 0.0977 EUR2005
    Temporary price data. Calculated as 90% of purchasers price based on: 94% of the average price (to account for a 6% loss in transformation and transmission) for electricity for industrial consumersin 2005 (excluded taxes). From IEA.
  properties: carbon allocation 0 kg, carbon content 0

## Inputs from technosphere
- NOx retained, by selective catalytic reduction: 0.00269 kg; name nox_retained; source IEA 2012; lognormal variance with pedigree 0.0117, pedigree (3,2,4,1,2)
  Calculated value departing from the installed denitrification in form of Selective Catalytic Reduction (SCR), its efficiency and the NOx emitted in the air (see Technology Comment for details).
  properties: dry mass 1 kg, wet mass 1 kg
- SOx retained, in lignite flue gas desulfurisation: 0.000587 kg; name sox_retained; source IEA 2012; lognormal variance with pedigree 0.0117, pedigree (3,2,4,1,2)
  Calculated value departing from the installed desulfurisation, its efficiency and the SO2 emitted in the air (see Technology Comment for details).
  properties: dry mass 1 kg, wet mass 1 kg
- lignite: 1.19627 kg; = factor_MJ_kWh*0.107; lognormal variance with pedigree 0.0532, pedigree (3,3,5,5,3)
  Literature value/calculated value. Lignite mass needed for producing 1kWh of electricity from lignite, based on the value for burning 1MJ of lignite. Weighted average with electricity production data (Itten&Frischknecht 2012) and values of 10 countries
  (AT, BA, CZ, DE, ES, FR, HU, PL, SI, SK) (Röder et al. 2007)
  Source:
  Itten R. and Frischknecht R. (2012) Life Cycle Inventories of Electricity Mixes and Grid. ESU-services Ltd., Uster, Switzerland.
  properties: carbon content, fossil 0.655, dry mass 0.42 kg, heating value, net 8.8 MJ, water content 1.38095, wet mass 1 kg
  note on carbon content, fossil: C content of dry lignite is 58-73% (specified in Tab 1.1, report 6, part VI). A mean content of 0.655 kg C/kg dry lignite was considered.
  note on heating value, net: Based on literature, page 52, Dones R., Bauer C., Bolliger R., Burger B., Faist Emmenegger M., Frischknecht R., Heck T., Jungbluth N., Röder A., Tuchschmid M. (2007) Life Cycle Inventories of Energy Systems: Results for Current Systems in Switzerland and other UCTE Countries. ecoinvent report No. 5. Paul Scherrer Institut Villigen, Swiss Centre for Life Cycle Inventories, Dübendorf, CH.
- lignite ash: -0.164348 kg; name lignite_ash; = factor_MJ_kWh*0.0147; source Röder, A. 2007, p. Tab. 9.69, p.165; lognormal variance with pedigree 0.0926, pedigree (5,3,3,5,3)
  Literature value/calculated value. Ash remaining when producing 1kWh of electricity from lignite, based on the value for burning 1MJ of lignite. Weighted average with electricity production data (Itten&Frischknecht 2012) and ash values 10 countries
  (AT, BA, CZ, DE, ES, FR, HU, PL, SI, SK). These values were valid for the ash being disposed off. Now, total amount of ash has been calculated (disposed+recycled) with the data in Tab. 9.69 p. 165 in Röder et al. 2007. Country ash values calculated from mass balance. Globally, 6% of the lignite ash are recycled, 94% go to disposal.
  Source:
  Itten R. and Frischknecht R. (2012) Life Cycle Inventories of Electricity Mixes and Grid. ESU-services Ltd., Uster, Switzerland.
  production volume; = lignite_ash/electricity*electricity_apv
    Calculated from the production volume of lignite, burned in power plant in proportion to the respective output amounts.
  properties: dry mass 1 kg, heating value, net 21.7 MJ, wet mass 1 kg
  note on heating value, net: Based on literature, page 52, Report 5: Dones, R., Bauer, C., Bolliger, R., Burger, B., faist Emmenegger, M., Frischknecht, R., Heck, T., Jungbluth, N., Röder, A., Tuchschmid, M. (2007) Life Cycle Inventories of Energy Systems: Resulst for current Systems in Switzerland and other UCTE Countries. ecoinvent report No. 5. Paul Scherrer Institut Villigen, Swiss Centre for Life Cycle Inventories, Dübendorf, CH
- lignite power plant: 1e-11 unit; name lignite_power_plant; = 1/(200000*500*1000); source Röder, A. 2007, p. p.99; lognormal variance with pedigree 0.4006, pedigree (5,3,5,5,3)
  Calculated value. At the moment, the lignite power plant input consists out of mix of a 100MWe power plant (30%) and a 500MWe power plant (70%).
  For this calculation, 6000 load hours per year are assumed. It is assumed that a total of 200"000h is reached during the lifetime. A capacity of 500MW is taken for the calculation.
- petroleum coke: 0.00155404 kg; name petroleum_coke; = factor_MJ_kWh*0.000139; lognormal variance with pedigree 0.0106, pedigree (2,1,4,5,1)
  Literature value/calculated value. Petroleum coke use when producing 1kWh of electricity from lignite, based on the value for burning 1MJ of lignite. Weighted average with electricity production data (Itten&Frischknecht 2012) and values of 10 countries
  (AT, BA, CZ, DE, ES, FR, HU, PL, SI, SK) (Röder et al. 2007)
  Source:
  Itten R. and Frischknecht R. (2012) Life Cycle Inventories of Electricity Mixes and Grid. ESU-services Ltd., Uster, Switzerland.
  properties: carbon content, fossil 0.885, dry mass 1 kg, heating value, net 35 MJ, wet mass 1 kg
- residue from cooling tower: -5.59006e-5 kg; name cooling_tower_residue; = factor_MJ_kWh*0.000005; lognormal variance with pedigree 0.0752, pedigree (5,3,3,5,2)
  Literature value/calculated value. Amount of resuidue from cooling tower in relation to producing 1kWh of electricity from lignite, based on the value for burning 1MJ of lignite. Weighted average with electricity production data (Itten&Frischknecht 2012) and values of 10 countries
  (AT, BA, CZ, DE, ES, FR, HU, PL, SI, SK).
  Source:
  Itten R. and Frischknecht R. (2012) Life Cycle Inventories of Electricity Mixes and Grid. ESU-services Ltd., Uster, Switzerland.
  production volume; = cooling_tower_residue/electricity*electricity_apv
    Calculated from production volume of reference product using the relative outputs.
  properties: carbon content, fossil 0.0544233, dry mass 0.7 kg, water content 0.428571, wet mass 1 kg
- water, completely softened: 0.0670807 kg; name water_completely_softened; = factor_MJ_kWh*0.006; lognormal variance with pedigree 0.086, pedigree (4,5,5,5,3)
  Literature value/calculated value. Feed water for the steam circuit lost when producing 1kWh of electricity from lignite, based on the value for burning 1MJ of lignite. Röder et al. 2007, Tab. 9.65 and Tab. 9.66, p. 160f.
  properties: wet mass 1 kg
- water, decarbonised: 2.23602 kg; name water_decarbonised_user; = factor_MJ_kWh*0.2; lognormal variance with pedigree 0.086, pedigree (4,5,5,5,3)
  Literature value/calculated value. Cooling water, decarbonised, for the cooling water circuit lost when producing 1kWh of electricity from lignite, based on the value for burning 1MJ of lignite. Röder et al. 2007, Tab. 9.65 and Tab. 9.66, p. 160f. These tables give an amount of 0.15 kg/MJ burned, which is valid for the assumption of 75% wet cooling and 25% run-through cooling. However, this revised dataset assumes 100% wet cooling.
  properties: wet mass 1 kg

## Inputs from nature
- Water, cooling, unspecified natural origin [natural resource, in water]: 0.05829 m3; name water_cooling_UNO_input; = ((recirculating_CS_fraction_from_allCS*WWithdrawal_EP_HC_recirculating_CS)+(once_through_andCP_CS_fractio_from_allCS*WWithdrawal_EP_HC_once_through_andCP_CS))/11.52*factor_MJ_kWh; lognormal variance with pedigree 0.130025, pedigree (4,4,5,2,4)
  Calculated based on literature data.

## Emissions to nature
- Antimony ion [air, non-urban air or from high stacks]: 5.83602e-9 kg; name antimony; = factor_MJ_kWh*0.000000000522; lognormal variance with pedigree 0.7806, pedigree (5,3,5,5,3)
  Literature value/calculated value. Emissions when producing 1kWh of electricity from lignite, based on the value for burning 1MJ of lignite. Weighted average with electricity production data (Itten&Frischknecht 2012) and emission values of 10 countries
  (AT, BA, CZ, DE, ES, FR, HU, PL, SI, SK) (Röder et al. 2007)
  Country emissions values calculated from trace element balance, input uncertain
  Source:
  Itten R. and Frischknecht R. (2012) Life Cycle Inventories of Electricity Mixes and Grid. ESU-services Ltd., Uster, Switzerland.
- Arsenic ion [air, non-urban air or from high stacks]: 3.30932e-8 kg; name arsenic; = factor_MJ_kWh*0.00000000296; lognormal variance with pedigree 0.7806, pedigree (5,3,5,5,3)
  (same comment as for Antimony ion)
- Barium II [air, non-urban air or from high stacks]: 1.73292e-7 kg; name barium; = factor_MJ_kWh*0.0000000155; lognormal variance with pedigree 0.7806, pedigree (5,3,5,5,3)
  (same comment as for Antimony ion)
- Benzene [air, non-urban air or from high stacks]: 2.42609e-6 kg; name benzene; = factor_MJ_kWh*0.000000217; lognormal variance with pedigree 0.12, pedigree (3,5,5,5,3)
  Literature value/calculated value. Emissions when producing 1kWh of electricity from lignite, based on the value for burning 1MJ of lignite. Weighted average with electricity production data (Itten&Frischknecht 2012) and emission values of 10 countries
  (AT, BA, CZ, DE, ES, FR, HU, PL, SI, SK) (Röder et al. 2007)
  Country emissions values based on literature.
  Source:
  Itten R. and Frischknecht R. (2012) Life Cycle Inventories of Electricity Mixes and Grid. ESU-services Ltd., Uster, Switzerland.
- Benzo(a)pyrene [air, non-urban air or from high stacks]: 2.23602e-12 kg; name benzo_a_pyrene; = factor_MJ_kWh*0.0000000000002; lognormal variance with pedigree 0.112, pedigree (3,5,5,5,1)
  (same comment as for Benzene)
- Boron [air, non-urban air or from high stacks]: 2.09068e-5 kg; name boron; = factor_MJ_kWh*0.00000187; lognormal variance with pedigree 0.7806, pedigree (5,3,5,5,3)
  (same comment as for Antimony ion)
- Bromine [air, non-urban air or from high stacks]: 7.39006e-7 kg; name bromine; = factor_MJ_kWh*0.0000000661; lognormal variance with pedigree 0.2126, pedigree (3,3,5,5,3)
  (same comment as for Antimony ion)
- Butane [air, non-urban air or from high stacks]: 2.12422e-7 kg; name butane; = factor_MJ_kWh*0.000000019; lognormal variance with pedigree 0.112, pedigree (3,5,5,5,1)
  (same comment as for Benzene)
- Cadmium II [air, non-urban air or from high stacks]: 7.51304e-9 kg; name cadmium; = factor_MJ_kWh*0.000000000672; lognormal variance with pedigree 0.7806, pedigree (5,3,5,5,3)
  (same comment as for Antimony ion)
- Carbon dioxide, fossil [air, non-urban air or from high stacks]: 1.19627 kg; name carbon_dioxide_fossil; = factor_MJ_kWh*0.107; lognormal variance with pedigree 0.0526, pedigree (3,3,5,5,3)
  (same comment as for Benzene)
- Carbon monoxide, fossil [air, non-urban air or from high stacks]: 0.000223602 kg; name carbon_monoxide_fossil; = factor_MJ_kWh*0.00002; lognormal variance with pedigree 0.706, pedigree (3,4,5,5,1)
  (same comment as for Benzene)
- Chromium III [air, non-urban air or from high stacks]: 2.97391e-8 kg; name chromium; = factor_MJ_kWh*0.00000000266; lognormal variance with pedigree 0.7806, pedigree (5,3,5,5,3)
  (same comment as for Antimony ion)
- Chromium VI [air, non-urban air or from high stacks]: 3.58882e-9 kg; name chromium_vi; = factor_MJ_kWh*0.000000000321; lognormal variance with pedigree 0.5326, pedigree (3,3,5,5,3)
  Literature value/calculated value. Emissions when producing 1kWh of electricity from lignite, based on the value for burning 1MJ of lignite. Weighted average with electricity production data (Itten&Frischknecht 2012) and emission values of 10 countries
  (AT, BA, CZ, DE, ES, FR, HU, PL, SI, SK) (Röder et al. 2007)
  Country emissions values based on range of data.
  Source:
  Itten R. and Frischknecht R. (2012) Life Cycle Inventories of Electricity Mixes and Grid. ESU-services Ltd., Uster, Switzerland.
- Cobalt II [air, non-urban air or from high stacks]: 6.01491e-9 kg; name cobalt; = factor_MJ_kWh*0.000000000538; lognormal variance with pedigree 0.7806, pedigree (5,3,5,5,3)
  (same comment as for Antimony ion)
- Copper ion [air, non-urban air or from high stacks]: 8.27329e-8 kg; name copper; = factor_MJ_kWh*0.0000000074; lognormal variance with pedigree 0.7806, pedigree (5,3,5,5,3)
  (same comment as for Antimony ion)
- Dinitrogen monoxide [air, non-urban air or from high stacks]: 1.62112e-5 kg; name dinitrogen_monoxide; = factor_MJ_kWh*0.00000145; lognormal variance with pedigree 0.106, pedigree (3,4,5,5,1)
  (same comment as for Benzene)
- Dioxins, measured as 2,3,7,8-tetrachlorodibenzo-p-dioxin [air, non-urban air or from high stacks]: 7.82609e-14 kg; name dioxins; = factor_MJ_kWh*0.000000000000007; lognormal variance with pedigree 0.372, pedigree (3,5,5,5,1)
  (same comment as for Benzene)
- Ethane [air, non-urban air or from high stacks]: 4.58385e-7 kg; name ethane; = factor_MJ_kWh*0.000000041; lognormal variance with pedigree 0.112, pedigree (3,5,5,5,1)
  (same comment as for Benzene)
- Formaldehyde [air, non-urban air or from high stacks]: 6.48447e-7 kg; name formaldehyde; = factor_MJ_kWh*0.000000058; lognormal variance with pedigree 0.112, pedigree (3,5,5,5,1)
  (same comment as for Benzene)
- Hydrocarbons, aliphatic, alkanes, unspecified [air, non-urban air or from high stacks]: 2.44845e-6 kg; name hydrocarbons_al_al_unspec; = factor_MJ_kWh*0.000000219; lognormal variance with pedigree 0.112, pedigree (3,5,5,5,1)
  (same comment as for Benzene)
- Hydrocarbons, aliphatic, unsaturated [air, non-urban air or from high stacks]: 2.41491e-6 kg; name hydrocarbons_aliphatic_unsaturated; = factor_MJ_kWh*0.000000216; lognormal variance with pedigree 0.112, pedigree (3,5,5,5,1)
  (same comment as for Benzene)
- Hydrochloric acid [air, non-urban air or from high stacks]: 6.31677e-5 kg; name hydrogen_chloride; = factor_MJ_kWh*0.00000565; lognormal variance with pedigree 0.2506, pedigree (5,3,5,5,3)
  (same comment as for Antimony ion)
- Hydrogen fluoride [air, non-urban air or from high stacks]: 1.50932e-5 kg; name hydrogen_fluoride; = factor_MJ_kWh*0.00000135; lognormal variance with pedigree 0.2506, pedigree (5,3,5,5,3)
  (same comment as for Antimony ion)
- Iodine [air, non-urban air or from high stacks]: 5.36646e-7 kg; name iodine; = factor_MJ_kWh*0.000000048; lognormal variance with pedigree 0.2506, pedigree (5,3,5,5,3)
  (same comment as for Antimony ion)
- Lead II [air, non-urban air or from high stacks]: 2.90683e-8 kg; name lead; = factor_MJ_kWh*0.0000000026; lognormal variance with pedigree 0.7806, pedigree (5,3,5,5,3)
  (same comment as for Antimony ion)
- Lead-210 [air, non-urban air or from high stacks]: 9.35776e-5 kBq; name lead_210; = factor_MJ_kWh*0.00000837; lognormal variance with pedigree 0.4306, pedigree (5,3,5,5,3)
  (same comment as for Antimony ion)
- Manganese II [air, non-urban air or from high stacks]: 9.45839e-8 kg; name manganese; = factor_MJ_kWh*0.00000000846; lognormal variance with pedigree 0.7806, pedigree (5,3,5,5,3)
  (same comment as for Antimony ion)
- Mercury II [air, non-urban air or from high stacks]: 6.04845e-8 kg; name mercury; = factor_MJ_kWh*0.00000000541; lognormal variance with pedigree 0.7806, pedigree (5,3,5,5,3)
  (same comment as for Antimony ion)
- Methane, fossil [air, non-urban air or from high stacks]: 1.11801e-5 kg; name methane_fossil; = factor_MJ_kWh*0.000001; lognormal variance with pedigree 0.106, pedigree (3,4,5,5,1)
  (same comment as for Benzene)
- Molybdenum VI [air, non-urban air or from high stacks]: 1.8e-8 kg; name molybdenum; = factor_MJ_kWh*0.00000000161; lognormal variance with pedigree 0.7806, pedigree (5,3,5,5,3)
  (same comment as for Antimony ion)
- Nickel II [air, non-urban air or from high stacks]: 1.14037e-7 kg; name nickel; = factor_MJ_kWh*0.0000000102; lognormal variance with pedigree 0.7806, pedigree (5,3,5,5,3)
  (same comment as for Antimony ion)
- Nitrogen oxides [air, non-urban air or from high stacks]: 0.00191 kg; name nitrogen_oxides; source IEA 2012; lognormal variance with pedigree 0.0117, pedigree (3,2,4,1,2)
  Literature value/calculated value from bottom-up approach, e.g. from determining the plant-specific emissions of NO2 with the following inputs:
  a) Compilation of all operating lignite power plants in 2008: Governmental web pages of individual Australian States, the map of Fossil Fuel Power Stations and the IEA Clean Coal Centre Coal Power database (1-5).
  b) Emission data from the Australian National Pollutant Inventory (6)
  c) Amount of thermal energy consumed as well as electricity produced by individual plants (7).
  Sources :
  1) Victoria: http://new.dpi.vic.gov.au/energy-future/our-energy-story/energy-in-victoria/resources-in-victoria-map
  2) Queensland: http://www.dme.qld.gov.au/Energy/power_stations.cfm
  3) New South Wales: http://www.industry.nsw.gov.au/energy/electricity/generation
  4) Map of Fossil Fuel Power Stations in Australia, DEWHA, http://www.ga.gov.au/fossil_fuel/
  5) IEA 2012. Coal Power Database. International Energy Agency Clean Coal Centre, London
  6) Australian National Pollutant Inventory, http://www.npi.gov.au/
  7) IEA/OECD. 2010. Electricity Information 2010. International Energy Agency (IEA), Paris Cedex (FR). Part IV. Detailed OECD Electricity And Heat Data.
- PAH, polycyclic aromatic hydrocarbons [air, non-urban air or from high stacks]: 1.11801e-8 kg; name pah; = factor_MJ_kWh*0.000000001; lognormal variance with pedigree 0.372, pedigree (3,5,5,5,1)
  (same comment as for Benzene)
- Particulate Matter, < 2.5 um [air, non-urban air or from high stacks]: 6.7e-5 kg; name particulates_lt2_5; source IEA 2012; lognormal variance with pedigree 0.0987, pedigree (4,2,5,4,4)
  Calculated value from bottom-up approach, e.g. from determining the plant-specific emissions of particles with the following inputs:
  a) Compilation of all operating lignite power plants in 2008: Governmental web pages of individual Australian States, the map of Fossil Fuel Power Stations and the IEA Clean Coal Centre Coal Power database (1-5).
  b) Emission data from the Australian National Pollutant Inventory (6)
  c) Amount of thermal energy consumed as well as electricity produced by individual plants (7).
  Sources :
  1) Victoria: <http://new.dpi.vic.gov.au/energy-future/our-energy-story/energy-in-victoria/resources-in-victoria-map>
  2) Queensland: <http://www.dme.qld.gov.au/Energy/power_stations.cfm>
  3) New South Wales: <http://www.industry.nsw.gov.au/energy/electricity/generation>
  4) Map of Fossil Fuel Power Stations in Australia, DEWHA, <http://www.ga.gov.au/fossil_fuel/>
  5) IEA 2012. Coal Power Database. International Energy Agency Clean Coal Centre, London
  6) Australian National Pollutant Inventory, <http://www.npi.gov.au/>
  7) IEA/OECD. 2010. Electricity Information 2010. International Energy Agency (IEA), Paris Cedex (FR). Part IV. Detailed OECD Electricity And Heat Data.
- Particulate Matter, > 10 um [air, non-urban air or from high stacks]: 4.91e-5 kg; name particulates_gt10; source IEA 2012; lognormal variance with pedigree 0.0987, pedigree (4,2,5,4,4)
  (same comment as for Particulate Matter, < 2.5 um)
- Particulate Matter, > 2.5 um and < 10um [air, non-urban air or from high stacks]: 9.82e-5 kg; name particulates_2_5_to_10; source IEA 2012; lognormal variance with pedigree 0.0987, pedigree (4,2,5,4,4)
  (same comment as for Particulate Matter, < 2.5 um)
- Pentane [air, non-urban air or from high stacks]: 1.64348e-6 kg; name pentane; = factor_MJ_kWh*0.000000147; lognormal variance with pedigree 0.112, pedigree (3,5,5,5,1)
  (same comment as for Benzene)
- Polonium-210 [air, non-urban air or from high stacks]: 0.000171056 kBq; name polonium_210; = factor_MJ_kWh*0.0000153; lognormal variance with pedigree 0.4306, pedigree (5,3,5,5,3)
  Literature value/calculated value. Emissions when producing 1kWh of electricity from lignite, based on the value for burning 1MJ of lignite. Weighted average with electricity production data (Itten&Frischknecht 2012) and emission values of 10 countries
  (AT, BA, CZ, DE, ES, FR, HU, PL, SI, SK) (Röder et al. 2007)
  Source:
  Itten R. and Frischknecht R. (2012) Life Cycle Inventories of Electricity Mixes and Grid. ESU-services Ltd., Uster, Switzerland.
- Potassium-40 [air, non-urban air or from high stacks]: 3.24224e-5 kBq; name potassium_40; = factor_MJ_kWh*0.0000029; lognormal variance with pedigree 0.4306, pedigree (5,3,5,5,3)
  (same comment as for Polonium-210)
- Propane [air, non-urban air or from high stacks]: 3.91304e-7 kg; name propane; = factor_MJ_kWh*0.000000035; lognormal variance with pedigree 0.112, pedigree (3,5,5,5,1)
  (same comment as for Polonium-210)
- Propylene [air, non-urban air or from high stacks]: 1.78882e-7 kg; name propene; = factor_MJ_kWh*0.000000016; lognormal variance with pedigree 0.112, pedigree (3,5,5,5,1)
  (same comment as for Polonium-210)
- Radium-226 [air, non-urban air or from high stacks]: 2.41491e-5 kBq; name radium_226; = factor_MJ_kWh*0.00000216; lognormal variance with pedigree 0.3907, pedigree (3,3,5,3,3)
  (same comment as for Antimony ion)
- Radium-228 [air, non-urban air or from high stacks]: 1.44224e-5 kBq; name radium_228; = factor_MJ_kWh*0.00000129; lognormal variance with pedigree 0.4306, pedigree (5,3,5,5,3)
  (same comment as for Antimony ion)
- Radon-220 [air, non-urban air or from high stacks]: 0.00141988 kBq; name radon_220; = factor_MJ_kWh*0.000127; lognormal variance with pedigree 0.4306, pedigree (5,3,5,5,3)
  (same comment as for Antimony ion)
- Radon-222 [air, non-urban air or from high stacks]: 0.00251553 kBq; name radon_222; = factor_MJ_kWh*0.000225; lognormal variance with pedigree 0.4306, pedigree (5,3,5,5,3)
  (same comment as for Antimony ion)
- Selenium IV [air, non-urban air or from high stacks]: 1.37516e-7 kg; name selenium; = factor_MJ_kWh*0.0000000123; lognormal variance with pedigree 0.7806, pedigree (5,3,5,5,3)
  (same comment as for Antimony ion)
- Strontium II [air, non-urban air or from high stacks]: 1.53168e-7 kg; name strontium; = factor_MJ_kWh*0.0000000137; lognormal variance with pedigree 0.7806, pedigree (5,3,5,5,3)
  (same comment as for Antimony ion)
- Sulfur dioxide [air, non-urban air or from high stacks]: 0.0026 kg; name sulfur_dioxide; source IEA 2012; lognormal variance with pedigree 0.0117, pedigree (3,2,4,1,2)
  Calculated value from bottom-up approach, e.g. from determining the plant-specific emissions of SO2 with the following inputs:
  a) Compilation of all operating lignite power plants in 2008: Governmental web pages of individual Australian States, the map of Fossil Fuel Power Stations and the IEA Clean Coal Centre Coal Power database (1-5).
  b) Emission data from the Australian National Pollutant Inventory (6)
  c) Amount of thermal energy consumed as well as electricity produced by individual plants (7).
  Sources :
  1) Victoria: http://new.dpi.vic.gov.au/energy-future/our-energy-story/energy-in-victoria/resources-in-victoria-map
  2) Queensland: http://www.dme.qld.gov.au/Energy/power_stations.cfm
  3) New South Wales: http://www.industry.nsw.gov.au/energy/electricity/generation
  4) Map of Fossil Fuel Power Stations in Australia, DEWHA, http://www.ga.gov.au/fossil_fuel/
  5) IEA 2012. Coal Power Database. International Energy Agency Clean Coal Centre, London
  6) Australian National Pollutant Inventory, http://www.npi.gov.au/
  7) IEA/OECD. 2010. Electricity Information 2010. International Energy Agency (IEA), Paris Cedex (FR). Part IV. Detailed OECD Electricity And Heat Data.
- Thorium-228 [air, non-urban air or from high stacks]: 7.79255e-6 kBq; name thorium_228; = factor_MJ_kWh*0.000000697; lognormal variance with pedigree 0.4306, pedigree (5,3,5,5,3)
  (same comment as for Antimony ion)
- Thorium-232 [air, non-urban air or from high stacks]: 1.22981e-5 kBq; name thorium_232; = factor_MJ_kWh*0.0000011; lognormal variance with pedigree 0.4306, pedigree (5,3,5,5,3)
  (same comment as for Antimony ion)
- Toluene [air, non-urban air or from high stacks]: 1.21863e-6 kg; name toluene; = factor_MJ_kWh*0.000000109; lognormal variance with pedigree 0.112, pedigree (3,5,5,5,1)
  (same comment as for Benzene)
- Uranium-238 [air, non-urban air or from high stacks]: 2.01242e-5 kBq; name uranium_238; = factor_MJ_kWh*0.0000018; lognormal variance with pedigree 0.4306, pedigree (5,3,5,5,3)
  (same comment as for Antimony ion)
- Vanadium V [air, non-urban air or from high stacks]: 3.7677e-8 kg; name vanadium; = factor_MJ_kWh*0.00000000337; lognormal variance with pedigree 0.7806, pedigree (5,3,5,5,3)
  (same comment as for Antimony ion)
- Water [air, unspecified]: 0.00152971 m3; name water_to_air_unspecified; = (water_completely_softened/1000)*fraction_WCS_to_air+(water_decarbonised_user/1000)*fraction_WDC_to_air+water_cooling_UNO_input*fraction_CW_to_air; lognormal variance with pedigree 0.130025, pedigree (4,4,5,2,4)
  Calculated value based on literature values and expert opinion. See comments in the parametres" comment field.
  property fraction, origin: fresh water 0.0487363; name fraction_origin_fresh_water
  property fraction, origin: salt water 0; name fraction_origin_salt_water
  property fraction, origin: unspecified 0.951264; name fraction_origin_unspecified
- Xylenes, unspecified [air, non-urban air or from high stacks]: 1.03081e-5 kg; name xylene; = factor_MJ_kWh*0.000000922; lognormal variance with pedigree 0.112, pedigree (3,5,5,5,1)
  (same comment as for Benzene)
- Zinc II [air, non-urban air or from high stacks]: 1.94534e-7 kg; name zinc; = factor_MJ_kWh*0.0000000174; lognormal variance with pedigree 0.7806, pedigree (5,3,5,5,3)
  (same comment as for Antimony ion)
- Water [water, unspecified]: 0.0590634 m3; name water_to_water_unspecified; = (water_completely_softened/1000)*(1-fraction_WCS_to_air)+(water_decarbonised_user/1000)*(1-fraction_WDC_to_air)+water_cooling_UNO_input*(1-fraction_CW_to_air); lognormal variance with pedigree 0.130025, pedigree (4,4,5,2,4)
  (same comment as for Water)
  property fraction, origin: fresh water 0.0437165; name fraction_origin_fresh_water_Ww
  property fraction, origin: salt water 0; name fraction_origin_salt_water_Ww
  property fraction, origin: unspecified 0.956283; name fraction_origin_unspecified_Ww

## Sampling procedure
literature and statistics

## Extrapolations
Most of the exchanges were extrapolated through production-weighted averages of the datasets of the following 10 countries: AT, BA, CZ, DE, ES, FR, HU, PL, SI, SK.

The original data were valid for the burning of 1MJ of lignite. In this dataset, the values are scaled to the net output of 1kWh of electricity, based on the electrical efficiency.
