# uranium enrichment diffusion facility construction

Dataset: EcoSpold 2, unit process
Geography: RoW
Time period: 1980-01-01 to 2023-12-31
Technology level: current
Classification: EcoSpold01Categories: nuclear power/production
Classification: ISIC rev.4 ecoinvent: 4290:Construction of other civil engineering projects
Tags: ConvertedDataset
Scenario: Business-as-Usual
System model: Allocation, cut-off by classification
Generated by: [System]
Published in: Dones, R. 2007
Database: ecoinvent
isCopyrightProtected: true
accessRestrictedTo: 1

## General comment
The data on material and energy requirement for construction are taken from an old US reference using a "model diffusion plants" and are amplified by a factor of 1.2 to take into account the differences in the installed capacity of the currently operating diffusion plants (EURODIF and USEC Paducah). The land use corresponds to the USEC plant, which is presumably the most consistent with the material inventory. It is assumed that 75% of reinforced concrete is dumped as non-contaminated waste from decommissioning.
[This dataset was already contained in the ecoinvent database version 2. It was not individually updated during the transfer to ecoinvent version 3. Life Cycle Impact Assessment results may still have changed, as they are affected by changes in the supply chain, i.e. in other datasets. This dataset was generated following the ecoinvent quality guidelines for version 2. It may have been subject to central changes described in the ecoinvent version 3 change report (http://www.ecoinvent.org/database/ecoinvent-version-3/reports-of-changes/), and the results of the central updates were reviewed extensively. The changes added e.g. consistent water flows and other information throughout the database. The documentation of this dataset can be found in the ecoinvent reports of version 2, which are still available via the ecoinvent website. The change report linked above covers all central changes that were made during the conversion process.]

## Included activities end
The module includes: estimated land use of a plant with capacity of 8750 t SWU (separative work unit); energy (electricity, diesel, and light oil) and material requirements for the construction of the facility; transport requirements during construction; energy and transport requirements (for non-contaminated inerts concrete with reinforcing bars) during decommissioning; disposal of the non-contaminated inerts. The non contaminated metals are assumed to be recycled.

## Geography
US data.

## Technology
Available construction material and energy data, used as basis for this extrapolation, refer to a model plant in early 1980s.

## Reference product
- uranium enrichment diffusion facility: 1 unit; By-product classification allocatable product; CPC 53269: Other constructions for manufacturing
  EcoSpold01Location=US
  production volume 0.0445714 unit
    23 million SWU (http://www.wise-uranium.org/efac.html#ENR) ; Lifetime capacity per facility: 262.5 million SWU (8.75 million SWU in 30 years)
  property price 7.07932e8 EUR2005
    Calculated based on inputs: The price of the product has been calculated as a sum of the values of the material and energy inputs for this product. This value is therefore a rough estimation. It may underestimate the real price since there are additional expenses when producing any product. These expences can include for example labour costs, treatment of waste materials and profit for the producer. Please consider carefully whether this level of data quality is acceptable for your application.
  properties: carbon allocation 0 kg, carbon content 0

## Inputs from technosphere
- aluminium, wrought alloy: 6.6e6 kg; lognormal variance with pedigree 0.162, pedigree (1,1,5,5,1)
  old reference
  EcoSpold01Location=RER
  properties: dry mass 1 kg, wet mass 1 kg
- concrete, normal strength: 5543.4, 1217.3, 1924.06, 791.789, 1057.29, 9854.94, 11682.5, 417929 m3 (8 suppliers, which the file names only by identifier); sum of these 450000 m3; lognormal variance with pedigree 0.162, pedigree (1,1,5,5,1)
  old reference
  EcoSpold01Location=CH
  properties: dry mass 2190 kg, water content 0.086758, wet mass 2380 kg
- copper, cathode: 5.54e6 kg; lognormal variance with pedigree 0.162, pedigree (1,1,5,5,1)
  old reference
  EcoSpold01Location=RER
  properties: dry mass 1 kg, wet mass 1 kg
- diesel, burned in building machine: 1e10 MJ; lognormal variance with pedigree 0.162, pedigree (1,1,5,5,1)
  old reference
  EcoSpold01Location=GLO
  properties: heating value, net 1 MJ
- diesel, burned in diesel-electric generating set, 10MW: 1e10 MJ; lognormal variance with pedigree 0.162, pedigree (1,1,5,5,1)
  old reference
  EcoSpold01Location=GLO
  properties: heating value, net 1 MJ
- electricity, high voltage: 4.59e6 kWh; lognormal variance with pedigree 0.042, pedigree (1,1,5,5,1)
  Data Paducah 2008. Electricity from reservoir hydropower plants. As a simplifying assumption, reservoir plants are modelled as non-alpine reservoir plants. Alpine and tropical reservoir hydropower plants are neglected.
- electricity, high voltage: 164370, 2.0933e6, 3.74491e6, 2.71108e6, 5.35131e7, 822591, 5.59206e6, 35758.1, 1.17228e7 kWh (9 suppliers, which the file names only by identifier); sum of these 8.04e7 kWh; = 58200000+22200000; lognormal variance with pedigree 0.0406, pedigree (1,1,5,1,1)
  data Paducah 2006
  EcoSpold01Location=SERC
- nickel, class 1: 4.08e6 kg; lognormal variance with pedigree 0.162, pedigree (1,1,5,5,1)
  EcoSpold01Location=GLO
  old reference
  properties: dry mass 1 kg, wet mass 1 kg
- plywood: 53.1116, 1126.89 m3 (2 suppliers, which the file names only by identifier); sum of these 1180 m3; lognormal variance with pedigree 0.162, pedigree (1,1,5,5,1)
  old reference
  EcoSpold01Location=RER
  properties: carbon content, fossil 0.09783, carbon content, non-fossil 0.409818, dry mass 768.6 kg, heating value, net 11688.9 MJ, price 400 EUR2005, water content 0.070778, wet mass 823 kg
- reinforcing steel: 5.4e7 kg; lognormal variance with pedigree 0.162, pedigree (1,1,5,5,1)
  EcoSpold01Location=RER
  old reference
  properties: carbon content, fossil 0.004, dry mass 1 kg, wet mass 1 kg
- steel, chromium steel 18/8, hot rolled: 1.5e8 kg
  EcoSpold01Location=RER
  properties: carbon content, fossil 0.0008, dry mass 1 kg, wet mass 1 kg
  note on carbon content, fossil: Stainless steel model is the grade 304 steel (18/8 stainless, 18% chromium 8% nickel; max. 0.08% C)
- steel, low-alloyed, hot rolled: 1.5e8 kg; lognormal variance with pedigree 0.162, pedigree (1,1,5,5,1)
  old reference
  EcoSpold01Location=RER
  properties: carbon content, fossil 0.005, dry mass 1 kg, wet mass 1 kg
  note on carbon content, fossil: Low alloyed steel composition given in Tab. 3.2 ecoinvent v2.2 report 10_partII. Steel assumed to have a C content of 0.5%
- stone wool: 560000 kg; lognormal variance with pedigree 0.162, pedigree (1,1,5,5,1)
  EcoSpold01Location=CH
  old reference
  properties: carbon content, fossil 0.015401, dry mass 1 kg, wet mass 1 kg
  note on carbon content, fossil: The chemical composition of the glass fibres used in the rock wool production is similar to the composition of naturally cooled volcano basalt and has a composition listed in Tab. 3.1 and 3.2 in ecoinvent v2.2 report 16, part XIV. Rock wool contains: a minimum of 96% mineral fibres,between 0.5 and 3.0 weight percent of phenolic resin depending on the specific product characteristics, and about 0.2 percent mineral oil (ecoinvent v2.2 report 16, part XIV). An average composition of 1.8% phenolic resin, 0.2% mineral oil, and 98% mineral fibres has been assumed and used to calculate C content of the rock wool
- waste reinforced concrete: -3.27175e7, -346667, -4.66936e8 kg (3 suppliers, which the file names only by identifier); sum of these -5e8 kg; lognormal variance with pedigree 0.122, pedigree (1,1,1,5,1)
  EcoSpold01Location=CH
  old reference
  production volume
    Calculated from the production volume of uranium enrichment diffusion facility in proportion to the respective output amounts.
  properties: dry mass 0.99418 kg, water content 0.00585407, wet mass 1 kg

## Inputs from nature
All rows: lognormal variance with pedigree 0.162, pedigree (1,1,5,5,1)
- Occupation, industrial area [natural resource, land]: 3.6e7 m2*year
  own estimation
- Transformation, from industrial area [natural resource, land]: 1.2e6 m2
  own estimation
- Transformation, from unspecified [natural resource, land]: 1.2e6 m2
  own estimation
- Transformation, to industrial area [natural resource, land]: 1.2e6 m2
  own estimation
- Transformation, to unspecified [natural resource, land]: 1.2e6 m2
  own estimation

## Sampling procedure
Literature

## Extrapolations
none This dataset has been copied from an original dataset covering the geography US. The uncertainty has been adjusted accordingly.

## Review by Thomas Nemecek 2007-08-24
Passed.
