# treatment of residues, MSWI, waste rubber, unspecified, residual material landfill

Dataset: EcoSpold 2, unit process
Geography: RoW
Time period: 1994-01-01 to 2023-12-31
Technology level: current
Classification: ISIC rev.4 ecoinvent: 3822:Treatment and disposal of hazardous waste
Scenario: Business-as-Usual
System model: Allocation, cut-off by classification
Generated by: Mattia Clementi
Database: ecoinvent
isCopyrightProtected: true
accessRestrictedTo: 1

## General comment
The process represents the treatment of controlled landfilling in residual material landfill of a waste (residues) that is exclusively produced in another waste treatment. Residues are a by-product that is generated during the municipal solid waste incineration (MSWI) of 'waste rubber, unspecified'. Recommended use of this dataset: to be used within the specific chain of treatments for 'waste rubber, unspecified'. Share of biogenic carbon in the sludge: 0%.

## Included activities start
The activity starts with the waste being available at the gate of the treatment facility. Collection and transportation of the waste to the treatment plant is not included.

## Included activities end
The activity ends with the waste being treated and waste-specific emissions from the landfill are released to water (short-term emissions to river water and long-term emissions to ground water).

## Geography
Modelling parameters affecting the treatment technology are not specific to this geography.

## Technology
Residual material landfill for polluted, inorganic waste with base seal and leachate collection system (landfill type C). Recultivation after closure.

## Reference product
- residues, MSWI, waste rubber, unspecified: -1 kg; By-product classification Waste; CPC 3932: Ash and residue (except from the manufacture of iron or steel), containing metals or metallic compounds, except[…]; HS2017 262110: Slag and ash; ash and residues from the incineration of municipal waste
  main reference product of this activity (supply of disposal service).
  production volume 5.97598e7 kg
    calculated in proportion to incinerated waste reference product
  property price 0 EUR2005
    Waste products are assigned a price of zero as they are assumed to require further treatment.
  properties: bromine content 0.00318325, cadmium content 0.000242382, carbon allocation 0.0416847 kg, carbon content 0.0416847, carbon content, fossil 0.0416847, carbon content, non-fossil 0, chlorine content 0.209477, dry mass 1 kg, lead content 0.00118011, mercury content 3.09183e-8, nickel content 3.89201e-5, oxygen content 0.334343, sulfur content 0.0440934, water content 0, water in wet mass 0 kg, wet mass 1 kg, zinc content 0.365757

## Inputs from technosphere
- cement, unspecified: 0.000494757, 0.00906934, 0.000234332, 0.00552688, 0.0344431, 0.00108113, 0.000790256, 0.000428297, 0.000851241, 0.0013014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 kg (11 suppliers, which the file names only by identifier); sum of these 0.4 kg; lognormal variance with pedigree 0.049084, pedigree (1,1,5,1,1)
  cement required for solidification of landfilled residual material
  Uncertainty: Uncertainty calculated from uncertainty of composition of incinerated waste, and incinerator model uncertainty and residual material landfill transfer coefficient uncertainty.
  properties: dry mass 1 kg, wet mass 1 kg
- process-specific burdens, residual material landfill: 0.988302, 0.0116981 kg (2 suppliers, which the file names only by identifier); sum of these 1 kg
  mass-specific expenditures required for landfilling of residual material
- residual material landfill: 2.0833e-9 unit
  residual material landfill infrastructure required for landfilling of residual material
- waste cement, hydrated: -4.82186e-5, -0.999952 kg (2 suppliers, which the file names only by identifier); sum of these -1 kg
  hydrated cement output for solidification of landfilled residual material
  production volume
    calculated in proportion to incineration residues landfilled
  properties: dry mass 1 kg, wet mass 1 kg

## Inputs from nature
- Organic carbon, placed in landfill [inventory indicator, waste]: 0.041685 kg
  Mass of organic carbon in waste (without inorganic carbon), initially put in residual material landfill. The exchange represents a flow that is within the technosphere. This exchange should only be used to apply ecofactors for the Swiss LCIA method of Ecological Scarcity and not any other purpose.
- Waste mass, total, placed in landfill [inventory indicator, waste]: 1 kg
  Mass of waste initially put in a residual material landfill. The exchange represents a flow that is within the technosphere. This exchange should only be used to apply ecofactors for the Swiss LCIA method of Ecological Scarcity and not any other purpose.

## Emissions to nature
- Hazardous waste disposed [inventory indicator, waste]: 1 kg
  Inventory indicator for waste mass disposed. To be used in EN15804 "other data" results.
- BOD5, Biological Oxygen Demand [water, ground-, long-term]: 0.022268 kg
  complement of long-term emissions from residual material in residual material landfill
- BOD5, Biological Oxygen Demand [water, surface water]: 3.7176e-5 kg; lognormal variance with pedigree 0.62693, pedigree (1,1,5,1,1)
  short-term emissions from residual material in residual material landfill
  Uncertainty: Uncertainty calculated from uncertainty of composition of incinerated waste, and incinerator model uncertainty and residual material landfill transfer coefficient uncertainty.
- Bromine [water, ground-, long-term]: 0.00062614 kg; lognormal variance with pedigree 0.84527, pedigree (1,1,5,1,1)
  complement of long-term emissions from residual material in residual material landfill
  Uncertainty: Uncertainty calculated from uncertainty of composition of incinerated waste, and incinerator model uncertainty and residual material landfill transfer coefficient uncertainty.
- Bromine [water, surface water]: 0.0025571 kg; lognormal variance with pedigree 0.82916, pedigree (1,1,5,1,1)
  (same comment as for BOD5, Biological Oxygen Demand)
- COD, Chemical Oxygen Demand [water, ground-, long-term]: 0.068079 kg
  complement of long-term emissions from residual material in residual material landfill
- COD, Chemical Oxygen Demand [water, surface water]: 0.00011365 kg; lognormal variance with pedigree 0.62693, pedigree (1,1,5,1,1)
  (same comment as for BOD5, Biological Oxygen Demand)
- Cadmium II [water, ground-, long-term]: 1.6455e-6 kg; lognormal variance with pedigree 7.4925, pedigree (1,1,5,1,1)
  (same comment as for Bromine)
- Cadmium II [water, surface water]: 2.7471e-9 kg; lognormal variance with pedigree 2.5047, pedigree (1,1,5,1,1)
  (same comment as for BOD5, Biological Oxygen Demand)
- Chloride [water, ground-, long-term]: 0.14956 kg; lognormal variance with pedigree 0.26207, pedigree (1,1,5,1,1)
  (same comment as for Bromine)
- Chloride [water, surface water]: 0.059912 kg; lognormal variance with pedigree 0.29941, pedigree (1,1,5,1,1)
  (same comment as for BOD5, Biological Oxygen Demand)
- DOC, Dissolved Organic Carbon [water, ground-, long-term]: 0.026939 kg
  complement of long-term emissions from residual material in residual material landfill
- DOC, Dissolved Organic Carbon [water, surface water]: 4.4973e-5 kg; lognormal variance with pedigree 0.62693, pedigree (1,1,5,1,1)
  (same comment as for BOD5, Biological Oxygen Demand)
- Lead II [water, ground-, long-term]: 6.1214e-6 kg; lognormal variance with pedigree 7.8825, pedigree (1,1,5,1,1)
  (same comment as for Bromine)
- Lead II [water, surface water]: 1.0219e-8 kg; lognormal variance with pedigree 2.2402, pedigree (1,1,5,1,1)
  (same comment as for BOD5, Biological Oxygen Demand)
- Mercury II [water, ground-, long-term]: 1.4594e-9 kg; lognormal variance with pedigree 3.6986, pedigree (1,1,5,1,1)
  (same comment as for Bromine)
- Mercury II [water, surface water]: 2.4364e-12 kg; lognormal variance with pedigree 2.355, pedigree (1,1,5,1,1)
  (same comment as for BOD5, Biological Oxygen Demand)
- Nickel II [water, ground-, long-term]: 1.4091e-5 kg; lognormal variance with pedigree 1.02457, pedigree (1,1,5,1,1)
  (same comment as for Bromine)
- Nickel II [water, surface water]: 2.3523e-8 kg; lognormal variance with pedigree 1.485, pedigree (1,1,5,1,1)
  (same comment as for BOD5, Biological Oxygen Demand)
- Sulfate [water, ground-, long-term]: 0.11809 kg; lognormal variance with pedigree 0.3533, pedigree (1,1,5,1,1)
  (same comment as for Bromine)
- Sulfate [water, surface water]: 0.014192 kg; lognormal variance with pedigree 0.46656, pedigree (1,1,5,1,1)
  (same comment as for BOD5, Biological Oxygen Demand)
- TOC, Total Organic Carbon [water, ground-, long-term]: 0.026939 kg
  complement of long-term emissions from residual material in residual material landfill
- TOC, Total Organic Carbon [water, surface water]: 4.4973e-5 kg; lognormal variance with pedigree 0.62693, pedigree (1,1,5,1,1)
  (same comment as for BOD5, Biological Oxygen Demand)
- Zinc II [water, ground-, long-term]: 0.0044827 kg; lognormal variance with pedigree 5.1227, pedigree (1,1,5,1,1)
  (same comment as for Bromine)
- Zinc II [water, surface water]: 7.4837e-6 kg; lognormal variance with pedigree 1.4444, pedigree (1,1,5,1,1)
  (same comment as for BOD5, Biological Oxygen Demand)
