# gravel production, crushed

Dataset: EcoSpold 2, unit process
Geography: BR
Time period: 2015-01-01 to 2023-12-31
Technology level: current
Classification: EcoSpold01Categories: construction materials/additives
Classification: ISIC rev.4 ecoinvent: 0810:Quarrying of stone, sand and clay
Synonyms: crushed stone; aggregate
Scenario: Business-as-Usual
System model: Allocation, cut-off by classification
Share of production covered: 2.1 %
Generated by: Fernanda Belizario Silva
Published in: Silva, F. B. 2017
Database: ecoinvent
isCopyrightProtected: true
accessRestrictedTo: 1

## General comment
This dataset describes the production of crushed stone, usually applied in construction materials, from open granite or basalt quarries, which represents the typical stone quarrying process in Brazil. Natural stone is quarried by explosion and stone crushing is performed with crushers and vibrating sieves, connected by conveyor belts, all powered by electricity. The series of crushers and sieves produce gravel of different sizes, classified according to their size: #1 (4,8mm to 25mm); #2 (9,5mm to 32mm); #3 (19mm to 50mm) and #4 (32mm to 76mm) - size classification is a commercial convention, based on the superseded version of ABNT NBR 7211. Harvested rainwater is used for dust control. Gravel is not washed. The dataset includes the quarrying and crushing processes, as well as equipment maintenance and infrastructure. Although finer stones require more crushing energy than coarse ones, no distinction between gravel sizes was done, due to lack of detailed information. Administration and the quarry’s end of life are not taken into account. Data were collected in 03 quarries located in the state of São Paulo, Brazil, with current technology. The representativeness of the dataset on a national scale is low (2,1%).
ABNT - Associação Brasileira de Normas Técnicas. ABNT NBR 7211 - Agregados para concreto - Especificação (National Standard).

## Included activities start
From the mining of stone (granite) in open pits by blasting and drilling. Removal of the top soil layer (overburden) is not considered.

## Included activities end
Includes the transportation of large stone blocks from the pit to the primary crusher by trucks, the crushing process (with a series of crushers of various types and screens connected by conveyor belts), the storing of crushed gravel in piles according to gravel size, until and including truck loading for gravel delivery (but not the delivery itself). It also includes the land use (mineral extraction site and lake, no distinction of internal roads) considering a 80 years lifespan for the quarry. The dataset does not include activities related to the end-of-life of the mine due to lack of data and national regulations about this issue. The dataset does not include administration activities.

## Geography
This dataset represents production of crushed gravel for Brazil. Data come from primary data collection in Brazil.

## Technology
Current technology for crushed gravel production in Brazil.

## Time period
The time period is set to the year 2015-2016 as the data were collected in the years of 2015 and 2016

## Reference product
- gravel, crushed: 1 kg; name ref; By-product classification allocatable product; CPC 15320: Pebbles, gravel, broken or crushed stone, macadam; granules, chippings and powder of stone; HS2017 251710: Pebbles, gravel, broken or crushed stone; of a kind commonly used for concrete aggregates, for road metalli[...]
  Crushed gravel used as aggregate for construction, usually applied for concrete production or as a raw material in pavement subbase. According to the Brazilian standard ABNT NBR 7211, coarse aggregates (which includes crushed gravel) have a particle size between 4,75 mm and 75 mm. Gravel is classified by grain size, but information regarding weight proportions of each size not available.
  production volume 2.097e11 kg; name ref_PV
    Calculated value. Annual gravel production volume of 2014 in Brazil according to DNPM (2015). To adjust production volume for the year of 2016, cement production data from the National Union of the Cement Industry in Brazil (SNIC) for 2014 and 2016 were used, assuming that there is a direct correlation between cement and gravel production
  property price 0.00828715 EUR2005
    Price, average unit value, dollars per metric ton in 2022 of crushed stone (gravel, crushed) of 14 USD/metric ton. The price is the annual average free-on-board plant prices, usually at the first point of sale or captive use, as reported by crushed stone producing companies. Prices do not include transportation from the plant or yard to the consumer, although they do include all costs of mining, processing, in-plant transportation, overhead, and profit. Value retrieved from USGS, Mineral Commodity Summaries 2023, accessed on 20230918: https://pubs.usgs.gov/periodicals/mcs2023/mcs2023-stone-crushed.pdf from https://www.usgs.gov/centers/national-minerals-information-center/crushed-stone-statistics-and-information
    The price was converted to EUR based on the annual exchange rates published by the European Central Bank (https://sdw.ecb.europa.eu/quickview.do?SERIES_KEY=120.EXR.A.USD.EUR.SP00.A, last accessed on 2023-06-01) and adjusted for inflation relative to 2005 using the producer price index (PPI) of the euro area, published by eurostat (https://ec.europa.eu/eurostat/databrowser/view/STS_INPP_A__custom_6416181/default/table?lang=en, last accessed on 2023-06-01).
  properties: carbon allocation 0 kg, carbon content 0, carbon content, fossil 0, carbon content, non-fossil 0, dry mass 1 kg, water content 0, water in wet mass 0 kg, wet mass 1 kg

## Inputs from technosphere
- blasting: 0.00037 kg; lognormal variance with pedigree 0.0516, pedigree (2,3,3,1,4)
  Measured value. Explosive consumption for rock extraction informed by manufacturers. Blasting/GLO was taken as a proxy of explosive use due to lack of more specific data on explosive production. The "Blasting/GLO" dataset includes the emissions from the explosive use, but not from the blasted rock itself.
  Uncertainty: B
- building, hall: 4.16e-9 m2; lognormal variance with pedigree 0.306, pedigree (3,4,3,1,1)
  Measured value from aerial pictures of 01 manufacturer. Equipment lifespan was assumed to be 25 years.
  Uncertainty: S
- conveyor belt: 3.9e-9 m; lognormal variance with pedigree 0.306, pedigree (3,4,3,1,1)
  (same comment as for building, hall)
- diesel, burned in building machine: 0.0272157 MJ; = (7.57*10^-4) * density * net_cal_value*42.8; lognormal variance with pedigree 0.0112, pedigree (2,3,3,1,1)
  Calculated value. Diesel consumption informed by manufacturers for drilling, internal transportation and loading equipment (in L).
  Uncertainty: B
  property density 0.84 kg/l; name density
  property heating value, net 1 MJ; name net_cal_value
- electricity, medium voltage: 0.00274 kWh; lognormal variance with pedigree 0.0762, pedigree (2,3,3,1,1)
  Measured value. Electricity consumption informed by manufacturers for crushers, sieves, conveyor belts and other small electrical equipment in the quarry.
  Uncertainty: B
- industrial machine, heavy, unspecified: 5.8e-6 kg; lognormal variance with pedigree 0.306, pedigree (3,4,3,1,1)
  Measured value. Machinery weight was calculated using specification provided by gravel manufacturers. Equipment lifespan was assumed to be 25 years.
  Uncertainty: S
- lubricating oil: 8.56e-6 kg; name oil_input; lognormal variance with pedigree 0.0052, pedigree (2,4,3,1,1)
  Measured value. Consumption informed by 01 manufacturer for equipment maintenance.
  Uncertainty: S
  property carbon content, fossil 0.75; name oil_input_CC
  properties: dry mass 1 kg, heating value, net 40.2 MJ, wet mass 1 kg
  note on carbon content, fossil: Lubricating oil is produced from diesel. C-content/dry mass of fats and oils considered 75%, from: ecoinvent v2.2 report, n 15a, pg 40
  note on heating value, net: Literature value, Source: IPCC 2006, 2006 IPCC Guidelines for National Greenhouse Gas Inventories, Prepared by the National Greenhouse Gas Inventories Programme, Eggleston H.S., Buendia L., Miwa K., Ngara T. and Tanabe K. (eds). Published: IGES, Japan
- scrap steel: -3.16e-5 kg; name scrap_steel; = steel_input; lognormal variance with pedigree 0.0046, pedigree (3,4,1,1,1)
  Estimation. Same amount as the input.
  Uncertainty: S
  production volume; = ref_PV * scrap_steel / ref
    Calculated from production volume of reference product using the relative outputs.
  properties: carbon content, fossil 0.005, dry mass 1 kg, wet mass 1 kg
- steel, low-alloyed, hot rolled: 3.16e-5 kg; name steel_input; lognormal variance with pedigree 0.0052, pedigree (2,4,3,1,1)
  Measured value. Consumption informed by 01 manufacturer for replacement of steel parts for equipment maintenance.
  Uncertainty: S
  property carbon content, fossil 0.005; name steel_input_CC
  properties: dry mass 1 kg, wet mass 1 kg
  note on carbon content, fossil: Low alloyed steel composition given in Tab. 3.2 ecoinvent v2.2 report 10_partII. Steel assumed to have a C content of 0.5%
- synthetic rubber: 8.91e-6 kg; name rubber_input; lognormal variance with pedigree 0.0052, pedigree (2,4,3,1,1)
  Measured value. Consumption informed by 01 manufacturer for replacement of rubber parts for equipment maintenance.
  Uncertainty: S
  property carbon content, fossil 0.871949; name rubber_input_CC
  properties: dry mass 1 kg, heating value, net 26.42 MJ, wet mass 1 kg
  note on carbon content, fossil: EPDM (Ethylene-propene-diene terpolymer) rubber is a terpolymer of ethylene, propene, and a diene with the residual unsaturated portion of the diene in the side chain (ecoinvent v2.2 report 7-part XX & Ullmann). Chemical formula (deduced from Evidences of Solvent-Induced Miscibility in Polychloroprene-co-Ethylene-Propene Diene Terpolymer Blends, Dubey et al., Journal of Applied Polymer Science, 2009, 111:1884-1891): C20H35
- waste mineral oil: -8.56e-6 kg; name wasteMineralOil; = oil_input; lognormal variance with pedigree 0.0046, pedigree (3,4,1,1,1)
  Estimation. Same amount as the input
  Uncertainty: S
  production volume; = ref_PV* wasteMineralOil/ref
    Calculated based on the reference exchange production volume and the relative amounts of exchanges
  properties: carbon content, fossil 0.75, dry mass 1 kg, heating value, net 34.7 MJ, wet mass 1 kg
  note on heating value, net: Value taken from the general comment of the treatment dataset.
- waste rubber, unspecified: -8.91e-6 kg; name waste_rubber; = rubber_input; lognormal variance with pedigree 0.0046, pedigree (3,4,1,1,1)
  Estimation. Same amount as the input.
  Uncertainty: S
  production volume; = ref_PV * waste_rubber / ref
    Calculated from production volume of reference product using the relative outputs.
  properties: carbon content, fossil 0.871949, dry mass 1 kg, heating value, net 27.19 MJ, wet mass 1 kg
- water, harvested from rainwater: 0.0205 kg; name water_input; lognormal variance with pedigree 0.0627, pedigree (3,3,3,1,1)
  Estimation. Rainwater harvested at the quarry site and stored in an internal lake. Amount estimated by manufacturers based on an average number of daily trips of water trucks that spray water over the facility for dust control.
  Uncertainty: B
  properties: carbon content, fossil 0.0017899, dry mass 0.00034 kg, water content 2940.2, wet mass 1 kg

## Inputs from nature
- Granite [natural resource, in ground]: 1 kg; lognormal variance with pedigree 0.0038, pedigree (2,3,3,1,1)
  Estimation. No losses in the process were considered.
  Uncertainty: S
- Occupation, lake, artificial [natural resource, land]: 9.824e-6 m2*year; = area_lake * lifetime; lognormal variance with pedigree 0.0082, pedigree (2,3,3,1,1)
  Calculated value. Occupied area x estimated lifetime of the quarry.
  Uncertainty: B
- Occupation, mineral extraction site [natural resource, land]: 0.000235776 m2*year; = area_mes * lifetime; lognormal variance with pedigree 0.0892, pedigree (2,3,3,1,1)
  Calculated value. Occupied area x estimated lifetime of the quarry.
  Uncertainty: B
- Transformation, from unspecified [natural resource, land]: 3.07e-6 m2; name area_from; lognormal variance with pedigree 0.0842, pedigree (2,3,3,1,1)
  Measured value. Total area of the quarry was calculated with the help of aerial images. The area was divided by the total production volume of each quarry over an estimated lifespan of 80 years. Total production volume was calculated based on the extrapolation of the production volume of the year for which data was provided.
  Uncertainty: B
- Transformation, to lake, artificial [natural resource, land]: 1.228e-7 m2; name area_lake; = area_from * 0,04; lognormal variance with pedigree 0.0082, pedigree (2,3,3,1,1)
  Calculated value . Share of area of artificial lake (used for storing harvested rainwater) was calculated with the help of aerial images (4% of total quarry area).
  Uncertainty: B
- Transformation, to mineral extraction site [natural resource, land]: 2.9472e-6 m2; name area_mes; = area_from * 0,96; lognormal variance with pedigree 0.0892, pedigree (2,3,3,1,1)
  Calculated value. Share of area of mineral extraction site (quarry and crushing areas) was calculated with the help of aerial images (96% of total quarry area).
  Uncertainty: B
  property lifetime 80 year; name lifetime

## Emissions to nature
- Particulate Matter, < 2.5 um [air, unspecified]: 2.17e-7 kg; source US EPA 2004; lognormal variance with pedigree 0.3526, pedigree (3,5,5,5,2)
  Calculated value. Emission factors taken from US-EPA (PM-2.5), Table 11.19.2-1, for controlled sources (wet suppression of dust). Does not include emissions for the stone quarry blasting operations.
  Uncertainty: S
- Particulate Matter, > 10 um [air, unspecified]: 2.71e-6 kg; source US EPA 2004; lognormal variance with pedigree 0.0926, pedigree (3,5,5,5,2)
  Calculated value. Emission factors taken from US-EPA (Total Particulate Matter minus PM-10), Table 11.19.2-1, for controlled sources (wet suppression of dust). Does not include emissions for the stone quarry blasting operations.
  Uncertainty: S
- Particulate Matter, > 2.5 um and < 10um [air, unspecified]: 2.78e-6 kg; source US EPA 2004; lognormal variance with pedigree 0.1726, pedigree (3,5,5,5,2)
  Calculated value. Emission factors taken from US-EPA (PM-10 minus PM-2.5), Table 11.19.2-1, for controlled sources (wet suppression of dust). Does not include emissions for the stone quarry blasting operations.
  Uncertainty: S
- Water [air, unspecified]: 2.05e-5 m3; = water_input/1000; source Vionnet, S. 2012; lognormal variance with pedigree 0.092, pedigree (4,4,3,1,4)
  Estimation. Evaporation rate of 100%, based on the evaporation rate for limestone mine (dust control) of Vionnet et al. 2012.
  Uncertainty: S

## Sampling procedure
Sample consists of 03 gravel production facilities located the state of São Paulo (Brazil), thus with limited representativeness on a national scale.
Data gathered using questionnaires developed by the dataset authors and filled in by production managers of the facilities and checked afterwards during meetings with these managers. Data represent 01 year of quarry operation (2015 or 2016).
Unit flows were calculated for each quarry, by dividing the amounts of inputs and outputs by the total gravel production in mass, regardless of gravel size (gravel size was not considered due to lack of detailed data). The unit flows of the dataset are the simple average of the unit flows of each quarry - as the sample is low, a weighted average could lead to a wrong estimate.
Land use parameters are based on information from the years 2015 and 2016. Infrastructure data was estimated based on crushers and sieves specifications and on aerial pictures of one quarry.
Particulate emission was modelled using emission factors for crushed stone processing developed by US-EPA - those factors take into account processing but do not consider the extraction of stone by blasting, due to poor-quality test data for the last process and thus, particulate matter emission is underestimated.
Water emission (evaporation) was modelled considering an evaporation rate of 100% of the water used for dust control (Vionnet et al. 2012).
Basic uncertainty was estimated by the variation between the single values of each quarry (not standard uncertainty values, except for specific flows) and additional uncertainty was estimated using Pedigree scores.
The amount of the exchanges were calculated considering the average of the sample. No conversion to the geometric mean of the lognormal distribution was done, for consistency reasons with other ecoinvent datasets.

## Extrapolations
Data from a specific state (São Paulo) and a small sample is extrapolated to represent the production in the whole country (Brazil). Pedigree scores for completeness have been adjusted accordingly. The main values are considered representative for a typical production of gravel in Brazil
