# stibnite mine operation and beneficiation

Dataset: EcoSpold 2, unit process
Geography: RoW
Time period: 1994-01-01 to 2023-12-31
Technology level: current
Classification: ISIC rev.4 ecoinvent: 0729:Mining of other non-ferrous metal ores
Scenario: Business-as-Usual
System model: Allocation, cut-off by classification
Generated by: Hans-Jörg Althaus
Published in: Classen M. 2009
Database: ecoinvent
isCopyrightProtected: true
accessRestrictedTo: 1

## General comment
This dataset represents global mining and beneficiation of Stibnite and the production of stibnite concentrate from it.
Due to lack of information about the mining of stibnite, this dataset is mainly approximated with data from the mining and beneficiation of molybdenite from coupled production with copper (Classen et al., 2009). This dataset should not be used if its relative importance is high in the product system that is modelled. For more details about the origin of the data, refer to the Sampling Procedure and exchange comments.

## Included activities start
This activity starts with the extraction of stibnite ore from the ground.

## Included activities end
The activity includes the mining and the beneficiation step with the mining infrastructure and disposal of overburden and tailings.

## Geography
This dataset is a copy of the stibnite mine operation concerned with China and has been adapted to cover global production.

## Technology
This dataset is approximated with values from molybdenum mining and beneficiation (coupled with copper mining). See Classen et al (2009) Part XVI.

## Parameters
- fraction, process water, to air: 0.2 dimensionless; lognormal variance with pedigree 0.25, pedigree (5,5,5,5,5)

## Reference product
- stibnite concentrate: 1 kg; name stibnite_concentrate; By-product classification allocatable product; CPC 14290: Other non-ferrous metal ores and concentrates (other than uranium or thorium ores and concentrates); HS2017 261790: Ores and concentrates n.e.c. in chapter 26; other than antimony
  The Antimony content is based on the values in "Anthropogenic antimony flow analysis and evaluation in China" J. Chu et al., 2019
  production volume 2.41518e8 kg; name stibnite_concentrate_PV; = 162000000 / 0.2683
    Based on the U.S. Geological Survey, Mineral Commodity Summaries, (2021) reporting 162000000 kg and the antimony content of the cncentrate of 0.2683
    162000000 / 0.2683 = 603801714
  property antimony content 0.2683; name stibnite_concentrate_Sb_content
    antimont content on a dry matter basis
  property price 0.92 EUR2005
    Calculated value based on data from United Nations Commodity Trade Statistics Database (comtrade.un.org). UN comtrade category: 261710 Antimony ores and concentrates. Year 2005. Using exchange rate of 1EURO = 1.209 USD. Average of price of import into 5 main markets (EU, US, JP, IN and CN).
  properties: carbon allocation 0 kg, carbon content 0, carbon content, fossil 0, carbon content, non-fossil 0, dry mass 1 kg, water content 0, water in wet mass 0 kg, wet mass 1 kg

## Inputs from technosphere
- aluminium hydroxide factory: 1.3197e-9 unit; lognormal variance with pedigree 0.52, pedigree (5,5,5,5,5)
  Amount based on mining and beneficiation of molybdenite, as reported in Classen at al. (2009)
- blasting: 0.15708 kg; lognormal variance with pedigree 0.21, pedigree (5,5,5,5,5)
  (same comment as for aluminium hydroxide factory)
- chemical, inorganic: 0.12088 kg; lognormal variance with pedigree 0.33, pedigree (5,5,5,5,5)
  (same comment as for aluminium hydroxide factory)
  properties: carbon content, fossil 0.003, dry mass 1 kg, wet mass 1 kg
  note on carbon content, fossil: This dataset is an unweighted average of 20 inorganic substances (listed in Tab 88.1, ecoinvent v2.2 report 8, part II), being part of the top100 chemicals included in this database. The C-content has also been calculated as an unweighted average of the C content of the substances composing this dataset.
- chemical, organic: 0.035445 kg; lognormal variance with pedigree 0.33, pedigree (5,5,5,5,5)
  (same comment as for aluminium hydroxide factory)
  properties: carbon content, fossil 0.628, dry mass 1 kg, wet mass 1 kg
  note on carbon content, fossil: This dataset is an unweighted average of 20 organic substances (listed in Tab 88.1, ecoinvent v2.2 report 8, part II), being part of the top100 chemicals included in this database. The C-content has also been calculated as an unweighted average of the C content of the substances composing this dataset.
- conveyor belt: 1.1912e-5 m; lognormal variance with pedigree 0.56, pedigree (5,5,5,5,5)
  (same comment as for aluminium hydroxide factory)
- diesel, burned in building machine: 0.0079416 MJ; lognormal variance with pedigree 0.21, pedigree (5,5,5,5,5)
  (same comment as for aluminium hydroxide factory)
- electricity, medium voltage: 0.00524568, 0.000466559, 0.0406789, 0.0533058, 0.0564511, 0.0287534, 0.00397128, 0.0251352, 0.00106102, 0.169875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 kWh (48 suppliers, which the file names only by identifier); sum of these 3.9825 kWh; lognormal variance with pedigree 0.21, pedigree (5,5,5,5,5)
  (same comment as for aluminium hydroxide factory)
- limestone, crushed, washed: 0.196286, 0.00167365 kg (2 suppliers, which the file names only by identifier); sum of these 0.19796 kg; lognormal variance with pedigree 0.21, pedigree (5,5,5,5,5)
  (same comment as for aluminium hydroxide factory)
  properties: carbon content, fossil 0.117257, dry mass 0.998 kg, water content 0.00200401, wet mass 1 kg
  note on carbon content, fossil: Table 3.1, ecoinvent v2.2 report 7, part VII, pg 3. MW CaCO3=100, MW MgCO3=84. C content of limestone is 0.117257 kg/kg DM
- mine infrastructure, open cast, non-ferrous metal: 1.7285e-9 unit; lognormal variance with pedigree 0.56, pedigree (5,5,5,5,5)
  (same comment as for aluminium hydroxide factory)
- mine infrastructure, underground, non-ferrous metal: 7.5328e-10 unit; lognormal variance with pedigree 0.56, pedigree (5,5,5,5,5)
  (same comment as for aluminium hydroxide factory)
- sodium cyanide: 0.000767221, 0.00472768 kg (2 suppliers, which the file names only by identifier); sum of these 0.0054949 kg; lognormal variance with pedigree 0.33, pedigree (5,5,5,5,5)
  (same comment as for aluminium hydroxide factory)
  properties: carbon content, fossil 0.244898, dry mass 1 kg, wet mass 1 kg
- steel, chromium steel 18/8, hot rolled: 0.11679 kg; lognormal variance with pedigree 0.22, pedigree (5,5,5,5,5)
  (same comment as for aluminium hydroxide factory)
  properties: carbon content, fossil 0.0008, dry mass 1 kg, wet mass 1 kg
  note on carbon content, fossil: Stainless steel model is the grade 304 steel (18/8 stainless, 18% chromium 8% nickel; max. 0.08% C)
- sulfidic tailings, generic: -3.44577 kg; name sulfudic_tailing; = 0.2683/0.8476*0.1524/0.014; source Chu, Jianwen 2019; lognormal variance with pedigree 0.0427, pedigree (2,2,1,5,4)
  The amount as well as the antimony content is based on the values in "Anthropogenic antimony flow analysis and evaluation in China" J. Chu et al., 2019 and certain assumptions.
  The recovery rate at milling is reported to be 84.76%, which, with a Sb content in the concentrate of 0.2683 results in ~0.3165 kg of Sb retrieved from the ground per kg of concentrate. Multiplying this with the milling losses of 0.1524 equals ~0.04824 kg of Sb landing in tailings per kg of concentrate. The reported tailings concentration of 1.4% then results in ~3.446 kg tailings per kg concentrate.
  production volume; = stibnite_concentrate_PV*(sulfudic_tailing/stibnite_concentrate)
    Calculated from the production volume of stibnite concentrate in proportion to the respective output amounts.
  property antimony content 0.02; name tailings_Sb_content
  property dry mass 0.7 kg; name tailings_dry_mass
  properties: aluminium content 0.014738, calcium content 0.0045972, carbon content, fossil 0.0087785, fluorine content 0.0011041, iron content 0.015374, magnesium content 0.0022359, oxygen content 0.89157, potassium content 0.0025181, silicon content 0.053273, sodium content 0.0014472, water content 0.428571, wet mass 1 kg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
  note on antimony content: Chu et al. reported 1.4%, this was increased here to account for the water content that not considereed here.

## Inputs from nature
- Antimony [natural resource, in ground]: 0.316541 kg; = stibnite_concentrate_Sb_content * stibnite_concentrate + tailings_Sb_content * sulfudic_tailing * tailings_dry_mass; source Chu, Jianwen 2019; lognormal variance with pedigree 0.1243, pedigree (3,2,2,5,5)
  The value corresponds to the reported antimony content in the concentrate of 0.2683 and the amount of antimony lost in tailings (0.04824 kg).
- Gangue [natural resource, in ground]: 3.91082 kg; lognormal variance with pedigree 0.1249, pedigree (3,2,2,5,5)
  Amount calculated based on mass balance. Since Sulfur is not separately mentioned in the inputs, the sulfur contained in the stibnite is considered to be Gangue.
  Based on the mass balance per kg of concentrate 1 - 0.2683 = 0.7317 kg ending up in the concentrate and 3.446 * ( 1 - 0.02 ) = 3.37708 kg ending up in tailings.
  Subtracting the lime stone the following overall amount results: 0.7317 + 3.37708 - 0.19796 kg = 3.91082 kg
- Occupation, mineral extraction site [natural resource, land]: 0.0081752 m2*year; lognormal variance with pedigree 0.25, pedigree (5,5,5,5,5)
  (same comment as for aluminium hydroxide factory)
- Transformation, from unspecified [natural resource, land]: 0.00027328 m2; lognormal variance with pedigree 0.33, pedigree (5,5,5,5,5)
  (same comment as for aluminium hydroxide factory)
- Transformation, to mineral extraction site [natural resource, land]: 0.00027328 m2; lognormal variance with pedigree 0.33, pedigree (5,5,5,5,5)
  (same comment as for aluminium hydroxide factory)
- Water, river [natural resource, in water]: 0.23182 m3; lognormal variance with pedigree 0.21, pedigree (5,5,5,5,5)
  (same comment as for aluminium hydroxide factory)

## Emissions to nature
- Antimony ion [air, non-urban air or from high stacks]: 1.4423e-8 kg; lognormal variance with pedigree 0.26, pedigree (5,5,5,5,5)
  (same comment as for aluminium hydroxide factory)
- Arsenic ion [air, non-urban air or from high stacks]: 1.0861e-7 kg; lognormal variance with pedigree 0.26, pedigree (5,5,5,5,5)
  (same comment as for aluminium hydroxide factory)
- Beryllium II [air, non-urban air or from high stacks]: 1.8803e-7 kg; lognormal variance with pedigree 0.26, pedigree (5,5,5,5,5)
  (same comment as for aluminium hydroxide factory)
- Boron [air, non-urban air or from high stacks]: 7.2409e-7 kg; lognormal variance with pedigree 0.26, pedigree (5,5,5,5,5)
  (same comment as for aluminium hydroxide factory)
- Cadmium II [air, non-urban air or from high stacks]: 7.9416e-9 kg; lognormal variance with pedigree 0.26, pedigree (5,5,5,5,5)
  (same comment as for aluminium hydroxide factory)
- Carbon dioxide, fossil [air, non-urban air or from high stacks]: 0.087007 kg; lognormal variance with pedigree 0.34, pedigree (5,5,5,5,5)
  (same comment as for aluminium hydroxide factory)
- Carbon disulfide [air, non-urban air or from high stacks]: 0.015708 kg; lognormal variance with pedigree 0.37, pedigree (5,5,5,5,5)
  (same comment as for aluminium hydroxide factory)
- Chromium III [air, non-urban air or from high stacks]: 7.2409e-6 kg; lognormal variance with pedigree 0.26, pedigree (5,5,5,5,5)
  (same comment as for aluminium hydroxide factory)
- Cobalt II [air, non-urban air or from high stacks]: 1.4423e-6 kg; lognormal variance with pedigree 0.26, pedigree (5,5,5,5,5)
  (same comment as for aluminium hydroxide factory)
- Copper ion [air, non-urban air or from high stacks]: 3.6146e-6 kg; lognormal variance with pedigree 0.26, pedigree (5,5,5,5,5)
  (same comment as for aluminium hydroxide factory)
- Fluorine [air, non-urban air or from high stacks]: 6.8905e-5 kg; source Robert R. Seal II 2017; lognormal variance with pedigree 0.26, pedigree (5,5,5,5,5)
  (same comment as for aluminium hydroxide factory)
- Lead II [air, non-urban air or from high stacks]: 1.0102e-6 kg; lognormal variance with pedigree 0.26, pedigree (5,5,5,5,5)
  (same comment as for aluminium hydroxide factory)
- Manganese II [air, non-urban air or from high stacks]: 6.8905e-5 kg; lognormal variance with pedigree 0.26, pedigree (5,5,5,5,5)
  (same comment as for aluminium hydroxide factory)
- Mercury II [air, non-urban air or from high stacks]: 3.6146e-9 kg; lognormal variance with pedigree 0.26, pedigree (5,5,5,5,5)
  (same comment as for aluminium hydroxide factory)
- Nickel II [air, non-urban air or from high stacks]: 5.781e-6 kg; lognormal variance with pedigree 0.26, pedigree (5,5,5,5,5)
  (same comment as for aluminium hydroxide factory)
- Particulate Matter, < 2.5 um [air, non-urban air or from high stacks]: 0.03673 kg; lognormal variance with pedigree 0.42, pedigree (5,5,5,5,5)
  (same comment as for aluminium hydroxide factory)
- Particulate Matter, > 10 um [air, non-urban air or from high stacks]: 0.0035504 kg; lognormal variance with pedigree 0.42, pedigree (5,5,5,5,5)
  (same comment as for aluminium hydroxide factory)
- Particulate Matter, > 2.5 um and < 10um [air, non-urban air or from high stacks]: 0.031942 kg; lognormal variance with pedigree 0.6, pedigree (5,5,5,5,5)
  (same comment as for aluminium hydroxide factory)
- Selenium IV [air, non-urban air or from high stacks]: 3.6146e-9 kg; lognormal variance with pedigree 0.26, pedigree (5,5,5,5,5)
  (same comment as for aluminium hydroxide factory)
- Water [air, unspecified]: 0.046364 m3; lognormal variance with pedigree 0.25, pedigree (5,5,5,5,5)
  Amount calculated based on the input amount of water. 20% of the input amount of water is assumed to be evaporated and the rest is assumed to be emitted to water
- Zinc II [air, non-urban air or from high stacks]: 1.3723e-5 kg; lognormal variance with pedigree 0.26, pedigree (5,5,5,5,5)
  (same comment as for aluminium hydroxide factory)
- Aluminium III [water, surface water]: 2.0029e-5 kg; lognormal variance with pedigree 1.54, pedigree (5,5,5,5,5)
  (same comment as for aluminium hydroxide factory)
- Arsenic ion [water, surface water]: 6.8321e-7 kg; lognormal variance with pedigree 1.54, pedigree (5,5,5,5,5)
  (same comment as for aluminium hydroxide factory)
- BOD5, Biological Oxygen Demand [water, surface water]: 0.0024175 kg; lognormal variance with pedigree 1.54, pedigree (5,5,5,5,5)
  (same comment as for aluminium hydroxide factory)
- COD, Chemical Oxygen Demand [water, surface water]: 0.0024175 kg; lognormal variance with pedigree 1.54, pedigree (5,5,5,5,5)
  (same comment as for aluminium hydroxide factory)
- Cadmium II [water, surface water]: 7.3577e-8 kg; lognormal variance with pedigree 1.54, pedigree (5,5,5,5,5)
  (same comment as for aluminium hydroxide factory)
- Calcium II [water, surface water]: 0.15883 kg; lognormal variance with pedigree 1.54, pedigree (5,5,5,5,5)
  (same comment as for aluminium hydroxide factory)
- Chromium III [water, surface water]: 1.2672e-7 kg; lognormal variance with pedigree 1.54, pedigree (5,5,5,5,5)
  (same comment as for aluminium hydroxide factory)
- Cobalt II [water, surface water]: 1.8102e-7 kg; lognormal variance with pedigree 1.54, pedigree (5,5,5,5,5)
  (same comment as for aluminium hydroxide factory)
- Copper ion [water, surface water]: 1.8336e-6 kg; lognormal variance with pedigree 1.54, pedigree (5,5,5,5,5)
  (same comment as for aluminium hydroxide factory)
- Cyanide [water, surface water]: 0.0006073 kg; lognormal variance with pedigree 0.29, pedigree (5,5,5,5,5)
  (same comment as for aluminium hydroxide factory)
- DOC, Dissolved Organic Carbon [water, surface water]: 0.00094599 kg; lognormal variance with pedigree 1.54, pedigree (5,5,5,5,5)
  (same comment as for aluminium hydroxide factory)
- Dissolved solids [water, surface water]: 0.0011971 kg; lognormal variance with pedigree 1.54, pedigree (5,5,5,5,5)
  (same comment as for aluminium hydroxide factory)
- Iron ion [water, surface water]: 6.7153e-5 kg; lognormal variance with pedigree 1.54, pedigree (5,5,5,5,5)
  (same comment as for aluminium hydroxide factory)
- Lead II [water, surface water]: 6.4818e-7 kg; lognormal variance with pedigree 1.54, pedigree (5,5,5,5,5)
  (same comment as for aluminium hydroxide factory)
- Manganese II [water, surface water]: 5.7226e-6 kg; lognormal variance with pedigree 1.54, pedigree (5,5,5,5,5)
  (same comment as for aluminium hydroxide factory)
- Mercury II [water, surface water]: 8.7591e-9 kg; lognormal variance with pedigree 1.54, pedigree (5,5,5,5,5)
  (same comment as for aluminium hydroxide factory)
- Nickel II [water, surface water]: 5.6467e-6 kg; lognormal variance with pedigree 1.54, pedigree (5,5,5,5,5)
  (same comment as for aluminium hydroxide factory)
- Nitrogen, organic bound [water, surface water]: 0.0052788 kg; lognormal variance with pedigree 1.54, pedigree (5,5,5,5,5)
  (same comment as for aluminium hydroxide factory)
- Sulfate [water, surface water]: 0.54657 kg; lognormal variance with pedigree 1.54, pedigree (5,5,5,5,5)
  (same comment as for aluminium hydroxide factory)
- TOC, Total Organic Carbon [water, surface water]: 0.00094599 kg; lognormal variance with pedigree 1.54, pedigree (5,5,5,5,5)
  (same comment as for aluminium hydroxide factory)
- Water [water, unspecified]: 0.185456 m3; lognormal variance with pedigree 0.25, pedigree (5,5,5,5,5)
  (same comment as for Water)
  property carbon content, fossil 0; name C_content_fossil
  property carbon content, non-fossil 0; name C_content_non_fossil
  property dry mass 0 kg; name DM
  property water in wet mass 1000 kg; name WWM
  property wet mass 1000 kg; name WM
- Zinc II [water, surface water]: 1.7577e-5 kg; lognormal variance with pedigree 1.54, pedigree (5,5,5,5,5)
  (same comment as for aluminium hydroxide factory)

## Sampling procedure
Data retreived from:
Classen M., Althaus H.-J., Blaser S., Doka G., Jungbluth N., Tuchschmid M. (2009) Life Cycle Inventories of Metals, Final report ecoinvent data v2.1, 10, Dübendorf, CH, Swiss Centre for LCI, Empa - TSL, 3 - SeparatePublication, CD-ROM

Jianwen Chu, Jiansu Mao, Mengchang He (2019). Anthropogenic antimony flow analysis and evaluation in China. Science of The Total Environment, Volume 683. https://doi.org/10.1016/j.scitotenv.2019.05.293

## Extrapolations
see Geography and Technology This dataset has been copied from an original dataset covering the geography CN. The uncertainty has been adjusted accordingly.
