# polyethylene production, low density, granulate

Dataset: EcoSpold 2, unit process
Geography: RoW
Time period: 2011-01-01 to 2023-12-31
Technology level: current
Classification: ISIC rev.4 ecoinvent: 2013:Manufacture of plastics and synthetic rubber in primary forms
Synonyms: LDPE
Scenario: Business-as-Usual
System model: Allocation, cut-off by classification
Generated by: Thomas Fröhlich
Published in: PlasticsEurope 2016
Database: ecoinvent
isCopyrightProtected: true
accessRestrictedTo: 1

## General comment
The dataset represents the production mix of commercial LDPE production technologies: high pressure polymerisation using oxygen and/or organic peroxides as initiator
LDPE is produced through high-pressure polymerisation. As typical initiators to start the polymerisation process, organic peroxides and oxygen are used. Furthermore, polar modifiers (aldehydes, ketones, or alcohols) or aliphatic hydrocarbons are fed into the monomer stream to control the molecular weight distribution.
High-pressure polymerisation is carried out at pressures of 1500 to 3500 bar and temperatures of about 200°C. Under those conditions, oxygen or peroxides work as initiators to start the radical polymerisation process. The reaction may take place either in an autoclave or a tubular reactor. The polymerisation is an exothermic reaction. The ethylene gas is used as a heat sink for the resulting heat, which means that the ethylene gas cannot be to-tally converted to polymer. The unreacted gas is directly recycled back into the process and combined with fresh ethylene. Furthermore, the heat of the exothermic reaction can be recuperated to generate low pressure steam.
The initiator concentrations usually vary between 0.1 and 0.5 wt.-%. Decomposed metal alkyl residues of the initiator remain in the product and sometimes have an influence on end-use properties. Dissociation products of the radical initiator are removed from the polymer or built in.
After the reaction phase, most of the residual (unreacted) monomers (which are mostly present as gases) are separated from the polymer and are either recycled back into the process or flared of. Depending on the purity of the separated monomers, the gas can either be fed directly back into the production line or the monomers are returned to a purification unit. To limit the accumulation of impurities in the process, usually a small side-stream (purge) of the unreacted gas is sent back to the cracker or to a dedicated purification unit. After polymerisation, the polymer is usually fed di-rectly into a hot melt extruder, where additives can be added to the melted polymer if required. The polymer is then pelletised in an underwater pelletiser. The pelletised product is dried, blended where required and degassed.

## Included activities start
Acitivity starts with monomers and comonomers entering the polymerisation plant. Energy supply is included in terms of heat production inside the battery limits of the plant. Steam and electricity supply is outside the activity.

## Included activities end
Activity ends with polymer granulate leaving the factory.

## Allocation
The polyolefin production itself is regarded as a single-output process since only one polymer type is produced by one installation. All other products of this installation, e.g. monomers being recycled to the cracker or distillation, or hydrocarbons being used thermally, are treated as internal flows replacing the respective input materials (i.e. monomers or energy carriers). Hence, no allocation is needed for the polyolefin production process.

## Geography
Extrapolated from dataset with data for EU27 including Norway and Switzerland. The production volume and uncertainty have been adjusted accordingly.

## Time period
Data was collected for the year 2011, processed in 2013 and published in 2014

## Reference product
- polyethylene, low density, granulate: 1 kg; By-product classification allocatable product; CPC 34710: Polymers of ethylene, in primary forms; HS2017 390110: Ethylene polymers; in primary forms, polyethylene having a specific gravity of less than 0.94; CAS 9002-88-4
  Reference Product
  production volume 2.67474e10 kg; name RP_PV
    According to Plastics Europe, Global production volume of plastics in 2013 was 299 Mt. It is assumed that the global production share (of the total plastic production) of polyethylene, low density, granulate is equal to the respective European production share, which is 14 % of the total plastics production in Europe.
    Source: PlasticsEurope, 2013, Plastics - The Facts 2013, accessed online at: https://www.plasticseurope.org/en/resources/market-data on 11th of July 2018
  properties: allocation factor 0.998132, carbon allocation 0.857143 kg, carbon content 0.857143, carbon content, fossil 0.857143, carbon content, non-fossil 0, dry mass 1 kg, heating value, net 42.47 MJ, price 1.29 EUR2005, true value 1.29, water content 0, water in wet mass 0 kg, wet mass 1 kg

## Inputs from technosphere
- chemical factory, organics: 3.99253e-10 unit; lognormal variance with pedigree 0.3118, pedigree (2,3,3,4,3)
  Calculated based on literature data published by the industry. For this activity, no information was readily available concerning infrastructure and land-use. Therefore, the infrastructure is estimated based on data from two chemical factories, the BASF site of Ludwigshafen and the chemical factory in Gendorf (which are both located in Germany), which produce a wide range of chemical substances. Based on this data, the following assumptions are made: the built area amounts to about 4.2 ha, the plant has an average output of 50"000 t/a and a lifespan of fifty years. The estimated infrastructure amount is therefore 4.00 E-10 units per kg of produced chemical.
  References:
  Althaus H.-J., Chudacoff M., Hischier R., Jungbluth N., Osses M. and Primas A. (2007) Life Cycle Inventories of Chemicals. ecoinvent report No. 8, v2.0. EMPA Dübendorf, Swiss Centre for Life Cycle Inventories, Dübendorf, CH.
  Gendorf (2000) Umwelterklärung 2000, Werk Gendorf. Werk Gendorf, Burgkirchen.
- chemical, inorganic: 0.000319646 kg; lognormal variance with pedigree 0.0532, pedigree (3,3,5,5,3)
  Sum input parameter covering partly confidential information on additives, solvents, catalysts. Weighted average of reported input materials.
  properties: carbon content, fossil 0.003, dry mass 1 kg, wet mass 1 kg
  note on carbon content, fossil: This dataset is an unweighted average of 20 inorganic substances (listed in Tab 88.1, ecoinvent v2.2 report 8, part II), being part of the top100 chemicals included in this database. The C-content has also been calculated as an unweighted average of the C content of the substances composing this dataset.
- chemical, organic: 0.0182261 kg; lognormal variance with pedigree 0.0532, pedigree (3,3,5,5,3)
  (same comment as for chemical, inorganic)
  properties: carbon content, fossil 0.628, dry mass 1 kg, heating value, net 19.03 MJ, wet mass 1 kg
  note on carbon content, fossil: This dataset is an unweighted average of 20 organic substances (listed in Tab 88.1, ecoinvent v2.2 report 8, part II), being part of the top100 chemicals included in this database. The C-content has also been calculated as an unweighted average of the C content of the substances composing this dataset.
- compressed air, 600 kPa gauge: 0.0286665 m3; lognormal variance with pedigree 0.0532, pedigree (3,3,5,5,3)
  Weighted average of reported input
- electricity, medium voltage: 0.0316248, 0.630843, 0.211961, 0.00968459, 0.00193836, 0.000416209, 0.0651443 kWh (7 suppliers, which the file names only by identifier); sum of these 0.951613 kWh; lognormal variance with pedigree 0.0532, pedigree (3,3,5,5,3)
  Weighted average of reported input
- ethylene: 0.00289206, 0.993562 kg (2 suppliers, which the file names only by identifier); sum of these 0.996454 kg; lognormal variance with pedigree 0.0532, pedigree (3,3,5,5,3)
  Weighted average of reported input
  properties: carbon content, fossil 0.857143, dry mass 1 kg, heating value, net 43.22 MJ, wet mass 1 kg
- hazardous waste, for incineration: -0.00177682 kg; name BP_amount2; lognormal variance with pedigree 0.0134, pedigree (3,3,2,5,3)
  Weighted average of reported waste
  production volume; = BP_amount2*RP_PV
    calculated with production volume of reference product
  properties: carbon content, fossil 0.554667, dry mass 0.75 kg, heating value, net 17 MJ, water content 0.333333, wet mass 1 kg
  note on carbon content, fossil: Tab A.6, ecoinvent v2.2 report 13_I. C content has been calculated after data in the tables, and then referred to 1 kg DM
  note on heating value, net: Value taken from the general comment of the treatment dataset.
- hydrogen, gaseous, medium pressure, merchant: 1.0194e-7, 6.40088e-8 kg (2 suppliers, which the file names only by identifier); sum of these 1.65949e-7 kg; lognormal variance with pedigree 0.0532, pedigree (3,3,5,5,3)
  Weighted average of reported input
  properties: dry mass 1 kg, heating value, net 120.21 MJ, wet mass 1 kg
- natural gas, high pressure: 4.44982e-5, 7.50629e-5, 0.000163735, 5.47952e-5, 1.28054e-5, 7.62153e-5, 7.31344e-5, 0.000192309, 7.42439e-5, 0.000114834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 m3 (37 suppliers, which the file names only by identifier); sum of these 0.00576284 m3; lognormal variance with pedigree 0.0532, pedigree (3,3,5,5,3)
  Weighted average of reported input
  properties: carbon content, fossil 0.695187, dry mass 1 kg, heating value, net 36 MJ, wet mass 1 kg
  note on heating value, net: Literature value, Source: Christoph Meili;Niels Jungbluth;Maresa Bussa (2021) Life cycle inventories of crude oil and natural gas extraction. ESU-services Ltd. commissioned by BAFU & VSG, Schaffhausen, Switzerland, http://esu-services.ch/data/public-lci-reports/
- nitrogen, liquid: 0.0154055 kg; lognormal variance with pedigree 0.0532, pedigree (3,3,5,5,3)
  Weighted average of reported input
  properties: dry mass 1 kg, wet mass 1 kg
- propylene: 2.94429e-5, 0.0031556 kg (2 suppliers, which the file names only by identifier); sum of these 0.00318504 kg; lognormal variance with pedigree 0.0532, pedigree (3,3,5,5,3)
  Weighted average of reported input
  properties: carbon content, fossil 0.857143, dry mass 1 kg, heating value, net 43.22 MJ, wet mass 1 kg
- solvent, organic: 0.00285155 kg; lognormal variance with pedigree 0.0532, pedigree (3,3,5,5,3)
  Weighted average of reported input
  properties: carbon content, fossil 0.63072, dry mass 1 kg, heating value, net 19.11 MJ, wet mass 1 kg
- spent solvent mixture: -0.00127937 kg; name BP_amount1; lognormal variance with pedigree 0.0134, pedigree (3,3,2,5,3)
  Weighted average of reported waste
  production volume; = BP_amount1*RP_PV
    calculated with production volume of reference product
  properties: carbon content, fossil 0.571257, dry mass 0.835 kg, heating value, net 21.7 MJ, water content 0.197605, wet mass 1 kg
  note on carbon content, fossil: Tab A.7, ecoinvent v2.2 report 13_I. C content has been calculated after data in the tables, and then referred to 1 kg DM
- waste plastic, mixture: -6.28958e-7, -5.97255e-7, -0.00234714, -2.27904e-5, -1.52277e-6, -2.54092e-7, -1.15165e-7 kg (7 suppliers, which the file names only by identifier); sum of these -0.00237305 kg; lognormal variance with pedigree 0.0134, pedigree (3,3,2,5,3)
  Weighted average of reported waste
  production volume; = BP_amount4*RP_PV
    calculated with production volume of reference product
  properties: carbon content, fossil 0.747344, dry mass 0.847 kg, heating value, net 30.79 MJ, water content 0.180638, wet mass 1 kg
- wastewater, average: -0.00190802, -6.79327e-6 m3 (2 suppliers, which the file names only by identifier); sum of these -0.00191481 m3; lognormal variance with pedigree 0.0528, pedigree (3,3,2,5,3)
  Weighted average of reported waste
  production volume; = BP_amount3*RP_PV
    calculated with production volume of reference product
  properties: carbon content, non-fossil 0.194039, dry mass 0.346837 kg, water content 2882.2, wet mass 1000 kg
  note on carbon content, non-fossil: 0.0673 kg TOC/m3 (Tab A.17, ecoinvent v2.2 report 13_I). TOC was considered as Total Carbon.
- wastewater, unpolluted: -0.030621 m3; name BP_amount5; lognormal variance with pedigree 0.0134, pedigree (3,3,2,5,3)
  Weighted average of reported waste
  production volume; = BP_amount5*RP_PV
    calculated with production volume of reference product
  properties: carbon content, fossil 0.00178991, carbon content, non-fossil 0.00178991, dry mass 0.337476 kg, water content 2962.17, wet mass 1000 kg
  note on carbon content, fossil: Assumed to be like in tap water. Bicarbonate content is 2.93 mol/m3. CO2 content is 0.1 mol/m3 (ecoinvent v2.2 report 8, Tab 93.1).

## Inputs from nature
- Water, cooling, unspecified natural origin [natural resource, in water]: 0.0412614 m3; lognormal variance with pedigree 0.0532, pedigree (3,3,5,5,3)
  Weighted average of reported input
- Water, unspecified natural origin [natural resource, in water]: 0.00158078 m3; lognormal variance with pedigree 0.0532, pedigree (3,3,5,5,3)
  Weighted average of reported input

## Emissions to nature
- Carbon dioxide, fossil [air, unspecified]: 0.0201831 kg; lognormal variance with pedigree 0.0532, pedigree (3,3,5,5,3)
  Weighted average of reported emissions
- Carbon monoxide, fossil [air, unspecified]: 1.70701e-5 kg; lognormal variance with pedigree 0.7026, pedigree (3,3,5,5,3)
  Weighted average of reported emissions
- Dinitrogen monoxide [air, unspecified]: 3.63653e-7 kg; lognormal variance with pedigree 0.0926, pedigree (3,3,5,5,3)
  Weighted average of reported emissions
- Ethylene [air, unspecified]: 0.000929289 kg; lognormal variance with pedigree 0.1726, pedigree (3,3,5,5,3)
  Weighted average of reported emissions
- Hydrogen [air, unspecified]: 3.42102e-6 kg; lognormal variance with pedigree 0.0926, pedigree (3,3,5,5,3)
  Weighted average of reported emissions
- Methane, fossil [air, unspecified]: 1.54005e-6 kg; lognormal variance with pedigree 0.0926, pedigree (3,3,5,5,3)
  Weighted average of reported emissions
- NMVOC, non-methane volatile organic compounds [air, unspecified]: 0.00102793 kg; lognormal variance with pedigree 0.0926, pedigree (3,3,5,5,3)
  Weighted average of reported emissions
- Nitrogen oxides [air, unspecified]: 2.44306e-5 kg; lognormal variance with pedigree 0.0926, pedigree (3,3,5,5,3)
  Weighted average of reported emissions
- Particulate Matter, > 10 um [air, unspecified]: 3.28644e-6 kg; lognormal variance with pedigree 0.0926, pedigree (3,3,5,5,3)
  Weighted average of reported emissions
- Particulate Matter, > 2.5 um and < 10um [air, unspecified]: 9.27206e-8 kg; lognormal variance with pedigree 0.1726, pedigree (3,3,5,5,3)
  Weighted average of reported emissions
- Propylene [air, unspecified]: 1.95575e-5 kg; lognormal variance with pedigree 0.1726, pedigree (3,3,5,5,3)
  Weighted average of reported emissions
- Sulfur dioxide [air, unspecified]: 6.53471e-7 kg; lognormal variance with pedigree 0.0532, pedigree (3,3,5,5,3)
  Weighted average of reported emissions
- Sulfur hexafluoride [air, unspecified]: 9.81747e-10 kg; lognormal variance with pedigree 0.0926, pedigree (3,3,5,5,3)
  Weighted average of reported emissions
- Water [air, unspecified]: 0.0103064 m3; lognormal variance with pedigree 0.0532, pedigree (3,3,5,5,3)
  Calculated to close water balance
- Zinc II [air, unspecified]: 5.72686e-9 kg; lognormal variance with pedigree 0.7026, pedigree (3,3,5,5,3)
  Weighted average of reported emissions
- AOX, Adsorbable Organic Halides [water, unspecified]: 1.49939e-7 kg; lognormal variance with pedigree 0.0926, pedigree (3,3,5,5,3)
  Weighted average of reported emissions
- Ammonium [water, unspecified]: 1.21078e-6 kg; lognormal variance with pedigree 0.0926, pedigree (3,3,5,5,3)
  Weighted average of reported emissions
- Arsenic ion [water, unspecified]: 1.29256e-9 kg; lognormal variance with pedigree 0.7026, pedigree (3,3,5,5,3)
  Weighted average of reported emissions
- Cadmium II [water, unspecified]: 1.29863e-10 kg; lognormal variance with pedigree 0.7026, pedigree (3,3,5,5,3)
  Weighted average of reported emissions
- Chloride [water, unspecified]: 0.000128678 kg; lognormal variance with pedigree 0.0926, pedigree (3,3,5,5,3)
  Weighted average of reported emissions
- Chromium III [water, unspecified]: 1.88538e-8 kg; lognormal variance with pedigree 0.7026, pedigree (3,3,5,5,3)
  Weighted average of reported emissions
- Copper ion [water, unspecified]: 1.39307e-8 kg; lognormal variance with pedigree 0.7026, pedigree (3,3,5,5,3)
  Weighted average of reported emissions
- Fluoride [water, unspecified]: 2.87537e-7 kg; lognormal variance with pedigree 0.0926, pedigree (3,3,5,5,3)
  Weighted average of reported emissions
- Lead II [water, unspecified]: 1.29383e-9 kg; lognormal variance with pedigree 0.7026, pedigree (3,3,5,5,3)
  Weighted average of reported emissions
- Mercury II [water, unspecified]: 2.50496e-11 kg; lognormal variance with pedigree 0.7026, pedigree (3,3,5,5,3)
  Weighted average of reported emissions
- Nickel II [water, unspecified]: 2.66759e-9 kg; lognormal variance with pedigree 0.7026, pedigree (3,3,5,5,3)
  Weighted average of reported emissions
- Nitrate [water, unspecified]: 4.92424e-7 kg; lognormal variance with pedigree 0.0926, pedigree (3,3,5,5,3)
  Weighted average of reported emissions
- Nitrogen, organic bound [water, unspecified]: 6.17556e-6 kg; lognormal variance with pedigree 0.0926, pedigree (3,3,5,5,3)
  Weighted average of reported emissions
- Phosphorus [water, unspecified]: 2.14625e-6 kg; lognormal variance with pedigree 0.0926, pedigree (3,3,5,5,3)
  Weighted average of reported emissions
- Sulfate [water, unspecified]: 0.0003121 kg; lognormal variance with pedigree 0.0926, pedigree (3,3,5,5,3)
  Weighted average of reported emissions
- Suspended solids, unspecified [water, unspecified]: 2.06661e-5 kg; lognormal variance with pedigree 0.0926, pedigree (3,3,5,5,3)
  Weighted average of reported emissions
- Zinc II [water, unspecified]: 4.01501e-7 kg; lognormal variance with pedigree 0.7026, pedigree (3,3,5,5,3)
  Weighted average of reported emissions

## Sampling procedure
Extrapolated from European data. Questionnaires sent out to all production units in Europe operated by PlasticEurope member companies.

## Extrapolations
This dataset has been created as a copy of the original dataset covering the geography RER, i.e., Europe. Annual production volume(s) and uncertainty have been adjusted accordingly. It is important to note that original RER dataset represents the average production mix, composed of several different processes/technologies, in Europe in the year of reference. It might not reflect the actual global production mix and should hence only be used as a proxy.
