# MOX fuel element production, for light water reactor

Dataset: EcoSpold 2, unit process
Geography: RoW
Time period: 1980-01-01 to 2023-12-31
Technology level: current
Classification: EcoSpold01Categories: nuclear power/production
Classification: ISIC rev.4 ecoinvent: 2011:Manufacture of basic chemicals
Tags: ConvertedDataset
Scenario: Business-as-Usual
System model: Allocation, cut-off by classification
Generated by: Roberto Dones
Published in: Dones, R. 2007
Database: ecoinvent
isCopyrightProtected: true
accessRestrictedTo: 1

## General comment
The data should be considered as an approximation, because they describe the operation of a UO2 fuel fabrication plant, for lack of specific information. Only radioactive emissions to air and water have been taken from the few data avalable on the Hanau plant (closed). The MOX fuel is made of plutonium from reprocessed spent fuel and depleted uranium from enrichment of fresh uranium. The environmental burdens from reprocessing are in this study entirely allocated to the spent fuel, the burdens from enrichment entirely allocated to the enriched uranium. Hence, the MOX fuel is neither directly charged of reprocessing nor of enrichment, but the fuel chain consistently takes into account the total emissions form these two steps.
[This dataset was already contained in the ecoinvent database version 2. It was not individually updated during the transfer to ecoinvent version 3. Life Cycle Impact Assessment results may still have changed, as they are affected by changes in the supply chain, i.e. in other datasets. This dataset was generated following the ecoinvent quality guidelines for version 2. It may have been subject to central changes described in the ecoinvent version 3 change report (http://www.ecoinvent.org/database/ecoinvent-version-3/reports-of-changes/), and the results of the central updates were reviewed extensively. The changes added e.g. consistent water flows and other information throughout the database. The documentation of this dataset can be found in the ecoinvent reports of version 2, which are still available via the ecoinvent website. The change report linked above covers all central changes that were made during the conversion process.]

## Included activities end
The module uses the same data set of a UO2 fuel fabrication plant.

## Geography
North American and European conditions

## Technology
No explicit information on operation of current MOX facilities; data reflect UO2 fuel fabrication plants operating in the 1980s.

## Parameters
- fraction, cooling water, cooling pond system, to air: 0.032 dimensionless; name fraction_CW_CP_to_air; lognormal variance with pedigree 0.0413, pedigree (2,3,1,3,1)
  Calculated based on literature value (Scown, C.D., 2011, Water Footprint of U.S. Transportation Fuels and supplying information of the article) (Vionnet, S., Quantis Water Database - Technical Report, 2012).
- fraction, cooling water, once-through system, to air: 0.004 dimensionless; name fraction_CW_OT_to_air; lognormal variance with pedigree 0.0413, pedigree (2,3,1,3,1)
  (same comment as for fraction, cooling water, cooling pond system, to air)
- fraction, cooling water, recirculating system, to air: 0.771 dimensionless; name fraction_CW_R_to_air; lognormal variance with pedigree 0.0413, pedigree (2,3,1,3,1)
  (same comment as for fraction, cooling water, cooling pond system, to air)
- fraction, cooling water, to air: 0.3875 dimensionless; name fraction_CW_to_air; = (0.5*fraction_CW_OT_to_air)+(0.5*fraction_CW_R_to_air); lognormal variance with pedigree 0.092025, pedigree (4,4,3,2,4)
  Calculated value based on literature value (see comments of the other parametres present in this dataset) and expert opinion. In the case when no industry/literature data are available about the type of cooling or directly fraction, cooling water, to air specific for the process a default assumption is applied. It is assumed that the once-through cooling system is used in 50% of all cases and recirculating system is used in another 50% of all cases.
- fraction, water, decarbonised, to air: 0.3875 dimensionless; name fraction_WDC_to_air; lognormal variance with pedigree 0.092025, pedigree (4,4,3,2,4)

## Reference product
- MOX fuel element, for light water reactor: 1 kg; By-product classification allocatable product; CPC 33710: Fuel elements (cartridges), non-irradiated, for nuclear reactors; HS2017 840140: Nuclear reactors; parts thereof
  EcoSpold01Location=UCTE
  production volume 2.99384 kg
    This is a placeholder value that does not reflect real-world production volumes. This dataset does not currently require a real-world production volume to work in the database framework, and no actual data were collected yet. This has no negative effect on the results of the ecoinvent database.
  property price 37.3 EUR2005
    UNdata (Average data for EU27) Source:http://data.un.org/Data.aspx?q=Natural+uranium%2c+its+compounds%2c+mixtures&d=ComTrade&f=_l1Code%3a29%3bcmdCode%3a284410
  properties: carbon allocation 0 kg, carbon content 0, carbon content, fossil 0, carbon content, non-fossil 0, dry mass 1 kg, water content 0, water in wet mass 0 kg, wet mass 1 kg

## Inputs from technosphere
- cement, unspecified: 0.000147559, 3.81261e-6, 8.9923e-5, 0.000560394, 1.75901e-5, 1.28576e-5, 6.96845e-6, 1.38498e-5, 2.11739e-5, 0.00562587 kg (10 suppliers, which the file names only by identifier); sum of these 0.0065 kg; lognormal variance with pedigree 0.162, pedigree (1,1,5,5,1)
  EcoSpold01Location=CH
  own assumption
  properties: dry mass 1 kg, wet mass 1 kg
- chromium: 0.6 kg; lognormal variance with pedigree 0.042, pedigree (1,1,5,5,1)
  estimation on number, not on module substituting Zr
  EcoSpold01Location=RER
  properties: dry mass 1 kg, wet mass 1 kg
- electricity, medium voltage: 0.0147979, 0.0069977, 1.10095, 21.9614, 7.37897, 0.206854, 0.0464331, 0.030688, 0.337148, 0.00356456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 kWh (22 suppliers, which the file names only by identifier); sum of these 36 kWh; lognormal variance with pedigree 0.162, pedigree (1,1,5,5,1)
  old reference & own assumption
  EcoSpold01Location=UCTE
- heat, district or industrial, other than natural gas: 30.3859, 0.0140772 MJ (2 suppliers, which the file names only by identifier); sum of these 30.4 MJ; lognormal variance with pedigree 0.162, pedigree (1,1,5,5,1)
  old reference & own assumption
  EcoSpold01Location=CH
  properties: heating value, net 1 MJ
- inert waste, for final disposal: -0.8 kg; lognormal variance with pedigree 0.002, pedigree (1,1,1,5,1)
  own assumption
  EcoSpold01Location=CH
  production volume
    Calculated from the production volume of MOX fuel element, for light water reactor in proportion to the respective output amounts.
  properties: dry mass 0.995 kg, water content 0.00502513, wet mass 1 kg
- low level radioactive waste: -0.000333 m3; lognormal variance with pedigree 0.302, pedigree (1,1,1,5,1)
  EcoSpold01Location=CH
  own assumption
  production volume
    (same comment as for inert waste, for final disposal)
  properties: dry mass 2500 kg, wet mass 2500 kg
- nuclear fuel factory: 3.7e-8 unit; lognormal variance with pedigree 0.082, pedigree (1,1,5,5,1)
  own estimation
  EcoSpold01Location=GLO
- wastewater, unpolluted: -0.135 m3; lognormal variance with pedigree 0.122, pedigree (1,1,1,5,1)
  old reference
  EcoSpold01Location=CH
  production volume
    (same comment as for inert waste, for final disposal)
  properties: carbon content, fossil 0.00178991, carbon content, non-fossil 0.00178991, dry mass 0.337476 kg, water content 2962.17, wet mass 1000 kg
  note on carbon content, fossil: Assumed to be like in tap water. Bicarbonate content is 2.93 mol/m3. CO2 content is 0.1 mol/m3 (ecoinvent v2.2 report 8, Tab 93.1).
- water, decarbonised: 7.30662, 106.763, 5.4675, 90.6271, 57.3784, 14.2264, 0.512753, 0.698427, 17.0201 kg (9 suppliers, which the file names only by identifier); sum of these 300 kg; lognormal variance with pedigree 0.162, pedigree (1,1,5,5,1)
  old reference
  EcoSpold01Location=RER
  properties: wet mass 1 kg

## Emissions to nature
- Actinides, radioactive, unspecified [air, non-urban air or from high stacks]: 0.0016 kBq; lognormal variance with pedigree 0.342, pedigree (1,1,5,5,1)
  very few recent data
- NMVOC, non-methane volatile organic compounds [air, non-urban air or from high stacks]: 0.0033 kg; lognormal variance with pedigree 0.162, pedigree (1,1,5,5,1)
  old reference
- Nitrogen oxides [air, non-urban air or from high stacks]: 0.03 kg; lognormal variance with pedigree 0.162, pedigree (1,1,5,5,1)
  old reference
- Water [air, unspecified]: 0.11625 m3; name water_to_air_unspecified; lognormal variance with pedigree 0.0827, pedigree (2,2,5,5,1)
  Calculated value based on literature values and expert opinion. See comments in the parametres' comment field.
  property fraction, origin: fresh water 1; name fraction_origin_fresh_water
  property fraction, origin: salt water 0; name fraction_origin_salt_water
  property fraction, origin: unspecified 0; name fraction_origin_unspecified
- Ammonium [water, surface water]: 0.0581 kg; lognormal variance with pedigree 0.162, pedigree (1,1,5,5,1)
  old reference
- BOD5, Biological Oxygen Demand [water, surface water]: 0.00313 kg; lognormal variance with pedigree 0.162, pedigree (1,1,5,5,1)
  old reference
- Boron [water, surface water]: 6.39e-5 kg; lognormal variance with pedigree 0.162, pedigree (1,1,5,5,1)
  old reference
- COD, Chemical Oxygen Demand [water, surface water]: 0.0166 kg; lognormal variance with pedigree 0.162, pedigree (1,1,5,5,1)
  old reference
- Calcium II [water, surface water]: 0.083 kg; lognormal variance with pedigree 0.162, pedigree (1,1,5,5,1)
  old reference
- Chloride [water, surface water]: 0.00703 kg; lognormal variance with pedigree 0.162, pedigree (1,1,5,5,1)
  old reference
- DOC, Dissolved Organic Carbon [water, surface water]: 0.00614815 kg; lognormal variance with pedigree 0.162, pedigree (1,1,5,5,1)
  Calculated as equal to TOC.
- Fluoride [water, surface water]: 0.0358 kg; lognormal variance with pedigree 0.162, pedigree (1,1,5,5,1)
  old reference
- Iron ion [water, surface water]: 0.000153 kg; lognormal variance with pedigree 0.162, pedigree (1,1,5,5,1)
  old reference
- Magnesium [water, surface water]: 0.000402 kg; lognormal variance with pedigree 0.162, pedigree (1,1,5,5,1)
  old reference
- Manganese II [water, surface water]: 1.02e-5 kg; lognormal variance with pedigree 0.162, pedigree (1,1,5,5,1)
  old reference
- Molybdenum VI [water, surface water]: 2.75e-5 kg; lognormal variance with pedigree 0.162, pedigree (1,1,5,5,1)
  old reference
- Nickel II [water, surface water]: 0.000147 kg; lognormal variance with pedigree 0.162, pedigree (1,1,5,5,1)
  old reference
- Nitrogen [water, surface water]: 0.0703 kg; lognormal variance with pedigree 0.162, pedigree (1,1,5,5,1)
  old reference
- Oils, unspecified [water, surface water]: 0.00128 kg; lognormal variance with pedigree 0.162, pedigree (1,1,5,5,1)
  old reference
- Phosphorus [water, surface water]: 0.000217 kg; lognormal variance with pedigree 0.162, pedigree (1,1,5,5,1)
  old reference
- Radioactive species, alpha emitters [water, surface water]: 0.006 kBq; lognormal variance with pedigree 0.342, pedigree (1,1,5,5,1)
  very few recent data
- Silver I [water, surface water]: 2.17e-5 kg; lognormal variance with pedigree 0.162, pedigree (1,1,5,5,1)
  old reference
- Sodium I [water, surface water]: 0.00894 kg; lognormal variance with pedigree 0.162, pedigree (1,1,5,5,1)
  old reference
- Sulfate [water, surface water]: 0.0121 kg; lognormal variance with pedigree 0.162, pedigree (1,1,5,5,1)
  old reference
- Sulfite [water, surface water]: 0.000185 kg; lognormal variance with pedigree 0.162, pedigree (1,1,5,5,1)
  old reference
- Suspended solids, unspecified [water, surface water]: 0.0023 kg; lognormal variance with pedigree 0.162, pedigree (1,1,5,5,1)
  old reference
- TOC, Total Organic Carbon [water, surface water]: 0.00614815 kg; lognormal variance with pedigree 0.162, pedigree (1,1,5,5,1)
  Calculated by default as TOC (gC) = COD/2.7 (COD measured in g O2). Should more correctly be calculated from the carbon content of the specified emissions to water.
- VOC, volatile organic compounds [water, surface water]: 0.0894 kg; lognormal variance with pedigree 0.162, pedigree (1,1,5,5,1)
  old reference
- Water [water, unspecified]: 0.04875 m3; name water_to_water_unspecified; = (water_decarbonised_input/1000)*(1-fraction_WDC_to_air)-0.135; lognormal variance with pedigree 0.0827, pedigree (2,2,5,5,1)
  (same comment as for Water)
  property carbon content, fossil 0; name C_content_fossil
  property carbon content, non-fossil 0; name C_content_non_fossil
  property dry mass 0 kg; name DM
  property fraction, origin: fresh water 1; name fraction_origin_fresh_water_Ww
  property fraction, origin: salt water 0; name fraction_origin_salt_water_Ww
  property fraction, origin: unspecified 0; name fraction_origin_unspecified_Ww
  property water in wet mass 1000 kg; name WWM
  property wet mass 1000 kg; name WM

## Sampling procedure
Literature

## Extrapolations
none This dataset has been copied from an original dataset covering the geography UCTE. The uncertainty has been adjusted accordingly.

## Review by Hans-Jörg Althaus 2007-10-26
Passed
