# aluminium hydroxide production

Dataset: EcoSpold 2, unit process
Geography: RoW
Time period: 2015-01-01 to 2023-12-31
Technology level: current
Classification: ISIC rev.4 ecoinvent: 2011:Manufacture of basic chemicals
Classification: EcoSpold01Categories: chemicals/inorganics
Synonyms: Hydragillit; gibbsite; Gibbsit; aluminium hydroxide; Al2O3*3H2O; hydragillite; diaspore; Bayerit; Aluminiumtrihydrate; Tonerdehydrat; bayerite
Scenario: Business-as-Usual
System model: Allocation, cut-off by classification
Share of production covered: 39 %
Generated by: Linlin Wu
Published in: International Aluminium Insitute 2015
Database: ecoinvent
isCopyrightProtected: false
accessRestrictedTo: 1

## General comment
Data on Al(OH)3 extraction and calcination to Al2O3 was aggregated on original source (International ALuminium Institute 2015 LCI survey, IAI personnal communication in 2017). In- and outputs of Al(OH)3 are calculated according to the stoichiometry (1.530 kg Al(OH)3 --> 1.000 kg Al2O3 + 0.530 kg H2O). Separate energy data was provided by IAI for production of hydrate and calcination processes. The Al(OH)3 extraction process involves adding milled bauxite to a hot caustic soda (NaOH) solution, dissolving the aluminium-bearing minerals (gibbsite, böhmite and diaspore) present to form a sodium aluminate supersaturated solution or “pregnant liquor”. Flocculants are added to aid settling and the solution is progressively cooled causing aluminium hydroxide crystals to precipitate. Further information can be found at http://bauxite.world-aluminium.org/refining/process.html.
Two sources were used in the creation of this dataset: IAI 2015 Survey data (officially published in 2017); and original ecoinvent 2 data (Althaus, 2007) for exchanges unreported by IAI.

## Included activities start
Unit process starts with the unloading of the process materials to their storage areas on site.

## Included activities end
Includes transport of bauxite and other inputs to the calcination plant, the extraction of Al(OH)3 (grinding, digestion and precipitation) and the disposal of the wastes. Also includes maintenance and repair of plant and equipment and treatment of process air, liquids and solids.
The output of the original IAI dataset is smelter grade alumina. However, by removing the energy inputs for calcination, the intended output of this unit process is aluminium hydroxide.

## Geography
While IAI data are global in scope, flows not reported by IAI and taken from anterior ecoinvent v2 dataset are based on European data.

## Technology
Average technology for the global aluminium industry.

## Parameters
- Aluminium hydroxide used in alumina production: 90 % (obsolete); name Al_OH_3_for_Al2O3; lognormal variance with pedigree 0.0566, pedigree (4,5,5,1,1)
  Used to estimate global production volumes, readily available for Al2O3 but not for Al(OH)3.
  Uncertainty: Value cited in ecoinvent 2 report 5 (Althaus, 2007) without citation. Value also found on internet, but not in official documents.
- alumina, production volume: 1.15247e11 kg; name al2o3_productionvolume_2015
- alumina, production volume, 2010: 8.5e10 kg; name al2o3_productionvolume_2010; lognormal variance with pedigree 0.0007, pedigree (2,2,1,1,1)
  Smelter grade alumina. As reported in IAI 2013.
- molar mass of aluminium hydroxide: 78 kg; name M_Al_OH_3
- molar mass, aluminion oxyde: 102 kg; name M_Al2O3; lognormal variance with pedigree 0.0007, pedigree (1,2,1,1,1)

## Reference product
- aluminium hydroxide: 1 kg; name aluminiumHydroxideAmount; By-product classification allocatable product; CPC 34231: Chemical elements n.e.c.; inorganic acids except phosphoric, nitric and sulphonitric; inorganic oxygen compoun[…]; HS2017 281830: Aluminium hydroxide; CAS 21645-51-2
  EcoSpold01Location=RER
  Dry mass
  production volume 1.69935e9 kg; name aluminiumHydroxideProductionVolume; = al2o3_productionvolume_2015*(2* M_Al_OH_3/ M_Al2O3)*(1/(Al_OH_3_for_Al2O3/100))
    Production volume calculated using the production volume of alumina, assuming that 90% of aluminium hydroxide is used for the production of alumina.
  property carbon content, fossil 0; name aluminiumHydroxideAmo_C_content_fossil_0
    fossil carbon content on a dry matter basis
  property carbon content, non-fossil 0; name aluminiumHydroxid_C_content_non_fossil_0
    biogene carbon content on a dry matter basis
  property dry mass 1 kg; name aluminiumHydroxideAmount_DM
  property gallium content 0; name aluminiumHydroxideAmount_Ga_content
    gallium content on a dry matter basis
  property price 0.42 EUR2005
    Calculated value based on data from United Nations Commodity Trade Statistics Database (comtrade.un.org). UN comtrade category: 281830 Aluminium hydroxide. Year 2005. Using exchange rate of 1EURO = 1.209 USD. Average of price of import into 5 main markets (EU, US, JP, IN and CN).
  property water content 0.11; name aluminiumHydroxideAmount_water_content
  property water in wet mass 0.11 kg; name aluminiumHydroxideAmount_WWM
  property wet mass 1.11 kg; name aluminiumHydroxideAmount_WM
  properties: carbon allocation 0 kg, carbon content 0

## Inputs from technosphere
- aluminium hydroxide factory: 1.64e-11 unit; source Classen M. 2009; lognormal variance with pedigree 0.51, pedigree (5,5,5,5,5)
  EcoSpold01Location=RER
  Rough guess
  Uncertainty: rough guess
- bauxite: 1.861 kg; source International Aluminium Insitute 2015; lognormal variance with pedigree 0.0146, pedigree (1,3,4,1,1)
  IAI 2015 data. Response rate: 39% by production. Reported on a wet mass basis, dry mass is estimated as 88%
  property carbon content, fossil 0; name C_content_fossil
  property carbon content, non-fossil 0; name C_content_non_fossil
  property dry mass 0.88 kg; name DM
  property water content 0.136364; name water_content; = (WM-DM)/DM
  property water in wet mass 0.12 kg; name WWM
  property wet mass 1 kg; name WM
- electricity, medium voltage: 0.000109235, 0.000196802, 8.78085e-6, 2.23205e-5, 5.16554e-5, 0.000204616, 0.00255018, 0.00270066, 0.00010374, 0.00137558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 kWh (82 suppliers, which the file names only by identifier); sum of these 0.054 kWh; source International Aluminium Insitute 2015; lognormal variance with pedigree 0.0087, pedigree (1,2,4,1,1)
  As reported by IAI energy survey (2015), reporting rate is 95% by production
- heat, district or industrial, natural gas: 2.09704, 0.000648051 MJ (2 suppliers, which the file names only by identifier); sum of these 2.09769 MJ; = Net_Heat_Value_ng*40.4 *m3fuel_use_ng /fuel_use_ng; source International Aluminium Insitute 2015; lognormal variance with pedigree 0.0093, pedigree (2,2,4,1,1)
  Natural Gas.As reported by IAI 2015 Energy survey
  properties: Corresponding fuel use 1.04 MJ, fuel input in physical units, m3 0.054 m3, heating value, net 1 MJ
  note on Corresponding fuel use: Lower heating value of the fuel input related to the heat/electricity output, based on an efficiency of 96%
  note on heating value, net: net (lower) heating (calorific) value. Based on European average as reported in Classen et al (2009)
- heat, district or industrial, other than natural gas: 0.379867 MJ; = kgFuel_Input_HFO* Net_Heat_Value_HFO*40.0/ fuel_use_HFO; source International Aluminium Insitute 2015; lognormal variance with pedigree 0.0093, pedigree (2,2,4,1,1)
  Heavy Oil.As reported by IAI 2015 energy survey
  property Corresponding fuel use 1.053 MJ; name fuel_use_HFO
  property fuel input in physical units, kg 0.01 kg; name kgFuel_Input_HFO
  property heating value, net 1 MJ; name Net_Heat_Value_HFO
  note on Corresponding fuel use: Lower heating value of the fuel input related to the heat/electricity output. Based on an assumed efficiency of 95%.
- heat, district or industrial, other than natural gas: 0.0405508 MJ; = kgFuel_Input_LFO* Net_Heat_Value_LFO*42.7/ fuel_use_LFO; source International Aluminium Insitute 2015; lognormal variance with pedigree 0.0093, pedigree (2,2,4,1,1)
  Diesel combustion. As reported by IAI 2015 Energy survey
  property Corresponding fuel use 1.053 MJ; name fuel_use_LFO
  property fuel input in physical units, kg 0.001 kg; name kgFuel_Input_LFO
  property heating value, net 1 MJ; name Net_Heat_Value_LFO
- heat, district or industrial, other than natural gas: 2.17328 MJ; = Net_Heat_Value_Coal*28.9 * kgFuel_Input_Coal / fuel_use_Coal; source International Aluminium Insitute 2015; lognormal variance with pedigree 0.0093, pedigree (2,2,4,1,1)
  Coal.IAI 2015 data.
  EcoSpold01Location=RER
  property Corresponding fuel use 1.25 MJ; name fuel_use_Coal
  property fuel input in physical units, kg 0.094 kg; name kgFuel_Input_Coal
  property heating value, net 1 MJ; name Net_Heat_Value_Coal
  note on Corresponding fuel use: Lower heating value of the fuel input related to the heat/electricity output, assuming an eficiency of 80%
  note on heating value, net: net (lower) heating (calorific) value of industrial hard coal
- inert waste, for final disposal: -0.0119224, -7.76178e-5 kg (2 suppliers, which the file names only by identifier); sum of these -0.012 kg; source International Aluminium Insitute 2015; lognormal variance with pedigree 0.0012, pedigree (1,3,1,1,1)
  EcoSpold01Location=CH
  IAI 2015 data. recycled by products are excluded, only landfilled waste.
  production volume; = aluminiumHydroxideProductionVolume * inertWaste/aluminiumHydroxideAmount
    Calculated from the production volume of aluminium hydroxide in proportion to the respective output amounts.
  properties: dry mass 0.995 kg, water content 0.00502513, wet mass 1 kg
- quicklime, milled, loose: 0.020826, 0.000174045 kg (2 suppliers, which the file names only by identifier); sum of these 0.021 kg; source International Aluminium Insitute 2015; lognormal variance with pedigree 0.0092, pedigree (1,3,4,1,1)
  EcoSpold01Location=CH
  IAI 2015 data,collected as calcined lime
  properties: dry mass 0.99 kg, water content 0.010101, wet mass 1 kg
- redmud from bauxite digestion: -0.804 kg; name redmudAmount; source International Aluminium Insitute 2015; lognormal variance with pedigree 0.0012, pedigree (1,3,1,1,1)
  EcoSpold01Location=CH
  2015 data. Water content was not specified in IAI datasets.
  Uncertainty: Uncertainty higher due to the 40% water content source (Althaus et al., 2000)
  production volume; = aluminiumHydroxideProductionVolume* redmudAmount/ aluminiumHydroxideAmount
    (same comment as for inert waste, for final disposal)
  property carbon content, fossil 0; name redmudAmount_C_content_fossil
  property carbon content, non-fossil 0; name redmudAmount_C_content_non_fossil
  property dry mass 1 kg; name redmudAmount_DM
  property water content 0.334; name redmudAmount_water_content
  property water in wet mass 0.334 kg; name redmudAmount_WWM
  property wet mass 1.334 kg; name redmudAmount_WM
- sodium hydroxide, without water, in 50% solution state: 0.048 kg; source International Aluminium Insitute 2015; lognormal variance with pedigree 0.0092, pedigree (1,3,4,1,1)
  EcoSpold01Location=RER
  IAI 2015 data. Sodium hydroxide used (as 100% caustic soda)
  properties: dry mass 1 kg, heating value, net 3.03 MJ, wet mass 1 kg

## Inputs from nature
- Occupation, unspecified [natural resource, land]: 0.001 m2*year; source International Aluminium Insitute 2015; lognormal variance with pedigree 0.0432, pedigree (1,3,5,1,2)
  IAI 2015 data. Reported as Land occupation
- Water, salt, ocean [natural resource, in water]: 0.00013 m3; source International Aluminium Insitute 2015; lognormal variance with pedigree 0.0092, pedigree (1,3,4,1,1)
  IAI 2015 data. Response rate:19% of surveyed sites.
  Uncertainty: ;
- Water, unspecified natural origin [natural resource, in water]: 0.00133 m3; source International Aluminium Insitute 2015; lognormal variance with pedigree 0.0092, pedigree (1,3,4,1,1)
  IAI 2015 data. Response rate: 100% of surveyed sites.

## Emissions to nature
- Mercury II [air, unspecified]: 7.7e-8 kg; source International Aluminium Insitute 2015; lognormal variance with pedigree 0.6586, pedigree (1,3,4,1,1)
  IAI 2015 data. Response rate: 18% by production
- Nitrogen oxides [air, unspecified]: 0.0004 kg; source International Aluminium Insitute 2015; lognormal variance with pedigree 0.0406006, pedigree (1,3,5,1,1)
  IAI 2015 Data, Response rate: 33% by production
- Particulate Matter, < 2.5 um [air, unspecified]: 3.8e-5 kg; source International Aluminium Insitute 2015; lognormal variance with pedigree 0.0407, pedigree (1,3,5,1,1)
  IAI 2015 Data, Response rate: 14% by production
- Particulate Matter, > 10 um [air, unspecified]: 0.00023 kg; source International Aluminium Insitute 2015; lognormal variance with pedigree 0.5706, pedigree (1,3,5,1,1)
  IAI 2015 Data, Response rate: 9% by production
- Particulate Matter, > 2.5 um and < 10um [air, unspecified]: 4.3e-5 kg; source International Aluminium Insitute 2015; lognormal variance with pedigree 0.04061, pedigree (1,3,5,1,1)
  IAI 2015 Data, Response rate: 8% by production
- Sulfur dioxide [air, unspecified]: 0.00074 kg; source International Aluminium Insitute 2015; lognormal variance with pedigree 0.0092, pedigree (1,3,4,1,1)
  IAI 2015 data. Response rate: 37% by production
- Water [air, urban air close to ground]: 0.00042 m3; source International Aluminium Insitute 2015; lognormal variance with pedigree 0.2106, pedigree (5,5,5,5,5)
  IAI data, reported as Fresh water consumption
- BOD5, Biological Oxygen Demand [water, unspecified]: 4.59e-5 kg; source Classen M. 2009; lognormal variance with pedigree 0.0807, pedigree (1,3,5,3,1)
  Values come from the former ecoinvent dataset (Althaus, 2009)
  Uncertainty: ;
- COD, Chemical Oxygen Demand [water, unspecified]: 4.59e-5 kg; source Classen M. 2009; lognormal variance with pedigree 0.0807, pedigree (1,3,5,3,1)
  Values come from the former ecoinvent dataset (Althaus, 2009)
- DOC, Dissolved Organic Carbon [water, unspecified]: 1.8e-5 kg; source Classen M. 2009; lognormal variance with pedigree 0.0807, pedigree (1,3,5,3,1)
  Values come from the former ecoinvent dataset (Althaus, 2009)
  Uncertainty: ;
- Mercury II [water, unspecified]: 3e-10 kg; source International Aluminium Insitute 2015; lognormal variance with pedigree 0.0486, pedigree (1,3,4,1,1)
  IAI 2015 data. Response rate: 26% by production
- Oils, unspecified [water, unspecified]: 0.0011 kg; source International Aluminium Insitute 2015; lognormal variance with pedigree 0.0486, pedigree (1,3,4,1,1)
  IAI 2015 data. Response rate: 32% by production
- Sodium I [water, unspecified]: 0.00128 kg; source Classen M. 2009; lognormal variance with pedigree 0.0807, pedigree (1,3,5,3,1)
  Values come from the former ecoinvent dataset (Althaus, 2009)
- Suspended solids, unspecified [water, unspecified]: 3e-5 kg; source International Aluminium Insitute 2015; lognormal variance with pedigree 0.0486, pedigree (1,3,4,1,1)
  IAI 2015 data. Response rate: 34% by production
- TOC, Total Organic Carbon [water, unspecified]: 1.8e-5 kg; source Classen M. 2009; lognormal variance with pedigree 0.0807, pedigree (1,3,5,3,1)
  Values come from the former ecoinvent dataset (Althaus, 2009)
  Uncertainty: ;
- Water [water, ocean]: 0.000126 m3; source International Aluminium Insitute 2015; lognormal variance with pedigree 0.0486, pedigree (1,3,4,1,1)
  IAI 2015 data. Response rate: 39% by production
- Water [water, surface water]: 0.00122 m3; source International Aluminium Insitute 2015; lognormal variance with pedigree 0.0486, pedigree (1,3,4,1,1)
  IAI 2015 data. Response rate: 39% by production

## Sampling procedure
2015 LCI Survey Data was collected by the IAI in Feb - July 2016 with analysis and data verification taking place Aug - Dec 2016.

## Extrapolations
The Life Cycle Survey was conducted in 2016 for 2015 data, collecting data from IAI member and non-member companies.Electricity and fuel inputs are provided by the IAI annual energy surveys.
Data obtained from the IAI surveys are global in scope (no extrapolations). 39% representativeness refers to plants surveyed by IAI , although not all plants supplied data for all flows. Amounts based on 2015 IAI Energy Survey actually cover 95% of world production, although again not all sites reported all flows. Flows inherited from the ecoinvent 2.2 database covered the geography RER, and the uncertainty has been adjusted accordingly.
