# gravel production, crushed

Dataset: EcoSpold 2, unit process
Geography: IN
Time period: 2014-04-01 to 2023-12-31
Technology level: current
Classification: ISIC rev.4 ecoinvent: 0810:Quarrying of stone, sand and clay
Scenario: Business-as-Usual
System model: Allocation, cut-off by classification
Generated by: P V Kiran Ananth
Published in: Kiran Ananth P. V. 2017
Database: ecoinvent
isCopyrightProtected: true
accessRestrictedTo: 1

## General comment
This dataset describes mining of gravel through open cast mechanised mining operation. The operation like drilling, blasting, separation, collection done at mining site. The uncrushed gravel were transported to crushing units by road here it is assumed that mining site and crushing unit were located nearby. Infrastructure buildings and machinery, transportation of uncrushed gravel to the crushing units as well as administration activities are not included in the dataset.
Stone Crushing Industry is an important industrial sector in the country engaged in producing crushed stone of various sizes depending upon the requirement which acts as raw material for various construction activities such as construction of Roads, Highways, Bridges, Buildings, and Canals etc. It is estimated that there are over 12,000 stone crusher units in India. The number is expected to grow further keeping in view the future plans for development of infrastructure of roads, canals and buildings that are required for overall development of the country.
Mined out stone will be used for construction of buildings & making of roads. Stone can be used in different forms in different construction jobs and road projects. Stone mined out from the mine can be directly used as boulders of different sizes for River Anti-erosion, Dam construction, embankment works etc. After crushing into different sizes of aggregates from 6mm to 63mm, the product can be used in construction and road projects. The type of stone quarried is largely granite and black trap stone.

## Included activities start
From mining of gravels by open cast mining operation, its processing and transportation to crusing unit. In crushing unit activities such as screening, crushingg, conveying operations were included.

## Included activities end
The activity ends with crushed gravels ready to use for different application. Infrastructure buildings and machinery, transportation of uncrushed gravel to the crushing units as well as administration activities are not included in the dataset.

## Geography
Most of the data represents for North India Geography.

## Technology
Gravel quarry operation in India done by open cast mechanised mining method. There were no electrical energy consumption as mining operation take place during daytime. For crusing operation latest technology equipement like Crusher, Screen, Conveyor belt, Lighting system were considered.

## Time period
Some data collected from 2010 year report and for that uncertainty adjustted accordingly.

## Reference product
- gravel, crushed: 1 kg; name RP_amount_1; By-product classification allocatable product; CPC 15320: Pebbles, gravel, broken or crushed stone, macadam; granules, chippings and powder of stone; HS2017 251710: Pebbles, gravel, broken or crushed stone; of a kind commonly used for concrete aggregates, for road metalli[...]
  Bulk density of soil varies from 1167 kg/m3 to 1761 kg/m3
  production volume 9.6e11 kg; name RP_PV_1; = 12000*20*200*20*1000
    Calculated value. Considering in India during year 2009 there were 12000 crushing units. Assumed average capacity of crushing unit considered 20 TPH with annual working days of 200 and 20 hrs of operation on each day. Ref- Comprehensive industry document stone crushers by Central Pollution Control Board-February 2009
  property price 0.00828715 EUR2005
    Price, average unit value, dollars per metric ton in 2022 of crushed stone (gravel, crushed) of 14 USD/metric ton. The price is the annual average free-on-board plant prices, usually at the first point of sale or captive use, as reported by crushed stone producing companies. Prices do not include transportation from the plant or yard to the consumer, although they do include all costs of mining, processing, in-plant transportation, overhead, and profit. Value retrieved from USGS, Mineral Commodity Summaries 2023, accessed on 20230918: https://pubs.usgs.gov/periodicals/mcs2023/mcs2023-stone-crushed.pdf from https://www.usgs.gov/centers/national-minerals-information-center/crushed-stone-statistics-and-information
    The price was converted to EUR based on the annual exchange rates published by the European Central Bank (https://sdw.ecb.europa.eu/quickview.do?SERIES_KEY=120.EXR.A.USD.EUR.SP00.A, last accessed on 2023-06-01) and adjusted for inflation relative to 2005 using the producer price index (PPI) of the euro area, published by eurostat (https://ec.europa.eu/eurostat/databrowser/view/STS_INPP_A__custom_6416181/default/table?lang=en, last accessed on 2023-06-01).
  properties: carbon allocation 0 kg, carbon content 0, carbon content, fossil 0, carbon content, non-fossil 0, dry mass 1 kg, water content 0, water in wet mass 0 kg, wet mass 1 kg

## Inputs from technosphere
- conveyor belt: 9.51e-8 m; lognormal variance with pedigree 0.424, pedigree (5,4,5,5,1)
  Data referred from gravel production, crushed, GLO accessed on 20180205. India specific data not available. Uncertainity adjusted accordingly.
- diesel, burned in building machine: 0.0297308 MJ; = 762*2.684519*295*24/(487134*1000); lognormal variance with pedigree 0.0419, pedigree (2,3,5,3,1)
  Calculated Value. Diesel consumption for Excavator, Compressors, Tippers etc. Total electrical power consumption 762 Hp which is converted to equivalent heat energy in MJ. ANnd corrosponding production is 487134 tonne per year with No of working days 295.
  properties: heating value, net 1 MJ
- electricity, medium voltage: 0.0027975 kWh; lognormal variance with pedigree 0.0419, pedigree (2,3,5,3,1)
  Data taken from Compressive Industry Document Stone Crusher published by Central Pollution Control Board. Electrical energy consumption for Conveyor, Crusher, Vibretory screen, Lighting were considered
- explosive, tovex: 7.08532e-5 kg; = 7.08532E-5; lognormal variance with pedigree 0.0487, pedigree (3,3,5,3,1)
  Data taken from Environmental Impact Assesment Report of Rajbandh Stone Quarry Operation With Crusher.
  properties: carbon content, fossil 0.0483756, dry mass 0.92 kg, water content 0.0869565, wet mass 1 kg
- gravel/sand quarry infrastructure: 4.75e-11 unit; lognormal variance with pedigree 0.3526, pedigree (1,3,5,5,1)
  (same comment as for conveyor belt)
- industrial machine, heavy, unspecified: 9.51e-5 kg; lognormal variance with pedigree 0.372, pedigree (3,5,5,5,1)
  (same comment as for conveyor belt)
- limestone quarry infrastructure: 5.25e-11 unit; lognormal variance with pedigree 0.3041, pedigree (1,2,3,5,1)
  Used as proxy. Data referred from limestone quarry operation GLO (Accessed 20171123)
  Uncertainty: ;
- lubricating oil: 2.5e-6 kg; lognormal variance with pedigree 0.0532, pedigree (2,3,5,5,1)
  (same comment as for conveyor belt)
  properties: carbon content, fossil 0.75, dry mass 1 kg, heating value, net 40.2 MJ, wet mass 1 kg
  note on carbon content, fossil: Lubricating oil is produced from diesel. C-content/dry mass of fats and oils considered 75%, from: ecoinvent v2.2 report, n 15a, pg 40
  note on heating value, net: Literature value, Source: IPCC 2006, 2006 IPCC Guidelines for National Greenhouse Gas Inventories, Prepared by the National Greenhouse Gas Inventories Programme, Eggleston H.S., Buendia L., Miwa K., Ngara T. and Tanabe K. (eds). Published: IGES, Japan
- waste mineral oil: -2.5e-6 kg; name BP_amount_1; lognormal variance with pedigree 0.0052, pedigree (2,3,3,5,1)
  (same comment as for conveyor belt)
  production volume; = RP_PV_1 * (BP_amount_1 / RP_amount_1)
    Calculated from production volume of reference product using the relative outputs.
  properties: carbon content, fossil 0.864444, dry mass 0.9 kg, heating value, net 34.7 MJ, water content 0.111111, wet mass 1 kg
  note on carbon content, fossil: Tab A.6, ecoinvent v2.2 report 13_I. C content has been calculated after data in the tables, and then referred to 1 kg DM
  note on heating value, net: Value taken from the general comment of the treatment dataset.

## Inputs from nature
- Gravel [natural resource, in ground]: 1 kg; lognormal variance with pedigree 0.0033, pedigree (1,3,3,3,1)
  Natural resource.
- Occupation, unspecified [natural resource, land]: 0.0005 m2*year; lognormal variance with pedigree 0.0902, pedigree (3,2,5,3,3)
  (same comment as for explosive, tovex)
- Transformation, from unspecified [natural resource, land]: 7.7966e-5 m2; = 7.7966E-5; lognormal variance with pedigree 0.1613, pedigree (2,3,5,3,1)
  Data taken from Environmental Impact Assesment Report of Rajbandh Stone Quarry Operation With Crusher. Nearly 60% of total land used for mineral extraction purpose.
- Transformation, to mineral extraction site [natural resource, land]: 7.7966e-5 m2; = 7.7966E-5; lognormal variance with pedigree 0.1613, pedigree (2,3,5,3,1)
  (same comment as for Transformation, from unspecified)
- Water, unspecified natural origin [natural resource, in water]: 2.3e-5 m3; name water_input; = 2.3E-05; lognormal variance with pedigree 0.0419, pedigree (2,3,5,3,1)
  Data taken from Environmental Impact Assesment Report of Rajbandh Stone Quarry Operation With Crusher. 65% water consumed for dust supression, 15% water consumption for drining and 20% water consumption for plantation

## Emissions to nature
- Particulate Matter, < 2.5 um [air, unspecified]: 2.17e-7 kg; lognormal variance with pedigree 0.3526, pedigree (3,5,5,5,2)
  Calculated value. Emission factors taken from US-EPA (PM-2.5), Table 11.19.2-1, for controlled sources (wet suppression of dust). Does not include emissions for the stone quarry blasting operations.
- Particulate Matter, > 10 um [air, unspecified]: 2.71e-6 kg; lognormal variance with pedigree 0.0926, pedigree (3,5,5,5,2)
  Calculated value. Emission factors taken from US-EPA (Total Particulate Matter minus PM-10), Table 11.19.2-1, for controlled sources (wet suppression of dust). Does not include emissions for the stone quarry blasting operations.
- Particulate Matter, > 2.5 um and < 10um [air, unspecified]: 2.78e-6 kg; lognormal variance with pedigree 0.0926, pedigree (3,5,5,5,2)
  Calculated value. Emission factors taken from US-EPA (PM-10 minus PM-2.5), Table 11.19.2-1, for controlled sources (wet suppression of dust). Does not include emissions for the stone quarry blasting operations.
- Water [air, unspecified]: 1.15e-5 m3; = water_input*0.5; lognormal variance with pedigree 0.0433, pedigree (3,3,5,3,1)
  Calculated value, It is assumed that 50% water present in air and rest as water.
- Water [water, unspecified]: 1.15e-5 m3; = water_input*0.5; lognormal variance with pedigree 0.0433, pedigree (3,3,5,3,1)
  Calculated value, It is assumed that 50% water present in air and rest as water.

## Sampling procedure
The Environmental Impact Assesment Report of Rajbandh Stone Quarry Operation with Crusher

## Extrapolations
The representativeness of dataset on national scale is low hence uncertainty adjusted accordingly.
