# sodium ethyl xanthate production

Dataset: EcoSpold 2, unit process
Geography: RoW
Time period: 2014-01-01 to 2024-12-31
Technology level: current
Classification: EcoSpold01Categories: chemicals/organics
Classification: ISIC rev.4 ecoinvent: 2011:Manufacture of basic chemicals
Scenario: Business-as-Usual
System model: Allocation, cut-off by classification
Generated by: Daria Dellenbach
Published in: Makhosazane Chucky Kunene 2014
Database: ecoinvent
isCopyrightProtected: true
accessRestrictedTo: 1

## General comment
This dataset represents the production of 1 kg pure sodium ethyl xanthate (CAS 140-90-9) from carbon disulfide. Sodium ethyl xanthate is a pale yellow powder at standard conditions.
Sodium ethyl xanthate is used mainly in the mining industry as flotation agent for recovery of metals as copper, nickel, silver or gold, as well as solid metal sulfides or oxides from ore slurries. Furthermore, it is used as defoliant, herbicide, and an additive to rubber to protect it against oxygen and ozone.
Sodium ethyl xanthate showed a moderat toxicity through oral and dermal intake in animals and is irritating to eyes and skin. It is especially toxic to aquatic life and therefore its disposal is strictly controlled.
Sodium ethyl xanthate is produced from carbon disulfide, ethanol and sodium hydroxide:
CH3CH2OH + CS2 + NaOH --> CH3CH2OCS2Na + H2O
This dataset is a copy of the corresponding ZA dataset.
Reference:
Kunene, M. C. (2014): Life cycle assessment of the production of xanthate salts and of their application for ARD mitigation, University of Cape Town
GENDORF Chemical Park

## Included activities start
The activity includes all the raw and processed materials necessary to produce this product.

## Included activities end
The activity ends with the final product being ready for transportation at the production site.

## Geography
South African data, collected monthly average in 2011, average data.

## Technology
Sodium ethyl xanthate is produced from carbon disulfide, ethanol and sodium hydroxide. The production is essentially carried out in a batch system.
CH3CH2OH + CS2 + NaOH --> CH3CH2OCS2Na + H2O
The process is usually carried out in two steps:
1. CH3CH2OH + NaOH --> CH3CH2ONa + H2O
Excess of precooled alcohol is added to the reactor and sodium hydroxide is added slowly. Since the reaction is exothermic, is has to be cooled continously by cooling water.
2. CH3CH2ONa + CS2 --> CH2CH2OCS2Na
Carbon disulfide is added under continued refrigeration.
Emissions from the xanthate plant are reported to be negligible as neither the solid nor the liquid plants generate solid or liquid effluents. All non-product outputs are returned to the process for conversion to xanthate.
Reference:
Kunene, M. C. (2014): Life cycle assessment of the production of xanthate salts and of their application for ARD mitigation, University of Cape Town
GENDORF Chemical Park

## Time period
time to which data refer

## Parameters
- fraction, cooling water, cooling pond system, to air: 0.032 dimensionless; name fraction_CW_CP_to_air; lognormal variance with pedigree 0.0413, pedigree (2,3,1,3,1)
  Calculated based on literature value (Scown, C.D., 2011, Water Footprint of U.S. Transportation Fuels and supplying information of the article) (Vionnet, S., Quantis Water Database - Technical Report, 2012).
- fraction, cooling water, once-through system, to air: 0.004 dimensionless; name fraction_CW_OT_to_air; lognormal variance with pedigree 0.0413, pedigree (2,3,1,3,1)
  (same comment as for fraction, cooling water, cooling pond system, to air)
- fraction, cooling water, recirculating system, to air: 0.771 dimensionless; name fraction_CW_R_to_air; lognormal variance with pedigree 0.0413, pedigree (2,3,1,3,1)
  (same comment as for fraction, cooling water, cooling pond system, to air)
- fraction, cooling water, to air: 0.3875 dimensionless; name fraction_CW_to_air; = (0.5*fraction_CW_OT_to_air)+(0.5*fraction_CW_R_to_air); lognormal variance with pedigree 0.092025, pedigree (4,4,3,2,4)
  Calculated value based on literature value (see comments of the other parametres present in this dataset) and expert opinion. In the case when no industry/literature data are available about the type of cooling or directly fraction, cooling water, to air specific for the process a default assumption is applied. It is assumed that the once-through cooling system is used in 50% of all cases and recirculating system is used in another 50% of all cases.
- fraction, process water, to air: 0.205 dimensionless; name fraction_PW_to_air; lognormal variance with pedigree 0.092025, pedigree (4,4,3,2,4)
  Literature value (Statistics Canada, 2007 & Shaffer, K.H., 2008, Consumptive water use in the Great Lakes Basin, USGS) (Vionnet, S., Quantis Water Database - Technical Report, 2012).

## Reference product
- sodium ethyl xanthate: 1 kg; name RP; By-product classification allocatable product; CPC 34160: Organo-sulphur compounds and other organo-inorganic compounds; heterocyclic compounds n.e.c.; nucleic acids an[…]; HS2017 292019: Esters; thiophosphoric esters (phosphorothioates) and their salts; other than parathion (ISO) and parathion[...]; CAS 140-90-9
  production volume 3.55679e7 kg; name PV_RP; = 5500000/0.154
    The annual production volume of Europe is 5'500'000kg. This value was sclaed up with the GDP, where Europe's contribution is 15.4%.
    ECHA, sodium ethyl xanthate: https://echa.europa.eu/substance-information/-/substanceinfo/100.004.947
  property price 1.03713 EUR2005
    The price is calculated based on ChemCore and Alibaba (available here: https://kemcore.com/products/sodium-ethyl-xanthate-sex-90, https://www.alibaba.com/showroom/sodium-ethyl-xanthate.html, last accessed 2022-06-15).
    The prices were converted to EUR based on the annual exchange rates published by the European Central Bank (https://sdw.ecb.europa.eu/quickview.do?SERIES_KEY=120.EXR.A.USD.EUR.SP00.A, last accessed on 2022-02-15) and adjusted for inflation relative to 2005 using the producer price index (PPI) of the euro area, published by eurostat (https://appsso.eurostat.ec.europa.eu/nui/show.do?dataset=sts_inpp_a&lang=en, last accessed on 2022-05-04).
  properties: carbon allocation 0.249914 kg, carbon content 0.249914, carbon content, fossil 0.249914, carbon content, non-fossil 0, dry mass 1 kg, heating value, net 11.775 MJ, water content 0, water in wet mass 0 kg, wet mass 1 kg

## Inputs from technosphere
- carbon disulfide: 0.53 kg; lognormal variance with pedigree 0.3432, pedigree (2,4,1,4,4)
  Assuming stoichiometric amount.
  properties: carbon content, fossil 0.157895, dry mass 1 kg, heating value, net 32.72 MJ, wet mass 1 kg
- chemical factory, organics: 4e-10 unit; lognormal variance with pedigree 0.3432, pedigree (2,4,1,4,4)
  Calculated based on literature data published by the industry. For this activity, no information was readily available concerning infrastructure and land-use. Therefore, the infrastructure is estimated based on data from two chemical factories, the BASF site of Ludwigshafen and the chemical factory in Gendorf (which are both located in Germany), which produce a wide range of chemical substances. Based on this data, the following assumptions are made: the built area amounts to about 4.2 ha, the plant has an average output of 50'000 t/a and a lifespan of fifty years. The estimated infrastructure amount is therefore 4.00 E-10 units per kg of produced chemical.
- electricity, medium voltage: 9.86958e-6, 0.00112414, 4.91185e-6, 3.14847e-5, 5.40507e-5, 0.000107301, 5.03104e-5, 8.82742e-5, 0.0921121, 2.11098e-6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 kWh (36 suppliers, which the file names only by identifier); sum of these 0.164 kWh; lognormal variance with pedigree 0.3432, pedigree (2,4,1,4,4)
  Electricity from the grid is used for plant equipment operations,
- ethanol, without water, in 99.7% solution state, from ethylene: 0.220827, 0.0991728 kg (2 suppliers, which the file names only by identifier); sum of these 0.32 kg; lognormal variance with pedigree 0.0101, pedigree (2,3,2,3,3)
  Alcohol fresh feed, assuming stoichiometric amount and 10% is recycled.
  properties: carbon content, fossil 0.521739, dry mass 1 kg, heating value, net 31.58 MJ, wet mass 1 kg
- hazardous waste, for incineration: -0.0870458, -0.04186, -0.0010942 kg (3 suppliers, which the file names only by identifier); sum of these -0.13 kg; lognormal variance with pedigree 0.0458, pedigree (3,3,3,4,4)
  Mass balance.
  production volume; = PV_RP * hazWaste / RP
    Calculated from production volume of reference product using the relative outputs.
  properties: carbon content, fossil 0.554667, dry mass 0.75 kg, heating value, net 17 MJ, water content 0.333333, wet mass 1 kg
  note on carbon content, fossil: Tab A.6, ecoinvent v2.2 report 13_I. C content has been calculated after data in the tables, and then referred to 1 kg DM
  note on heating value, net: Value taken from the general comment of the treatment dataset.
- nitrogen, liquid: 0.02011, 0.00552005 kg (2 suppliers, which the file names only by identifier); sum of these 0.02563 kg; lognormal variance with pedigree 0.3432, pedigree (2,4,1,4,4)
  Nitrogen is used for purging of plant equipment (assumed density 1.165 kg/m3).
  properties: dry mass 1 kg, wet mass 1 kg
- sodium hydroxide, without water, in 50% solution state: 0.0249092, 0.255091 kg (2 suppliers, which the file names only by identifier); sum of these 0.28 kg; lognormal variance with pedigree 0.3432, pedigree (2,4,1,4,4)
  Assuming stoichiometric amount.
  properties: dry mass 1 kg, heating value, net 3.03 MJ, wet mass 1 kg
- wastewater, unpolluted: -1.04915e-9, -2.16951e-7 m3 (2 suppliers, which the file names only by identifier); sum of these -2.18e-7 m3; lognormal variance with pedigree 0.0438, pedigree (2,4,1,4,4)
  Exchanges estimated to close water balance. Shares of waste water, emissions to water and air based on GENDORF Chemical Park.
  References:
  Chemiepark GENDORF, Umwelterklärung 2016, https://www.gendorf.de/Nachbarn/Umweltschutz/Industrie%20und%20Nachhaltigkeit
  Chemiepark GENDORF, Umwelterklärung 2017, https://www.gendorf.de/Nachbarn/Umweltschutz/Industrie%20und%20Nachhaltigkeit
  Chemiepark GENDORF, Umwelterklärung 2020, https://www.gendorf.de/Nachbarn/Umweltschutz/Industrie%20und%20Nachhaltigkeit
  production volume; = PV_RP *WW / RP
    Calculated from production volume of reference product using the relative outputs.
  properties: carbon content, fossil 0.00178991, carbon content, non-fossil 0.00178991, dry mass 0.337476 kg, water content 2962.17, wet mass 1000 kg
  note on carbon content, fossil: Assumed to be like in tap water. Bicarbonate content is 2.93 mol/m3. CO2 content is 0.1 mol/m3 (ecoinvent v2.2 report 8, Tab 93.1).
- water, deionised: 0.0743544, 0.000267658, 0.241378 kg (3 suppliers, which the file names only by identifier); sum of these 0.316 kg; lognormal variance with pedigree 0.3432, pedigree (2,4,1,4,4)
  Water is used for dilution purposes.
  properties: wet mass 1 kg

## Inputs from nature
- Water, cooling, unspecified natural origin [natural resource, in water]: 0.001264 m3; lognormal variance with pedigree 0.0101, pedigree (2,3,2,3,3)
  Water is used for cooling purposes.

## Emissions to nature
- Nitrogen [air, unspecified]: 0.02563 kg; lognormal variance with pedigree 0.0032, pedigree (2,3,2,4,2)
  To ensure nitrogen balance,
- Water [air, unspecified]: 0.000140659 m3; lognormal variance with pedigree 0.0495, pedigree (2,3,2,3,3)
  (same comment as for wastewater, unpolluted)
- Water [water, unspecified]: 0.00143912 m3; lognormal variance with pedigree 0.0495, pedigree (2,3,2,3,3)
  (same comment as for wastewater, unpolluted)

## Sampling procedure
literature values, collected monthly average in 2011, average data.
