# maintenance, train, passenger, high-speed

Dataset: EcoSpold 2, unit process
Geography: RoW
Time period: 1996-01-01 to 2023-12-31
Technology level: current
Classification: EcoSpold01Categories: transport systems/train
Classification: ISIC rev.4 ecoinvent: 3315:Repair of transport equipment, except motor vehicles
Tags: ConvertedDataset
Scenario: Business-as-Usual
System model: Allocation, cut-off by classification
Generated by: Michael Spielmann (obsolete)
Published in: Spielmann M. 2004
Database: ecoinvent
isCopyrightProtected: true
accessRestrictedTo: 1

## General comment
The life span of the train is assumed to be 25 years; a yearly performance of 400'000 vkm results in a life time performance of 10’000’000 vkm.
[This dataset was already contained in the ecoinvent database version 2. It was not individually updated during the transfer to ecoinvent version 3. Life Cycle Impact Assessment results may still have changed, as they are affected by changes in the supply chain, i.e. in other datasets. This dataset was generated following the ecoinvent quality guidelines for version 2. It may have been subject to central changes described in the ecoinvent version 3 change report (http://www.ecoinvent.org/database/ecoinvent-version-3/reports-of-changes/), and the results of the central updates were reviewed extensively. The changes added e.g. consistent water flows and other information throughout the database. The documentation of this dataset can be found in the ecoinvent reports of version 2, which are still available via the ecoinvent website. The change report linked above covers all central changes that were made during the conversion process.]

## Included activities end
This inventory includes expenditures for regular maintenance and repair.

## Geography
Data represents a train maintenance of an ICE (no distinction between ICE 1 and ICE 2 is made)

## Technology
ICE 1 and ICE 2

## Parameters
- fraction, process water, to air: 0.15 dimensionless; name fraction_PW_to_air; lognormal variance with pedigree 0.092025, pedigree (4,4,3,2,4)
- fraction, tap water, to air: 0.15 dimensionless; name fraction_TW_to_air; lognormal variance with pedigree 0.092025, pedigree (4,4,3,2,4)

## Reference product
- maintenance, train, passenger, high-speed: 1 unit; By-product classification allocatable product; CPC 87149: Maintenance and repair services of other transport equipment
  EcoSpold01Location=DE
  production volume 3.75794 unit
    This is a placeholder value that does not reflect real-world production volumes. This dataset does not currently require a real-world production volume to work in the database framework, and no actual data were collected yet. This has no negative effect on the results of the ecoinvent database.
  property price 491302 EUR2005
    Calculated based on inputs: The price of the product has been calculated as a sum of the values of the material and energy inputs for this product. This value is therefore a rough estimation. It may underestimate the real price since there are additional expenses when producing any product. These expences can include for example labour costs, treatment of waste materials and profit for the producer. Please consider carefully whether this level of data quality is acceptable for your application.
  properties: carbon allocation 0 kg, carbon content 0

## Inputs from technosphere
- alkyd paint, white, without solvent, in 60% solution state: 5000 kg; lognormal variance with pedigree 0.0527, pedigree (2,2,5,5,1)
  Literature studies (repair)
  EcoSpold01Location=RER
  Uncertainty: literature studies (repair)
  properties: carbon content, fossil 0.140367, carbon content, non-fossil 0.199629, dry mass 1 kg, heating value, net 10.3 MJ, wet mass 1 kg
  note on carbon content, fossil: C content was calculated as an addition of C content in the raw materials.
- aluminium, cast alloy: 40 kg; lognormal variance with pedigree 0.0527, pedigree (2,2,5,5,1)
  (same comment as for alkyd paint, white, without solvent, in 60% solution state)
  properties: dry mass 1 kg, wet mass 1 kg
- aluminium, wrought alloy: 85 kg; lognormal variance with pedigree 0.0527, pedigree (2,2,5,5,1)
  (same comment as for alkyd paint, white, without solvent, in 60% solution state)
  properties: dry mass 1 kg, wet mass 1 kg
- copper, cathode: 125 kg; lognormal variance with pedigree 0.0527, pedigree (2,2,5,5,1)
  EcoSpold01Location=RER
  Literature studies (repair)
  Uncertainty: literature studies (repair)
  properties: dry mass 1 kg, wet mass 1 kg
- electricity, medium voltage: 603.963, 904.069, 285.604, 5316.18, 3120.2, 3699.3, 44934, 107.168, 896333, 301165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 kWh (47 suppliers, which the file names only by identifier); sum of these 1.58e6 kWh; lognormal variance with pedigree 0.0527, pedigree (2,2,5,5,1)
  Literature studies (repair & regular maintenance)
  EcoSpold01Location=DE
  Uncertainty: literature studies (repair & regular maintenance)
- heat, district or industrial, natural gas: 405666, 2.46867e7, 7628.95 MJ (3 suppliers, which the file names only by identifier); sum of these 2.51e7 MJ; lognormal variance with pedigree 0.0527, pedigree (2,2,5,5,1)
  EcoSpold01Location=RER
  Literature studies (repair & regular maintenance)
  Uncertainty: literature studies (repair & regular maintenance)
  properties: heating value, net 1 MJ
- lubricating oil: 500 kg; lognormal variance with pedigree 0.0527, pedigree (2,2,5,5,1)
  (same comment as for copper, cathode)
  properties: carbon content, fossil 0.75, dry mass 1 kg, heating value, net 40.2 MJ, wet mass 1 kg
  note on carbon content, fossil: Lubricating oil is produced from diesel. C-content/dry mass of fats and oils considered 75%, from: ecoinvent v2.2 report, n 15a, pg 40
  note on heating value, net: Literature value, Source: IPCC 2006, 2006 IPCC Guidelines for National Greenhouse Gas Inventories, Prepared by the National Greenhouse Gas Inventories Programme, Eggleston H.S., Buendia L., Miwa K., Ngara T. and Tanabe K. (eds). Published: IGES, Japan
- paper, woodfree, uncoated: 20700 kg; lognormal variance with pedigree 0.0527, pedigree (2,2,5,5,1)
  Literature studies (repair & regular maintenance)
  EcoSpold01Location=RER
  Uncertainty: literature studies (repair & regular maintenance)
  properties: carbon content, fossil 0.0251406, carbon content, non-fossil 0.281215, dry mass 0.945 kg, heating value, net 14.11 MJ, water content 0.0582011, wet mass 1 kg
  note on carbon content, fossil: Fossil C content was calculated after fossil C contents of chemicals used in the production of the paper (in Tab 8.54 & 8.55 ecoinvent v2.2 report 11_III, part 8).
  note on carbon content, non-fossil: Biogenic C content was calculated after biogenic C contents of chemicals used in the production of the paper (in Tab 8.54 & 8.55 ecoinvent v2.2 report 11_III, part 8). The cellulose content in 1 kg of paper (on a wet mas basis) was estimated as (1-chemical content), C content of cellulose was considered 0.44 kgC/kg dry mass (ecoinvent v2.2 report, n 15a, pg 40)
- reinforcing steel: 45000 kg; lognormal variance with pedigree 0.0527, pedigree (2,2,5,5,1)
  Literature study (repair)
  EcoSpold01Location=RER
  Uncertainty: literature study (repair)
  properties: carbon content, fossil 0.004, dry mass 1 kg, wet mass 1 kg
- sodium hydroxide, without water, in 50% solution state: 40000 kg; lognormal variance with pedigree 0.0527, pedigree (2,2,5,5,1)
  Literature studies (regular maintenance)
  EcoSpold01Location=RER
  Uncertainty: literature studies (regular maintenance)
  properties: dry mass 1 kg, heating value, net 3.03 MJ, wet mass 1 kg
- solvent, organic: 500 kg; lognormal variance with pedigree 0.0527, pedigree (2,2,5,5,1)
  Literature studies (repair)
  EcoSpold01Location=GLO
  Uncertainty: literature studies (repair)
  properties: carbon content, fossil 0.63072, dry mass 1 kg, heating value, net 19.11 MJ, wet mass 1 kg
  note on carbon content, fossil: Mixture of 15 of the most often used solvents (list in ecoinvent v2.2 report 11-III, pg 293). C content was calculated as an unweighted average of C content of the different solvents
- tap water: 927.044, 1413.2, 2636.96, 7103.78, 855.104, 35635.3, 635.517, 407793 kg (8 suppliers, which the file names only by identifier); sum of these 457000 kg; lognormal variance with pedigree 0.0527, pedigree (2,2,5,5,1)
  (same comment as for paper, woodfree, uncoated)
  properties: carbon content, fossil 0.00178991, dry mass 0.000337476 kg, water content 2962.17, wet mass 1 kg
  note on carbon content, fossil: Bicarbonate content is 2.93 mol/m3. CO2 content is 0.1 mol/m3 (ecoinvent v2.2 report 8, Tab 93.1).
- waste emulsion paint: -1999.8, -0.195298 kg (2 suppliers, which the file names only by identifier); sum of these -2000 kg; lognormal variance with pedigree 0.1327, pedigree (2,2,1,5,1)
  EcoSpold01Location=CH
  Based on own calculations, assuming that 0.6 of the paint are emitted as NMVOCs.
  Uncertainty: based on own calculations, assuming that 0.6 of the paint are emitted as NMVOCs.
  production volume
    Calculated from the production volume of maintenance, train, passenger, high-speed in proportion to the respective output amounts.
  properties: carbon content, fossil 0.27, dry mass 1 kg, heating value, net 8.18 MJ, wet mass 1 kg
  note on carbon content, fossil: Tab A.4, ecoinvent v2.2 report 13_I. C content has been calculated after data in the tables, and then referred to 1 kg DM
- wastewater, average: -2.72029, -452.668, -1.61167 m3 (3 suppliers, which the file names only by identifier); sum of these -457 m3; lognormal variance with pedigree 0.0127, pedigree (2,2,1,5,1)
  Literature studies (repair & regular maintenance)
  EcoSpold01Location=CH
  Uncertainty: literature studies (repair & regular maintenance)
  production volume
    (same comment as for waste emulsion paint)
  properties: carbon content, non-fossil 0.194039, dry mass 0.346837 kg, water content 2882.2, wet mass 1000 kg
  note on carbon content, non-fossil: 0.0673 kg TOC/m3 (Tab A.17, ecoinvent v2.2 report 13_I). TOC was considered as Total Carbon.

## Emissions to nature
- NMVOC, non-methane volatile organic compounds [air, unspecified]: 3500 kg; lognormal variance with pedigree 0.1727, pedigree (2,2,5,5,1)
  Derived from the used paint and solvent, assuming all solvent is emitted to air.
  Uncertainty: Derived from the used paint and solvent, assuming all solvent is emitted to air.
- Water [air, unspecified]: 68.55 m3; name water_to_air_unspecified; lognormal variance with pedigree 0.0827, pedigree (2,2,5,5,1)
  Calculated value based on literature values and expert opinion. See comments in the parametres' comment field.
  property fraction, origin: fresh water 1; name fraction_origin_fresh_water
  property fraction, origin: salt water 0; name fraction_origin_salt_water
  property fraction, origin: unspecified 0; name fraction_origin_unspecified

## Sampling procedure
The data of the material composition and energy consumption is based on literature studies.

## Extrapolations
none This dataset has been copied from an original dataset covering the geography DE. The uncertainty has been adjusted accordingly.

## Review by Michael Spielmann (obsolete) 2004-04-05
passed
