# navy bean production

Dataset: EcoSpold 2, unit process
Geography: RoW
Time period: 2020-01-01 to 2023-12-31
Technology level: current
Classification: ISIC rev.4 ecoinvent: 0111:Growing of cereals (except rice), leguminous crops and oil seeds
Scenario: Business-as-Usual
System model: Allocation, cut-off by classification
Generated by: Nathan Pelletier
Published in: Food Systems PRISM Lab 2020
Database: ecoinvent
isCopyrightProtected: true
accessRestrictedTo: 1

## General comment
This dataset represents the production of 1 tonne of dried navy bean (<15% moisture) during May-September, 2020. The amounts of flows are weighted averages over all existing local crop production datasets available for this specific product.

## Included activities start
Starting inputs for this activity include seed, fertilizer, crop protection products and fuel on the farm. This activity begins with soil preparation about 39 weeks after the harvest of the previous crop. The soil is prepared for cultivation in last week of May and the sowing of seeds started about 5 days after soil preparation.

## Included activities end
This activity ends with navy bean drying to <15% moisture at farm gate. This takes place in September, 17 weeks after the activity starts. The activity includes the infrastructures and use of agricultural machinery.

## Allocation
Physical (mass) allocation; N credits from biological N fixation are included as a system expansion, consistent with the ISO 14044 multifunctionality hierarchy. A negative input was included of ammonia N fertilizer to represent amount of N fixed.

## Geography
This dataset is a weighted average built from the following geographies: CA-ON, CA-MB.

## Technology
Production of navy bean includes farm practices from tillage, fertilizer application, pre-plant herbicide application, planting, rolling, post-emergent herbicide application, inter-row cultivating/scuffing/hilling, fungicide application, pre-harvest desiccation, pull/undercut/knife, windrow/swathing, harvesting, and other field activities, to aeration and drying.

## Time period
Soil cultivating date for the main crop: May 2020; Harvesting date for the main crop: September 2020. Total time from the date of sowing to the date of harvesting comes to 17 weeks. Yield data were collected and averaged for three crop cycles (2018-2020). All other data were collected for 2020 only.

## Parameters
- yield kgha: 2509.48 kg/ha; name yield_kg_ha

## Reference product
- navy bean: 1 kg; By-product classification allocatable product; CPC 01243: Broad beans and horse beans, green; HS2017 070890: Vegetables, leguminous; (other than peas and beans), shelled or unshelled, fresh or chilled
  production volume 4.12734e8 kg
    Approximation of the production volume based on the Canadian production volume scaled to GLO by the ratio of global and Canadian GDP for 2012.
  property price 1.28622 EUR2005
    Calculated value based on data from United Nations Commodity Trade Statistics Database (comtrade.un.org). UN comtrade category: 071333 Vegetables, leguminous; kidney beans, including white pea beans(phaseolus vulgaris), shelled, whether or not skinned or split, dried. A total of 93 countries are considered in the average The price was converted to EUR based on the annual exchange rates published by the European Central Bank (https://sdw.ecb.europa.eu/quickview.do?SERIES_KEY=120.EXR.A.USD.EUR.SP00.A, last accessed on 2022-02-15) and adjusted for inflation relative to 2005 using the producer price index (PPI) of the euro area, published by eurostat (https://appsso.eurostat.ec.europa.eu/nui/show.do?dataset=sts_inpp_a&lang=en, last accessed on 2022-05-04).
  properties: carbon allocation 0.3705 kg, carbon content 0.475, carbon content, fossil 0, carbon content, non-fossil 0.475, dry mass 0.78 kg, water content 0.282051, water in wet mass 0.22 kg, wet mass 1 kg

## Inputs from technosphere
- ammonium nitrate: 0.000436292, 0.000232569, 0.000789505 kg (3 suppliers, which the file names only by identifier); sum of these 0.00145837 kg; lognormal variance with pedigree 0.004, pedigree (2,3,2,5,1)
  properties: dry mass 1 kg, wet mass 1 kg
- ammonium sulfate: 0.00146825, 0.000450554 kg (2 suppliers, which the file names only by identifier); sum of these 0.0019188 kg; lognormal variance with pedigree 0.004, pedigree (2,3,2,5,1)
  properties: dry mass 1 kg, wet mass 1 kg
- application of plant protection product, by field sprayer: 0.000151457 ha; lognormal variance with pedigree 0.0034, pedigree (1,3,2,5,1)
- combine harvesting: 0.00192696 ha; lognormal variance with pedigree 0.0034, pedigree (1,3,2,5,1)
- fertilising, by broadcaster: 0.000197087 ha; lognormal variance with pedigree 0.0034, pedigree (1,3,2,5,1)
- glyphosate: 6.48824e-5 kg; lognormal variance with pedigree 0.0034, pedigree (1,3,2,5,1)
  properties: carbon content, fossil 0.214286, dry mass 1 kg, wet mass 1 kg
- monoammonium phosphate: 0.0163121, 0.0290026, 0.000332263 kg (3 suppliers, which the file names only by identifier); sum of these 0.045647 kg; lognormal variance with pedigree 0.004, pedigree (2,3,2,5,1)
  properties: dry mass 1 kg, nitrogen content 0.084, phosphorus content 0.226939, wet mass 1 kg
  note on nitrogen content: Nitrogen content (on a dry matter basis) of monoammonium phosphate is calculated from the molecular formula of the nutrient present in the substance.
  note on phosphorus content: Phosphorus content (on a dry matter basis) of monoammonium phosphate is calculated from the molecular formula of the nutrient present in the substance.
- navy bean seed, for sowing: 0.0243781 kg; lognormal variance with pedigree 0.004, pedigree (2,3,2,5,1)
  properties: carbon content, non-fossil 0.475, dry mass 0.78 kg, water content 0.282051, wet mass 1 kg
- pesticide, unspecified: 0.00106801 kg; lognormal variance with pedigree 0.004, pedigree (1,3,2,5,2)
  properties: carbon content, fossil 0.486978, dry mass 1 kg, wet mass 1 kg
- potassium chloride: 0.000264108, 0.00318461 kg (2 suppliers, which the file names only by identifier); sum of these 0.00344872 kg; lognormal variance with pedigree 0.004, pedigree (2,3,2,5,1)
  properties: dry mass 1 kg, wet mass 1 kg
- sowing: 0.000572785 ha; lognormal variance with pedigree 0.0034, pedigree (1,3,2,5,1)
- sulfur: 0.00118425 kg; lognormal variance with pedigree 0.004, pedigree (2,3,2,5,1)
  properties: dry mass 1 kg, wet mass 1 kg
- swath, by rotary windrower: 1.70392e-5 ha; lognormal variance with pedigree 0.0034, pedigree (1,3,2,5,1)
- tillage, cultivating, chiselling: 0.0033891 ha; lognormal variance with pedigree 0.0034, pedigree (1,3,2,5,1)
- tillage, harrowing, by offset disc harrow: 0.000214848 ha; lognormal variance with pedigree 0.0034, pedigree (1,3,2,5,1)
- tillage, harrowing, by rotary harrow: 0.000526398 ha; lognormal variance with pedigree 0.0034, pedigree (1,3,2,5,1)
- tillage, ploughing: 2.06713e-5 ha; lognormal variance with pedigree 0.0021, pedigree (2,2,2,1,2)
- tillage, rolling: 0.000174716 ha; lognormal variance with pedigree 0.0034, pedigree (2,1,2,5,1)
- urea: 0.00557017, 0.000873308, 0.00475653 kg (3 suppliers, which the file names only by identifier); sum of these 0.0112 kg; lognormal variance with pedigree 0.004, pedigree (2,3,2,5,1)
  properties: carbon content, fossil 0.2, dry mass 1 kg, wet mass 1 kg
- urea ammonium nitrate mix: 0.00494094, 0.00585728, 0.0223557 kg (3 suppliers, which the file names only by identifier); sum of these 0.0331539 kg; lognormal variance with pedigree 0.004, pedigree (2,3,2,5,1)
  properties: carbon content, fossil 0.0879977, dry mass 0.75 kg, hydrogen content 0.095042, nitrogen content 0.401231, oxygen content 0.749063, water content 0.333333, wet mass 1 kg
  note on carbon content, fossil: Carbon content, fossil is calculated based on the chemical formula of the substance.
  note on hydrogen content: Hydrogen content (on a dry matter basis) of urea ammonium nitrate mix is calculated from the molecular formula of the substance (CH6N4O4).
  note on nitrogen content: Nitrogen content (on a dry matter basis) of urea ammonium nitrate mix is calculated from the molecular formula of the substance (CH6N4O4).
  note on oxygen content: Oxygen content (on a dry matter basis) of urea ammonium nitrate mix is calculated from the molecular formula of the substance (CH6N4O4).

## Inputs from nature
- Occupation, annual crop, irrigated [natural resource, land]: 0.145922 m2*year; lognormal variance with pedigree 0.0048, pedigree (1,3,2,5,1)
- Occupation, annual crop, non-irrigated [natural resource, land]: 3.8804 m2*year; lognormal variance with pedigree 0.0048, pedigree (1,3,2,5,1)
- Transformation, from unspecified [natural resource, land]: 4.02633 m2; lognormal variance with pedigree 0.0108, pedigree (1,3,2,5,1)
- Transformation, to annual crop, irrigated [natural resource, land]: 0.145922 m2; lognormal variance with pedigree 0.0108, pedigree (1,3,2,5,1)
- Transformation, to annual crop, non-irrigated [natural resource, land]: 3.8804 m2; lognormal variance with pedigree 0.0108, pedigree (1,3,2,5,1)

## Emissions to nature
- Ammonia [air, non-urban air or from high stacks]: 0.00215478 kg; lognormal variance with pedigree 0.0128, pedigree (3,3,2,5,1)
- Azoxystrobin [air, non-urban air or from high stacks]: 1.12234e-6 kg; lognormal variance with pedigree 0.0428, pedigree (1,3,2,5,1)
- Bentazone [air, non-urban air or from high stacks]: 2.55832e-5 kg; lognormal variance with pedigree 0.0428, pedigree (1,3,2,5,1)
- Carbon dioxide, fossil [air, non-urban air or from high stacks]: 0.0265549 kg; lognormal variance with pedigree 0.0034, pedigree (1,3,2,5,1)
- Carbon dioxide, from soil or biomass stock [air, unspecified]: 0.116359 kg; = 2.92*100/yield_kg_ha; lognormal variance with pedigree 0.003925, pedigree (2,2,3,2,2)
  Global average LUC emissions according 2nd edition of the Quantis-modified tool developed by Blonk Consultants 'WFLDB-adapted-Blonk 2014 direct-land-use-change-assessment-tool_2015-05-18a.xlsx', tab. 'Country & land use unknown'. The emission are based on the relative change in production areas in all countries for a given crop. The weighted average is used which takes into acount relative difference in crop expansion into primary forest, secondary forest, grassland, perennial and annual land. The amount of 0.95 tonne of CO2 per ha*year (taken from the tool) is divided with the yield per ha. Extrapolated crop: beans, dry.
- Carfentrazone-ethyl [air, non-urban air or from high stacks]: 2.25886e-8 kg; lognormal variance with pedigree 0.0428, pedigree (1,3,2,5,1)
- Chlorantraniliprole [air, non-urban air or from high stacks]: 4.93406e-8 kg; lognormal variance with pedigree 0.0428, pedigree (1,3,2,5,1)
- Clethodim [air, non-urban air or from high stacks]: 4.17559e-7 kg; lognormal variance with pedigree 0.0428, pedigree (1,3,2,5,1)
- Dimethenamid-P [air, unspecified]: 1.48022e-6 kg; lognormal variance with pedigree 0.0428, pedigree (1,3,2,5,1)
- Dimethoate [air, non-urban air or from high stacks]: 3.8376e-7 kg; lognormal variance with pedigree 0.0428, pedigree (1,3,2,5,1)
- Dinitrogen monoxide [air, non-urban air or from high stacks]: 0.000650909 kg; lognormal variance with pedigree 0.0348, pedigree (3,3,2,5,1)
- Diquat dibromide [air, non-urban air or from high stacks]: 1.10354e-6 kg; lognormal variance with pedigree 0.0428, pedigree (1,3,2,5,1)
- EPTC [air, unspecified]: 1.01197e-5 kg; lognormal variance with pedigree 0.0428, pedigree (1,3,2,5,1)
- Ethalfluralin [air, non-urban air or from high stacks]: 1.18364e-5 kg; lognormal variance with pedigree 0.0428, pedigree (1,3,2,5,1)
- Fluazinam [air, unspecified]: 4.18022e-6 kg; lognormal variance with pedigree 0.0428, pedigree (1,3,2,5,1)
- Fluopyram [air, unspecified]: 1.01929e-6 kg; lognormal variance with pedigree 0.0428, pedigree (1,3,2,5,1)
- Fluxapyroxad [air, non-urban air or from high stacks]: 2.19291e-7 kg; lognormal variance with pedigree 0.0428, pedigree (1,3,2,5,1)
- Fomesafen [air, non-urban air or from high stacks]: 5.4188e-6 kg; lognormal variance with pedigree 0.0428, pedigree (1,3,2,5,1)
- Glyphosate [air, non-urban air or from high stacks]: 6.48986e-6 kg; lognormal variance with pedigree 0.0428, pedigree (1,3,2,5,1)
- Halosulfuron [air, unspecified]: 4.46398e-7 kg; lognormal variance with pedigree 0.0428, pedigree (1,3,2,5,1)
- Hydrocarbons, unspecified [air, non-urban air or from high stacks]: 1.64469e-9 kg; lognormal variance with pedigree 0.08976, pedigree (2,3,2,5,1)
- Imazamox [air, non-urban air or from high stacks]: 2.71063e-7 kg; lognormal variance with pedigree 0.0428, pedigree (1,3,2,5,1)
- Imazethapyr [air, non-urban air or from high stacks]: 4.28937e-7 kg; lognormal variance with pedigree 0.0428, pedigree (1,3,2,5,1)
- Lambda-cyhalothrin [air, non-urban air or from high stacks]: 1.64469e-8 kg; lognormal variance with pedigree 0.0428, pedigree (1,3,2,5,1)
- Metconazole [air, unspecified]: 1.64469e-9 kg; lognormal variance with pedigree 0.0428, pedigree (1,3,2,5,1)
- Nitrogen oxides [air, non-urban air or from high stacks]: 0.000423977 kg; lognormal variance with pedigree 0.0348, pedigree (3,3,2,5,1)
- Pendimethalin [air, non-urban air or from high stacks]: 6.4691e-6 kg; lognormal variance with pedigree 0.0428, pedigree (1,3,2,5,1)
- Prothioconazole [air, non-urban air or from high stacks]: 2.93809e-6 kg; lognormal variance with pedigree 0.0428, pedigree (1,3,2,5,1)
- Pyraclostrobin [air, non-urban air or from high stacks]: 5.48228e-9 kg; lognormal variance with pedigree 0.0428, pedigree (1,3,2,5,1)
- Pyraclostrobin [air, unspecified]: 5.48228e-9 kg; lognormal variance with pedigree 0.0428, pedigree (1,3,2,5,1)
- Quizalofop-p-ethyl [air, unspecified]: 3.8376e-7 kg; lognormal variance with pedigree 0.0428, pedigree (1,3,2,5,1)
- S-Metolachlor [air, unspecified]: 1.23351e-5 kg; lognormal variance with pedigree 0.0428, pedigree (1,3,2,5,1)
- Saflufenacil [air, non-urban air or from high stacks]: 1.12772e-6 kg; lognormal variance with pedigree 0.0428, pedigree (1,3,2,5,1)
- Sethoxydim [air, non-urban air or from high stacks]: 1.09646e-7 kg; lognormal variance with pedigree 0.0428, pedigree (1,3,2,5,1)
- Sulfentrazone [air, non-urban air or from high stacks]: 9.03543e-8 kg; lognormal variance with pedigree 0.0428, pedigree (1,3,2,5,1)
- Surfactant blend [air, unspecified]: 8.90903e-7 kg; lognormal variance with pedigree 0.0428, pedigree (1,3,2,5,1)
- Trifluralin [air, non-urban air or from high stacks]: 1.50021e-5 kg; lognormal variance with pedigree 0.0428, pedigree (1,3,2,5,1)
- Azoxystrobin [soil, agricultural]: 8.67874e-6 kg; lognormal variance with pedigree 0.0428, pedigree (1,3,2,5,1)
- Bentazone [soil, agricultural]: 0.000195838 kg; lognormal variance with pedigree 0.0428, pedigree (1,3,2,5,1)
- Boscalid [soil, agricultural]: 4.6e-5 kg; lognormal variance with pedigree 0.0428, pedigree (1,3,2,5,1)
- Cadmium II [soil, agricultural]: 2.44101e-6 kg; lognormal variance with pedigree 0.08976, pedigree (2,3,2,5,1)
- Carfentrazone-ethyl [soil, agricultural]: 1.71673e-7 kg; lognormal variance with pedigree 0.0428, pedigree (1,3,2,5,1)
- Chlorantraniliprole [soil, agricultural]: 3.67313e-7 kg; lognormal variance with pedigree 0.0428, pedigree (1,3,2,5,1)
- Chromium III [soil, agricultural]: 2.23244e-5 kg; lognormal variance with pedigree 0.08976, pedigree (2,3,2,5,1)
- Clethodim [soil, agricultural]: 3.23915e-6 kg; lognormal variance with pedigree 0.0428, pedigree (1,3,2,5,1)
- Copper ion [soil, agricultural]: -1.18857e-6 kg
- Dimethenamid-P [soil, agricultural]: 1.12387e-5 kg; lognormal variance with pedigree 0.0428, pedigree (1,3,2,5,1)
- Dimethoate [soil, agricultural]: 3.07008e-6 kg; lognormal variance with pedigree 0.0428, pedigree (1,3,2,5,1)
- Diquat dibromide [soil, agricultural]: 8.37657e-6 kg; lognormal variance with pedigree 0.0428, pedigree (1,3,2,5,1)
- EPTC [soil, agricultural]: 7.74788e-5 kg; lognormal variance with pedigree 0.0428, pedigree (1,3,2,5,1)
- Ethalfluralin [soil, agricultural]: 9.05802e-5 kg; lognormal variance with pedigree 0.0428, pedigree (1,3,2,5,1)
- Fluazinam [soil, agricultural]: 3.20676e-5 kg; lognormal variance with pedigree 0.0428, pedigree (1,3,2,5,1)
- Fluopyram [soil, agricultural]: 8.04469e-6 kg; lognormal variance with pedigree 0.0428, pedigree (1,3,2,5,1)
- Fluxapyroxad [soil, agricultural]: 1.69951e-6 kg; lognormal variance with pedigree 0.0428, pedigree (1,3,2,5,1)
- Fomesafen [soil, agricultural]: 4.14022e-5 kg; lognormal variance with pedigree 0.0428, pedigree (1,3,2,5,1)
- Glyphosate [soil, agricultural]: 4.96448e-5 kg; lognormal variance with pedigree 0.0428, pedigree (1,3,2,5,1)
- Halosulfuron-methyl [soil, agricultural]: 3.34798e-6 kg; lognormal variance with pedigree 0.0428, pedigree (1,3,2,5,1)
- Hydrocarbons, unspecified [soil, agricultural]: 1.58986e-8 kg; lognormal variance with pedigree 0.08976, pedigree (2,3,2,5,1)
- Imazamox [soil, agricultural]: 1.94262e-6 kg; lognormal variance with pedigree 0.0428, pedigree (1,3,2,5,1)
- Imazethapyr [soil, agricultural]: 3.17667e-6 kg; lognormal variance with pedigree 0.0428, pedigree (1,3,2,5,1)
- Lambda-cyhalothrin [soil, agricultural]: 1.31575e-7 kg; lognormal variance with pedigree 0.0428, pedigree (1,3,2,5,1)
- Lead II [soil, agricultural]: 3.42165e-7 kg; lognormal variance with pedigree 0.08976, pedigree (2,3,2,5,1)
- Mercury II [soil, agricultural]: -1.53437e-8 kg
- Metconazole [soil, agricultural]: 1.42539e-8 kg; lognormal variance with pedigree 0.0428, pedigree (1,3,2,5,1)
- Nickel II [soil, agricultural]: 3.26266e-6 kg; lognormal variance with pedigree 0.08976, pedigree (2,3,2,5,1)
- Nitrate [soil, unspecified]: 0.0426447 kg; lognormal variance with pedigree 0.0378, pedigree (3,3,2,5,1)
- Pendimethalin [soil, agricultural]: 4.93406e-5 kg; lognormal variance with pedigree 0.0428, pedigree (1,3,2,5,1)
- Picoxystrobin [soil, agricultural]: 4.11171e-6 kg; lognormal variance with pedigree 0.0428, pedigree (1,3,2,5,1)
- Prothioconazole [soil, agricultural]: 2.27372e-5 kg; lognormal variance with pedigree 0.0428, pedigree (1,3,2,5,1)
- Pydiflumetofen [soil, agricultural]: 7.22834e-7 kg; lognormal variance with pedigree 0.0428, pedigree (1,3,2,5,1)
- Pyraclostrobin [soil, agricultural]: 3.8376e-8 kg; lognormal variance with pedigree 0.0428, pedigree (1,3,2,5,1)
- Quizalofop-p-ethyl [soil, agricultural]: 2.96043e-6 kg; lognormal variance with pedigree 0.0428, pedigree (1,3,2,5,1)
- S-Metolachlor [soil, agricultural]: 9.42953e-5 kg; lognormal variance with pedigree 0.0428, pedigree (1,3,2,5,1)
- Saflufenacil [soil, agricultural]: 8.59341e-6 kg; lognormal variance with pedigree 0.0428, pedigree (1,3,2,5,1)
- Sethoxydim [soil, agricultural]: 6.57874e-7 kg; lognormal variance with pedigree 0.0428, pedigree (1,3,2,5,1)
- Sulfentrazone [soil, agricultural]: 6.3248e-7 kg; lognormal variance with pedigree 0.0428, pedigree (1,3,2,5,1)
- Surfactant blend [soil, agricultural]: 6.92832e-6 kg; lognormal variance with pedigree 0.0428, pedigree (1,3,2,5,1)
- Trifluralin [soil, agricultural]: 0.000114846 kg; lognormal variance with pedigree 0.0428, pedigree (1,3,2,5,1)
- Zinc II [soil, agricultural]: -9.87589e-6 kg
- Azoxystrobin [water, ground-]: 9.6752e-7 kg; lognormal variance with pedigree 0.0428, pedigree (1,3,2,5,1)
- Bentazone [water, ground-]: 2.1774e-5 kg; lognormal variance with pedigree 0.0428, pedigree (1,3,2,5,1)
- Cadmium II [water, ground-]: 1.73526e-8 kg; lognormal variance with pedigree 0.08976, pedigree (2,3,2,5,1)
- Cadmium II [water, surface water]: 7.22631e-10 kg; lognormal variance with pedigree 0.08976, pedigree (2,3,2,5,1)
- Carfentrazone-ethyl [water, ground-]: 1.80709e-8 kg; lognormal variance with pedigree 0.0428, pedigree (1,3,2,5,1)
- Chlorantraniliprole [water, ground-]: 3.8376e-8 kg; lognormal variance with pedigree 0.0428, pedigree (1,3,2,5,1)
- Chromium III [water, ground-]: 7.94358e-6 kg; lognormal variance with pedigree 0.08976, pedigree (2,3,2,5,1)
- Chromium III [water, surface water]: 7.62321e-8 kg; lognormal variance with pedigree 0.08976, pedigree (2,3,2,5,1)
- Clethodim [water, ground-]: 3.72382e-7 kg; lognormal variance with pedigree 0.0428, pedigree (1,3,2,5,1)
- Copper ion [water, ground-]: 1.20205e-6 kg; lognormal variance with pedigree 0.08976, pedigree (2,3,2,5,1)
- Copper ion [water, surface water]: 5.88008e-8 kg; lognormal variance with pedigree 0.08976, pedigree (2,3,2,5,1)
- Dimethenamid-P [water, surface water]: 1.26093e-6 kg; lognormal variance with pedigree 0.0428, pedigree (1,3,2,5,1)
- Dimethoate [water, ground-]: 3.28937e-7 kg; lognormal variance with pedigree 0.0428, pedigree (1,3,2,5,1)
- Diquat dibromide [water, ground-]: 9.22834e-7 kg; lognormal variance with pedigree 0.0428, pedigree (1,3,2,5,1)
- EPTC [water, surface water]: 8.62884e-6 kg; lognormal variance with pedigree 0.0428, pedigree (1,3,2,5,1)
- Ethalfluralin [water, ground-]: 1.00745e-5 kg; lognormal variance with pedigree 0.0428, pedigree (1,3,2,5,1)
- Fluazinam [water, surface water]: 3.56093e-6 kg; lognormal variance with pedigree 0.0428, pedigree (1,3,2,5,1)
- Fluopyram [water, surface water]: 8.64469e-7 kg; lognormal variance with pedigree 0.0428, pedigree (1,3,2,5,1)
- Fluxapyroxad [water, ground-]: 1.64469e-7 kg; lognormal variance with pedigree 0.0428, pedigree (1,3,2,5,1)
- Fomesafen [water, surface water]: 4.64469e-6 kg; lognormal variance with pedigree 0.0428, pedigree (1,3,2,5,1)
- Glyphosate [water, ground-]: 5.52539e-6 kg; lognormal variance with pedigree 0.0428, pedigree (1,3,2,5,1)
- Halosulfuron [water, surface water]: 4.28327e-7 kg; lognormal variance with pedigree 0.0428, pedigree (1,3,2,5,1)
- Hydrocarbons, unspecified [water, ground-]: 1.64469e-9 kg; lognormal variance with pedigree 0.08976, pedigree (2,3,2,5,1)
- Imazamox [water, ground-]: 2.71063e-7 kg; lognormal variance with pedigree 0.0428, pedigree (1,3,2,5,1)
- Imazethapyr [water, ground-]: 3.74114e-7 kg; lognormal variance with pedigree 0.0428, pedigree (1,3,2,5,1)
- Lambda-cyhalothrin [water, ground-]: 1.64469e-8 kg; lognormal variance with pedigree 0.0428, pedigree (1,3,2,5,1)
- Lead II [water, ground-]: 6.02657e-8 kg; lognormal variance with pedigree 0.08976, pedigree (2,3,2,5,1)
- Lead II [water, surface water]: 2.10272e-8 kg; lognormal variance with pedigree 0.08976, pedigree (2,3,2,5,1)
- Mercury II [water, ground-]: 3.00544e-10 kg; lognormal variance with pedigree 0.08976, pedigree (2,3,2,5,1)
- Mercury II [water, surface water]: 1.60643e-10 kg; lognormal variance with pedigree 0.08976, pedigree (2,3,2,5,1)
- Metconazole [water, surface water]: 1.64469e-9 kg; lognormal variance with pedigree 0.0428, pedigree (1,3,2,5,1)
- Nickel II [water, surface water]: 5.66895e-8 kg; lognormal variance with pedigree 0.08976, pedigree (2,3,2,5,1)
- Pendimethalin [water, ground-]: 5.48228e-6 kg; lognormal variance with pedigree 0.0428, pedigree (1,3,2,5,1)
- Phosphate [water, ground-]: 2.82203e-5 kg; lognormal variance with pedigree 0.0378, pedigree (3,3,2,5,1)
- Phosphate [water, surface water]: 7.65741e-5 kg; lognormal variance with pedigree 0.0378, pedigree (3,3,2,5,1)
- Prothioconazole [water, ground-]: 2.50915e-6 kg; lognormal variance with pedigree 0.0428, pedigree (1,3,2,5,1)
- Pydiflumetofen [water, surface water]: 9.03543e-8 kg; lognormal variance with pedigree 0.0428, pedigree (1,3,2,5,1)
- Pyraclostrobin [water, ground-]: 5.48228e-9 kg; lognormal variance with pedigree 0.0428, pedigree (1,3,2,5,1)
- Quizalofop-p-ethyl [water, surface water]: 3.28937e-7 kg; lognormal variance with pedigree 0.0428, pedigree (1,3,2,5,1)
- S-Metolachlor [water, surface water]: 1.04712e-5 kg; lognormal variance with pedigree 0.0428, pedigree (1,3,2,5,1)
- Saflufenacil [water, ground-]: 9.68376e-7 kg; lognormal variance with pedigree 0.0428, pedigree (1,3,2,5,1)
- Sethoxydim [water, ground-]: 5.48228e-8 kg; lognormal variance with pedigree 0.0428, pedigree (1,3,2,5,1)
- Sulfentrazone [water, ground-]: 9.03543e-8 kg; lognormal variance with pedigree 0.0428, pedigree (1,3,2,5,1)
- Surfactant blend [water, surface water]: 7.90903e-7 kg; lognormal variance with pedigree 0.0428, pedigree (1,3,2,5,1)
- Trifluralin [water, ground-]: 1.2799e-5 kg; lognormal variance with pedigree 0.0428, pedigree (1,3,2,5,1)
- Zinc II [water, ground-]: 6.50346e-6 kg; lognormal variance with pedigree 0.08976, pedigree (2,3,2,5,1)
- Zinc II [water, surface water]: 9.72565e-8 kg; lognormal variance with pedigree 0.08976, pedigree (2,3,2,5,1)

## Sampling procedure
Site-specific field data were collected via survey from prairie province navy bean producers for crop rotation, seeding rate, machinery and fuel use for field operations (e.g., tillage, harrowing, harvest), farm inputs (e.g., fertilizers, pesticides), and electricity for crop drying. Production weighted averages were calculated for the region. Outliers were removed from reported fuel use data based on visual inspection.

## Extrapolations
This dataset was built as a weighted average of regional datasets of the same activityName. Weights are based on production volumes. CA-ON: production volume = 6.04e+06 kg/year, weight = 0.5482 CA-MB: production volume = 4.98e+06 kg/year, weight = 0.4518 The uncertainty information has been adjusted accordingly.
