# 2-methyl-2-butanol production

Dataset: EcoSpold 2, unit process
Geography: RoW
Time period: 1989-01-01 to 2023-12-31
Technology level: current
Classification: ISIC rev.4 ecoinvent: 2011:Manufacture of basic chemicals
Synonyms: tert-amyl alcohol; tert-pentanol
Scenario: Business-as-Usual
System model: Allocation, cut-off by classification
Generated by: Iasonas Ioannou
Published in: Sutter, J. 2007
Database: ecoinvent
isCopyrightProtected: true
accessRestrictedTo: 1

## General comment
This data represents the production of 1 kg of pure 2-methyl-2-butanol via the hydration of 2-methyl-2-butene.
2-methyl-2-butanol (CAS-No. 75-85-4, C5H11OH, Synonym: tert-amyl alcohol, tert-pentanol) is a colourless
liquid of characteristic odor. It is only sparingly miscible with water at 20 °C. However, it is
almost completely miscible with most organic solvents.
2-methyl-2-butanol is employed as solvent for coating materials based on epoxy resins and polyurethanes,
in the production of aryl pyruvic acids, and in the oxidation of olefins to the corresponding
carbonyl compounds. It is also used as a stabilizing agent for 1,1,1-trichloroethane, chlorinated C3 –
C4-hydrocarbons, and N,N,- dialkylallyl amines. The reaction of 2,2,6,6-tetramethyl-4-cyano-4-
hydroxypiperidine with 2-methyl-2-butanol yields highly active light stabilizers for polymers.
In this dataset, the raw material inputs, and process-specific material exchanges, are modelled with a generic stoichiometry-based tool, using literature or estimated yields. The emissions are modelled with a default value, which is estimated based on losses, unreacted chemicals, among others. At the same time, the energy consumption is based on data from literature sources. Finally, the auxiliary (i.e., cooling water and infrastructure) exchanges are modelled with a default value based on industry data from literature sources. For more information on the calculations refer to the sampling procedure.
References:
Frischknecht R., Jungbluth N., Althaus H.-J., Doka G., Dones R., Heck T.,
Hellweg S., Hischier R., Nemecek T., Rebitzer G. and Spielmann M. (2007)
Overview and Methodology. Final report ecoinvent v2.0 No. 1. Swiss Centre for
Life Cycle Inventories, Dübendorf, CH, retrieved from: www.ecoinvent.org.
Lappe, P., Hoffmann, T.: Pentanols. In: Ullmann's Encyclopedia of Industrial
Chemistry, Seventh Edition, 2004 Electronic Release (ed. Fiedler E., Grossmann
G., Kersebohm D., Weiss G. and Witte C.). 7 th Electronic Release Edition.
Wiley InterScience, New York, Online-Version under:
http://www.mrw.interscience.wiley.com/ueic/articles

## Included activities start
The activity starts when the raw materials enter the process.

## Included activities end
The activity ends with 2-methyl-2-butanol being ready for further transformation or transportation at the production site gate. Materials entering the process are included as well as energy uses, infrastructure and emissions.

## Geography
The inventory is modelled at the Global level. The main material inputs and outputs of this activity are generated with on a generic stoichiometry-based model, using literature or estimated yields. Furthermore, the source of information for the heat and electricity inputs is literature data for the specific technology. Finally, the main source of information for the values for water (process and cooling), nitrogen, chemical factory is industry data from the GENDORF Chemical Park, which is based in Germany and produced an average of 2462760 tonnes of chemical substances in the years 2015-2019. For more information on the calculations refer to the sampling procedure.
The dataset could also be considered as not geography-specific, and thus, valid for a broader geographical coverage.
References:
Hischier, R. (2005) Establishing Life Cycle Inventories of Chemicals Based on Differing Data Availability (9 pp). The International Journal of Life Cycle Assessment, Volume 10, Issue 1, pp 59-67. 10.1065/lca2004.10.181.7
Chemiepark GENDORF, Umwelterklärung 2016, https://www.gendorf.de/Nachbarn/Umweltschutz/Industrie%20und%20Nachhaltigkeit
Chemiepark GENDORF, Umwelterklärung 2017, https://www.gendorf.de/Nachbarn/Umweltschutz/Industrie%20und%20Nachhaltigkeit
Chemiepark GENDORF, Umwelterklärung 2020, https://www.gendorf.de/Nachbarn/Umweltschutz/Industrie%20und%20Nachhaltigkeit
Kim, Seungdo, and Michael Overcash "Energy in chemical manufacturing processes: gate‐to‐gate information for life cycle assessment." Journal of Chemical Technology & Biotechnology: International Research in Process, Environmental & Clean Technology 78.9 (2003): 995-1005.

## Technology
This dataset covers the production of 2-methyl-2-butanol by the hydration of 2-methyl-2-butene (isopentene).
Only a few industrial processes are known for the production of pentanols, namely, hydroformylation of butenes, hydrolysis of chloropentanes, and hydration of pentenes. Production of C5-alcohols from fusel oils by fermentation has been replaced mainly by the oxo synthesis and currently has little industrial importance. Production of pentanols from pentane by the Sharples process (chlorination of pentanes and subsequent hydrolysis) has also been largely replaced by oxo synthesis.
Hydration of pentenes
2-methyl-2-butanol is produced mainly by hydration of 2-methyl-2-butene (isopentene). There are
several processes which use different catalysts, e. g. acid ion exchangers, zeolites, layer silicates, formic
acid, HCl, SbCl3, ZnCl2, or acetic acid.
Reaction:
C5H10 + H2O --> C5H12O
As there was no data available for the production of 2-methyl-2-butanol, the values for the consumption of the raw materials are calculated with an assumed yield of 95 % (Frischknecht et al. 2007). At the same time, the values for the energy use have been estimated with data from Chauvel 1989, who gives data for the production of isopropanol from the hydration of isopropylene. Hence, this process is considered to be similar to the hydration of 2-methyl-2-butene.
Reference:
Lappe, P., Hoffmann, T.: Pentanols. In: Ullmann's Encyclopedia of Industrial Chemistry, Seventh Edition, 2004 Electronic Release (ed. Fiedler E., Grossman G., Kersebohm D., Weiss G. and Witte C.). 7th Electronic Release Edition. Wiley InterScience, New York, Online-Version under: http://www.mrw.interscience.wiley.com/ueic/articles
Chauvel, A., Lefebvre, G.: Petrochemical processes. Vol 2: Major oxygenated,
chlorinated, and nitrated derivatives. Institut français du pétrole publications.
Éditions Technip, Paris 1989
Frischknecht R., Jungbluth N., Althaus H.-J., Doka G., Dones R., Heck T.,
Hellweg S., Hischier R., Nemecek T., Rebitzer G. and Spielmann M. (2007)
Overview and Methodology. Final report ecoinvent v2.0 No. 1. Swiss Centre for
Life Cycle Inventories, Dübendorf, CH, retrieved from: www.ecoinvent.org.

## Time period
The time period spans from the earliest year from which at least one of the input values was obtained until 2022, but overall form the most realistic picture of the production. Besides, the activity is partly generated, in terms of material inputs and outputs, based on a generic stoichiometry-based model, using literature or estimated yields, which does not expect to change over time.
The source of information for the heat and electricity inputs is literature data (from 1989) for the specific technology. Finally, the main source of information for the values for water (process and cooling), nitrogen, chemical factory is industry data from the GENDORF Chemical Park. The values are a 5-year average of data from 2015 to 2019 published by the GENDORF Chemical Park, which is based in Germany and produced an average of 2462760 tonnes of chemical substances in the years 2015-2019. The end time period is therefore set based on the years from Gendorf reference.
For more information on the calculations refer to the sampling procedure and in the comments of the exchanges.
References:
Hischier, R. (2005) Establishing Life Cycle Inventories of Chemicals Based on Differing Data Availability (9 pp). The International Journal of Life Cycle Assessment, Volume 10, Issue 1, pp 59-67. 10.1065/lca2004.10.181.7
Chemiepark GENDORF, Umwelterklärung 2016, https://www.gendorf.de/Nachbarn/Umweltschutz/Industrie%20und%20Nachhaltigkeit
Chemiepark GENDORF, Umwelterklärung 2017, https://www.gendorf.de/Nachbarn/Umweltschutz/Industrie%20und%20Nachhaltigkeit
Chemiepark GENDORF, Umwelterklärung 2020, https://www.gendorf.de/Nachbarn/Umweltschutz/Industrie%20und%20Nachhaltigkeit
Chauvel, Alain, Gilles Lefebvre, and L. Castex in "Petrochemical processes. Technical and economical characteristics Vol. 2." (1989)

## Reference product
- 2-methyl-2-butanol: 1 kg; name RP; By-product classification allocatable product; CPC 34139: Other alcohols, phenols, phenol-alcohols, and their halogenated, sulphonated, nitrated or nitrosated derivativ[…]; HS2017 290519: Alcohols; saturated monohydric, n.e.c. in item no. 2905.1; CAS 75-85-4
  production volume 7.12706e7 kg; name RP_PV; = 22 * 1e6 *(1.9394E+13 / 4.57452E+12)
    Estimated value. There was no data available for the production volume of 2-methyl-2-butanol. This is a placeholder value thats reflect the real-world production of a different amyl alcohol (1-pentanol, 2-methylbutanol) for Western Europe in 1988. The Western Europe production volume was scaled to reflect the world production considering the nominal GDP of Europe in 1988, equal to 4'574'521'460'013 US$ and in the World, equal to 19'394'022'898'347 US$. This has no negative effect on the results of the ecoinvent database.
    References:
    Papa, A.J. (2000). Amyl Alcohols. In Kirk-Othmer Encyclopedia of Chemical Technology, (Ed.). https://doi.org/10.1002/0471238961.0113251216011601.a01
    <https://api.worldbank.org/v2/en/indicator/NY.GDP.MKTP.CD?downloadformat=excel>
  property heating value, net 37.14 MJ
    LHV is calculated based on the elemental composition of the substance. Based on the CAS number of the substance (000075-85-4), the chemical formula of the substance is found to be: C5H12O, (PubChem 2020). Reference: Kim, S., Chen, J., Cheng, T., Gindulyte, A., He, J., He, S., Li, Q., Shoemaker, B. A., Thiessen, P. A., Yu, B., Zaslavsky, L., Zhang, J., & Bolton, E. E. (2019). PubChem 2019 update: improved access to chemical data. Nucleic acids research, 47(D1), D1102–D1109. https://doi.org/10.1093/nar/gky1033
  property price 1.40603 EUR2005
    Calculated based on inputs: The price of the product has been calculated as a sum of the values of the material and energy inputs for this product. This value is therefore a rough estimation. It may underestimate the real price since there are additional expenses when producing any product. These expences can include for example labour costs, treatment of waste materials and profit for the producer. Please consider carefully whether this level of data quality is acceptable for your application.
  properties: carbon allocation 0.681818 kg, carbon content 0.681818, carbon content, fossil 0.681818, carbon content, non-fossil 0, dry mass 1 kg, water content 0, water in wet mass 0 kg, wet mass 1 kg

## Inputs from technosphere
- chemical factory, organics: 4e-10 unit; lognormal variance with pedigree 0.448, pedigree (4,5,5,5,5)
  Calculated based on literature data published by the industry. For this activity, no information was readily available concerning infrastructure and land-use. Therefore, the infrastructure is estimated based on data from two chemical factories, the BASF site of Ludwigshafen and the chemical factory in Gendorf (which are both located in Germany), which produce a wide range of chemical substances. Based on this data, the following assumptions are made: the built area amounts to about 4.2 ha, the plant has an average output of 50'000 t/a and a lifespan of fifty years. The estimated infrastructure amount is therefore 4.00 E-10 units per kg of produced chemical. References: Althaus H.-J., Chudacoff M., Hischier R., Jungbluth N., Osses M. and Primas A. (2007) Life Cycle Inventories of Chemicals. ecoinvent report No. 8, v2.0. EMPA Dübendorf, Swiss Centre for Life Cycle Inventories, Dübendorf, CH. Gendorf (2000) Umwelterklärung 2000, Werk Gendorf. Werk Gendorf, Burgkirchen.
  Uncertainty: Estimation
- electricity, medium voltage: 0.00299095, 0.0596628, 0.0200465, 0.000915932, 0.000183323, 3.93635e-5, 0.00616111 kWh (7 suppliers, which the file names only by identifier); sum of these 0.09 kWh; lognormal variance with pedigree 0.086, pedigree (4,5,5,5,3)
  This value is estimated based on the heating requirements of a similar process. Specifically, this value represents the direct hydration of isopropanol, which was reported by Chauvel, Alain, Gilles Lefebvre, and L. Castex in "Petrochemical processes. Technical and economical characteristics Vol. 2." (1989). The value of electricity input for the latter process is 0.09 kWh per kg. All in all, we assume that the electricity requirements for the hydration of isopropylene, based on a Deutsche Texaco process, and 2-methyl-2-butene are similar.
  Uncertainty: Estimation
- heat, from steam, in chemical industry: 12.65 MJ; lognormal variance with pedigree 0.2106, pedigree (5,5,5,5,5)
  This value is estimated based on the heating requirements of a similar process. Specifically, this value represents the direct hydration of isopropanol, which was reported by Chauvel, Alain, Gilles Lefebvre, and L. Castex in "Petrochemical processes. Technical and economical characteristics Vol. 2." (1989). The value of steam input for the latter process is 12.65 MJ per kg. All in all, we assume that the heating requirements for the hydration of isopropylene, based on a Deutsche Texaco process, and 2-methyl-2-butene are similar.
  properties: heating value, net 1 MJ
- pentane: 0.842233 kg; lognormal variance with pedigree 0.0382, pedigree (4,5,2,5,1)
  Proxy value. As there was no activity to cover the supply of pentene, this input was proxied with pentane.
  Calculated value based on stoichiometric calculations and literature data. For more information on the calculations refer to the sampling procedure.
  Uncertainty: Stoechiometric calculation
  properties: carbon content, fossil 0.833333, dry mass 1 kg, heating value, net 45.37 MJ, wet mass 1 kg
- wastewater, average: -2.27191e-6, -8.08887e-9 m3 (2 suppliers, which the file names only by identifier); sum of these -2.28e-6 m3; lognormal variance with pedigree 0.0452, pedigree (2,4,1,5,4)
  Calculated based on literature data published by the GENDORF Chemical Park. The factory produced an average of 2462760 tonnes of chemical substances (including intermediates) per year in the years 2015-2019. The average ouput of wastewater going to an external wastewater treatment plant in the years 2015-2019 was 5608 m3 per year. This equals 0.000002277 m3/kg chemical produced. References: Chemiepark GENDORF, Umwelterklärung 2016, https://www.gendorf.de/Nachbarn/Umweltschutz/Industrie%20und%20Nachhaltigkeit Chemiepark GENDORF, Umwelterklärung 2017, https://www.gendorf.de/Nachbarn/Umweltschutz/Industrie%20und%20Nachhaltigkeit Chemiepark GENDORF, Umwelterklärung 2020, https://www.gendorf.de/Nachbarn/Umweltschutz/Industrie%20und%20Nachhaltigkeit
  production volume; = RP_PV * (WW / RP)
    Calculated from production volume of reference product using the relative outputs.
  properties: carbon content, non-fossil 0.194039, dry mass 0.346837 kg, mass concentration, TOC 0.1091 kg/m3, mass concentration, calcium 0.039453 kg/m3, mass concentration, chlorine 0.030031 kg/m3, mass concentration, hydrogen 0.013365 kg/m3, mass concentration, nitrogen 0.031015 kg/m3, mass concentration, oxygen 0.069824 kg/m3, mass concentration, sodium 0.06456 kg/m3, mass concentration, sulfur 0.015602 kg/m3, water content 2882.2, wet mass 1000 kg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
  note on carbon content, non-fossil: 0.0673 kg TOC/m3 (Tab A.17, ecoinvent v2.2 report 13_I). TOC was considered as Total Carbon.
- water, deionised: 0.21729 kg; source Chauvel, A. 1989; lognormal variance with pedigree 0.198, pedigree (4,5,5,5,5)
  Calculated value based on stoichiometric calculations and literature data. For more information on the calculations refer to the sampling procedure.
  Uncertainty: Estimation
  properties: wet mass 1 kg

## Inputs from nature
- Water, cooling, unspecified natural origin [natural resource, in water]: 0.169467 m3; name CW_u; = 0.891930591 * ( 190 / 1000 ); source Chauvel, A. 1989; lognormal variance with pedigree 0.0454, pedigree (2,4,2,5,4)
  This value is estimated based on the cooling requirements of a similar process. Specifically, this value represents the direct hydration of isopropanol, which was reported by Chauvel, Alain, Gilles Lefebvre, and L. Castex in "Petrochemical processes. Technical and economical characteristics Vol. 2." (1989). The value of cooling water input for the latter process is 0.19 m3 per kg. All in all, we assume that the cooling requirements for the hydration of isopropylene, based on a Deutsche Texaco process, and 2-methyl-2-butene are similar.
  At the same time, the latter amount was split between the following sources (1) "Water, cooling, unspecified natural origin", (2) "Water, river", and (3) "Water, well. in ground"
  Uncertainty: Estimation
- Water, river [natural resource, in water]: 0.0111245 m3; name CW_r; = 0.058550155 * ( 190 / 1000 ); lognormal variance with pedigree 0.0454, pedigree (2,4,2,5,4)
  This value is estimated based on the cooling requirements of a similar process. Specifically, this value represents the direct hydration of isopropanol, which was reported by Chauvel, Alain, Gilles Lefebvre, and L. Castex in "Petrochemical processes. Technical and economical characteristics Vol. 2." (1989). The value of cooling water input for the latter process is 0.19 m3 per kg. All in all, we assume that the cooling requirements for the hydration of isopropylene, based on a Deutsche Texaco process, and 2-methyl-2-butene are similar.
  At the same time, the latter amount was split between the following sources (1) "Water, cooling, unspecified natural origin", (2) "Water, river", and (3) "Water, well. in ground"
- Water, well, in ground [natural resource, in water]: 0.00940866 m3; name CW_g; = 0.049519254 * ( 190 / 1000 ); lognormal variance with pedigree 0.0454, pedigree (2,4,2,5,4)
  (same comment as for Water, river)

## Emissions to nature
- 2-Methyl-2-butene [air, urban air close to ground]: 0.000541435 kg; lognormal variance with pedigree 0.0054, pedigree (3,3,2,5,1)
  Calculated losses, based on the boiling point of a chemical, to water or to air. In addition, unreacted chemicals are assumed to go to wastewater treatment, which has a conversion rate in biological treatment of 95% of carbon into carbon dioxide. The remaining 5% are released as emissions to water.
- Carbon dioxide, fossil [air, urban air close to ground]: 0.137297 kg; lognormal variance with pedigree 0.006, pedigree (3,3,2,5,2)
  (same comment as for 2-Methyl-2-butene)
- Water [air, unspecified]: 0.016917 m3; = 0.089036947 * (CW_u + CW_r + CW_g ); lognormal variance with pedigree 0.0848, pedigree (2,4,2,5,4)
  Calculated value. This output flow is estimated based on the inputs. For more details, see Mathematical Relation.
  property fraction, origin: fresh water 0.00277665; name fraction_origin_fresh_water
  property fraction, origin: salt water 0; name fraction_origin_salt_water
  property fraction, origin: unspecified 0.997223; name fraction_origin_unspecified
- 2-Methyl-2-butanol [water, unspecified]: 0.00025 kg; lognormal variance with pedigree 0.006, pedigree (3,3,2,5,2)
  (same comment as for 2-Methyl-2-butene)
- 2-Methyl-2-butene [water, unspecified]: 0.00210423 kg; lognormal variance with pedigree 0.006, pedigree (3,3,2,5,2)
  (same comment as for 2-Methyl-2-butene)
- BOD5, Biological Oxygen Demand [water, surface water]: 0.00788133 kg; lognormal variance with pedigree 0.188, pedigree (4,5,5,5,5)
  Calculated value. The BOD, COD, TOC and BOD5 are calculated based on the amount and type of emissions released to water in the same activity.
  Uncertainty: Calculated from the water emissions
- COD, Chemical Oxygen Demand [water, surface water]: 0.00788133 kg; lognormal variance with pedigree 0.188, pedigree (4,5,5,5,5)
  (same comment as for BOD5, Biological Oxygen Demand)
- DOC, Dissolved Organic Carbon [water, surface water]: 0.00197033 kg; lognormal variance with pedigree 0.188, pedigree (4,5,5,5,5)
  (same comment as for BOD5, Biological Oxygen Demand)
- TOC, Total Organic Carbon [water, surface water]: 0.00197033 kg; lognormal variance with pedigree 0.188, pedigree (4,5,5,5,5)
  (same comment as for BOD5, Biological Oxygen Demand)
- Water [water, unspecified]: 0.173083 m3; = 0.910963053 * (CW_u + CW_r + CW_g ); lognormal variance with pedigree 0.0848, pedigree (2,4,2,5,4)
  (same comment as for Water)
  property carbon content, fossil 0; name C_content_fossil
  property carbon content, non-fossil 0; name C_content_non_fossil
  property dry mass 0 kg; name DM
  property fraction, origin: fresh water 0.00678501; name fraction_origin_fresh_water_Ww
  property fraction, origin: salt water 0; name fraction_origin_salt_water_Ww
  property fraction, origin: unspecified 0.993215; name fraction_origin_unspecified_Ww
  property water in wet mass 1000 kg; name WWM
  property wet mass 1000 kg; name WM

## Sampling procedure
Literature data and stoichiometric calculation. This inventory is partially based on a generic model of the production of chemicals. The data generated by this model have been improved with compound-specific data when available. The model of the production of chemicals is using specific industry or literature data wherever possible and more generic data on chemical production processes to fill compound-specific data gaps when necessary. The basic principles of the model have been published in literature (Hischier, 2005). The model has been updated and extended with newly available data from the chemical industry. In the model, unreacted fractions are treated in a waste treatment process, and emissions reported are after a waste treatment process that is included in the scope of this dataset. For volatile reactants, a small level of evaporation is assumed. Solvents and catalysts are mostly recycled in closed-loop systems within the scope of the dataset and reported flows are for losses from this system.
The source of information for the heat and electricity inputs is literature data (from 1989) for the specific technology. Finally, the main source of information for the values for water (process and cooling), nitrogen, and chemical factory is industry data from the GENDORF Chemical Park. The values are a 5-year average of data from 2015 to 2019 published by the GENDORF Chemical Park, which is based in Germany and produced an average of 2462760 tonnes of chemical substances in the years 2015-2019. For more information refer to the comments of the exchanges.

References:
Hischier, R. (2005) Establishing Life Cycle Inventories of Chemicals Based on Differing Data Availability (9 pp). The International Journal of Life Cycle Assessment, Volume 10, Issue 1, pp 59-67. 10.1065/lca2004.10.181.7
Chemiepark GENDORF, Umwelterklärung 2016, https://www.gendorf.de/Nachbarn/Umweltschutz/Industrie%20und%20Nachhaltigkeit
Chemiepark GENDORF, Umwelterklärung 2017, https://www.gendorf.de/Nachbarn/Umweltschutz/Industrie%20und%20Nachhaltigkeit
Chemiepark GENDORF, Umwelterklärung 2020, https://www.gendorf.de/Nachbarn/Umweltschutz/Industrie%20und%20Nachhaltigkeit
Chauvel, Alain, Gilles Lefebvre, and L. Castex in "Petrochemical processes. Technical and economical characteristics Vol. 2." (1989)

## Extrapolations
This dataset has been copied from an original dataset covering the geography RER. The uncertainty has been adjusted accordingly.
