# propylene production, from propane dehydrogenation

Dataset: EcoSpold 2, unit process
Geography: RoW
Time period: 2022-01-01 to 2023-12-31
Technology level: current
Classification: ISIC rev.4 ecoinvent: 2011:Manufacture of basic chemicals
Synonyms: propene; PDH
Scenario: Business-as-Usual
System model: Allocation, cut-off by classification
Generated by: Daria Dellenbach
Published in: Lin Lv 2021
Database: ecoinvent
isCopyrightProtected: true
accessRestrictedTo: 1

## General comment
This process represents the production of 1 kg of propylene from propane dehydrogenation.
The dehydrogenation of light alkanes (i.e., propane and butane) attracted significant attention for the selective large-scale production of light olefins. During the dehydrogenation reaction, two carbon-hydrogen bonds break leading to the production of hydrogen, as valuable byproduct, and the formation of a carbon-carbon double bond. The economic viability of the selectrive production of olefins via dehydrogenation is influenced by the market price of the feedstock, i.e., alkanes, and the the valuable products, i.e., olefins. Notably, the propane dehydrogenation technology allows the on-purpose production of propylene (as the main reference product) and thus, shifting from its conventional production as a byproduct in steam crackers.
There are several proceseses, for dehydrogenation, explored commercially. This dataset describes the Oleflex process. The processes mainly distinguish in their catalyst use and regeneration. Propane dehydrogenation processes are highly selective, overall yields of propylene production of up to 90 % are claimed.
Globally, propylene is produced by different technologies, mainly by refineries, steam cracking, propane dehydrogenation and coal to olefin.
This dataset is extrapolated from the Chinese dataset.
References:
Eisele P.,Killpack R. (2011): Propene, Ullmann's Encyclopedia of Industrial Chemisty, Wiley-VCH.
Lv, L.; Song, G.; Zhao, X.; Chen, J. (2021): Environmental Burdens of China’s Propylene manufacturing: Comparative life-cycle assessment and scenario analysis, Science of the Total Environment, 799, 149451.
Nawaz, Z. (2015). Light alkane dehydrogenation to light olefin technologies: a comprehensive review. Reviews in chemical engineering, 31(5), 413-436.

## Included activities start
From the reception of propane at the factory gate.

## Included activities end
The activity ends with propylene being ready for further processing or transportation at the production site gate. Infrastructure is included.

## Geography
Inventory extrapolated to the Global geography based on a Chinese production plant.

## Technology
There are several proceseses explored commercially, this dataset describes the Oleflex process. The processes are distinguished mainly based on their catalyst use and regeneration. Propane dehydrogenation processes are highly selective, overall yields of propylene from propane up to 90 % are claimed.
The propane feed is admitted to a moving-bed catalytic reactor. In a continuous process, the dehydrogenation catalyst circulates through the reaction vessel before passing to a separate regeneration vessel where coke is removed from the surface of the catalyst by combustion in air. The regenerated catalyst is returned to the first reactor.
Propene is recovered by conventional deethanizer – depropanizer splitting.
An overall selectivity for propene of 89 – 91% is claimed.
The chemical reaction of the reaction is:
C3H8 --> C3H6 + H2
The reaction is catalysed by a platinum-based catalyst, due to lack of data the catalyst was neglected.
References:
Eisele P.,Killpack R. (2011): Propene, Ullmann's Encyclopedia of Industrial Chemisty, Wiley-VCH.
Lv, L.; Song, G.; Zhao, X.; Chen, J. (2021): Environmental Burdens of China’s Propylene manufacturing: Comparative life-cycle assessment and scenario analysis, Science of the Total Environment, 799, 149451.

## Time period
Based on a scientific publication. The technology is not expected to change over time.

## Parameters
- fraction, cooling water, once-through system, to air: 0.004 dimensionless; name fraction_CW_OT_to_air; lognormal variance with pedigree 0.0413, pedigree (2,3,1,3,1)
  Calculated based on literature value (Scown, C.D., 2011, Water Footprint of U.S. Transportation Fuels and supplying information of the article) (Vionnet, S., Quantis Water Database - Technical Report, 2012).
- fraction, cooling water, recirculating system, to air: 0.771 dimensionless; name fraction_CW_R_to_air; lognormal variance with pedigree 0.0413, pedigree (2,3,1,3,1)
  (same comment as for fraction, cooling water, once-through system, to air)
- fraction, cooling water, to air: 0.3875 dimensionless; name fraction_CW_to_air; = 0.5* fraction_CW_R_to_air+0.5* fraction_CW_OT_to_air; lognormal variance with pedigree 0.092025, pedigree (4,4,3,2,4)
  Calculated value based on literature value (see comments of the other parametres present in this dataset) and expert opinion. In the case when no industry/literature data are available about the type of cooling or directly fraction, cooling water, to air specific for the process a default assumption is applied. It is assumed that the once-through cooling system is used in 50% of all cases and recirculating system is used in another 50% of all cases.

## Reference product
- ethylene: 1 kg; name BP_ethylene; By-product classification allocatable product; CPC 33421: Ethylene, propylene, butylene, butadiene; HS2017 271114: Petroleum gases and other gaseous hydrocarbons; liquefied, ethylene, propylene, butylene and butadiene; CAS 74-85-1
  Valuable byproduct from the dehydrogenation of propane (i.e., C3H8 --> C3H6 + H2)
  Reference:
  Lv, L.; Song, G.; Zhao, X.; Chen, J. (2021): Environmental Burdens of China’s Propylene manufacturing: Comparative life-cycle assessment and scenario analysis, Science of the Total Environment, 799, 149451.
  production volume 4.27e8 kg; name PV_ethylene; = PV_RP*BP_ethylene / RP
    Calculated from production volume of reference product using the relative outputs.
  property heating value, net 43.22 MJ
    LHV is calculated based on the elemental composition of the substance. Based on the CAS number of the substance (000074-85-1), the chemical formula of the substance is found to be: C2H4, (PubChem 2020).
    Reference: Kim, S., Chen, J., Cheng, T., Gindulyte, A., He, J., He, S., Li, Q., Shoemaker, B. A., Thiessen, P. A., Yu, B., Zaslavsky, L., Zhang, J., & Bolton, E. E. (2019). PubChem 2019 update: improved access to chemical data. Nucleic acids research, 47(D1), D1102–D1109. https://doi.org/10.1093/nar/gky1033
  property price 0.822133 EUR2005
    Calculated value based on data from United Nations Commodity Trade Statistics Database (comtrade.un.org). UN comtrade category: 290121. Ethylene. Average price from the year 2015-2019. Average of price of import into 5 main markets (EU, TH, ID, KR and CN).
    The prices were converted to EUR based on the annual exchange rates published by the European Central Bank (https://sdw.ecb.europa.eu/quickview.do?SERIES_KEY=120.EXR.A.USD.EUR.SP00.A, last accessed on 2022-02-15) and adjusted for inflation relative to 2005 using the producer price index (PPI) of the euro area, published by eurostat (https://ec.europa.eu/eurostat/databrowser/view/STS_INPP_A__custom_6416181/default/table?lang=en, last accessed on 2022-05-04).
  properties: allocation factor 0.0922317, carbon allocation 0.857143 kg, carbon content 0.857143, carbon content, fossil 0.857143, carbon content, non-fossil 0, dry mass 1 kg, true value 0.0822133, water content 0, water in wet mass 0 kg, wet mass 1 kg

## Inputs from technosphere
- chemical factory, organics: 4.42712e-10 unit; = 4.00E-10*(RP+BP_ethylene+BP_H2+BP_C4); lognormal variance with pedigree 0.0748, pedigree (2,4,2,5,4)
  Calculated based on literature data published by the industry. For this activity, no information was readily available concerning infrastructure and land-use. Therefore, the infrastructure is estimated based on data from two chemical factories, the BASF site of Ludwigshafen and the chemical factory in Gendorf (which are both located in Germany), which produce a wide range of chemical substances. Based on this data, the following assumptions are made: the built area amounts to about 4.2 ha, the plant has an average output of 50'000 t/a and a lifespan of fifty years. The estimated infrastructure amount is therefore 4.00 E-10 units per kg of produced chemical.
  This amount is scaled by the amount of chemicals produced.
  References:
  Althaus H.-J., Chudacoff M., Hischier R., Jungbluth N., Osses M. and Primas A. (2007) Life Cycle Inventories of Chemicals. ecoinvent report No. 8, v2.0. EMPA Dübendorf, Swiss Centre for Life Cycle Inventories, Dübendorf, CH.
  Gendorf (2000) Umwelterklärung 2000, Werk Gendorf. Werk Gendorf, Burgkirchen.
- chlorine, gaseous: 9.03967e-5, 9.979e-6 kg (2 suppliers, which the file names only by identifier); sum of these 0.000100376 kg; lognormal variance with pedigree 0.0114, pedigree (2,4,2,5,2)
  Reference:
  Lv, L.; Song, G.; Zhao, X.; Chen, J. (2021): Environmental Burdens of China’s Propylene manufacturing: Comparative life-cycle assessment and scenario analysis, Science of the Total Environment, 799, 149451.
  properties: dry mass 1 kg, wet mass 1 kg
- compressed air, 1200 kPa gauge: 0.0103236, 0.0253701 m3 (2 suppliers, which the file names only by identifier); sum of these 0.0356937 m3; lognormal variance with pedigree 0.0114, pedigree (2,4,2,5,2)
  (same comment as for chlorine, gaseous)
- dimethyl sulfide: 3.43102e-5 kg; lognormal variance with pedigree 0.0114, pedigree (2,4,2,5,2)
  (same comment as for chlorine, gaseous)
  properties: carbon content, fossil 0.157354, dry mass 1 kg, heating value, net 23.42 MJ, wet mass 1 kg
- electricity, medium voltage: 0.000236012, 2.09913e-5, 0.00183021, 0.00239831, 0.00253983, 0.00129366, 0.000178674, 0.00113088, 4.77371e-5, 0.00764295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 kWh (47 suppliers, which the file names only by identifier); sum of these 0.136088 kWh; lognormal variance with pedigree 0.0114, pedigree (2,4,2,5,2)
  (same comment as for chlorine, gaseous)
- heat, from steam, in chemical industry: 6.16675, 1.08727 MJ (2 suppliers, which the file names only by identifier); sum of these 7.25402 MJ; = 2.86*2.75; lognormal variance with pedigree 0.0114, pedigree (2,4,2,5,2)
  Calculated value. The original source provided a value of 2.86 kg of steam per kg of propylene produced via propane dehydrogenation. The given value was convereted to energy (based on 2.75 MJ per kg heating value) since steam does not participate actively in the reaction scheme.
  Reference:
  Lv, L.; Song, G.; Zhao, X.; Chen, J. (2021): Environmental Burdens of China’s Propylene manufacturing: Comparative life-cycle assessment and scenario analysis, Science of the Total Environment, 799, 149451.
  properties: heating value, net 1 MJ
- natural gas, high pressure: 0.00114852, 0.00193742, 0.0042261, 0.0014143, 0.000330515, 0.00196716, 0.00188764, 0.00496359, 0.000168241, 0.00191628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 m3 (38 suppliers, which the file names only by identifier); sum of these 0.138034 m3; = 0.11/0.735; lognormal variance with pedigree 0.0114, pedigree (2,4,2,5,2)
  Fuel gas input used for heating. The original source did not specify the nature of the fuel gas, and thus, natural gas was used in this dataset. The amount in the source in kg was divided by the density of natural gas at standard conditions, 0.735 kg/m3.
  Reference:
  Lv, L.; Song, G.; Zhao, X.; Chen, J. (2021): Environmental Burdens of China’s Propylene manufacturing: Comparative life-cycle assessment and scenario analysis, Science of the Total Environment, 799, 149451.
  properties: carbon content, fossil 0.741, dry mass 0.735 kg, heating value, gross 40 MJ, heating value, net 36 MJ, wet mass 0.735 kg
  note on heating value, gross: At standard conditions; based on Meili et al. (2022) section 5.2
- nitrogen, liquid: 0.00796104, 0.00218525 kg (2 suppliers, which the file names only by identifier); sum of these 0.0101463 kg; lognormal variance with pedigree 0.0114, pedigree (2,4,2,5,2)
  (same comment as for chlorine, gaseous)
  properties: dry mass 1 kg, wet mass 1 kg
- propane: 1.14367 kg; lognormal variance with pedigree 0.0114, pedigree (2,4,2,5,2)
  Main raw material used in the production of propylene.
  Reference:
  Lv, L.; Song, G.; Zhao, X.; Chen, J. (2021): Environmental Burdens of China’s Propylene manufacturing: Comparative life-cycle assessment and scenario analysis, Science of the Total Environment, 799, 149451.
  properties: carbon content, fossil 0.817139, dry mass 1 kg, heating value, net 46.4 MJ, wet mass 1 kg
  note on heating value, net: Indicative value. Reference: Fuels - Higher and Lower Calorific Values, available at: https://www.engineeringtoolbox.com/fuels-higher-calorific-values-d_169.html
- sodium hydroxide, without water, in 50% solution state: 0.00061456, 0.00629359 kg (2 suppliers, which the file names only by identifier); sum of these 0.00690815 kg; lognormal variance with pedigree 0.0114, pedigree (2,4,2,5,2)
  (same comment as for chlorine, gaseous)
  properties: dry mass 1 kg, heating value, net 3.03 MJ, wet mass 1 kg
- styrene-acrylonitrile copolymer: 0.00015126 kg; lognormal variance with pedigree 0.0114, pedigree (2,4,2,5,2)
  Proxy for styrene-divinylbenzene polymer.
  Reference:
  Lv, L.; Song, G.; Zhao, X.; Chen, J. (2021): Environmental Burdens of China’s Propylene manufacturing: Comparative life-cycle assessment and scenario analysis, Science of the Total Environment, 799, 149451.
  properties: carbon content, fossil 0.856023, dry mass 1 kg, heating value, net 32.54 MJ, wet mass 1 kg

## Inputs from nature
- Oxygen [natural resource, in air]: 0.274945 kg; = CO2/44.01*31.9988; lognormal variance with pedigree 0.0114, pedigree (2,4,2,5,2)
  Calculated value. The input of oxygen is introduced to account for oxygen used in fuel combustion to CO2. This is done by calculating the molecular share of oxygen (molar weight of O2 31.998 g/mol) in carbon dioxide (molecular weight 44.01 g/mol).
- Water, cooling, unspecified natural origin [natural resource, in water]: 0.00681592 m3; name water_cooling_UNO_input; lognormal variance with pedigree 0.0454, pedigree (2,4,2,5,2)
  Water used for cooling.
  Reference:
  Lv, L.; Song, G.; Zhao, X.; Chen, J. (2021): Environmental Burdens of China’s Propylene manufacturing: Comparative life-cycle assessment and scenario analysis, Science of the Total Environment, 799, 149451.

## Emissions to nature
- Ammonia [air, unspecified]: 4.61158e-8 kg; lognormal variance with pedigree 0.0114, pedigree (2,4,2,5,2)
  (same comment as for chlorine, gaseous)
- Carbon dioxide, fossil [air, unspecified]: 0.37815 kg; name CO2; lognormal variance with pedigree 0.0114, pedigree (2,4,2,5,2)
  (same comment as for chlorine, gaseous)
- Chlorine [air, unspecified]: 4.2611e-6 kg; lognormal variance with pedigree 0.0114, pedigree (2,4,2,5,2)
  (same comment as for chlorine, gaseous)
- Nitrogen oxides [air, unspecified]: 0.000232119 kg; lognormal variance with pedigree 0.0114, pedigree (2,4,2,5,2)
  (same comment as for chlorine, gaseous)
- Particulate Matter, > 2.5 um and < 10um [air, unspecified]: 5.99506e-5 kg; lognormal variance with pedigree 0.0114, pedigree (2,4,2,5,2)
  (same comment as for chlorine, gaseous)
- Sulfur dioxide [air, unspecified]: 2.89607e-5 kg; lognormal variance with pedigree 0.0114, pedigree (2,4,2,5,2)
  (same comment as for chlorine, gaseous)
- Water [air, unspecified]: 0.00264117 m3; = (water_cooling_UNO_input*fraction_CW_to_air); lognormal variance with pedigree 0.0454, pedigree (2,4,2,5,2)
  Calculated as a fraction of the input of water. For more details, refer to the mathematical relation and the parameters.
- BOD5, Biological Oxygen Demand [water, unspecified]: 5.99991e-6 kg; lognormal variance with pedigree 0.0454, pedigree (2,4,2,5,2)
  Calculated value, as BOD = COD/0.53034.
- COD, Chemical Oxygen Demand [water, unspecified]: 3.18199e-6 kg; lognormal variance with pedigree 0.0454, pedigree (2,4,2,5,2)
  (same comment as for chlorine, gaseous)
- DOC, Dissolved Organic Carbon [water, unspecified]: 8.16181e-7 kg; lognormal variance with pedigree 0.0454, pedigree (2,4,2,5,2)
  Calculated value, as DOC = TOC
- Hydrochloric acid [water, unspecified]: 1.54949e-6 kg; lognormal variance with pedigree 0.0454, pedigree (2,4,2,5,2)
  (same comment as for chlorine, gaseous)
- TOC, Total Organic Carbon [water, unspecified]: 8.16181e-7 kg; lognormal variance with pedigree 0.0454, pedigree (2,4,2,5,2)
  Calculated value, as TOC = 0.2565*COD.
- Water [water, unspecified]: 0.00417475 m3; = water_cooling_UNO_input*(1-fraction_CW_to_air); lognormal variance with pedigree 0.0454, pedigree (2,4,2,5,2)
  (same comment as for Water)

## Sampling procedure
Literature data.

## Extrapolations
Extrapolation from Chinese dataset.
