# treatment of sewage sludge, 97% water, WWT-SLF, municipal solid waste, landfarming

Dataset: EcoSpold 2, unit process
Geography: CA-QC
Time period: 2000-01-01 to 2023-12-31
Technology level: current
Classification: ISIC rev.4 ecoinvent: 3821:Treatment and disposal of non-hazardous waste
Scenario: Business-as-Usual
System model: Allocation, cut-off by classification
Generated by: Nikolia Stoikou
Database: ecoinvent
isCopyrightProtected: true
accessRestrictedTo: 1

## General comment
The process represents the treatment of landfarming of a waste (sewage sludge) that is exclusively generated in another waste treatment. Sewage sludge with 97% water is generated during wastewater treatement (WWT) of leachate from the sanitary landfilling (SLF) of 'municipal solid waste' . Recommended use of this dataset: to be used within the specific chain of treatments for 'municipal solid waste'. Share of biogenic carbon in the sludge: 91.67%.

## Included activities start
The activity starts with the waste being available for landfarming. Collection and transportation of the waste to this process is not included.

## Included activities end
The activity ends with the waste being treated and waste-specific emissions from the landfarming process are released to the environment (air, water and soil). The activity is considering local fate of emissions and the initial specific wastewater composition (generating the sewage sludge). Further, it includes provision of fertiliser functions for N, P, K, if present in the sludge.

## Geography
The site has mean annual temperature (MAT) of 2.54054 degC, mean annual precipitation (MAP) of 976.865 mm/year, mean annual actual evaporation (EAT) of 326.303456766609 mm/year. Climate will influence the local fate emissions from of nutrients (N,P,K) present in the sludge as well as sludge water evaporation to air (= consumptive water use).
References
World Bank, 2022. Average precipitation in depth (mm per year), World Bank Group Available at: https://data.worldbank.org/indicator/AG.LND.PRCP.MM?end=2019&start=2019
Environment Canada, 2022. Canadian Climate Normals, Meteorological Service of Canada Available at: https://climate.weather.gc.ca/climate_normals/index_e.html

## Technology
Landfarming is the process of spreading a substrate on agricultural soil. Sewage sludge is generated in the leachate treatment generated from sanitary landfilling of 'municipal solid waste'. Spreading of liquid sewage sludge (97w% water content) on agricultural fields with mobile vacuum tanker.

## Reference product
- organic phosphorus fertiliser, as P2O5: 1 kg; By-product classification allocatable product; CPC 34659: Fertilizers n.e.c.; HS2017 310390: Fertilizers, mineral or chemical; phosphatic, n.e.c. in heading no. 3103
  gross fertilizer function provided from sewage sludge spreading on agricultural fields.
  production volume 24883.5 kg
    calculated in proportion to wastewater reference product
  property oxygen content 0.563579
    Oxygen content (on a dry matter basis) of organic phosphorus fertiliser, as P2O5 is calculated from the molecular formula of the substance (Phosphorus).
  property phosphorus content 0.436421
    Phosphorus content (on a dry matter basis) of organic phosphorus fertiliser, as P2O5 is calculated from the molecular formula of the substance (Phosphorus).
  property price 0.241 EUR2005
    Set equal to the price of the corresponding inorganic fertiliser
  properties: carbon allocation 0 kg, carbon content 0, carbon content, fossil 0, carbon content, non-fossil 0, dry mass 1 kg, water content 0, water in wet mass 0 kg, wet mass 1 kg
