# petroleum slack wax production, petroleum refinery operation

Dataset: EcoSpold 2, unit process
Geography: IN
Time period: 2014-01-01 to 2023-12-31
Technology level: current
Classification: ISIC rev.4 ecoinvent: 1920:Manufacture of refined petroleum products
Scenario: Business-as-Usual
System model: Allocation, cut-off by classification
Generated by: Axel Liebich
Published in: Fehrenbach, H. 2018
Database: ecoinvent
isCopyrightProtected: true
accessRestrictedTo: 1

## General comment
This dataset describes the operation of a typical oil refinery in the given geography. Since refineries are very complex the actual unit process modeling is done in a separate refinery model by ifeu and this is a subdivided product-specfic dataset.
The ifeu refinery model reproduces the complexity of petroleum refinery plants in which the combination and sequence of processes are usually very specific to the characteristics of the raw materials (i.e. the close relation between the composition of the crude oil and the products to be produced). Refineries differ not only in their configurations, process integration, feedstocks, product mixes, unit sizes, designs, and control systems but also the market situations, locations and ages of the refinery or environmental regulations can result in a wide variety of refinery concepts. It represents the current European state-of-the-art. The basic setting of the model reflects the technical characteristics of European refineries as described in the BREF - BAT reference document for the Refining of Mineral Oil and Gas. Further specific data was collected from companies and production plants and was incorporated in order to elaborate a comprehensive and robust model of a refinery.
The BREF contains not only aggregated numbers or weighted averages of emission and energy or water consumptions, but also encompasses primary data of the majority of refineries in Europe in anonymous form. The data quality is excellent. This data source has been complemented by various specific confidential refinery datasets, by values from Eurostat (e.g. in the case of the energy source mix or process energy), and by literature data. In the case of the BREF, a range of values were mentioned as process parameters for which the arithmetic averages were applied. After adapting the model to the up-to-date mass and energy flows within the European refineries, it has been validated and calibrated by comparing the results to the dataset of the BREF, the Eurostat and the European Pollutant Release and Transfer Register (E-PRTR).
Despite the default settings (weighted EU average), the refinery model was adjusted to fit typical refinery production data in the special geographies. In order to do this data from the refineries in the countries was analysed and an assessment of the refinery complexity (according to the BREF classes) was done. Furthermore crude oil qualities were researched an adjusted (e.g. sulphur content and API class) to fit the specified geography.
Documentation for this model can be found in the ecoinvent refinery report by Fehrenbach et al. (2018).

## Included activities start
Activity starts with crude oil entering the petroleum refinery. Waste water treatment, fresh water supply (from nature), refinery infrastructure, crude oil and product storage on refinery grounds and energy provision is included.

## Included activities end
Activity ends with refinery products leaving the petroleum refinery.

## Allocation
Mineral oil refineries are highly integrated multi-output production plants where nearly each process step creates a few co-products.
Unlike many other refinery models, which tend to consider a refinery as a black-box, here a step by step calculation of the complex network of refinery processes was done and gives an integrated sum of all connected processes. The allocation is executed within each of these steps allowing the implementation of the allocation rules at process step level separately and globally, over the system of all steps.
The allocation approach implemented within the ifeu refinery model is designed to consider the complexity of the production system, the valuation of the products (upgrading/downgrading of feedstock material during a specific process), real physical mass flows. The combined allocation procedure is stated by the following sequence of four rules:
1. the general allocation rule refers to the energy content (Rationale: the majority of refinery products are used for energy purposes.)
2. The expenditures for the first step of separation (atmospheric distillation) are allocated to all co-products, including the atmospheric residue (Rationale: all co-products from atmospheric distillation will end up in marketable final products.)
3. The expenditures for any subsequent process step intended to reduce the quantity of non-intended products (i.e. vacuum distillation and cracking) are allocated to all co-products except for the non-intended products (residues). (Rationale: all these downstream processes within the refinery are intended to reduce non-intended products in favour to increase the yield of non-residual co-products; hence, the expenditures are only allocated to the yielded products.)
4. Retention of feedstock: The 3rd rule refers to the allocation of the respective process expenditures; it does not include the allocation of feedstocks. The input material (feedstock) into a refinery process step is always allocated according to the 1st rule: e.g. visbreaker residue takes 40 % energy content of the totalized co-product output of a visbreaker cracker output therefore 40 % of the visbreaker input (vacuum distillate) and its upstream burden is allocated to the visbreaker residue . (Rationale: Although the downstream processing steps are not intended to produce residues only to reduce them, the residual final products derived from residues (e.g. heavy fuel oil, petroleum coke) are defined as refinery products and not as wastes; if the 3rd rule would apply also for the allocation of feedstock, all final products from non-intended products (residues) would finally achieve LCIs with zero expenditures and emission; de facto they would be treated the same way as waste.)
The combined allocation procedure involves following consequences:
• The LCI of every refinery product encloses at least 1 MJ crude oil per MJ product feedstock; considering that some refinery products have lower LHVs than crude oil (e.g. petroleum coke or heavy fuel oil), such refinery products enclose less than 1 kg crude oil per kg product;
• Final products with relevant shares derived from sequential processing accumulate higher loads than products predominantly derived from straight-run;
• An exception is the heavy products derived from non-intended products, even if they pass a cascade of cracking processes; without rule 3 and 4 heavy fuel oil would turn out to be the product with the highest burden, which would contradict any value-based perception of the refining business.

## Geography
Global model calibrated with country specific information.

## Technology
The technology represents a weighted average of BREF types II and IV refineries; API 35; sulfur content 1.39%

## Reference product
- petroleum slack wax: 1 kg; name RP_amount; By-product classification allocatable product; CPC 33500: Petroleum jelly; paraffin wax, micro- crystalline petroleum wax, slack wax, ozokerite, lignite wax, peat wax, […]; HS2017 271390: Residues; of petroleum oils or of oils obtained from bituminous minerals
  production volume 1.84923e9 kg; name RP_PV
    expert estimate derived from refinery output for 2015 for other oil products according to the jodidata.org database
  property heating value, net 43.2 MJ
    Assumed equal to "petroleum". LHV for petroleum: Based on literature, page 7, Report6, part 4
  property price 0.888592 EUR2005
    Literature data. Data from Eurostat. More information can be found in "Petroleum refinery industry and liquid fuels – Description of the ifeu refinery model and the calculation of LCI datasets for refinery products in Brazil, India, South Africa, Peru and Colombia" available on the ecoinvent website.
  properties: carbon allocation 0.85 kg, carbon content 0.85, carbon content, fossil 0.85, carbon content, non-fossil 0, dry mass 1 kg, water content 0, water in wet mass 0 kg, wet mass 1 kg

## Inputs from technosphere
- N-methyl-2-pyrrolidone: 0.000146507 kg; lognormal variance with pedigree 0.0433, pedigree (3,2,5,1,2)
  properties: carbon content, fossil 0.585366, dry mass 1 kg, heating value, net 29.36 MJ, wet mass 1 kg
- aluminium oxide, non-metallurgical: 9.88563e-6 kg; lognormal variance with pedigree 0.0433, pedigree (3,2,5,1,2)
  properties: dry mass 1 kg, wet mass 1 kg
- ammonia, anhydrous, liquid: 3.53374e-5 kg; lognormal variance with pedigree 0.0433, pedigree (3,2,5,1,2)
  properties: dry mass 1 kg, wet mass 1 kg
- cobalt: 2.06015e-7 kg; lognormal variance with pedigree 0.0433, pedigree (3,2,5,1,2)
  properties: dry mass 1 kg, wet mass 1 kg
- fibre, viscose: 0.000586027 kg; lognormal variance with pedigree 0.0433, pedigree (3,2,5,1,2)
  furfural is typically produced from renewable feedstocks, often from lignocellulosic residues; an existing pathway is the viscose production (as a by-product). This is used as proxy for furfural here.
  properties: carbon content, non-fossil 0.240535, dry mass 1 kg, heating value, net 7.29 MJ, wet mass 1 kg
- hazardous waste, for incineration: -0.000402359 kg; name BP2_amount
  production volume; = RP_PV*(BP2_amount/RP_amount)
    Production volume was calculated with the reference product production volume and amount, and the byproduct amount.
  properties: carbon content, fossil 0.554667, dry mass 0.75 kg, heating value, net 17 MJ, water content 0.333333, wet mass 1 kg
  note on carbon content, fossil: Tab A.6, ecoinvent v2.2 report 13_I. C content has been calculated after data in the tables, and then referred to 1 kg DM
  note on heating value, net: Value taken from the general comment of the treatment dataset.
- hazardous waste, for underground deposit: -2.03323e-5 kg; name BP1_amount
  production volume; = RP_PV*(BP1_amount/RP_amount)
    (same comment as for hazardous waste, for incineration)
  properties: carbon content, fossil 0.554667, dry mass 1 kg, wet mass 1 kg
  note on carbon content, fossil: Tab A.6, ecoinvent v2.2 report 13_I, average hazardous waste composition was used, and referred to 0% water mass. No waste-specific emission are currently inventoried for underground deposits. Accordingly, no waste composition must be specified. For generic, average waste to underground deposit deposition in a 200 liter steel drum without cement solidification is assumed (ecoinvent v2.2 report 13_I).
- hydrochloric acid, without water, in 30% solution state: 0.00124551 kg; lognormal variance with pedigree 0.0433, pedigree (3,2,5,1,2)
  properties: dry mass 1 kg, heating value, net 3.32 MJ, wet mass 1 kg
- kaolin: 2.06015e-6 kg; lognormal variance with pedigree 0.0433, pedigree (3,2,5,1,2)
  properties: dry mass 1 kg, wet mass 1 kg
- lanthanum oxide: 2.06015e-7 kg; lognormal variance with pedigree 0.0433, pedigree (3,2,5,1,2)
  properties: dry mass 1 kg, wet mass 1 kg
- lime, hydrated, packed: 0.00119105 kg; lognormal variance with pedigree 0.0433, pedigree (3,2,5,1,2)
  properties: dry mass 0.997 kg, water content 0.00300903, wet mass 1 kg
- methyl ethyl ketone: 0.000510429 kg; lognormal variance with pedigree 0.0433, pedigree (3,2,5,1,2)
  properties: carbon content, fossil 0.666667, dry mass 1 kg, heating value, net 33.63 MJ, wet mass 1 kg
- molybdenum trioxide: 2.06015e-7 kg; lognormal variance with pedigree 0.0433, pedigree (3,2,5,1,2)
  properties: bismuth content 8e-5, copper content 0.0006, iron content 0.0044, lead content 0.00015, molecular weight 143.9 g/mol, molybdenum content 0.62, oxygen content 0.29, sulfur content 0.0003
- natural gas, high pressure: 0.000931933 m3; lognormal variance with pedigree 0.0433, pedigree (3,2,5,1,2)
  properties: carbon content, fossil 0.602381, dry mass 0.84 kg, heating value, gross 40 MJ, heating value, net 36 MJ, wet mass 0.84 kg
  note on carbon content, fossil: An average C content of 0.506 kg C/ m3 has been assumed (this average has been calculated using data in Tab 3.5, ecoinvent v2.2 report 6_V
  note on heating value, net: Literature value, Source: Christoph Meili;Niels Jungbluth;Maresa Bussa (2021) Life cycle inventories of crude oil and natural gas extraction. ESU-services Ltd. commissioned by BAFU & VSG, Schaffhausen, Switzerland, http://esu-services.ch/data/public-lci-reports/
- nickel, class 1: 2.06015e-7 kg; lognormal variance with pedigree 0.0433, pedigree (3,2,5,1,2)
  properties: dry mass 1 kg, wet mass 1 kg
- petroleum: 1.23818 kg; lognormal variance with pedigree 0.0433, pedigree (3,2,5,1,2)
  domestic share 16%; imports mainly from Saudi Arabia, Iraq, Iran and Nigeria
  properties: carbon content, fossil 0.85, dry mass 1 kg, heating value, net 43.4 MJ, wet mass 1 kg
- petroleum refinery: 6.75329e-12 unit; lognormal variance with pedigree 0.3427, pedigree (3,2,5,1,2)
  properties: lifetime capacity [kg] 3e10 kg
- platinum: 3.09023e-9 kg; lognormal variance with pedigree 0.0433, pedigree (3,2,5,1,2)
  properties: dry mass 1 kg, wet mass 1 kg
- quicklime, milled, packed: 0.000266322 kg; lognormal variance with pedigree 0.0433, pedigree (3,2,5,1,2)
  properties: dry mass 0.99 kg, water content 0.010101, wet mass 1 kg
- refinery sludge: -0.00619534 kg; name BP4_amount
  production volume; = RP_PV*(BP4_amount/RP_amount)
    (same comment as for hazardous waste, for incineration)
  properties: carbon content, fossil 0.767857, dry mass 0.105 kg, heating value, net 2.45 MJ, water content 8.52381, wet mass 1 kg
- silicone product: 2.06015e-6 kg; lognormal variance with pedigree 0.0433, pedigree (3,2,5,1,2)
  properties: carbon content, fossil 0.324324, dry mass 1 kg, heating value, net 9.83 MJ, wet mass 1 kg
- sodium hydroxide, without water, in 50% solution state: 0.000622755 kg; lognormal variance with pedigree 0.0433, pedigree (3,2,5,1,2)
  properties: dry mass 1 kg, heating value, net 3.03 MJ, wet mass 1 kg
- toluene, liquid: 0.000274847 kg; lognormal variance with pedigree 0.0433, pedigree (3,2,5,1,2)
  properties: carbon content, fossil 0.913043, dry mass 1 kg, heating value, net 38.17 MJ, wet mass 1 kg
- waste gypsum: -0.000960025 kg; name BP3_amount
  production volume; = RP_PV*(BP3_amount/RP_amount)
    (same comment as for hazardous waste, for incineration)
  properties: dry mass 0.806 kg, water content 0.240695, wet mass 1 kg
- zeolite, powder: 5.76842e-6 kg; lognormal variance with pedigree 0.0433, pedigree (3,2,5,1,2)
  properties: dry mass 1 kg, wet mass 1 kg

## Inputs from nature
- Water, cooling, unspecified natural origin [natural resource, in water]: 0.0207353 m3; lognormal variance with pedigree 0.0433, pedigree (3,2,5,1,2)
- Water, unspecified natural origin [natural resource, in water]: 0.00547192 m3; lognormal variance with pedigree 0.0433, pedigree (3,2,5,1,2)

## Emissions to nature
- Ammonia [air, unspecified]: 4.68103e-6 kg; lognormal variance with pedigree 0.0827, pedigree (3,2,5,1,2)
- Antimony ion [air, unspecified]: 4.43967e-8 kg; lognormal variance with pedigree 0.0827, pedigree (3,2,5,1,2)
- Arsenic ion [air, unspecified]: 6.33465e-8 kg; lognormal variance with pedigree 0.0827, pedigree (3,2,5,1,2)
- Benzene [air, unspecified]: 4.34913e-6 kg; lognormal variance with pedigree 0.0827, pedigree (3,2,5,1,2)
- Benzo(a)pyrene [air, unspecified]: 2.40365e-10 kg; lognormal variance with pedigree 0.0827, pedigree (3,2,5,1,2)
- Beryllium II [air, unspecified]: 9.162e-10 kg; lognormal variance with pedigree 0.0827, pedigree (3,2,5,1,2)
- Cadmium II [air, unspecified]: 6.26285e-8 kg; lognormal variance with pedigree 0.6927, pedigree (3,2,5,1,2)
- Carbon dioxide, fossil [air, unspecified]: 0.784413 kg; lognormal variance with pedigree 0.0433, pedigree (3,2,5,1,2)
- Carbon dioxide, non-fossil [air, unspecified]: 0.00119361 kg; lognormal variance with pedigree 0.0433, pedigree (3,2,5,1,2)
- Carbon monoxide, fossil [air, unspecified]: 0.000166717 kg; lognormal variance with pedigree 0.6927, pedigree (3,2,5,1,2)
- Carbonyl sulfide [air, unspecified]: 2.81994e-9 kg; lognormal variance with pedigree 0.0827, pedigree (3,2,5,1,2)
- Chromium III [air, unspecified]: 8.97782e-8 kg; lognormal variance with pedigree 0.6927, pedigree (3,2,5,1,2)
- Cobalt II [air, unspecified]: 1.79556e-7 kg; lognormal variance with pedigree 0.6927, pedigree (3,2,5,1,2)
- Copper ion [air, unspecified]: 2.72019e-7 kg; lognormal variance with pedigree 0.6927, pedigree (3,2,5,1,2)
- Cyanide [air, unspecified]: 6.00439e-10 kg; lognormal variance with pedigree 0.0827, pedigree (3,2,5,1,2)
- Dinitrogen monoxide [air, unspecified]: 2.0596e-5 kg; lognormal variance with pedigree 0.0827, pedigree (3,2,5,1,2)
- Dioxins, measured as 2,3,7,8-tetrachlorodibenzo-p-dioxin [air, unspecified]: 3.15983e-14 kg; lognormal variance with pedigree 0.0827, pedigree (3,2,5,1,2)
- Formaldehyde [air, unspecified]: 2.74789e-6 kg; lognormal variance with pedigree 0.0827, pedigree (3,2,5,1,2)
- Furfural [air, unspecified]: 5.86027e-6 kg; lognormal variance with pedigree 0.0827, pedigree (3,2,5,1,2)
- Heat, waste [air, unspecified]: 1.46888 MJ; lognormal variance with pedigree 0.0827, pedigree (3,2,5,1,2)
- Hydrochloric acid [air, unspecified]: 8.38368e-6 kg; lognormal variance with pedigree 0.0827, pedigree (3,2,5,1,2)
- Hydrogen fluoride [air, unspecified]: 8.34099e-7 kg; lognormal variance with pedigree 0.0827, pedigree (3,2,5,1,2)
- Hydrogen sulfide [air, unspecified]: 5.84448e-7 kg; lognormal variance with pedigree 0.0827, pedigree (3,2,5,1,2)
- Lead II [air, unspecified]: 3.51821e-7 kg; lognormal variance with pedigree 0.6927, pedigree (3,2,5,1,2)
- Manganese II [air, unspecified]: 4.48654e-8 kg; lognormal variance with pedigree 0.6927, pedigree (3,2,5,1,2)
- Mercury II [air, unspecified]: 7.579e-9 kg; lognormal variance with pedigree 0.6927, pedigree (3,2,5,1,2)
- Methane, fossil [air, unspecified]: 3.35282e-5 kg; lognormal variance with pedigree 0.0827, pedigree (3,2,5,1,2)
- Methyl ethyl ketone [air, unspecified]: 5.10429e-7 kg; lognormal variance with pedigree 0.0827, pedigree (3,2,5,1,2)
- NMVOC, non-methane volatile organic compounds [air, unspecified]: 0.000338814 kg; lognormal variance with pedigree 0.0827, pedigree (3,2,5,1,2)
- Nickel II [air, unspecified]: 3.62693e-6 kg; lognormal variance with pedigree 0.6927, pedigree (3,2,5,1,2)
- Nitrogen oxides [air, unspecified]: 0.000748025 kg; lognormal variance with pedigree 0.0827, pedigree (3,2,5,1,2)
- PAH, polycyclic aromatic hydrocarbons [air, unspecified]: 4.56185e-8 kg; lognormal variance with pedigree 0.3427, pedigree (3,2,5,1,2)
- Palladium II [air, unspecified]: 8.92574e-10 kg; lognormal variance with pedigree 0.6927, pedigree (3,2,5,1,2)
- Particulate Matter, < 2.5 um [air, unspecified]: 0.000113388 kg; lognormal variance with pedigree 0.3427, pedigree (3,2,5,1,2)
- Particulate Matter, > 10 um [air, unspecified]: 0.000258689 kg; lognormal variance with pedigree 0.0827, pedigree (3,2,5,1,2)
- Particulate Matter, > 2.5 um and < 10um [air, unspecified]: 1.70425e-5 kg; lognormal variance with pedigree 0.1627, pedigree (3,2,5,1,2)
- Platinum [air, unspecified]: 8.92574e-10 kg; lognormal variance with pedigree 0.6927, pedigree (3,2,5,1,2)
- Rhodium III [air, unspecified]: 8.92574e-10 kg; lognormal variance with pedigree 0.6927, pedigree (3,2,5,1,2)
- Selenium IV [air, unspecified]: 8.03911e-8 kg; lognormal variance with pedigree 0.0827, pedigree (3,2,5,1,2)
- Sulfur dioxide [air, unspecified]: 0.00245714 kg; lognormal variance with pedigree 0.0487, pedigree (3,2,5,1,2)
- Tellurium [air, unspecified]: 1.07188e-9 kg; lognormal variance with pedigree 0.0827, pedigree (3,2,5,1,2)
- Thallium I [air, unspecified]: 2.62012e-8 kg; lognormal variance with pedigree 0.6927, pedigree (3,2,5,1,2)
- Tin ion [air, unspecified]: 9.12049e-8 kg; lognormal variance with pedigree 0.6927, pedigree (3,2,5,1,2)
- Toluene [air, unspecified]: 3.90239e-6 kg; lognormal variance with pedigree 0.0827, pedigree (3,2,5,1,2)
- Vanadium V [air, unspecified]: 8.6464e-6 kg; lognormal variance with pedigree 0.6927, pedigree (3,2,5,1,2)
- Water [air, unspecified]: 0.000472252 m3; lognormal variance with pedigree 0.0827, pedigree (3,2,5,1,2)
- Xylenes, unspecified [air, unspecified]: 4.73477e-6 kg; lognormal variance with pedigree 0.0827, pedigree (3,2,5,1,2)
- Zinc II [air, unspecified]: 2.24422e-7 kg; lognormal variance with pedigree 0.0827, pedigree (3,2,5,1,2)
- AOX, Adsorbable Organic Halides [water, unspecified]: 7.39277e-7 kg; lognormal variance with pedigree 0.0827, pedigree (3,2,5,1,2)
- Aluminium III [water, unspecified]: 3.12252e-7 kg; lognormal variance with pedigree 0.0827, pedigree (3,2,5,1,2)
- Ammonium [water, unspecified]: 7.76241e-6 kg; lognormal variance with pedigree 0.0827, pedigree (3,2,5,1,2)
- Arsenic ion [water, unspecified]: 1.10892e-8 kg; lognormal variance with pedigree 0.0827, pedigree (3,2,5,1,2)
- BOD5, Biological Oxygen Demand [water, unspecified]: 3.69638e-5 kg; lognormal variance with pedigree 0.0827, pedigree (3,2,5,1,2)
- Barium II [water, unspecified]: 7.42653e-7 kg; lognormal variance with pedigree 0.0827, pedigree (3,2,5,1,2)
- Benzene [water, unspecified]: 3.69638e-9 kg; lognormal variance with pedigree 0.0827, pedigree (3,2,5,1,2)
- Boron [water, unspecified]: 1.47855e-6 kg; lognormal variance with pedigree 0.0827, pedigree (3,2,5,1,2)
- COD, Chemical Oxygen Demand [water, unspecified]: 0.000243961 kg; lognormal variance with pedigree 0.6927, pedigree (3,2,5,1,2)
- Cadmium II [water, unspecified]: 3.69638e-9 kg; lognormal variance with pedigree 0.0827, pedigree (3,2,5,1,2)
- Chloride [water, unspecified]: 0.00271411 kg; lognormal variance with pedigree 0.0827, pedigree (3,2,5,1,2)
- Chromium III [water, unspecified]: 3.69638e-9 kg; lognormal variance with pedigree 0.6927, pedigree (3,2,5,1,2)
- Chromium VI [water, unspecified]: 7.39277e-9 kg; lognormal variance with pedigree 0.6927, pedigree (3,2,5,1,2)
- Cobalt II [water, unspecified]: 3.69638e-9 kg; lognormal variance with pedigree 0.0827, pedigree (3,2,5,1,2)
- Copper ion [water, unspecified]: 1.84819e-7 kg; lognormal variance with pedigree 0.0827, pedigree (3,2,5,1,2)
- Cyanide [water, unspecified]: 5.54458e-8 kg; lognormal variance with pedigree 0.0827, pedigree (3,2,5,1,2)
- DOC, Dissolved Organic Carbon [water, unspecified]: 5.07144e-5 kg; lognormal variance with pedigree 0.0827, pedigree (3,2,5,1,2)
  share of DOC to TOC is estimated with 98%
- Fluoride [water, unspecified]: 2.95711e-6 kg; lognormal variance with pedigree 0.0827, pedigree (3,2,5,1,2)
- Heat, waste [water, unspecified]: 0.226487 MJ
- Hydrocarbons, unspecified [water, unspecified]: 5.54458e-6 kg; lognormal variance with pedigree 0.3427, pedigree (3,2,5,1,2)
- Iron ion [water, unspecified]: 1.47855e-6 kg; lognormal variance with pedigree 0.0827, pedigree (3,2,5,1,2)
- Lead II [water, unspecified]: 3.69638e-9 kg; lognormal variance with pedigree 0.6927, pedigree (3,2,5,1,2)
- Manganese II [water, unspecified]: 2.95711e-7 kg; lognormal variance with pedigree 0.6927, pedigree (3,2,5,1,2)
- Mercury II [water, unspecified]: 7.39277e-10 kg; lognormal variance with pedigree 0.6927, pedigree (3,2,5,1,2)
- Molybdenum VI [water, unspecified]: 3.69638e-8 kg; lognormal variance with pedigree 0.6927, pedigree (3,2,5,1,2)
- Nickel II [water, unspecified]: 3.69638e-8 kg; lognormal variance with pedigree 0.6927, pedigree (3,2,5,1,2)
- Nitrate [water, unspecified]: 1.41893e-6 kg; lognormal variance with pedigree 0.0827, pedigree (3,2,5,1,2)
- Nitrite [water, unspecified]: 2.24997e-7 kg; lognormal variance with pedigree 0.0827, pedigree (3,2,5,1,2)
- Nitrogen [water, unspecified]: 2.01647e-5 kg; lognormal variance with pedigree 0.0827, pedigree (3,2,5,1,2)
- PAH, polycyclic aromatic hydrocarbons [water, unspecified]: 2.58747e-9 kg; lognormal variance with pedigree 0.3427, pedigree (3,2,5,1,2)
- Phenol [water, unspecified]: 3.69638e-7 kg; lognormal variance with pedigree 0.0827, pedigree (3,2,5,1,2)
- Phosphorus [water, unspecified]: 2.21783e-6 kg; lognormal variance with pedigree 0.0827, pedigree (3,2,5,1,2)
- Selenium IV [water, unspecified]: 1.47855e-7 kg; lognormal variance with pedigree 0.6927, pedigree (3,2,5,1,2)
- Sodium I [water, unspecified]: 0.000357951 kg; lognormal variance with pedigree 0.0827, pedigree (3,2,5,1,2)
- Sulfate [water, unspecified]: 0.00192668 kg; lognormal variance with pedigree 0.0827, pedigree (3,2,5,1,2)
- Sulfide [water, unspecified]: 1.84819e-7 kg; lognormal variance with pedigree 0.0827, pedigree (3,2,5,1,2)
- Suspended solids, unspecified [water, unspecified]: 5.54458e-5 kg; lognormal variance with pedigree 0.0827, pedigree (3,2,5,1,2)
- TOC, Total Organic Carbon [water, unspecified]: 5.17494e-5 kg; lognormal variance with pedigree 0.0827, pedigree (3,2,5,1,2)
- Tin ion [water, unspecified]: 3.69638e-8 kg; lognormal variance with pedigree 0.6927, pedigree (3,2,5,1,2)
- Toluene [water, unspecified]: 1.10892e-8 kg; lognormal variance with pedigree 0.0827, pedigree (3,2,5,1,2)
- Vanadium V [water, unspecified]: 7.39277e-8 kg; lognormal variance with pedigree 0.6927, pedigree (3,2,5,1,2)
- Water [water, ocean]: 0.00692005 m3; lognormal variance with pedigree 0.0827, pedigree (3,2,5,1,2)
- Water [water, surface water]: 0.00173001 m3; lognormal variance with pedigree 0.0827, pedigree (3,2,5,1,2)
- Xylenes, unspecified [water, unspecified]: 3.69638e-9 kg; lognormal variance with pedigree 0.6927, pedigree (3,2,5,1,2)
- Zinc II [water, unspecified]: 1.10892e-7 kg; lognormal variance with pedigree 0.6927, pedigree (3,2,5,1,2)
- t-Butyl methyl ether [water, unspecified]: 7.39277e-8 kg; lognormal variance with pedigree 0.0827, pedigree (3,2,5,1,2)
