# horticultural fleece production

Dataset: EcoSpold 2, unit process
Geography: CH
Time period: 2009-01-01 to 2023-12-31
Technology level: current
Classification: ISIC rev.4 ecoinvent: 2220:Manufacture of plastics products
Tags: WFLDB
Scenario: Business-as-Usual
System model: Allocation, cut-off by classification
Generated by: Rita Schulze
Published in: Nemecek T. 2015
Database: ecoinvent
isCopyrightProtected: true
accessRestrictedTo: 1

## General comment
This dataset represents the production of 1 m2 of horticultural fleece typically used in horticulture but also for crop protection against frost. Features of the model: the fleece density is 17g/m2 and lasts for an average of 5 years (information provided by J. Krauss, Agroscope). The fleece is made from polypropylene (PP) and produced in an extrusion process. This dataset refers to an average situation; for specific situations exchanges might differ substantially due to site specific parameters.

## Included activities start
The activity starts with the production of the flees.

## Included activities end
The module includes manufacture and processing of the raw material. Infrastructure is not included.

## Parameters
- LUC_crop_specific: 1 dimensionless
  This parameter allows to switch between a 'crop specific' and a 'country specific' approach when calculating the LUC of a crop. By default, the chosen approach is 'crop specific', so the value of the parameter is 1. If you want to apply a 'country specific' approach, turn the parameter to 0.

## Reference product
- horticultural fleece: 1 m2; By-product classification allocatable product; CPC 36920: Self-adhesive plates, sheets, film, foil, tape, strip and other flat shapes, of plastics; HS2017 391910: Plastics; plates, sheets, film, foil, tape, strip, other flat shapes thereof, self-adhesive, in rolls of a [...]
  Yield = 1.0 kg/ha
  production volume 4.21149e7 m2
    Calculation method: Agricultural area with potatoes & vegetables * 0.2
  property carbon content, fossil 0.85714
    Polypropylene is formed by the polymerisation of propylene, C3H6
  property price 0.0205698 EUR2005
    Calculated based on inputs: The price of the product has been calculated as a sum of the values of the material and energy inputs for this product. This value is therefore a rough estimation. It may underestimate the real price since there are additional expenses when producing any product. These expences can include for example labour costs, treatment of waste materials and profit for the producer. Please consider carefully whether this level of data quality is acceptable for your application.
  properties: carbon allocation 0.85714 kg, carbon content 0.85714, carbon content, non-fossil 0, dry mass 1 kg, water content 0, water in wet mass 0 kg, wet mass 1 kg

## Inputs from technosphere
- extrusion, plastic film: 0.017 kg; lognormal variance with pedigree 0.0883408, pedigree (2,2,4,1,3)
  Expert estimate. PP sleeve has a density of 17 g/m2 and life duration of 5 years.
- polypropylene, granulate: 0.017 kg; lognormal variance with pedigree 0.0883408, pedigree (2,2,4,1,3)
  Expert estimate. PP sleeve has a density of 17 g/m2 and life duration of 5 years.
  properties: carbon content, fossil 0.857143, dry mass 1 kg, heating value, net 32.78 MJ, wet mass 1 kg
  note on heating value, net: Value extracted from "treatment of waste polypropylene, open burning"

## Sampling procedure
Data was collected from agronomic experts at Agroscope J. Klauss. The fleece, made of polypropylene, weighs 17g/m2 and lasts for an average of 5 years. This kind of fleece is not only used in horticulture, but also for crop protection against frost.

## Extrapolations
If used, extrapolations are documented on the flow level.
