# rare earth element mine operation and beneficiation, ion adsorption clays

Dataset: EcoSpold 2, unit process
Geography: RoW
Time period: 2017-01-01 to 2023-12-31
Technology level: current
Classification: ISIC rev.4 ecoinvent: 0729:Mining of other non-ferrous metal ores
Synonyms: ion-adsorption clays; REO; REE
Scenario: Business-as-Usual
System model: Allocation, cut-off by classification
Generated by: Efstathios Kakkos
Database: ecoinvent
isCopyrightProtected: true
accessRestrictedTo: 1

## General comment
This dataset has been copied from an original dataset covering the geography of CN. China is the top producer of Rare Earth metals in the world (81.4%) (source USGS). This dataset refers to the mining and beneficiation activities (in-situ leaching) of ion adsorption clays spreading across seven southern provinces in China (Fujian, Guangdong, Guangxi, Hunan, Jiangxi, Yunnan, and Zhejiang) in order to produce rare earth carbonate concentrate. The produced carbonate concentrate will then undergo roasting, calcination and solvent extraction in order to produce high purity individual rare earth oxides. Compared to the other production pathways of rare earth oxides in China, this pathway produces 15 individual REOs (cerium, europium, lanthanum, neodymium, samarium, ytterbium, yttrium, dysprosium, erbium, gadolinium, holmium, lutetium, praseodymium, terbium and thulium oxide.
Background: Metals are produced as part of a complex, highly interconnected and interdependent system, with many desirable but scarce/critical metals recovered as by-products during the production of one or more ‘host’ metal(s). Currently, mining and processing of rare earth elements is predominantly carried out in China, where they are extracted mainly via open pit mining of bastnäsite and/or monazite deposits or the leaching of ion-adsorption clays.
Modelling approach: This dataset was created using the critical materials life cycle assessment tool (CMLCAT) of Arshi et al. (2018).

## Included activities start
The activity starts with the mining of the clays.

## Included activities end
The activitity ends with the production of rare earth carbonate concentrate..

## Allocation
No allocation is applied.

## Geography
This dataset has been copied from an original dataset covering the geography of CN. Since ion-adsorptions clays are found and mined in other parts of the world (South America and Africa), this process is considered applicable to other parts of the world.

## Technology
This dataset has been copied from an original dataset covering the geography of CN and it is used as the best availble rep-resentation of the GLO. The technologies information described are taken from the corresponding CN dataset. Ion-adsorption clays deposits from South China usually contain 0.04−0.25% REOs. Despite their low concentration and reserves, increased production of REEs from these deposits has been reported over the last 10 years, due to easiness of mining and concentrating through through the use of weak acids. For this reason, in-situ leaching has become the prominent method for REE extraction from ion adsorption clays. Ammonium sulfate is used in or-der to leach the ion adsorption clays, with the precipitation of the leachate occurring through the use of ammo-nium bicarbonate or oxalic acid. The resulting carbonate concentrate contains approximately 45% REOs.

## Time period
Data are considered representative of current production practices.

## Reference product
- rare earth carbonate concentrate: 1 kg; By-product classification allocatable product; CPC 34290: Compounds of rare earth metals, of yttrium or of scandium; HS2017 284690: Compounds, inorganic or organic (excluding cerium), of rare-earth metals, of yttrium, scandium or of mixtur[...]
  production volume 1.39441e7 kg; = 105000000*0.35*1.660518456 / 0.814
    The global production volume of mixed Rare earth Carbonates is expressed in kg and is estimated the following way: The total production volume of rare earth metals for China for 2015, which is provided by the U.S. GEOLOGICAL SURVEY MINERALS YEAR-BOOK-2016 report on page 16 table 6 (105000000 kg) is multiplied by the percentage attributed to China’s REE production from ion - adsorption clays (35%) (RECOVERY OF RARE EARTH ELEMENTS FROM CLAY MINERALS, 2014, Vladimiros G. PAPANGELAKIS and Georgiana MOLDOVEANU). and the divided to the share of China's contribution to global production (81.4% = 105000 / 129000). The production volume is finally calculated by assuming that for 1 kg of REO production, 1.660518456 kg of mixed rare earth carbonates are required as input.
  property cerium content 0.0135
    The calculation of the individual rare earth element (REE) content of the carbonate concentrate is based on the fact that the concentrate contains 45% mixed REE and that the per kg production of refined RE oxides from the ion adsorption clays contain 0.03 kg cerium oxide.
  property dysprosium content 0.0157982
    The calculation of the individual rare earth element (REE) content of the carbonate concentrate is based on the fact that the concentrate contains 45% mixed REE and that the per kg production of refined RE oxides from the ion adsorption clays contain 0.0351 dysprosium oxide.
  property erbium content 0.00810191
    The calculation of the individual rare earth element (REE) content of the carbonate concentrate is based on the fact that the concentrate contains 45% mixed REE and that the per kg production of refined RE oxides from the ion adsorption clays contain 0.018 kg erbium oxide.
  property europium content 0.0026662
    The calculation of the individual rare earth element (REE) content of the carbonate concentrate is based on the fact that the concentrate contains 45% mixed REE and that the per kg production of refined RE oxides from the ion adsorption clays contain 0.0059 europium oxide.
  property gadolinium content 0.021148
    The calculation of the individual rare earth element (REE) content of the carbonate concentrate is based on the fact that the concentrate contains 45% mixed REE and that the per kg production of refined RE oxides from the ion adsorption clays contain 0.047 gadolinium oxide.
  property holmium content 0.00314806
    The calculation of the individual rare earth element (REE) content of the carbonate concentrate is based on the fact that the concentrate contains 45% mixed REE and that the per kg production of refined RE oxides from the ion adsorption clays contain 0.007 kg holmium oxide.
  property lanthanum content 0.122451
    The calculation of the individual rare earth element (REE) content of the carbonate concentrate is based on the fact that the concentrate contains 45% mixed REE and that the per kg production of refined RE oxides from the ion adsorption clays contain 0.2721 kg lanthanum oxide.
  property lutetium content 0.000893238
    The calculation of the individual rare earth element (REE) content of the carbonate concentrate is based on the fact that the concentrate contains 45% mixed REE and that the per kg production of refined RE oxides from the ion adsorption clays contain 0.002 kg lutetium oxide.
  property neodymium content 0.0992702
    The calculation of the individual rare earth element (REE) content of the carbonate concentrate is based on the fact that the concentrate contains 45% mixed REE and that the per kg production of refined RE oxides from the ion adsorption clays contain 0.2206 kg neodymium oxide.
  property praseodymium content 0.02728
    The calculation of the individual rare earth element (REE) content of the carbonate concentrate is based on the fact that the concentrate contains 45% mixed REE and that the per kg production of refined RE oxides from the ion adsorption clays contain 0.0606 kg praseodymium oxide.
  property samarium content 0.0216019
    The calculation of the individual rare earth element (REE) content of the carbonate concentrate is based on the fact that the concentrate contains 45% mixed REE and that the per kg production of refined RE oxides from the ion adsorption clays contain 0.048 kg samarium oxide.
  property terbium content 0.00269903
    The calculation of the individual rare earth element (REE) content of the carbonate concentrate is based on the fact that the concentrate contains 45% mixed REE and that the per kg production of refined RE oxides from the ion adsorption clays contain 0.006 kg terbium oxide.
  property thulium content 0.000898067
    The calculation of the individual rare earth element (REE) content of the carbonate concentrate is based on the fact that the concentrate contains 45% mixed REE and that the per kg production of refined RE oxides from the ion adsorption clays contain 0.002 kg thulium oxide.
  property ytterbium content 0.00802466
    The calculation of the individual rare earth element (REE) content of the carbonate concentrate is based on the fact that the concentrate contains 45% mixed REE and that the per kg production of refined RE oxides from the ion adsorption clays contain 0.0178 kg ytterbium oxide.
  property yttrium content 0.10252
    The calculation of the individual rare earth element (REE) content of the carbonate concentrate is based on the fact that the concentrate contains 45% mixed REE and that the per kg production of refined RE oxides from the ion adsorption clays contain 0.2278 kg yttrium oxide.
  properties: carbon allocation 0 kg, carbon content 0, carbon content, fossil 0, carbon content, non-fossil 0, dry mass 1 kg, price 0.103 EUR2005, water content 0, water in wet mass 0 kg, wet mass 1 kg

## Inputs from technosphere
- ammonium bicarbonate: 2.61025, 0.54986 kg (2 suppliers, which the file names only by identifier); sum of these 3.16011 kg; lognormal variance with pedigree 0.0052, pedigree (2,1,3,5,1)
  Value taken from the critical materials life cycle assessment tool (CMLCAT) of Arshi et al. (2018), provided by F. Zhao from Purdue university (more information on the sampling procedure) and corresponds to the production of 1 kg of rare earth carbonate concentrate.
  properties: carbon content, fossil 0.151899, dry mass 1 kg, heating value, net 12.27 MJ, wet mass 1 kg
- ammonium sulfate: 5.58846, 1.71491 kg (2 suppliers, which the file names only by identifier); sum of these 7.30337 kg; lognormal variance with pedigree 0.0052, pedigree (2,1,3,5,1)
  (same comment as for ammonium bicarbonate)
  properties: dry mass 1 kg, wet mass 1 kg
- citric acid: 1.05337 kg; lognormal variance with pedigree 0.0052, pedigree (2,1,3,5,1)
  (same comment as for ammonium bicarbonate)
  properties: carbon content, fossil 0.375099, dry mass 1 kg, heating value, net 16.41 MJ, wet mass 1 kg
- electricity, medium voltage: 0.00484406, 0.000430839, 0.0375645, 0.0492246, 0.0521291, 0.026552, 0.00366723, 0.0232109, 0.00097979, 0.156869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 kWh (47 suppliers, which the file names only by identifier); sum of these 3.72191 kWh; lognormal variance with pedigree 0.0052, pedigree (2,1,3,5,1)
  (same comment as for ammonium bicarbonate)
- excavation, hydraulic digger: 0.842697 m3; lognormal variance with pedigree 0.1246, pedigree (2,1,3,5,1)
  (same comment as for ammonium bicarbonate)
- extrusion, plastic pipes: 0.0744382 kg; lognormal variance with pedigree 0.0052, pedigree (2,1,3,5,1)
  (same comment as for ammonium bicarbonate)
- limestone, crushed, for mill: 0.00416118, 3.56234e-5, 1.66838e-5 kg (3 suppliers, which the file names only by identifier); sum of these 0.00421348 kg; lognormal variance with pedigree 0.0052, pedigree (2,1,3,5,1)
  (same comment as for ammonium bicarbonate)
  properties: carbon content, fossil 0.117492, dry mass 0.998 kg, water content 0.00200401, wet mass 1 kg
- mine infrastructure, iron: 4e-12 unit; lognormal variance with pedigree 0.3346, pedigree (2,1,3,5,1)
  Input assumed for completeness purposes. Value taken from the existing dataset ''rare earth concentrate production, 70% REO, from bastnäsite, CN'' from the 3.6 version of the Ecoinvent database.
- non-sulfidic overburden, off-site: -2502.36 kg; lognormal variance with pedigree 0.0032, pedigree (2,1,1,5,1)
  Value calculated from simplified mass balance and assumed here for completeness purposes. The value was not con-tained originally in the critical materials life cycle assessment tool (CMLCAT) of Arshi et al. (2018), provided by F. Zhao from Purdue university.
  production volume; = Ref('ae0b1607-495f-4d52-9034-b61427dd35d1', 'ProductionVolume') * (Ref('863daaa1-9585-48f6-b1f5-c2b82f8847af') / Ref('ae0b1607-495f-4d52-9034-b61427dd35d1'))
    Calculated from production volume of reference product using the relative outputs.
  properties: carbon content, fossil 0.000360784, dry mass 1 kg, wet mass 1 kg
- polyvinylchloride, suspension polymerised: 0.0702247 kg; lognormal variance with pedigree 0.0052, pedigree (2,1,3,5,1)
  (same comment as for ammonium bicarbonate)
  properties: carbon content, fossil 0.387097, dry mass 1 kg, heating value, net 21.5 MJ, wet mass 1 kg
- recultivation, iron mine: 8.16e-6 m2; lognormal variance with pedigree 0.0346, pedigree (2,1,3,5,1)
  (same comment as for mine infrastructure, iron)
- sulfuric acid: 0.465765, 0.0609204 kg (2 suppliers, which the file names only by identifier); sum of these 0.526685 kg; lognormal variance with pedigree 0.0052, pedigree (2,1,3,5,1)
  (same comment as for ammonium bicarbonate)
  properties: dry mass 1 kg, wet mass 1 kg
- wastewater, average: -0.00338081, -0.562582, -0.134525, -0.00200301 m3 (4 suppliers, which the file names only by identifier); sum of these -0.702491 m3; lognormal variance with pedigree 0.0032, pedigree (2,1,1,5,1)
  (same comment as for non-sulfidic overburden, off-site)
  production volume; = Ref('ae0b1607-495f-4d52-9034-b61427dd35d1', 'ProductionVolume') * (Ref('906f32b1-a3fc-4a58-9991-680bf928daec') / Ref('ae0b1607-495f-4d52-9034-b61427dd35d1'))
    Calculated from production volume of reference product using the relative outputs.
  properties: carbon content, non-fossil 0.194039, dry mass 0.346837 kg, water content 2882.2, wet mass 1000 kg
  note on carbon content, non-fossil: 0.0673 kg TOC/m3 (Tab A.17, ecoinvent v2.2 report 13_I). TOC was considered as Total Carbon.
- water, deionised: 165.238, 0.594816, 536.414 kg (3 suppliers, which the file names only by identifier); sum of these 702.247 kg; lognormal variance with pedigree 0.0052, pedigree (2,1,3,5,1)
  (same comment as for ammonium bicarbonate)
  properties: wet mass 1 kg

## Inputs from nature
- Clay, unspecified [natural resource, in ground]: 2500 kg; lognormal variance with pedigree 0.0052, pedigree (2,1,3,5,1)
  Ion adsorption clays contain 0.04% - 0.25% rare earth oxides (REOs). Estimation of the amount of clay extracted from the grade is based on 0.04% REO concentration. Value taken from the publication, on which this dataset is based (more information on sampling procedure).
- Occupation, mineral extraction site [natural resource, land]: 0.000576 m2*year; lognormal variance with pedigree 0.0446, pedigree (2,1,3,5,1)
  (same comment as for mine infrastructure, iron)
- Transformation, from unspecified [natural resource, land]: 1.02e-5 m2; lognormal variance with pedigree 0.1246, pedigree (2,1,3,5,1)
  (same comment as for mine infrastructure, iron)
- Transformation, to mineral extraction site [natural resource, land]: 1.02e-5 m2; lognormal variance with pedigree 0.1246, pedigree (2,1,3,5,1)
  (same comment as for mine infrastructure, iron)

## Emissions to nature
- Ammonium [water, ground-]: 0.238764 kg; lognormal variance with pedigree 0.0446, pedigree (2,1,3,5,1)
  (same comment as for ammonium bicarbonate)
- Ammonium [water, surface water]: 2.45787 kg; lognormal variance with pedigree 0.0446, pedigree (2,1,3,5,1)
  (same comment as for ammonium bicarbonate)
- Sulfate [water, unspecified]: 5.81461 kg; lognormal variance with pedigree 0.0446, pedigree (2,1,3,5,1)
  (same comment as for ammonium bicarbonate)

## Sampling procedure
This dataset is based on the following publication: Arshi, P. S., Vahidi, E., & Zhao, F. (2018). Behind the Scenes of Clean Energy: The Environmental Footprint of Rare Earth Products. ACS Sustainable Chemistry & Engineering, 6(3), 3311-3320. doi:10.1021/acssuschemeng.7b03484.
All exchanges from/ to the environment and from/to the technosphere were calculated using the critical materials life cycle assessment tool (CMLCAT) of Arshi et al. (2018), provided by F. Zhao from Purdue university. This excel-based software acts as a supporting tool to the abovementioned publication. Individual exchanges such as sulfidic tailings and wastewater which were not contained in the original datasets have been added for completness purposes and their calculation is based on mass balance.

## Extrapolations
This dataset has been copied from an original dataset covering the geography CN. The uncertainty has been adjusted accordingly. China dominates the market for rare earth element production (81.4% according to USGS minerals yearbook 2016).
