# purse seiner construction, steel

Dataset: EcoSpold 2, unit process
Geography: RoW
Time period: 2010-01-01 to 2023-12-31
Technology level: current
Classification: ISIC rev.4 ecoinvent: 0311:Marine fishing
Scenario: Business-as-Usual
System model: Allocation, cut-off by classification
Generated by: Angel Avadí
Published in: Avadí, A. 2018
Database: ecoinvent
isCopyrightProtected: true
accessRestrictedTo: 1

## General comment
This dataset represents the construction of steel purse seiners, per 1000 kg of light ship weight, based on data from Peru and Ecuador, corresponding to 143+12 vessels for which data was avilable with different levels of detail. Specific data for specific inventory items may be based on sub-samples for which detailed data was available. Vessel dimensions, landings and fuel use were available for roughly 661 purse seiners.
System boundaries and relation between activities

## Included activities start
Construction of vessels, including provision of all materials and work

## Included activities end
Batteries are excluded, as they do not exist in the database

## Geography
Data from Peru and Ecuador, extrapolated to global (GLO)

## Technology
Peru features various shipyards and relevant ship-building and ship-retrofitting expertise.

## Reference product
- purse seiner, steel: 1 kg; name LSW; = hull+structure+copper+nylon+poly+lead+engine*1000+motors*1000+paint; source Pierre Fréon 2014; By-product classification allocatable product; CPC 49315: Fishing vessels; factory ships and other vessels for processing or preserving fishery products; HS2017 890200: Fishing vessels, factory ships and other vessels; for processing or preserving fishery products
  Construction of a steel purse seiner, per 1000 kg of light ship weight (LSW). Regressions based on mainly primary data were created to relate the weight of each inventory item to a purse seiner's LSW. The list of inventory items (granularity) contribute >95% of environmental impacts, as described in the reference publication.
  production volume 0.912835 kg; name prod_vol
    Unquantifiable
  property lifetime 35 year; name LSW_lifetime
  property lifetime capacity [h] 56000 hour; name LSW_lifetime_capacity_PMH; = 8*200*LSW_lifetime
    8 h/d times 200 d/y times lifetime
  property price 0.600938 EUR2005
    Calculated based on inputs: The price of the product has been calculated as a sum of the values of the material and energy inputs for this product. This value is therefore a rough estimation. It may underestimate the real price since there are additional expenses when producing any product. These expences can include for example labour costs, treatment of waste materials and profit for the producer. Please consider carefully whether this level of data quality is acceptable for your application.
  properties: carbon allocation 0 kg, carbon content 0

## Inputs from technosphere
All rows: source Pierre Fréon 2014
- alkyd paint, white, without solvent, in 60% solution state: 0.00321446 kg; triangular min 0.00318715, mostLikely 0.00318715, max 0.00326908, pedigree (2,5,4,5,2)
  Paint and antifouling paint
  Uncertainty: Data from 143 vessels
  properties: carbon content, fossil 0.140367, carbon content, non-fossil 0.199629, dry mass 1 kg, heating value, net 10.3 MJ, wet mass 1 kg
  note on carbon content, fossil: C content was calculated as an addition of C content in the raw materials.
- alkyd paint, white, without solvent, in 60% solution state: 0.000677138 kg; triangular min 0.000671385, mostLikely 0.000671385, max 0.000688644, pedigree (2,5,4,5,2)
  Paint and antifouling paint
  Uncertainty: Data from 143 vessels
- copper, cathode: 0.00570234 kg; = copper
  Copper for electric circuit construction, 50% recycled
  properties: dry mass 1 kg, wet mass 1 kg
- lead: 0.0163067 kg; triangular min 0.0119045, mostLikely 0.0151596, max 0.0218559, pedigree (2,3,2,5,1)
  Fishing net construction
  Uncertainty: Data from 27 vessels
  properties: dry mass 1 kg, wet mass 1 kg
- marine electric motor: 1.20049e-6 unit; name motors; triangular min 8.52981e-7, mostLikely 1.13731e-6, max 1.61119e-6, pedigree (2,5,4,5,2)
  Electric motors and pumps
  Uncertainty: Data from 143 vessels
  property lifetime 10 year; name motors_lifetime
  property lifetime capacity [h] 20000 hour; name motors_lifetime_capacity_PMH
- marine engine: 2.73112e-5 unit; name engine; triangular min 2.42144e-5, mostLikely 2.69818e-5, max 3.07375e-5, pedigree (2,5,4,5,2)
  Marine diesel engine
  Uncertainty: Data from 143 vessels
  property lifetime 15 year; name engine_lifetime
  property lifetime capacity [h] 8000 hour; name engine_lifetime_capacity_PMH
- metal working, average for steel product manufacturing: 0.132054 kg; = structure
  Steel hull + transmission construction, structural elements
- nylon 6-6: 0.0441321 kg; triangular min 0.0323538, mostLikely 0.0409236, max 0.0591187, pedigree (2,3,2,5,1)
  Fishing net construction
  Uncertainty: Data from 27 vessels
  properties: carbon content, fossil 0.637168, dry mass 1 kg, heating value, net 30.9 MJ, wet mass 1 kg
  note on heating value, net: Assumed equal to Nylon-66. Reference: Walters, R. N., Hackett, S. M. and Lyon, R. E. (2000) ‘Heats of combustion of high temperature polymers’, Fire and Materials, 24(5), pp. 245–252. doi: 10.1002/1099-1018(200009/10)24:5<245::AID-FAM744>3.0.CO;2-7.
- nylon 6-6: 0.021795 kg; triangular min 0.0159782, mostLikely 0.0202104, max 0.0291963, pedigree (2,3,2,5,1)
  Fishing net construction
  Uncertainty: Data from 27 vessels
- polyethylene, low density, granulate: 0.0213087 kg; name poly; triangular min 0.0156573, mostLikely 0.0197337, max 0.0285352, pedigree (2,3,2,5,1)
  Fishing net construction
  Uncertainty: Data from 27 vessels
  properties: carbon content, fossil 0.857143, dry mass 1 kg, heating value, net 42.47 MJ, wet mass 1 kg
- steel, low-alloyed: 0.132054 kg; name structure; triangular min 0.0700903, mostLikely 0.134086, max 0.191986, pedigree (2,3,2,5,1)
  Steel hull + transmission construction, structural elements
  Uncertainty: Data from 143 vessels
  properties: carbon content, fossil 0.005, dry mass 1 kg, wet mass 1 kg
- steel, low-alloyed, hot rolled: 0.726298 kg; name hull; triangular min 0.704105, mostLikely 0.73235, max 0.742438, pedigree (2,3,2,5,1)
  Steel hull + auxiliary skiff construction, sheets
  Uncertainty: Data from 143 vessels
  properties: carbon content, fossil 0.005, dry mass 1 kg, wet mass 1 kg
  note on carbon content, fossil: Low alloyed steel composition given in Tab. 3.2 ecoinvent v2.2 report 10_partII. Steel assumed to have a C content of 0.5%
- used purse seiner, steel: -1 kg; name EOL; = LSW
  EOL of a steel purse seiner, per 1000 kg of light ship weight (LSW), at the end of its lifetime. Regressions based on mainly primary data were created to relate the weight of each inventory item to a purse seiner's LSW. The list of inventory items (granularity) contribute >95% of environmental impacts, as described in the reference publication. Includes engines and motors
  production volume; = ABS(prod_vol*EOL/LSW)
    Calculated from production volume of reference product using the relative outputs.
  property carbon content, fossil 0.0648147; name EOL_C_content_fossil; = 0.005*91.3%+0.63717*6.6%+0.85714*2.1%+0.14037*0.14%
  property carbon content, non-fossil 0.000776561; name EOL_C_content_non_fossil; = 0.19963*0.389%
  property dry mass 1 kg; name EOL_DM
  property water content 0; name EOL_water_content
  property water in wet mass 0 kg; name EOL_WWM
  property wet mass 1 kg; name EOL_WM
  note on carbon content, fossil: Calculated from the fossil carbon content of the hull and gear materials, multiplied by their relative proportions
  note on carbon content, non-fossil: Calculated from the fossil carbon content of thepaint, multiplied by its relative proportion
- wire drawing, copper: 0.00570234 kg; name copper; triangular min 0.00264883, mostLikely 0.00629097, max 0.00816722, pedigree (2,3,3,5,2)
  Manufacture of copper wire
  Uncertainty: Based on 8 different estimations based on reports, shipyard work orders, invoices, etc.
