# sodium bicarbonate, to generic market for neutralising agent

Dataset: EcoSpold 2, unit process
Geography: RER
Time period: 1999-01-01 to 2023-12-31
Technology level: current
Classification: EcoSpold01Categories: chemicals/inorganics
Classification: ISIC rev.4 ecoinvent: 2011:Manufacture of basic chemicals
Synonyms: Bicarbonate; Sodium Hydrogen Carbonate; Sodium; Hydrogen Carbonate; Carbonic Acid Monosodium Salt; Baking Soda
Scenario: Business-as-Usual
System model: Allocation, cut-off by classification
Generated by: Daria Dellenbach
Database: ecoinvent
isCopyrightProtected: true
accessRestrictedTo: 1

## General comment
This is a linking activity which links the product sodium bicarbonate to the generic market for neutralising agents. All chemicals that enter this market provide the function of neutralising agents.

## Included activities start
Activity starting with the reception of sodium bicarbonate

## Included activities end
Activity ends with the proper conversion of sodium bicarboante to neutralising agent in NaOH-equivalents.

## Geography
based on geographical validity of dataset soda production, solvay process

## Technology
based on techmology validity of dataset soda production, solvay process

## Time period
based on temporal validity of dataset soda production, solvay process

## Reference product
- neutralising agent, sodium hydroxide-equivalent: 1 kg; name neutralising_agent_output; By-product classification allocatable product; CPC 34231: Chemical elements n.e.c.; inorganic acids except phosphoric, nitric and sulphonitric; inorganic oxygen compoun[…]; HS2017 28: Inorganic chemicals; organic and inorganic compounds of precious metals; of rare earth metals, of radio-active [...]
  production volume 1.96e7 kg; = 2E09*0.05*0.196
    Estimated value. Total amount of sodium bicarbonate produced in the world is 2 million tonnes (OECD SIDS 2002). The main production route of sodium bicarbonate is the Solvay process, followed by the other commercially available process, Trona ore mining. Sodium bicarbonate is used in a number of industries, it is used in cooking, commonly reffered to as baking soda, as a neutralising agent and in the medical industry. According to IHS Markit (2016) the main industries where sodium bicarbonate is used are, in order, animal feed, food, flue gas treatment, personal care/pharmaceuticals, detergents/cleaning agents, hemodialysis, chemicals and other uses. Based on the graph reportes in IHS Markit (2016), we here assume that 5% of sodium bicarboante is used as neutralising agent.
    This amount is multiplied with the Euopean share of the Global GDP, 19.6% (2015-2019).
    References:
    OECD SIDS, 2002. SODIUM BICARBONATE CAS N°: 144-55-8. Retrieved from: http://www.inchem.org/documents/sids/sids/sodbicarb.pdf, accessed 29 March 2018
    IHS Markit, 2016. Sodium Bicarbonate. Retrieved from: https://ihsmarkit.com/products/sodium-bicarbonate-chemical-economics-handbook.html, accessed 29 March 2018
    World bank (2022): GDP, available here: https://data.worldbank.org/indicator/NY.GDP.MKTP.PP.KD, accessed 17-05-2022.
  property price 0.376 EUR2005
    Calculated value based on data from United Nations Commodity Trade Statistics Database (comtrade.un.org). UN comtrade category: 281511 Sodium hydroxide (caustic soda) solid. Year 2005. Using exchange rate of 1EURO = 1.209 USD. Average of price of import into 5 main markets (EU, US, JP, IN and CN).
  properties: carbon allocation 0 kg, carbon content 0, carbon content, fossil 0, carbon content, non-fossil 0, dry mass 1 kg, water content 0, water in wet mass 0 kg, wet mass 1 kg

## Inputs from technosphere
- sodium bicarbonate: 2.10032 kg; name NaHCO3; = 0.0840066/0.039997; lognormal variance with pedigree 0.2106, pedigree (5,5,5,5,5)
  For neutralisation purposes, it is considered that 1 mole of NaHCO3 can substitute 1 mole of NaOH for neutralisation purposes. The molar mass if NaHCO3 is 84.0066 g/mol, the molar mass of NaOH is 39.997.
  property carbon content, fossil 0; name NaHCO3_C_content_fossil
  property carbon content, non-fossil 0.012011; name NaHCO3_C_content_non_fossil
  property dry mass 1 kg; name NaHCO3_DM
  property water content 0; name NaHCO3_water_content
  property water in wet mass 0 kg; name NaHCO3_WWM
  property wet mass 1 kg; name NaHCO3_WM
  properties: heating value, net 5.77 MJ
