# electricity production, coal, aluminium industry

Dataset: EcoSpold 2, unit process
Geography: IAI Area, Russia & RER w/o EU27 & EFTA
Time period: 2015-01-01 to 2023-12-31
Technology level: current
Classification: EcoSpold01Categories: hard coal/power plants
Classification: ISIC rev.4 ecoinvent: 3510:Electric power generation, transmission and distribution
Tags: re-labelling activity; electricity, primary aluminium industry
Scenario: Business-as-Usual
System model: Allocation, cut-off by classification
Generated by: Djibril RENE
Database: ecoinvent
isCopyrightProtected: true
accessRestrictedTo: 1

## General comment
This is a dataset used to create an aluminium industry specific electricity market for European aluminium producing countries outside the region covered by the European Aluminium Association (EAA), i.e. outside EU27 and EFTA. The actual countries covered by this region are Russia, Montenegro and Bosnia and Herzegovina. The production volume represents the total amount of electricity from coal used in the region for aluminium production (electrolysis and ingot casting). The dataset also identifies the technology and country providing the coal-based electricity in the region.
Electricity markets specific to the aluminium-industry are needed in an LCI database because primary aluminium production is very energy intensive, and hence the location of production plants is often determined by access to large amounts of cheap electricity, which often results in an electricity mix that is different from the general grid mix of the countries where the production plants are located.
It is assumed that the production of electricity in general and in aluminium industry specific power plants is identical. Details on actual electricity generation with each technology can be found in the corresponding datasets.
The share of electricity produced using lignite and hard coal is calculated using both (1) estimates of the share of coal electricity coming from each country within the region 'Europe outside EU27 and EFTA'; and (2) ecoinvent v3.2 country-specific split of coal power plants between hard coal and lignite. The share of coal electricity in each country was calculated by distributing the total coal electricity used in aluminium production in the region (based on International Aluminium Institute [IAI] data for Europe as a whole and European Aluminium Agency data for EU27 and EFTA countries). The distribution is weighted by country-specific aluminium production volumes (source: IAI personal communication) and general grid mix in the respective countries (source: International Energy Agency). For ME, coal-based electricity is assumed to be 78% hard coal, 22% lignite (based on 'rest of world' data, i.e. on data representing all regions not covered in ecoinvent v3.2).
Calculations are detailed in the report 'Calculating grid mixes for the aluminium industry in ecoinvent v3', available on the ecoinvent website.

## Included activities start
Re-labelling dataset, not representing a real transformation activity. Conceptually, the activity can be said to start with the production of electricity.

## Included activities end
Re-labelling dataset, not representing a real transformation activity. Conceptually, the activity can be said to end with a given amount of high voltage electricity labelled as specifically used for the production of electricity.

## Time period
Production volume updated with 2015 data from IAI

## Reference product
- electricity, high voltage, aluminium industry: 1 kWh; = hard_RU+ hard_ROW+lig_BA+lig_RU+lig_ROW; By-product classification allocatable product; CPC 17100: Electrical energy; HS2017 271600: Electrical energy
  Expressed as sum of contributing technologies (inputs) to allow uncertainty analysis: each technology share is uncertain, and in a Monte Carlo analysis will always be normalized by the sum contribution of each technology
  production volume 1.55e9 kWh
    The production volume, which is ultimately used to determine the share of coal-based electricity in the downstream market for aluminium industry specific high voltage electricity, is calculated by multiplying the following data:
    (1) average electricity mix used to produce aluminium in the European aluminium producing countries outside the region covered by the European Aluminium Association (EU27+EFTA), made up of Russia, Montenegro and Bosnia and Herzegovina, based on the subtraction from European data from International Aluminium Institute of the EU27+EFTA data (from European Aluminium Association and validated by International Aluminium Institute).
    (2) primary aluminium production volumes of each aluminium producing country in the region, provided by International Aluminium Institute.
    (3) global average electricity requirements, per tonne primary aluminium, for both Söderberg and prebake electrolysis technologies, as well as the region specific proportion of aluminium produced by each technology.
    (4) electricity compensating line and transformation losses from production to consumption as medium voltage electricity. Losses estimated using country-level ecoinvent v3.2 data for RU and BA. Global average was used for ME.
    (5) electricity consumed in ingot casting.
  property price 0.0977 EUR2005
    Calculated in temporary price data. 94% of the average price (to account for a 6% loss in transformation and transmission) for electricity for industrial consumersin 2005 (excluded taxes). From IEA.
  properties: carbon allocation 0 kg, carbon content 0

## Inputs from technosphere
- electricity, high voltage: 0.037861 kWh; name hard_RoW; lognormal variance with pedigree 0.0252, pedigree (4,5,4,1,2)
  Calculated amount (see general comments). Activity link to GLO due to the electricity production of some aluminium producing countries not being modeled in ecoinvent, see general comments.
- electricity, high voltage: 0.0109389 kWh; name lig_RoW; lognormal variance with pedigree 0.0252, pedigree (4,5,4,1,2)
  (same comment as for electricity, high voltage)
- electricity, high voltage: 0.530425 kWh; name hard_RU; lognormal variance with pedigree 0.0113, pedigree (3,2,4,1,2)
  Calculated amount (see general comments).
- electricity, high voltage: 0.119873 kWh; name lig_BA; lognormal variance with pedigree 0.0113, pedigree (3,2,4,1,2)
  Calculated amount (see general comments).
- electricity, high voltage: 0.300902 kWh; name lig_RU; lognormal variance with pedigree 0.0113, pedigree (3,2,4,1,2)
  Calculated amount (see general comments).

## Sampling procedure
International Aluminium Institute (IAI) data used for total electricity used in the production of aluminium that is from coal power plants. ecoinvent data used to split coal-based electricity production to the respective fuels (lignite, hard coal). The cited 97% representativeness is for IAI data (data based on 97% of regional aluminium production). The percent representativeness of data used to split coal based electricity production to different types of fuels (national grid proxy) is 95%. 5% of coal-based electricity is from Montenegro whose electricity production is not modelled in ecoinvent.

## Extrapolations
For the split of coal-based electricity production to the respective fuels (lignite, hard coal), shares of different types of coal power plants in the countries, when available, were used as a proxy for the split relevant for the aluminium industry, else 'Rest-of-world' split (33% lignite, 67% hard coal) was used, see general comments.
