# heat production, at hard coal industrial furnace 1-10MW

Dataset: EcoSpold 2, unit process
Geography: CA-QC
Time period: 1995-01-01 to 2023-12-31
Technology level: current
Classification: ISIC rev.4 ecoinvent: 3530:Steam and air conditioning supply
Classification: EcoSpold01Categories: hard coal/heating systems
Tags: Recontextualization
Scenario: Business-as-Usual
System model: Allocation, cut-off by classification
Generated by: Pablo Tirado
Published in: Röder, A. 2004
Database: ecoinvent
isCopyrightProtected: true
accessRestrictedTo: 1

## General comment
This dataset represents the production of heat from hard coal in Quebec.This is an adaptation for Quebec from the hard coal global dataset. Only time period, annual production volume and heating value have been modified. Uncertainties have been adjusted accordingly.
The stoker boiler is assumed to fire egg coal with quality between long-flame coal and fat coal. The heating value (28.9 MJ/kg) and the composition of the coal are average values available from the literature. The emission data are also taken from literature reporting measurements performed at the end of the 1980s in Germany. Size distribution of particles has been estimated on the basis of recent information from EPA. Emissions of trace elements were calculated using the ash content in the coal and average transfer coefficients for coal power plants with ash retention of 98 %, as first approximation. With the assumption that coal is stored in a dry storage, no leaching is considered. Possible emissions to water during operation of the boiler are not included for missing information.

## Included activities start
Activity starts with the combustion of the fuel.

## Included activities end
This activity ends with 1MJ of heat produced by the furnace.
This dataset includes:

-fuel inputs;
-emissions due to combustion of fuel;
-inputs needed for combustion (electricity);
-by-products of combustion
-infrastructures

## Geography
Quebec dataset based on Global dataset, which was itself based on german conditions. Uncertainty has been modified accordingly

## Technology
Average used in early 1990s. Stoker boiler used as reference technology. Uncertainty has been modified accordingly

## Time period
Adapted from 1990's conditions and considered valid until 2015. Uncertainty has been modified accordingly

## Parameters
- annual fuel consumption in kg: 4.69e8 kg; name annualFuelConsumptionKg; lognormal variance with pedigree 0.0012, pedigree (2,1,1,1,1)
  Data on fuel consumption of industrial sectors provided by the MDDEP (Quebec Ministry of Sustainable Development, Environment, Wildlife and Parks).
  Average of the period 2005-2009
  Uncertainty: Variance from default value table.
  DQP based on the quality of the data (primary data from Quebec gouvernment)
- fraction, process water, to air: 0.15 dimensionless; lognormal variance with pedigree 0.092025, pedigree (4,4,3,2,4)
- fraction, water, completely softened, to air: 0.15 dimensionless; lognormal variance with pedigree 0.092025, pedigree (4,4,3,2,4)

## Reference product
- heat, district or industrial, other than natural gas: 1 MJ; By-product classification allocatable product; CPC 17300: Steam and hot water
  EcoSpold01Location=RER
  production volume 1.08439e10 MJ; name heat_apv; = annualFuelConsumptionKg/ hardCoalIn
    Literature/calculated value. Annual fuel consumption, in mass (statistics from Quebec), divided by the amount of fuel needed to produce 1MJ (this amount includes the efficiency of the process).
  property Corresponding fuel use 1.25 MJ
    This property represents the inverse of the efficiency of the boiler. It is calculated by dividing the lower heating value of the fuel input by the heat/electricity output.
  property price 0.0106 EUR2005
    Average European district heat price from Ecoheatcool and Euroheat 2005-2006, Ecoheat Work package 1: The European heat market. Final report. 10.6 EUR/GJ i s the price of district heat. http://www.solarthermalworld.org/files/Ecoheatcool%20WP1%20Web.pdf?download
  properties: carbon allocation 0 kg, carbon content 0, heating value, net 1 MJ

## Inputs from technosphere
- electricity, medium voltage: 0.005225 kWh; lognormal variance with pedigree 0.076, pedigree (4,5,5,5,3)
  EcoSpold01Location=UCTE
  Generic electricity consumption
  Uncertainty: Completeness, temporal, geographical and technological indicators adapted considering differences with original dataset.
- hard coal: 0.04325 kg; name hardCoalIn; lognormal variance with pedigree 0.076, pedigree (4,5,5,5,3)
  Fuel input
  EcoSpold01Location=UCTE
  Uncertainty: fuel input
  property heating value, net 28.9 MJ; name hardCoalIn_Net_Heat_Value_1
  property kgFuel_Input 0.04325 kg; name hardCoalIn_fuel_input_in_kg_1
  properties: carbon content, fossil 0.845, dry mass 0.94 kg, water content 0.0638298, wet mass 1 kg
  note on carbon content, fossil: C content 75-94% (specified in Tab 1.1, report 6, part VI). A mean content of 0.845 kg C/ kg dry hard coal was considered
  note on heating value, net: The heating value (28.9 MJ/kg) and the composition of the coal are average values available from the literature.
- hard coal ash: -0.003625 kg; name hard_coal_ash; source Röder, A. 2004; lognormal variance with pedigree 0.128, pedigree (5,5,5,5,3)
  Assumption: no reuse
  EcoSpold01Location=PL
  Uncertainty: Completeness, temporal, geographical and technological indicators adapted considering differences with original dataset.
  production volume; = hard_coal_ash*heat_apv
    Calculated from the production volume of hard coal, burned in industrial furnace 1-10MW in proportion to the respective output amounts.
  properties: dry mass 1 kg, wet mass 1 kg
- industrial furnace, coal, 1-10MW: 6.95e-10 unit; lognormal variance with pedigree 0.3686, pedigree (2,5,5,5,3)
  Infrastructure
  EcoSpold01Location=RER
  Uncertainty: Completeness, temporal, geographical and technological indicators adapted considering differences with original dataset.
- water, completely softened: 0.009375 kg; source Kamberger W. 1993; lognormal variance with pedigree 0.0786, pedigree (2,5,5,5,3)
  EcoSpold01Location=RER
  Estimation. It is assumed that 2% of the feed water is additionally required as decarbonised water (6t per TJin). For wet purification 1.5t per TJin of water is needed. Due to the lack of information the water used for cleaning can not be considered.
  Uncertainty: Completeness, temporal, geographical and technological indicators adapted considering differences with original dataset.
  properties: wet mass 1 kg

## Emissions to nature
All rows: source Röder, A. 2004
- Acetylene [air, urban air close to ground]: 6.25e-7 kg; lognormal variance with pedigree 0.1086, pedigree (2,5,5,5,3)
  Total NMVOC and profile estimate
  Uncertainty: Completeness, temporal, geographical and technological indicators adapted considering differences with original dataset.
- Aluminium III [air, urban air close to ground]: 1.3375e-5 kg; lognormal variance with pedigree 0.736, pedigree (4,5,5,5,3)
  From trace element balance; see report for details
  Uncertainty: Completeness, temporal, geographical and technological indicators adapted considering differences with original dataset.
- Antimony ion [air, urban air close to ground]: 1.975e-9 kg; lognormal variance with pedigree 0.736, pedigree (4,5,5,5,3)
  (same comment as for Aluminium III)
- Arsenic ion [air, urban air close to ground]: 3.1625e-8 kg; lognormal variance with pedigree 0.736, pedigree (4,5,5,5,3)
  From trace element balance; see report for details
  Uncertainty: from trace element balance; see report for details
- Barium II [air, urban air close to ground]: 1.575e-7 kg; lognormal variance with pedigree 0.736, pedigree (4,5,5,5,3)
  (same comment as for Aluminium III)
- Benzene [air, urban air close to ground]: 6.25e-7 kg; lognormal variance with pedigree 0.1086, pedigree (2,5,5,5,3)
  (same comment as for Acetylene)
- Benzo(a)pyrene [air, urban air close to ground]: 1.25e-11 kg; lognormal variance with pedigree 0.1086, pedigree (2,5,5,5,3)
  (same comment as for Acetylene)
- Beryllium II [air, urban air close to ground]: 1.575e-9 kg; lognormal variance with pedigree 0.1086, pedigree (2,5,5,5,3)
  (same comment as for Acetylene)
- Boron [air, urban air close to ground]: 5.925e-7 kg; lognormal variance with pedigree 0.736, pedigree (4,5,5,5,3)
  (same comment as for Aluminium III)
- Bromine [air, urban air close to ground]: 1.185e-8 kg; lognormal variance with pedigree 0.736, pedigree (4,5,5,5,3)
  (same comment as for Aluminium III)
- Cadmium II [air, urban air close to ground]: 1.975e-9 kg; lognormal variance with pedigree 0.736, pedigree (4,5,5,5,3)
  (same comment as for Aluminium III)
- Calcium II [air, urban air close to ground]: 1.575e-6 kg; lognormal variance with pedigree 0.736, pedigree (4,5,5,5,3)
  (same comment as for Aluminium III)
- Carbon dioxide, fossil [air, urban air close to ground]: 0.114375 kg; lognormal variance with pedigree 0.0586, pedigree (2,5,5,5,3)
  From carbon balance
  Uncertainty: Completeness, temporal, geographical and technological indicators adapted considering differences with original dataset.
- Carbon monoxide, fossil [air, urban air close to ground]: 0.000125 kg; lognormal variance with pedigree 0.7086, pedigree (2,5,5,5,3)
  Typical value
  Uncertainty: Completeness, temporal, geographical and technological indicators adapted considering differences with original dataset.
- Chromium III [air, urban air close to ground]: 2.8125e-8 kg; lognormal variance with pedigree 0.736, pedigree (4,5,5,5,3)
  (same comment as for Aluminium III)
- Chromium VI [air, urban air close to ground]: 3.475e-9 kg; lognormal variance with pedigree 0.538, pedigree (1,5,5,5,3)
  based on range of data
  Uncertainty: Completeness, temporal, geographical and technological indicators adapted considering differences with original dataset.
- Cobalt II [air, urban air close to ground]: 3.95e-9 kg; lognormal variance with pedigree 0.736, pedigree (4,5,5,5,3)
  (same comment as for Aluminium III)
- Copper ion [air, urban air close to ground]: 2.075e-8 kg; lognormal variance with pedigree 0.736, pedigree (4,5,5,5,3)
  (same comment as for Aluminium III)
- Dinitrogen monoxide [air, urban air close to ground]: 1.25e-6 kg; lognormal variance with pedigree 0.1086, pedigree (2,5,5,5,3)
  (same comment as for Carbon monoxide, fossil)
- Dioxins, measured as 2,3,7,8-tetrachlorodibenzo-p-dioxin [air, urban air close to ground]: 2.5e-14 kg; lognormal variance with pedigree 0.3686, pedigree (2,5,5,5,3)
  Uncertainty: Completeness, temporal, geographical and technological indicators adapted considering differences with original dataset.
- Ethane [air, urban air close to ground]: 1.875e-6 kg; lognormal variance with pedigree 0.1086, pedigree (2,5,5,5,3)
  (same comment as for Acetylene)
- Ethylene [air, urban air close to ground]: 3.75e-6 kg; lognormal variance with pedigree 0.1086, pedigree (2,5,5,5,3)
  (same comment as for Acetylene)
- Formaldehyde [air, urban air close to ground]: 1e-7 kg; lognormal variance with pedigree 0.1086, pedigree (2,5,5,5,3)
  (same comment as for Acetylene)
- Hydrocarbons, aliphatic, alkanes, unspecified [air, urban air close to ground]: 6.25e-7 kg; lognormal variance with pedigree 0.1086, pedigree (2,5,5,5,3)
  (same comment as for Acetylene)
- Hydrocarbons, aliphatic, unsaturated [air, urban air close to ground]: 6.25e-7 kg; lognormal variance with pedigree 0.1086, pedigree (2,5,5,5,3)
  (same comment as for Acetylene)
- Hydrochloric acid [air, urban air close to ground]: 5.0625e-5 kg; lognormal variance with pedigree 0.126, pedigree (4,5,5,5,3)
  (same comment as for Aluminium III)
- Hydrogen fluoride [air, urban air close to ground]: 1.575e-6 kg; lognormal variance with pedigree 0.126, pedigree (4,5,5,5,3)
  (same comment as for Aluminium III)
- Iodine [air, urban air close to ground]: 1.425e-8 kg; lognormal variance with pedigree 0.736, pedigree (4,5,5,5,3)
  (same comment as for Aluminium III)
- Iron ion [air, urban air close to ground]: 5.525e-6 kg; lognormal variance with pedigree 0.736, pedigree (4,5,5,5,3)
  (same comment as for Aluminium III)
- Lead II [air, urban air close to ground]: 9.475e-8 kg; lognormal variance with pedigree 0.736, pedigree (4,5,5,5,3)
  (same comment as for Aluminium III)
- Lead-210 [air, urban air close to ground]: 5.8125e-5 kBq; lognormal variance with pedigree 0.736, pedigree (4,5,5,5,3)
  From radioactivity of the elements; see report for details
  Uncertainty: Completeness, temporal, geographical and technological indicators adapted considering differences with original dataset.
- Magnesium [air, urban air close to ground]: 4.7375e-6 kg; lognormal variance with pedigree 0.736, pedigree (4,5,5,5,3)
  (same comment as for Aluminium III)
- Manganese II [air, urban air close to ground]: 2.7625e-8 kg; lognormal variance with pedigree 0.736, pedigree (4,5,5,5,3)
  (same comment as for Aluminium III)
- Mercury II [air, urban air close to ground]: 3.55e-9 kg; lognormal variance with pedigree 0.736, pedigree (4,5,5,5,3)
  (same comment as for Aluminium III)
- Methane, fossil [air, urban air close to ground]: 1.25e-5 kg; lognormal variance with pedigree 0.1086, pedigree (2,5,5,5,3)
  (same comment as for Carbon monoxide, fossil)
- Molybdenum VI [air, urban air close to ground]: 5.925e-9 kg; lognormal variance with pedigree 0.736, pedigree (4,5,5,5,3)
  (same comment as for Arsenic ion)
- NMVOC, non-methane volatile organic compounds [air, urban air close to ground]: 2.15e-6 kg; lognormal variance with pedigree 0.1086, pedigree (2,5,5,5,3)
  Total NMVOC and profile estimate
  Uncertainty: total NMVOC and profile estimate
- Nickel II [air, urban air close to ground]: 2.375e-8 kg; lognormal variance with pedigree 0.736, pedigree (4,5,5,5,3)
  (same comment as for Aluminium III)
- Nitrogen oxides [air, urban air close to ground]: 0.00025 kg; lognormal variance with pedigree 0.1086, pedigree (2,5,5,5,3)
  (same comment as for Carbon monoxide, fossil)
- Particulate Matter, < 2.5 um [air, urban air close to ground]: 2.5e-5 kg; lognormal variance with pedigree 0.386, pedigree (4,5,5,5,3)
  Total PM and profile estimates
  Uncertainty: Completeness, temporal, geographical and technological indicators adapted considering differences with original dataset.
- Particulate Matter, > 10 um [air, urban air close to ground]: 1.25e-5 kg; lognormal variance with pedigree 0.126, pedigree (4,5,5,5,3)
  (same comment as for Particulate Matter, < 2.5 um)
- Particulate Matter, > 2.5 um and < 10um [air, urban air close to ground]: 2.5e-5 kg; lognormal variance with pedigree 0.206, pedigree (4,5,5,5,3)
  (same comment as for Particulate Matter, < 2.5 um)
- Phosphorus [air, urban air close to ground]: 7.9e-8 kg; lognormal variance with pedigree 0.736, pedigree (4,5,5,5,3)
  (same comment as for Aluminium III)
- Polonium-210 [air, urban air close to ground]: 0.00010625 kBq; lognormal variance with pedigree 0.736, pedigree (4,5,5,5,3)
  (same comment as for Lead-210)
- Potassium I [air, urban air close to ground]: 1.575e-6 kg; lognormal variance with pedigree 0.736, pedigree (4,5,5,5,3)
  (same comment as for Aluminium III)
- Potassium-40 [air, urban air close to ground]: 1.6875e-5 kBq; lognormal variance with pedigree 0.736, pedigree (4,5,5,5,3)
  (same comment as for Lead-210)
- Propane [air, urban air close to ground]: 1.25e-6 kg; lognormal variance with pedigree 0.1086, pedigree (2,5,5,5,3)
  (same comment as for Acetylene)
- Propylene [air, urban air close to ground]: 6.25e-7 kg; lognormal variance with pedigree 0.1086, pedigree (2,5,5,5,3)
  (same comment as for Acetylene)
- Radium-226 [air, urban air close to ground]: 1.5e-5 kBq; lognormal variance with pedigree 0.736, pedigree (4,5,5,5,3)
  (same comment as for Lead-210)
- Radium-228 [air, urban air close to ground]: 8.125e-5 kBq; lognormal variance with pedigree 0.736, pedigree (4,5,5,5,3)
  (same comment as for Lead-210)
- Radon-220 [air, urban air close to ground]: 1.25e-6 kBq; lognormal variance with pedigree 0.736, pedigree (4,5,5,5,3)
  (same comment as for Lead-210)
- Radon-222 [air, urban air close to ground]: 1.25e-6 kBq; lognormal variance with pedigree 0.736, pedigree (4,5,5,5,3)
  (same comment as for Lead-210)
- Scandium [air, urban air close to ground]: 1.575e-9 kg; lognormal variance with pedigree 0.736, pedigree (4,5,5,5,3)
  (same comment as for Aluminium III)
- Selenium IV [air, urban air close to ground]: 1.185e-8 kg; lognormal variance with pedigree 0.736, pedigree (4,5,5,5,3)
  (same comment as for Aluminium III)
- Silicon [air, urban air close to ground]: 1.975e-5 kg; lognormal variance with pedigree 0.736, pedigree (4,5,5,5,3)
  (same comment as for Aluminium III)
- Sodium I [air, urban air close to ground]: 7.9e-7 kg; lognormal variance with pedigree 0.736, pedigree (4,5,5,5,3)
  (same comment as for Aluminium III)
- Strontium II [air, urban air close to ground]: 2.375e-7 kg; lognormal variance with pedigree 0.736, pedigree (4,5,5,5,3)
  (same comment as for Aluminium III)
- Sulfur dioxide [air, urban air close to ground]: 0.000625 kg; lognormal variance with pedigree 0.086, pedigree (4,5,5,5,3)
  From S-balance
  Uncertainty: Completeness, temporal, geographical and technological indicators adapted considering differences with original dataset.
- Thallium I [air, urban air close to ground]: 1.975e-9 kg; lognormal variance with pedigree 0.736, pedigree (4,5,5,5,3)
  (same comment as for Aluminium III)
- Thorium [air, urban air close to ground]: 2.375e-9 kg; lognormal variance with pedigree 0.736, pedigree (4,5,5,5,3)
  (same comment as for Aluminium III)
- Thorium-228 [air, urban air close to ground]: 6.875e-6 kBq; lognormal variance with pedigree 0.736, pedigree (4,5,5,5,3)
  (same comment as for Lead-210)
- Thorium-232 [air, urban air close to ground]: 4.375e-6 kBq; lognormal variance with pedigree 0.736, pedigree (4,5,5,5,3)
  (same comment as for Lead-210)
- Tin ion [air, urban air close to ground]: 7.9e-10 kg; lognormal variance with pedigree 0.736, pedigree (4,5,5,5,3)
  (same comment as for Aluminium III)
- Titanium ion [air, urban air close to ground]: 4.7375e-7 kg; lognormal variance with pedigree 0.736, pedigree (4,5,5,5,3)
  (same comment as for Aluminium III)
- Toluene [air, urban air close to ground]: 1.25e-7 kg; lognormal variance with pedigree 0.1086, pedigree (2,5,5,5,3)
  (same comment as for Acetylene)
- Uranium [air, urban air close to ground]: 3.1625e-9 kg; lognormal variance with pedigree 0.736, pedigree (4,5,5,5,3)
  (same comment as for Aluminium III)
- Uranium-238 [air, urban air close to ground]: 1.25e-5 kBq; lognormal variance with pedigree 0.736, pedigree (4,5,5,5,3)
  (same comment as for Lead-210)
- Vanadium V [air, urban air close to ground]: 4.7375e-8 kg; lognormal variance with pedigree 0.736, pedigree (4,5,5,5,3)
  (same comment as for Aluminium III)
- Water [air, unspecified]: 1.125e-6 m3; lognormal variance with pedigree 0.0986, pedigree (2,5,5,5,3)
  Calculated value based on literature values and expert opinion. See comments in the parametres' comment field.
  Uncertainty: Completeness, temporal, geographical and technological indicators adapted considering differences with original dataset.
- Xylenes, unspecified [air, urban air close to ground]: 1.25e-7 kg; lognormal variance with pedigree 0.1086, pedigree (2,5,5,5,3)
  Total NMVOC and profile estimate
  Uncertainty: total NMVOC and profile estimate
- Zinc II [air, urban air close to ground]: 3.95e-9 kg; lognormal variance with pedigree 0.736, pedigree (4,5,5,5,3)
  (same comment as for Aluminium III)
- Water [water, unspecified]: 6.375e-6 m3; lognormal variance with pedigree 0.0986, pedigree (2,5,5,5,3)
  (same comment as for Water)
  property carbon content, fossil 0; name C_content_fossil
  property carbon content, non-fossil 0; name C_content_non_fossil
  property dry mass 0 kg; name DM
  property water in wet mass 1000 kg; name WWM
  property wet mass 1000 kg; name WM

## Sampling procedure
literature

## Extrapolations
see Geography This dataset has been extrapolated from the corresponding global dataset, which was itself extrapolated from a dataset covering the geography RER. The uncertainty has been adjusted accordingly.

## Review by Christian Bauer 2013-10-11
passed
