# laser machining, metal, with YAG-laser, 60W power

Dataset: EcoSpold 2, unit process
Geography: RoW
Time period: 2006-01-01 to 2023-12-31
Technology level: current
Classification: EcoSpold01Categories: metals/chipless shaping
Classification: ISIC rev.4 ecoinvent: 2592:Treatment and coating of metals; machining
Tags: ConvertedDataset
Scenario: Business-as-Usual
System model: Allocation, cut-off by classification
Share of production covered: 0 %
Generated by: Roland Steiner
Published in: Steiner, R. 2007
Database: ecoinvent
isCopyrightProtected: true
accessRestrictedTo: 1

## General comment
The reference for laser machining is its operation at 100% power for 1 hour. It does not include the input of the material processed. This need to be added separately. The dataset can be used when metals are treated with a YAG laser of the capacity indicated. Factory infrastructure needs to be added. Data are based on manufacturers' data (weight and power consumption) and literature (air emissions).
[This dataset was already contained in the ecoinvent database version 2. It was not individually updated during the transfer to ecoinvent version 3. Life Cycle Impact Assessment results may still have changed, as they are affected by changes in the supply chain, i.e. in other datasets. This dataset was generated following the ecoinvent quality guidelines for version 2. It may have been subject to central changes described in the ecoinvent version 3 change report (http://www.ecoinvent.org/database/ecoinvent-version-3/reports-of-changes/), and the results of the central updates were reviewed extensively. The changes added e.g. consistent water flows and other information throughout the database. The documentation of this dataset can be found in the ecoinvent reports of version 2, which are still available via the ecoinvent website. The change report linked above covers all central changes that were made during the conversion process.]

## Included activities start
The activity starts with the workpiece entering the process. The material on which this activity is applied it is not included as input.

## Included activities end
This dataset includes work piece feeder, laser system, cooling and control system. Any additional equipment such as possibly necessary ventilation or additional security installations are not included. It includes the input of energy, of cooling water (where needed) and of the laser equipment. Further factory infrastructure (halls, buildings) are not included. The dataset includes process specific air emissions.

## Geography
Geographical coverage encompasses the industrialised countries.

## Technology
HL series of YAG Lasers and Lasma 584R processing machine

## Parameters
- fraction, process water, to air: 0.15 dimensionless; lognormal variance with pedigree 0.092025, pedigree (4,4,3,2,4)
- fraction, tap water, to air: 0.15 dimensionless; lognormal variance with pedigree 0.092025, pedigree (4,4,3,2,4)

## Reference product
- laser machining, metal, with YAG-laser, 60W power: 1 hour; By-product classification allocatable product; CPC 88731: Metal treatment and coating services
  EcoSpold01Location=RER
  production volume 2.65986 hour
    This is a placeholder value that does not reflect real-world production volumes. This dataset does not currently require a real-world production volume to work in the database framework, and no actual data were collected yet. This has no negative effect on the results of the ecoinvent database.
  property price 1.17831 EUR2005
    Calculated based on inputs: The price of the product has been calculated as a sum of the values of the material and energy inputs for this product. This value is therefore a rough estimation. It may underestimate the real price since there are additional expenses when producing any product. These expences can include for example labour costs, treatment of waste materials and profit for the producer. Please consider carefully whether this level of data quality is acceptable for your application.
  properties: carbon allocation 0 kg, carbon content 0

## Inputs from technosphere
- electricity, low voltage: 1.11977, 0.0112503, 0.176918, 3.67217, 0.362461, 0.0925457, 0.00225769, 0.062633 kWh (8 suppliers, which the file names only by identifier); sum of these 5.5 kWh; lognormal variance with pedigree 0.0526, pedigree (1,3,5,5,1)
  EcoSpold01Location=UCTE
  Manufacturer data
  Uncertainty: manufacturer data
- metal working machine, unspecified: 0.292 kg; lognormal variance with pedigree 0.4406, pedigree (4,3,5,5,4)
  Estimated
  EcoSpold01Location=RER
  Uncertainty: estimated
- tap water: 0.508795, 0.775615, 1.44726, 3.89881, 19.558, 223.812 kg (6 suppliers, which the file names only by identifier); sum of these 250 kg; lognormal variance with pedigree 0.0526, pedigree (1,3,5,5,1)
  Manufacturer data
  EcoSpold01Location=RER
  Uncertainty: manufacturer data
  properties: carbon content, fossil 0.00178991, dry mass 0.000337476 kg, water content 2962.17, wet mass 1 kg
  note on carbon content, fossil: Bicarbonate content is 2.93 mol/m3. CO2 content is 0.1 mol/m3 (ecoinvent v2.2 report 8, Tab 93.1).

## Emissions to nature
- Nitrogen oxides [air, urban air close to ground]: 2.87e-5 kg; lognormal variance with pedigree 0.1112, pedigree (2,3,5,5,3)
  Estimated air emissions
  Uncertainty: estimated air emissions
- Ozone [air, urban air close to ground]: 8.47e-6 kg; lognormal variance with pedigree 0.1112, pedigree (2,3,5,5,3)
  Estimated air emissions
  Uncertainty: estimated air emissions
- Particulate Matter, < 2.5 um [air, urban air close to ground]: 5.43e-6 kg; lognormal variance with pedigree 0.3712, pedigree (2,3,5,5,3)
  Estimated air emissions
  Uncertainty: estimated air emissions
- Water [air, unspecified]: 0.0375 m3; lognormal variance with pedigree 0.0827, pedigree (2,2,5,5,1)
  Calculated value based on literature values and expert opinion. See comments in the parametres' comment field.
- Water [water, unspecified]: 0.2125 m3; lognormal variance with pedigree 0.0827, pedigree (2,2,5,5,1)
  (same comment as for Water)
  property carbon content, fossil 0; name C_content_fossil
  property carbon content, non-fossil 0; name C_content_non_fossil
  property dry mass 0 kg; name DM
  property water in wet mass 1000 kg; name WWM
  property wet mass 1000 kg; name WM

## Extrapolations
none This dataset has been copied from an original dataset covering the geography RER. The uncertainty has been adjusted accordingly.

## Review by Sébastien Humbert 2007-09-05
passed
none
