# glass wool mat production, with phenolic binder, uncoated, Saint-Gobain ISOVER SA

Dataset: EcoSpold 2, unit process
Geography: CH
Time period: 2018-01-01 to 2023-12-31
Technology level: current
Classification: ISIC rev.4 ecoinvent: 2399:Manufacture of other non-metallic mineral products n.e.c.
Tags: branded dataset without logo
Scenario: Business-as-Usual
System model: Allocation, cut-off by classification
Share of production covered: 100 %
Generated by: Frank Werner
Database: ecoinvent
isCopyrightProtected: true
accessRestrictedTo: 1

## General comment
This dataset is provided by Saint-Gobain ISOVER SA, CH-1522 Lucens and represents a cradle-to-gate inventory of the average production of all glass woll mats, produced with phenol-based binder in 2018 per kg. The average density of an St. Gobain ISOVER SA glass wool mat is 25.00 kg/m3.
The following packaging per m3 is not included: corrugated board, mixed fibre, single wall: 7.44E-04 kg/m3; paper, wood containing, LWC: 2.39E-04 kg/m3: packaging film, LDPE: 2.25E-02 kg/m3; EUR-flat pallet: 4.17E-03 pce/m3
More information on the glass wool by St. Gobain ISOVER SA and their technical specifications can be found under http://www.isover.ch/

## Included activities start
Gate-to-gate inventory: the dataset starts at the factory gate with raw material aquisition and covers the whole prodcution process from mixing of raw materials, melting, fibre forming & collecting, hardening & curing and internal processes (preparation of binders, workshop, etc.). Further on, transportation of raw materials and energy carrier for furnace and infrastructure are included. The dataset does not contain packaging.

## Included activities end
Gate-to-gate inventory: the included activity ends before packaging the product, ready to be shipped. Treatment of waste flows from production are included via the respective datasets.

## Geography
Plant-specific data from Saint-Gobian ISOVER SA, CH-1522 Lucens.

## Technology
Glasswool is made from natural sand to which recycled glass (cullet) and fluxing agents are added. The material is melted to 1100°C in an electric furnace. The fibre is formed by centrifugation through drilled disks. Fiberising is integral. Binding products as well as elements specific to the usage are added and the wool mat is polymerised and rolled. The product is then packaged.

## Parameters
- fraction, process water, to air: 0.15 dimensionless; name fraction_PW_to_air; lognormal variance with pedigree 0.092025, pedigree (4,4,3,2,4)
  Literature value. In case when no industry/process specific data are available, default evaporation fraction value is used. This value is 15% and is based on literature (Statistics Canada, 2007 & Shaffer, K.H., 2008, Consumptive water use in the Great Lakes Basin, USGS & Shiklomanov, 2003, World Water Resources at the Beginning of the 21st Century) and has been approved by an expert.
- fraction, tap water, to air: 0.15 dimensionless; name fraction_TW_to_air; = fraction_PW_to_air; lognormal variance with pedigree 0.092025, pedigree (4,4,3,2,4)
  Calculated value. See comment in the other parametres present in this dataset. Tap water is considered to be always used as process water, thus process water fractions to air are applied to all tap water input flows to calculate the amount of water consumed in the processes.
- fraction, water, completely softened, to air: 0.15 dimensionless; name fraction_WCS_to_air; = fraction_PW_to_air; lognormal variance with pedigree 0.092025, pedigree (4,4,3,2,4)
  Calculated value. See comment in the other parametres present in this dataset. Water, completely softened is considered to be always used as process water, thus process water fractions to air are applied to all water, completely softened input flows to calculate the amount of water consumed in the processes.

## Reference product
- glass wool mat, uncoated, Saint-Gobain ISOVER SA: 1 kg; name RP; By-product classification allocatable product; CPC 37129: Voiles, webs, mats, mattresses, boards and other articles of glass fibres, except woven fabrics; HS2017 701911: Glass fibres; (including glass wool), chopped strands, of a length of not more than 50mm
  production volume 0.55 kg; name PV_RP
    Relative market share in the "market for glass wool mat, uncoated, Saint Gobain, ISOVER SA" in 2018.
    Representing 100% of production. Absolute production volume cannot be stated due to antitrust law.
  property heating value, net 0 MJ
    Non combustible products are assumed to have an LHV equal to zero (0).
  properties: carbon allocation 0.0579233 kg, carbon content 0.0579233, carbon content, fossil 0.053373, carbon content, non-fossil 0.0045503, dry mass 1 kg, price 1.77 EUR2005, water content 0, water in wet mass 0 kg, wet mass 1 kg

## Inputs from technosphere
All rows: source J.C Scherz, ISOVER S.A 2019
- ammonium sulfate: 0.00162475 kg; lognormal variance with pedigree 0.0026, pedigree (1,1,3,1,1)
  activity link set as transport is modelled with producer-specific transport distances and transport mean
  properties: dry mass 1 kg, wet mass 1 kg
- calcium nitrate: 0.00089 kg; lognormal variance with pedigree 0.0026, pedigree (1,1,3,1,1)
  calculated from the original input measured as N (molar mass of Ca(NO3)2 is 164 + tetrahydrate 72 per 2*14=28 mols of N)
  properties: dry mass 1 kg, wet mass 1 kg
- chemical, organic: 3.04527e-6 kg; lognormal variance with pedigree 0.0026, pedigree (1,1,3,1,1)
  (same comment as for ammonium sulfate)
  properties: carbon content, fossil 0.628, dry mass 1 kg, heating value, net 19.03 MJ, wet mass 1 kg
- diesel, burned in building machine: 0.0249352 MJ; lognormal variance with pedigree 0.0026, pedigree (1,1,3,1,1)
  internal transport
  properties: heating value, net 1 MJ
- electricity, medium voltage, renewable energy products: 1.59 kWh; lognormal variance with pedigree 0.0026, pedigree (1,1,3,1,1)
  electricity consumed during production
- fluorspar, 97% purity: 0.0703028 kg; lognormal variance with pedigree 0.0026, pedigree (1,1,3,1,1)
  (same comment as for ammonium sulfate)
  properties: dry mass 1 kg, wet mass 1 kg
- glass cullet, for Saint-Gobain ISOVER SA: 0.769217 kg; lognormal variance with pedigree 0.0026, pedigree (1,1,3,1,1)
  (same comment as for ammonium sulfate)
  properties: dry mass 1 kg, wet mass 1 kg
- heat, district or industrial, natural gas: 3.88551 MJ; lognormal variance with pedigree 0.0026, pedigree (1,1,3,1,1)
  Activity link set as heat generation unit is known
  properties: heating value, net 1 MJ
- iron-nickel-chromium alloy: 7.32368e-5 kg; lognormal variance with pedigree 0.0026, pedigree (1,1,3,1,1)
  Wearing parts; activity link set as transport is modelled with producer-specific transport distances and transport mean
  properties: dry mass 1 kg, wet mass 1 kg
- lubricating oil: 0.000596418 kg; lognormal variance with pedigree 0.0026, pedigree (1,1,3,1,1)
  (same comment as for ammonium sulfate)
  properties: carbon content, fossil 0.75, dry mass 1 kg, heating value, net 40.2 MJ, wet mass 1 kg
  note on heating value, net: Literature value, Source: IPCC 2006, 2006 IPCC Guidelines for National Greenhouse Gas Inventories, Prepared by the National Greenhouse Gas Inventories Programme, Eggleston H.S., Buendia L., Miwa K., Ngara T. and Tanabe K. (eds). Published: IGES, Japan
- manganese: 0.00643188 kg; lognormal variance with pedigree 0.0026, pedigree (1,1,3,1,1)
  (same comment as for ammonium sulfate)
  properties: dry mass 1 kg, wet mass 1 kg
- molasses, from sugar beet: 0.011493 kg; lognormal variance with pedigree 0.0026, pedigree (1,1,3,1,1)
  Activity link set as transport is modelled with producer-specific transport distances and transport mean. Originally reported as molasses. The destiny of the molasse is not known for certain, but it is assumed to form a complex polymer with the phenol resin and thus form a part of the product.
  properties: carbon content, non-fossil 0.39592, dry mass 0.82 kg, water content 0.219512, wet mass 1 kg
- molybdenum: 1.65e-5 kg; lognormal variance with pedigree 0.0026, pedigree (1,1,3,1,1)
  (same comment as for ammonium sulfate)
  properties: dry mass 1 kg, wet mass 1 kg
- municipal solid waste: -0.00150183 kg; name W_MSW; lognormal variance with pedigree 0.0006, pedigree (1,1,1,1,1)
  production volume; = PV_RP * (W_MSW / RP)
    Calculated from production volume of reference product using the relative outputs.
  property carbon content, fossil 0.17155; name W_MSW_C_content_fossil
  property carbon content, non-fossil 0.26165; name W_MSW_C_content_non_fossil
  property dry mass 0.771 kg; name W_MSW_DM
  property water content 0.29702; name W_MSW_water_content
  property water in wet mass 0.229 kg; name W_MSW_WWM
  property wet mass 1 kg; name W_MSW_WM
  properties: heating value, net 11.74 MJ
  note on heating value, net: Value taken from the general comment of the treatment dataset.
- phenolic resin: 0.0651268 kg; lognormal variance with pedigree 0.0026, pedigree (1,1,3,1,1)
  (same comment as for ammonium sulfate)
  properties: carbon content, fossil 0.77228, dry mass 1 kg, heating value, net 33.57 MJ, wet mass 1 kg
- refractory, fireclay, packed: 0.00086054 kg; lognormal variance with pedigree 0.0026, pedigree (1,1,3,1,1)
  wearing parts; activity link set as transport is modelled with producer-specific transport distances and transport mean
  properties: dry mass 1 kg, wet mass 1 kg
- scrap steel: -0.0019336 kg; name W_ScS; lognormal variance with pedigree 0.0006, pedigree (1,1,1,1,1)
  production volume; = PV_RP * (W_ScS / RP)
    Calculated from production volume of reference product using the relative outputs.
  property dry mass 1 kg; name W_ScS_DM
  property wet mass 1 kg; name W_ScS_WM
- silicone product: 0.00673099 kg; lognormal variance with pedigree 0.0026, pedigree (1,1,3,1,1)
  (same comment as for ammonium sulfate)
  properties: carbon content, fossil 0.32432, dry mass 1 kg, heating value, net 9.83 MJ, wet mass 1 kg
- soda ash, light: 0.0172406 kg; name soda; lognormal variance with pedigree 0.0026, pedigree (1,1,3,1,1)
  (same comment as for ammonium sulfate)
  property carbon content, fossil 0.051724; name soda_C_content_fossil
  property dry mass 1 kg; name soda_DM
  property wet mass 1 kg; name soda_WM
  properties: heating value, net 3.43 MJ
- sodium borates: 0.065971 kg; lognormal variance with pedigree 0.0026, pedigree (1,1,3,1,1)
  (same comment as for ammonium sulfate)
  properties: dry mass 1 kg, wet mass 1 kg
- sodium hydroxide, without water, in 50% solution state: 1.43e-5 kg; lognormal variance with pedigree 0.0026, pedigree (1,1,3,1,1)
  (same comment as for ammonium sulfate)
  properties: dry mass 1 kg, heating value, net 3.03 MJ, wet mass 1 kg
- stone wool factory: 4.43e-10 unit; lognormal variance with pedigree 0.302, pedigree (1,1,3,1,1)
  activity link set as location of plant is known
- tap water: 0.813435 kg; name tap_water_input; lognormal variance with pedigree 0.0026, pedigree (1,1,3,1,1)
  activity link set as location of plant is known
  properties: carbon content, fossil 0.0017899, dry mass 0.00034 kg, water content 2940.18, wet mass 1 kg
- transport, freight, lorry 16-32 metric ton, EURO5: 0.538233 metric ton*km; lognormal variance with pedigree 0.122, pedigree (1,1,3,1,1)
  includes transportation of all input materials specific for each provider as reported in SAP
- waste polyethylene: -0.00121796 kg; name W_PE; lognormal variance with pedigree 0.0006, pedigree (1,1,1,1,1)
  production volume; = PV_RP * (W_PE / RP)
    Calculated from production volume of reference product using the relative outputs.
  property carbon content, fossil 0.8253; name W_PE_C_content_fossil
  property dry mass 0.996 kg; name W_PE_DM
  property water content 0.0040161; name W_PE_water_content
  property water in wet mass 0.004 kg; name W_PE_WWM
  property wet mass 1 kg; name W_PE_WM
  properties: heating value, net 42.47 MJ
- waste wood, post-consumer: -0.00320495 kg; name W_wood; lognormal variance with pedigree 0.0006, pedigree (1,1,1,1,1)
  production volume; = PV_RP * (W_wood / RP)
    Calculated from production volume of reference product using the relative outputs.
  properties: heating value, net 9.99 MJ, price 0.079 EUR2005
- wastewater, average: -0.000628569 m3; name WWA_a; lognormal variance with pedigree 0.0006, pedigree (1,1,1,1,1)
  production volume; = PV_RP * (WWA_a / RP)
    Calculated from production volume of reference product using the relative outputs.
  properties: carbon content, non-fossil 0.19404, dry mass 0.35 kg, water content 2856.14, wet mass 1000 kg
- water, completely softened: 0.882989 kg; name water_softened_input; lognormal variance with pedigree 0.0026, pedigree (1,1,3,1,1)
  activity link set as location of plant is known
  properties: wet mass 1 kg
- water, deionised: 0.135 kg; name water_deionised; lognormal variance with pedigree 0.0026, pedigree (1,1,3,1,1)
  calculated: water contained in ancillary raw materials
  properties: wet mass 1 kg

## Emissions to nature
All rows: source J.C Scherz, ISOVER S.A 2019
- Ammonia [air, unspecified]: 0.000970838 kg; lognormal variance with pedigree 0.042, pedigree (1,1,3,1,1)
  process-related emissions (fuel-related emissions are not significant compared to process-related emissions)
- Carbon dioxide, fossil [air, non-urban air or from high stacks]: 0.0334301 kg; lognormal variance with pedigree 0.0026, pedigree (1,1,3,1,1)
  stoichiometric emission of CO2 from soda and other additives/raw materials
- Carbon monoxide, fossil [air, non-urban air or from high stacks]: 0.000967492 kg; lognormal variance with pedigree 0.042, pedigree (1,1,3,1,1)
  (same comment as for Ammonia)
- Nitrogen oxides [air, unspecified]: 0.00296053 kg; lognormal variance with pedigree 0.042, pedigree (1,1,3,1,1)
  (same comment as for Ammonia)
- Particulate Matter, > 10 um [air, unspecified]: 0.000909443 kg; lognormal variance with pedigree 0.042, pedigree (1,1,3,1,1)
  (same comment as for Ammonia)
- Water [air, unspecified]: 0.00120286 m3; name water_to_air_unspecified; = ((tap_water_input-WWA_a*1000)/1000)+(water_softened_input/1000)+water_deionised/1000; lognormal variance with pedigree 0.098025, pedigree (4,4,4,2,4)
  Calculated value based on literature values and expert opinion. See comments in the parametres' comment field. Plus water content of glue/additives.
  property fraction, origin: fresh water 1; name fraction_origin_fresh_water
  property fraction, origin: salt water 0; name fraction_origin_salt_water
  property fraction, origin: unspecified 0; name fraction_origin_unspecified

## Sampling procedure
Plant-specific data from administrative software (SAP) for material aquisition and on-site measurements (emissions).

## Extrapolations
see geography and technology comments

## Review by Bruno Peuportier 2020-05-04
The dataset has been updated accounting for our previous review.
