# electricity production, hydro, reservoir, tropical region

Dataset: EcoSpold 2, unit process
Geography: CO
Time period: 2014-01-01 to 2023-12-31
Technology level: modern
Classification: ISIC rev.4 ecoinvent: 3510:Electric power generation, transmission and distribution
Tags: hydro power
Scenario: Business-as-Usual
System model: Allocation, cut-off by classification
Share of production covered: 45 %
Generated by: Germán Santa María
Published in: Suppen, N. 2017
Database: ecoinvent
isCopyrightProtected: true
accessRestrictedTo: 1

## General comment
This dataset represents the production of high voltage electricity at grid-connected reservoir hydropower plants in Colombia in 2014. Here, the reservoir hydropower plants are modelled with tropical region plants based on data from Swiss hydropower plants. A representative sample of Swiss dams with a height of more than 30 meters is taken into account for calculating the input. Lifetime is assumed to be 150 years for the structural part and 80 years for the turbines. Some of the exchanges and parameters were regionalized with data from Colombian power plants, including: efficiency, land use transformation, and water consumption. The regional data was obtained from power plants that represent 45% of the hydro reservoir, electricity production in Colombia in 2014.
Greenhouse gas emissions are calculated on the basis of a sample of 55 reservoirs in tropical regions in Hertwich 2013 and taken into account in the form of carbon dioxide and methane. There are great uncertainties on the origin of the CH4- and CO2-emissions. A part of them are assumed to originate from living biomass and from sewage discharged in the reservoirs and not only from biomass flooded.
Hertwich, E.G. 2013. Addressing Biogenic Greenhouse Gas Emissions from Hydropower in LCA. Environmental Sciency&Technology, 47, 9604-9611

## Included activities start
This dataset starts from the power plant ready to produce electricity, i.e. the reservoir filled with water.
From (potential) energy in water, entering the power plant.

## Included activities end
This activity ends with 1kWh of high voltage electricity produced at the power plant and arrived at the busbar.

This dataset includes
- the area/volume occupied for the barrage, power station, and the lake
- an estimation of emissions of carbon dioxide and methane
- operation and maintenance activities and materials of the power plants, such as lubricating oil or mass of water passing through the turbines.

This dataset doesn't include
- land use for access roads to the reservoir
- raw materials extraction, decommissioning and waste treatment as these activities are already included in the infrastructure datasets
- transformation of the electricity produced.
- dinitrogen oxide emissions

## Geography
This dataset is based on the GLO dataset with adjustments to the regional context with data from hydro reservoirs in Colombia.

## Technology
Storage power plants have an appendant reservoir. The size of the reservoir can range from daily, monthly to annual storage reservoirs. According to the net head high-pressure, medium-pressure and low-pressure systems can be distinguished. High- and medium-pressure systems are constructed as dams. High-pressure storage power plants with a head of over 50 meters are very common in Switzerland. For this dataset concrete dams (arch dams and gravity dams) with a height of more then 30 meters are taken into account. Also pumped storage power plants are included because in most cases the data is only available for the overall generation system. The same counts for high- and medium-pressure and alpine run-of-river power plants which are also included in the storage power plant dataset. Due to the fact that the efforts for the plant construction are similar to storage power plants and that the estimated production is comparatively low, high- and medium-pressure run-of-river power plants are covered by the reservoir power station dataset.
The technology used in the dataset has an overall efficiency of 82%, more modern technologies show an overall efficiency of about 88%. The overall efficiency is composed of the efficiency of the works water channel, the turbine, the generator and the transformer and are listed below:
Efficiency of power plant current modern
Works water channel 0.95 0.95
Turbine 0.87 0.91
Generator 0.96 0.98
Transformer 0.98 0.99
Reservoir power plant total
without works water channel 0.82 0.88
with works water channel 0.78 0.84
Pumped storage power plant 0.70 0.74
The losses along the works water channel are primarily caused by friction and are calculated from the difference between gross and net head. Based on this calculation the efficiency of the works water channel amounts to 95%. The losses depend on the flow rate and have its maximum at full load. The smaller the cross section of adits and pressure pipelines, the higher the flow velocity and thus the friction losses. In older plants according to Bischof (1992) the efficiency of works water channels could be increased generally more than by replacing turbines and generators.
The efficiency losses in turbines depend on the turbine type (Kaplan, Francis, Pelton, etc.), the turbine output and on the ratio between turbined water amount and the rated water amount. In König (1997) examples for curve progressions of the relationship between these variables are shown. For current power plants an efficiency of 87% is assumed, more modern turbines show an efficiency of about 91%.
The efficiency of generators depends on the output, the rotation speed of the generator and the cooling system. Some relevant data can be found in König (1997). For today’s power plants an efficiency of approximately 96% is assumed, modern generators show an efficiency of about 98%. The efficiency of transformers amounts to 98%, respectively 99%.
References:
Bischof, R. (1992) Modernisierungspotential bei bestehenden Wasserkraftwerken. Vortrag beim Schweizerischen Technischen Verband, Sektion Graubünden, 21. Oktober 1992. Churwalden, Schweiz [unpublished].
König F., von (1985) Bau von Wasserkraftanlagen. C.F. Müller, Karlsruhe.

## Time period
The Annual Production Volume is valid for the year 2014.

## Parameters
- lifetime: 150 year; lognormal variance with pedigree 0.0014, pedigree (2,2,1,3,1)
  Estimation based on experiences.
  nan
- total net electricity: 4.1449e10 kWh; name totalElectricity; lognormal variance with pedigree 0.0012, pedigree (2,1,1,1,1)
  Literature value/statistics. Taken from XM National Statistics for Colombia in 2014.
  The power plants were divided between reservoir and run-of-river. The power plants with installed capacities lower than 20 MW were classified as run-off-river. The power plants with installed capacities higher than 20 MW were classified with a bottom-up approach search in each of the power plants websites.
  Source for total net electricity production:
  http://informacioninteligente10.xm.com.co/oferta/Paginas/HistoricoOferta.aspx accessed 21/07/2017 File: "Generacion_(kWh)_2014"
  Source for the installed capacity:
  http://informacioninteligente10.xm.com.co/oferta/Paginas/HistoricoOferta.aspx accessed 21/07/2017 File: " Capacidad_Efectiva_Neta_(kW)_2014"
  Hydro reservoirs included in this dataset:
  ALBAN
  BETANIA
  CALIMA
  CHIVOR
  DARIO VALENCIA
  DARIO VALENCIA SAMPER
  GUATAPE
  GUATRON
  GUAVIO
  JAGUAS
  LA TASAJERA
  MIEL I
  PAGUA
  PLAYAS
  PORCE II
  PORCE III
  PRADO
  SALTO II
  SALVAJINA
  SAN CARLOS
  SAN FRANCISCO
  SOGAMOSO
  URRA

## Reference product
- electricity, high voltage: 1 kWh; By-product classification allocatable product; CPC 17100: Electrical energy; HS2017 271600: Electrical energy
  production volume 4.41809e10 kWh; name apv_electricity; = totalElectricity
    Literature value/statistics. Taken from XM National Statistics for Colombia in 2014. URL: http://informacioninteligente10.xm.com.co/oferta/Paginas/HistoricoOferta.aspx accessed 21/07/2017 File: "Generacion_(kWh)_2014"
  property price 0.0977 EUR2005
    Temporary price data. Calculated as 90% of purchasers price based on: 94% of the average price (to account for a 6% loss in transformation and transmission) for electricity for industrial consumersin 2005 (excluded taxes). From IEA.
  properties: carbon allocation 0 kg, carbon content 0

## Inputs from technosphere
- hydropower plant, reservoir, non-alpine regions: 4.0404e-13 unit; = 1/(lifetime*16500000000); source Bolliger, R. 2007, p. p.100 Tab. 12.5; lognormal variance with pedigree 0.044, pedigree (1,1,3,5,1)
  Literature value/calculated value. The needed amount of infrastructure per kWh produced is calculated with the lifetime and the annual net energy production (16500GWh/a).
- lubricating oil: 7.56e-6 kg; name lubricating_oil; = 0.000009*0.84; source Vögtlin H. J. 2002, p. p.36 in Bolliger et al.; lognormal variance with pedigree 0.1001, pedigree (4,2,3,5,3)
  There, a consumption of lubricating oil for turbines of 9 liters per GWh is estimated. With an oil density of 0.84 kg/l this amounts to 0.007 g/kWh. The lubricating oil is in a closed loop system (i.e. cannot get into the turbined water system) and is disposed annualy as waste oil in a hazardous waste treatment plant.
  Estimation. Data for a run-of-river power station were overtaken.
  properties: carbon content, fossil 0.75, dry mass 1 kg, heating value, net 40.2 MJ, wet mass 1 kg
  note on carbon content, fossil: Lubricating oil is produced from diesel. C-content/dry mass of fats and oils considered 75%, from: ecoinvent v2.2 report, n 15a, pg 40
  note on heating value, net: Literature value, Source: IPCC 2006, 2006 IPCC Guidelines for National Greenhouse Gas Inventories, Prepared by the National Greenhouse Gas Inventories Programme, Eggleston H.S., Buendia L., Miwa K., Ngara T. and Tanabe K. (eds). Published: IGES, Japan
- waste mineral oil: -7.56e-6 kg; name waste_oil; = lubricating_oil; lognormal variance with pedigree 0.0382, pedigree (4,5,2,5,1)
  calculated value
  production volume; = apv_electricity* waste_oil
    Calculated from the production volume of electricity, high voltage, hydro, reservoir in proportion to the respective output amounts.
  properties: carbon content, fossil 0.864444, dry mass 0.9 kg, heating value, net 34.7 MJ, water content 0.111111, wet mass 1 kg
  note on carbon content, fossil: Tab A.6, ecoinvent v2.2 report 13_I. C content has been calculated after data in the tables, and then referred to 1 kg DM
  note on heating value, net: Value taken from the general comment of the treatment dataset.

## Inputs from nature
- Energy, potential (in hydropower reservoir), converted [natural resource, in water]: 3.79 MJ
  Reflects range average to best performance.
- Occupation, lake, artificial [natural resource, land]: 0.9975 m2*year; = lifetime *transformation_from_forest; lognormal variance with pedigree 0.0741, pedigree (3,2,3,1,1)
  Calculated value. From parameters: lifetime and transformation from forest.
- Transformation, from forest, unspecified [natural resource, land]: 0.00665 m2; name transformation_from_forest; lognormal variance with pedigree 0.198, pedigree (4,5,5,5,1)
  Literature value/calculated value.
  This exchange is a weighted average (based on net electricity production) of the area occupied by “Guavio”, “San Carlos”, “Chivor”, “Guatape” and “Playas” reservoirs which account for 44.6% of the net electricity production with hydro reservoirs in Colombia in 2014.
  Guavio: 13.27 millon m2 // 5.6E+09 kWh
  San Carlos: 3.4 million m2 // 5.52E+09 kWh
  Chivor: 12 million m2 // 3.98E+09 kWh
  Guatape: 62.4 million m2 // 2.03E+09 kWh
  Playas: 32 million m2 // 1.36E+09 kWh
  Reservoir: Guavio
  Source: Environmental Compliance Report (ICA 2016)
  Environmental Compliance Reports are reported by power plants to the Ministry of Environment in order to obtain licenses, and are available under request at the National Environmental Licensing Authority.
  Reservoir: San Carlos
  Source: Isagen, Central Hidroeléctrica San Carlos URL: https://www.isagen.com.co/SitioWeb/es/nuestro-negocio/generamos-energia/central-hidroelectrica-san-carlos accessed 27/09/2017.
  Resrvoir: Chivor
  Source: Mekonnen, M. M., & Hoekstra, A. Y. (2011). The water footprint of electricity from hydropower. Hydrology and Earth System Sciences Discussions.
  Reservoir: Guatape
  Source: Environmental Compliance Report (ICA 2015)
  Environmental Compliance Reports are reported by power plants to the Ministry of Environment in order to obtain licenses, and are available under request at the National Environmental Licensing Authority.
  Reservoir: Playas
  Source: Food and Agriculture Organization of the United Nations - Aprovechamiento Acuicola De Embalses En Colombia, URL: <http://www.fao.org/docrep/field/003/ab488s/AB488S05.htm> accessed 27/09/2017.
- Transformation, to industrial area [natural resource, land]: 2.3e-6 m2; lognormal variance with pedigree 0.198, pedigree (4,5,5,5,1)
  Estimation. Area for barrage and power station.
- Transformation, to lake, artificial [natural resource, land]: 0.00665 m2; = transformation_from_forest; lognormal variance with pedigree 0.198, pedigree (4,5,5,5,1)
  Literature/calculated value. Flooded area of the hydro reservoirs: Guavio, San Carlos, Chivor, Guatape and Playas.
  Reservoir: Guavio
  Source: Environmental Compliance Report (ICA 2016)
  Environmental Compliance Reports are reported by power plants to the Ministry of Environment in order to obtain licenses, and are available under request at the National Environmental Licensing Authority.
  Reservoir: San Carlos
  Source: Isagen, Central Hidroeléctrica San Carlos URL: https://www.isagen.com.co/SitioWeb/es/nuestro-negocio/generamos-energia/central-hidroelectrica-san-carlos accessed 27/09/2017.
  Resrvoir: Chivor
  Source: Mekonnen, M. M., & Hoekstra, A. Y. (2011). The water footprint of electricity from hydropower. Hydrology and Earth System Sciences Discussions.
  Reservoir: Guatape
  Source: Environmental Compliance Report (ICA 2015)
  Environmental Compliance Reports are reported by power plants to the Ministry of Environment in order to obtain licenses, and are available under request at the National Environmental Licensing Authority.
  Reservoir: Playas
  Source: Food and Agriculture Organization of the United Nations - Aprovechamiento Acuicola De Embalses En Colombia, URL: <http://www.fao.org/docrep/field/003/ab488s/AB488S05.htm> accessed 27/09/2017.
- Volume occupied, reservoir [natural resource, in water]: 0.148 m3*year; lognormal variance with pedigree 0.3021, pedigree (1,2,3,1,1)
  Literature value/calculated value.
  The data on the volume occupied by the reservoirs were collected from “Environmental Compliance Reports” that are reported by power plants to the Ministry of Environment in order to obtain licenses, and are available under request at the National Environmental Licensing Authority. This exchange is a weighted average (based on net electricity production) of “Guavio”, “San Carlos”, “Chivor”, “Guatape” and “Playas” reservoirs, accounting for 44.6% of the net electricity production with hydro reservoirs in Colombia in 2014.
  Guavio: 1047 millon m3 // 5.6E+09 kWh
  San Carlos: 72 million m3 // 5.52E+09 kWh
  Chivor: 569.64 million m3 // 3.98E+09 kWh
  Guatape: 1003.22 million m3 // 2.03E+09 kWh
  Playas: 50.29 million m3 // 1.36E+09 kWh
  Source of emissions: Environmental Compliance Reports (ICA)
  Guavio: ICA #20, 2016
  San Carlos: Isagen web page URL: <https://www.isagen.com.co/SitioWeb/es/nuestro-negocio/generamos-energia/central-hidroelectrica-san-carlos> accessed on 28/07/2017
  Chivor: Sustainability Report Chivor 2016 Page 11. URL: <http://www.chivor.com.co/nue/SitePages/Informe%20de%20gesti%C3%B3n.aspx> accessed on 28/07/2017
  Guatape: ICA #11, 2015
  Playas: ICA #11, 2015
  Source of electricity production: XM National Statistics
  XM Información inteligente, histórico de oferta, generación 2014
  http://www.xm.com.co/Paginas/Home.aspx accessed on 21/07/2017
- Water, turbine use, unspecified natural origin [natural resource, in water]: 0.555 m3; name water_turbine_use_UNO_input; lognormal variance with pedigree 0.0227, pedigree (2,2,3,1,1)
  This exchange is a weighted average (based on net electricity production) of the water withdrawn by “Guavio”, “San Carlos”, “Chivor”, “Guatape” and “Playas” reservoirs which account for 44.6% of the net electricity production with hydro reservoirs in Colombia in 2014.
  Guavio: 2.38E+09 m3 // 5.6E+09 kWh
  San Carlos: 1.06E+09 m3 // 5.52E+09 kWh
  Chivor: 2.26E+09 m3 // 3.98E+09 kWh
  Guatape: 1.04E+09 m3 // 2.03E+09 kWh
  Playas: 3.53E+09 m3 // 1.36E+09 kWh
  Source of data for: Guavio, San Carlos, Guatape
  XM National Statistics for Colombia in 2014. URL: <http://informacioninteligente10.xm.com.co/hidrologia/Paginas/HistoricoHidrologia.aspx> accessed 21/07/2017 File: “Aportes_Mensual_2014"
  Source of data for: Chivor
  Sustainability report 2016, page 66. URL: http://www.chivor.com.co/nue/SitePages/Informe%20de%20gesti%C3%B3n.aspx> accessed on 28/07/2017
  Source of data for: Playas
  Environmental Compliance Report (ICA #15, 2016)
  Environmental Compliance Reports are reported by power plants to the Ministry of Environment in order to obtain licenses, and are available under request at the National Environmental Licensing Authority.
  Source of electricity production: XM National Statistics

## Emissions to nature
- Carbon dioxide, from soil or biomass stock [air, non-urban air or from high stacks]: 0.0285 kg; lognormal variance with pedigree 0.0987, pedigree (5,3,5,3,3)
  Literature value/calculated value taken over from the global dataset "electricity production, hydro, reservoir, tropical region, GLO, 2015": Hertwich 2013 provides an analysis of greenhouse gas emissions from hydropower plants. 55 data points are available for tropical reservoir plants, from which the average CO2 and CH4 emissions are calculated.
  Hertwich, E.G. 2013. Addressing Biogenic Greenhouse Gas Emissions from Hydropower in LCA. Environmental Sciency&Technology, 47, 9604-9611
- Methane, non-fossil [air, non-urban air or from high stacks]: 0.00136 kg; lognormal variance with pedigree 0.0987, pedigree (5,3,5,3,3)
  (same comment as for Carbon dioxide, from soil or biomass stock)
- Water [air, unspecified]: 0.00394 m3; name water_to_air_unspecified; lognormal variance with pedigree 0.0432, pedigree (2,3,3,1,1)
  Literature value/calculated value.
  This exchange is a weighted average (based on net electricity production) of the water evaporated in San Carlos, Chivor and Playas hydro reservoirs which account for 26.2% of the net electricity production with hydro reservoirs in Colombia in 2014.
  San Carlos: 0.005178 Gm3 // 5.52E+09 kWh
  Chivor: 0.01928 Gm3 // 3.98E+09 kWh
  Playas: 0.018293 Gm3 // 1.36E+09 kWh
  Source: Mekonnen, M. M., & Hoekstra, A. Y. (2011). The water footprint of electricity from hydropower. Hydrology and Earth System Sciences Discussions.
  Source of electricity production: XM National Statistics
  XM Información inteligente, histórico de oferta, generación 2014
  http://www.xm.com.co/Paginas/Home.aspx accessed on 21/07/2017
  property fraction, origin: fresh water 1; name fraction_origin_fresh_water_Ww
  property fraction, origin: salt water 0; name fraction_origin_salt_water_Ww
  property fraction, origin: unspecified 0; name fraction_origin_unspecified_Ww
- Water [water, unspecified]: 0.55106 m3; name water_to_water_unspecified; = water_turbine_use_UNO_input-water_to_air_unspecified; lognormal variance with pedigree 0.130025, pedigree (4,4,5,2,4)
  Calculated value based on turbined water and water to air.
  property fraction, origin: fresh water 1; name fraction_origin_fresh_water
  property fraction, origin: salt water 0; name fraction_origin_salt_water
  property fraction, origin: unspecified 0; name fraction_origin_unspecified

## Sampling procedure
A literature review was carried out with a bottom-up approach including: Guavio, San Carlos, Chivor, Guatape and Playas hydro reservoirs. The regional data were obtained from power plants that represent 45% of the hydro reservoir electricity production in Colombia in 2014.

## Extrapolations
This dataset has been extrapolated from a Swiss dataset for reservoir plants. The uncertainty has been adjusted accordingly. Some of the exchanges and parameters were regionalized with data from Colombian power plants, including: efficiency, land use transformation, and water consumption. The regional data was obtained from power plants that represent 45% of the hydro reservoir, electricity production in Colombia in 2014.

## Review by Christopher Oberschelp 2017-11-21
Dataset is very thoroughly and transparently documented. Key exchanges look correct while comparison with similar datasets after impact assessment may still help to find individual deviations.
