# calcined clay to generic market for supplementary cementitious materials

Dataset: EcoSpold 2, unit process
Geography: BR
Time period: 2019-01-01 to 2023-12-31
Technology level: current
Classification: ISIC rev.4 ecoinvent: 2394:Manufacture of cement, lime and plaster
Scenario: Business-as-Usual
System model: Allocation, cut-off by classification
Generated by: Daniela Baumann
Database: ecoinvent
isCopyrightProtected: false
accessRestrictedTo: 1

## General comment
This activity is a renaming activity, linking calcined clay to the generic market for supplementary cementitious materials (SCM).

## Included activities start
The activity starts with the input of calcined clay.

## Included activities end
The activity ends with the provision of a generic kg of supplementary cementitious materials.

## Reference product
- supplementary cementitious materials: 1 kg; name SCM; By-product classification allocatable product; CPC 15200: Gypsum; anhydrite; limestone flux; limestone and other calcareous stone, of a kind used for the manufacture of[…]; HS2017 681099: Cement, concrete or artificial stone; articles (other than prefabricated structural components for building[...]
  production volume 1.49272e7 kg; = 1239591*10^3*0.18*0.223*0.30
    The production volume of clay (kaolin) in Brazil in 2020 was 1'239'591 ton. Approximately 18% of the kaolin produced in the United States in 2020 was calcined (metakaolin) (USGS, 2020). This share was used to calculate the brazilian production volume of calcined clay.
    According to USGS (2020), 22.3% of common clay is used for 'Portland and other cements' in the US. It is here assumed that of that 22.3%, 30% is redirected to the generic market for supplementary cementitious materials.
    Source: USGS (2020). U. S. Geological Survey - Clay and shale annual tables 2020. Available at: https://www.usgs.gov/centers/national-minerals-information-center/clays-statistics-and-information
  property carbon content, fossil 0; name SCM_C_content_fossil
    fossil carbon content on a dry matter basis
  property carbon content, non-fossil 0; name SCM_C_content_non_fossil
    biogene carbon content on a dry matter basis
  property dry mass 1 kg; name SCM_DM
  property price 0.075 EUR2005
    Price set equal to the price of clay as considered as the product that can answer in increase in demand of supplementary cementitious materials. Calculated value based on data from United Nations Commodity Trade Statistics Database (comtrade.un.org). UN comtrade category: 250810 Bentonite. Year 2005. Using exchange rate of 1EURO = 1.209 USD. Average of price of import into 5 main markets (EU, US, JP, IN and CN).
  property water content 0; name SCM_water_content
  property water in wet mass 0 kg; name SCM_WWM
  property wet mass 1 kg; name SCM_WM
  properties: carbon allocation 0 kg, carbon content 0

## Inputs from technosphere
- calcined clay: 1 kg
  This activity is a renaming activity, linking clay to the generic market for supplementary cementitious materials (SCM).
  properties: dry mass 1 kg, wet mass 1 kg
