# paper production, woodfree, uncoated, 50% recycled content, at non-integrated mill

Dataset: EcoSpold 2, unit process
Geography: CA-QC
Time period: 2009-01-01 to 2023-12-31
Technology level: current
Classification: EcoSpold01Categories: paper & cardboard/graphic paper
Classification: ISIC rev.4 ecoinvent: 1701:Manufacture of pulp, paper and paperboard
Synonyms: office paper; recycled paper; fine paper
Tags: single enterprise data
Scenario: Business-as-Usual
System model: Allocation, cut-off by classification
Share of production covered: 100 %
Generated by: Hugues Imbeault-Tétreault
Database: ecoinvent
isCopyrightProtected: true
accessRestrictedTo: 1

## General comment
This dataset represents the Quebec production of uncoated woodfree paper with 50% recycled content in a non-integrated mill, including paper production and converting into sheets, energy production on-site (natural gas, heavy fuel oil and biobas combustion) and internal waste water treatment. The packaging in which the paper is sold is not included, but wrapping energy is included.

## Included activities start
From reception of sulfate and deinked pulp at the factory gate.

## Included activities end
The activity ends with packaged paper sheets ready for shipping.

The dataset includes pulp preparation, paper production and converting into sheets, packaging energy consumption, energy production on-site (natural gas, heavy fuel oil and biogas combustion), internal waste water treatment.

The dataset doesn't include deinking, packaging materials and commercial and human activities.

## Allocation
The data originate from a paper mill which produces different types of woodfree papers. The allocation of most materials between the different coproducts were made based on the recipe (pulp, mineral charges and chemicals) specific for each grade of paper. However, it was inevitable to make allocation for some general inputs/outputs (energy, commodities, wastes, wrapping and emissions). In those cases, the allocation was done on a weight basis (product production / annual production on site).

## Geography
Data from an important fine paper producer in the province of Quebec, Canada.

## Technology
Fine papers have a wide range of size, finish and basis weight. To be representative of all the manufacturing possibilities, a weighted average of the papers recipes and used machines have been used.

## Parameters
- pulp transport distance: 299 km; name pulpTransportDistance; lognormal variance with pedigree 0.0007, pedigree (1,2,1,1,1)
  Measured value.

## Reference product
- paper, woodfree, uncoated: 1 kg; name Ref; By-product classification allocatable product; CPC 32113: Mechanical wood pulp; semi-chemical wood pulp; pulps of fibrous cellulosic material other than wood; HS2017 480255: Uncoated paper and paperboard (not 4801 or 4803); printing, writing or graphic, 10% or less by weight of me[...]
  EcoSpold01Location=RER
  The reference flow is one air dry ton of product.
  production volume 2.7745e7 kg; name Ref_PV
    Data from producer.
  property carbon content, fossil 0.0251406
    Fossil C content was calculated after fossil C contents of chemicals used in the production of the paper (in Tab 8.54 & 8.55 ecoinvent v2.2 report 11_III, part 8).
  property carbon content, non-fossil 0.281215
    Biogenic C content was calculated after biogenic C contents of chemicals used in the production of the paper (in Tab 8.54 & 8.55 ecoinvent v2.2 report 11_III, part 8). The cellulose content in 1 kg of paper (on a wet mas basis) was estimated as (1-chemical content), C content of cellulose was considered 0.44 kgC/kg dry mass (ecoinvent v2.2 report, n 15a, pg 40)
  property price 0.756 EUR2005
    Export prices for the World+ according to: http://faostat.fao.org/site/626/DesktopDefault.aspx?PageID=626#ancor downloaded 6 May 2009; calculated as export value divided by export volume.
  properties: carbon allocation 0.289506 kg, carbon content 0.306355, dry mass 0.945 kg, heating value, net 14.11 MJ, water content 0.0582011, water in wet mass 0.055 kg, wet mass 1 kg

## Inputs from technosphere
- alkylketene dimer sizing agent, for paper production: 0.00434 kg; lognormal variance with pedigree 0.0432, pedigree (1,4,5,4,1)
  Estimation. Data from European dataset "paper production, woodfree, uncoated, at non-integrated mill, RER, 2000". Uncertainty has been adjusted consequently.
  EcoSpold01Location=RER
  Uncertainty: information from one fine paper producer
  properties: carbon content, non-fossil 0.538229, dry mass 1 kg, heating value, net 16.31 MJ, wet mass 1 kg
  note on carbon content, non-fossil: Biogenic C content was calculated after biogenic C contents of chemicals used in the production of the paper (in Tab 8.54 & 8.55 ecoinvent v2.2 report 11_III, part 8). The cellulose content in 1 kg of paper (on a wet mas basis) was estimated as (1-chemical content), C content of cellulose was considered 0.44 kgC/kg dry mass (ecoinvent v2.2 report, n 15a, pg 40) Chemical formula of alkyl ketene dimer was considered as C38H72O20, and the molecular weight 848g/mol. It is produced from Fatty acids, from vegetarian oil
- chemical, inorganic: 0.00380193 kg; lognormal variance with pedigree 0.0406, pedigree (1,1,5,1,1)
  Calculated value, acording to paper recipe.
  properties: carbon content, fossil 0.003, dry mass 1 kg, wet mass 1 kg
  note on carbon content, fossil: This dataset is an unweighted average of 20 inorganic substances (listed in Tab 88.1, ecoinvent v2.2 report 8, part II), being part of the top100 chemicals included in this database. The C-content has also been calculated as an unweighted average of the C content of the substances composing this dataset.
- chemical, organic: 0.00283043 kg; lognormal variance with pedigree 0.0406, pedigree (1,1,5,1,1)
  Calculated value, acording to paper mass ratio at factory.
  properties: carbon content, fossil 0.628, dry mass 1 kg, heating value, net 19.03 MJ, wet mass 1 kg
  note on carbon content, fossil: This dataset is an unweighted average of 20 organic substances (listed in Tab 88.1, ecoinvent v2.2 report 8, part II), being part of the top100 chemicals included in this database. The C-content has also been calculated as an unweighted average of the C content of the substances composing this dataset.
- deinked pulp, wet lap: 0.326 kg; name deinkedPulp; lognormal variance with pedigree 0.0406, pedigree (1,1,5,1,1)
  Calculated value, acording to paper recipe.
  property dry mass 0.6 kg; name DPulp_DM; = DPulp_WM - DPulp_WWM
  property water content 0.666667; name DPulp_WC; = DPulp_WWM/DPulp_DM
  property water in wet mass 0.4 kg; name DPulp_WWM
  property wet mass 1 kg; name DPulp_WM
  properties: carbon content, non-fossil 0.496, heating value, net 8 MJ
  note on carbon content, non-fossil: Biogenic carbon content of dry mass is 0.494 kgC/kg dry wood (ecoinvent v2.2 report 6_IX & ecoinvent v2.2 report 9). No other C containing products in the formulation of the pulp assumed.
- electricity, medium voltage: 0.937079 kWh; lognormal variance with pedigree 0.0406, pedigree (1,1,5,1,1)
  Calculated value, acording to paper mass ratio at factory.
  EcoSpold01Location=NORDEL
- heat, central or small-scale, other than natural gas: 8.70112 MJ; lognormal variance with pedigree 0.0406, pedigree (1,1,5,1,1)
  Calculated value, acording to paper mass ratio at factory. Biogas (from sanitary landfill) burning provides most of the heat on site. A direct link to the dataset "heat and power co-generation, biogas, gas engine, Quebec" is made to ensure this fuel specificity. This dataset does not exactly reflect this specificity, as there is no co-generation but only heat production, but it is the most suitable is the current version of the database.
  properties: heating value, net 1 MJ
- heat, district or industrial, natural gas: 0.883579 MJ; lognormal variance with pedigree 0.0406, pedigree (1,1,5,1,1)
  EcoSpold01Location=RER
  Calculated value, acording to paper mass ratio at factory. Natural gas burning provides heat on site.
  properties: heating value, net 1 MJ
- heat, district or industrial, other than natural gas: 0.0583275 MJ; lognormal variance with pedigree 0.0406, pedigree (1,1,5,1,1)
  Calculated value, acording to paper mass ratio at factory. Heavy fuel oil burning provides heat on site. A direct link to the dataset "heat production, heavy fuel oil, at industrial furnace 1MW" is made to ensure this fuel specificity.
  properties: heating value, net 1 MJ
- lime: 0.1524 kg; lognormal variance with pedigree 0.0426, pedigree (1,4,5,4,1)
  Estimation. Data from European dataset "paper production, woodfree, uncoated, at non-integrated mill, RER, 2000". Uncertainty has been adjusted consequently.
  Uncertainty: information from one fine paper producer
  properties: carbon content, fossil 0.120005, dry mass 1 kg, wet mass 1 kg
- maize starch: 0.0397 kg; lognormal variance with pedigree 0.0426, pedigree (1,4,5,4,1)
  (same comment as for lime)
  properties: carbon content, non-fossil 0.46, dry mass 0.86 kg, heating value, net 11.64 MJ, water content 0.162791, wet mass 1 kg
  note on carbon content, non-fossil: C-content of starch is considered 46% on dry mass basis (from "Evolutionary and Biochemical Aspects", A.D. Kay and T. Vrede (in Global Ecology, 2010, Elsevier B.V., S.E. Jørgensen Ed.)).
- malusil: 4.8e-5 kg; lognormal variance with pedigree 0.0426, pedigree (1,4,5,4,1)
  (same comment as for lime)
  properties: dry mass 1 kg, wet mass 1 kg
- municipal solid waste: -0.00308735 kg; name municipal_waste; lognormal variance with pedigree 0.0006, pedigree (1,1,1,1,1)
  EcoSpold01Location=CH
  Calculated value, acording to paper mass ratio at factory.
  production volume; name Municipal_waste_PV; = Ref_PV*municipal_waste/Ref
    Calculated from the production volume of paper, woodfree, uncoated in proportion to the respective output amounts.
  properties: carbon content, fossil 0.171549, carbon content, non-fossil 0.261655, dry mass 0.771 kg, heating value, net 11.74 MJ, water content 0.297017, wet mass 1 kg
  note on carbon content, fossil: Fossil C content was calculated after fossil C contents of chemicals used in the production of the paper (in Tab 8.54 & 8.55 ecoinvent v2.2 report 11_III, part 8). MSW composition in tab 4.1, ecoinvent v2.2 report 13_I. C content referred to 1 kg DM
  note on carbon content, non-fossil: Biogenic C content was calculated after biogenic C contents of chemicals used in the production of the paper (in Tab 8.54 & 8.55 ecoinvent v2.2 report 11_III, part 8). The cellulose content in 1 kg of paper (on a wet mas basis) was estimated as (1-chemical content), C content of cellulose was considered 0.44 kgC/kg dry mass (ecoinvent v2.2 report, n 15a, pg 40) MSW composition in tab 4.1, ecoinvent v2.2 report 13_I. C content referred to 1 kg DM
  note on heating value, net: Value taken from the general comment of the treatment dataset.
- optical brighteners, for paper production: 0.00448 kg; lognormal variance with pedigree 0.0432, pedigree (1,4,5,4,1)
  Estimation. Data from European dataset "paper production, woodfree, uncoated, at non-integrated mill, RER, 2000". Uncertainty has been adjusted consequently.
  EcoSpold01Location=RER
  properties: carbon content, fossil 0.557859, dry mass 1 kg, heating value, net 16.9 MJ, wet mass 1 kg
  note on carbon content, fossil: Fossil C content was calculated after fossil C contents of chemicals used in the production of the paper (in Tab 8.54 & 8.55 ecoinvent v2.2 report 11_III, part 8). Mixture of two optical brighteners (DAS-1 and distyrylbiphenyl type), ecoinvent v2.2 report 11-III, pg 298
- paper mill, non-integrated: 4.93827e-11 unit; = Ref/(1.62E+08*125); lognormal variance with pedigree 0.35, pedigree (4,4,5,1,1)
  Calculated value. Based on total life time (125 years) and annuel gross production (162 kt) of the mill.
  EcoSpold01Location=RER
- propane, burned in building machine: 0.0543208 MJ; lognormal variance with pedigree 0.0406, pedigree (1,1,5,1,1)
  Calculated value, acording to paper mass ratio at factory.
  properties: heating value, net 1 MJ
- retention aid, for paper production: 0.000780715 kg; lognormal variance with pedigree 0.0406, pedigree (1,1,5,1,1)
  Calculated value, acording to paper mass ratio at factory.
  properties: carbon content, fossil 0.5, dry mass 1 kg, heating value, net 15.15 MJ, wet mass 1 kg
- sludge from pulp and paper production: -0.00539726 kg; name sludge; lognormal variance with pedigree 0.0006, pedigree (1,1,1,1,1)
  Calculated value, acording to paper mass ratio at factory. Quantity of sludges in calculated data has been adapted to reflect dry mass of the flow in the database (75%).
  EcoSpold01Location=CH
  production volume; = Ref_PV*sludge/Ref
    (same comment as for municipal solid waste)
  properties: carbon content, non-fossil 0.21, dry mass 0.75 kg, heating value, net 2.65 MJ, water content 0.333333, wet mass 1 kg
  note on carbon content, non-fossil: Biogenic C content was calculated after biogenic C contents of chemicals used in the production of the paper (in Tab 8.54 & 8.55 ecoinvent v2.2 report 11_III, part 8). The cellulose content in 1 kg of paper (on a wet mas basis) was estimated as (1-chemical content), C content of cellulose was considered 0.44 kgC/kg dry mass (ecoinvent v2.2 report, n 15a, pg 40) Tab 6.21, ecoinvent v2.2 report 11_III & Tab A.9, ecoinvent v2.2 report 13_I. Sludge from pulp and paper contains 15.75% carbon
- sodium chloride, powder: 0.00253055 kg; lognormal variance with pedigree 0.0406, pedigree (1,1,5,1,1)
  Calculated value, acording to paper mass ratio at factory.
  properties: dry mass 1 kg, wet mass 1 kg
- sodium hypochlorite, without water, in 15% solution state: 0.0016383 kg; lognormal variance with pedigree 0.0406, pedigree (1,1,5,1,1)
  Calculated value, acording to paper mass ratio at factory.
  properties: dry mass 1 kg, wet mass 1 kg
- sulfate pulp, bleached: 0.390521 kg; name sulfatePulp; lognormal variance with pedigree 0.0406, pedigree (1,1,5,1,1)
  Calculated value, according to paper recipe.
  properties: carbon content, non-fossil 0.494, dry mass 0.9 kg, heating value, net 13.23 MJ, water content 0.111111, wet mass 1 kg
  note on carbon content, non-fossil: C content of dry mass of sulfate pulp is 0.494 kgC/kg dry wood (ecoinvent v2.2 report 6_IX & ecoinvent v2.2 report 9). No other C containing products in the formulation of the pulp.
- transport, freight, lorry >32 metric ton, EURO4: 0.21424 metric ton*km; = (deinkedPulp + sulfatePulp) * pulpTransportDistance / 1000; lognormal variance with pedigree 0.04, pedigree (1,1,5,1,1)
  Calculated value based on measurements. Transport of deinked pulp (directly linked exchange).

## Inputs from nature
- Water, river [natural resource, in water]: 0.0165484 m3; name water_input; lognormal variance with pedigree 0.0406, pedigree (1,1,5,1,1)
  Calculated value, acording to paper mass ratio at factory.

## Emissions to nature
- Water [air, unspecified]: 0.00101613 m3; lognormal variance with pedigree 0.0406, pedigree (1,1,5,1,1)
  Calculated value with water balance.
- BOD5, Biological Oxygen Demand [water, surface water]: 0.00032 kg; lognormal variance with pedigree 0.0832, pedigree (1,3,5,5,2)
  Estimation. Data from European dataset "paper production, woodfree, uncoated, at non-integrated mill, RER, 2000". Uncertainty has been adjusted consequently.
  Uncertainty: Average from two european fine paper producers in 2000.
- COD, Chemical Oxygen Demand [water, surface water]: 0.00231 kg; lognormal variance with pedigree 0.0832, pedigree (1,3,5,5,2)
  (same comment as for BOD5, Biological Oxygen Demand)
- DOC, Dissolved Organic Carbon [water, surface water]: 0.000855556 kg; lognormal variance with pedigree 0.0832, pedigree (1,3,5,5,2)
  (same comment as for BOD5, Biological Oxygen Demand)
- Nitrogen [water, surface water]: 4e-5 kg; lognormal variance with pedigree 0.0832, pedigree (1,3,5,5,2)
  (same comment as for BOD5, Biological Oxygen Demand)
- Phosphorus [water, surface water]: 1e-5 kg; lognormal variance with pedigree 0.0832, pedigree (1,3,5,5,2)
  (same comment as for BOD5, Biological Oxygen Demand)
- Suspended solids, unspecified [water, surface water]: 5e-5 kg; lognormal variance with pedigree 0.0832, pedigree (1,3,5,5,2)
  (same comment as for BOD5, Biological Oxygen Demand)
- TOC, Total Organic Carbon [water, surface water]: 0.000855556 kg; lognormal variance with pedigree 0.0832, pedigree (1,3,5,5,2)
  (same comment as for BOD5, Biological Oxygen Demand)
- Water [water, surface water]: 0.0156478 m3; lognormal variance with pedigree 0.0406, pedigree (1,1,5,1,1)
  Calculated value, acording to paper mass ratio at factory.

## Sampling procedure
Data collected from an LCA report of the paper producer made in 2011. This paper is produced on one site producing different grades of paper.

## Extrapolations
Composition of wastewater rejected after treatment to river has been estimate from the European dataset "paper production, woodfree, uncoated, at non-integrated mill, RER, 2000". Uncertainty has been adjusted consequently.

## Review by Emilia Moreno Ruiz 2015-09-28
activity links added

## Review by Emilia Moreno Ruiz 2015-10-26
broken formula fix

## Review by Emilia Moreno Ruiz 2015-11-17
AL to deinked pulp removed
