# fibre production, kenaf, retting

Dataset: EcoSpold 2, unit process
Geography: IN
Time period: 2016-04-01 to 2023-03-31
Technology level: current
Classification: ISIC rev.4 ecoinvent: 1311:Preparation and spinning of textile fibres
Scenario: Business-as-Usual
System model: Allocation, cut-off by classification
Generated by: Avraam Symeonidis
Database: ecoinvent
isCopyrightProtected: true
accessRestrictedTo: 1

## General comment
In practice, kenaf retting is very similar to jute retting. This activity is approximated by the jute retting and involves immersion of the bundles of kenaf into stagnant water in the jute cultivation field, tanks, ponds, ditches etc., or in slowly flowing clear water in canals, rivulets, rivers etc. After several days of immersion, the kenaf fibre gets loosen from the stalk and is extracted from the stalk which becomes the byproduct.
This dataset serves as the transformation process of kenaf plant to fibre.

## Included activities start
The activity starts with the immersion of the plant bundles into the water.

## Included activities end
The activity ends with the extraction of the kenaf fibres from the retted plants. It is done manually by hand. The kenaf Fibre is then gets dried in the sun.

## Reference product
- stalk: 1 kg; By-product classification allocatable product; CPC 01929: Other fibre crops, raw, n.e.c.; HS2017 530500: Coconut, abaca (Manila hemp or Musa textilis Nee), ramie and other vegetable textile fibres n.e.c., raw or [...]
  the by-product of the process, is here approximated by stalk.
  production volume 1.73e8 kg; = stalk*PV_kenaf
    Calculated from production volume of reference product using the relative outputs.
  property heating value, net 13.79 MJ
    net (lower) heating (calorific) value. lower calorific value of jute stalk is 3300 kcal/kg (CDM, CER methodology)
  property price 0.00702 EUR2005
    Temporary price data.The price of jute fibre is 0.227 Euro (calculated as 90% of purchasers price based on: 2005 import and export prices (total trades (USD) divided by total weight (kg) in biggest economies of the world: EU27, USA, Brasil, China, India, Japan and Russia) from UN Commodity Trade Statistics Database (http://data.un.org/Explorer.aspxDatabase [Accessed 2011.06.20]). Commodity: Jute and other textile bast fibres, raw or retted)). When producing 1kg of jute fibre, 1.7027kg of stalk is produced as a by-product. The economic allocation factor in eiv2.2 was 95% for jute fibre and 5% for stalk. Following this assumption the price of the stalk is calculated to be ((0.05*0.227)/(1.7027-0.05*1.7027)=) 0.007 Euro.
  properties: allocation factor 0.0507835, carbon allocation 0.382479 kg, carbon content 0.43507, carbon content, fossil 0, carbon content, non-fossil 0.43507, dry mass 0.879121 kg, true value 0.0121446, water content 0.1375, water in wet mass 0.120879 kg, wet mass 1 kg

## Inputs from technosphere
- electricity, low voltage: 0.00246579 kWh; lognormal variance with pedigree 0.1726, pedigree (5,5,3,5,5)
  sum of electricity used for retting water extraction and water ribbioning
- kenaf plant, harvested: 0.451592 kg; lognormal variance with pedigree 0.1726, pedigree (5,5,3,5,5)
  Dry retted fibre yield is 6.5% of total plant volume (fresh green matter)
  properties: carbon content, non-fossil 0.475, dry mass 0.177647 kg, water content 4.62914, wet mass 1 kg
  note on carbon content, non-fossil: Biogenic carbon content of vegetation on a dry mass basis (47.5% DM) derived from FAOSTAT. Reference: http://www.fao.org/forestry/17111/en
- transport, freight, lorry, unspecified: 0.00677387 metric ton*km; = (15.384/1000)*15; lognormal variance with pedigree 0.1726, pedigree (5,5,3,5,5)
  The plants are transported from nearby fields; the estimated distance is 15 km.

## Inputs from nature
- Water, lake [natural resource, in water]: 0.00499029 m3; = 170/1000; lognormal variance with pedigree 0.1726, pedigree (5,5,3,5,5)
  170 kgs of water converted to m3. No wastewater output is considere as the retting process is usually accomplished on jute growing fields or in canals and the wastewater either gets diluted or washed away

## Emissions to nature
- Water [air, unspecified]: 0.000371453 m3; lognormal variance with pedigree 0.1726, pedigree (5,5,3,5,5)
  balance for the water included in the kenaf plant
- Water [water, surface water]: 0.00499029 m3; = 170/1000; lognormal variance with pedigree 0.1726, pedigree (5,5,3,5,5)
  Balance of water.

## Extrapolations
This dataste is extrapolated from jute retting. Uncertainty was adjusted accordingly.
