# transport, passenger train, long-distance

Dataset: EcoSpold 2, unit process
Geography: CH
Time period: 2000-01-01 to 2023-12-31
Technology level: current
Classification: EcoSpold01Categories: transport systems/train
Classification: ISIC rev.4 ecoinvent: 4911:Passenger rail transport, interurban
Scenario: Business-as-Usual
System model: Allocation, cut-off by classification
Generated by: Michael Spielmann (obsolete)
Published in: Spielmann M. 2004
Database: ecoinvent
isCopyrightProtected: true
accessRestrictedTo: 1

## General comment
The dataset represents the entire transport life cycle of a long-distance passenger train in Switzerland. The dataset of the energy use and emissions represents the performance of a long-distance passenger train in Switzerland. In Switzerland, passenger transport is performed almost exclusively by electric powered trains.

## Included activities start
The dataset starts with the production of a long-distance train. Service of energy use and emissions starts with energy consumption.

## Included activities end
The dataset ends with the service of transporting 1 passenger over a distance of 1 km by a long-distance train. The dataset includes the production, the maintenance and the energy use and operation emission of a long-distance train, the construction of a railway track. The dataset of the energy use and emissions ends with the service of transporting 1 person over a distance of 1 km. The dataset includes energy consumption, airborne emissions and emissions to soil. The dataset doesn't include emission of lubricates.

## Geography
Data of energy use and emissions refers to average long-distance transport conditions on the SBB tracks

## Technology
Demand factors of various transport components required to fulfill the functional unit of one pkm. In order to account for the fact that the same rail tracks are used for both passenger and goods transportation are applied allocation factors. The data of energy use and emissions presented in the database represents average environmental interventions, calculated top down from the yearly energy consumption and yearly transport performance. For electricity consumption of long distance trains, yearly average data is available from the SBB (SBB, 2002). Transmission losses (transmission and conversion ex high voltage network) are accounted for with 10%. Due to the fact that on the Swiss rail network only very few diesel locomotives are in operation emissions to air are limited to particulate emissions due to abrasion and emission of sulphur hexafluoride (SF6) occurring during conversion at traction substations. Abrasion (from braking lining, rail and wheel) is predominately composed of iron and mineral components BUWAL (2002). In this study is assumed that all non-airborne abrasion emissions are emitted as iron to soil. Emission of lubricates due to traction are not accounted for, since measures are in operation to avoid such emissions.
References:
BUWAL (2002) PM10-Emissionen des Verkehrs. Statusbericht; Teil Schienenverkehr. 144. Bundesamt fuer Umwelt, Wald und Landschaft, Bern
SBB (2002) Umweltbericht 2000/2001. SBB, Bahnumweltzentrum, Bern, Online-Version under: www.sbb.ch/umwelt.

## Time period
All data of energy use and emissions is based on situation in the year 2000, except the specific energy consumption per pkm (year 2008)

## Reference product
- transport, passenger train: 1 person*km; By-product classification allocatable product; CPC 641: Local transport and sightseeing transportation services of passengers
  EcoSpold01Location=CH
  production volume 3.21232e9 person*km
    UIC statistical synopsis 2005 http://www.uic.org/IMG/xls/synth2005-2.xls ; share for long-distance trains 22.5%
  property price 0.0208844 EUR2005
    Calculated based on inputs: The price of the product has been calculated as a sum of the values of the material and energy inputs for this product. This value is therefore a rough estimation. It may underestimate the real price since there are additional expenses when producing any product. These expences can include for example labour costs, treatment of waste materials and profit for the producer. Please consider carefully whether this level of data quality is acceptable for your application.
  properties: carbon allocation 0 kg, carbon content 0

## Inputs from technosphere
- electricity, high voltage, for Swiss Federal Railways: 0.0748 kWh; source SBB 2002; lognormal variance with pedigree 0.04, pedigree (1,1,5,1,1)
  Calculated value. The data presented in the database represents average environmental interventions, calculated top down from the yearly energy consumption and yearly transport performance. For electricity consumption of regional and long distance trains, yearly average data is available from the SBB (SBB, 2002). Transmission losses (transmission and conversion ex high voltage network) are accounted for with 10%, resulting in a final energy consumption for the year 2008 of 0.0748 kWh/pkm for the operation of long distance trains. Energy use and emissions
  Uncertainty: SBB calculations, top down approach
- maintenance, train, passenger, long distance: 2.4822e-10 unit; lognormal variance with pedigree 0.05, pedigree (1,1,5,1,1)
  Calculated value, required to fulfill the functional unit of one pkm.
  EcoSpold01Location=CH
- railway track: 9.3704e-5 m*year; lognormal variance with pedigree 0.05, pedigree (1,1,5,1,1)
  (same comment as for maintenance, train, passenger, long distance)
- train, passenger, long-distance: 2.4822e-10 unit; lognormal variance with pedigree 0.05, pedigree (1,1,5,1,1)
  (same comment as for maintenance, train, passenger, long distance)

## Emissions to nature
- Particulate Matter, > 10 um [air, unspecified]: 1.1554e-5 kg; lognormal variance with pedigree 0.0981, pedigree (4,2,5,1,1)
  Estimation. For the determination of PM > 10 is assumed a share of 25 % for wheel and rail abrasion. The abrasion of brakes and the resulting share of PM 10 depend on the wheel load and thus differ between fully loaded goods trains and passenger trains. Energy use and emissions
  Uncertainty: own estimates based on PM10 studies
- Particulate Matter, > 2.5 um and < 10um [air, unspecified]: 1.0549e-5 kg; lognormal variance with pedigree 0.1781, pedigree (4,2,5,1,1)
  Estimation. For the determination of PM 10 emission factors for wheels, rail and overhead contacting line, is employed the same figures as used for goods transportation. Energy use and emissions
  Uncertainty: own estimates based on PM10 studies
- Sulfur hexafluoride [air, unspecified]: 3.2912e-9 kg; source Frischknecht R. 2003; lognormal variance with pedigree 0.118025, pedigree (3,5,5,2,3)
  Calculated value. For sulphur hexafluoride (SF6) emitted during conversion at traction substations we assume an emission index of 4.4E-08 kg/kWh Frischknecht (2003) resulting in a specific emission of 3.29E-09 kg/pkm for long-distance transport. Energy use and emissions
  Uncertainty: literature
- Iron ion [soil, unspecified]: 2.8132e-5 kg; source BUWAL 2002; lognormal variance with pedigree 0.0981, pedigree (4,2,5,1,1)
  Estimation. Abrasion (from braking lining, rail and wheel) is predominately composed of iron and mineral components BUWAL (2002). In this study is assumed that all non-airborne abrasion emissions are emitted as iron to soil. In consequence, is assumed a yearly iron load of 239.1 t/a for long distance transport. Energy use and emissions
  Uncertainty: own estimates based on PM10 studies
  property carbon content, fossil 0; name C_content_fossil
  property carbon content, non-fossil 0; name C_content_non_fossil
  property dry mass 1 kg; name DM
  property water content 0; name water_content
  property water in wet mass 0 kg; name WWM
  property wet mass 1 kg; name WM

## Sampling procedure
National statistics, literature studies

## Extrapolations
see Technology and Geography

## Review by Christian Bauer 2010-02-07
passed

## Review by Roland Hischier 2011-09-28
Transfer of documentation done.
--> CHECK comments of exchanges ...

## Review by Carl Vadenbo 2012-06-29
In preparation for the release of ecoinvent v3.0, the datasets 'operation, long-distance train, SBB mix CH' and 'transport, long-distance train, SBB mix CH' in ecoinvent v2.2 were merged into the dataset 'transport, passenger train, long-distance, CH 2008'. The amounts and the uncertainty information of the exchanges were reviewed and were found to correspond to the disaggregated datasets, and the dataset was accepted for inclusion into the ecoinvent database on 2012.07.04.

## Review by Bo Weidema 2012-09-21
input of electricity updated to most recent mix for the Swiss Federal Railways
