# silicon production, multi-Si, casted

Dataset: EcoSpold 2, unit process
Geography: RoW
Time period: 1997-01-01 to 2023-12-31
Technology level: current
Classification: ISIC rev.4 ecoinvent: 2011:Manufacture of basic chemicals
Synonyms: polycrystaline; Monosilane; 7440-21-3; Silicon metal; Silicon tetrahydride; Silicone
Scenario: Business-as-Usual
System model: Allocation, cut-off by classification
Generated by: Mariska J. de Wild-Scholten
Published in: Jungbluth, N. 2007
Database: ecoinvent
isCopyrightProtected: true
accessRestrictedTo: 1

## General comment
This dataset represents the production of a multi-crystalline (or polycrystalline) silicon block. The silicon blocks are produced by melting and casting electronic-grade silicon, off-grade silicon and solar-grade silicon into quartz crucibles. This type of silicon is the starting material for the production of crystalline silicon wafers, either for electronic or for photovoltaic applications. This dataset is based on literature data.
References:
Jungbluth N., Stucki M, and Frischknecht R. (2009) Photovoltaics. In Dones, R. (Ed.) et al., Sachbilanzen von Energiesystemen: Grundlagen für den ökologischen Vergleich von Energiesystemen und den Einbezug von Energiesystemen in Ökobilanzen für die Schweiz. ecoinvent report No. 6-XII, Swiss Centre for Life Cycle Inventories, Dübendorf, CH, 2009.

## Included activities start
The activity starts when the raw materials enter the process.

## Included activities end
This activity ends with the production of a multi-Si block. The dataset includes the melting and casting of different grades of silicon, the energy consumption, water emissions and estimated infrastructure use.

## Geography
Estimation for RER. The data are assumed to be representative of the global production.

## Technology
Electronic-grade silicon, off-grade silicon and solar-grade silicon are molten and casted or melted into quartz crucibles. The crucibles are afterwards reused in road construction. The large round MC-Si blocks are cut with saws to square blocks. The cuttings can be partly reused. Wafers can be directly produced from these multi-crystalline blocks.
Reference:
Jungbluth N., Stucki M, and Frischknecht R. (2009) Photovoltaics. In Dones, R. (Ed.) et al., Sachbilanzen von Energiesystemen: Grundlagen für den ökologischen Vergleich von Energiesystemen und den Einbezug von Energiesystemen in Ökobilanzen für die Schweiz. ecoinvent report No. 6-XII, Swiss Centre for Life Cycle Inventories, Dübendorf, CH, 2009.

## Time period
Time of data collection. Data refer to 2005.

## Parameters
- fraction, cooling water, cooling pond system, to air: 0.032 dimensionless; name fraction_CW_CP_to_air; lognormal variance with pedigree 0.0413, pedigree (2,3,1,3,1)
  Calculated based on literature value (Scown, C.D., 2011, Water Footprint of U.S. Transportation Fuels and supplying information of the article) (Vionnet, S., Quantis Water Database - Technical Report, 2012).
- fraction, cooling water, once-through system, to air: 0.004 dimensionless; name fraction_CW_OT_to_air; lognormal variance with pedigree 0.0413, pedigree (2,3,1,3,1)
  (same comment as for fraction, cooling water, cooling pond system, to air)
- fraction, cooling water, recirculating system, to air: 0.771 dimensionless; name fraction_CW_R_to_air; lognormal variance with pedigree 0.0413, pedigree (2,3,1,3,1)
  (same comment as for fraction, cooling water, cooling pond system, to air)
- fraction, cooling water, to air: 0.3875 dimensionless; name fraction_CW_to_air; = (0.5*fraction_CW_OT_to_air)+(0.5*fraction_CW_R_to_air); lognormal variance with pedigree 0.092025, pedigree (4,4,3,2,4)
  Calculated value based on literature value (see comments of the other parametres present in this dataset) and expert opinion. In the case when no industry/literature data are available about the type of cooling or directly fraction, cooling water, to air specific for the process a default assumption is applied. It is assumed that the once-through cooling system is used in 50% of all cases and recirculating system is used in another 50% of all cases.

## Reference product
- silicon, multi-Si, casted: 1 kg; name RP; By-product classification allocatable product; CPC 34250: Salts of oxometallic or peroxometallic acids; colloidal precious metals and compounds thereof; inorganic and o[…]; HS2017 381800: Chemical elements; doped for use in electronics, in the form of discs, wafers or similar forms; chemical co[...]; CAS 7440-21-3
  The silicon blocks are produced by melting and casting electronic-grade silicon, off-grade silicon and solar-grade silicon into quartz crucibles. This type of silicon is the starting material for the production of crystalline silicon wafers, either for electronic or for photovoltaic applications.
  References:
  Jungbluth N., Stucki M, and Frischknecht R. (2009) Photovoltaics. In Dones, R. (Ed.) et al., Sachbilanzen von Energiesystemen: Grundlagen für den ökologischen Vergleich von Energiesystemen und den Einbezug von Energiesystemen in Ökobilanzen für die Schweiz. ecoinvent report No. 6-XII, Swiss Centre for Life Cycle Inventories, Dübendorf, CH, 2009.
  production volume 1.39104e7 kg; name RP_PV
    32 million kg (ecoinvent report no. 6, part XII page 28) divided by utilisation rate 1.14 kg / kg
  property price 31.5615 EUR2005
    Calculated based on inputs: The price of the product has been calculated as a sum of the values of the material and energy inputs for this product. This value is therefore a rough estimation. It may underestimate the real price since there are additional expenses when producing any product. These expences can include for example labour costs, treatment of waste materials and profit for the producer. Please consider carefully whether this level of data quality is acceptable for your application.
  properties: carbon allocation 0 kg, carbon content 0, carbon content, fossil 0, carbon content, non-fossil 0, dry mass 1 kg, water content 0, water in wet mass 0 kg, wet mass 1 kg

## Inputs from technosphere
- argon, liquid: 0.26661 kg; lognormal variance with pedigree 0.0421, pedigree (1,2,5,5,1)
  Literature value (de Wild 2007), for ingot growing
  Uncertainty: d
  properties: dry mass 1 kg, wet mass 1 kg
- ceramic tile: 0.34204 kg; lognormal variance with pedigree 0.0421, pedigree (1,2,5,5,1)
  Literature value (de Wild 2007), quarz for ingot growing
  Uncertainty: d
  properties: dry mass 1 kg, wet mass 1 kg
- electricity, medium voltage: 0.647304, 12.9123, 0.323241, 0.198227, 0.0396748, 0.00851908, 1.33339, 3.83239 kWh (8 suppliers, which the file names only by identifier); sum of these 19.295 kWh; lognormal variance with pedigree 0.0421, pedigree (1,2,5,5,1)
  Estimation based on literature values (de Wild 2007).
  Uncertainty: E
- helium: 0.00011943 kg; lognormal variance with pedigree 0.0421, pedigree (1,2,5,5,1)
  Literature value (de Wild 2007), for ingot growing
  Uncertainty: d
  properties: dry mass 1 kg, wet mass 1 kg
- nitrogen, liquid: 0.046747 kg; lognormal variance with pedigree 0.0421, pedigree (1,2,5,5,1)
  Literature value (de Wild 2007), for ingot growing
  Uncertainty: d
  properties: dry mass 1 kg, wet mass 1 kg
- silicon, electronics grade: 0.165945 kg; = 1.1402*0.14554; lognormal variance with pedigree 0.0427, pedigree (1,2,5,5,1)
  Literature value (de Wild 2007), total silicon needed minus internally recycled silicon from ingot cut-offs and broken wafers. The ratio between silicon, electronics grade and silicon, solar grade is based on world production volumes (Jungbluth, 2007, ecoinvent v2 report no.6).
  Uncertainty: d
  property carbon content, fossil 0; name C_content_fossil
  property carbon content, non-fossil 0; name C_content_non_fossil
  property dry mass 1 kg; name DM
  property water content 0; name water_content
  property water in wet mass 0 kg; name WWM
  property wet mass 1 kg; name WM
- silicon, solar grade: 0.974258 kg; = 1.1402*0.854462; lognormal variance with pedigree 0.0427, pedigree (1,2,5,5,1)
  (same comment as for silicon, electronics grade)
  properties: dry mass 1 kg, wet mass 1 kg
- silicone factory: 1e-11 unit; lognormal variance with pedigree 0.3601, pedigree (1,2,5,5,3)
  Estimated value
  Uncertainty: E

## Inputs from nature
- Water, cooling, unspecified natural origin [natural resource, in water]: 5 m3; name water_cooling_UNO_input; lognormal variance with pedigree 0.056, pedigree (3,4,5,5,1)
  Literature value (Nijs 1997).
  Uncertainty: N

## Emissions to nature
- Water [air, unspecified]: 1.9375 m3; = (water_cooling_UNO_input*fraction_CW_to_air); lognormal variance with pedigree 0.0827, pedigree (2,2,5,5,1)
  Calculated as a fraction of the input of water. For more details, refer to the mathematical relation and the parameters.
- Water [water, unspecified]: 3.0625 m3; = water_cooling_UNO_input*(1-fraction_CW_to_air); lognormal variance with pedigree 0.0827, pedigree (2,2,5,5,1)
  (same comment as for Water)

## Sampling procedure
Literature data.

## Extrapolations
Extrapolation with cumulative data including wafer sawing for electricity use. This dataset has been copied from an original dataset covering the geography RER. The uncertainty has been adjusted accordingly.

## Review by Gregor Wernet 2017-08-04
This dataset was additionally reviewed in a separate review process by Eric Johnson of Atlantic Consulting as well as Emilia Moreno Ruiz and Gregor Wernet of ecoinvent.
