# sawdust, wet, measured as dry mass to generic market for residual softwood, wet

Dataset: EcoSpold 2, unit process
Geography: Europe without Switzerland
Time period: 2014-01-01 to 2023-12-31
Technology level: current
Classification: ISIC rev.4 ecoinvent: 1610:Sawmilling and planing of wood
Scenario: Business-as-Usual
System model: Allocation, cut-off by classification
Generated by: Nora Minas
Database: ecoinvent
isCopyrightProtected: true
accessRestrictedTo: 1

## General comment
This activity is linking the more specific market for saw dust, to the more generic market for residual softwood, wet; and residual hardwood, wet.It makes accesible the specific product saw dust through the more generic products of wet residual wood.
[This dataset is meant to replace the following datasets:
- saw dust, wet, measured as dry mass to generic market for residual softwood, wet, RER, 2014 - 2014]
[This dataset is meant to replace the following datasets:
- saw dust, wet, measured as dry mass to generic market for residual softwood, wet, RER, 2014 - 2014]

## Included activities start
Entry of the specific product "saw dust, wet, measured as dry mass"

## Included activities end
Delivery of the generic products "residual softwood, wet" and "residual hardwood, wet"

## Reference product
- residual softwood, wet: 1 m3; name residual_softwood_wet; By-product classification allocatable product; CPC 39283: Non-agglomerated wood waste and scrap; HS2017 440140: Wood; for fuel, sawdust and wood waste and scrap, not agglomerated
  production volume 1.71111e6 m3; = 7.70E+09*0.1/ residual_softwood_wet_DM
    7.70E+09 kg is the rough Production Volumes of saw dust produced out of sawing. It is considered that 10% of this volume is consumed as the more generic product "residual hardwood, wet", and 10% as "residual softwood, wet". The Dry Mass of those products is used to calculate the Production Volumes in m3.
  property dry mass 450 kg; name residual_softwood_wet_DM
  property heating value, net 5962.7 MJ
    LHV is calculated based on the Carbon content of the product. More details can be found on the respective documentation.The property is based on a value of 7.79MJ/kg
  property price 19.5 EUR2005
    Data on Import/Export (USD/kg) from UN data has been used. (http://data.un.org/Data.aspx?d=ComTrade&f=_l1Code%3a45, [accessed 10th June 2010]) Commodity: 'Sawdust, wood waste or scrap'. A density of 250 kg/m3 was used to convert from M3 to kg (data on density: http://wiki.answers.com/Q/What_is_the_density_of_sawdust, [Accessed 13 June 2010]).
  properties: allocation factor 0.318108, carbon allocation 222.3 kg, carbon content 0.494, carbon content, fossil 0, carbon content, non-fossil 0.494, true value 9.75, water content 0.7, water in wet mass 315 kg, wet mass 765 kg

## Inputs from technosphere
- sawdust, wet, measured as dry mass: 349.918 kg; = (residual_softwood_wet_DM* residual_softwood_wet)+ (residual_hardwood_wet_DM* residual_hardwood_wet)
  Calculated using the Dry Mass of the reference product and the by-product. It has been considered that this product feeds the generic markets for "residual hardwood, wet" and "residual softwood, wet" in a 50%:50% share.
  properties: carbon content, non-fossil 0.494, dry mass 1 kg, heating value, net 7.79 MJ, water content 0.7, wet mass 1.7 kg

## Inputs from nature
- Carbon dioxide, non-fossil, resource correction [natural resource, in air]: 181.281 kg
