# charcoal production

Dataset: EcoSpold 2, unit process
Geography: GLO
Time period: 1985-01-01 to 2023-12-31
Technology level: current
Classification: ISIC rev.4 ecoinvent: 0220:Logging
Classification: EcoSpold01Categories: wood energy/fuels
Tags: ConvertedDataset
Scenario: Business-as-Usual
System model: Allocation, cut-off by classification
Generated by: Niels Jungbluth
Published in: Werner F. 2007
Database: ecoinvent
isCopyrightProtected: true
accessRestrictedTo: 1

## General comment
This dataset represents the production of one kg of charcoal from hardwood.
The dataset considers the production of charcoal from wood as a pre-product for technical processes. The carbon content of the charcoal ranges between 78 and 90-wt% and is assumed 80%. The heating value of charcoal ranges between 29 and 33MJ/kg. The hardwood used in the charcoal production is from forest plantations with full CO2 uptake assumed.
The dataset is based on literature data for European production, which is assumed to represent the average global production. Most of the global production, however, takes place in South America and Asia; for inventories of charcoal from these two regions it is suggested to do a sensitivity analysis and calculate a part of the CO2 emissions as fossil emissions.
Particle emission figures are assumed equal to data from carbon black production. A large uncertainty is related to the CO2 uptake and release in the life cycle which is not directly quantified here. Charcoal from developing countries comes from native forest. Furthernore, due to transportation to Europe this charcoal use cannot be considered CO2 neutral.

## Included activities start
From reception of hardwood logs at charcoal factory gate.

## Included activities end
This activity ends with charcoal at factory gate. The dataset includes emissions to air of biogenic CO2 / CH4, ethene and particulates. The dataset does not include infrastructure, waste gas treatment, fossil CO2 emissions and land use in forest plantation (since land use for charcoal production is considered neglegable compared to the use for the forest).

## Geography
Most of global production takes place in South America and Asia. Background data represents Europe.

## Technology
The efficiency of charcoal production shows large variations from 9 to 35% depending on the state of technology applied (Risollo-Calle et al., 1996).
The technology assumed is pyrolysis of wood in a small scale production plant / a kiln. No waste gas or effluent treatment is considered. A production of 0.3 kg charcoal/kg wood is assumed. 2.93 kg of CO2 are formed during the combustion of 1 kg charcoal. Here it is assumed that the by-products of the pyrolysis (methanol, acetic acid, etc.) can be used (0.23 kg/kg wood), but all environmental impacts of the production are allocated to the main product charcoa (Briane et al., 1985)l.
Production of 1 kg charcoal, incl. wood drying process, uses 2.5 MJ heat, 0.075 kWh electricity and 50 l cooling water. It is assumed that wood boilers provide the remaining heat of 0.9 MJ/kg charcoal (Brocksiepe, 1997).
Construction work is mainly human labour. Often there are no fixed plants but production sites are located near the forest with no fixed infrastructure parts.
Reference:
Rosillo-Calle F., de Rezende M. A. A., Furtado P. and Hall D. O. (1996) The charcoal dilemma: Finding a sustainable solution for Brazilian Industry. Intermediate Technology Publica-tions, Exeter, UK.
AND
Briane D., Doat J. and Riedacker A. (1985 ) Guide technique de la carbonisation: La fabrication du charbon de bois. Agence Française pour la Maîtrise de l'Éner-gie, ÉDISUD, Aix-en-Provence.
AND
Brocksiepe H.-G. I. (ed.) (1997) Charcoal. In: Ullmann's encyclopedia of industrial chemistry, Vol. A 6 (ed. Arpe et al.). 5 Edition. pp. 157ff. (ed. VCH).

## Time period
Time of publications

## Parameters
- fraction, cooling water, cooling pond system, to air: 0.032 dimensionless; name fraction_CW_CP_to_air; lognormal variance with pedigree 0.0413, pedigree (2,3,1,3,1)
  Calculated based on literature value (Scown, C.D., 2011, Water Footprint of U.S. Transportation Fuels and supplying information of the article) (Vionnet, S., Quantis Water Database - Technical Report, 2012).
- fraction, cooling water, once-through system, to air: 0.004 dimensionless; name fraction_CW_OT_to_air; lognormal variance with pedigree 0.0413, pedigree (2,3,1,3,1)
  (same comment as for fraction, cooling water, cooling pond system, to air)
- fraction, cooling water, recirculating system, to air: 0.771 dimensionless; name fraction_CW_R_to_air; lognormal variance with pedigree 0.0413, pedigree (2,3,1,3,1)
  (same comment as for fraction, cooling water, cooling pond system, to air)
- fraction, cooling water, to air: 0.3875 dimensionless; name fraction_CW_to_air; = (0.5*fraction_CW_OT_to_air)+(0.5*fraction_CW_R_to_air); lognormal variance with pedigree 0.092025, pedigree (4,4,3,2,4)
  Calculated value based on literature value (see comments of the other parametres present in this dataset) and expert opinion. In the case when no industry/literature data are available about the type of cooling or directly fraction, cooling water, to air specific for the process a default assumption is applied. It is assumed that the once-through cooling system is used in 50% of all cases and recirculating system is used in another 50% of all cases.

## Reference product
- charcoal: 1 kg; name RP; By-product classification allocatable product; CPC 34510: Wood charcoal; HS2017 4402: Wood charcoal (including shell or nut charcoal), whether or not agglomerated; CAS 16291-96-6
  EcoSpold01Location=GLO
  Reference product. Charcoal produced from hardwood. The charcoal production is based on wood from forest plantations in United Kingdom, however, extrapolated to represent the global production. The charcoal is used as fuel.
  production volume 5.12796e10 kg
    annual world production in 2012 according to source; product "wood charcoal"
  property carbon content, non-fossil 0.8; name RP_content
    Tab 15.1, ecoinvent v2.2 report 9-part 15
  property heating value, net 28.4 MJ
    Indicative value. Reference: Fuels - Higher and Lower Calorific Values, available at: https://www.engineeringtoolbox.com/fuels-higher-calorific-values-d_169.html
  property price 0.28 EUR2005
    Export prices for the World+ according to: http://faostat.fao.org/site/626/DesktopDefault.aspx?PageID=626#ancor downloaded 11 May 2009; calculated as export value divided by export volume.
  properties: carbon allocation 0.8 kg, carbon content 0.8, carbon content, fossil 0, dry mass 1 kg, water content 0, water in wet mass 0 kg, wet mass 1 kg

## Inputs from technosphere
- cleft timber, measured as dry mass: 3.13995, 0.118444, 0.0834074, 0.00793269 kg (4 suppliers, which the file names only by identifier); sum of these 3.34974 kg; = ((ethylene_content*ethylene)+(methane_content*methane)+ (RP*RP_content)+(ethane*ethane_content)+( carbon_dioxide_content*carbon_dioxide)+(carbon_monoxide*carbon_monoxide_content))/cleft_timber_C_content_non_fossil; lognormal variance with pedigree 0.0721, pedigree (3,4,5,3,3)
  Calculated amount. Calculation based on the carbon content of the output of the activity. The amount of cleft timeber is calculated summing the carbon content of the output and dividing it for the carbon content of the cleft timber.
  Uncertainty: Literature, 0.3kg charcoal per kg of wood, allocation to charcoal production
  properties: apparent wood density 491.9 kg/m3, basic wood density 378.4, carbon content, non-fossil 0.494, dry mass 1 kg, dry wood density 430 kg/m3, heating value, gross 20.4 MJ, heating value, net 14.46 MJ, water content 0.3, wet mass 1.3 kg
- electricity, medium voltage: 0.075 kWh; source Brocksiepe H.-G 1997; lognormal variance with pedigree 0.0541, pedigree (3,4,5,3,1)
  EcoSpold01Location=UCTE
  Literature Value
  Uncertainty: Literature
- heat, central or small-scale, other than natural gas: 0.72 MJ; source Brocksiepe H.-G 1997; lognormal variance with pedigree 0.0541, pedigree (3,4,5,3,1)
  EcoSpold01Location=CH
  Literature Value
  Uncertainty: Literature
  properties: heating value, net 1 MJ

## Inputs from nature
- Water, cooling, unspecified natural origin [natural resource, in water]: 0.05 m3; name water_cooling_UNO_input; source Brocksiepe H.-G 1997; lognormal variance with pedigree 0.078, pedigree (3,5,5,1,3)
  Literature Value
  Uncertainty: Literature

## Emissions to nature
- Carbon dioxide, non-fossil [air, non-urban air or from high stacks]: 2.695 kg; name carbon_dioxide; lognormal variance with pedigree 0.0541, pedigree (3,4,5,3,1)
  Calculated Value
  Uncertainty: Calculated
  property carbon content, non-fossil 0.272916; name carbon_dioxide_content
- Carbon monoxide, non-fossil [air, non-urban air or from high stacks]: 0.19 kg; name carbon_monoxide; lognormal variance with pedigree 0.7041, pedigree (3,4,5,3,1)
  Measured Value. Laboratory measurent: 5.7 % of wood used in process as emission released.
  Uncertainty: Laboratory measurement 5.7% of wood used in process as emission released
  property carbon content, non-fossil 0.428805; name carbon_monoxide_content
- Ethane [air, non-urban air or from high stacks]: 0.007 kg; name ethane; lognormal variance with pedigree 0.1741, pedigree (3,4,5,3,1)
  Measured Value. Laboratory measurent: 0.21 % of wood used in process as emission released.
  Uncertainty: Laboratory measurement 0.21% of wood used in process as emission released
  property carbon content, fossil 0.798879; name ethane_content
- Ethylene [air, non-urban air or from high stacks]: 0.0023333 kg; name ethylene; lognormal variance with pedigree 0.4581, pedigree (5,5,5,3,5)
  Measured Value. Laboratory measurent: 0.07 % of wood used in process as emission released.
  Uncertainty: Laboratory measurement 0.07% of wood used in process as emission released
  property carbon content, fossil 0.856285; name ethylene_content
- Methane, non-fossil [air, non-urban air or from high stacks]: 0.040333 kg; name methane; lognormal variance with pedigree 0.0941, pedigree (3,4,5,3,1)
  Measured Value. Laboratory measurent: 1.21 % of wood used in process as emission released.
  Uncertainty: Laboratory measurement 1.21% of wood used in process as emission released
  property carbon content, non-fossil 0.748687; name methane_content
- Particulate Matter, < 2.5 um [air, non-urban air or from high stacks]: 0.00045 kg; lognormal variance with pedigree 0.63, pedigree (5,5,5,5,5)
  Estimation
  Uncertainty: Estimation
- Particulate Matter, > 10 um [air, non-urban air or from high stacks]: 5.5e-5 kg; lognormal variance with pedigree 0.37, pedigree (5,5,5,5,5)
  Estimation
  Uncertainty: Estimation
- Particulate Matter, > 2.5 um and < 10um [air, non-urban air or from high stacks]: 5e-5 kg; lognormal variance with pedigree 0.45, pedigree (5,5,5,5,5)
  Estimation
  Uncertainty: Estimation
- Water [air, unspecified]: 0.019375 m3; name water_to_air_unspecified; = (water_cooling_UNO_input*fraction_CW_to_air); lognormal variance with pedigree 0.0807, pedigree (2,2,5,1,1)
  Calculated value based on literature values and expert opinion. See comments in the parametres' comment field.
  property fraction, origin: fresh water 0; name fraction_origin_fresh_water
  property fraction, origin: salt water 0; name fraction_origin_salt_water
  property fraction, origin: unspecified 1; name fraction_origin_unspecified
- Water [water, unspecified]: 0.030625 m3; name water_to_water_unspecified; = water_cooling_UNO_input*(1-fraction_CW_to_air); lognormal variance with pedigree 0.0807, pedigree (2,2,5,1,1)
  (same comment as for Water)
  property carbon content, fossil 0; name C_content_fossil
  property carbon content, non-fossil 0; name C_content_non_fossil
  property dry mass 0 kg; name DM
  property fraction, origin: fresh water 0; name fraction_origin_fresh_water_Ww
  property fraction, origin: salt water 0; name fraction_origin_salt_water_Ww
  property fraction, origin: unspecified 1; name fraction_origin_unspecified_Ww
  property water in wet mass 1000 kg; name WWM
  property wet mass 1000 kg; name WM

## Sampling procedure
Literature survey

## Extrapolations
From single data.

## Review by Mischa Classen 2006-02-16
Passed.
none

## Review by Roland Hischier 2011-10-11
Transfer of documentation done.

## Review by Emilia Moreno Ruiz 2014-06-03
input changed from log to to cleft timber (following new modeling of forestry activities)
