# treatment of waste gypsum plasterboard, collection for final disposal

Dataset: EcoSpold 2, unit process
Geography: RoW
Time period: 1994-01-01 to 2023-12-31
Technology level: current
Classification: ISIC rev.4 ecoinvent: 3821:Treatment and disposal of non-hazardous waste
Synonyms: calcium sulfate dihydrate (has CAS 10101-41-4); natural gypsum (has CAS 13397-24-5; selenite; alabaster
Scenario: Business-as-Usual
System model: Allocation, cut-off by classification
Generated by: Gabor Doka (obsolete)
Published in: Doka G. 2007
Database: ecoinvent
isCopyrightProtected: true
accessRestrictedTo: 1

## General comment
The process represents the collection of 'waste gypsum plasterboard' for final disposal. The waste contains 1kg gypsum, while its density is 1000 kg/m3.

## Included activities start
The activity starts when the building demolition activity is ready to be performed.Transportation of the waste to the treatment plant is not included.

## Included activities end
The activity includes energy for dismantling, particulate matter emissions from dismantling and handling, and final disposal of waste material.

## Geography
Modelling parameters are not specific to this geography.

## Technology
Building demolition with skid-steer loaders.

## Reference product
- waste gypsum plasterboard: -1 kg; By-product classification Waste; CPC 39990: Other wastes n.e.c.
  production volume 1.45962e9 kg
    calculated as the total PV of the waste gypsum plasterboard generated in the database at the geographies of Brazil and Peru (100741835.784171 kg) and scaled up based on the PE and BR GDP (100741835.784171/2.51% + 0.32% = 3560042423.25704). Then it is split based on its market share (41% collected for final disposal)
  property heating value, net 0 MJ
    Non combustible products are assumed to have an LHV equal to zero (0).
  property price 0 EUR2005
    Waste products are assigned a price of zero as they are assumed to require further treatment.
  properties: carbon allocation 0 kg, carbon content 0, carbon content, fossil 0, carbon content, non-fossil 0, dry mass 0.807 kg, water content 0.239157, water in wet mass 0.193 kg, wet mass 1 kg

## Inputs from technosphere
- diesel, burned in building machine: 0.0359 MJ; lognormal variance with pedigree 0.072, pedigree (1,1,5,5,1)
  energy for demolition. Uncertainty from range in (DAFSTB 1996)
  properties: heating value, net 1 MJ
- waste gypsum: -0.234971, -0.765029 kg (2 suppliers, which the file names only by identifier); sum of these -1 kg; lognormal variance with pedigree 0.002, pedigree (1,1,1,5,1)
  disposed masses. Uncertainty calculated from uncertainty of waste composition
  production volume
    Calculated from the production volume of waste gypsum plaster board in proportion to the respective output amounts.
  properties: dry mass 0.806 kg, water content 0.240695, wet mass 1 kg

## Emissions to nature
- Particulate Matter, < 2.5 um [air, urban air close to ground]: 1.66e-5 kg; lognormal variance with pedigree 0.3632, pedigree (2,3,5,5,1)
  Emission from dismantling and handling. from one extrapolated PM10 emission factor and generic PM fractions from measurements
  Uncertainty: & basic uncertainty of 3; from one extrapolated PM10 emission factor and generic PM fractions from measurements
- Particulate Matter, > 10 um [air, urban air close to ground]: 8.35e-5 kg; lognormal variance with pedigree 0.0932, pedigree (2,3,5,5,1)
  Emission from dismantling and handling. from one extrapolated PM10 emission factor and generic PM fractions from measurements
  Uncertainty: & basic uncertainty of 1.5; from one extrapolated PM10 emission factor and generic PM fractions from measurements
- Particulate Matter, > 2.5 um and < 10um [air, urban air close to ground]: 6.34e-5 kg; lognormal variance with pedigree 0.1832, pedigree (2,3,5,5,1)
  Emission from dismantling and handling. from one extrapolated PM10 emission factor and generic PM fractions from measurements
  Uncertainty: & basic uncertainty of 2; from one extrapolated PM10 emission factor and generic PM fractions from measurements

## Sampling procedure
waste-specific calculation based on literature data

## Extrapolations
This dataset has been copied from an original dataset covering the geography CH. The uncertainty and Production Volume (PV) has been adjusted accordingly.

## Review by Niels Jungbluth 2003-05-22
Passed. Calculation for standard deviation 95 of transport services differs from standard Pedigree approach in this project and figure obtained by this procedure (2.09). Uncertainty for estimation of distance is not included.
