# rape seed production

Dataset: EcoSpold 2, unit process
Geography: RoW
Time period: 2000-01-01 to 2023-12-31
Technology level: current
Classification: ISIC rev.4 ecoinvent: 0111:Growing of cereals (except rice), leguminous crops and oil seeds
Synonyms: rapeseed
Tags: WFLDB
Scenario: Business-as-Usual
System model: Allocation, cut-off by classification
Generated by: [System]
Database: ecoinvent
isCopyrightProtected: true
accessRestrictedTo: 1

## General comment
This dataset represents the production of 1 kg of rape seed (fresh matter). The amounts of flows are weighted averages over all existing local crop production datasets available for this specific product. For references refer to the respective local datasets.
This dataset was built as a weighted average of regional datasets of the same activityName. Weights are based on production volumes.
Canada without Quebec: production volume = 1.37e+10 kg/year, weight = 0.6292
DE: production volume = 3.5e+09 kg/year, weight = 0.1607
FR: production volume = 3.31e+09 kg/year, weight = 0.1516
US: production volume = 1.24e+09 kg/year, weight = 0.05706
CA-QC: production volume = 2.99e+07 kg/year, weight = 0.001373

## Included activities start
This activity starts with soil cultivation after the harvest of the previous crop.

## Included activities end
This activity ends with the harvest of grains and their transport to the farm gate. The dataset includes all machine operations, corresponding infrastructure, fuel use and sheds. Machine operations are: soil cultivation (a mixture of no tillage and minimum tillage), sowing, fertilisation, pesticide application, harvesting, grain drying, and on-farm transport. Further, direct field emissions and land use change are included. Heavy metal uptake by the crop is considered. The inputs of seeds, fertilisers and pesticides as well as packaging of fertilisers and pesticides are considered.

## Geography
This dataset is a weighted average built from the following geographies: Canada without Quebec, DE, FR, US, CA-QC.

## Technology
Conventional production.

## Time period
The time period start (2000) and end (2012) are set according to the time periods of regional datasets for the same activity name.

## Reference product
- rape seed: 1 kg; By-product classification allocatable product; CPC 01443: Rape or colza seed; HS2017 120590: Oil seeds; rape or colza seeds, other than low erucic, whether or not broken
  The amount of this exchange is a weighted average of the regional datasets for this activity. Weights are based on production volumes. Canada without Quebec: 62.92%, DE: 16.07%, FR: 15.16%, US: 5.71% and CA-QC: 0.14%. For references please consult the respective local datasets.
  production volume 4.51068e10 kg; = 71333434.68*1000
    According to FAOstat, the yearly production volume of rape seed in the World in 2021 was 71333434.68 metric tonne. Data accessed 30.05.2023 and retrieved from: https://www.fao.org/faostat/en/#data/QCL.
  property carbon content, non-fossil 0.574
    biogene carbon content on a dry matter basis
    Composition data obtained from Table 2.1 in Utilization of canola seed fractions in ruminant feeds, Master thesis by Ravindra Guptha Heendeniya, University of Saskatchewan (Canada), 2008 (http://library2.usask.ca/theses/available/etd-06162008-141937/unrestricted/THESES_Ravindra_Heendeniya_17_june_2008.pdf). First, composition data were refered to 1 kg dry mass. Then, C-contents were calculated considering a C-content/dry mass of 46% in carbohydrates (including fibres), 53% in proteins and 75% in fats. All data from "Evolutionary and Biochemical Aspects", A.D. Kay and T. Vrede (in Global Ecology, 2010, Elsevier B.V., S.E. Jørgensen Ed.).
  property energy content 24.8912 MJ
    See chapter 'Product Properties' in "01_crop production - yields & inputs CH & Europe_v1.0.pdf", section "AGRICULTURAL PRODUCTION IN SWITZERLAND" - pdf-document on the dedicated talk page of ecoinvent (www.ecoinvent.org/documentation)
  property price 0.304288 EUR2005
    Calculated based on inputs: The price of the product has been calculated as a sum of the values of the material and energy inputs for this product. This value is therefore a rough estimation. It may underestimate the real price since there are additional expenses when producing any product. These expences can include for example labour costs, treatment of waste materials and profit for the producer. Please consider carefully whether this level of data quality is acceptable for your application.
  properties: carbon allocation 0.53956 kg, carbon content 0.574, carbon content, fossil 0, dry mass 0.94 kg, water content 0.0638298, water in wet mass 0.06 kg, wet mass 1 kg

## Inputs from technosphere
- [sulfonyl]urea-compound: 7.31984e-10 kg; lognormal variance with pedigree 0.0112, pedigree (2,1,4,5,1)
  (same comment as for rape seed)
  properties: carbon content, fossil 0.540853, dry mass 1 kg, wet mass 1 kg
  note on carbon content, fossil: Approximated as an unweighted average of the C-content of the [sulfonyl]urea-compounds (Tab 2.25 Sutter, 2010) chlorotoluron, Diuron, Linuron and Isoproturon.
- [thio]carbamate-compound: 1.2765e-5 kg; lognormal variance with pedigree 0.0833, pedigree (2,2,5,5,4)
  (same comment as for rape seed)
  properties: carbon content, fossil 0.626349, dry mass 1 kg, wet mass 1 kg
  note on carbon content, fossil: Approximated as an unweighted average of the C-content of the [thio]carbamate-compounds (Tab 2.25 Sutter, 2010) carbofuran,orbencarb, prosulfocarb
- acetamide-anillide-compound, unspecified: 2.02612e-5 kg; lognormal variance with pedigree 0.0113, pedigree (2,2,4,5,1)
  (same comment as for rape seed)
  properties: carbon content, fossil 0.659175, dry mass 1 kg, wet mass 1 kg
  note on carbon content, fossil: Approximated as an unweighted average of the C-content of the acetamide-anillide-compound (Tab 2.25 Sutter, 2010) alachor, metolachlor, propachlor and teflubenzuron
- ammonia, anhydrous, liquid: 0.000335968, 0.000652182, 0.00722902, 0.000305575, 0.0025122, 0.000215953 kg (6 suppliers, which the file names only by identifier); sum of these 0.0112509 kg; lognormal variance with pedigree 0.0439, pedigree (2,2,5,5,2)
  (same comment as for rape seed)
  properties: dry mass 1 kg, wet mass 1 kg
- ammonium nitrate: 0.00638275, 0.0216676 kg (2 suppliers, which the file names only by identifier); sum of these 0.0280504 kg; lognormal variance with pedigree 0.0439, pedigree (2,2,5,5,2)
  (same comment as for rape seed)
  properties: dry mass 1 kg, wet mass 1 kg
- ammonium sulfate: 0.00257799 kg; lognormal variance with pedigree 0.0119, pedigree (2,2,4,5,2)
  (same comment as for rape seed)
  properties: dry mass 1 kg, wet mass 1 kg
- application of plant protection product, by field sprayer: 0.00196966 ha; lognormal variance with pedigree 0.0119, pedigree (2,2,4,5,2)
  (same comment as for rape seed)
- benzo[thia]diazole-compound: 2.39169e-8 kg; lognormal variance with pedigree 0.0827, pedigree (1,2,5,5,4)
  (same comment as for rape seed)
  properties: carbon content, fossil 0.499869, dry mass 1 kg, wet mass 1 kg
- borax, anhydrous, powder: 3.09464e-6 kg; lognormal variance with pedigree 0.0119, pedigree (2,2,4,5,2)
  (same comment as for rape seed)
  properties: dry mass 1 kg, wet mass 1 kg
- combine harvesting: 0.000470897 ha; lognormal variance with pedigree 0.0119, pedigree (2,2,4,5,2)
  (same comment as for rape seed)
- cyclic N-compound: 4.80188e-5 kg; lognormal variance with pedigree 0.0113, pedigree (2,2,4,5,1)
  (same comment as for rape seed)
  properties: carbon content, fossil 0.641962, dry mass 1 kg, wet mass 1 kg
  note on carbon content, fossil: Calculated as an unweigthed average of the C content of the cyclic N-compounds where information was avaliable in Sutter, 2010, following the classification in Tab 2.25 in Sutter 2010: Difenoconazole (C19H17Cl2N3O3), Fenpropidin (C19H31N), Fenpropimorph (C20H33NO), Flusilazole (C16H15F2N3Si), Metconazole (C17H22ClN3O), Penconazole (C13H15Cl2N3), Propiconazole (C15H17Cl2N3O2), Tebuconazole (C16H22ClN3O)
- dinitroaniline-compound: 6.99947e-5 kg; lognormal variance with pedigree 0.0113, pedigree (2,2,4,5,1)
  (same comment as for rape seed)
  properties: carbon content, fossil 0.55516, dry mass 1 kg, wet mass 1 kg
  note on carbon content, fossil: C content of dinitroaniline-compound was calculated after the C content of the herbicide pendimethalin, classified as dinitroaniline-compound in Tab 2.25 of Sutter 2010
- diphenylether-compound: 3.6848e-6 kg; lognormal variance with pedigree 0.0113, pedigree (2,2,4,5,1)
  (same comment as for rape seed)
  properties: carbon content, fossil 0.560061, dry mass 1 kg, wet mass 1 kg
  note on carbon content, fossil: C content of diphenylether-compounds was calculated after the C content of thepesticides aclonifen and diflufenican classified as diphenylether-compound in Tab 2.25 of Sutter 2010
- drying of bread grain, seed and legumes: 0.00551514 l; lognormal variance with pedigree 0.0113, pedigree (2,2,4,5,1)
  (same comment as for rape seed)
- drying of feed grain: 0.0367662 l; lognormal variance with pedigree 0.0112, pedigree (2,1,4,5,1)
  (same comment as for rape seed)
- fertilising, by broadcaster: 0.000876104 ha; lognormal variance with pedigree 0.0119, pedigree (2,2,4,5,2)
  (same comment as for rape seed)
- glyphosate: 9.79879e-7 kg; lognormal variance with pedigree 0.0827, pedigree (1,2,5,5,4)
  (same comment as for rape seed)
  properties: carbon content, fossil 0.214286, dry mass 1 kg, wet mass 1 kg
- inorganic nitrogen fertiliser, as N: 2.70033e-7, 7.41582e-6, 4.95731e-6, 1.31792e-6, 6.33649e-5, 7.51658e-6, 4.90089e-6, 9.5519e-7, 8.07155e-5, 4.13109e-6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 kg (59 suppliers, which the file names only by identifier); sum of these 0.00731785 kg; lognormal variance with pedigree 0.0119, pedigree (2,2,4,5,2)
  (same comment as for rape seed)
  properties: dry mass 1 kg, wet mass 1 kg
- inorganic phosphorus fertiliser, as P2O5: 4.87016e-6, 1.32277e-6, 3.60044e-6, 8.78367e-6, 0.000109596, 0.000243264, 3.33954e-5, 4.08745e-6, 5.09105e-5, 2.26114e-6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 kg (59 suppliers, which the file names only by identifier); sum of these 0.0142168 kg; lognormal variance with pedigree 0.0439, pedigree (2,2,5,5,2)
  (same comment as for rape seed)
  properties: dry mass 1 kg, wet mass 1 kg
- irrigation: 0.0450694, 0.000384334, 0.0234531, 0.000296095, 0.000793889, 0.00109126, 0.000173203, 4.45453e-6, 0.00262359, 0.00439332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 m3 (12 suppliers, which the file names only by identifier); sum of these 0.0797582 m3; lognormal variance with pedigree 0.0433, pedigree (2,2,5,5,1)
  (same comment as for rape seed)
  properties: dry mass 0.11 kg, water content 9089.91, wet mass 1000 kg
- lime: 0.00142408 kg; lognormal variance with pedigree 0.0119, pedigree (2,2,4,5,2)
  (same comment as for rape seed)
  properties: carbon content, fossil 0.120005, dry mass 1 kg, wet mass 1 kg
- liquid manure spreading, by vacuum tanker: 0.00109001 m3; lognormal variance with pedigree 0.0119, pedigree (2,2,4,5,2)
  (same comment as for rape seed)
- manure, liquid, cattle: 0.755871 kg; lognormal variance with pedigree 0.0119, pedigree (2,2,4,5,2)
  (same comment as for rape seed)
  properties: carbon content, non-fossil 0.68, dry mass 0.075 kg, water content 12.333, wet mass 1 kg
- manure, liquid, swine: 0.312804 kg; lognormal variance with pedigree 0.0119, pedigree (2,2,4,5,2)
  (same comment as for rape seed)
  properties: carbon content, non-fossil 0.64, dry mass 0.05 kg, water content 19, wet mass 1 kg
- manure, solid, cattle: 0.503525 kg; lognormal variance with pedigree 0.0119, pedigree (2,2,4,5,2)
  (same comment as for rape seed)
  properties: carbon content, non-fossil 0.441, dry mass 0.22 kg, water content 3.5454, wet mass 1 kg
- metolachlor: 6.44466e-8 kg; lognormal variance with pedigree 0.0827, pedigree (1,2,5,5,4)
  (same comment as for rape seed)
  properties: carbon content, fossil 0.633803, dry mass 1 kg, wet mass 1 kg
- organophosphorus-compound, unspecified: 0.000316 kg; lognormal variance with pedigree 0.0113, pedigree (2,2,4,5,1)
  (same comment as for rape seed)
  properties: carbon content, fossil 0.260898, dry mass 1 kg, wet mass 1 kg
- packaging, for fertilisers: 0.144591 kg; lognormal variance with pedigree 0.0592, pedigree (4,3,4,5,4)
  (same comment as for rape seed)
  properties: carbon content, fossil 0.825301, dry mass 1 kg, heating value, net 25.01 MJ, wet mass 1 kg
  note on carbon content, fossil: Considering a chemical formula (C2H4)n for polyethylene, carbon content-fossil is calculated to be 0.856286 kg of Carbon per kg of dry mass.
- packaging, for pesticides: 0.00115914 kg; lognormal variance with pedigree 0.0592, pedigree (4,3,4,5,4)
  (same comment as for rape seed)
  properties: carbon content, fossil 0.85714, dry mass 1 kg, heating value, net 25.97 MJ, wet mass 1 kg
- pesticide, unspecified: 0.000101875 kg; lognormal variance with pedigree 0.0833, pedigree (2,2,5,5,4)
  (same comment as for rape seed)
  properties: carbon content, fossil 0.486978, dry mass 1 kg, wet mass 1 kg
  note on carbon content, fossil: Mean of C content in all pesticides whose formula has been documented in Sutter 2010
- potassium chloride: 0.0102263 kg; lognormal variance with pedigree 0.0439, pedigree (2,2,5,5,2)
  (same comment as for rape seed)
  properties: dry mass 1 kg, wet mass 1 kg
- potassium sulfate: 1.06706e-6 kg; lognormal variance with pedigree 0.0119, pedigree (2,2,4,5,2)
  (same comment as for rape seed)
  properties: dry mass 1 kg, wet mass 1 kg
- poultry manure, dried: 0.272177 kg; lognormal variance with pedigree 0.0112, pedigree (2,1,4,5,1)
  (same comment as for rape seed)
  properties: cadmium content 2.92e-7, carbon content, non-fossil 0.33389, copper content 4.38e-5, dry mass 0.865 kg, lead content 2.92e-6, mercury content 2e-7, nickel content 4e-5, nitrogen content 0.532, phosphorus content 0.0167, potassium content 0.024, water content 0.156069, wet mass 1 kg, zinc content 0.000349
- poultry manure, fresh: 0.0106869 kg; lognormal variance with pedigree 0.0119, pedigree (2,2,4,5,2)
  (same comment as for rape seed)
  properties: carbon content, non-fossil 0.33389, dry mass 0.38 kg, nitrogen content 0.04044, water content 1.63158, wet mass 1 kg
- pyrethroid-compound: 2.80554e-6 kg; lognormal variance with pedigree 0.0113, pedigree (2,2,4,5,1)
  (same comment as for rape seed)
  properties: carbon content, fossil 0.623, dry mass 1 kg, wet mass 1 kg
  note on carbon content, fossil: C content of pyrethroid-compounds was calculated as an unweigthed average of C content of the substances: cypermethrin, alpha-cypermethrin,beta-cyfluthrin, lambdacyhalothrin. Those substances are classified as pyrethroid-compounds in Tab 2.25, Sutter 2010
- rape seed, for sowing: 0.00244497, 4.71767e-7 kg (2 suppliers, which the file names only by identifier); sum of these 0.00244544 kg; lognormal variance with pedigree 0.0119, pedigree (2,2,4,5,2)
  (same comment as for rape seed)
  properties: carbon content, non-fossil 0.574, dry mass 0.94 kg, energy content 24.8912 MJ, water content 0.0638298, wet mass 1 kg
  note on carbon content, non-fossil: biogene carbon content on a dry matter basis Composition data obtained from Table 2.1 in Utilization of canola seed fractions in ruminant feeds, Master thesis by Ravindra Guptha Heendeniya, University of Saskatchewan (Canada), 2008 (http://library2.usask.ca/theses/available/etd-06162008-141937/unrestricted/THESES_Ravindra_Heendeniya_17_june_2008.pdf). First, composition data were refered to 1 kg dry mass. Then, C-contents were calculated considering a C-content/dry mass of 46% in carbohydrates (including fibres), 53% in proteins and 75% in fats. All data from "Evolutionary and Biochemical Aspects", A.D. Kay and T. Vrede (in Global Ecology, 2010, Elsevier B.V., S.E. Jørgensen Ed.).
  note on energy content: See chapter 'Product Properties' in "01_crop production - yields & inputs CH & Europe_v1.0.pdf", section "AGRICULTURAL PRODUCTION IN SWITZERLAND" - pdf-document on the dedicated talk page of ecoinvent (www.ecoinvent.org/documentation)
- solid manure loading and spreading, by hydraulic loader and spreader: 0.775719 kg; lognormal variance with pedigree 0.0119, pedigree (2,2,4,5,2)
  (same comment as for rape seed)
- sowing: 0.000477152 ha; lognormal variance with pedigree 0.0119, pedigree (2,2,4,5,2)
  (same comment as for rape seed)
- swath, by rotary windrower: 3.69051e-7 ha; lognormal variance with pedigree 0.0119, pedigree (2,2,4,5,2)
  (same comment as for rape seed)
- tillage, cultivating, chiselling: 0.000121635 ha; lognormal variance with pedigree 0.0112, pedigree (2,1,4,5,1)
  (same comment as for rape seed)
- tillage, harrowing, by rotary harrow: 0.000208772 ha; lognormal variance with pedigree 0.0112, pedigree (2,1,4,5,1)
  (same comment as for rape seed)
- tillage, harrowing, by spring tine harrow: 0.000293452 ha; lognormal variance with pedigree 0.0112, pedigree (2,1,4,5,1)
  (same comment as for rape seed)
- tillage, ploughing: 0.000164368 ha; lognormal variance with pedigree 0.0119, pedigree (2,2,4,5,2)
  (same comment as for rape seed)
- tillage, rotary cultivator: 0.000167019 ha; lognormal variance with pedigree 0.0119, pedigree (2,2,4,5,2)
  (same comment as for rape seed)
- transport, tractor and trailer, agricultural: 0.00228482, 9.29113e-6 metric ton*km (2 suppliers, which the file names only by identifier); sum of these 0.00229411 metric ton*km; lognormal variance with pedigree 0.1387, pedigree (4,2,4,5,2)
  (same comment as for rape seed)
- urea: 0.0222367, 0.0189885 kg (2 suppliers, which the file names only by identifier); sum of these 0.0412252 kg; lognormal variance with pedigree 0.0439, pedigree (2,2,5,5,2)
  (same comment as for rape seed)
  properties: carbon content, fossil 0.2, dry mass 1 kg, wet mass 1 kg

## Inputs from nature
- Carbon dioxide, in air [natural resource, in air]: 1.7059 kg; lognormal variance with pedigree 0.0113, pedigree (2,2,4,5,1)
  (same comment as for rape seed)
- Energy, gross calorific value, in biomass [natural resource, biotic]: 24.2034 MJ; lognormal variance with pedigree 0.1332, pedigree (3,3,4,5,5)
  (same comment as for rape seed)
- Occupation, annual crop [natural resource, land]: 3.33004 m2*year; lognormal variance with pedigree 0.0126, pedigree (2,1,4,5,1)
  (same comment as for rape seed)
- Occupation, annual crop, non-irrigated, intensive [natural resource, land]: 1.49084 m2*year; lognormal variance with pedigree 0.0126, pedigree (2,1,4,5,1)
  (same comment as for rape seed)
- Transformation, from annual crop [natural resource, land]: 0.482605 m2; lognormal variance with pedigree 0.0186, pedigree (2,1,4,5,1)
  (same comment as for rape seed)
- Transformation, from annual crop, non-irrigated, intensive [natural resource, land]: 0.967857 m2; lognormal variance with pedigree 0.0186, pedigree (2,1,4,5,1)
  (same comment as for rape seed)
- Transformation, from arable land, unspecified use [natural resource, land]: 3.32107 m2; lognormal variance with pedigree 0.0186, pedigree (2,1,4,5,1)
  (same comment as for rape seed)
- Transformation, to annual crop, non-irrigated, intensive [natural resource, land]: 1.45046 m2; lognormal variance with pedigree 0.0186, pedigree (2,1,4,5,1)
  (same comment as for rape seed)
- Transformation, to arable land, unspecified use [natural resource, land]: 3.32107 m2; lognormal variance with pedigree 0.0186, pedigree (2,1,4,5,1)
  (same comment as for rape seed)

## Emissions to nature
- Ammonia [air, non-urban air or from high stacks]: 0.0104821 kg; lognormal variance with pedigree 0.0193, pedigree (2,2,4,5,2)
  (same comment as for rape seed)
- Bentazone [air, non-urban air or from high stacks]: 1.20779e-10 kg; lognormal variance with pedigree 0.1227, pedigree (2,2,5,5,4)
  (same comment as for rape seed)
- Carbon dioxide, fossil [air, non-urban air or from high stacks]: 0.0319174 kg; lognormal variance with pedigree 0.0113, pedigree (2,2,4,5,1)
  (same comment as for rape seed)
- Carbon dioxide, from soil or biomass stock [air, non-urban air or from high stacks]: 0.191237 kg; normal variance with pedigree 0.5, pedigree (3,3,5,5,2)
  Global average LUC emissions according 2nd edition of the Quantis-modified tool developed by Blonk Consultants 'WFLDB-adapted-Blonk 2014 direct-land-use-change-assessment-tool_2015-05-18a.xlsx', tab. 'Country & land use unknown'. The emission are based on the relative change in production areas in all countries for a given crop. The weighted average is used which takes into acount relative difference in crop expansion into primary forest, secondary forest, grassland, perennial and annual land.
- Dinitrogen monoxide [air, non-urban air or from high stacks]: 0.00133596 kg; lognormal variance with pedigree 0.0413, pedigree (2,2,4,5,2)
  (same comment as for rape seed)
- Glyphosate [air, non-urban air or from high stacks]: 3.52712e-9 kg; lognormal variance with pedigree 0.1227, pedigree (2,2,5,5,4)
  (same comment as for rape seed)
- Metolachlor [air, non-urban air or from high stacks]: 7.41122e-10 kg; lognormal variance with pedigree 0.1227, pedigree (2,2,5,5,4)
  (same comment as for rape seed)
- Nitrogen oxides [air, non-urban air or from high stacks]: 0.00136039 kg; lognormal variance with pedigree 0.0413, pedigree (2,2,4,5,2)
  (same comment as for rape seed)
- Pyraclostrobin [air, non-urban air or from high stacks]: 9.46653e-13 kg; lognormal variance with pedigree 0.1227, pedigree (2,2,5,5,4)
  (same comment as for rape seed)
- Water [air, non-urban air or from high stacks]: 2.39947e-6 m3; lognormal variance with pedigree 0.1227, pedigree (2,2,5,5,4)
  (same comment as for rape seed)
- Water [air, unspecified]: 0.0499016 m3; lognormal variance with pedigree 0.0507, pedigree (2,2,4,5,1)
  (same comment as for rape seed)
- Bentazone [soil, agricultural]: 2.29421e-8 kg; lognormal variance with pedigree 0.1157, pedigree (2,2,5,5,4)
  (same comment as for rape seed)
- Cadmium II [soil, agricultural]: -1.07551e-7 kg
  (same comment as for rape seed)
- Carbaryl [soil, agricultural]: 1.85144e-7 kg; lognormal variance with pedigree 0.0436, pedigree (2,1,4,5,1)
  (same comment as for rape seed)
- Carbendazim [soil, agricultural]: 1.21059e-5 kg; lognormal variance with pedigree 0.0437, pedigree (2,2,4,5,1)
  (same comment as for rape seed)
- Carbofuran [soil, agricultural]: 4.73624e-7 kg; lognormal variance with pedigree 0.0436, pedigree (2,1,4,5,1)
  (same comment as for rape seed)
- Chlormequat [soil, agricultural]: 6.02469e-6 kg; lognormal variance with pedigree 0.0437, pedigree (2,2,4,5,1)
  (same comment as for rape seed)
- Chromium III [soil, agricultural]: 1.40531e-6 kg; lognormal variance with pedigree 0.0507, pedigree (2,2,4,5,1)
  (same comment as for rape seed)
- Clethodim [soil, agricultural]: 4.18539e-6 kg; lognormal variance with pedigree 0.0437, pedigree (2,2,4,5,1)
  (same comment as for rape seed)
- Clomazone [soil, agricultural]: 6.54565e-6 kg; lognormal variance with pedigree 0.0437, pedigree (2,2,4,5,1)
  (same comment as for rape seed)
- Clopyralid [soil, agricultural]: 4.00426e-7 kg; lognormal variance with pedigree 0.0436, pedigree (2,1,4,5,1)
  (same comment as for rape seed)
- Copper ion [soil, agricultural]: 9.66132e-6 kg; lognormal variance with pedigree 0.0506, pedigree (2,1,4,5,1)
  (same comment as for rape seed)
- Cypermethrin [soil, agricultural]: 1.83982e-6 kg; lognormal variance with pedigree 0.0437, pedigree (2,2,4,5,1)
  (same comment as for rape seed)
- Deltamethrin [soil, agricultural]: 3.10643e-7 kg; lognormal variance with pedigree 0.0437, pedigree (2,2,4,5,1)
  (same comment as for rape seed)
- Difenoconazole [soil, agricultural]: 6.27578e-7 kg; lognormal variance with pedigree 0.0437, pedigree (2,2,4,5,1)
  (same comment as for rape seed)
- Dimethachlor [soil, agricultural]: 1.76791e-5 kg; lognormal variance with pedigree 0.0437, pedigree (2,2,4,5,1)
  (same comment as for rape seed)
- Endothall [soil, agricultural]: 4.30569e-7 kg; lognormal variance with pedigree 0.0436, pedigree (2,1,4,5,1)
  (same comment as for rape seed)
- Ethalfluralin [soil, agricultural]: 1.39932e-5 kg; lognormal variance with pedigree 0.0436, pedigree (2,1,4,5,1)
  (same comment as for rape seed)
- Fluazifop-P-butyl [soil, agricultural]: 3.6848e-6 kg; lognormal variance with pedigree 0.0437, pedigree (2,2,4,5,1)
  (same comment as for rape seed)
- Fungicides, unspecified [soil, agricultural]: 5.31471e-11 kg; lognormal variance with pedigree 0.1157, pedigree (2,2,5,5,4)
  (same comment as for rape seed)
- Glufosinate [soil, agricultural]: 0.000314915 kg; lognormal variance with pedigree 0.0437, pedigree (2,2,4,5,1)
  (same comment as for rape seed)
- Glyphosate [soil, agricultural]: 9.55715e-7 kg; lognormal variance with pedigree 0.1157, pedigree (2,2,5,5,4)
  (same comment as for rape seed)
- Herbicides, unspecified [soil, agricultural]: 6.1783e-8 kg; lognormal variance with pedigree 0.1157, pedigree (2,2,5,5,4)
  (same comment as for rape seed)
- Imidacloprid [soil, agricultural]: 8.61161e-10 kg; lognormal variance with pedigree 0.0436, pedigree (2,1,4,5,1)
  (same comment as for rape seed)
- Iprodione [soil, agricultural]: 7.90738e-6 kg; lognormal variance with pedigree 0.0437, pedigree (2,2,4,5,1)
  (same comment as for rape seed)
- Lambda-cyhalothrin [soil, agricultural]: 6.86449e-7 kg; lognormal variance with pedigree 0.0437, pedigree (2,2,4,5,1)
  (same comment as for rape seed)
- Lead II [soil, agricultural]: -1.7289e-6 kg
  (same comment as for rape seed)
- Malathion [soil, agricultural]: 4.30569e-8 kg; lognormal variance with pedigree 0.0436, pedigree (2,1,4,5,1)
  (same comment as for rape seed)
- Mercury II [soil, agricultural]: 6.63626e-8 kg; lognormal variance with pedigree 0.0506, pedigree (2,1,4,5,1)
  (same comment as for rape seed)
- Metaldehyde [soil, agricultural]: 1.28025e-5 kg; lognormal variance with pedigree 0.0507, pedigree (2,2,4,5,1)
  (same comment as for rape seed)
- Metazachlor [soil, agricultural]: 3.65091e-5 kg; lognormal variance with pedigree 0.0437, pedigree (2,2,4,5,1)
  (same comment as for rape seed)
- Metconazole [soil, agricultural]: 1.45654e-6 kg; lognormal variance with pedigree 0.0437, pedigree (2,2,4,5,1)
  (same comment as for rape seed)
- Metolachlor [soil, agricultural]: 6.35816e-8 kg; lognormal variance with pedigree 0.1157, pedigree (2,2,5,5,4)
  (same comment as for rape seed)
- Metsulfuron-methyl [soil, agricultural]: 7.31984e-10 kg; lognormal variance with pedigree 0.0436, pedigree (2,1,4,5,1)
  (same comment as for rape seed)
- Napropamide [soil, agricultural]: 2.02612e-5 kg; lognormal variance with pedigree 0.0437, pedigree (2,2,4,5,1)
  (same comment as for rape seed)
- Nickel II [soil, agricultural]: 2.52537e-6 kg; lognormal variance with pedigree 0.0507, pedigree (2,2,4,5,1)
  (same comment as for rape seed)
- Parathion [soil, agricultural]: 2.45853e-7 kg; lognormal variance with pedigree 0.0436, pedigree (2,1,4,5,1)
  (same comment as for rape seed)
- Procymidone [soil, agricultural]: 2.82411e-6 kg; lognormal variance with pedigree 0.0437, pedigree (2,2,4,5,1)
  (same comment as for rape seed)
- Prothioconazole [soil, agricultural]: 2.97966e-5 kg; lognormal variance with pedigree 0.0437, pedigree (2,2,4,5,1)
  (same comment as for rape seed)
- Pyraclostrobin [soil, agricultural]: 2.51526e-10 kg; lognormal variance with pedigree 0.1157, pedigree (2,2,5,5,4)
  (same comment as for rape seed)
- Quizalofop-P [soil, agricultural]: 9.64491e-7 kg; lognormal variance with pedigree 0.0436, pedigree (2,1,4,5,1)
  (same comment as for rape seed)
- Quizalofop-ethyl [soil, agricultural]: 3.61481e-7 kg; lognormal variance with pedigree 0.0437, pedigree (2,2,4,5,1)
  (same comment as for rape seed)
- Sethoxydim [soil, agricultural]: 4.34871e-6 kg; lognormal variance with pedigree 0.0436, pedigree (2,1,4,5,1)
  (same comment as for rape seed)
- Spiroxamine [soil, agricultural]: 1.39373e-5 kg; lognormal variance with pedigree 0.0437, pedigree (2,2,4,5,1)
  (same comment as for rape seed)
- Tebuconazole [soil, agricultural]: 1.14161e-5 kg; lognormal variance with pedigree 0.0437, pedigree (2,2,4,5,1)
  (same comment as for rape seed)
- Trifluralin [soil, agricultural]: 5.60015e-5 kg; lognormal variance with pedigree 0.0437, pedigree (2,2,4,5,1)
  (same comment as for rape seed)
- Vinclozolin [soil, agricultural]: 9.41359e-7 kg; lognormal variance with pedigree 0.0437, pedigree (2,2,4,5,1)
  (same comment as for rape seed)
- Zinc II [soil, agricultural]: 4.84997e-5 kg; lognormal variance with pedigree 0.0507, pedigree (2,2,4,5,1)
  (same comment as for rape seed)
- Bentazone [water, ground-]: 8.49036e-10 kg; lognormal variance with pedigree 0.1227, pedigree (2,2,5,5,4)
  (same comment as for rape seed)
- Bentazone [water, surface water]: 5.26117e-13 kg; lognormal variance with pedigree 0.1227, pedigree (2,2,5,5,4)
  (same comment as for rape seed)
- Cadmium II [water, ground-]: 1.7237e-8 kg; lognormal variance with pedigree 0.1007, pedigree (2,2,4,5,1)
  (same comment as for rape seed)
- Cadmium II [water, surface water]: 6.90623e-9 kg; lognormal variance with pedigree 0.1407, pedigree (5,2,4,5,2)
  (same comment as for rape seed)
- Chromium III [water, ground-]: 8.65727e-6 kg; lognormal variance with pedigree 0.1007, pedigree (2,2,4,5,1)
  (same comment as for rape seed)
- Chromium III [water, surface water]: 6.93264e-7 kg; lognormal variance with pedigree 0.1407, pedigree (5,2,4,5,2)
  (same comment as for rape seed)
- Copper ion [water, ground-]: 1.53169e-6 kg; lognormal variance with pedigree 0.1007, pedigree (2,2,4,5,1)
  (same comment as for rape seed)
- Copper ion [water, surface water]: 5.53618e-7 kg; lognormal variance with pedigree 0.1407, pedigree (5,2,4,5,2)
  (same comment as for rape seed)
- Glyphosate [water, ground-]: 2.05806e-8 kg; lognormal variance with pedigree 0.1227, pedigree (2,2,5,5,4)
  (same comment as for rape seed)
- Glyphosate [water, surface water]: 1.34248e-10 kg; lognormal variance with pedigree 0.1227, pedigree (2,2,5,5,4)
  (same comment as for rape seed)
- Lead II [water, ground-]: 4.03182e-8 kg; lognormal variance with pedigree 0.1007, pedigree (2,2,4,5,1)
  (same comment as for rape seed)
- Lead II [water, surface water]: 9.07483e-8 kg; lognormal variance with pedigree 0.1407, pedigree (5,2,4,5,2)
  (same comment as for rape seed)
- Mercury II [water, ground-]: 6.00774e-10 kg; lognormal variance with pedigree 0.1007, pedigree (2,2,4,5,1)
  (same comment as for rape seed)
- Mercury II [water, surface water]: 7.8788e-10 kg; lognormal variance with pedigree 0.1007, pedigree (2,2,4,5,1)
  (same comment as for rape seed)
- Metolachlor [water, ground-]: 1.2244e-10 kg; lognormal variance with pedigree 0.1227, pedigree (2,2,5,5,4)
  (same comment as for rape seed)
- Metolachlor [water, surface water]: 1.64343e-12 kg; lognormal variance with pedigree 0.1227, pedigree (2,2,5,5,4)
  (same comment as for rape seed)
- Nickel II [water, ground-]: 2.7456e-10 kg; lognormal variance with pedigree 0.1007, pedigree (2,2,4,5,1)
  (same comment as for rape seed)
- Nickel II [water, surface water]: 4.92379e-7 kg; lognormal variance with pedigree 0.1407, pedigree (5,2,4,5,2)
  (same comment as for rape seed)
- Nitrate [water, ground-]: 0.0734412 kg; lognormal variance with pedigree 0.0513, pedigree (2,2,4,5,2)
  (same comment as for rape seed)
- Phosphate [water, ground-]: 9.57031e-5 kg; lognormal variance with pedigree 0.0507, pedigree (2,2,4,5,1)
  (same comment as for rape seed)
- Phosphate [water, surface water]: 0.000277137 kg; lognormal variance with pedigree 0.0513, pedigree (2,2,4,5,2)
  (same comment as for rape seed)
- Phosphorus [water, surface water]: 6.06862e-5 kg; lognormal variance with pedigree 0.0513, pedigree (2,2,4,5,2)
  (same comment as for rape seed)
- Pyraclostrobin [water, ground-]: 1.2244e-14 kg; lognormal variance with pedigree 0.1227, pedigree (2,2,5,5,4)
  (same comment as for rape seed)
- Pyraclostrobin [water, surface water]: 1.94411e-16 kg; lognormal variance with pedigree 0.1227, pedigree (2,2,5,5,4)
  (same comment as for rape seed)
- Water [water, ground-]: 0.0238866 m3; lognormal variance with pedigree 0.0986, pedigree (4,3,4,5,4)
  (same comment as for rape seed)
- Water [water, surface water]: 0.00597164 m3; lognormal variance with pedigree 0.0986, pedigree (4,3,4,5,4)
  (same comment as for rape seed)
- Zinc II [water, ground-]: 9.8494e-6 kg; lognormal variance with pedigree 0.1007, pedigree (2,2,4,5,1)
  (same comment as for rape seed)
- Zinc II [water, surface water]: 9.96095e-7 kg; lognormal variance with pedigree 0.1407, pedigree (5,2,4,5,2)
  (same comment as for rape seed)
