# palm fruit bunch production

Dataset: EcoSpold 2, unit process
Geography: MY
Time period: 2002-01-01 to 2023-12-31
Technology level: current
Classification: ISIC rev.4 ecoinvent: 0126:Growing of oleaginous fruits
Scenario: Business-as-Usual
System model: Allocation, cut-off by classification
Share of production covered: 100 %
Generated by: Jürgen Reinhard
Published in: Jungbluth N. 2007
Database: ecoinvent
isCopyrightProtected: true
accessRestrictedTo: 1

## General comment
This dataset represents the production of 1 kg of palm fruit bunch (fresh matter). The yield is 24978 kg/ha at a moisture content at storage of 47%.
This activity was adapted to include specific land use change (LUC) emissions. See comment of"carbon dioxide, from soil or biomass stock" for details.

## Included activities start
This activity assumes palm fruit bunch production on a plantation with a lifetime of 20 years and represents the average operation expenditures of the production of 1 kg of fresh fruit bunch averaged across the whole lifetime including establishment, operation and clearing of the plantation. The inputs of mineral fertilisers, pesticides and irrigation water are considered. The input of seed is considered neglectable compared to the plantation lifetime of 20 years. It is assumed that no organic fertilisers are applied.

## Included activities end
The dataset includes all machine operations and corresponding machine infrastructure and sheds. Most operations are done by hand. Machine operations are: fertilisation, irrigation, weed control, pest and pathogen control, transport of harvested fruit bunches from field to farm (25 km) and clearing of the plantation (wood chopping). Further, direct field emissions are included. This activity ends after harvest and transport to the farm at the farm gate.

## Geography
The inventory is modelled for Malaysia

## Technology
Cultivation of oil palms.

## Time period
Time of publications

## Parameters
- Annualization time: 20 year; name t
- LUC_crop_specific: 1 dimensionless
  This parameter allows to switch between a "crop specific" and a "country specific" approach when calculating the LUC of a crop. By default, the chosen approach is "crop specific", so the value of the parameter is 1. If you want to apply a "country specific" approach, turn the parameter to 0.
- annual yield, agriculture: 24.978 metric ton/(ha*year); name yield_agriculture
- fraction, irrigation water to surface water: 0.2 dimensionless; name fraction_IW_to_surface_water; lognormal variance with pedigree 0.0886, pedigree (4,3,1,1,4)
- fraction, irrigation water, to air: 0.3548 dimensionless; name fraction_IW_to_air; lognormal variance with pedigree 0.0409, pedigree (2,2,2,1,1)
- fraction, irrigation water, to ground water: 0.8 dimensionless; name fraction_IW_to_ground_water; lognormal variance with pedigree 0.0886, pedigree (4,3,1,1,4)
- land transformation to: 0.400352 m2/kg; name T_t; = UnitConversion(1, 'ha', 'm2')/(yield_agriculture*UnitConversion(1, 'metric ton', 'kg'))
  Calculated value:
- productivity mobile chipper: 120 m3/PMH; name productivity_mobile_chipper
  as m3 bulked/ productive machine hour

## Reference product
- palm fruit bunch: 1 kg; name REF_PRODUCT; By-product classification allocatable product; CPC 01491: Palm nuts and kernels; HS2017 080410: Fruit, edible; dates, fresh or dried
  EcoSpold01Location=MY
  production volume 8.7154e10 kg
    Literature value. Total production in Malaysia is around 87 Million tons, average between the years 2008-2010, from FAOSTAT (Production) (Oil palm fruit), accessed 20151106.
  property carbon content, fossil 0; name REF_PRODUCT_C_content_fossil
    fossil carbon content on a dry matter basis
  property carbon content, non-fossil 0.590566; name REF_PRODUCT_C_content_non_fossil
    biogene carbon content on a dry matter basis
  property dry mass 0.53 kg; name REF_PRODUCT_DM
  property energy content 16 MJ; name REF_PRODUCT_energy_content
    as gross calorific value (when relevant)
  property price 0.15 EUR2005
    Bunch price: Calculated based in information: Kernel = 45% Bunch (in mass) [http://www.fao.org/docrep/005/y4355e/y4355e03.htm]. Kernel price: Calculated value based on data from United Nations Commodity Trade Statistics Database (comtrade.un.org). UN comtrade category: 120710 Palm nuts and kernels. Year 2005. Using exchange rate of 1EURO = 1.209 USD. Average of price of import into 3 main markets (EU, US and CN).
  property water content 0.886792; name REF_PRODUCT_water_content; = (1-REF_PRODUCT_DM)/REF_PRODUCT_DM
  property water in wet mass 0.47 kg; name REF_PRODUCT_WWM; = 1-REF_PRODUCT_DM
  property wet mass 1 kg; name REF_PRODUCT_WM
  properties: carbon allocation 0.313 kg, carbon content 0.590566

## Inputs from technosphere
- [thio]carbamate-compound: 2.0412e-5 kg; source Tenananita 2002; lognormal variance with pedigree 0.0407, pedigree (2,2,5,1,1)
  EcoSpold01Location=RER
  Amount of active ingredient from Tenaganita (2002). Substnaces that are not availabe in the ecoinvent database are approximated by inventories of superordinate chemical classes. The inventories were assigned according to Sutter (2010, Tab. 2.25). If no inventory for the active ingredient or the corresponding chemical class was available, the pesticide was approximated with the product "pesticide, unspecified". --- Sources: Sutter J. (2010) Life Cycle Inventories of Pesticides. Swiss Centre for Life Cycle Inventories, St. Gallen, Switzerland.
  Uncertainty: Tenaganita 2002
  properties: carbon content, fossil 0.626349, dry mass 1 kg, wet mass 1 kg
  note on carbon content, fossil: Approximated as an unweighted average of the C-content of the [thio]carbamate-compounds (Tab 2.25 Sutter, 2010) carbofuran,orbencarb, prosulfocarb
- ammonium sulfate: 0.0062985 kg; source IFA 2006; lognormal variance with pedigree 0.1021, pedigree (3,2,5,1,1)
  EcoSpold01Location=RER
  Amount of nutrient is an average based on IFA (2006), Corley & Tinker (2003), Ng et al. (1999) and Hofstetter (2006); type of fertiliser product from IFA (2006). --- Sources: IFA (2006): World Fertilizer Use Manual. Retrieved 16 May 2006 from http://www.fertilzer.org/ifa. --- Corley R. & Tinker P. (Ed) (2003) The Oil Palm. World Agricultural Series. Blackwell Science, Oxford. --- Ng P.H.C., Chew P.S., Goh K.J. & Kee K.K. (1999) Nutrient requirements and sustainability in mature oil palms - an assessment. Planter, Kuala Lumpur 75, 331-345. --- Hofstetter P. (WWF Switzerland) personal communication, June 2006.
  Uncertainty: Average of several references
  properties: dry mass 1 kg, wet mass 1 kg
- application of plant protection product, by field sprayer: 3.363e-5 ha; source Corley R. 2003; lognormal variance with pedigree 0.0412, pedigree (2,3,5,1,1)
  EcoSpold01Location=CH
  Extrapolation based on diesel consumption of oil palm growing (Corley & Tinker 2003) and of respective machine operation dataset in ecoinvent (Nemecek et al. 2004).
  Uncertainty: Corley 2003
- benzimidazole-compound: 3.7232e-8 kg; source Tenananita 2002; lognormal variance with pedigree 0.0407, pedigree (2,2,5,1,1)
  Amount of active ingredient from Tenaganita (2002). Substnaces that are not availabe in the ecoinvent database are approximated by inventories of superordinate chemical classes. The inventories were assigned according to Sutter (2010, Tab. 2.25). If no inventory for the active ingredient or the corresponding chemical class was available, the pesticide was approximated with the product "pesticide, unspecified". --- Sources: Sutter J. (2010) Life Cycle Inventories of Pesticides. Swiss Centre for Life Cycle Inventories, St. Gallen, Switzerland.
  EcoSpold01Location=RER
  Uncertainty: Tenaganita 2002
  properties: carbon content, fossil 0.529668, dry mass 1 kg, wet mass 1 kg
  note on carbon content, fossil: C content estimated as an average of that of the pesticides Carbendazim, prochloraz and ethofumesate (Sutter 2010)
- dolomite: 0.0032409 kg; source IFA 2006; lognormal variance with pedigree 0.1021, pedigree (3,2,5,1,1)
  Amount of nutrient is an average based on IFA (2006), Corley & Tinker (2003), Ng et al. (1999) and Hofstetter (2006); type of fertiliser product from IFA (2006). --- Sources: IFA (2006): World Fertilizer Use Manual. Retrieved 16 May 2006 from http://www.fertilzer.org/ifa. --- Corley R. & Tinker P. (Ed) (2003) The Oil Palm. World Agricultural Series. Blackwell Science, Oxford. --- Ng P.H.C., Chew P.S., Goh K.J. & Kee K.K. (1999) Nutrient requirements and sustainability in mature oil palms - an assessment. Planter, Kuala Lumpur 75, 331-345. --- Hofstetter P. (WWF Switzerland) personal communication, June 2006.
  EcoSpold01Location=RER
  Uncertainty: Average of several references
  properties: carbon content, fossil 0.130435, dry mass 1 kg, heating value, net 3.95 MJ, wet mass 1 kg
- fertilising, by broadcaster: 3.363e-5 ha; source Corley R. 2003; lognormal variance with pedigree 0.0412, pedigree (2,3,5,1,1)
  Extrapolation based on diesel consumption of oil palm growing (Corley & Tinker 2003) and of respective machine operation dataset in ecoinvent (Nemecek et al. 2004).
  EcoSpold01Location=CH
  Uncertainty: Corley 2003
- inorganic phosphorus fertiliser, as P2O5: 0.0012801 kg; source IFA 2006; lognormal variance with pedigree 0.1021, pedigree (3,2,5,1,1)
  (same comment as for dolomite)
  properties: dry mass 1 kg, wet mass 1 kg
- irrigation: 0.0179267 m3; name water_irrigation_input; lognormal variance with pedigree 1.21, pedigree (5,5,5,5,5)
  Calculated based on literature values (Döll, 2010) and partially modelled at ETH (Pfister, S.).
  properties: dry mass 0.11 kg, water content 9089.91, wet mass 1000 kg
- land use change, perennial crop: 2.258e-5 ha; = (2.258E-5*LUC_crop_specific+8.047E-6*(1-LUC_crop_specific))
  Calculated value. Land use change (LUC) combines land transformation areas calculated with the adapted 'Direct Land Use Change Assessment Tool' version 2014 developed by Blonk Consultants and the carbon losses from soil organic carbon (SOC) and vegetation (VEG) as calculated in ecoinvent v3. See 'WFLDB-Guidelines.pdf', available at https://ecoquery.ecoinvent.org/File/Reports.
- lime: 0.0017215 kg; source IFA 2006; lognormal variance with pedigree 0.1021, pedigree (3,2,5,1,1)
  Amount of nutrient is an average based on IFA (2006), Corley & Tinker (2003), Ng et al. (1999) and Hofstetter (2006); type of fertiliser product from IFA (2006). --- Sources: IFA (2006): World Fertilizer Use Manual. Retrieved 16 May 2006 from http://www.fertilzer.org/ifa. --- Corley R. & Tinker P. (Ed) (2003) The Oil Palm. World Agricultural Series. Blackwell Science, Oxford. --- Ng P.H.C., Chew P.S., Goh K.J. & Kee K.K. (1999) Nutrient requirements and sustainability in mature oil palms - an assessment. Planter, Kuala Lumpur 75, 331-345. --- Hofstetter P. (WWF Switzerland) personal communication, June 2006.
  EcoSpold01Location=CH
  Uncertainty: Average of several references
  properties: carbon content, fossil 0.120005, dry mass 1 kg, wet mass 1 kg
- organophosphorus-compound, unspecified: 4.0473e-5 kg; source Tenananita 2002; lognormal variance with pedigree 0.0407, pedigree (2,2,5,1,1)
  (same comment as for [thio]carbamate-compound)
  properties: carbon content, fossil 0.260898, dry mass 1 kg, wet mass 1 kg
  note on carbon content, fossil: C content was calculated as an unweighted average of glyphosate, parathion, and fosetyl-Al. Those substances are classified as organo-phosphorous compounds in Tab 2.25, Sutter 2010
- packaging, for fertilisers: 0.0440046 kg; lognormal variance with pedigree 0.0912, pedigree (4,3,5,5,4)
  Total amount of active substance/s of fertilisers needed for the production of 'palm fruit bunch' is calculated to be circa 2.20E-02 kg. Fertiliser/s used in this dataset is/are: 'ammonium sulfate, as N', 'dolomite', 'lime', 'phosphate fertiliser, as P2O5', 'potassium chloride, as K2O'. The total amount of active substance/s is doubled in order to account for the packaging of the dilluted product of fertiliser/s that is/are applied. Therefore, 4.40E-02 kg of packaging for fertilisers is justified with this exchange.
  properties: carbon content, fossil 0.825301, dry mass 1 kg, heating value, net 25.01 MJ, price 0.0642 EUR2005, wet mass 1 kg
  note on carbon content, fossil: Considering a chemical formula (C2H4)n for polyethylene, carbon content-fossil is calculated to be 0.856286 kg of Carbon per kg of dry mass.
- packaging, for pesticides: 0.000139518 kg; lognormal variance with pedigree 0.0912, pedigree (4,3,5,5,4)
  Total amount of active substance/s of pesticides needed for the production of palm fruit bunch is calculated to be circa 6.98E-05 kg. Pesticide/s used in this dataset is/are: '[thio]carbamate-compound', 'benzimidazole-compound', 'organophosphorus-compound, unspecified', 'pesticide, unspecified', 'phenoxy-compound', 'pyrethroid-compound'. The total amount of active substance/s is doubled in order to account for the packaging of the dilluted product of pesticide/s that is/are applied. Therefore, 1.40E-04 kg of packaging for pesticides is justified with this exchange.
  properties: carbon content, fossil 0.85714, dry mass 1 kg, heating value, net 25.97 MJ, price 0.0642 EUR2005, wet mass 1 kg
- pesticide, unspecified: 1.1424e-7 kg; source Tenananita 2002; lognormal variance with pedigree 0.0407, pedigree (2,2,5,1,1)
  (same comment as for benzimidazole-compound)
  properties: carbon content, fossil 0.486978, dry mass 1 kg, wet mass 1 kg
  note on carbon content, fossil: Mean of C content in all pesticides whose formula has been documented in Sutter 2010
- phenoxy-compound: 5.8403e-6 kg; source Tenananita 2002; lognormal variance with pedigree 0.0407, pedigree (2,2,5,1,1)
  (same comment as for benzimidazole-compound)
  properties: carbon content, fossil 0.532559, dry mass 1 kg, wet mass 1 kg
  note on carbon content, fossil: An unweighted average of the C content in mCPA, mCPB, mecoprop, fluazifop-P-butyl, and 2,4-D. Those substances are classified as phenoxy-compounds in Tab 2.25, Sutter 2010
- potassium chloride: 0.0149763 kg; source IFA 2006; lognormal variance with pedigree 0.1021, pedigree (3,2,5,1,1)
  EcoSpold01Location=RER
  The exchange has been updated from 'potassium chloride, as K2O' into 'potassium chloride' and therefore its amount has been scaled (multiplied) from 0.0095 kg by 1.5829 kg of 'potassium chloride' per kg of 'potassium chloride, as K2O'. Original comment of the exchange is: Amount of nutrient is an average based on IFA (2006), Corley & Tinker (2003), Ng et al. (1999) and Hofstetter (2006); type of fertiliser product from IFA (2006). --- Sources: IFA (2006): World Fertilizer Use Manual. Retrieved 16 May 2006 from http://www.fertilzer.org/ifa. --- Corley R. & Tinker P. (Ed) (2003) The Oil Palm. World Agricultural Series. Blackwell Science, Oxford. --- Ng P.H.C., Chew P.S., Goh K.J. & Kee K.K. (1999) Nutrient requirements and sustainability in mature oil palms - an assessment. Planter, Kuala Lumpur 75, 331-345. --- Hofstetter P. (WWF Switzerland) personal communication, June 2006.
  Uncertainty: Average of several references
  properties: dry mass 1 kg, wet mass 1 kg
- pyrethroid-compound: 2.8822e-6 kg; source Tenananita 2002; lognormal variance with pedigree 0.0407, pedigree (2,2,5,1,1)
  EcoSpold01Location=CH
  Amount of active ingredient from Tenaganita (2002). Substnaces that are not availabe in the ecoinvent database are approximated by inventories of superordinate chemical classes. The inventories were assigned according to Sutter (2010, Tab. 2.25). If no inventory for the active ingredient or the corresponding chemical class was available, the pesticide was approximated with the product "pesticide, unspecified". --- Sources: Sutter J. (2010) Life Cycle Inventories of Pesticides. Swiss Centre for Life Cycle Inventories, St. Gallen, Switzerland.
  Uncertainty: Tenaganita 2002
  properties: carbon content, fossil 0.623, dry mass 1 kg, wet mass 1 kg
  note on carbon content, fossil: C content of pyrethroid-compounds was calculated as an unweigthed average of C content of the substances: cypermethrin, alpha-cypermethrin,beta-cyfluthrin, lambdacyhalothrin. Those substances are classified as pyrethroid-compounds in Tab 2.25, Sutter 2010
- transport, tractor and trailer, agricultural: 0.02635 metric ton*km; source Corley R. 2003; lognormal variance with pedigree 0.268, pedigree (4,5,5,5,5)
  Field-to-farm transport of harvested fresh fruit bunches and farm-to-field transport of seedlings (36 t per 25 years); distance 25 km (Corley 2003).
  EcoSpold01Location=CH
  Uncertainty: Corley 2003
- wood chipping, chipper, mobile, diesel, at forest road: 1.39205e-5 hour; = 1.0858/650/productivity_mobile_chipper; lognormal variance with pedigree 0.1113, pedigree (2,3,5,3,4)
  Calculated.
  650 kg/m3 is density of wood chips being chipped
  1.0858 kg is the amount of wood chips needed to be chipped while producing 1kg of palm fruit bunch
  Approximation for shredding at clearing of the plantation. Extrapolation based on diesel consumption of oil palm growing (Corley & Tinker 2003) and of respective machine operation dataset in ecoinvent (Nemecek et al. 2004).
  Uncertainty: Corley 2003

## Inputs from nature
- Carbon dioxide, in air [natural resource, in air]: 1.14767 kg; = 44/12 * (REF_PRODUCT_C_content_non_fossil * REF_PRODUCT * REF_PRODUCT_DM ); lognormal variance with pedigree 0.0406, pedigree (2,1,5,1,1)
  Modelled,see chapter 'CO2 binding' in "01_crop production_direct field emissions and natural resources_v1.0.pdf" - pdf-document on the dedicated talk page of ecoinvent (www.ecoinvent.org/documentation)
- Energy, gross calorific value, in biomass [natural resource, biotic]: 16.006 MJ
- Occupation, permanent crop [natural resource, land]: 0.400352 m2*year; = T_t; lognormal variance with pedigree 0.08, pedigree (1,1,5,1,1)
  Modelled, see chapter 'Land use' in "01_crop production_direct field emissions and natural resources_v1.0.pdf" - pdf-document on the dedicated talk page of ecoinvent (www.ecoinvent.org/documentation)
  Uncertainty: FAOSTAT 2006
- Transformation, from permanent crop [natural resource, land]: 0.0200176 m2; = T_t/t
- Transformation, to permanent crop [natural resource, land]: 0.0200176 m2; = T_t/t; lognormal variance with pedigree 0.16, pedigree (1,1,5,1,1)
  (same comment as for Occupation, permanent crop)

## Emissions to nature
- Ammonia [air, non-urban air or from high stacks]: 0.000612659 kg; lognormal variance with pedigree 0.0686, pedigree (4,3,5,1,1)
  Modelled with the 'AGRAMMON model' described in "01_crop production_direct field emissions and natural resources_v1.0.pdf" - pdf-document on the dedicated talk page of ecoinvent (www.ecoinvent.org/documentation)
  Uncertainty: Calculated with standard method
- Carbon dioxide, from soil or biomass stock [air, unspecified]: 0.541316 kg; lognormal variance with pedigree 0.047325, pedigree (2,2,5,2,2)
  Generic peat emission for Malaysia from the LUC model (integrated via the intermediate inpput "land ue change, perennial crop") are complemented with specific peat emissions for Malaysia obtained from the area of oil palm plantations on peatland reported in Page et al. (2011), p. 18. Annual mission factor of 106000 kg CO2/ha is multiplied with proportion of oil palm plantations on peat land 23% and devided by yield to related it to 1 kg of palm fruit bunch.
  Page, S.E., Morrison, R., Malins, C., Hooijer, A., Rieley, J.O., Jauhiaainen, J., 2011. Review of peat surface greenhouse gas emissions from oil palm plantations in Southeast Asia (Whitepaper). International Council on Clean Transportation, Washington.
- Dinitrogen monoxide [air, non-urban air or from high stacks]: 0.000183086 kg; name N2O; lognormal variance with pedigree 0.08, pedigree (1,1,5,1,1)
  Where soil C is lost through oxidation as a result of land-use or management change, this loss will be accompanied by a simultaneous mineralisation of N. Where a loss of soil C occurs, this mineralised N is regarded as an additional source of N available for conversion to N2O. Modelled, based on "Guidlines_LUC_Calcs" -pdf- document on the dedicated talk page of ecoinvent (www.ecoinvent.org/documentation). See Equation 11 for details. Note: the opposite process to mineralisation, whereby inorganic N is sequestered into newly formed SOM, is not taken account of in the calculation of the mineralisation N source. This is because of the different dynamics of SOM decomposition and formation, and also because reduced tillage in some circumstances can increase both SOM and N2O emission. The constant term in the mathematical relation represents the N2O emissions from agriculture regardless of the land use changes; it was calculated according to IPCC 2006, see chapter 'Emissions of N2O to the air' in "01_crop production_direct field emissions and natural resources_v1.0.pdf" - pdf-document on the dedicated talk page of ecoinvent (www.ecoinvent.org/documentation).
- Nitrogen oxides [air, non-urban air or from high stacks]: 3.84481e-5 kg; = 0.21* N2O; lognormal variance with pedigree 0.08, pedigree (1,1,5,1,1)
  Modelled, see chapter 'Emissions of NOx to the air' in "01_crop production_direct field emissions and natural resources_v1.0.pdf" - pdf-document on the dedicated talk page of ecoinvent (www.ecoinvent.org/documentation)
- Water [air, unspecified]: 0.00636039 m3; name water_to_air_unspecified; = (water_irrigation_input*fraction_IW_to_air); lognormal variance with pedigree 1.21, pedigree (5,5,5,5,5)
  Calculated value based on literature values and expert opinion. See comments in the parametres' comment field.
  property fraction, origin: fresh water 1; name fraction_origin_fresh_water
  property fraction, origin: salt water 0; name fraction_origin_salt_water
  property fraction, origin: unspecified 0; name fraction_origin_unspecified
- 2,4-D [soil, agricultural]: 5.8403e-6 kg; lognormal variance with pedigree 0.0686, pedigree (4,3,5,1,1)
  Modelled, see chapter 'Emissions of pesticides to agricultural soil' in "01_crop production_direct field emissions and natural resources_v1.0.pdf" - pdf-document on the dedicated talk page of ecoinvent (www.ecoinvent.org/documentation)
  Uncertainty: Calculated from the pesticide application
- Benomyl [soil, agricultural]: 3.7232e-8 kg; lognormal variance with pedigree 0.0686, pedigree (4,3,5,1,1)
  (same comment as for 2,4-D)
- Cadmium II [soil, agricultural]: 1.4474e-9 kg; lognormal variance with pedigree 0.0986, pedigree (4,3,5,1,1)
  Calculated as the difference between heavy metal input through fertilisers and output through the harvested product. Heavy metal contents of fresh palm fruit bunch for copper (Cu) and zinc (Zn) according to Corley & Tinker (2003). Heavy metal contents of mineral fertilisers according to Nemecek et al. (2004). Negative values represent a net export of heavy metals. For heavy metals other than Cu and Zn no data were available; uptake of heavy metals by palm fruit bunches was assumed to be 50% of the input through fertilisers. --- Sources: Nemecek T., Heil A., Huguenin O., Meier S., Erzinger S., Blaser S., Dux D. & Zimmerman A. (2004) Life Cycle Inventories of Agricultural Production Systems. Ecoinvent report no. 15. Swiss Centre for Life Cycle Inventories, Duebendorf, Switzerland.
  Uncertainty: Calculated from the fertilizer input
- Carbofuran [soil, agricultural]: 2.0412e-5 kg; lognormal variance with pedigree 0.0686, pedigree (4,3,5,1,1)
  (same comment as for 2,4-D)
- Chromium III [soil, agricultural]: 5.8458e-8 kg; lognormal variance with pedigree 0.0986, pedigree (4,3,5,1,1)
  (same comment as for Cadmium II)
- Copper ion [soil, agricultural]: -3.8334e-6 kg
  Calculated as the difference between heavy metal input through fertilisers and output through the harvested product. Heavy metal contents of fresh palm fruit bunch for copper (Cu) and zinc (Zn) according to Corley & Tinker (2003). Heavy metal contents of mineral fertilisers according to Nemecek et al. (2004). Negative values represent a net export of heavy metals. For heavy metals other than Cu and Zn no data were available; uptake of heavy metals by palm fruit bunches was assumed to be 50% of the input through fertilisers. --- Sources: Nemecek T., Heil A., Huguenin O., Meier S., Erzinger S., Blaser S., Dux D. & Zimmerman A. (2004) Life Cycle Inventories of Agricultural Production Systems. Ecoinvent report no. 15. Swiss Centre for Life Cycle Inventories, Duebendorf, Switzerland.
- Cypermethrin [soil, agricultural]: 2.8822e-6 kg; lognormal variance with pedigree 0.0686, pedigree (4,3,5,1,1)
  (same comment as for 2,4-D)
- Glyphosate [soil, agricultural]: 4.0473e-5 kg; lognormal variance with pedigree 0.0686, pedigree (4,3,5,1,1)
  (same comment as for 2,4-D)
- Lead II [soil, agricultural]: 7.4806e-8 kg; lognormal variance with pedigree 0.0986, pedigree (4,3,5,1,1)
  (same comment as for Cadmium II)
- Nickel II [soil, agricultural]: 7.692e-8 kg; lognormal variance with pedigree 0.0986, pedigree (4,3,5,1,1)
  (same comment as for Cadmium II)
- Thiram [soil, agricultural]: 6.6054e-8 kg; lognormal variance with pedigree 0.0686, pedigree (4,3,5,1,1)
  (same comment as for 2,4-D)
- Zinc II [soil, agricultural]: -4.2174e-6 kg
  (same comment as for Copper ion)
- Nitrate [water, ground-]: 0.0231646 kg; lognormal variance with pedigree 0.0986, pedigree (4,3,5,1,1)
  Modelled with the 'SQCB-NO3 model' described in "01_crop production_direct field emissions and natural resources_v1.0.pdf" - pdf-document on the dedicated talk page of ecoinvent (www.ecoinvent.org/documentation)
  Uncertainty: Estimation
- Phosphorus [water, ground-]: 2.8025e-6 kg; lognormal variance with pedigree 0.0986, pedigree (4,3,5,1,1)
  Modelled, see chapter 'Emissions of phosphorous to the water' in "01_crop production_direct field emissions and natural resources_v1.0.pdf" - pdf-document on the dedicated talk page of ecoinvent (www.ecoinvent.org/documentation)
  Uncertainty: Calculated with standard method
- Phosphorus [water, surface water]: 7.7885e-6 kg; lognormal variance with pedigree 0.0986, pedigree (4,3,5,1,1)
  (same comment as for Phosphorus)
- Water [water, ground-]: 0.00925304 m3; name water_to_water_ground; = water_irrigation_input*(1-fraction_IW_to_air)*fraction_IW_to_ground_water; lognormal variance with pedigree 1.21, pedigree (5,5,5,5,5)
  Calculated value. See the parameters and their comments to understand the calculation.
  property fraction, origin: fresh water 1; name fraction_origin_fresh_water_Wgw
  property fraction, origin: salt water 0; name fraction_origin_salt_water_Wgw
  property fraction, origin: unspecified 0; name fraction_origin_unspecified_Wgw
- Water [water, surface water]: 0.00231326 m3; name water_to_water_surface; = water_irrigation_input*(1-fraction_IW_to_air)*fraction_IW_to_surface_water; lognormal variance with pedigree 1.21, pedigree (5,5,5,5,5)
  Calculated value. See the parameters and their comments to understand the calculation.
  property fraction, origin: fresh water 1; name fraction_origin_fresh_water_Wsw
  property fraction, origin: salt water 0; name fraction_origin_salt_water_Wsw

## Sampling procedure
Literature data

## Extrapolations
Machine usage is modelled with Malaysian processings and standard machinery processes. Emissions are calculated with standard methods.

## Review by Niels Jungbluth 2006-10-17
Passed.
none

## Review by Christian Bauer 2012-01-19
passed

## Review by Emilia Moreno Ruiz 2014-06-18
chipping input updated to fit the new data structure of chipping activities

## Review by Tereza Levova 2016-06-01
Be aware that the use of statistics in input calculations could provide some specific inputs not common for specific crops, this should be corrected if better information is available and better reflexed in DQR . Currently, I would dissent for some of good marks provided, being a revision of criteria applied advisable. Pesticides will need to be amended periodically checking for update of pesticides' ban.
