# concrete block production

Dataset: EcoSpold 2, unit process
Geography: RoW
Time period: 2012-01-01 to 2023-12-31
Technology level: current
Classification: ISIC rev.4 ecoinvent: 2395:Manufacture of articles of concrete, cement and plaster
Scenario: Business-as-Usual
System model: Allocation, cut-off by classification
Generated by: [System]
Database: ecoinvent
isCopyrightProtected: true
accessRestrictedTo: 1

## General comment
This dataset describes the production of concrete blocks in the Global geography.
This dataset was built as a weighted average of regional datasets of the same activityName. Uncertainty has been adjusted accordingly.
The dataset includes the reception of materials, dosing and mixing, block production by vibration, curing and storage.

## Included activities start
From the reception of raw materials at the concrete block factory.

## Included activities end
This activity ends with the concrete block produced at the factory gate. The dataset does not include infrastructure, administration and factory maintenance.

## Geography
This dataset is a weighted average built from the following geographies: BR, EC.

## Technology
Current production technology. The dataset covers the main technologies for concrete block production in Brazil and Ecuador. The manufacturing process begins by dosing and mixing the cement, aggregates and water to make concrete. In the block machine, the steel cast is filled with concrete and the block is shaped and compacted by vibration. The fresh concrete block is then transported to the curing chambers. The cure can be done in the following ways: 1) naturally, leaving the blocks in closed chambers with no water addition; 2) wet cure, spraying water over the blocks to keep relative humidity high in order to ensure proper hydration of the cement; 3) thermal cure with steam, which enables the cement to hydrate faster than in the wet cure and lowers concrete shrinkage. The blocks are then packed in pallets and stored. The process can happen with various automation levels and different types and sizes of block machines. It is common to produce various block shapes and compressive strength classes in a single factory, as well as concrete pavers.

## Time period
This dataset is considered valid from the earliest start date (2012) until the latest end date (2023) of the regional datasets (BR and EC) of the same activity name.

## Reference product
- concrete block: 1 kg; name RP; By-product classification allocatable product; CPC 37510: Non-refractory mortars and concretes; HS2017 6810: Cement, concrete or artificial stone; whether or not reinforced, articles thereof
  production volume 8.53419e11 kg; name PV_RP; = 1.49E+10/1.70%
    Estimated value. Based on the production volume for the BR dataset (1.49E+10) scaled by the share of global cement production of BR 1.70% taken from USGS 2014 (retrieved from https://minerals.usgs.gov/minerals/pubs/commodity/cement/myb1-2014-cemen.pdf, accessed 20231008)
  property price 0.14 EUR2005
    Calculated value based on data from United Nations Commodity Trade Statistics Database (comtrade.un.org). UN comtrade category: 681011 Building blocks, bricks of cement, or artificial ston.. Year 2005. Using exchange rate of 1EURO = 1.209 USD. Average of price of import into 5 main markets (EU, US, JP, IN and CN).
  properties: carbon allocation 0 kg, carbon content 0, carbon content, fossil 0, carbon content, non-fossil 0, dry mass 1 kg, water content 0, water in wet mass 0 kg, wet mass 1 kg

## Inputs from technosphere
- EUR-flat pallet: 1.24091e-5 unit; lognormal variance with pedigree 1.6221, pedigree (3,2,3,5,3)
  The amount of this exchange is calculated as a weighted average of the BR and EC datasets, according to their production volumes. For more details, please consult the regional datasets with same activity name.
  properties: carbon content, fossil 0.0311351, carbon content, non-fossil 0.58833, dry mass 18.3333 kg, heating value, net 335.11 MJ, water content 0.2, wet mass 22 kg
- cement, Portland: 0.0477035, 0.00241171, 0.00264386, 0.000109466, 6.65124e-6, 9.98025e-5, 9.72707e-5, 0.000124066 kg (8 suppliers, which the file names only by identifier); sum of these 0.0531964 kg; lognormal variance with pedigree 0.0428, pedigree (2,4,2,5,1)
  (same comment as for EUR-flat pallet)
  properties: dry mass 1 kg, wet mass 1 kg
- cement, type general use: 0.00556788 kg; lognormal variance with pedigree 0.0046, pedigree (1,4,1,5,1)
  (same comment as for EUR-flat pallet)
  properties: dry mass 1 kg, wet mass 1 kg
- chemical, inorganic: 8.63296e-6 kg; lognormal variance with pedigree 0.0046, pedigree (1,4,1,5,1)
  (same comment as for EUR-flat pallet)
  properties: carbon content, fossil 0.003, dry mass 1 kg, wet mass 1 kg
  note on carbon content, fossil: This dataset is an unweighted average of 20 inorganic substances (listed in Tab 88.1, ecoinvent v2.2 report 8, part II), being part of the top100 chemicals included in this database. The C-content has also been calculated as an unweighted average of the C content of the substances composing this dataset.
- chemical, organic: 3.15291e-5 kg; lognormal variance with pedigree 0.0046, pedigree (1,4,1,5,1)
  (same comment as for EUR-flat pallet)
  properties: carbon content, fossil 0.628, dry mass 1 kg, heating value, net 19.03 MJ, wet mass 1 kg
  note on carbon content, fossil: This dataset is an unweighted average of 20 organic substances (listed in Tab 88.1, ecoinvent v2.2 report 8, part II), being part of the top100 chemicals included in this database. The C-content has also been calculated as an unweighted average of the C content of the substances composing this dataset.
- diesel, burned in building machine: 0.0146684 MJ; lognormal variance with pedigree 1.5321, pedigree (3,2,3,5,3)
  (same comment as for EUR-flat pallet)
  properties: heating value, net 1 MJ
- electricity, medium voltage: 1.92716e-6, 3.47205e-6, 2.88475e-6, 1.54915e-7, 9.11321e-7, 1.69632e-5, 3.60991e-6, 1.83022e-6, 9.95611e-6, 2.24113e-6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 kWh (68 suppliers, which the file names only by identifier); sum of these 0.00490161 kWh; lognormal variance with pedigree 0.2458, pedigree (2,4,2,5,1)
  (same comment as for EUR-flat pallet)
- gravel, crushed: 0.457449, 0.000157352, 0.119178, 0.00238331 kg (4 suppliers, which the file names only by identifier); sum of these 0.579168 kg; lognormal variance with pedigree 0.1542, pedigree (3,4,2,5,1)
  (same comment as for EUR-flat pallet)
  properties: dry mass 1 kg, wet mass 1 kg
- heat, central or small-scale, other than natural gas: 0.0196198, 5.63591e-5 MJ (2 suppliers, which the file names only by identifier); sum of these 0.0196761 MJ; lognormal variance with pedigree 4.4339, pedigree (2,2,2,5,1)
  (same comment as for EUR-flat pallet)
  properties: heating value, net 1 MJ
- heat, district or industrial, natural gas: 3.32654e-5, 0.00202436, 6.25589e-7 MJ (3 suppliers, which the file names only by identifier); sum of these 0.00205825 MJ; lognormal variance with pedigree 2.2659, pedigree (2,2,2,5,1)
  (same comment as for EUR-flat pallet)
  properties: heating value, net 1 MJ
- heat, district or industrial, other than natural gas: 0.0186176, 8.62521e-6, 1.89576e-6 MJ (3 suppliers, which the file names only by identifier); sum of these 0.0186282 MJ; lognormal variance with pedigree 1.7629, pedigree (2,2,2,5,1)
  (same comment as for EUR-flat pallet)
  properties: heating value, net 1 MJ
- lime, hydrated, packed: 1.75161e-6 kg; lognormal variance with pedigree 0.0046, pedigree (1,4,1,5,1)
  (same comment as for EUR-flat pallet)
  properties: dry mass 0.997 kg, water content 0.00300903, wet mass 1 kg
- propane, burned in building machine: 0.0116932 MJ; lognormal variance with pedigree 1.7709, pedigree (2,2,2,5,1)
  (same comment as for EUR-flat pallet)
  properties: heating value, net 1 MJ
- sand: 6.58475e-5, 0.357888, 2.85511e-5 kg (3 suppliers, which the file names only by identifier); sum of these 0.357983 kg; lognormal variance with pedigree 0.3632, pedigree (3,4,2,5,1)
  (same comment as for EUR-flat pallet)
  properties: dry mass 1 kg, wet mass 1 kg
- tap water: 2.54248e-5, 3.8758e-5, 7.23204e-5, 2.34518e-5, 0.000977323, 1.74295e-5, 0.011184 kg (7 suppliers, which the file names only by identifier); sum of these 0.0123387 kg; lognormal variance with pedigree 1.1339, pedigree (2,2,2,5,1)
  (same comment as for EUR-flat pallet)
  properties: carbon content, fossil 0.00178991, dry mass 0.000337476 kg, water content 2962.17, wet mass 1 kg
  note on carbon content, fossil: Bicarbonate content is 2.93 mol/m3. CO2 content is 0.1 mol/m3 (ecoinvent v2.2 report 8, Tab 93.1).
- waste concrete: -0.0119015, -3.08682e-6 kg (2 suppliers, which the file names only by identifier); sum of these -0.0119046 kg; lognormal variance with pedigree 0.5251, pedigree (3,2,3,5,3)
  (same comment as for EUR-flat pallet)
  production volume; = PV_RP*BP_1/RP
    Calculated from production volume of reference product using the relative outputs.
  properties: dry mass 0.5 kg, water content 1, wet mass 1 kg
- waste wood, untreated: -7.40705e-8, -2.36945e-7, -1.32949e-7, -3.78035e-7, -1.04565e-7, -1.02452e-5, -2.66686e-7, -0.000198733, -5.96132e-7, -1.18598e-7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 kg (41 suppliers, which the file names only by identifier); sum of these -0.000273 kg; lognormal variance with pedigree 1.6221, pedigree (3,2,3,5,3)
  (same comment as for EUR-flat pallet)
  production volume; = PV_RP*BP_2/RP
    Calculated from production volume of reference product using the relative outputs.
  properties: carbon content, non-fossil 0.48632, dry mass 0.8 kg, heating value, net 13.99 MJ, water content 0.25, wet mass 1 kg
  note on heating value, net: Value taken from the general comment of the treatment dataset.
- water, harvested from rainwater: 0.0044543 kg; lognormal variance with pedigree 0.0046, pedigree (1,4,1,5,1)
  (same comment as for EUR-flat pallet)
  properties: carbon content, fossil 0.0017899, dry mass 0.00034 kg, water content 2940.18, wet mass 1 kg

## Inputs from nature
- Occupation, bare area (non-use) [natural resource, land]: 4.60935e-5 m2*year; lognormal variance with pedigree 0.0426, pedigree (1,3,1,5,1)
  (same comment as for EUR-flat pallet)
- Water, river [natural resource, in water]: 3.22634e-6 m3; lognormal variance with pedigree 2.9779, pedigree (2,2,2,5,1)
  (same comment as for EUR-flat pallet)
- Water, well, in ground [natural resource, in water]: 4.18602e-5 m3; lognormal variance with pedigree 0.5469, pedigree (2,2,2,5,1)
  (same comment as for EUR-flat pallet)

## Emissions to nature
- Water [air, unspecified]: 2.50389e-5 m3; lognormal variance with pedigree 0.2822, pedigree (4,5,2,5,1)
  (same comment as for EUR-flat pallet)
- Water [water, unspecified]: 2.08854e-5 m3; lognormal variance with pedigree 0.2822, pedigree (4,5,2,5,1)
  (same comment as for EUR-flat pallet)

## Sampling procedure
This dataset was built as a weighted average of regional datasets of the same activityName. Weights are based on production volumes.
BR: production volume = 1.49e+10 kg/year, weight = 0.914
EC: production volume = 1.4e+09 kg/year, weight = 0.08602

## Extrapolations
This dataset was built as a weighted average of regional datasets of the same activityName. See sampling procedure for details.
