# soybean production

Dataset: EcoSpold 2, unit process
Geography: CH
Time period: 1996-01-01 to 2023-12-31
Technology level: current
Classification: ISIC rev.4 ecoinvent: 0111:Growing of cereals (except rice), leguminous crops and oil seeds
Tags: WFLDB
Scenario: Business-as-Usual
System model: Allocation, cut-off by classification
Generated by: Patrik Mouron
Published in: Nemecek T. 2015
Database: ecoinvent
isCopyrightProtected: true
accessRestrictedTo: 1

## General comment
This dataset represents the production of 1 kg of soybean seed (fresh matter) at farm. The yield is 2933 kg/ha at a moisture content at storage of 11%.
This process is identical to the ecoinvent process 'protein pea production, Swiss integrated production, intensive' which is used as a proxy for soybean seed production at farm. This dataset refers to an average situation; for specific situations exchanges might differ substantially due to site specific parameters

## Included activities start
This activity starts after the harvest of the previous crop. The inputs of seeds, mineral fertilisers and pesticides are considered. Farm manure as an organic fertiliser is only accounted for in terms of direct field emissions; all pre-processes are included in the animal production systems.

## Included activities end
The dataset includes all machine operations and corresponding machine infrastructure and sheds. Machine operations are: soil cultivation, sowing, fertilisation, weed control, pest and pathogen control, combine-harvest, transport from field to regional processing centre (10 km) and drying of grains. Further, direct field emissions are included. The cultivation of green manure during winter before sowing peas is also included. This activity ends after drying of grains at the regional processing centre.

## Technology
Integrated production

## Time period
Time period referring to the data source: 1996-2003. Based on expert opinion data is considered to be valid at least up to 2012.

## Reference product
- soybean: 1 kg; By-product classification allocatable product; CPC 01412: Soya beans, other; HS2017 120110: Soya beans; seed, whether or not broken
  Reference flow: Yield = 2933 kg/ha
  production volume 86576.6 kg
    Source: FAOSTAT. Average, 2009-2012
  property price 0.239 EUR2005
    Calculated value based on data from United Nations Commodity Trade Statistics Database (comtrade.un.org). UN comtrade category: 1201 Soya beans. Using exchange rate of 1EURO = 1.209 USD. Average of price of import into 5 main markets (EU, US, JP, IN and CN).
  properties: carbon allocation 0.466812 kg, carbon content 0.524508, carbon content, fossil 0, carbon content, non-fossil 0.524508, dry mass 0.89 kg, water content 0.123596, water in wet mass 0.11 kg, wet mass 1 kg

## Inputs from technosphere
- [thio]carbamate-compound: 5.7298e-5 kg; lognormal variance with pedigree 0.0549308, pedigree (2,2,5,1,1)
  Extrapolated from Ecoinvent v2.2 process 'Pea seed IP, at regional storehouse/CH U'.
  properties: carbon content, fossil 0.626349, dry mass 1 kg, wet mass 1 kg
- application of plant protection product, by field sprayer: 0.0004688 ha; lognormal variance with pedigree 0.0133563, pedigree (2,1,4,1,1)
  Extrapolated from Ecoinvent v2.2 process 'Pea seed IP, at regional storehouse/CH U'.
- benzo[thia]diazole-compound: 0.00019273 kg; lognormal variance with pedigree 0.0549308, pedigree (2,2,5,1,1)
  Extrapolated from Ecoinvent v2.2 process 'Pea seed IP, at regional storehouse/CH U'.
  properties: carbon content, fossil 0.499869, dry mass 1 kg, wet mass 1 kg
- combine harvesting: 0.00026044 ha; lognormal variance with pedigree 0.0133563, pedigree (2,1,4,1,1)
  Extrapolated from Ecoinvent v2.2 process 'Pea seed IP, at regional storehouse/CH U'.
- dinitroaniline-compound: 0.00037764 kg; lognormal variance with pedigree 0.224231, pedigree (5,5,5,5,5)
  Extrapolated from Ecoinvent v2.2 process 'Pea seed IP, at regional storehouse/CH U'.
  properties: carbon content, fossil 0.55516, dry mass 1 kg, wet mass 1 kg
- drying of bread grain, seed and legumes: 0.0457872 l; lognormal variance with pedigree 0.0133563, pedigree (2,1,4,1,1)
  Extrapolated from Ecoinvent v2.2 process 'Pea seed IP, at regional storehouse/CH U'.
- fertilising, by broadcaster: 0.00026044 ha; lognormal variance with pedigree 0.0133563, pedigree (2,1,4,1,1)
  Extrapolated from Ecoinvent v2.2 process 'Pea seed IP, at regional storehouse/CH U'.
- green manure, Swiss integrated production, until January: 0.00026044 ha; lognormal variance with pedigree 0.0133563, pedigree (2,1,4,1,1)
  Extrapolated from Ecoinvent v2.2 process 'Pea seed IP, at regional storehouse/CH U'.
- inorganic phosphorus fertiliser, as P2O5: 0.00066337 kg
  Extrapolated from Ecoinvent v2.2 process 'Pea seed IP, at regional storehouse/CH U'. Corresponds to 0.00525 kg/ha
  properties: dry mass 1 kg, wet mass 1 kg
- liquid manure spreading, by vacuum tanker: 0.0011157 m3; lognormal variance with pedigree 0.0133563, pedigree (2,1,4,1,1)
  Extrapolated from Ecoinvent v2.2 process 'Pea seed IP, at regional storehouse/CH U'.
- nitrile-compound: 1.3022e-5 kg; lognormal variance with pedigree 0.0549308, pedigree (2,2,5,1,1)
  Extrapolated from Ecoinvent v2.2 process 'Pea seed IP, at regional storehouse/CH U'.
  properties: carbon content, fossil 0.344995, dry mass 1 kg, wet mass 1 kg
- packaging, for fertilisers: 0.0394307 kg; lognormal variance with pedigree 0.0592, pedigree (4,3,4,5,4)
  Total amount of active substance/s of fertilisers needed for the production of 'soybean' is calculated to be circa 1.97E-02 kg. Fertiliser/s used in this dataset is/are: 'phosphate fertiliser, as P2O5', 'phosphate fertiliser, as P2O5', 'phosphate fertiliser, as P2O5', 'phosphate rock, as P2O5, beneficiated, dry', 'potassium chloride, as K2O', 'potassium sulfate, as K2O'. The total amount of active substance/s is doubled in order to account for the packaging of the dilluted product of fertiliser/s that is/are applied. Therefore, 3.94E-02 kg of packaging for fertilisers is justified with this exchange.
  properties: carbon content, fossil 0.825301, dry mass 1 kg, heating value, net 25.01 MJ, price 0.0642 EUR2005, wet mass 1 kg
  note on carbon content, fossil: Considering a chemical formula (C2H4)n for polyethylene, carbon content-fossil is calculated to be 0.856286 kg of Carbon per kg of dry mass.
- packaging, for pesticides: 0.00128138 kg; lognormal variance with pedigree 0.0592, pedigree (4,3,4,5,4)
  Total amount of active substance/s of pesticides needed for the production of soybean is calculated to be circa 6.41E-04 kg. Pesticide/s used in this dataset is/are: '[thio]carbamate-compound', 'benzo[thia]diazole-compound', 'dinitroaniline-compound', 'nitrile-compound'. The total amount of active substance/s is doubled in order to account for the packaging of the dilluted product of pesticide/s that is/are applied. Therefore, 1.28E-03 kg of packaging for pesticides is justified with this exchange.
  properties: carbon content, fossil 0.85714, dry mass 1 kg, heating value, net 25.97 MJ, price 0.0642 EUR2005, wet mass 1 kg
- phosphate rock, beneficiated: 0.00959562 kg; lognormal variance with pedigree 0.0133563, pedigree (2,1,4,1,1)
  The exchange has been updated from 'phosphate rock, as P2O5, beneficiated, dry' into 'phosphate rock, beneficiated' and therefore its amount has been scaled (multiplied) from 0.0031 kg by 3.125 kg of 'phosphate rock, beneficiated' per kg of 'phosphate rock, as P2O5, beneficiated, dry'. Original comment of the exchange is: Extrapolated from Ecoinvent v2.2 process 'Pea seed IP, at regional storehouse/CH U'. Corresponds to 0.00307 kg/ha
  properties: dry mass 1 kg, wet mass 1 kg
- potassium chloride: 0.0156317 kg; lognormal variance with pedigree 0.0133563, pedigree (2,1,4,1,1)
  The exchange has been updated from 'potassium chloride, as K2O' into 'potassium chloride' and therefore its amount has been scaled (multiplied) from 0.0099 kg by 1.5829 kg of 'potassium chloride' per kg of 'potassium chloride, as K2O'. Original comment of the exchange is: Extrapolated from Ecoinvent v2.2 process 'Pea seed IP, at regional storehouse/CH U'. Corresponds to 0.00988 kg/ha
  properties: dry mass 1 kg, wet mass 1 kg
- potassium sulfate: 0.00119833 kg; lognormal variance with pedigree 0.0133563, pedigree (2,1,4,1,1)
  The exchange has been updated from 'potassium sulfate, as K2O' into 'potassium sulfate' and therefore its amount has been scaled (multiplied) from 0.0006 kg by 1.85 kg of 'potassium sulfate' per kg of 'potassium sulfate, as K2O'. Original comment of the exchange is: Extrapolated from Ecoinvent v2.2 process 'Pea seed IP, at regional storehouse/CH U'. Corresponds to 0.000648 kg/ha
  properties: dry mass 1 kg, wet mass 1 kg
- single superphosphate: 0.00100714 kg
  The exchange has been updated from 'single superphosphate' into 'single superphosphate' and therefore its amount has been scaled (multiplied) from 0.0002 kg by 4.7619 kg of 'single superphosphate' per kg of 'single superphosphate'. Original comment of the exchange is: Extrapolated from Ecoinvent v2.2 process 'Pea seed IP, at regional storehouse/CH U'. Corresponds to 0.00525 kg/ha
  properties: dry mass 1 kg, phosphorus content 0.0916484, wet mass 1 kg
- solid manure loading and spreading, by hydraulic loader and spreader: 0.072403 kg; lognormal variance with pedigree 0.0133563, pedigree (2,1,4,1,1)
  Extrapolated from Ecoinvent v2.2 process 'Pea seed IP, at regional storehouse/CH U'.
- sowing: 0.00026044 ha; lognormal variance with pedigree 0.0133563, pedigree (2,1,4,1,1)
  Extrapolated from Ecoinvent v2.2 process 'Pea seed IP, at regional storehouse/CH U'.
- soybean seed, for sowing: 0.065111 kg; lognormal variance with pedigree 0.0133563, pedigree (2,1,4,1,1)
  Extrapolated from Ecoinvent v2.2 process 'Pea seed IP, at regional storehouse/CH U'. Sowing density: 191kg/ha.
  properties: carbon content, non-fossil 0.43596, dry mass 0.89 kg, water content 0.123596, wet mass 1 kg
- tillage, currying, by weeder: 0.00026044 ha; lognormal variance with pedigree 0.0133563, pedigree (2,1,4,1,1)
  Extrapolated from Ecoinvent v2.2 process 'Pea seed IP, at regional storehouse/CH U'.
- tillage, harrowing, by spring tine harrow: 0.00052089 ha; lognormal variance with pedigree 0.0133563, pedigree (2,1,4,1,1)
  Extrapolated from Ecoinvent v2.2 process 'Pea seed IP, at regional storehouse/CH U'.
- tillage, ploughing: 0.00026044 ha; lognormal variance with pedigree 0.0133563, pedigree (2,1,4,1,1)
  Extrapolated from Ecoinvent v2.2 process 'Pea seed IP, at regional storehouse/CH U'.
- transport, freight train: 0.0219489 metric ton*km
  This represent the transport of fertilizers that are directly linked to their supplying activities, to better represent the fertilizer mix of the activity. Transport distance based on US BTS Commodity Flow Surveys 1993, 1997, 2002, 2007, US Dep. Of Transportation, Bureau of Transportation Statistics.
- transport, freight, inland waterways, barge: 0.00371124 metric ton*km
  (same comment as for transport, freight train)
- transport, freight, lorry, unspecified: 0.0118266 metric ton*km
  This represent the transport of fertilizers that are directly linked to their supplying activities, to better represent the fertilizer mix of the activity. Transport distance based on US BTS Commodity Flow Surveys 1993, 1997, 2002, 2007, US Dep. Of Transportation, Bureau of Transportation Statistics. Of the total road transport, 6% is assumed to be by delivery van for goods with a large share of retail sale, and 3% for goods that are mainly sold via wholesale.
- transport, tractor and trailer, agricultural: 0.010357 metric ton*km; lognormal variance with pedigree 0.0133563, pedigree (2,1,4,1,1)
  Extrapolated from Ecoinvent v2.2 process 'Pea seed IP, at regional storehouse/CH U'. Corresponds to 30.4tkm/ha.
- triple superphosphate: 0.0114059 kg
  The exchange has been updated from 'triple superphosphate' into 'triple superphosphate' and therefore its amount has been scaled (multiplied) from 0.0052 kg by 2.1739 kg of 'triple superphosphate' per kg of 'triple superphosphate'. Original comment of the exchange is: Extrapolated from Ecoinvent v2.2 process 'Pea seed IP, at regional storehouse/CH U'. Corresponds to 0.00525 kg/ha
  properties: dry mass 1 kg, phosphorus content 0.200754, wet mass 1 kg
  note on phosphorus content: Phosphorus content (on a dry matter basis) of triple superphosphate is calculated from the molecular formula of the nutrient present in the substance.

## Inputs from nature
- Carbon dioxide, in air [natural resource, in air]: 1.1956 kg; lognormal variance with pedigree 0.0133563, pedigree (2,1,4,1,1)
  Extrapolated from Ecoinvent v2.2 process 'Pea seed IP, at regional storehouse/CH U'. CO2 uptake by biomass.
- Energy, gross calorific value, in biomass [natural resource, biotic]: 15.031 MJ; lognormal variance with pedigree 0.0133563, pedigree (2,1,4,1,1)
  Extrapolated from Ecoinvent v2.2 process 'Pea seed IP, at regional storehouse/CH U'. Gross energy content is related to MJ/kg dry matter of product. Source: ecoinvent data.
- Occupation, annual crop, non-irrigated [natural resource, land]: 1.2588 m2*year; lognormal variance with pedigree 0.0200616, pedigree (2,1,4,1,1)
  Extrapolated from Ecoinvent v2.2 process 'Pea seed IP, at regional storehouse/CH U'. Related to the duration from harvest date of previous crop to harvest date of main crop.
- Transformation, from annual crop, non-irrigated [natural resource, land]: 2.6044 m2; lognormal variance with pedigree 0.0442144, pedigree (2,1,4,1,1)
  Extrapolated from Ecoinvent v2.2 process 'Pea seed IP, at regional storehouse/CH U'. 10000 m2 divided by the life time of the crop.
- Transformation, to annual crop, non-irrigated [natural resource, land]: 2.6044 m2; lognormal variance with pedigree 0.0442144, pedigree (2,1,4,1,1)
  (same comment as for Transformation, from annual crop, non-irrigated)

## Emissions to nature
- Ammonia [air, non-urban air or from high stacks]: 0.00046931 kg; source EEA 2013; lognormal variance with pedigree 0.0446216, pedigree (2,1,4,1,1)
  Extrapolated from Ecoinvent v2.2 process 'Pea seed IP, at regional storehouse/CH U'.
- Dinitrogen monoxide [air, non-urban air or from high stacks]: 0.0011841 kg; lognormal variance with pedigree 0.124564, pedigree (2,1,4,1,1)
  Extrapolated from Ecoinvent v2.2 process 'Pea seed IP, at regional storehouse/CH U'.
- Nitrogen oxides [air, non-urban air or from high stacks]: 0.00024865 kg; source EEA 2013; lognormal variance with pedigree 0.124564, pedigree (2,1,4,1,1)
  Extrapolated from Ecoinvent v2.2 process 'Pea seed IP, at regional storehouse/CH U'.
- Aclonifen [soil, agricultural]: 0.00037764 kg; lognormal variance with pedigree 0.0857992, pedigree (2,2,5,1,1)
  Extrapolated from Ecoinvent v2.2 process 'Pea seed IP, at regional storehouse/CH U'.
- Bentazone [soil, agricultural]: 0.00019273 kg; lognormal variance with pedigree 0.0857992, pedigree (2,2,5,1,1)
  Extrapolated from Ecoinvent v2.2 process 'Pea seed IP, at regional storehouse/CH U'.
- Cadmium II [soil, agricultural]: 6.9572e-7 kg; lognormal variance with pedigree 0.175766, pedigree (2,1,4,1,1)
  Extrapolated from Ecoinvent v2.2 process 'Pea seed IP, at regional storehouse/CH U'.
- Carbetamide [soil, agricultural]: 3.9067e-5 kg; lognormal variance with pedigree 0.0857992, pedigree (2,2,5,1,1)
  Extrapolated from Ecoinvent v2.2 process 'Pea seed IP, at regional storehouse/CH U'.
- Chromium III [soil, agricultural]: 7.3793e-6 kg; lognormal variance with pedigree 0.175766, pedigree (2,1,4,1,1)
  Extrapolated from Ecoinvent v2.2 process 'Pea seed IP, at regional storehouse/CH U'.
- Copper ion [soil, agricultural]: -4.9757e-6 kg
  Extrapolated from Ecoinvent v2.2 process 'Pea seed IP, at regional storehouse/CH U'.
- Fenpiclonil [soil, agricultural]: 1.3022e-5 kg; lognormal variance with pedigree 0.0857992, pedigree (2,2,5,1,1)
  Extrapolated from Ecoinvent v2.2 process 'Pea seed IP, at regional storehouse/CH U'.
- Lead II [soil, agricultural]: 5.0155e-7 kg; lognormal variance with pedigree 0.175766, pedigree (2,1,4,1,1)
  Extrapolated from Ecoinvent v2.2 process 'Pea seed IP, at regional storehouse/CH U'.
- Mercury II [soil, agricultural]: 1.3542e-8 kg; lognormal variance with pedigree 0.175766, pedigree (2,1,4,1,1)
  Extrapolated from Ecoinvent v2.2 process 'Pea seed IP, at regional storehouse/CH U'.
- Nickel II [soil, agricultural]: 5.4635e-7 kg; lognormal variance with pedigree 0.175766, pedigree (2,1,4,1,1)
  Extrapolated from Ecoinvent v2.2 process 'Pea seed IP, at regional storehouse/CH U'.
- Pirimicarb [soil, agricultural]: 1.8231e-5 kg; lognormal variance with pedigree 0.0857992, pedigree (2,2,5,1,1)
  Extrapolated from Ecoinvent v2.2 process 'Pea seed IP, at regional storehouse/CH U'.
- Zinc II [soil, agricultural]: -1.3458e-5 kg
  Extrapolated from Ecoinvent v2.2 process 'Pea seed IP, at regional storehouse/CH U'.
- Cadmium II [water, ground-]: 1.0541e-8 kg; lognormal variance with pedigree 0.356838, pedigree (2,1,4,1,1)
  Extrapolated from Ecoinvent v2.2 process 'Pea seed IP, at regional storehouse/CH U'.
- Cadmium II [water, surface water]: 5.5812e-9 kg; lognormal variance with pedigree 0.356838, pedigree (2,1,4,1,1)
  Extrapolated from Ecoinvent v2.2 process 'Pea seed IP, at regional storehouse/CH U'.
- Chromium III [water, ground-]: 5.1567e-6 kg; lognormal variance with pedigree 0.356838, pedigree (2,1,4,1,1)
  Extrapolated from Ecoinvent v2.2 process 'Pea seed IP, at regional storehouse/CH U'.
- Chromium III [water, surface water]: 6.4664e-7 kg; lognormal variance with pedigree 0.356838, pedigree (2,1,4,1,1)
  Extrapolated from Ecoinvent v2.2 process 'Pea seed IP, at regional storehouse/CH U'.
- Copper ion [water, ground-]: 8.0102e-7 kg; lognormal variance with pedigree 0.356838, pedigree (2,1,4,1,1)
  Extrapolated from Ecoinvent v2.2 process 'Pea seed IP, at regional storehouse/CH U'.
- Copper ion [water, surface water]: 4.9334e-7 kg; lognormal variance with pedigree 0.356838, pedigree (2,1,4,1,1)
  Extrapolated from Ecoinvent v2.2 process 'Pea seed IP, at regional storehouse/CH U'.
- Lead II [water, ground-]: 1.6999e-8 kg; lognormal variance with pedigree 0.356838, pedigree (2,1,4,1,1)
  Extrapolated from Ecoinvent v2.2 process 'Pea seed IP, at regional storehouse/CH U'.
- Lead II [water, surface water]: 6.0941e-8 kg; lognormal variance with pedigree 0.356838, pedigree (2,1,4,1,1)
  Extrapolated from Ecoinvent v2.2 process 'Pea seed IP, at regional storehouse/CH U'.
- Mercury II [water, ground-]: 1.8527e-9 kg; lognormal variance with pedigree 0.356838, pedigree (2,1,4,1,1)
  Extrapolated from Ecoinvent v2.2 process 'Pea seed IP, at regional storehouse/CH U'.
- Mercury II [water, surface water]: 1.3203e-9 kg; lognormal variance with pedigree 0.356838, pedigree (2,1,4,1,1)
  Extrapolated from Ecoinvent v2.2 process 'Pea seed IP, at regional storehouse/CH U'.
- Nickel II [water, surface water]: 2.97e-7 kg; lognormal variance with pedigree 0.356838, pedigree (2,1,4,1,1)
  Extrapolated from Ecoinvent v2.2 process 'Pea seed IP, at regional storehouse/CH U'.
- Nitrate [water, ground-]: 0.013473 kg; lognormal variance with pedigree 0.175766, pedigree (2,1,4,1,1)
  Extrapolated from Ecoinvent v2.2 process 'Pea seed IP, at regional storehouse/CH U'.
- Phosphate [water, ground-]: 2.8739e-5 kg; source Prasuhn V.  2006; lognormal variance with pedigree 0.175766, pedigree (2,1,4,1,1)
  Extrapolated from Ecoinvent v2.2 process 'Pea seed IP, at regional storehouse/CH U'.
- Phosphate [water, surface water]: 0.00010092 kg; source Prasuhn V.  2006; lognormal variance with pedigree 0.175766, pedigree (2,1,4,1,1)
  Extrapolated from Ecoinvent v2.2 process 'Pea seed IP, at regional storehouse/CH U'.
- Phosphorus [water, surface water]: 2.7293e-5 kg; source Prasuhn V.  2006; lognormal variance with pedigree 0.175766, pedigree (2,1,4,1,1)
  Extrapolated from Ecoinvent v2.2 process 'Pea seed IP, at regional storehouse/CH U'.
- Zinc II [water, ground-]: 3.923e-6 kg; lognormal variance with pedigree 0.356838, pedigree (2,1,4,1,1)
  Extrapolated from Ecoinvent v2.2 process 'Pea seed IP, at regional storehouse/CH U'.
- Zinc II [water, surface water]: 6.5042e-7 kg; lognormal variance with pedigree 0.356838, pedigree (2,1,4,1,1)
  Extrapolated from Ecoinvent v2.2 process 'Pea seed IP, at regional storehouse/CH U'.

## Sampling procedure
Data were compiled from statistics, pilot network, fertilising recommendations, documents from extension services, information provided by retailers and expert knowledge. The production data were verified and adjusted by a group of experts.

## Review by Assumpció ANTON 2016-05-30
Be aware that the use of statistics in input calculations could provide some specific inputs not common for specific crops, this should be corrected if better information is available and better reflexed in DQR . Currently, I would dissent for some of good marks provided, being a revision of criteria applied advisable.
Pesticides will need to be amended periodically checking for update of pesticides' ban.
