# sulfate pulp production, from hardwood, bleached

Dataset: EcoSpold 2, unit process
Geography: RoW
Time period: 2011-01-01 to 2023-12-31
Technology level: current
Classification: ISIC rev.4 ecoinvent: 1701:Manufacture of pulp, paper and paperboard
Synonyms: kraft pulp
Scenario: Business-as-Usual
System model: Allocation, cut-off by classification
Generated by: Nora Minas
Database: ecoinvent
isCopyrightProtected: true
accessRestrictedTo: 1

## General comment
This dataset was built as a weighted average of regional datasets of the same activityName. Weights are based on production volumes.
RER: production volume = 2.09e+09 kg/year, weight = 0.8325
CA-QC: production volume = 4.2e+08 kg/year, weight = 0.1675
PULP is a wood-based raw material to make different paper, board and other products. The pulp, or fibers from the wood are separated in a kraft cooking process in a so-called fiber line. In a recovery line, the chemicals used in the cooking process are recovered to be used again and energy is produced. The third process is effluent treatment where gaseous and liquid discharges to the environment are continuously minimized and monitored.
MAIN END USES FOR MARKET PULP • Tissue (toilet paper) • Graphic papers • Specialty products • Packaging • Fluff pulp • Viscose • CMC etc.
PRODUCTS GENERATED IN THE PULPING PROCESS include biogas from sludge, electricity, heat etc.
CAPACITIES World’s total market capacities for softwood kraft pulp, hardwood kraft pulp, and eucalyptus kraft pulp were 28.9 million tons, 15 million tons, and 26.2 million tons, respectively.
SPECIES Softwood pulp is made from coniferous trees, most typically from different species of pine and spruce. Hardwood pulp is made from non-coniferous trees, in Nordic countries primarily of birch. Eucalyptus hardwood pulp is made exclusively of eucalyptus species.
CHARACTERISTICS Softwood fibers are long and slender and are used to give the paper and board products their strength properties. Hardwood fibers are short and can be rounder and their number per gram of pulp is much larger; they give the end product its smoothness, softness and optical properties like opacity (that you cannot see through the paper).

## Included activities start
This activity starts with the reception of the pulpwood at the factory gate.

## Included activities end
The activity ends with bundled sulfate pulp at 90% water on wet mass basis ready for shipping. The dataset includes wood handling, chemical (kraft) pulping and ECF bleaching, drying process, on-site energy production, recovery cycles of chemicals, internal waste water treatment and on-site industrial landfilling. The dataset doesn"t include on-site pick-up truck operation, which uses petrol (negligible).

## Geography
This dataset is a weighted average built from the following geographies: RER, CA-QC.

## Reference product
- heat, district or industrial, other than natural gas: 1 MJ; name a_heat; By-product classification allocatable product; CPC 17300: Steam and hot water
  Caluclated as weighted average of regional datasets of the same activityName
  production volume 2.22394e10 MJ; = a_heat*APV_RP
    calculated with PV of reference product and ratio of amount of reference product and byproduct
  property price 0.0106 EUR2005
    Average European district heat price from Ecoheatcool and Euroheat 2005-2006, Ecoheat Work package 1: The European heat market. Final report. 10.6 EUR/GJ i s the price of district heat. http://www.solarthermalworld.org/files/Ecoheatcool%20WP1%20Web.pdf?download
  property true value relation 0.1842; name a_heat_true_value_relation
    property to calculate "true value" from
  properties: allocation factor 0.0308073, carbon allocation 0 kg, carbon content 0, corresponding fuel use, propane, furnace >100kW 0 MJ, exergy 0.1842 MJ, heating value, net 1 MJ, true value 0.126019

## Inputs from technosphere
- EDTA, ethylenediaminetetraacetic acid: 2.3318e-6 kg; lognormal variance with pedigree 0.0029, pedigree (1,2,2,5,1)
  Caluclated as weighted average of regional datasets of the same activityName
  properties: carbon content, fossil 0.410959, dry mass 1 kg, heating value, net 19.09 MJ, wet mass 1 kg
- adipic acid: 1.7807e-9 kg; lognormal variance with pedigree 0.0034, pedigree (2,1,2,5,1)
  Caluclated as weighted average of regional datasets of the same activityName
  properties: carbon content, fossil 0.493151, dry mass 1 kg, heating value, net 23.23 MJ, wet mass 1 kg
- aluminium scrap, post-consumer: -5.65819e-7 kg; name a_al_scrap; lognormal variance with pedigree 0.0027, pedigree (1,2,1,5,1)
  Caluclated as weighted average of regional datasets of the same activityName
  production volume; = a_al_scrap*APV_RP
    (same comment as for heat, district or industrial, other than natural gas)
  properties: dry mass 1 kg, price 0.685 EUR2005, wet mass 1 kg
- aluminium sulfate, powder: 1.32192e-5 kg; lognormal variance with pedigree 0.0035, pedigree (2,2,2,5,1)
  Caluclated as weighted average of regional datasets of the same activityName
  properties: dry mass 1 kg, wet mass 1 kg
- bark chips, wet, measured as dry mass: 0.000901185 kg; lognormal variance with pedigree 0.0115, pedigree (2,2,2,5,3)
  Caluclated as weighted average of regional datasets of the same activityName
  properties: carbon content, non-fossil 0.494, dry mass 1 kg, heating value, net 4.81 MJ, water content 1, wet mass 2 kg
- biogas: 9.2596e-5 m3; lognormal variance with pedigree 0.0115, pedigree (2,2,2,5,3)
  Caluclated as weighted average of regional datasets of the same activityName
  properties: carbon content, non-fossil 0.449939, dry mass 1.15 kg, heating value, net 22.73 MJ, wet mass 1.15 kg
- calcium carbonate, precipitated: 2.20879e-5 kg; lognormal variance with pedigree 0.0029, pedigree (1,2,2,5,1)
  Caluclated as weighted average of regional datasets of the same activityName
  properties: carbon content, fossil 0.120005, dry mass 1 kg, wet mass 1 kg
- chemical, inorganic: 3.34241e-6 kg; lognormal variance with pedigree 0.004, pedigree (2,3,2,5,1)
  Caluclated as weighted average of regional datasets of the same activityName
  properties: carbon content, fossil 0.003, dry mass 1 kg, wet mass 1 kg
- chemical, organic: 8.14336e-6 kg; lognormal variance with pedigree 0.004, pedigree (2,3,2,5,1)
  Caluclated as weighted average of regional datasets of the same activityName
  properties: carbon content, fossil 0.628, dry mass 1 kg, heating value, net 19.03 MJ, wet mass 1 kg
- chlorine dioxide: 0.00011116 kg; lognormal variance with pedigree 0.0029, pedigree (1,2,2,5,1)
  Caluclated as weighted average of regional datasets of the same activityName
  properties: dry mass 1 kg, wet mass 1 kg
- copper scrap, sorted, pressed: -5.95599e-8 kg; name a_cu_scrap; lognormal variance with pedigree 0.0027, pedigree (1,2,1,5,1)
  Caluclated as weighted average of regional datasets of the same activityName
  production volume; = a_cu_scrap*APV_RP
    (same comment as for heat, district or industrial, other than natural gas)
  properties: dry mass 1 kg, price 2.84 EUR2005, wet mass 1 kg
- diesel, burned in building machine: 0.000220226 MJ; lognormal variance with pedigree 0.042, pedigree (1,1,5,5,1)
  Caluclated as weighted average of regional datasets of the same activityName
  properties: density 0.84 kg/l, heating value, net 1 MJ, literFuel_Input 0.0021128 l
- digester sludge: -4.01586e-5 kg; name a_digester_sludge; lognormal variance with pedigree 0.0027, pedigree (1,2,1,5,1)
  Caluclated as weighted average of regional datasets of the same activityName
  production volume; = a_digester_sludge*APV_RP
    (same comment as for heat, district or industrial, other than natural gas)
  properties: carbon content, non-fossil 0.3444, dry mass 0.05 kg, heating value, net 2.42 MJ, water content 19, wet mass 1 kg
- dithiocarbamate-compound: 2.10353e-7 kg; lognormal variance with pedigree 0.0034, pedigree (2,1,2,5,1)
  Caluclated as weighted average of regional datasets of the same activityName
  properties: carbon content, fossil 0.179339, dry mass 1 kg, wet mass 1 kg
- electricity, high voltage: 6.08352e-5, 6.32951e-7, 1.04398e-5, 0.000206067, 3.16761e-6, 2.15338e-5, 5.1482e-6, 1.37696e-7 kWh (8 suppliers, which the file names only by identifier); sum of these 0.000307962 kWh; lognormal variance with pedigree 0.0029, pedigree (1,2,2,5,1)
  Caluclated as weighted average of regional datasets of the same activityName
- electricity, medium voltage: 3.93665e-6, 7.85273e-5, 1.96583e-6, 1.20554e-6, 2.41287e-7, 5.18097e-8, 8.10916e-6, 2.33071e-5 kWh (8 suppliers, which the file names only by identifier); sum of these 0.000117345 kWh; lognormal variance with pedigree 0.0426, pedigree (1,1,5,5,1)
  Caluclated as weighted average of regional datasets of the same activityName
- electronics scrap: -6.93786e-6 kg; name a_electr_scrap; lognormal variance with pedigree 0.0027, pedigree (1,2,1,5,1)
  Caluclated as weighted average of regional datasets of the same activityName
  production volume; = a_electr_scrap*APV_RP
    (same comment as for heat, district or industrial, other than natural gas)
  properties: carbon content, fossil 0.317311, carbon content, non-fossil 0.004557, dry mass 1 kg, price 16.1 EUR2005, wet mass 1 kg
- ethylene glycol: 2.31651e-9 kg; lognormal variance with pedigree 0.0034, pedigree (2,1,2,5,1)
  Caluclated as weighted average of regional datasets of the same activityName
  properties: carbon content, fossil 0.387097, dry mass 1 kg, heating value, net 23.44 MJ, wet mass 1 kg
- fatty alcohol: 2.35272e-6 kg; lognormal variance with pedigree 0.0034, pedigree (2,1,2,5,1)
  Caluclated as weighted average of regional datasets of the same activityName
  properties: carbon content, fossil 0.0408973, carbon content, non-fossil 0.743434, dry mass 1 kg, heating value, net 41.01 MJ, wet mass 1 kg
- green liquor dregs: -0.00011703 kg; name a_green_liquor_dregs; lognormal variance with pedigree 0.0027, pedigree (1,2,1,5,1)
  Caluclated as weighted average of regional datasets of the same activityName
  production volume; = a_green_liquor_dregs*APV_RP
    (same comment as for heat, district or industrial, other than natural gas)
  properties: carbon content, non-fossil 0.390667, dry mass 0.75 kg, water content 0.333333, wet mass 1 kg
- hard coal: 2.54251e-7, 6.03319e-8, 1.7994e-6, 4.22586e-7, 2.59457e-7, 5.60723e-7, 1.10337e-7 kg (7 suppliers, which the file names only by identifier); sum of these 3.46708e-6 kg; lognormal variance with pedigree 0.0115, pedigree (2,2,2,5,3)
  Caluclated as weighted average of regional datasets of the same activityName
  properties: carbon content, fossil 0.845, dry mass 0.94 kg, heating value, net 27.91 MJ, water content 0.0638298, wet mass 1 kg
- hazardous waste, for incineration: -1.31617e-6 kg; name a_hazardous; lognormal variance with pedigree 0.0027, pedigree (1,2,1,5,1)
  Caluclated as weighted average of regional datasets of the same activityName
  production volume; = a_hazardous*APV_RP
    (same comment as for heat, district or industrial, other than natural gas)
  properties: carbon content, fossil 0.554667, dry mass 0.75 kg, heating value, net 17 MJ, water content 0.333333, wet mass 1 kg
- heat, district or industrial, other than natural gas: 0.000839898 MJ; lognormal variance with pedigree 0.0029, pedigree (1,2,2,5,1)
  Caluclated as weighted average of regional datasets of the same activityName
  properties: heating value, net 1 MJ
- heavy fuel oil: 2.72136e-6, 1.58469e-6, 8.05624e-6, 0.000188327, 2.03292e-6, 1.04462e-5 kg (6 suppliers, which the file names only by identifier); sum of these 0.000213168 kg; lognormal variance with pedigree 0.0115, pedigree (2,2,2,5,3)
  Caluclated as weighted average of regional datasets of the same activityName
  properties: carbon content, fossil 0.849, dry mass 1 kg, heating value, net 41.2 MJ, wet mass 1 kg
- hydrazine: 2.62508e-8 kg; lognormal variance with pedigree 0.0426, pedigree (1,1,5,5,1)
  Caluclated as weighted average of regional datasets of the same activityName
  properties: dry mass 1 kg, heating value, net 15.13 MJ, wet mass 1 kg
- hydrochloric acid, without water, in 30% solution state: 6.00118e-8 kg; lognormal variance with pedigree 0.0034, pedigree (2,1,2,5,1)
  Caluclated as weighted average of regional datasets of the same activityName
  properties: dry mass 1 kg, heating value, net 3.32 MJ, wet mass 1 kg
- hydrogen peroxide, without water, in 50% solution state: 0.000108544 kg; lognormal variance with pedigree 0.0035, pedigree (2,2,2,5,1)
  Caluclated as weighted average of regional datasets of the same activityName
  properties: dry mass 1 kg, heating value, net 7.13 MJ, wet mass 1 kg
- iron scrap, unsorted: -5.33061e-6 kg; name a_iron_scrap; lognormal variance with pedigree 0.0027, pedigree (1,2,1,5,1)
  Caluclated as weighted average of regional datasets of the same activityName
  production volume; = a_iron_scrap*APV_RP
    (same comment as for heat, district or industrial, other than natural gas)
  properties: dry mass 1 kg, price 0.149 EUR2005, wet mass 1 kg
- light fuel oil: 6.42593e-9, 6.73309e-7, 3.31137e-8, 6.68313e-8, 4.77552e-9, 4.43484e-9 kg (6 suppliers, which the file names only by identifier); sum of these 7.88891e-7 kg; lognormal variance with pedigree 0.0115, pedigree (2,2,2,5,3)
  Caluclated as weighted average of regional datasets of the same activityName
  properties: carbon content, fossil 0.862, dry mass 1 kg, heating value, net 42.6 MJ, wet mass 1 kg
- lime: 2.09663e-5 kg; lognormal variance with pedigree 0.0034, pedigree (2,1,2,5,1)
  Caluclated as weighted average of regional datasets of the same activityName
  properties: carbon content, fossil 0.120005, dry mass 1 kg, wet mass 1 kg
- limestone residue: -5.74522e-5 kg; name a_limestone_residues; lognormal variance with pedigree 0.0027, pedigree (1,2,1,5,1)
  Caluclated as weighted average of regional datasets of the same activityName
  production volume; = a_limestone_residues*APV_RP
    (same comment as for heat, district or industrial, other than natural gas)
  properties: carbon content, fossil 0.0463689, dry mass 0.995 kg, water content 0.00502513, wet mass 1 kg
  note on carbon content, fossil: Calculated based on the carbon content of the input “calcium carbonate, precipitated”
- lubricating oil: 5.45409e-8 kg; lognormal variance with pedigree 0.0426, pedigree (1,1,5,5,1)
  Caluclated as weighted average of regional datasets of the same activityName
  properties: carbon content, fossil 0.75, dry mass 1 kg, heating value, net 40.2 MJ, wet mass 1 kg
  note on carbon content, fossil: Lubricating oil is produced from diesel. C-content/dry mass of fats and oils considered 75%, from: ecoinvent v2.2 report, n 15a, pg 40
  note on heating value, net: Literature value, Source: IPCC 2006, 2006 IPCC Guidelines for National Greenhouse Gas Inventories, Prepared by the National Greenhouse Gas Inventories Programme, Eggleston H.S., Buendia L., Miwa K., Ngara T. and Tanabe K. (eds). Published: IGES, Japan
- magnesium sulfate: 9.09173e-6 kg; lognormal variance with pedigree 0.0029, pedigree (1,2,2,5,1)
  Caluclated as weighted average of regional datasets of the same activityName
  properties: dry mass 1 kg, wet mass 1 kg
- malusil: 7.38042e-5 kg; lognormal variance with pedigree 0.0035, pedigree (2,2,2,5,1)
  Caluclated as weighted average of regional datasets of the same activityName
  properties: dry mass 1 kg, wet mass 1 kg
- manganese: 3.88791e-8 kg; lognormal variance with pedigree 0.0034, pedigree (2,1,2,5,1)
  Caluclated as weighted average of regional datasets of the same activityName
  properties: dry mass 1 kg, wet mass 1 kg
- methanol: 7.45059e-6, 1.44493e-5, 1.3685e-6 kg (3 suppliers, which the file names only by identifier); sum of these 2.32683e-5 kg; lognormal variance with pedigree 0.0035, pedigree (2,2,2,5,1)
  Caluclated as weighted average of regional datasets of the same activityName
  properties: carbon content, fossil 0.375, dry mass 1 kg, heating value, net 20 MJ, wet mass 1 kg
  note on heating value, net: Based on literature, page 533, Report 17: Jungbluth, N., Chudacoff, M., Dauriat, A., Dinkel, F., Doka, G., Faist Emmenegger, M., Gnansounou, E., Kljun, N., Schleiss, K., Spielmann, M., Stettler, C., Sutter, J. 2007: Life Cycle Inventories of Bioenergy. ecoinvent report No. 17, Swiss Centre for Life Cycle Inventories, Dübendorf, CH.
- methanol, from biomass: 2.41372e-5 kg; lognormal variance with pedigree 0.0115, pedigree (2,2,2,5,3)
  Caluclated as weighted average of regional datasets of the same activityName
  properties: carbon content, non-fossil 0.375375, dry mass 0.999 kg, heating value, net 26.48 MJ, water content 0.001001, wet mass 1 kg
- municipal solid waste: -1.05458e-8, -1.25226e-9, -5.94991e-6, -8.76285e-10, -2.81272e-10, -6.35751e-10, -2.64665e-8 kg (7 suppliers, which the file names only by identifier); sum of these -5.98997e-6 kg; lognormal variance with pedigree 0.0027, pedigree (1,2,1,5,1)
  Caluclated as weighted average of regional datasets of the same activityName
  production volume; = a_msw*APV_RP
    (same comment as for heat, district or industrial, other than natural gas)
  properties: carbon content, fossil 0.171549, carbon content, non-fossil 0.261655, dry mass 0.771 kg, heating value, net 11.74 MJ, water content 0.297017, wet mass 1 kg
  note on carbon content, fossil: Fossil C content was calculated after fossil C contents of chemicals used in the production of the paper (in Tab 8.54 & 8.55 ecoinvent v2.2 report 11_III, part 8). MSW composition in tab 4.1, ecoinvent v2.2 report 13_I. C content referred to 1 kg DM
  note on carbon content, non-fossil: Biogenic C content was calculated after biogenic C contents of chemicals used in the production of the paper (in Tab 8.54 & 8.55 ecoinvent v2.2 report 11_III, part 8). The cellulose content in 1 kg of paper (on a wet mas basis) was estimated as (1-chemical content), C content of cellulose was considered 0.44 kgC/kg dry mass (ecoinvent v2.2 report, n 15a, pg 40) MSW composition in tab 4.1, ecoinvent v2.2 report 13_I. C content referred to 1 kg DM
- natural gas, high pressure: 2.61604e-6, 4.41294e-6, 9.62598e-6, 3.22141e-6, 7.5283e-7, 4.48069e-6, 4.29957e-6, 1.13058e-5, 4.36479e-6, 6.7511e-6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 m3 (36 suppliers, which the file names only by identifier); sum of these 0.000325795 m3; lognormal variance with pedigree 0.0115, pedigree (2,2,2,5,3)
  Caluclated as weighted average of regional datasets of the same activityName
  properties: carbon content, fossil 0.75, dry mass 0.84 kg, heating value, net 36 MJ, wet mass 0.84 kg
  note on heating value, net: Literature value, Source: Christoph Meili;Niels Jungbluth;Maresa Bussa (2021) Life cycle inventories of crude oil and natural gas extraction. ESU-services Ltd. commissioned by BAFU & VSG, Schaffhausen, Switzerland, http://esu-services.ch/data/public-lci-reports/
- oxygen, liquid: 0.000334685 kg; lognormal variance with pedigree 0.0035, pedigree (2,2,2,5,1)
  Caluclated as weighted average of regional datasets of the same activityName
  properties: dry mass 1 kg, wet mass 1 kg
- peat: 3.44993e-5 kg; lognormal variance with pedigree 0.0115, pedigree (2,2,2,5,3)
  Caluclated as weighted average of regional datasets of the same activityName
  properties: carbon content, fossil 0.59, dry mass 0.42 kg, heating value, net 10 MJ, water content 1.38095, wet mass 1 kg
- phosphoric acid, industrial grade, without water, in 85% solution state: 7.61056e-7 kg; lognormal variance with pedigree 0.0426, pedigree (1,1,5,5,1)
  Caluclated as weighted average of regional datasets of the same activityName
  properties: dry mass 1 kg, wet mass 1 kg
- propane, burned in building machine: 2.12891e-5 MJ; lognormal variance with pedigree 0.042, pedigree (1,1,5,5,1)
  Caluclated as weighted average of regional datasets of the same activityName
  properties: density 0.515 kg/l, heating value, net 1 MJ, literFuel_Input 0.00030996 l
- pulp factory: 8.35046e-13 unit; lognormal variance with pedigree 0.478, pedigree (4,5,5,5,5)
  Caluclated as weighted average of regional datasets of the same activityName
- pulpwood, hardwood, measured as solid wood under bark: 4.98006e-5 m3; lognormal variance with pedigree 0.0049, pedigree (3,2,2,5,1)
  Caluclated as weighted average of regional datasets of the same activityName
  properties: basic wood density 563.2, carbon content, non-fossil 0.494, dry mass 623.644 kg, heating value, net 6071.3 MJ, water content 0.625542, wet mass 1013.76 kg
  note on carbon content, non-fossil: Biogenic C content was calculated after biogenic C contents of chemicals used in the production of the paper (in Tab 8.54 & 8.55 ecoinvent v2.2 report 11_III, part 8). The cellulose content in 1 kg of paper (on a wet mas basis) was estimated as (1-chemical content), C content of cellulose was considered 0.44 kgC/kg dry mass (ecoinvent v2.2 report, n 15a, pg 40) C content of dry mass is 0.494 kgC/kg dry wood (ecoinvent v2.2 report 9)
  note on heating value, net: Value based on "hardwood forestry, mixed species, sustainable forest management"The property is based on a value of 11.58MJ/kg
- quicklime, milled, loose: 0.000202877 kg; lognormal variance with pedigree 0.0035, pedigree (2,2,2,5,1)
  Caluclated as weighted average of regional datasets of the same activityName
  properties: dry mass 0.99 kg, water content 0.010101, wet mass 1 kg
- residual softwood, wet: 8.67416e-7 m3; lognormal variance with pedigree 0.0029, pedigree (1,2,2,5,1)
  Caluclated as weighted average of regional datasets of the same activityName
  properties: carbon content, non-fossil 0.494, dry mass 450 kg, heating value, net 5962.7 MJ, water content 0.7, wet mass 765 kg
- retention aid, for paper production: 1.12129e-8 kg; lognormal variance with pedigree 0.0034, pedigree (2,1,2,5,1)
  Caluclated as weighted average of regional datasets of the same activityName
  properties: carbon content, fossil 0.5, dry mass 1 kg, heating value, net 15.15 MJ, wet mass 1 kg
- sawlog and veneer log, softwood, measured as solid wood under bark: 3.98242e-8 m3; lognormal variance with pedigree 0.0426, pedigree (1,1,5,5,1)
  Caluclated as weighted average of regional datasets of the same activityName
  properties: basic wood density 387.2, carbon content, non-fossil 0.494, dry mass 461.364 kg, heating value, net 4483.78 MJ, water content 0.7, wet mass 784.318 kg
  note on heating value, net: Value based on the dataset "softwood forestry, mixed species, sustainable forest management"The property is based on a value of 11.58MJ/kg
- sludge from pulp and paper production: -0.000110172 kg; name a_sludge; lognormal variance with pedigree 0.0027, pedigree (1,2,1,5,1)
  Caluclated as weighted average of regional datasets of the same activityName
  production volume; = a_sludge*APV_RP
    (same comment as for heat, district or industrial, other than natural gas)
  properties: carbon content, non-fossil 0.21, dry mass 0.667576 kg, heating value, net 2.65 MJ, water content 0.497958, wet mass 1 kg
  note on carbon content, non-fossil: Biogenic C content was calculated after biogenic C contents of chemicals used in the production of the paper (in Tab 8.54 & 8.55 ecoinvent v2.2 report 11_III, part 8). The cellulose content in 1 kg of paper (on a wet mas basis) was estimated as (1-chemical content), C content of cellulose was considered 0.44 kgC/kg dry mass (ecoinvent v2.2 report, n 15a, pg 40) Tab 6.21, ecoinvent v2.2 report 11_III & Tab A.9, ecoinvent v2.2 report 13_I. Sludge from pulp and paper contains 15.75% carbon
  note on heating value, net: Value taken from the general comment of the treatment dataset.
- sodium chlorate, powder: 0.000298216 kg; lognormal variance with pedigree 0.0029, pedigree (1,2,2,5,1)
  Caluclated as weighted average of regional datasets of the same activityName
  properties: dry mass 1 kg, wet mass 1 kg
- sodium chloride, powder: 4.59098e-6 kg; lognormal variance with pedigree 0.0034, pedigree (2,1,2,5,1)
  Caluclated as weighted average of regional datasets of the same activityName
  properties: dry mass 1 kg, wet mass 1 kg
- sodium formate: 4.73666e-7 kg; lognormal variance with pedigree 0.0115, pedigree (2,2,2,5,3)
  Caluclated as weighted average of regional datasets of the same activityName
  properties: carbon content, fossil 0.176471, dry mass 1 kg, heating value, net 7.13 MJ, wet mass 1 kg
- sodium hydrogen sulfite: 2.28826e-5 kg; lognormal variance with pedigree 0.0029, pedigree (1,2,2,5,1)
  Caluclated as weighted average of regional datasets of the same activityName
  properties: dry mass 1 kg, wet mass 1 kg
- sodium hydroxide, without water, in 50% solution state: 0.000529083 kg; lognormal variance with pedigree 0.0029, pedigree (1,2,2,5,1)
  Caluclated as weighted average of regional datasets of the same activityName
  properties: dry mass 1 kg, heating value, net 3.03 MJ, wet mass 1 kg
- sodium hypochlorite, without water, in 15% solution state: 5.55614e-7 kg; lognormal variance with pedigree 0.0034, pedigree (2,1,2,5,1)
  Caluclated as weighted average of regional datasets of the same activityName
  properties: dry mass 1 kg, wet mass 1 kg
- sodium sulfate, anhydrite: 1.86988e-7 kg; lognormal variance with pedigree 0.0029, pedigree (1,2,2,5,1)
  Caluclated as weighted average of regional datasets of the same activityName
  properties: dry mass 1 kg, wet mass 1 kg
- solvent, organic: 2.05607e-9 kg; lognormal variance with pedigree 0.0034, pedigree (2,1,2,5,1)
  Caluclated as weighted average of regional datasets of the same activityName
  properties: carbon content, fossil 0.63072, dry mass 1 kg, heating value, net 19.11 MJ, wet mass 1 kg
- spent antifreezer liquid: -1.22616e-9 kg; name antifreezerFluidsAmount; lognormal variance with pedigree 0.0106, pedigree (1,1,4,5,1)
  Caluclated as weighted average of regional datasets of the same activityName
  production volume; = antifreezerFluidsAmount*APV_RP
    (same comment as for heat, district or industrial, other than natural gas)
  properties: carbon content, fossil 0.431328, dry mass 0.482 kg, heating value, net 0.56 MJ, water content 1.07469, wet mass 1 kg
- spent solvent mixture: -8.97205e-10 kg; name spentSolventAmount; lognormal variance with pedigree 0.0106, pedigree (1,1,4,5,1)
  Caluclated as weighted average of regional datasets of the same activityName
  production volume; = spentSolventAmount*APV_RP
    (same comment as for heat, district or industrial, other than natural gas)
  properties: carbon content, fossil 0.571257, dry mass 0.835 kg, heating value, net 21.7 MJ, water content 0.197605, wet mass 1 kg
  note on carbon content, fossil: Tab A.7, ecoinvent v2.2 report 13_I. C content has been calculated after data in the tables, and then referred to 1 kg DM
- sugar, from sugar beet: 1.86176e-7 kg; lognormal variance with pedigree 0.0426, pedigree (1,1,5,5,1)
  Caluclated as weighted average of regional datasets of the same activityName
  properties: carbon content, non-fossil 0.44, dry mass 1 kg, wet mass 1 kg
- sulfuric acid: 0.000457671 kg; lognormal variance with pedigree 0.0035, pedigree (2,2,2,5,1)
  Caluclated as weighted average of regional datasets of the same activityName
  properties: dry mass 1 kg, wet mass 1 kg
- tap water: 2.01733e-6, 3.07525e-6, 5.73826e-6, 1.54584e-5, 7.75456e-5, 0.000887393 kg (6 suppliers, which the file names only by identifier); sum of these 0.000991228 kg; lognormal variance with pedigree 0.0426, pedigree (1,1,5,5,1)
  Caluclated as weighted average of regional datasets of the same activityName
  properties: carbon content, fossil 0.00178991, dry mass 0.000337476 kg, water content 2962.17, wet mass 1 kg
  note on carbon content, fossil: Bicarbonate content is 2.93 mol/m3. CO2 content is 0.1 mol/m3 (ecoinvent v2.2 report 8, Tab 93.1).
- triazine-compound: 2.10353e-7 kg; lognormal variance with pedigree 0.0034, pedigree (2,1,2,5,1)
  Caluclated as weighted average of regional datasets of the same activityName
  properties: carbon content, fossil 0.475616, dry mass 1 kg, wet mass 1 kg
- urea: 3.04749e-7, 2.60234e-7 kg (2 suppliers, which the file names only by identifier); sum of these 5.64983e-7 kg; lognormal variance with pedigree 0.0426, pedigree (1,1,5,5,1)
  Caluclated as weighted average of regional datasets of the same activityName
  properties: carbon content, fossil 0.2, dry mass 1 kg, wet mass 1 kg
- waste mineral oil: -1.97814e-5 kg; name a_waste_mineral_oil; lognormal variance with pedigree 0.0027, pedigree (1,2,1,5,1)
  Caluclated as weighted average of regional datasets of the same activityName
  production volume; = a_waste_mineral_oil*APV_RP
    (same comment as for heat, district or industrial, other than natural gas)
  properties: carbon content, fossil 0.864444, dry mass 0.9 kg, heating value, net 34.7 MJ, water content 0.111111, wet mass 1 kg
- waste packaging paper: -3.17474e-6 kg; name a_waste_paper; lognormal variance with pedigree 0.0027, pedigree (1,2,1,5,1)
  Caluclated as weighted average of regional datasets of the same activityName
  production volume; = a_waste_paper*APV_RP
    (same comment as for heat, district or industrial, other than natural gas)
  properties: carbon content, fossil 0.3635, carbon content, non-fossil 0.1432, dry mass 1 kg, heating value, net 14.11 MJ, price 0.1 EUR2005, wet mass 1 kg
- waste plastic, mixture: -1.3707e-11, -1.30161e-11, -5.11517e-8, -4.96675e-10, -3.31859e-11, -5.53746e-12, -2.5098e-12 kg (7 suppliers, which the file names only by identifier); sum of these -5.17163e-8 kg; lognormal variance with pedigree 0.0027, pedigree (1,2,1,5,1)
  Caluclated as weighted average of regional datasets of the same activityName
  production volume; = a_plastic*APV_RP*APV_RP
    (same comment as for heat, district or industrial, other than natural gas)
  properties: carbon content, fossil 0.747344, dry mass 0.847 kg, heating value, net 30.79 MJ, water content 0.180638, wet mass 1 kg
- waste textile, soiled: -3.09989e-8 kg; name oilyClothAmount; lognormal variance with pedigree 0.0106, pedigree (1,1,4,5,1)
  Caluclated as weighted average of regional datasets of the same activityName
  production volume; = oilyClothAmount*APV_RP
    (same comment as for heat, district or industrial, other than natural gas)
  properties: carbon content, non-fossil 0.570519, dry mass 0.75 kg, heating value, net 14.45 MJ, water content 0.333333, wet mass 1 kg
- waste wood, untreated: -9.88244e-7, -2.57243e-8, -1.91696e-5, -3.51851e-7, -1.493e-7, -2.36031e-7, -2.83374e-6 kg (7 suppliers, which the file names only by identifier); sum of these -2.37545e-5 kg; lognormal variance with pedigree 0.0027, pedigree (1,2,1,5,1)
  Caluclated as weighted average of regional datasets of the same activityName
  production volume; = a_waste_wood*APV_RP
    (same comment as for heat, district or industrial, other than natural gas)
  properties: carbon content, non-fossil 0.48632, dry mass 0.8 kg, heating value, net 13.99 MJ, water content 0.25, wet mass 1 kg
- wood ash mixture, pure: -4.76901e-5 kg; name a_wood_ash; lognormal variance with pedigree 0.0027, pedigree (1,2,1,5,1)
  Caluclated as weighted average of regional datasets of the same activityName
  production volume; = a_wood_ash*APV_RP
    (same comment as for heat, district or industrial, other than natural gas)
  properties: carbon content, non-fossil 0.012, dry mass 1 kg, wet mass 1 kg
- wood chips, wet, measured as dry mass: 0.00697283 kg; lognormal variance with pedigree 0.0029, pedigree (1,2,2,5,1)
  Caluclated as weighted average of regional datasets of the same activityName
  properties: carbon content, non-fossil 0.494, dry mass 1 kg, heating value, net 10.84 MJ, water content 1.1, wet mass 2.1 kg
  note on heating value, net: Value based on the dataset "softwood forestry, mixed species, sustainable forest management"

## Inputs from nature
- Carbon dioxide, non-fossil, resource correction [natural resource, in air]: -0.027841 kg
- Oxygen [natural resource, in air]: 0.0263424 kg; lognormal variance with pedigree 0.0514, pedigree (2,5,2,5,4)
  Caluclated as weighted average of regional datasets of the same activityName
- Water, unspecified natural origin [natural resource, in water]: 0.00139104 m3; lognormal variance with pedigree 0.0029, pedigree (1,2,2,5,1)
  Caluclated as weighted average of regional datasets of the same activityName

## Emissions to nature
- 4-Methyl-2-pentanone [air, non-urban air or from high stacks]: 4.94295e-10 kg; lognormal variance with pedigree 0.0428, pedigree (2,1,2,5,1)
  Caluclated as weighted average of regional datasets of the same activityName
- Acetaldehyde [air, non-urban air or from high stacks]: 1.26924e-8 kg; lognormal variance with pedigree 0.0428, pedigree (2,1,2,5,1)
  Caluclated as weighted average of regional datasets of the same activityName
- Acetaldehyde [air, urban air close to ground]: 6.10967e-10 kg; lognormal variance with pedigree 0.1408, pedigree (2,5,2,5,4)
  Caluclated as weighted average of regional datasets of the same activityName
- Acetic acid [air, non-urban air or from high stacks]: 4.09839e-9 kg; lognormal variance with pedigree 0.1306, pedigree (2,5,5,5,4)
  Caluclated as weighted average of regional datasets of the same activityName
- Acetic acid [air, urban air close to ground]: 3.70642e-9 kg; lognormal variance with pedigree 0.1408, pedigree (2,5,2,5,4)
  Caluclated as weighted average of regional datasets of the same activityName
- Acetone [air, non-urban air or from high stacks]: 9.79573e-10 kg; lognormal variance with pedigree 0.0428, pedigree (2,1,2,5,1)
  Caluclated as weighted average of regional datasets of the same activityName
- Acetone [air, urban air close to ground]: 2.88319e-10 kg; lognormal variance with pedigree 0.1408, pedigree (2,5,2,5,4)
  Caluclated as weighted average of regional datasets of the same activityName
- Acetylene [air, urban air close to ground]: 1.77335e-9 kg; lognormal variance with pedigree 0.0908, pedigree (2,5,2,5,4)
  Caluclated as weighted average of regional datasets of the same activityName
- Acrolein [air, non-urban air or from high stacks]: 5.5028e-9 kg; lognormal variance with pedigree 0.0428, pedigree (2,1,2,5,1)
  Caluclated as weighted average of regional datasets of the same activityName
- Aluminium III [air, urban air close to ground]: 5.14087e-9 kg; lognormal variance with pedigree 0.7008, pedigree (2,5,2,5,4)
  Caluclated as weighted average of regional datasets of the same activityName
- Ammonia [air, non-urban air or from high stacks]: 4.20799e-7 kg; lognormal variance with pedigree 0.0428, pedigree (2,1,2,5,1)
  Caluclated as weighted average of regional datasets of the same activityName
- Ammonia [air, urban air close to ground]: 8.68968e-9 kg; lognormal variance with pedigree 0.1408, pedigree (2,5,2,5,4)
  Caluclated as weighted average of regional datasets of the same activityName
- Antimony ion [air, urban air close to ground]: 8.88122e-12 kg; lognormal variance with pedigree 0.7008, pedigree (2,5,2,5,4)
  Caluclated as weighted average of regional datasets of the same activityName
- Arsenic ion [air, non-urban air or from high stacks]: 1.00726e-10 kg; lognormal variance with pedigree 0.6528, pedigree (2,1,2,5,1)
  Caluclated as weighted average of regional datasets of the same activityName
- Arsenic ion [air, urban air close to ground]: 4.98684e-11 kg; lognormal variance with pedigree 0.1408, pedigree (2,5,2,5,4)
  Caluclated as weighted average of regional datasets of the same activityName
- Barium II [air, urban air close to ground]: 9.94764e-11 kg; lognormal variance with pedigree 0.7008, pedigree (2,5,2,5,4)
  Caluclated as weighted average of regional datasets of the same activityName
- Benzene [air, non-urban air or from high stacks]: 1.6017e-8 kg; lognormal variance with pedigree 0.1306, pedigree (2,5,5,5,4)
  Caluclated as weighted average of regional datasets of the same activityName
- Benzene [air, urban air close to ground]: 1.31414e-8 kg; lognormal variance with pedigree 0.1408, pedigree (2,5,2,5,4)
  Caluclated as weighted average of regional datasets of the same activityName
- Benzo(a)pyrene [air, non-urban air or from high stacks]: 5.07805e-12 kg; lognormal variance with pedigree 0.1306, pedigree (2,5,5,5,4)
  Caluclated as weighted average of regional datasets of the same activityName
- Benzo(a)pyrene [air, urban air close to ground]: 9.63049e-12 kg; lognormal variance with pedigree 0.1408, pedigree (2,5,2,5,4)
  Caluclated as weighted average of regional datasets of the same activityName
- Beryllium II [air, urban air close to ground]: 9.94764e-13 kg; lognormal variance with pedigree 0.7008, pedigree (2,5,2,5,4)
  Caluclated as weighted average of regional datasets of the same activityName
- Boron [air, urban air close to ground]: 3.97879e-9 kg; lognormal variance with pedigree 0.7008, pedigree (2,5,2,5,4)
  Caluclated as weighted average of regional datasets of the same activityName
- Bromine [air, non-urban air or from high stacks]: 1.50277e-9 kg; lognormal variance with pedigree 0.1306, pedigree (2,5,5,5,4)
  Caluclated as weighted average of regional datasets of the same activityName
- Bromine [air, urban air close to ground]: 3.06778e-10 kg; lognormal variance with pedigree 0.1408, pedigree (2,5,2,5,4)
  Caluclated as weighted average of regional datasets of the same activityName
- Butane [air, non-urban air or from high stacks]: 8.44496e-10 kg; lognormal variance with pedigree 0.1306, pedigree (2,5,5,5,4)
  Caluclated as weighted average of regional datasets of the same activityName
- Butane [air, urban air close to ground]: 1.19203e-8 kg; lognormal variance with pedigree 0.4008, pedigree (2,5,2,5,4)
  Caluclated as weighted average of regional datasets of the same activityName
- Cadmium II [air, non-urban air or from high stacks]: 3.76527e-11 kg; lognormal variance with pedigree 0.6528, pedigree (2,1,2,5,1)
  Caluclated as weighted average of regional datasets of the same activityName
- Cadmium II [air, urban air close to ground]: 6.31999e-12 kg; lognormal variance with pedigree 0.7008, pedigree (2,5,2,5,4)
  Caluclated as weighted average of regional datasets of the same activityName
- Calcium II [air, non-urban air or from high stacks]: 1.47239e-7 kg; lognormal variance with pedigree 0.1306, pedigree (2,5,5,5,4)
  Caluclated as weighted average of regional datasets of the same activityName
- Calcium II [air, urban air close to ground]: 4.70656e-8 kg; lognormal variance with pedigree 0.4008, pedigree (2,5,2,5,4)
  Caluclated as weighted average of regional datasets of the same activityName
- Carbon dioxide, fossil [air, non-urban air or from high stacks]: 0.000600669 kg; lognormal variance with pedigree 0.0034, pedigree (2,1,2,5,1)
  Caluclated as weighted average of regional datasets of the same activityName
- Carbon dioxide, fossil [air, urban air close to ground]: 0.000838818 kg; lognormal variance with pedigree 0.0514, pedigree (2,5,2,5,4)
  Caluclated as weighted average of regional datasets of the same activityName
- Carbon dioxide, non-fossil [air, non-urban air or from high stacks]: 0.00831189 kg; lognormal variance with pedigree 0.0034, pedigree (2,1,2,5,1)
  Caluclated as weighted average of regional datasets of the same activityName
- Carbon dioxide, non-fossil [air, urban air close to ground]: 0.0353757 kg; lognormal variance with pedigree 0.0029, pedigree (1,2,2,5,1)
  Caluclated as weighted average of regional datasets of the same activityName
- Carbon monoxide, fossil [air, non-urban air or from high stacks]: 3.25036e-6 kg; lognormal variance with pedigree 0.6528, pedigree (2,1,2,5,1)
  Caluclated as weighted average of regional datasets of the same activityName
- Carbon monoxide, fossil [air, urban air close to ground]: 1.46351e-7 kg; lognormal variance with pedigree 0.6562, pedigree (3,4,2,5,1)
  Caluclated as weighted average of regional datasets of the same activityName
- Carbon monoxide, non-fossil [air, non-urban air or from high stacks]: 0.000151341 kg; lognormal variance with pedigree 0.7406, pedigree (2,5,5,5,4)
  Caluclated as weighted average of regional datasets of the same activityName
- Carbon monoxide, non-fossil [air, urban air close to ground]: 7.8082e-6 kg; lognormal variance with pedigree 0.6562, pedigree (3,4,2,5,1)
  Caluclated as weighted average of regional datasets of the same activityName
- Chlorine [air, non-urban air or from high stacks]: 4.50835e-9 kg; lognormal variance with pedigree 0.1306, pedigree (2,5,5,5,4)
  Caluclated as weighted average of regional datasets of the same activityName
- Chlorine [air, urban air close to ground]: 9.01851e-10 kg; lognormal variance with pedigree 0.4008, pedigree (2,5,2,5,4)
  Caluclated as weighted average of regional datasets of the same activityName
- Chromium III [air, non-urban air or from high stacks]: 2.39482e-10 kg; lognormal variance with pedigree 0.6528, pedigree (2,1,2,5,1)
  Caluclated as weighted average of regional datasets of the same activityName
- Chromium III [air, urban air close to ground]: 5.57166e-11 kg; lognormal variance with pedigree 0.7008, pedigree (2,5,2,5,4)
  Caluclated as weighted average of regional datasets of the same activityName
- Chromium VI [air, non-urban air or from high stacks]: 9.02888e-12 kg; lognormal variance with pedigree 0.6528, pedigree (2,1,2,5,1)
  Caluclated as weighted average of regional datasets of the same activityName
- Chromium VI [air, urban air close to ground]: 8.09799e-13 kg; lognormal variance with pedigree 0.7008, pedigree (2,5,2,5,4)
  Caluclated as weighted average of regional datasets of the same activityName
- Cobalt II [air, non-urban air or from high stacks]: 2.15517e-10 kg; lognormal variance with pedigree 0.6528, pedigree (2,1,2,5,1)
  Caluclated as weighted average of regional datasets of the same activityName
- Cobalt II [air, urban air close to ground]: 7.68113e-11 kg; lognormal variance with pedigree 0.7008, pedigree (2,5,2,5,4)
  Caluclated as weighted average of regional datasets of the same activityName
- Copper ion [air, urban air close to ground]: 1.72004e-10 kg; lognormal variance with pedigree 0.7406, pedigree (2,5,5,5,4)
  Caluclated as weighted average of regional datasets of the same activityName
- Dinitrogen monoxide [air, non-urban air or from high stacks]: 3.50347e-8 kg; lognormal variance with pedigree 0.0428, pedigree (2,1,2,5,1)
  Caluclated as weighted average of regional datasets of the same activityName
- Dinitrogen monoxide [air, urban air close to ground]: 1.50434e-8 kg; lognormal variance with pedigree 0.1408, pedigree (2,5,2,5,4)
  Caluclated as weighted average of regional datasets of the same activityName
- Dioxins, measured as 2,3,7,8-tetrachlorodibenzo-p-dioxin [air, non-urban air or from high stacks]: 7.43573e-18 kg; lognormal variance with pedigree 0.0428, pedigree (2,1,2,5,1)
  Caluclated as weighted average of regional datasets of the same activityName
- Dioxins, measured as 2,3,7,8-tetrachlorodibenzo-p-dioxin [air, urban air close to ground]: 1.59328e-16 kg; lognormal variance with pedigree 0.1408, pedigree (2,5,2,5,4)
  Caluclated as weighted average of regional datasets of the same activityName
- Ethane [air, urban air close to ground]: 5.32005e-9 kg; lognormal variance with pedigree 0.0908, pedigree (2,5,2,5,4)
  Caluclated as weighted average of regional datasets of the same activityName
- Ethanol [air, non-urban air or from high stacks]: 1.95926e-9 kg; lognormal variance with pedigree 0.0428, pedigree (2,1,2,5,1)
  Caluclated as weighted average of regional datasets of the same activityName
- Ethanol [air, urban air close to ground]: 5.76638e-10 kg; lognormal variance with pedigree 0.1408, pedigree (2,5,2,5,4)
  Caluclated as weighted average of regional datasets of the same activityName
- Ethyl benzene [air, non-urban air or from high stacks]: 7.51372e-10 kg; lognormal variance with pedigree 0.1306, pedigree (2,5,5,5,4)
  Caluclated as weighted average of regional datasets of the same activityName
- Ethyl benzene [air, urban air close to ground]: 1.50308e-10 kg; lognormal variance with pedigree 0.1408, pedigree (2,5,2,5,4)
  Caluclated as weighted average of regional datasets of the same activityName
- Ethylene [air, urban air close to ground]: 1.06401e-8 kg; lognormal variance with pedigree 0.0908, pedigree (2,5,2,5,4)
  Caluclated as weighted average of regional datasets of the same activityName
- Fluorine [air, non-urban air or from high stacks]: 1.25231e-9 kg; lognormal variance with pedigree 0.1306, pedigree (2,5,5,5,4)
  Caluclated as weighted average of regional datasets of the same activityName
- Fluorine [air, urban air close to ground]: 2.50514e-10 kg; lognormal variance with pedigree 0.1408, pedigree (2,5,2,5,4)
  Caluclated as weighted average of regional datasets of the same activityName
- Formaldehyde [air, non-urban air or from high stacks]: 5.54918e-8 kg; lognormal variance with pedigree 0.0428, pedigree (2,1,2,5,1)
  Caluclated as weighted average of regional datasets of the same activityName
- Formaldehyde [air, urban air close to ground]: 3.27669e-9 kg; lognormal variance with pedigree 0.1408, pedigree (2,5,2,5,4)
  Caluclated as weighted average of regional datasets of the same activityName
- Hexachlorobenzene [air, non-urban air or from high stacks]: 1.80328e-16 kg; lognormal variance with pedigree 0.1306, pedigree (2,5,5,5,4)
  Caluclated as weighted average of regional datasets of the same activityName
- Hexachlorobenzene [air, urban air close to ground]: 3.6074e-17 kg; lognormal variance with pedigree 0.1408, pedigree (2,5,2,5,4)
  Caluclated as weighted average of regional datasets of the same activityName
- Hydrocarbons, aliphatic, alkanes, unspecified [air, non-urban air or from high stacks]: 2.6717e-8 kg; lognormal variance with pedigree 0.1306, pedigree (2,5,5,5,4)
  Caluclated as weighted average of regional datasets of the same activityName
- Hydrocarbons, aliphatic, alkanes, unspecified [air, urban air close to ground]: 7.49455e-9 kg; lognormal variance with pedigree 0.1408, pedigree (2,5,2,5,4)
  Caluclated as weighted average of regional datasets of the same activityName
- Hydrocarbons, aliphatic, unsaturated [air, non-urban air or from high stacks]: 7.78393e-8 kg; lognormal variance with pedigree 0.1306, pedigree (2,5,5,5,4)
  Caluclated as weighted average of regional datasets of the same activityName
- Hydrocarbons, aliphatic, unsaturated [air, urban air close to ground]: 1.73629e-8 kg; lognormal variance with pedigree 0.1408, pedigree (2,5,2,5,4)
  Caluclated as weighted average of regional datasets of the same activityName
- Hydrocarbons, aromatic [air, non-urban air or from high stacks]: 9.79979e-10 kg; lognormal variance with pedigree 0.1306, pedigree (2,5,5,5,4)
  Caluclated as weighted average of regional datasets of the same activityName
- Hydrocarbons, aromatic [air, urban air close to ground]: 2.88854e-10 kg; lognormal variance with pedigree 0.1408, pedigree (2,5,2,5,4)
  Caluclated as weighted average of regional datasets of the same activityName
- Hydrochloric acid [air, non-urban air or from high stacks]: 3.23441e-8 kg; lognormal variance with pedigree 0.0428, pedigree (2,1,2,5,1)
  Caluclated as weighted average of regional datasets of the same activityName
- Hydrochloric acid [air, urban air close to ground]: 7.83074e-9 kg; lognormal variance with pedigree 0.1408, pedigree (2,5,2,5,4)
  Caluclated as weighted average of regional datasets of the same activityName
- Hydrogen fluoride [air, non-urban air or from high stacks]: 3.13613e-10 kg; lognormal variance with pedigree 0.1306, pedigree (2,5,5,5,4)
  Caluclated as weighted average of regional datasets of the same activityName
- Hydrogen fluoride [air, urban air close to ground]: 2.57135e-10 kg; lognormal variance with pedigree 0.1408, pedigree (2,5,2,5,4)
  Caluclated as weighted average of regional datasets of the same activityName
- Hydrogen sulfide [air, non-urban air or from high stacks]: 3.86355e-9 kg; lognormal variance with pedigree 0.0428, pedigree (2,1,2,5,1)
  Caluclated as weighted average of regional datasets of the same activityName
- Hydrogen sulfide [air, urban air close to ground]: 5.16072e-7 kg; lognormal variance with pedigree 0.0423, pedigree (1,2,2,5,1)
  Caluclated as weighted average of regional datasets of the same activityName
- Iodine [air, urban air close to ground]: 1.68004e-11 kg; lognormal variance with pedigree 0.7008, pedigree (2,5,2,5,4)
  Caluclated as weighted average of regional datasets of the same activityName
- Iron ion [air, non-urban air or from high stacks]: 5.35522e-9 kg; lognormal variance with pedigree 0.6528, pedigree (2,1,2,5,1)
  Caluclated as weighted average of regional datasets of the same activityName
- Iron ion [air, urban air close to ground]: 6.69578e-9 kg; lognormal variance with pedigree 0.7008, pedigree (2,5,2,5,4)
  Caluclated as weighted average of regional datasets of the same activityName
- Isopropanol [air, non-urban air or from high stacks]: 2.26177e-8 kg; lognormal variance with pedigree 0.0428, pedigree (2,1,2,5,1)
  Caluclated as weighted average of regional datasets of the same activityName
- Lead II [air, non-urban air or from high stacks]: 2.95551e-10 kg; lognormal variance with pedigree 0.6528, pedigree (2,1,2,5,1)
  Caluclated as weighted average of regional datasets of the same activityName
- Lead II [air, urban air close to ground]: 4.24376e-10 kg; lognormal variance with pedigree 0.7008, pedigree (2,5,2,5,4)
  Caluclated as weighted average of regional datasets of the same activityName
- Lead-210 [air, urban air close to ground]: 2.58894e-8 kBq; lognormal variance with pedigree 0.7008, pedigree (2,5,2,5,4)
  Caluclated as weighted average of regional datasets of the same activityName
- Magnesium [air, non-urban air or from high stacks]: 4.20103e-9 kg; lognormal variance with pedigree 0.1306, pedigree (2,5,5,5,4)
  Caluclated as weighted average of regional datasets of the same activityName
- Magnesium [air, urban air close to ground]: 4.78551e-9 kg; lognormal variance with pedigree 0.7008, pedigree (2,5,2,5,4)
  Caluclated as weighted average of regional datasets of the same activityName
- Manganese II [air, non-urban air or from high stacks]: 4.25785e-9 kg; lognormal variance with pedigree 0.1306, pedigree (2,5,5,5,4)
  Caluclated as weighted average of regional datasets of the same activityName
- Manganese II [air, urban air close to ground]: 8.62615e-10 kg; lognormal variance with pedigree 0.7008, pedigree (2,5,2,5,4)
  Caluclated as weighted average of regional datasets of the same activityName
- Mercury II [air, non-urban air or from high stacks]: 6.53783e-12 kg; lognormal variance with pedigree 0.6528, pedigree (2,1,2,5,1)
  Caluclated as weighted average of regional datasets of the same activityName
- Mercury II [air, urban air close to ground]: 6.5187e-12 kg; lognormal variance with pedigree 0.7008, pedigree (2,5,2,5,4)
  Caluclated as weighted average of regional datasets of the same activityName
- Methane, fossil [air, non-urban air or from high stacks]: 2.31807e-8 kg; lognormal variance with pedigree 0.0428, pedigree (2,1,2,5,1)
  Caluclated as weighted average of regional datasets of the same activityName
- Methane, fossil [air, urban air close to ground]: 1.33261e-7 kg; lognormal variance with pedigree 0.1408, pedigree (2,5,2,5,4)
  Caluclated as weighted average of regional datasets of the same activityName
- Methane, non-fossil [air, non-urban air or from high stacks]: 1.48013e-6 kg; lognormal variance with pedigree 0.0428, pedigree (2,1,2,5,1)
  Caluclated as weighted average of regional datasets of the same activityName
- Methane, non-fossil [air, urban air close to ground]: 2.60611e-8 kg; lognormal variance with pedigree 0.1408, pedigree (2,5,2,5,4)
  Caluclated as weighted average of regional datasets of the same activityName
- Methanol [air, non-urban air or from high stacks]: 6.38243e-7 kg; lognormal variance with pedigree 0.0428, pedigree (2,1,2,5,1)
  Caluclated as weighted average of regional datasets of the same activityName
- Methanol [air, urban air close to ground]: 9.80285e-10 kg; lognormal variance with pedigree 0.1408, pedigree (2,5,2,5,4)
  Caluclated as weighted average of regional datasets of the same activityName
- Methyl ethyl ketone [air, non-urban air or from high stacks]: 5.92348e-9 kg; lognormal variance with pedigree 0.0428, pedigree (2,1,2,5,1)
  Caluclated as weighted average of regional datasets of the same activityName
- Molybdenum VI [air, non-urban air or from high stacks]: 5.22476e-11 kg; lognormal variance with pedigree 0.6528, pedigree (2,1,2,5,1)
  Caluclated as weighted average of regional datasets of the same activityName
- Molybdenum VI [air, urban air close to ground]: 3.10844e-11 kg; lognormal variance with pedigree 0.7008, pedigree (2,5,2,5,4)
  Caluclated as weighted average of regional datasets of the same activityName
- NMVOC, non-methane volatile organic compounds [air, non-urban air or from high stacks]: 2.68811e-7 kg; lognormal variance with pedigree 0.0428, pedigree (2,1,2,5,1)
  Caluclated as weighted average of regional datasets of the same activityName
- NMVOC, non-methane volatile organic compounds [air, urban air close to ground]: 4.12413e-8 kg; lognormal variance with pedigree 0.1408, pedigree (2,5,2,5,4)
  Caluclated as weighted average of regional datasets of the same activityName
- Nickel II [air, non-urban air or from high stacks]: 3.59189e-10 kg; lognormal variance with pedigree 0.6528, pedigree (2,1,2,5,1)
  Caluclated as weighted average of regional datasets of the same activityName
- Nickel II [air, urban air close to ground]: 9.93373e-10 kg; lognormal variance with pedigree 0.7008, pedigree (2,5,2,5,4)
  Caluclated as weighted average of regional datasets of the same activityName
- Nitrogen oxides [air, non-urban air or from high stacks]: 7.50589e-6 kg; lognormal variance with pedigree 0.0428, pedigree (2,1,2,5,1)
  Caluclated as weighted average of regional datasets of the same activityName
- Nitrogen oxides [air, urban air close to ground]: 2.10383e-5 kg; lognormal variance with pedigree 0.0423, pedigree (1,2,2,5,1)
  Caluclated as weighted average of regional datasets of the same activityName
- PAH, polycyclic aromatic hydrocarbons [air, non-urban air or from high stacks]: 2.04465e-9 kg; lognormal variance with pedigree 0.3906, pedigree (2,5,5,5,4)
  Caluclated as weighted average of regional datasets of the same activityName
- PAH, polycyclic aromatic hydrocarbons [air, urban air close to ground]: 2.26949e-10 kg; lognormal variance with pedigree 0.1408, pedigree (2,5,2,5,4)
  Caluclated as weighted average of regional datasets of the same activityName
- Particulate Matter, < 2.5 um [air, non-urban air or from high stacks]: 2.7369e-6 kg; lognormal variance with pedigree 0.3028, pedigree (2,1,2,5,1)
  Caluclated as weighted average of regional datasets of the same activityName
- Particulate Matter, < 2.5 um [air, unspecified]: 2.29704e-6 kg; lognormal variance with pedigree 0.3062, pedigree (3,4,2,5,1)
  Caluclated as weighted average of regional datasets of the same activityName
- Particulate Matter, > 10 um [air, non-urban air or from high stacks]: 7.72131e-8 kg; lognormal variance with pedigree 0.0428, pedigree (2,1,2,5,1)
  Caluclated as weighted average of regional datasets of the same activityName
- Particulate Matter, > 10 um [air, urban air close to ground]: 5.38798e-8 kg; lognormal variance with pedigree 0.0908, pedigree (2,5,2,5,4)
  Caluclated as weighted average of regional datasets of the same activityName
- Particulate Matter, > 2.5 um and < 10um [air, non-urban air or from high stacks]: 4.35092e-8 kg; lognormal variance with pedigree 0.1228, pedigree (2,1,2,5,1)
  Caluclated as weighted average of regional datasets of the same activityName
- Particulate Matter, > 2.5 um and < 10um [air, unspecified]: 3.05674e-8 kg; lognormal variance with pedigree 0.1708, pedigree (2,5,2,5,4)
  Caluclated as weighted average of regional datasets of the same activityName
- Pentachlorophenol [air, non-urban air or from high stacks]: 2.02876e-13 kg; lognormal variance with pedigree 0.1306, pedigree (2,5,5,5,4)
  Caluclated as weighted average of regional datasets of the same activityName
- Pentachlorophenol [air, urban air close to ground]: 4.05833e-14 kg; lognormal variance with pedigree 0.1408, pedigree (2,5,2,5,4)
  Caluclated as weighted average of regional datasets of the same activityName
- Pentane [air, non-urban air or from high stacks]: 1.44316e-9 kg; lognormal variance with pedigree 0.1306, pedigree (2,5,5,5,4)
  Caluclated as weighted average of regional datasets of the same activityName
- Pentane [air, urban air close to ground]: 2.04289e-8 kg; lognormal variance with pedigree 0.1408, pedigree (2,5,2,5,4)
  Caluclated as weighted average of regional datasets of the same activityName
- Phenol [air, non-urban air or from high stacks]: 9.43042e-9 kg; lognormal variance with pedigree 0.0428, pedigree (2,1,2,5,1)
  Caluclated as weighted average of regional datasets of the same activityName
- Phenol [air, urban air close to ground]: 1.72496e-10 kg; lognormal variance with pedigree 0.0908, pedigree (2,5,2,5,4)
  Caluclated as weighted average of regional datasets of the same activityName
- Phosphorus [air, non-urban air or from high stacks]: 4.58373e-9 kg; lognormal variance with pedigree 0.1306, pedigree (2,5,5,5,4)
  Caluclated as weighted average of regional datasets of the same activityName
- Phosphorus [air, urban air close to ground]: 1.54404e-9 kg; lognormal variance with pedigree 0.1408, pedigree (2,5,2,5,4)
  Caluclated as weighted average of regional datasets of the same activityName
- Polonium-210 [air, urban air close to ground]: 4.75548e-8 kBq; lognormal variance with pedigree 0.7008, pedigree (2,5,2,5,4)
  Caluclated as weighted average of regional datasets of the same activityName
- Potassium I [air, non-urban air or from high stacks]: 5.86085e-7 kg; lognormal variance with pedigree 0.1306, pedigree (2,5,5,5,4)
  Caluclated as weighted average of regional datasets of the same activityName
- Potassium I [air, urban air close to ground]: 1.17887e-7 kg; lognormal variance with pedigree 0.7008, pedigree (2,5,2,5,4)
  Caluclated as weighted average of regional datasets of the same activityName
- Potassium-40 [air, urban air close to ground]: 7.0678e-9 kBq; lognormal variance with pedigree 0.7008, pedigree (2,5,2,5,4)
  Caluclated as weighted average of regional datasets of the same activityName
- Propanal [air, non-urban air or from high stacks]: 6.00118e-9 kg; lognormal variance with pedigree 0.2106, pedigree (2,5,5,5,5)
  Caluclated as weighted average of regional datasets of the same activityName
- Propane [air, non-urban air or from high stacks]: 4.36252e-10 kg; lognormal variance with pedigree 0.1306, pedigree (2,5,5,5,4)
  Caluclated as weighted average of regional datasets of the same activityName
- Propane [air, urban air close to ground]: 7.00892e-9 kg; lognormal variance with pedigree 0.1408, pedigree (2,5,2,5,4)
  Caluclated as weighted average of regional datasets of the same activityName
- Propanol [air, non-urban air or from high stacks]: 1.42733e-12 kg; lognormal variance with pedigree 0.0428, pedigree (2,1,2,5,1)
  Caluclated as weighted average of regional datasets of the same activityName
- Propionic acid [air, non-urban air or from high stacks]: 2.40036e-11 kg; lognormal variance with pedigree 0.1306, pedigree (2,5,5,5,4)
  Caluclated as weighted average of regional datasets of the same activityName
- Propionic acid [air, urban air close to ground]: 3.4042e-10 kg; lognormal variance with pedigree 0.1408, pedigree (2,5,2,5,4)
  Caluclated as weighted average of regional datasets of the same activityName
- Propylene [air, urban air close to ground]: 1.77335e-9 kg; lognormal variance with pedigree 0.0908, pedigree (2,5,2,5,4)
  Caluclated as weighted average of regional datasets of the same activityName
- Radium-226 [air, urban air close to ground]: 6.68115e-9 kBq; lognormal variance with pedigree 0.7008, pedigree (2,5,2,5,4)
  Caluclated as weighted average of regional datasets of the same activityName
- Radium-228 [air, urban air close to ground]: 9.25712e-9 kBq; lognormal variance with pedigree 0.7008, pedigree (2,5,2,5,4)
  Caluclated as weighted average of regional datasets of the same activityName
- Radon-220 [air, urban air close to ground]: 1.47674e-9 kBq; lognormal variance with pedigree 0.7008, pedigree (2,5,2,5,4)
  Caluclated as weighted average of regional datasets of the same activityName
- Radon-222 [air, urban air close to ground]: 1.47674e-9 kBq; lognormal variance with pedigree 0.7008, pedigree (2,5,2,5,4)
  Caluclated as weighted average of regional datasets of the same activityName
- Scandium [air, urban air close to ground]: 3.39968e-13 kg; lognormal variance with pedigree 0.7008, pedigree (2,5,2,5,4)
  Caluclated as weighted average of regional datasets of the same activityName
- Selenium IV [air, non-urban air or from high stacks]: 3.44896e-11 kg; lognormal variance with pedigree 0.6528, pedigree (2,1,2,5,1)
  Caluclated as weighted average of regional datasets of the same activityName
- Selenium IV [air, urban air close to ground]: 5.01334e-11 kg; lognormal variance with pedigree 0.7008, pedigree (2,5,2,5,4)
  Caluclated as weighted average of regional datasets of the same activityName
- Silicon [air, urban air close to ground]: 4.32731e-8 kg; lognormal variance with pedigree 0.7008, pedigree (2,5,2,5,4)
  Caluclated as weighted average of regional datasets of the same activityName
- Sodium I [air, non-urban air or from high stacks]: 3.74584e-8 kg; lognormal variance with pedigree 0.1306, pedigree (2,5,5,5,4)
  Caluclated as weighted average of regional datasets of the same activityName
- Sodium I [air, urban air close to ground]: 8.79926e-9 kg; lognormal variance with pedigree 0.7008, pedigree (2,5,2,5,4)
  Caluclated as weighted average of regional datasets of the same activityName
- Strontium II [air, urban air close to ground]: 1.0981e-10 kg; lognormal variance with pedigree 0.7008, pedigree (2,5,2,5,4)
  Caluclated as weighted average of regional datasets of the same activityName
- Sulfur dioxide [air, non-urban air or from high stacks]: 6.15948e-7 kg; lognormal variance with pedigree 0.0034, pedigree (2,1,2,5,1)
  Caluclated as weighted average of regional datasets of the same activityName
- Sulfur dioxide [air, urban air close to ground]: 1.60737e-6 kg; lognormal variance with pedigree 0.0029, pedigree (1,2,2,5,1)
  Caluclated as weighted average of regional datasets of the same activityName
- Sulfur oxides [air, unspecified]: 1.31371e-6 kg; lognormal variance with pedigree 0.0029, pedigree (1,2,2,5,1)
  Caluclated as weighted average of regional datasets of the same activityName
- Sulfuric acid [air, non-urban air or from high stacks]: 5.45873e-8 kg; lognormal variance with pedigree 0.0428, pedigree (2,1,2,5,1)
  Caluclated as weighted average of regional datasets of the same activityName
- Thallium I [air, urban air close to ground]: 1.96369e-13 kg; lognormal variance with pedigree 0.7008, pedigree (2,5,2,5,4)
  Caluclated as weighted average of regional datasets of the same activityName
- Thorium [air, urban air close to ground]: 1.22919e-12 kg; lognormal variance with pedigree 0.7008, pedigree (2,5,2,5,4)
  Caluclated as weighted average of regional datasets of the same activityName
- Thorium-228 [air, urban air close to ground]: 3.08519e-9 kBq; lognormal variance with pedigree 0.7008, pedigree (2,5,2,5,4)
  Caluclated as weighted average of regional datasets of the same activityName
- Thorium-232 [air, urban air close to ground]: 1.92567e-9 kBq; lognormal variance with pedigree 0.7008, pedigree (2,5,2,5,4)
  Caluclated as weighted average of regional datasets of the same activityName
- Tin ion [air, urban air close to ground]: 7.58045e-13 kg; lognormal variance with pedigree 0.7008, pedigree (2,5,2,5,4)
  Caluclated as weighted average of regional datasets of the same activityName
- Titanium ion [air, urban air close to ground]: 1.2396e-10 kg; lognormal variance with pedigree 0.7008, pedigree (2,5,2,5,4)
  Caluclated as weighted average of regional datasets of the same activityName
- Toluene [air, non-urban air or from high stacks]: 4.88815e-9 kg; lognormal variance with pedigree 0.1306, pedigree (2,5,5,5,4)
  Caluclated as weighted average of regional datasets of the same activityName
- Toluene [air, urban air close to ground]: 5.32015e-9 kg; lognormal variance with pedigree 0.1408, pedigree (2,5,2,5,4)
  Caluclated as weighted average of regional datasets of the same activityName
- Uranium [air, urban air close to ground]: 1.98705e-12 kg; lognormal variance with pedigree 0.7008, pedigree (2,5,2,5,4)
  Caluclated as weighted average of regional datasets of the same activityName
- Uranium-238 [air, urban air close to ground]: 5.59062e-9 kBq; lognormal variance with pedigree 0.7008, pedigree (2,5,2,5,4)
  Caluclated as weighted average of regional datasets of the same activityName
- Vanadium V [air, non-urban air or from high stacks]: 6.53058e-9 kg; lognormal variance with pedigree 0.6528, pedigree (2,1,2,5,1)
  Caluclated as weighted average of regional datasets of the same activityName
- Vanadium V [air, urban air close to ground]: 1.97168e-9 kg; lognormal variance with pedigree 0.7008, pedigree (2,5,2,5,4)
  Caluclated as weighted average of regional datasets of the same activityName
- Water [air, non-urban air or from high stacks]: 2.02658e-5 m3; lognormal variance with pedigree 0.0426, pedigree (1,1,5,5,1)
  Caluclated as weighted average of regional datasets of the same activityName
- Water [air, unspecified]: 1.04341e-5 m3; lognormal variance with pedigree 0.0448, pedigree (3,3,2,5,1)
  Caluclated as weighted average of regional datasets of the same activityName
- Xylenes, unspecified [air, urban air close to ground]: 1.14815e-9 kg; lognormal variance with pedigree 0.0908, pedigree (2,5,2,5,4)
  Caluclated as weighted average of regional datasets of the same activityName
- Zinc II [air, non-urban air or from high stacks]: 1.02683e-9 kg; lognormal variance with pedigree 0.6528, pedigree (2,1,2,5,1)
  Caluclated as weighted average of regional datasets of the same activityName
- Zinc II [air, urban air close to ground]: 1.62508e-9 kg; lognormal variance with pedigree 0.7008, pedigree (2,5,2,5,4)
  Caluclated as weighted average of regional datasets of the same activityName
- m-Xylene [air, non-urban air or from high stacks]: 6.6509e-9 kg; lognormal variance with pedigree 0.1306, pedigree (2,5,5,5,4)
  Caluclated as weighted average of regional datasets of the same activityName
- m-Xylene [air, urban air close to ground]: 6.01234e-10 kg; lognormal variance with pedigree 0.1408, pedigree (2,5,2,5,4)
  Caluclated as weighted average of regional datasets of the same activityName
- 4-Methyl-2-pentanol [water, surface water]: 6.89531e-14 kg; lognormal variance with pedigree 0.3028, pedigree (2,1,2,5,1)
  Caluclated as weighted average of regional datasets of the same activityName
- AOX, Adsorbable Organic Halides [water, surface water]: 2.21276e-6 kg; lognormal variance with pedigree 0.0423, pedigree (1,2,2,5,1)
  Caluclated as weighted average of regional datasets of the same activityName
- BOD5, Biological Oxygen Demand [water, surface water]: 9.51408e-6 kg; lognormal variance with pedigree 0.0423, pedigree (1,2,2,5,1)
  Caluclated as weighted average of regional datasets of the same activityName
- Benzene [water, surface water]: 5.86114e-12 kg; lognormal variance with pedigree 0.3028, pedigree (2,1,2,5,1)
  Caluclated as weighted average of regional datasets of the same activityName
- COD, Chemical Oxygen Demand [water, surface water]: 0.000265235 kg; lognormal variance with pedigree 0.0423, pedigree (1,2,2,5,1)
  Caluclated as weighted average of regional datasets of the same activityName
- DOC, Dissolved Organic Carbon [water, surface water]: 9.66567e-5 kg; lognormal variance with pedigree 0.0423, pedigree (1,2,2,5,1)
  Caluclated as weighted average of regional datasets of the same activityName
- Formaldehyde [water, surface water]: 1.01828e-8 kg; lognormal variance with pedigree 0.3028, pedigree (2,1,2,5,1)
  Caluclated as weighted average of regional datasets of the same activityName
- Hydrogen sulfide [water, surface water]: 4.83017e-8 kg; lognormal variance with pedigree 0.0428, pedigree (2,1,2,5,1)
  Caluclated as weighted average of regional datasets of the same activityName
- Lead II [water, surface water]: 1.3053e-10 kg; lognormal variance with pedigree 0.6528, pedigree (2,1,2,5,1)
  Caluclated as weighted average of regional datasets of the same activityName
- Magnesium [water, surface water]: 9.13847e-8 kg; lognormal variance with pedigree 0.6528, pedigree (2,1,2,5,1)
  Caluclated as weighted average of regional datasets of the same activityName
- Methanol [water, surface water]: 2.97232e-8 kg; lognormal variance with pedigree 0.3028, pedigree (2,1,2,5,1)
  Caluclated as weighted average of regional datasets of the same activityName
- Nitrogen [water, surface water]: 1.60054e-6 kg; lognormal variance with pedigree 0.0423, pedigree (1,2,2,5,1)
  Caluclated as weighted average of regional datasets of the same activityName
- Phosphorus [water, surface water]: 4.5267e-7 kg; lognormal variance with pedigree 0.0423, pedigree (1,2,2,5,1)
  Caluclated as weighted average of regional datasets of the same activityName
- Suspended solids, unspecified [water, surface water]: 1.63794e-5 kg; lognormal variance with pedigree 0.0434, pedigree (2,3,2,5,1)
  Caluclated as weighted average of regional datasets of the same activityName
- TOC, Total Organic Carbon [water, surface water]: 9.66567e-5 kg; lognormal variance with pedigree 0.0423, pedigree (1,2,2,5,1)
  Caluclated as weighted average of regional datasets of the same activityName
- Toluene [water, surface water]: 3.24079e-12 kg; lognormal variance with pedigree 0.3028, pedigree (2,1,2,5,1)
  Caluclated as weighted average of regional datasets of the same activityName
- Water [water, surface water]: 0.00019704 m3; lognormal variance with pedigree 0.082, pedigree (1,1,5,5,1)
  Caluclated as weighted average of regional datasets of the same activityName
- Water [water, unspecified]: 0.00117784 m3; lognormal variance with pedigree 0.0423, pedigree (1,2,2,5,1)
  Caluclated as weighted average of regional datasets of the same activityName
- Zinc II [water, surface water]: 1.30548e-8 kg; lognormal variance with pedigree 0.6528, pedigree (2,1,2,5,1)
  Caluclated as weighted average of regional datasets of the same activityName

## Extrapolations
This dataset was built as a weighted average of regional datasets of the same activityName. Weights are based on production volumes. RER: production volume = 2.09e+09 kg/year, weight = 0.8325 CA-QC: production volume = 4.2e+08 kg/year, weight = 0.1675
