# rare earth element mine operation and beneficiation, bastnaesite ore

Dataset: EcoSpold 2, unit process
Geography: CN-SC
Time period: 2017-01-01 to 2023-12-31
Technology level: current
Classification: ISIC rev.4 ecoinvent: 0729:Mining of other non-ferrous metal ores
Synonyms: REO; REE
Scenario: Business-as-Usual
System model: Allocation, cut-off by classification
Generated by: Efstathios Kakkos
Database: ecoinvent
isCopyrightProtected: true
accessRestrictedTo: 1

## General comment
This dataset refers to the mining (open pit mining) and beneficiation activities (two step beneficiation process in-cluding ball milling and magnetic seperation) of bastnäsite minerals taking place in the Sichuan region in order to produce rare earth oxide (REO) concentrate, 70% beneficiated. Mining and beneficiaton of the ores in Si-chuan are identical to the Bayan Obo mining and beneficiation activities (see dataset: rare earth oxide concen-trate production, from monzanite & bastnaesite ore). The differentiation lays in the mined bastnaesite mineral. In the Sichuan mines, the REOs are contained in bastnaesite mineral (as opposed to mixed monazite and bast-naesite in Bayan Obo), allowing for a) easier beneficiation and b) higher REO recovery efficiency (85%) and c) higher concentration (70% REO) in the product.
Background: Metals are produced as part of a complex, highly interconnected and interdependent system, with many desirable but scarce/critical metals recovered as by-products during the production of one or more ‘host’ metal(s). Currently, mining and processing of rare earth elements is predominantly carried out in China, where they are extracted mainly via open pit mining of bastnäsite and/or monazite deposits or the leaching of ion-adsorption clays.
Modelling approach: This dataset was created using the critical materials life cycle assessment tool (CMLCAT) of Arshi et al. (2018).

## Included activities start
The activity starts with the mining of the rare earth ore.

## Included activities end
The activity ends with the beneficiation of the rare earth ore into 70% mixed concentrated rare earth oxide

## Allocation
No allocation is applied.

## Geography
First discovery of the Sichuan REE ore happened between 1985–1986 with the main mined minerals be-ing bastnaesite (for REEs) chevkinite, parasite, barite, fluorite, iron & manganese minerals as well as tiny amounts of galena.

## Technology
Firstly, open pit, mining (drilling and blasting) is performed in order to obtain the bastnaesite ore containing a minor quantity of rare earth ores (5 % rare earth oxide equivalent). Then, a two-step beneficiation process is applied to produce the REO concentrate. In the first step, ball milling and magnetic separation is used for the isolation of the iron ore. In the second step, the resullting REO tailing (containing monazite and bastnasite), is processed to get a 70% REO equivalent concentrate via flotation. As explained in the general comment, the production pathway is the same as in the Bayan Obo mine (see rare earth element mine operation and beneficiation, CN-NM dataset).

## Time period
Data are considered representative of current production practices.

## Reference product
- rare earth oxide concentrate, 70% REO: 1 kg; name REO; By-product classification allocatable product; CPC 34290: Compounds of rare earth metals, of yttrium or of scandium; HS2017 284690: Compounds, inorganic or organic (excluding cerium), of rare-earth metals, of yttrium, scandium or of mixtur[...]
  production volume 7.99962e6 kg; name PVRP
    The production volume of rare earth hydroxide concentrate (70%) is expressed in kg and is calculated based on the fact that for the production of 0.3767 kg of cerium oxide (basic output from Sichuan production pathway), 1.500217532 kg of mixed concentrated REO (70%) is required. The production volume of Cerium oxide through the Sichuan production pathway is 2008680 kg. The way the value is obtained, is analytically described in the production volume comment of cerium oxide production as reference product through the Sichuan production process.
  property cerium content 0.320516
    The individual rare earth element (REE) content of the concentrate is calculated by multipling REO concentrate content (70%) with the individual REE input excavated from ground (as shown in the inputs from environments) and then dividing divided by the total amount of REE excavated from ground (.0.87253 kg).
  property dysprosium content 0.00105237; name REO_Dy_content
    (same comment as for rare earth oxide concentrate, 70% REO)
  property europium content 0.00161363
    (same comment as for rare earth oxide concentrate, 70% REO)
  property gadolinium content 0.00410423
    (same comment as for rare earth oxide concentrate, 70% REO)
  property lanthanum content 0.228434
    (same comment as for rare earth oxide concentrate, 70% REO)
  property neodymium content 0.0990629
    (same comment as for rare earth oxide concentrate, 70% REO)
  property praseodymium content 0.0320972
    (same comment as for rare earth oxide concentrate, 70% REO)
  property price 4.08 EUR2005
    Literature value (USGS, http://minerals.usgs.gov/minerals/pubs/commodity/rare_earths/mcs-2008-raree.pdf, accessed 20160222).
  property samarium content 0.00862942
    (same comment as for rare earth oxide concentrate, 70% REO)
  property terbium content 0.000631421; name REO_Tb_content
    (same comment as for rare earth oxide concentrate, 70% REO)
  property yttrium content 0.00385868; name REO_Y_content
    (same comment as for rare earth oxide concentrate, 70% REO)
  properties: carbon allocation 0 kg, carbon content 0, carbon content, fossil 0, carbon content, non-fossil 0, dry mass 1 kg, water content 0, water in wet mass 0 kg, wet mass 1 kg

## Inputs from technosphere
- blasting: 0.0082355 kg; lognormal variance with pedigree 0.003225, pedigree (2,1,3,2,1)
  Value taken from the critical materials life cycle assessment tool (CMLCAT) of Arshi et al. (2018), provided by F. Zhao from Purdue university (more information on the sampling procedure) and adjusted from the original dataset to correspond to the production of 1 kg of rare earth oxide concentrate, 70% REO.
- diesel, burned in diesel-electric generating set, 10MW: 20.5888 MJ; lognormal variance with pedigree 0.003225, pedigree (2,1,3,2,1)
  (same comment as for blasting)
  properties: heating value, net 1 MJ
- electricity, medium voltage: 0.511 kWh; lognormal variance with pedigree 0.003225, pedigree (2,1,3,2,1)
  (same comment as for blasting)
- heat, district or industrial, other than natural gas: 2.31 MJ; lognormal variance with pedigree 0.003225, pedigree (2,1,3,2,1)
  (same comment as for blasting)
  properties: heating value, net 1 MJ
- mine infrastructure, iron: 1.37203e-11 unit; lognormal variance with pedigree 0.003225, pedigree (2,1,3,2,1)
  (same comment as for blasting)
- recultivation, iron mine: 2.80007e-5 m2; lognormal variance with pedigree 0.003225, pedigree (2,1,3,2,1)
  (same comment as for blasting)
- sodium silicate, spray powder, 80%: 0.025 kg; lognormal variance with pedigree 0.003225, pedigree (2,1,3,2,1)
  (same comment as for blasting)
  properties: dry mass 1 kg, wet mass 1 kg
- sulfidic tailings, generic: -22.0915 kg; name bp2; lognormal variance with pedigree 0.001225, pedigree (2,1,1,2,1)
  Value calculated from simplified mass balance and assumed here for completeness purposes. The value was not contained originally in the critical materials life cycle assessment tool (CMLCAT) of Arshi et al. (2018), provided by F. Zhao from Purdue university.
  production volume; = PVRP * bp2
    Calculated from production volume of reference product using the relative outputs.
  properties: aluminium content 0.014738, calcium content 0.0045972, carbon content, fossil 0.0087785, dry mass 0.7 kg, iron content 0.015374, magnesium content 0.0022359, oxygen content 0.89157, potassium content 0.0025181, silicon content 0.053273, sodium content 0.0014472, water content 0.42857, wet mass 1 kg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
- sulfuric acid: 0.028 kg; lognormal variance with pedigree 0.003225, pedigree (2,1,3,2,1)
  (same comment as for blasting)
  properties: dry mass 1 kg, wet mass 1 kg
- wastewater, average: -0.0736363 m3; name bp1; lognormal variance with pedigree 0.001225, pedigree (2,1,1,2,1)
  (same comment as for sulfidic tailings, generic)
  production volume; = PVRP * bp1
    Calculated from production volume of reference product using the relative outputs.
  properties: carbon content, non-fossil 0.194039, dry mass 0.346837 kg, water content 2882.2, wet mass 1000 kg
  note on carbon content, non-fossil: 0.0673 kg TOC/m3 (Tab A.17, ecoinvent v2.2 report 13_I). TOC was considered as Total Carbon.
- water, deionised: 24.243 kg; lognormal variance with pedigree 0.003225, pedigree (2,1,3,2,1)
  (same comment as for blasting)
  properties: wet mass 1 kg

## Inputs from nature
- Cerium [natural resource, in ground]: 0.376239 kg; lognormal variance with pedigree 0.003225, pedigree (2,1,3,2,1)
  The calculation of the individual rare earth element (REE) content in ground is based on the average values from USGS MINERALS YEARBOOK-2016 table 2 page 11, and the fact that 16.471 kg of ore needs to be mined for the production of 1 kg of concentrate. The value was not contained originally in the critical materials life cycle assessment tool (CMLCAT) of Arshi et al. (2018), provided by F. Zhao from Purdue university and is assumed for completeness purposes.
- Dysprosium [natural resource, in ground]: 0.00123533 kg; lognormal variance with pedigree 0.003225, pedigree (2,1,3,2,1)
  (same comment as for Cerium)
- Europium [natural resource, in ground]: 0.00189416 kg; lognormal variance with pedigree 0.003225, pedigree (2,1,3,2,1)
  (same comment as for Cerium)
- Gadolinium [natural resource, in ground]: 0.00481777 kg; lognormal variance with pedigree 0.003225, pedigree (2,1,3,2,1)
  (same comment as for Cerium)
- Gangue [natural resource, in ground]: 15.4648 kg; lognormal variance with pedigree 0.003225, pedigree (2,1,3,2,1)
  (same comment as for Cerium)
- Iron [natural resource, in ground]: 0.184475 kg; lognormal variance with pedigree 0.003225, pedigree (2,1,3,2,1)
  (same comment as for Cerium)
- Lanthanum [natural resource, in ground]: 0.268148 kg; lognormal variance with pedigree 0.003225, pedigree (2,1,3,2,1)
  (same comment as for Cerium)
- Neodymium [natural resource, in ground]: 0.116285 kg; lognormal variance with pedigree 0.003225, pedigree (2,1,3,2,1)
  (same comment as for Cerium)
- Occupation, mineral extraction site [natural resource, land]: 0.00197652 m2*year; lognormal variance with pedigree 0.042625, pedigree (2,1,3,2,1)
  (same comment as for blasting)
- Praseodymium [natural resource, in ground]: 0.0376774 kg; lognormal variance with pedigree 0.003225, pedigree (2,1,3,2,1)
  (same comment as for Cerium)
- Samarium [natural resource, in ground]: 0.0101297 kg; lognormal variance with pedigree 0.003225, pedigree (2,1,3,2,1)
  (same comment as for Cerium)
- Terbium [natural resource, in ground]: 0.000741195 kg; lognormal variance with pedigree 0.003225, pedigree (2,1,3,2,1)
  (same comment as for Cerium)
- Transformation, from unspecified [natural resource, land]: 3.50832e-5 m2; lognormal variance with pedigree 0.122625, pedigree (2,1,3,2,1)
  (same comment as for blasting)
- Transformation, to mineral extraction site [natural resource, land]: 3.50832e-5 m2; lognormal variance with pedigree 0.122625, pedigree (2,1,3,2,1)
  (same comment as for blasting)
- Water, unspecified natural origin [natural resource, in water]: 0.0560014 m3; lognormal variance with pedigree 0.003225, pedigree (2,1,3,2,1)
  (same comment as for blasting)
- Yttrium [natural resource, in ground]: 0.00452953 kg; lognormal variance with pedigree 0.003225, pedigree (2,1,3,2,1)
  (same comment as for Cerium)

## Emissions to nature
- Heat, waste [air, non-urban air or from high stacks]: 0.0844962 MJ; lognormal variance with pedigree 0.042625, pedigree (2,1,3,2,1)
  (same comment as for blasting)
- Particulate Matter, < 2.5 um [air, non-urban air or from high stacks]: 0.00237182 kg; lognormal variance with pedigree 0.302625, pedigree (2,1,3,2,1)
  (same comment as for blasting)
- Particulate Matter, > 10 um [air, non-urban air or from high stacks]: 0.0241135 kg; lognormal variance with pedigree 0.042625, pedigree (2,1,3,2,1)
  (same comment as for blasting)
- Particulate Matter, > 2.5 um and < 10um [air, non-urban air or from high stacks]: 0.0214123 kg; lognormal variance with pedigree 0.122625, pedigree (2,1,3,2,1)
  (same comment as for blasting)
- Thorium [air, non-urban air or from high stacks]: 4.9412e-5 kg; lognormal variance with pedigree 0.302625, pedigree (2,1,3,2,1)
  (same comment as for blasting)
- Uranium [air, non-urban air or from high stacks]: 4.94e-7 kg; lognormal variance with pedigree 0.302625, pedigree (2,1,3,2,1)
  (same comment as for blasting)
- Ammonium [water, unspecified]: 0.000606066 kg; lognormal variance with pedigree 0.042625, pedigree (2,1,3,2,1)
  (same comment as for blasting)
- Arsenic ion [water, unspecified]: 7.273e-6 kg; lognormal variance with pedigree 0.652625, pedigree (2,1,3,2,1)
  (same comment as for blasting)
- BOD5, Biological Oxygen Demand [water, unspecified]: 0.000969706 kg; name BOD; = 0.5*COD; lognormal variance with pedigree 0.042625, pedigree (2,1,3,2,1)
  Mathematical relation based on section 5.9.7 of the data quality guideline for the ecoinvent. (BOD5 = 0.5 * COD). The value was not contained originally in the critical materials life cycle assessment tool (CMLCAT) of Arshi et al. (2018), provided by F. Zhao from Purdue university.
- COD, Chemical Oxygen Demand [water, unspecified]: 0.00193941 kg; name COD; lognormal variance with pedigree 0.042625, pedigree (2,1,3,2,1)
  (same comment as for blasting)
- Cadmium II [water, unspecified]: 1.939e-6 kg; lognormal variance with pedigree 0.652625, pedigree (2,1,3,2,1)
  (same comment as for blasting)
- Chromium III [water, unspecified]: 2.4243e-5 kg; lognormal variance with pedigree 0.652625, pedigree (2,1,3,2,1)
  (same comment as for blasting)
- Chromium VI [water, unspecified]: 7.273e-6 kg; lognormal variance with pedigree 0.652625, pedigree (2,1,3,2,1)
  (same comment as for blasting)
- DOC, Dissolved Organic Carbon [water, unspecified]: 0.000718301 kg; name DOC; = TOC; lognormal variance with pedigree 0.042625, pedigree (2,1,3,2,1)
  Mathematical relation based on section 5.9.7 of the data quality guideline for the ecoinvent. (DOC = TOC). The value was not contained originally in the critical materials life cycle assessment tool (CMLCAT) of Arshi et al. (2018), provided by F. Zhao from Purdue university.
- Fluoride [water, unspecified]: 0.000242426 kg; lognormal variance with pedigree 0.042625, pedigree (2,1,3,2,1)
  (same comment as for blasting)
- Lead II [water, unspecified]: 1.2121e-5 kg; lognormal variance with pedigree 0.652625, pedigree (2,1,3,2,1)
  (same comment as for blasting)
- Mercury II [water, unspecified]: 8.4e-7 kg; lognormal variance with pedigree 0.652625, pedigree (2,1,3,2,1)
  (same comment as for blasting)
- Nitrogen [water, unspecified]: 0.00121213 kg; lognormal variance with pedigree 0.042625, pedigree (2,1,3,2,1)
  (same comment as for blasting)
- Oils, unspecified [water, unspecified]: 0.000121213 kg; lognormal variance with pedigree 0.042625, pedigree (2,1,3,2,1)
  (same comment as for blasting)
- Phosphorus [water, unspecified]: 7.2728e-5 kg; lognormal variance with pedigree 0.042625, pedigree (2,1,3,2,1)
  (same comment as for blasting)
- Suspended solids, unspecified [water, unspecified]: 0.00169699 kg; lognormal variance with pedigree 0.042625, pedigree (2,1,3,2,1)
  (same comment as for blasting)
- TOC, Total Organic Carbon [water, unspecified]: 0.000718301 kg; name TOC; = COD/2.7; lognormal variance with pedigree 0.042625, pedigree (2,1,3,2,1)
  Mathematical relation based on section 5.9.7 of the data quality guideline for the ecoinvent. (TOC = COD /2.7). The value was not contained originally in the critical materials life cycle assessment tool (CMLCAT) of Arshi et al. (2018), provided by F. Zhao from Purdue university.
- Thorium-232 [water, unspecified]: 0.00988992 kBq; lognormal variance with pedigree 0.652625, pedigree (2,1,3,2,1)
  Value taken from the critical materials life cycle assessment tool (CMLCAT) of Arshi et al. (2018), provided by F. Zhao from Purdue university (more information on the sampling procedure) and adjusted from the original dataset to correspond to the production of 1 kg of rare earth oxide concentrate, 70% REO.
  Thorium 232 emissions in water are 2.42E-06 kg. Calculation is based on the facr that thorium 232 specific activity is 4080 Bq / g. Source: Toxicological Profile for Thorium September 2019 U.S. Department of Health and Human Services ATSDR: Agency for Toxic Substances and Disease Registry. Link: https://www.atsdr.cdc.gov/ToxProfiles/tp147.pdf Last accessed: 04.03.2020
- Uranium-238 [water, unspecified]: 0.0303 kBq; lognormal variance with pedigree 0.652625, pedigree (2,1,3,2,1)
  Value taken from the critical materials life cycle assessment tool (CMLCAT) of Arshi et al. (2018), provided by F. Zhao from Purdue university (more information on the sampling procedure) and adjusted from the original dataset to correspond to the production of 1 kg of rare earth oxide concentrate, 70% REO.
  Uranium 238 emissions in water are 2.42E-06 kg. Calculation is based on the assumption that 1 Bq of uranium 238 corresponds to 0.08 mg of natural uranium. Source: https://www.irsn.fr/EN/Research/publications-documentation/radionuclides-sheets/environment/Pages/Natural-uranium-environment.aspx Last accessed: 04.03.2020
- Zinc II [water, unspecified]: 3.6364e-5 kg; lognormal variance with pedigree 0.652625, pedigree (2,1,3,2,1)
  (same comment as for blasting)

## Sampling procedure
This dataset is based on the following publication: Arshi, P. S., Vahidi, E., & Zhao, F. (2018). Behind the Scenes of Clean Energy: The Environmental Footprint of Rare Earth Products. ACS Sustainable Chemistry & Engineering, 6(3), 3311-3320. doi:10.1021/acssuschemeng.7b03484.
All exchanges from/ to the environment and from/to the technosphere were calculated using the critical materials life cycle assessment tool (CMLCAT) of Arshi et al. (2018), provided by F. Zhao from Purdue university. This excel-based software acts as a supporting tool to the abovementioned publication. Individual exchanges such as sulfidic tailings, wastewater and gangue which were not contained in the original datasets have been added for completness purposes and their calculation is based on mass balance.
