# treatment of waste glass, sanitary landfill

Dataset: EcoSpold 2, unit process
Geography: GLO
Time period: 2010-01-01 to 2023-12-31
Technology level: current
Classification: ISIC rev.4 ecoinvent: 3821:Treatment and disposal of non-hazardous waste
Scenario: Business-as-Usual
System model: Allocation, cut-off by classification
Generated by: Nikolia Stoikou
Database: ecoinvent
isCopyrightProtected: true
accessRestrictedTo: 1

## General comment
This dataset represents the activity of waste disposal of 'waste glass' in a sanitary landfill. Recommended use of this dataset: For waste glass (packaging or flat) which go to disposal as part of communal waste mixture. Larger amounts of already separated glass might rather go to recycling. Inventoried waste consists of fraction: 100% Glass; . Waste composition (wet, in ppmw): gross heating value 0.1423 MJ/kg; net heating value 0.04602 MJ/kg; H2O 20000; O 483070; H na; C na; S na; N na; P na; B na; Cl 195.89; Br na; F na; I na; Ag na; As na; Ba na; Cd na; Co na; Cr 303.63; Cu 7.8356; Hg na; Mn na; Mo na; Ni na; Pb 38.688; Sb na; Se na; Sn na; V na; Zn 3.9178; Be na; Sc na; Sr na; Ti na; Tl na; W na; Si 359090; Fe na; Ca 72818; Al na; K na; Mg na; Na 64472. Share of carbon in initial waste waste that is biogenic 60.4%. Share of metals in waste not oxidised and bulk-recyclable (exclude very small or thin parts) Iron: 0%; Alu: 0%; Copper: 0%. Overall degradability of waste during 100 years: 1%. 0.3542 kg waste mass remains in the landfill even after the long term period.

## Included activities start
The activity starts with the waste being available at the gate of the treatment facility. Collection and transportation of the waste to the treatment plant is not included.

## Included activities end
The activity ends with the waste being treated and waste-specific emissions from the landfill are released to the environment (air due to landfil gas, water due to landfil leachate, and subsequent into groundwater).

## Geography
The site has mean annual temperature (MAT) of 16.743579766537 degC, mean annual precipitation (MAP) of 1250.84108527132 mm/year, and net infiltration of 790.252035689178 mm/year.The leachate percolating through the landfill has an average residence time of 6.33 years.
References
UN data, 2020. Precipitation, Environment Statistics Database, United Nations Statistics Division Available at: http://data.un.org/Data.aspx?q=precipitation&d=ENV&f=variableID%3a6;
World Bank, 2022. Surface area (sq.km), World Bank Group Available at: https://data.worldbank.org/indicator/AG.SRF.TOTL.K2;
Doka G.,2021. A model for composition-specific life cycle inventories of regionalised wastewater fates, Zurich, Switzerland. http://www.doka.ch/publications.htm

## Technology
This is an inventory for a sanitary (controlled) landfill for municipal solid waste. Ultimate average landfill height is 20 meters. Operation phase duration is 30 years. The total raw landfill gas mass produced in the landfill from this waste is 0.00469 kg. The total CH4 mass in the raw landfill gas is 0 kg. Percentage of landfill gas directly emitted is 47w%. Percentage of landfill gas captured and flared is 18.02w%. Percentage of landfill gas captured and utilised is 34.98%. Conversion efficiencies are 27.8e% for electricity and 13.5e% for useful heat. Leachate collected during the first 100 years is collected and treated region-specifically before emission. Based on average waste composition and climate data the end of carbonate phase is estimated to be reached 2'863 years after waste deposition.

## Reference product
- waste glass: -1 kg; By-product classification Waste; CPC 37111: Glass in the mass, in balls (except microspheres), rods or tubes, unworked; waste and scrap of glass; HS2017 700100: Glass; cullet and other waste and scrap of glass, glass in the mass
  main reference product of this activity
  production volume 6.86352e-6 kg
    Estimated based on the total amount of this waste being treated in the database
  property price 0 EUR2005
    Waste products are assigned a price of zero as they are assumed to require further treatment.
  properties: calcium content 0.0743037, carbon allocation 8.13892e-7 kg, carbon content 8.307e-7, carbon content, fossil 8.307e-7, carbon content, non-fossil 0, chlorine content 0.000199871, chromium content 0.000309811, copper content 7.99497e-6, dry mass 0.979766 kg, heating value, gross 0.145147 MJ, heating value, net 0.0469594 MJ, hydrogen content 1.15886e-7, lead content 3.94753e-5, nitrogen content 3.43975e-7, oxygen content 0.492927, silicon content 0.366419, sodium content 0.0657884, water content 0.0206523, water in wet mass 0.0202344 kg, wet mass 1 kg, zinc content 3.99795e-6

## Inputs from technosphere
- cast iron: 1.47506e-6 kg; lognormal variance with pedigree 0.32302, pedigree (1,1,3,1,1)
  For sewer auxiliary materials.
  Uncertainty: Uncertainty calculated from uncertainty in base parameters.
  properties: carbon content, fossil 0.04, dry mass 1 kg, wet mass 1 kg
- concrete, 30MPa: 6.31451e-10, 2.93285e-9, 1.24109e-7, 1.2222e-8, 3.01202e-9 m3 (5 suppliers, which the file names only by identifier); sum of these 1.42907e-7 m3; lognormal variance with pedigree 0.32302, pedigree (1,1,3,1,1)
  For leachate collection tanks and sewer pipe.
  Uncertainty: Uncertainty calculated from uncertainty in base parameters.
  properties: dry mass 2205 kg, water content 0.0816327, wet mass 2385 kg
- diesel, burned in building machine: 0.0483891 MJ; lognormal variance with pedigree 0.32302, pedigree (1,1,3,1,1)
  For waste distribution and compaction, construction diesel for base and compartment seals, for access street and sewer construction.
  Uncertainty: Uncertainty calculated from uncertainty in base parameters.
  properties: heating value, net 1 MJ
- electricity, low voltage: 1.50008e-5 kWh; lognormal variance with pedigree 0.022759, pedigree (1,1,3,1,1)
  Administrative building electricity consumption.
  Uncertainty: Uncertainty calculated from uncertainty in base parameters.
- excavation, hydraulic digger: 0.000387766 m3; lognormal variance with pedigree 0.32302, pedigree (1,1,3,1,1)
  Excavation work for landfill construction, sewer construction and recultivation.
  Uncertainty: Uncertainty calculated from uncertainty in base parameters.
- excavation, skid-steer loader: 0.000387766 m3; lognormal variance with pedigree 0.32302, pedigree (1,1,3,1,1)
  (same comment as for excavation, hydraulic digger)
- extrusion, plastic pipes: 8.49435e-5 kg; lognormal variance with pedigree 0.32302, pedigree (1,1,3,1,1)
  For base and interior drain system of landfill, sewer auxiliary materials.
  Uncertainty: Uncertainty calculated from uncertainty in base parameters.
- gravel, round: 4.16392e-5, 0.160109 kg (2 suppliers, which the file names only by identifier); sum of these 0.160151 kg; lognormal variance with pedigree 0.32302, pedigree (1,1,3,1,1)
  For base and flank gravel beds and concrete, for access street, for drainage beds, for recultivation layer.
  Uncertainty: Uncertainty calculated from uncertainty in base parameters.
  properties: dry mass 1 kg, wet mass 1 kg
- heat, district or industrial, other than natural gas: 0.00161036 MJ; lognormal variance with pedigree 0.022759, pedigree (1,1,3,1,1)
  Administrative building space heat demand.
  Uncertainty: Uncertainty calculated from uncertainty in base parameters.
  properties: heating value, net 1 MJ
- leachate, SLF, waste glass: -0.00395449 m3
  Landfill leachate captured during short-term sent to wastewater treatment.
  production volume
    calculated in proportion to incinerated waste input
  properties: carbon content, non-fossil 1.15836e-6, dry mass 0.785152 kg, fossil share of carbon 1, mass concentration, calcium 2.40828e-5 kg/m3, mass concentration, chlorine 1.24695e-6 kg/m3, mass concentration, chromium 8.766e-9 kg/m3, mass concentration, nitrogen 7.97377e-8 kg/m3, mass concentration, oxygen 3.57292e-5 kg/m3, mass concentration, silicon 4.56004e-5 kg/m3, mass concentration, sodium 0.000678399 kg/m3, water content 1272.64, wet mass 1000 kg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
- pitch: 0.000282064, 1.26433e-5, 6.23211e-6, 2.38251e-6, 0.000109351, 1.80495e-5, 0.00159454, 0.000362364 kg (8 suppliers, which the file names only by identifier); sum of these 0.00238762 kg; lognormal variance with pedigree 0.32302, pedigree (1,1,3,1,1)
  For base and compartment seals and access street construction.
  Uncertainty: Uncertainty calculated from uncertainty in base parameters.
  properties: carbon content, fossil 0.83, dry mass 1 kg, heating value, net 28 MJ, wet mass 1 kg
- polyethylene, high density, granulate: 0.000268506 kg; lognormal variance with pedigree 0.32302, pedigree (1,1,3,1,1)
  For base and compartment seals, for base and interior drain system of landfill, sewer auxiliary materials.
  Uncertainty: Uncertainty calculated from uncertainty in base parameters.
  properties: carbon content, fossil 0.857143, dry mass 1 kg, heating value, net 42.47 MJ, wet mass 1 kg
- polypropylene, granulate: 2.23494e-7 kg; lognormal variance with pedigree 0.32302, pedigree (1,1,3,1,1)
  (same comment as for cast iron)
  properties: carbon content, fossil 0.857143, dry mass 1 kg, heating value, net 32.78 MJ, wet mass 1 kg
  note on heating value, net: Value extracted from "treatment of waste polypropylene, open burning"
- polyvinylchloride, bulk polymerised: 2.23494e-7 kg; lognormal variance with pedigree 0.32302, pedigree (1,1,3,1,1)
  (same comment as for cast iron)
  properties: carbon content, fossil 0.387097, dry mass 1 kg, heating value, net 21.5 MJ, wet mass 1 kg
- reinforcing steel: 8.71626e-6 kg; lognormal variance with pedigree 0.32302, pedigree (1,1,3,1,1)
  (same comment as for cast iron)
  properties: carbon content, fossil 0.004, dry mass 1 kg, wet mass 1 kg
- sand: 1.01175e-6, 1.21139e-8, 6.58403e-5, 5.25252e-9 kg (4 suppliers, which the file names only by identifier); sum of these 6.68694e-5 kg; lognormal variance with pedigree 0.32302, pedigree (1,1,3,1,1)
  (same comment as for cast iron)
  properties: dry mass 1 kg, wet mass 1 kg
- steel, chromium steel 18/8, hot rolled: 3.03952e-6 kg; lognormal variance with pedigree 0.32302, pedigree (1,1,3,1,1)
  (same comment as for cast iron)
  properties: carbon content, fossil 0.0008, dry mass 1 kg, wet mass 1 kg
- synthetic rubber: 8.93976e-8 kg; lognormal variance with pedigree 0.32302, pedigree (1,1,3,1,1)
  (same comment as for cast iron)
  properties: carbon content, fossil 0.871949, dry mass 1 kg, heating value, net 26.42 MJ, wet mass 1 kg
- tap water: 0.00185782 kg; lognormal variance with pedigree 0.32302, pedigree (1,1,3,1,1)
  (same comment as for cast iron)
  properties: carbon content, fossil 0.00178991, dry mass 0.000337476 kg, water content 2962.17, wet mass 1 kg

## Inputs from nature
- Organic carbon, placed in landfill [inventory indicator, waste]: 1.31519e-7 kg; lognormal variance with pedigree 0.21186, pedigree (1,1,3,1,1)
  Mass of organic carbon in waste (without inorganic carbon), initially (year 1) put in sanitary landfill. The exchange represents a flow that is within the technosphere. This exchange should only be used to apply ecofactors for the Swiss LCIA method of Ecological Scarcity and not any other purpose.
  Uncertainty: uncertainty is derived from uncertainty in waste composition and flows.
- Waste mass, total, placed in landfill [inventory indicator, waste]: 1.00005 kg
  Mass of waste initially (year 1) put in sanitary landfill. The exchange represents a flow that is within the technosphere. This exchange should only be used to apply ecofactors for the Swiss LCIA method of Ecological Scarcity and not any other purpose.
- Occupation, construction site [natural resource, land]: 0.000250013 m2*year; lognormal variance with pedigree 0.32302, pedigree (1,1,3,1,1)
  For construction phase of the landfill.
  Uncertainty: Uncertainty calculated from uncertainty in base parameters.
- Occupation, dump site [natural resource, land]: 0.00150008 m2*year; lognormal variance with pedigree 0.32302, pedigree (1,1,3,1,1)
  For landfill operation phase.
  Uncertainty: Uncertainty calculated from uncertainty in base parameters.
- Occupation, shrub land, sclerophyllous [natural resource, land]: 0.000250013 m2*year; lognormal variance with pedigree 0.32302, pedigree (1,1,3,1,1)
  Restoration and aftercare phase.
  Uncertainty: Uncertainty calculated from uncertainty in base parameters.
- Occupation, traffic area, road network [natural resource, land]: 0.0018501 m2*year; lognormal variance with pedigree 0.32302, pedigree (1,1,3,1,1)
  For access road.
  Uncertainty: Uncertainty calculated from uncertainty in base parameters.
- Transformation, from dump site, sanitary landfill [natural resource, land]: 5.00026e-5 m2; lognormal variance with pedigree 0.32302, pedigree (1,1,3,1,1)
  Conversion after landfill operation.
  Uncertainty: Uncertainty calculated from uncertainty in base parameters.
- Transformation, from pasture, man made [natural resource, land]: 6.00031e-5 m2; lognormal variance with pedigree 0.32302, pedigree (1,1,3,1,1)
  Original conversion of landfill area and access road.
  Uncertainty: Uncertainty calculated from uncertainty in base parameters.
- Transformation, from shrub land, sclerophyllous [natural resource, land]: 5.00026e-5 m2; lognormal variance with pedigree 0.32302, pedigree (1,1,3,1,1)
  After restoration.
  Uncertainty: Uncertainty calculated from uncertainty in base parameters.
- Transformation, to dump site, sanitary landfill [natural resource, land]: 5.00026e-5 m2; lognormal variance with pedigree 0.32302, pedigree (1,1,3,1,1)
  Conversion to landfill area.
  Uncertainty: Uncertainty calculated from uncertainty in base parameters.
- Transformation, to forest, unspecified [natural resource, land]: 5.00026e-5 m2; lognormal variance with pedigree 0.32302, pedigree (1,1,3,1,1)
  Conversion to forest after renaturation.
  Uncertainty: Uncertainty calculated from uncertainty in base parameters.
- Transformation, to shrub land, sclerophyllous [natural resource, land]: 5.00026e-5 m2; lognormal variance with pedigree 0.32302, pedigree (1,1,3,1,1)
  Initial restoration and renaturation.
  Uncertainty: Uncertainty calculated from uncertainty in base parameters.
- Transformation, to traffic area, road network [natural resource, land]: 1.00005e-5 m2; lognormal variance with pedigree 0.32302, pedigree (1,1,3,1,1)
  Construction of access road.
  Uncertainty: Uncertainty calculated from uncertainty in base parameters.

## Emissions to nature
- Calcium II [air, non-urban air or from high stacks]: 2.37203e-8 kg; lognormal variance with pedigree 1.8564, pedigree (1,1,3,1,1)
  Emission from direct release or combustion of landfill biogas.
  Uncertainty: Uncertainty calculated from uncertainty of the waste composition of this waste, uncertainty in waste decomposition and short-term leaching in landfill-
- Carbon dioxide, fossil [air, non-urban air or from high stacks]: 2.06986e-7 kg; lognormal variance with pedigree 0.22404, pedigree (1,1,3,1,1)
  (same comment as for Calcium II)
- Carbon monoxide, fossil [air, non-urban air or from high stacks]: 1.26285e-11 kg; lognormal variance with pedigree 0.87101, pedigree (1,1,3,1,1)
  (same comment as for Calcium II)
- Chromium III [air, non-urban air or from high stacks]: 8.6544e-12 kg; lognormal variance with pedigree 2.8261, pedigree (1,1,3,1,1)
  (same comment as for Calcium II)
- Copper ion [air, non-urban air or from high stacks]: 1.09633e-13 kg; lognormal variance with pedigree 3.3993, pedigree (1,1,3,1,1)
  (same comment as for Calcium II)
- Heat, waste [air, non-urban air or from high stacks]: 1.21157e-6 MJ
  Emission from direct release or incineration of landfill biogas.
- Hydrochloric acid [air, non-urban air or from high stacks]: 7.10983e-8 kg; lognormal variance with pedigree 1.6636, pedigree (1,1,3,1,1)
  (same comment as for Calcium II)
- Lead II [air, non-urban air or from high stacks]: 7.59917e-13 kg; lognormal variance with pedigree 3.146, pedigree (1,1,3,1,1)
  (same comment as for Calcium II)
- Methane, fossil [air, non-urban air or from high stacks]: 2.68612e-8 kg; lognormal variance with pedigree 0.26457, pedigree (1,1,3,1,1)
  (same comment as for Calcium II)
- NMVOC, non-methane volatile organic compounds [air, non-urban air or from high stacks]: 2.38917e-13 kg; lognormal variance with pedigree 0.26457, pedigree (1,1,3,1,1)
  (same comment as for Calcium II)
- Nitrogen oxides [air, non-urban air or from high stacks]: 2.99049e-11 kg
  Emission from direct release or combustion of landfill biogas.
- Particulate Matter, < 2.5 um [air, non-urban air or from high stacks]: 4.23955e-12 kg; lognormal variance with pedigree 0.5252, pedigree (1,1,3,1,1)
  (same comment as for Calcium II)
- Silicon [air, non-urban air or from high stacks]: 4.49074e-8 kg; lognormal variance with pedigree 1.856, pedigree (1,1,3,1,1)
  (same comment as for Calcium II)
- Sodium I [air, non-urban air or from high stacks]: 6.67584e-7 kg; lognormal variance with pedigree 1.4197, pedigree (1,1,3,1,1)
  (same comment as for Calcium II)
- Zinc II [air, non-urban air or from high stacks]: 4.12925e-13 kg; lognormal variance with pedigree 3.24, pedigree (1,1,3,1,1)
  (same comment as for Calcium II)
- Non-hazardous waste disposed [inventory indicator, waste]: 1.00005 kg
  Inventory indicator for waste mass disposed in landfill. To be used in EN15804 "other data" results.
- Heat, waste [soil, industrial]: 0.00142062 MJ
  Emission from short-term decomposition of waste.
- Ammonium [water, ground-, long-term]: 2.22054e-17 kg; lognormal variance with pedigree 2.1136, pedigree (1,1,3,1,1)
  Emissions from long-term leachate (>100a).
  Uncertainty: Uncertainty calculated from uncertainty of the waste composition of this waste, uncertainty in waste decomposition and short-term leaching in landfill
- BOD5, Biological Oxygen Demand [water, ground-, long-term]: 1.36234e-8 kg; lognormal variance with pedigree 0.22669, pedigree (1,1,3,1,1)
  Emissions from long-term leachate (>100a).
  Uncertainty: Uncertainty calculated from uncertainty of the waste composition of this waste, uncertainty in waste decomposition and short-term leaching in landfill.
- COD, Chemical Oxygen Demand [water, ground-, long-term]: 5.75471e-8 kg; lognormal variance with pedigree 0.22669, pedigree (1,1,3,1,1)
  (same comment as for Ammonium)
- Calcium II [water, ground-, long-term]: 0.0727238 kg; lognormal variance with pedigree 0.15256, pedigree (1,1,3,1,1)
  (same comment as for Ammonium)
- Chloride [water, ground-, long-term]: 0.000190888 kg; lognormal variance with pedigree 0.87467, pedigree (1,1,3,1,1)
  (same comment as for Ammonium)
- Chromium VI [water, ground-, long-term]: 9.01316e-7 kg; lognormal variance with pedigree 9.2837, pedigree (1,1,3,1,1)
  (same comment as for Ammonium)
- Copper ion [water, ground-, long-term]: 7.83523e-6 kg; lognormal variance with pedigree 1.3021, pedigree (1,1,3,1,1)
  (same comment as for Ammonium)
- DOC, Dissolved Organic Carbon [water, ground-, long-term]: 5.26145e-8 kg; lognormal variance with pedigree 0.22669, pedigree (1,1,3,1,1)
  (same comment as for Ammonium)
- Heat, waste [water, ground-, long-term]: 0.140834 MJ
  Emission from long-term decomposition of waste.
- Lead II [water, ground-, long-term]: 3.86861e-5 kg; lognormal variance with pedigree 1.0904, pedigree (1,1,3,1,1)
  (same comment as for Ammonium)
- Nitrate [water, ground-, long-term]: 2.33525e-18 kg; lognormal variance with pedigree 2.1136, pedigree (1,1,3,1,1)
  (same comment as for Ammonium)
- Nitrite [water, ground-, long-term]: 1.20858e-18 kg; lognormal variance with pedigree 2.1136, pedigree (1,1,3,1,1)
  (same comment as for Ammonium)
- Nitrogen, organic bound [water, ground-, long-term]: 3.62933e-17 kg; lognormal variance with pedigree 2.1136, pedigree (1,1,3,1,1)
  (same comment as for Ammonium)
- Silicon [water, ground-, long-term]: 0.00499214 kg; lognormal variance with pedigree 4.6012, pedigree (1,1,3,1,1)
  (same comment as for Ammonium)
- Sodium I [water, ground-, long-term]: 0.0618016 kg; lognormal variance with pedigree 0.16446, pedigree (1,1,3,1,1)
  (same comment as for Ammonium)
- TOC, Total Organic Carbon [water, ground-, long-term]: 5.26145e-8 kg; lognormal variance with pedigree 0.22669, pedigree (1,1,3,1,1)
  (same comment as for Ammonium)
- Zinc II [water, ground-, long-term]: 3.91602e-6 kg; lognormal variance with pedigree 1.3933, pedigree (1,1,3,1,1)
  (same comment as for Ammonium)
