# transport, passenger car

Dataset: EcoSpold 2, unit process
Geography: RoW
Time period: 2012-01-01 to 2023-12-31
Technology level: current
Classification: ISIC rev.4 ecoinvent: 4922:Other passenger land transport
Scenario: Business-as-Usual
System model: Allocation, cut-off by classification
Generated by: Sofia Parada Tur
Database: ecoinvent
isCopyrightProtected: true
accessRestrictedTo: 1

## General comment
This activity provides an average transport in a passenger car. It does so by linking specific "transport, passenger car", both with internal combustion engine and electric, into a generic product.

## Included activities end
This activity provides an average transport in passenger car.

## Technology
Average transport in a passenger car. The average takes into account internal combustion engines and electric cars. For the first type, the average accounts for different car classes(EURO 3, EURO 4 and EURO 5). These at its turn, are an average of the different car sizes (small, medium and large) and fuel types (petrol, diesel and natural gas). For the electric car, it takes into account a medium size electric car.

## Parameters
- production volumes sum: 1.32812e13 km; name PV_sum; = 1.3279E+13 + 2.25E+09; lognormal variance with pedigree 0.0026, pedigree (3,1,1,1,1)
  sum of the production volumes of the input exchanges in the present inventory. Values obtained from the ecoinvent datasets that produce these inputs as reference products.

## Reference product
- transport, passenger car: 1 km; By-product classification allocatable product; CPC 64119: Other land transportation services of passengers, n.e.c.
  production volume 1.08342e13 km; = PV_sum
    The production volume is equal to the sum of the individual production volumes of the inputs transport, passenger car, internal combustion engine and transport, passenger car, electric. This value is obtained from the ecoinvent datasets that produce these products as reference product.
  property price 0.158752 EUR2005
    Calculated based on inputs: The price of the product has been calculated as a sum of the values of the material and energy inputs for this product. This value is therefore a rough estimation. It may underestimate the real price since there are additional expenses when producing any product. These expences can include for example labour costs, treatment of waste materials and profit for the producer. Please consider carefully whether this level of data quality is acceptable for your application.
  properties: carbon allocation 0 kg, carbon content 0

## Inputs from technosphere
- transport, passenger car with internal combustion engine: 0.999981 km; = 1.3281E+13/ PV_sum; lognormal variance with pedigree 0.0166, pedigree (4,1,4,1,1)
  calculated value. Based on the production volume of this exchange divided by the total sum of the production volumes from all the inputs. The production volumes are obtained from the ecoinvent datasets where these inputs are produced as reference product.
- transport, passenger car, electric: 0.000169412 km; = 2.25E+09/ PV_sum; lognormal variance with pedigree 0.0166, pedigree (4,1,4,1,1)
  (same comment as for transport, passenger car with internal combustion engine)
