# containerboard production, fluting medium, recycled

Dataset: EcoSpold 2, unit process
Geography: RoW
Time period: 2021-01-01 to 2023-12-31
Technology level: current
Classification: ISIC rev.4 ecoinvent: 1702:Manufacture of corrugated paper and paperboard and of containers of paper a
Synonyms: Wellenstof
Scenario: Business-as-Usual
System model: Allocation, cut-off by classification
Generated by: Nora Minas
Published in: FEFCO Corrugated Packaging 2018
Database: ecoinvent
isCopyrightProtected: true
accessRestrictedTo: 1

## General comment
This dataset has been extrapolated from respective regional geographies (RER). Wellenstoff is a grade of corrugated base paper, which forms the corrugated middle layer in the production of corrugated board, where is covered between two outer layers of linerboard (e.g. kraftliner or testliner). According to the common sector terminology, “wellenstoff” or “recycled medium” is made from recycled material, i.e. uses recovered paper as raw material as opposed to “semichemical fluting”, which is used interchangeably with wellenstoff but is made from virgin material.
Mind that this dataset is identical to the production testliner. FEFCO (2021) reports weighted average values of in- and outputs over the testliner and wellenstoff, since there are few differences between these grades. For this reason, also the calculated emissions resulting from fuel consumption are identical for wellenstoff and testliner.
Data for the production of testliner and wellenstoff were provided by the industry association CCB (Cepi ContainerBoard). The data for the production of Testliner and Wellenstoff were collected from European mills, together producing about 71% (17084104 tonnes) of the total annual production of corrugated base papers from recovered paper in Europe in 2020. The mills contributing with data are located in Austria, Belgium, Bulgaria, Czech Republic, Denmark, France, Germany, Hungary, Italy, the Netherlands, Poland, Romania, Serbia, Spain, Sweden and the United Kingdom. Thereby each mill has an annual production volume of about 70 000 – 1 250 000 tonnes net saleable paper product (FEFCO, 2021). FEFCO. 2021. European Database for Corrugated Board Life Cycle Studies 2018. Reference(s): https://www.fefco.org/sites/default/files/documents/2022-07-07_FEFCO%20LCA%202021.pdf, last accessed March 2023
In FEFCO 2021 fuel consumption and the related emission to air include only steam and net electricity used on site. Sold electricity is not reported as a sold product and the associated input and output data are not included in the inventory. The fuel consumption and emissions to air associated with the total heat production and the net electricity used on site were allocated to the paper production.
The following air emissions were reported in the study: Particulates, <2.5μm, Particulates, >2.5μm and <10μm, Particulates, >10μm, CO2 (fossil), CO2 (biomass) , CO , NOx (as NO2) , SOx (as SO2) .
For a more complete air emission profile, additional air emissions (beyond the ones listed above) were added for the combustion of the external fuels and internal using LCI datasets for combustion of different fuels as proxy. The air emissions were calculated based on the mix of the internal and external fuels in the study and more information about the fuel mix and the proxy are provided under "Extrapolations".

## Included activities start
The process starts wih the reception of the recovered paper.

## Included activities end
The process for the production of recycled fluting medium ends with the production of corrugated board base paper.

## Geography
This dataset has been extrapolated from respective regional geographies (RER). Data is coming from mills in Nordic countries and Germany. Data for main producers in Europe (Austria, Belgium, Bulgaria, Czech Republic, Denmark, France, Germany, Hungary, Italy, the Netherlands, Poland, Romania, Serbia, Spain, Sweden and the United Kingdom)

## Technology
Average of present used technology
The stock preparation is done in accordance with a recipe for each paper grade and grammage. The grades of recovered paper are put on the conveyor to the pulper in the ratio mentioned in the recipe. In the pulper the blend of dry, baled paper is converted into a pumpable suspension of fibres. This is achieved by submerging the bales in water and agitating the mixture so that the paper is wetted and broken up to form a suspension. The pulp is then screened and cleaned. and may undergo a disperging treatment. The stock passes through one or two head boxes onto the paper machine, Wellenstoff can be a one ply or two ply product. Usually, a size press treatment with a starch solution is applied in-line on the paper machine in order to obtain sufficient strength and stiffness properties. The process ends with the production of corrugated board base paper.

## Reference product
- containerboard, fluting medium: 1 kg; name flutingMediumAmount; By-product classification allocatable product; CPC 32151: Corrugated paper and paperboard; HS2017 480810: Paper and paperboard; corrugated, whether or not perforated, in rolls or sheets, other than paper of headin[...]
  production volume 4.14312e10 kg; name flutingMediumProductionVolume; = 183685954000*0.72*(0.374/0.942)
    Estimation cross-checked with industry information: In Europe corrugated board box production (FEFCO Annual Statistics 2021) has a share of 72% in production volume of "case materials" (FAOSTAT http://www.fao.org/faostat/en/#data/FO). The same share is applied to global production volume of "case materials" and multiplied by European average consumption of wellenstoff (recycled fluting) in total raw material consumption of corrugated board production (from FEFCO Annual Statistics 2021 (https://www.fefco.org/sites/default/files/documents/Fefco_AnnualEvaluation_2021_0.pdf, last acessed March 2023).
  property price 0.598 EUR2005
    Export prices for the World+ according to: http://faostat.fao.org/site/626/DesktopDefault.aspx?PageID=626#ancor downloaded 28 April 2009; calculated as export value divided by export volume.
  properties: carbon allocation 0.4255 kg, carbon content 0.46, carbon content, non-fossil 0.46, dry mass 0.925 kg, heating value, net 15.92 MJ, water content 0.0810811, water in wet mass 0.075 kg, wet mass 1 kg

## Inputs from technosphere
- alkylketene dimer sizing agent, for paper production: 0.000526 kg; lognormal variance with pedigree 0.0029, pedigree (1,2,2,5,1)
  FEFCO 2021. Reported as sizing agents.
  properties: carbon content, non-fossil 0.538229, dry mass 1 kg, heating value, net 16.31 MJ, wet mass 1 kg
- aluminium sulfate, powder: 9e-6 kg; lognormal variance with pedigree 0.0029, pedigree (1,2,2,5,1)
  FEFCO 2021. Proxy for alum Al2(SO4)3.
  properties: dry mass 1 kg, wet mass 1 kg
- ammonia, anhydrous, liquid: 2.80325e-7, 5.44169e-7, 6.03176e-6, 2.54966e-7, 5.70347e-8, 2.09613e-6, 1.80188e-7, 5.55424e-7 kg (8 suppliers, which the file names only by identifier); sum of these 1e-5 kg; lognormal variance with pedigree 0.0029, pedigree (1,2,2,5,1)
  FEFCO 2021
  properties: dry mass 1 kg, wet mass 1 kg
- ash from paper production sludge: -0.0113 kg; name inorganicAshAmount; lognormal variance with pedigree 0.0029, pedigree (1,2,2,5,1)
  Reported by FEFCO (2021) as residue, inorganic ashes, 85 % dry content. Includes coal and lignite ashes.
  production volume; = flutingMediumProductionVolume*inorganicAshAmount/flutingMediumAmount
    Calculated from production volume of corrugated board base paper.
  properties: carbon content, fossil 0.00036363, carbon content, non-fossil 0.0092, dry mass 0.85 kg, water content 0.176471, wet mass 1 kg
  note on carbon content, fossil: C content was calculated as an addition of C content in the raw materials.
- calcium carbonate, precipitated: 0.00303 kg; lognormal variance with pedigree 0.0029, pedigree (1,2,2,5,1)
  FEFCO 2021. Reported as CaCO3
  properties: carbon content, fossil 0.12001, dry mass 1 kg, wet mass 1 kg
- chemical, organic: 0.00032 kg; lognormal variance with pedigree 0.0208, pedigree (4,4,2,5,3)
  FEFCO 2021. Reported as colorants.
  properties: carbon content, fossil 0.628, dry mass 1 kg, heating value, net 19.03 MJ, wet mass 1 kg
  note on carbon content, fossil: This dataset is an unweighted average of 20 organic substances (listed in Tab 88.1, ecoinvent v2.2 report 8, part II), being part of the top100 chemicals included in this database. The C-content has also been calculated as an unweighted average of the C content of the substances composing this dataset.
- diesel, low-sulfur: 1.84682e-6, 8.23056e-6, 9.82775e-5, 4.11665e-6, 2.73028e-7, 4.07783e-6 kg (6 suppliers, which the file names only by identifier); sum of these 0.000116822 kg; = 0.005*1000/42.8; lognormal variance with pedigree 0.0046, pedigree (2,3,2,5,2)
  Data provided by FEFCO 2021, indicated in energy content and given as 0.005 GJ/t Calculation into mass/volume was done by using the following conversion factor: Diesel MJ/kg 42.8. Based on literature, page 16, Report6, part 4. Source: https://ecoinvent.org/wp-content/uploads/2021/09/LHV_fuels.xlsx
  properties: carbon content, fossil 0.865, dry mass 1 kg, heating value, net 42.8 MJ, wet mass 1 kg
- dithiocarbamate-compound: 0.00024 kg; lognormal variance with pedigree 0.0046, pedigree (2,3,2,5,2)
  FEFCO 2021. Reported as biocide. Assumed equally split between dithiocarbamate and triazine-compound
  properties: carbon content, fossil 0.179339, dry mass 1 kg, wet mass 1 kg
- electricity, medium voltage: 0.0072466, 0.144553, 0.0485695, 0.00221916, 0.000444162, 9.53715e-5, 0.0149274 kWh (7 suppliers, which the file names only by identifier); sum of these 0.218056 kWh; lognormal variance with pedigree 0.0029, pedigree (1,2,2,5,1)
  FEFCO 2021. Reported as bought electricity
- ethoxylated alcohol (AE3): 0.00013 kg; lognormal variance with pedigree 0.0046, pedigree (2,3,2,5,2)
  FEFCO 2021. Proxy for defoamer, unspecified.
  properties: carbon content, fossil 0.207952, carbon content, non-fossil 0.485221, dry mass 1 kg, heating value, net 21 MJ, wet mass 1 kg
- hard coal: 0.000788719, 0.000187157, 0.00558195, 0.00131091, 0.000804869, 0.00117589, 0.00173943, 0.000342279 kg (8 suppliers, which the file names only by identifier); sum of these 0.0119312 kg; = 0.333*1000/27.91; lognormal variance with pedigree 0.0046, pedigree (2,3,2,5,2)
  Data provided by FEFCO 2021, indicated in energy content and given as 0.333 GJ/t . Calculation into mass/volume was done by using the following conversion factor: Hard coal: MJ/kg 27.91. Based on the Characterization factor of Hard coal in the CED method. Source: https://ecoinvent.org/wp-content/uploads/2021/09/LHV_fuels.xlsx
  properties: carbon content, fossil 0.845, dry mass 0.94 kg, heating value, net 27.91 MJ, water content 0.0638298, wet mass 1 kg
  note on carbon content, fossil: C content 75-94% (specified in Tab 1.1, report 6, part VI). A mean content of 0.845 kg C/ kg dry hard coal was considered
  note on heating value, net: Based on the Characterization factor of Hard coal in the CED method
- heat, district or industrial, natural gas: 0.00821279, 0.499787 MJ (2 suppliers, which the file names only by identifier); sum of these 0.508 MJ; lognormal variance with pedigree 0.0029, pedigree (1,2,2,5,1)
  FEFCO 2021. Reported as steam
  properties: heating value, net 1 MJ
- heavy fuel oil: 6.19723e-7, 3.60873e-7, 1.83461e-6, 4.28867e-5, 4.62946e-7, 2.37885e-6 kg (6 suppliers, which the file names only by identifier); sum of these 4.85437e-5 kg; = 0.002*1000/41.2; lognormal variance with pedigree 0.0046, pedigree (2,3,2,5,2)
  Data provided by FEFCO 2021, indicated in energy content and given as 0.002 GJ/t. Calculation into mass/volume was done by using the following conversion factor: Heavy fuel oil: MJ/kg 41.2. Based on literature, page 21, Report6, part 4. Source: https://ecoinvent.org/wp-content/uploads/2021/09/LHV_fuels.xlsx
  properties: carbon content, fossil 0.849, dry mass 1 kg, heating value, net 41.2 MJ, wet mass 1 kg
- kaolin: 0.00128 kg; lognormal variance with pedigree 0.0046, pedigree (2,3,2,5,2)
  FEFCO 2021. Proxy for Fillers
  properties: dry mass 1 kg, wet mass 1 kg
- light fuel oil: 2.67693e-6, 0.000280489, 1.37946e-5, 2.78408e-5, 1.9894e-6, 1.84748e-6 kg (6 suppliers, which the file names only by identifier); sum of these 0.000328638 kg; = 0.014*1000/42.6; lognormal variance with pedigree 0.0046, pedigree (2,3,2,5,2)
  Data provided by FEFCO 2021, indicated in energy content and given as 0.014 GJ/t.Calculation into mass/volume was done by using the following conversion factor: Light fuel oil: MJ/kg 42.6 Based on literature, page 18, Report6, part 4. Source: https://ecoinvent.org/wp-content/uploads/2021/09/LHV_fuels.xlsx
  properties: carbon content, fossil 0.862, dry mass 1 kg, heating value, net 42.6 MJ, wet mass 1 kg
- lignite briquettes: 0.159 MJ; lognormal variance with pedigree 0.0029, pedigree (1,2,2,5,1)
  Data provided by FEFCO 2021. Reported as lignite.
  properties: carbon content, fossil 0.65679, dry mass 0.0415385 kg, heating value, net 19.5 MJ, water content 0.234568, wet mass 0.0512821 kg
  note on heating value, net: Based on literature, page 52, Report 5: Dones, R., Bauer, C., Bolliger, R., Burger, B., faist Emmenegger, M., Frischknecht, R., Heck, T., Jungbluth, N., Röder, A., Tuchschmid, M. (2007) Life Cycle Inventories of Energy Systems: Resulst for current Systems in Switzerland and other UCTE Countries. ecoinvent report No. 5. Paul Scherrer Institut Villigen, Swiss Centre for Life Cycle Inventories, Dübendorf, CH
- liquefied petroleum gas: 1.14976e-7, 1.10417e-6, 3.46626e-7, 7.71509e-8, 3.92183e-6, 1.64133e-5 kg (6 suppliers, which the file names only by identifier); sum of these 2.1978e-5 kg; = 0.001*1000/45.5; lognormal variance with pedigree 0.0046, pedigree (2,3,2,5,2)
  Data provided by FEFCO 2021, indicated in energy content and given as 0.001 GJ/t. Calculation into mass/volume was done by using the following conversion factor: Heavy fuel oil: MJ/kg 41.2. Based on literature, page 21, Report6, part 4. Source: https://ecoinvent.org/wp-content/uploads/2021/09/LHV_fuels.xlsx
  properties: carbon content, fossil 0.821863, dry mass 1 kg, heating value, net 45.5 MJ, wet mass 1 kg
  note on heating value, net: Indicative value. Reference: Fuels - Higher and Lower Calorific Values, available at: https://www.engineeringtoolbox.com/fuels-higher-calorific-values-d_169.html
- lubricating oil: 5e-5 kg; lognormal variance with pedigree 0.0029, pedigree (1,2,2,5,1)
  FEFCO 2021. Reported as lubricants
  properties: carbon content, fossil 0.75, dry mass 1 kg, heating value, net 40.2 MJ, wet mass 1 kg
  note on carbon content, fossil: Lubricating oil is produced from diesel. C-content/dry mass of fats and oils considered 75%, from: ecoinvent v2.2 report, n 15a, pg 40
  note on heating value, net: Literature value, Source: IPCC 2006, 2006 IPCC Guidelines for National Greenhouse Gas Inventories, Prepared by the National Greenhouse Gas Inventories Programme, Eggleston H.S., Buendia L., Miwa K., Ngara T. and Tanabe K. (eds). Published: IGES, Japan
- maize starch: 0.0368663 kg; = 31.705/0.86; lognormal variance with pedigree 0.0046, pedigree (2,3,2,5,2)
  FEFCO 2021. Proxy for corn starch (17.37 kg) and half of "starch, modified" (0.40 kg), and "wheat starch" (28.27 kg). Other half of latter two starches modeled as potato starch. Given as dry mass
  properties: carbon content, non-fossil 0.46, dry mass 0.86 kg, heating value, net 11.64 MJ, water content 0.162791, wet mass 1 kg
  note on carbon content, non-fossil: C-content of starch is considered 46% on dry mass basis (from "Evolutionary and Biochemical Aspects", A.D. Kay and T. Vrede (in Global Ecology, 2010, Elsevier B.V., S.E. Jørgensen Ed.)).
- municipal solid waste: -8.33426e-5, -9.89657e-6, -6.15938e-5, -0.0470218, -6.92523e-6, -2.22288e-6, -5.02431e-6, -0.000209163 kg (8 suppliers, which the file names only by identifier); sum of these -0.0474 kg; lognormal variance with pedigree 0.0046, pedigree (2,3,2,5,2)
  Reported by FEFCO (2021) as "residue, rejects, paper-related" (15.8 kg), representing paper clips, tags, adhesive labels, fibres etc. and "residue, rejects, other" (31.6 kg), representing e.g. glass, sand, plastics. Dry content 57%
  production volume; = rejectsAmount/ flutingMediumAmount* flutingMediumProductionVolume
    Calculated from production volume of reference product using the relative outputs.
  properties: carbon content, fossil 0.171549, carbon content, non-fossil 0.261655, dry mass 0.57 kg, heating value, net 11.74 MJ, water content 0.754386, wet mass 1 kg
  note on carbon content, fossil: MSW composition in tab 4.1, ecoinvent v2.2 report 13_I. C content referred to 1 kg DM
  note on heating value, net: Value taken from the general comment of the treatment dataset.
- natural gas, high pressure: 0.000863958, 0.00145739, 0.00317901, 0.00106388, 0.000248625, 0.00147976, 0.00141995, 0.00373378, 0.00144149, 0.00222958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 m3 (37 suppliers, which the file names only by identifier); sum of these 0.111889 m3; = 4.028*1000/36; lognormal variance with pedigree 0.0046, pedigree (2,3,2,5,2)
  Data provided by FEFCO 2021, indicated in energy content and given as 4.028 GJ/t.Calculation into mass/volume was done by using the following conversion factor: 36 MJ/m3. Literature value, Source: Christoph Meili;Niels Jungbluth;Maresa Bussa (2021) Life cycle inventories of crude oil and natural gas extraction. ESU-services Ltd. commissioned by BAFU & VSG, Schaffhausen, Switzerland, http://esu-services.ch/data/public-lci-reports/
  properties: carbon content, fossil 0.741, dry mass 0.735 kg, heating value, gross 40 MJ, heating value, net 36 MJ, wet mass 0.735 kg
  note on heating value, gross: At standard conditions; based on Meili et al. (2022) section 5.2
- paper mill, integrated: 5.43478e-11 unit; = 1 / 50 / 368000; lognormal variance with pedigree 0.4706, pedigree (4,3,5,5,5)
  Estimated value with lifetime (50 years) and yearly production (368 kt) of underlying ecoinvent process (integrated paper mill).
- pitch despergents, in paper production: 2.5e-5 kg; lognormal variance with pedigree 0.0029, pedigree (1,2,2,5,1)
  FEFCO 2021
  properties: carbon content, fossil 0.290994, dry mass 1 kg, heating value, net 8.82 MJ, wet mass 1 kg
- polyaluminium chloride: 0.00013 kg; lognormal variance with pedigree 0.0029, pedigree (1,2,2,5,1)
  FEFCO 2021. Reported as PAC
  properties: dry mass 1 kg, wet mass 1 kg
- potato starch: 0.0179188 kg; = 14.335/0.8; lognormal variance with pedigree 0.0046, pedigree (2,3,2,5,2)
  FEFCO 2021. Proxy for half of "starch, modified" (0.40 kg), and "wheat starch" (28.27 kg). Other half of latter two starches modeled as potato starch. Given as dry mass
  properties: carbon content, non-fossil 0.46, dry mass 0.8 kg, heating value, net 10.66 MJ, water content 0.25, wet mass 1 kg
- quicklime, milled, loose: 0.00015 kg; lognormal variance with pedigree 0.0029, pedigree (1,2,2,5,1)
  FEFCO 2021. Reported as CaO
  properties: dry mass 0.99 kg, water content 0.010101, wet mass 1 kg
- retention aid, for paper production: 0.00105 kg; lognormal variance with pedigree 0.0046, pedigree (2,3,2,5,2)
  FEFCO 2021. Proxy for polymer and retention agents
  properties: carbon content, fossil 0.5, dry mass 1 kg, heating value, net 15.15 MJ, wet mass 1 kg
- sludge from pulp and paper production: -0.1413 kg; name sludgeTotalAmount; lognormal variance with pedigree 0.0029, pedigree (1,2,2,5,1)
  FEFCO 2021. Reported as organic sludges (43 % dry content).
  production volume; = flutingMediumProductionVolume*sludgeTotalAmount/flutingMediumAmount
    Calculated from production volume of corrugated board base paper.
  property aluminium content 0; name sludge_Al_content
  property ammonium fraction of total nitrogen 0; name sludge_AmmoniumFracOfN
  property arsenic content 0; name sludge_As_content
  property boron content 0; name sludge_B_content
  property cadmium content 0; name sludge_Cadmium_content
  property chromium content 0; name sludge_Cr_content
  property cobalt content 0; name sludge_Co_content
  property copper content 0; name sludge_Cu_content
  property iron content 0; name sludge_Fe_content
  property lead content 0; name sludge_Pb_content
  property manganese content 0; name sludge_Mn_content
  property mercury content 0; name sludge_Hg_content
  property molybdenum content 0; name sludge_Mo_content
  property nickel content 0; name sludge_Ni_content
  property nitrogen content 0; name sludge_N_content
  property phosphorus content 0; name sludge_P_content
  property potassium content 0; name sludge_K_content
  property tcdd equivalents 0; name sludge_tcdd_eq
  property zinc content 0; name sludge_Zn_content
  properties: carbon content, non-fossil 0.21, dry mass 0.43 kg, heating value, net 2.65 MJ, water content 1.32558, wet mass 1 kg
  note on ammonium fraction of total nitrogen: This parameter expresses the ammonium content (NH4-N) of total nitrogen (N tot)
  note on arsenic content: arsenic content on a dry matter basis. Taken from CRAAQ Guide 2nd edition, see references
  note on cadmium content: cadmium content on a dry matter basis. Taken from CRAAQ Guide 2nd edition, see references
  note on chromium content: chromium content on a dry matter basis. Taken from CRAAQ Guide 2nd edition, see references
  note on cobalt content: cobalt content on a dry matter basis. Taken from CRAAQ Guide 2nd edition, see references
  note on copper content: copper content on a dry matter basis. Taken from CRAAQ Guide 2nd edition, see references
  note on lead content: lead content on a dry matter basis. Taken from CRAAQ Guide 2nd edition, see references
  note on mercury content: mercury content on a dry, matter basis. Taken from CRAAQ Guide 2nd edition, see references
  note on molybdenum content: molybdenum content on a dry matter basis. Taken from CRAAQ Guide 2nd edition, see references
  note on nitrogen content: nitrogen content on a dry matter basis. Taken from CRAAQ Guide 2nd edition, see references
  note on tcdd equivalents: TCDD-equivalents represents the amount of dioxins and furanes
  note on zinc content: zinc content on a dry matter basis, Taken from CRAAQ Guide 2nd edition, see references
- sodium chlorate, powder: 4e-5 kg; lognormal variance with pedigree 0.0029, pedigree (1,2,2,5,1)
  FEFCO 2021
  properties: dry mass 1 kg, wet mass 1 kg
- sodium hydroxide, without water, in 50% solution state: 0.00034 kg; lognormal variance with pedigree 0.0029, pedigree (1,2,2,5,1)
  FEFCO 2021
  properties: dry mass 1 kg, heating value, net 3.03 MJ, wet mass 1 kg
- sulfate pulp, bleached: 0.000333333 kg; = 0.0003*1000/0.9; lognormal variance with pedigree 0.0029, pedigree (1,2,2,5,1)
  FEFCO 2021. Given as dry mass
  properties: carbon content, non-fossil 0.494, dry mass 0.9 kg, heating value, net 13.23 MJ, water content 0.111111, wet mass 1 kg
  note on carbon content, non-fossil: C content of dry mass of sulfate pulp is 0.494 kgC/kg dry wood (ecoinvent v2.2 report 6_IX & ecoinvent v2.2 report 9). No other C containing products in the formulation of the pulp.
- sulfuric acid: 7e-5 kg; lognormal variance with pedigree 0.0029, pedigree (1,2,2,5,1)
  FEFCO 2021
  properties: dry mass 1 kg, wet mass 1 kg
- tap water: 0.000893802, 0.00136253, 0.0025424, 0.00684905, 0.000824442, 0.0343575, 0.39317 kg (7 suppliers, which the file names only by identifier); sum of these 0.44 kg; lognormal variance with pedigree 0.0029, pedigree (1,2,2,5,1)
  FEFCO 2021. Reported as municipal water supply
  properties: carbon content, fossil 0.00178991, dry mass 0.000337476 kg, water content 2962.17, wet mass 1 kg
  note on carbon content, fossil: Bicarbonate content is 2.93 mol/m3. CO2 content is 0.1 mol/m3 (ecoinvent v2.2 report 8, Tab 93.1).
- triazine-compound: 0.00024 kg; lognormal variance with pedigree 0.0046, pedigree (2,3,2,5,2)
  (same comment as for dithiocarbamate-compound)
  properties: carbon content, fossil 0.475616, dry mass 1 kg, wet mass 1 kg
- waste mineral oil: -4e-5 kg; name wasteLubricantsOilAmount; lognormal variance with pedigree 0.0029, pedigree (1,2,2,5,1)
  FEFCO 2021. Reported as residue, lubricants and oil
  production volume; = flutingMediumProductionVolume*wasteLubricantsOilAmount/flutingMediumAmount
    Calculated from production volume of corrugated board base paper.
  properties: carbon content, fossil 0.864444, dry mass 0.9 kg, heating value, net 34.7 MJ, water content 0.111111, wet mass 1 kg
  note on carbon content, fossil: Tab A.6, ecoinvent v2.2 report 13_I. C content has been calculated after data in the tables, and then referred to 1 kg DM
- waste paperboard, sorted: 1.0632 kg; lognormal variance with pedigree 0.0029, pedigree (1,2,2,5,1)
  FEFCO 2021. Reported as Mixed Grades (0.5065 t/t); Corrugated and Kraft. pre- consumer ((0.0903 t/t); Corrugated and Kraft. post- consumer (0.4407 t/t); Newspaper and Magazines (0.0082 t/t); Other grades (0.0175 t/t)
  properties: carbon content, fossil 0.01, carbon content, non-fossil 0.46, dry mass 0.9 kg, heating value, net 15.92 MJ, water content 0.111111, wet mass 1 kg
  note on carbon content, fossil: Assumed carbon content of the waste paperboard (it is assumed that the content of other materials in the waste paperboard input is about 5%)
- wood chips, dry, measured as dry mass: 0.0258824 kg; = 0.352*1000/13.6; lognormal variance with pedigree 0.0046, pedigree (2,3,2,5,2)
  Data provided by FEFCO 2021, indicated in energy content and given as 0.352 GJ/t . Calculation into mass/volume was done by using the following conversion factor: 13.6 MJ/kg
  properties: carbon content, non-fossil 0.494, dry mass 1 kg, heating value, net 9.99 MJ, water content 0.4, wet mass 1.4 kg
  note on carbon content, non-fossil: C content of dry mass is 0.494 kgC/kg dry wood (ecoinvent v2.2 report 9).
- wood chips, from post-consumer wood, measured as dry mass: 0.0105882 kg; = 0.144*1000/13.6; lognormal variance with pedigree 0.0046, pedigree (2,3,2,5,2)
  Data provided by FEFCO 2021, indicated in energy content and given 0.144 GJ/t . Calculation into mass/volume was done by using the following conversion factor: 13.6 MJ/kg
  properties: carbon content, non-fossil 0.494, dry mass 1 kg, heating value, net 9.99 MJ, water content 0.4, wet mass 1.4 kg

## Inputs from nature
- Oxygen [natural resource, in air]: 0.2551 kg; name O2; = (CO2_fossil+CO2_non_fossil)/(16*2+12) * (16*2) + (CO_fossil+CO_non_fossil)/(16+12) *16; lognormal variance with pedigree 0.0194, pedigree (4,3,2,5,3)
  Oxygen is required for the combustion process. Calculated value
- Water, river [natural resource, in water]: 0.00456 m3; lognormal variance with pedigree 0.0029, pedigree (1,2,2,5,1)
  FEFCO 2021. Reported as surface water (4.53 m3/t) and rain water (0.03 m3/t)
- Water, well, in ground [natural resource, in water]: 0.00313 m3; lognormal variance with pedigree 0.0029, pedigree (1,2,2,5,1)
  FEFCO 2021. Reported as ground water fossil/non- renewable (0.42 m3/t) and Ground water non fossil/ renewable (2.71 m3/t)

## Emissions to nature
- Acetaldehyde [air, unspecified]: 5.30856e-8 kg; lognormal variance with pedigree 0.0528, pedigree (3,3,2,5,3)
  Estimation based on fuel input data and emission factors from corresponding ecoinvent fuel combustion datasets (see "Extrapolations" comment). Internal fuels are represented by the calculated emissions but do not have the corresponding fuel input from technosphere, because they are supplied from within the system boundaries. The amounts of internal fuels used in the process are: Biogas and biosludge (0.266 GJ/t), Refuse derived fuel (RDF) (0.299GJ/t), other internal fuel (0.035 GJ/t). No proxy was available for the combustion of other internal fuels. Emissions from these internal energy generation processes are therefore only reflected in the key emission factors provided by the industry, other emissions constitute a data gap.
- Acetic acid [air, unspecified]: 6.45427e-7 kg; lognormal variance with pedigree 0.0528, pedigree (3,3,2,5,3)
  (same comment as for Acetaldehyde)
- Acetone [air, unspecified]: 2.95638e-10 kg; lognormal variance with pedigree 0.0528, pedigree (3,3,2,5,3)
  (same comment as for Acetaldehyde)
- Acetylene [air, unspecified]: 9.6151e-7 kg; lognormal variance with pedigree 0.0528, pedigree (3,3,2,5,3)
  (same comment as for Acetaldehyde)
- Aluminium III [air, unspecified]: 5.45541e-6 kg; lognormal variance with pedigree 0.6628, pedigree (3,3,2,5,3)
  (same comment as for Acetaldehyde)
- Ammonia [air, unspecified]: 1.37821e-6 kg; lognormal variance with pedigree 0.0528, pedigree (3,3,2,5,3)
  (same comment as for Acetaldehyde)
- Antimony ion [air, unspecified]: 4.54887e-9 kg; lognormal variance with pedigree 0.4128, pedigree (3,3,2,5,3)
  (same comment as for Acetaldehyde)
- Arsenic ion [air, unspecified]: 1.72755e-8 kg; lognormal variance with pedigree 0.0528, pedigree (3,3,2,5,3)
  (same comment as for Acetaldehyde)
- Barium II [air, unspecified]: 8.21875e-8 kg; lognormal variance with pedigree 0.0528, pedigree (3,3,2,5,3)
  (same comment as for Acetaldehyde)
- Benzene [air, unspecified]: 3.40323e-6 kg; lognormal variance with pedigree 0.0528, pedigree (3,3,2,5,3)
  (same comment as for Acetaldehyde)
- Benzo(a)pyrene [air, unspecified]: 3.62437e-9 kg; lognormal variance with pedigree 0.0528, pedigree (3,3,2,5,3)
  (same comment as for Acetaldehyde)
- Beryllium II [air, unspecified]: 8.21875e-10 kg; lognormal variance with pedigree 0.0528, pedigree (3,3,2,5,3)
  (same comment as for Acetaldehyde)
- Boron [air, unspecified]: 1.97045e-6 kg; lognormal variance with pedigree 0.6628, pedigree (3,3,2,5,3)
  (same comment as for Acetaldehyde)
- Bromine [air, unspecified]: 5.32738e-8 kg; lognormal variance with pedigree 0.0528, pedigree (3,3,2,5,3)
  (same comment as for Acetaldehyde)
- Butane [air, unspecified]: 3.01245e-6 kg; lognormal variance with pedigree 0.0528, pedigree (3,3,2,5,3)
  (same comment as for Acetaldehyde)
- Cadmium II [air, unspecified]: 2.30856e-9 kg; lognormal variance with pedigree 0.6628, pedigree (3,3,2,5,3)
  (same comment as for Acetaldehyde)
- Calcium II [air, unspecified]: 1.31001e-5 kg; lognormal variance with pedigree 0.0528, pedigree (3,3,2,5,3)
  (same comment as for Acetaldehyde)
- Carbon dioxide, fossil [air, unspecified]: 0.29939 kg; name CO2_fossil; lognormal variance with pedigree 0.0029, pedigree (1,2,2,5,1)
  FEFCO 2021
- Carbon dioxide, non-fossil [air, unspecified]: 0.05132 kg; name CO2_non_fossil; lognormal variance with pedigree 0.0029, pedigree (1,2,2,5,1)
  FEFCO 2021
- Carbon monoxide, fossil [air, unspecified]: 5.71958e-5 kg; name CO_fossil; lognormal variance with pedigree 0.6688, pedigree (4,3,2,5,3)
  FEFCO 2021. Same shares of fossil and non-fossil are assumed for CO and CO2.
- Carbon monoxide, non-fossil [air, unspecified]: 9.80423e-6 kg; name CO_non_fossil; lognormal variance with pedigree 0.6688, pedigree (4,3,2,5,3)
  FEFCO 2021. Same shares of fossil and non-fossil are assumed for CO and CO2.
- Chlorine [air, unspecified]: 1.431e-7 kg; lognormal variance with pedigree 0.0528, pedigree (3,3,2,5,3)
  (same comment as for Acetaldehyde)
- Chromium III [air, unspecified]: 2.17968e-8 kg; lognormal variance with pedigree 0.6628, pedigree (3,3,2,5,3)
  (same comment as for Acetaldehyde)
- Chromium VI [air, unspecified]: 1.07027e-9 kg; lognormal variance with pedigree 0.6628, pedigree (3,3,2,5,3)
  (same comment as for Acetaldehyde)
- Cobalt II [air, unspecified]: 7.14348e-9 kg; lognormal variance with pedigree 0.6628, pedigree (3,3,2,5,3)
  (same comment as for Acetaldehyde)
- Copper ion [air, unspecified]: 4.05316e-8 kg; lognormal variance with pedigree 0.6628, pedigree (3,3,2,5,3)
  (same comment as for Acetaldehyde)
- Dinitrogen monoxide [air, unspecified]: 2.77207e-6 kg; lognormal variance with pedigree 0.0528, pedigree (3,3,2,5,3)
  (same comment as for Acetaldehyde)
- Dioxins, measured as 2,3,7,8-tetrachlorodibenzo-p-dioxin [air, unspecified]: 3.17617e-14 kg; lognormal variance with pedigree 0.0528, pedigree (3,3,2,5,3)
  (same comment as for Acetaldehyde)
- Ethane [air, unspecified]: 2.88453e-6 kg; lognormal variance with pedigree 0.0528, pedigree (3,3,2,5,3)
  (same comment as for Acetaldehyde)
- Ethanol [air, unspecified]: 5.91275e-10 kg; lognormal variance with pedigree 0.0528, pedigree (3,3,2,5,3)
  (same comment as for Acetaldehyde)
- Ethyl benzene [air, unspecified]: 2.385e-8 kg; lognormal variance with pedigree 0.0528, pedigree (3,3,2,5,3)
  (same comment as for Acetaldehyde)
- Ethylene [air, unspecified]: 5.76906e-6 kg; lognormal variance with pedigree 0.0528, pedigree (3,3,2,5,3)
  (same comment as for Acetaldehyde)
- Fluorine [air, unspecified]: 3.975e-8 kg; lognormal variance with pedigree 0.0528, pedigree (3,3,2,5,3)
  (same comment as for Acetaldehyde)
- Formaldehyde [air, unspecified]: 5.93335e-7 kg; lognormal variance with pedigree 0.0528, pedigree (3,3,2,5,3)
  (same comment as for Acetaldehyde)
- Hexachlorobenzene [air, unspecified]: 5.724e-15 kg; lognormal variance with pedigree 0.0528, pedigree (3,3,2,5,3)
  (same comment as for Acetaldehyde)
- Hydrocarbons, aliphatic, alkanes, unspecified [air, unspecified]: 1.69524e-6 kg; lognormal variance with pedigree 0.0528, pedigree (3,3,2,5,3)
  (same comment as for Acetaldehyde)
- Hydrocarbons, aliphatic, unsaturated [air, unspecified]: 3.42607e-6 kg; lognormal variance with pedigree 0.0528, pedigree (3,3,2,5,3)
  (same comment as for Acetaldehyde)
- Hydrocarbons, aromatic [air, unspecified]: 8.64286e-10 kg; lognormal variance with pedigree 0.0528, pedigree (3,3,2,5,3)
  (same comment as for Acetaldehyde)
- Hydrochloric acid [air, unspecified]: 1.40182e-5 kg; lognormal variance with pedigree 0.0528, pedigree (3,3,2,5,3)
  (same comment as for Acetaldehyde)
- Hydrogen fluoride [air, unspecified]: 4.39586e-7 kg; lognormal variance with pedigree 0.0528, pedigree (3,3,2,5,3)
  (same comment as for Acetaldehyde)
- Hydrogen sulfide [air, unspecified]: 1.59e-8 kg; lognormal variance with pedigree 0.0528, pedigree (3,3,2,5,3)
  (same comment as for Acetaldehyde)
- Iodine [air, unspecified]: 1.10309e-8 kg; lognormal variance with pedigree 0.0528, pedigree (3,3,2,5,3)
  (same comment as for Acetaldehyde)
- Iron ion [air, unspecified]: 3.63596e-6 kg; lognormal variance with pedigree 0.6628, pedigree (3,3,2,5,3)
  (same comment as for Acetaldehyde)
- Lead II [air, unspecified]: 5.14298e-8 kg; lognormal variance with pedigree 0.6628, pedigree (3,3,2,5,3)
  (same comment as for Acetaldehyde)
- Lead-210 [air, unspecified]: 2.53434e-5 kBq; lognormal variance with pedigree 0.3128, pedigree (3,3,2,5,3)
  (same comment as for Acetaldehyde)
- Magnesium [air, unspecified]: 2.75357e-6 kg; lognormal variance with pedigree 0.6628, pedigree (3,3,2,5,3)
  (same comment as for Acetaldehyde)
- Manganese II [air, unspecified]: 1.46532e-7 kg; lognormal variance with pedigree 0.6628, pedigree (3,3,2,5,3)
  (same comment as for Acetaldehyde)
- Mercury II [air, unspecified]: 3.1355e-9 kg; lognormal variance with pedigree 0.6628, pedigree (3,3,2,5,3)
  (same comment as for Acetaldehyde)
- Methane, fossil [air, unspecified]: 5.9113e-5 kg; lognormal variance with pedigree 0.0528, pedigree (3,3,2,5,3)
  (same comment as for Acetaldehyde)
- Methane, non-fossil [air, unspecified]: 3.5815e-6 kg; lognormal variance with pedigree 0.0528, pedigree (3,3,2,5,3)
  (same comment as for Acetaldehyde)
- Methanol [air, unspecified]: 1.00517e-9 kg; lognormal variance with pedigree 0.0528, pedigree (3,3,2,5,3)
  (same comment as for Acetaldehyde)
- Molybdenum VI [air, unspecified]: 8.62208e-9 kg; lognormal variance with pedigree 0.6628, pedigree (3,3,2,5,3)
  (same comment as for Acetaldehyde)
- NMVOC, non-methane volatile organic compounds [air, unspecified]: 1.04549e-5 kg; lognormal variance with pedigree 0.0528, pedigree (3,3,2,5,3)
  (same comment as for Acetaldehyde)
- Nickel II [air, unspecified]: 2.11102e-8 kg; lognormal variance with pedigree 0.6628, pedigree (3,3,2,5,3)
  (same comment as for Acetaldehyde)
- Nitrogen oxides [air, unspecified]: 0.00054 kg; lognormal variance with pedigree 0.0423, pedigree (1,2,2,5,1)
  FEFCO 2021. Reported as NOx (as NO2)
- PAH, polycyclic aromatic hydrocarbons [air, unspecified]: 5.17863e-8 kg; lognormal variance with pedigree 0.3128, pedigree (3,3,2,5,3)
  (same comment as for Acetaldehyde)
- Particulate Matter, < 2.5 um [air, unspecified]: 2.1e-6 kg; lognormal variance with pedigree 0.3023, pedigree (1,2,2,5,1)
  FEFCO 2021
- Particulate Matter, > 10 um [air, unspecified]: 6.1e-6 kg; lognormal variance with pedigree 0.0423, pedigree (1,2,2,5,1)
  FEFCO 2021
- Particulate Matter, > 2.5 um and < 10um [air, unspecified]: 1.1e-6 kg; lognormal variance with pedigree 0.1223, pedigree (1,2,2,5,1)
  FEFCO 2021
- Pentachlorophenol [air, unspecified]: 6.4395e-12 kg; lognormal variance with pedigree 0.0528, pedigree (3,3,2,5,3)
  (same comment as for Acetaldehyde)
- Pentane [air, unspecified]: 5.15794e-6 kg; lognormal variance with pedigree 0.0528, pedigree (3,3,2,5,3)
  (same comment as for Acetaldehyde)
- Phenol [air, unspecified]: 7.95e-8 kg; lognormal variance with pedigree 0.0528, pedigree (3,3,2,5,3)
  (same comment as for Acetaldehyde)
- Phosphorus [air, unspecified]: 2.75606e-7 kg; lognormal variance with pedigree 0.0528, pedigree (3,3,2,5,3)
  (same comment as for Acetaldehyde)
- Polonium-210 [air, unspecified]: 4.64327e-5 kBq; lognormal variance with pedigree 0.3128, pedigree (3,3,2,5,3)
  (same comment as for Acetaldehyde)
- Potassium I [air, unspecified]: 1.92643e-5 kg; lognormal variance with pedigree 0.6628, pedigree (3,3,2,5,3)
  (same comment as for Acetaldehyde)
- Potassium-40 [air, unspecified]: 7.15107e-6 kBq; lognormal variance with pedigree 0.3128, pedigree (3,3,2,5,3)
  (same comment as for Acetaldehyde)
- Propane [air, unspecified]: 2.78245e-6 kg; lognormal variance with pedigree 0.0528, pedigree (3,3,2,5,3)
  (same comment as for Acetaldehyde)
- Propionic acid [air, unspecified]: 8.58993e-8 kg; lognormal variance with pedigree 0.0528, pedigree (3,3,2,5,3)
  (same comment as for Acetaldehyde)
- Propylene [air, unspecified]: 9.6151e-7 kg; lognormal variance with pedigree 0.0528, pedigree (3,3,2,5,3)
  (same comment as for Acetaldehyde)
- Radium-226 [air, unspecified]: 6.54024e-6 kBq; lognormal variance with pedigree 0.3128, pedigree (3,3,2,5,3)
  (same comment as for Acetaldehyde)
- Radium-228 [air, unspecified]: 2.30137e-5 kBq; lognormal variance with pedigree 0.3128, pedigree (3,3,2,5,3)
  (same comment as for Acetaldehyde)
- Radon-220 [air, unspecified]: 9.6902e-7 kBq; lognormal variance with pedigree 0.3128, pedigree (3,3,2,5,3)
  (same comment as for Acetaldehyde)
- Radon-222 [air, unspecified]: 9.6902e-7 kBq; lognormal variance with pedigree 0.3128, pedigree (3,3,2,5,3)
  (same comment as for Acetaldehyde)
- Scandium [air, unspecified]: 5.20093e-10 kg; lognormal variance with pedigree 0.0528, pedigree (3,3,2,5,3)
  (same comment as for Acetaldehyde)
- Selenium IV [air, unspecified]: 1.52329e-8 kg; lognormal variance with pedigree 0.0528, pedigree (3,3,2,5,3)
  (same comment as for Acetaldehyde)
- Silicon [air, unspecified]: 2.45007e-5 kg; lognormal variance with pedigree 0.0528, pedigree (3,3,2,5,3)
  (same comment as for Acetaldehyde)
- Sodium I [air, unspecified]: 1.60638e-6 kg; lognormal variance with pedigree 0.0528, pedigree (3,3,2,5,3)
  (same comment as for Acetaldehyde)
- Strontium II [air, unspecified]: 1.05409e-7 kg; lognormal variance with pedigree 0.0528, pedigree (3,3,2,5,3)
  (same comment as for Acetaldehyde)
- Sulfur dioxide [air, unspecified]: 8.1e-5 kg; lognormal variance with pedigree 0.0029, pedigree (1,2,2,5,1)
  FEFCO 2021
- Thallium I [air, unspecified]: 5.46206e-10 kg; lognormal variance with pedigree 0.0528, pedigree (3,3,2,5,3)
  (same comment as for Acetaldehyde)
- Thorium [air, unspecified]: 1.11451e-9 kg; lognormal variance with pedigree 0.0528, pedigree (3,3,2,5,3)
  (same comment as for Acetaldehyde)
- Thorium-228 [air, unspecified]: 3.00821e-6 kBq; lognormal variance with pedigree 0.3128, pedigree (3,3,2,5,3)
  (same comment as for Acetaldehyde)
- Thorium-232 [air, unspecified]: 1.89697e-6 kBq; lognormal variance with pedigree 0.3128, pedigree (3,3,2,5,3)
  (same comment as for Acetaldehyde)
- Tin ion [air, unspecified]: 5.31649e-10 kg; lognormal variance with pedigree 0.6628, pedigree (3,3,2,5,3)
  (same comment as for Acetaldehyde)
- Titanium ion [air, unspecified]: 1.66442e-7 kg; lognormal variance with pedigree 0.6628, pedigree (3,3,2,5,3)
  (same comment as for Acetaldehyde)
- Toluene [air, unspecified]: 1.29042e-6 kg; lognormal variance with pedigree 0.0528, pedigree (3,3,2,5,3)
  (same comment as for Acetaldehyde)
- Uranium [air, unspecified]: 1.64549e-9 kg; lognormal variance with pedigree 0.0528, pedigree (3,3,2,5,3)
  (same comment as for Acetaldehyde)
- Uranium-238 [air, unspecified]: 5.4608e-6 kBq; lognormal variance with pedigree 0.3128, pedigree (3,3,2,5,3)
  (same comment as for Acetaldehyde)
- Vanadium V [air, unspecified]: 3.57394e-8 kg; lognormal variance with pedigree 0.0528, pedigree (3,3,2,5,3)
  (same comment as for Acetaldehyde)
- Water [air, unspecified]: 0.00176 m3; lognormal variance with pedigree 0.0423, pedigree (1,2,2,5,1)
  FEFCO 2021. Calculated as water input- output
- Xylenes, unspecified [air, unspecified]: 5.58002e-7 kg; lognormal variance with pedigree 0.0528, pedigree (3,3,2,5,3)
  (same comment as for Acetaldehyde)
- Zinc II [air, unspecified]: 2.54535e-7 kg; lognormal variance with pedigree 0.6628, pedigree (3,3,2,5,3)
  (same comment as for Acetaldehyde)
- m-Xylene [air, unspecified]: 9.54e-8 kg; lognormal variance with pedigree 0.0528, pedigree (3,3,2,5,3)
  (same comment as for Acetaldehyde)
- AOX, Adsorbable Organic Halides [water, unspecified]: 2.58e-5 kg; lognormal variance with pedigree 0.0423, pedigree (1,2,2,5,1)
  FEFCO 2021
- BOD5, Biological Oxygen Demand [water, unspecified]: 0.0002 kg; lognormal variance with pedigree 0.0423, pedigree (1,2,2,5,1)
  FEFCO 2021
- COD, Chemical Oxygen Demand [water, unspecified]: 0.00212 kg; lognormal variance with pedigree 0.0423, pedigree (1,2,2,5,1)
  FEFCO 2021
- DOC, Dissolved Organic Carbon [water, unspecified]: 1.4e-5 kg; lognormal variance with pedigree 0.0922, pedigree (4,4,2,5,4)
  No data available for DOC. DOC=TOC as proposed by ecoinvent Data Quality Guidelines.
- Nitrogen [water, unspecified]: 0.0001 kg; lognormal variance with pedigree 0.0423, pedigree (1,2,2,5,1)
  FEFCO 2021. Reported as total Nitrogen.
- Phosphorus [water, unspecified]: 9.3e-6 kg; lognormal variance with pedigree 0.0423, pedigree (1,2,2,5,1)
  FEFCO 2021. Reported as total Phosphorous.
- Suspended solids, unspecified [water, unspecified]: 0.00049 kg; lognormal variance with pedigree 0.0423, pedigree (1,2,2,5,1)
  FEFCO 2021
- TOC, Total Organic Carbon [water, unspecified]: 1.4e-5 kg; lognormal variance with pedigree 0.0423, pedigree (1,2,2,5,1)
  FEFCO 2021
- Water [water, unspecified]: 0.00637 m3; lognormal variance with pedigree 0.0046, pedigree (2,3,2,5,2)
  FEFCO 2021. Accounts for both "thermally polluted" (5.68 m3) and "process water after treatment" (0.69 m3) water output

## Sampling procedure
This dataset has been extrapolated from respective regional geographies (RER). Data were collected from the producers by CCB (Cepi ContainerBoard)and FEFCO (European Federation of Corrugated Board Manufacturers) for the European Database for Corrugated Board Life Cycle Studies), checked by technical experts and reviewed by the Institut für Energie- und Umweltforschung Heidelberg (ifeu). The data for the production of Testliner and Wellenstoff were collected from mills, which together represent about 71 % of the total yearly production of corrugated base papers from recovered paper in Europe. Reference(s): FEFCO. 2021. European Database for Corrugated Board Life Cycle Studies 2021. Reference(s): https://www.fefco.org/sites/default/files/documents/2022-07-07_FEFCO%20LCA%202021.pdf, last acessed March 2023

## Extrapolations
This dataset has been extrapolated from respective regional geographies (RER). Additional air emissions from the combustion of fossil fuels estimated based on industrial heating datasets from the ecoinvent database and matched as follows: light fuel oil and diesel: heat production, light fuel oil, at industrial furnace 1MW, Europe without Switzerland; heavy fuel oil: heat production, heavy fuel oil, at industrial furnace 1MW, Europe without Switzerland; Coal: heat production, at hard coal industrial furnace 1-10MW, Europe without Switzerland; natural gas, LPG and biogas and biosludges: heat production, natural gas, at industrial furnace >100kW, Europe without Switzerland; lignite: heat production, lignite briquette, at stove 5-15kW, Europe without Switzerland; Biofuel (bark. scrap wood. tall oil): heat production, wood chips from industry, at furnace 1000kW, CH; refused derived fuel, biomass: heat production, wood chips from post-consumer wood, at furnace 300kW Emissions of stemming from biogas were approximated with the combustion of natural gas, whereby CO2, CO and CH4 emissions stemming from biogas were modelled as non-fossil.
