# flat glass production, coated

Dataset: EcoSpold 2, unit process
Geography: RoW
Time period: 2000-01-01 to 2023-12-31
Technology level: current
Classification: EcoSpold01Categories: glass/construction
Classification: ISIC rev.4 ecoinvent: 2310:Manufacture of glass and glass products
Synonyms: Wärmeschutzschicht; sputtering; sputtern; Kathodenzerstäubung; Vergütungsschicht; plate; bedampfen
Tags: ConvertedDataset
Scenario: Business-as-Usual
System model: Allocation, cut-off by classification
Generated by: Daniel Kellenberger (obsolete)
Published in: Kellenberger D. 2007
Database: ecoinvent
isCopyrightProtected: true
accessRestrictedTo: 1

## General comment
All data are based on the environmental report of the company "Interpane" (DE) for the year 2000. The Targets used for sputtering are bismuth, silver and nickel-chromium. Only nickel-chromium is modelled for missing silver and bismuth modules in the database.
[This dataset was already contained in the ecoinvent database version 2. It was not individually updated during the transfer to ecoinvent version 3. Life Cycle Impact Assessment results may still have changed, as they are affected by changes in the supply chain, i.e. in other datasets. This dataset was generated following the ecoinvent quality guidelines for version 2. It may have been subject to central changes described in the ecoinvent version 3 change report (http://www.ecoinvent.org/database/ecoinvent-version-3/reports-of-changes/), and the results of the central updates were reviewed extensively. The changes added e.g. consistent water flows and other information throughout the database. The documentation of this dataset can be found in the ecoinvent reports of version 2, which are still available via the ecoinvent website. The change report linked above covers all central changes that were made during the conversion process.]

## Included activities end
Includes all measured In- and Output materials and energy carriers reported for a German glass coating plant during ist operation (coating process, internal transports, packing and administration).

## Geography
Data from one company in Germany is extrapolated to RER. For some exchanges CH-modules are used as proxy

## Technology
Metal coating (mainly Bismuth, Silver and Nickel-Chrome) are applied on float glass by cathodic sputtering in vacuum. The installation is fed in batch quantities. At ambient pressure the vessel is charged and then vacuum is generated. The sputtering process works by passing an electrical current through ionised gas, thus bombarding the surface of a metal cathode with ions. The atoms of the desired metal are vaporised and then deposited in a thin film on the surface of glass

## Parameters
- fraction, process water, to air: 0.15 dimensionless; name fraction_PW_to_air; lognormal variance with pedigree 0.092025, pedigree (4,4,3,2,4)
  Literature value. In case when no industry/process specific data are available, default evaporation fraction value is used. This value is 15% and is based on literature (Statistics Canada, 2007 & Shaffer, K.H., 2008, Consumptive water use in the Great Lakes Basin, USGS & Shiklomanov, 2003, World Water Resources at the Beginning of the 21st Century) and has been approved by an expert.
- fraction, tap water, to air: 0.15 dimensionless; name fraction_TW_to_air; = fraction_PW_to_air; lognormal variance with pedigree 0.092025, pedigree (4,4,3,2,4)
  Calculated value. See comment in the other parametres present in this dataset. Tap water is considered to be always used as process water, thus process water fractions to air are applied to all tap water input flows to calculate the amount of water consumed in the processes.

## Reference product
- flat glass, coated: 1 kg; By-product classification allocatable product; CPC 37114: Glass in sheets, bent, edge-worked, engraved, drilled, enamelled or otherwise worked, but not framed, etc.; HS2017 7005: Glass; float glass and surface ground or polished glass, in sheets, whether or not having an absorbent, refle[...]
  EcoSpold01Location=RER
  production volume 2.67763 kg
    This is a placeholder value that does not reflect real-world production volumes. This dataset does not currently require a real-world production volume to work in the database framework, and no actual data were collected yet. This has no negative effect on the results of the ecoinvent database.
  property carbon content, fossil 0
    Tab 5.1, ecoinvent v2.2 report 7, part XI, for Flat glass composition. Coating: 50% Ni, 50% Cr (ecoinvent v2.2 report 7, part XI, pg 18)
  property carbon content, non-fossil 0
    (same comment as for flat glass, coated)
  property price 3.16 EUR2005
    Upscale from EU by exchange rate. Afterwards apply the PPP (Purchasing power parity) factor of 0.83.
  properties: carbon allocation 0 kg, carbon content 0, dry mass 1 kg, water content 0, water in wet mass 0 kg, wet mass 1 kg

## Inputs from technosphere
- acetylene: 0.000202 kg; lognormal variance with pedigree 0.06, pedigree (1,5,5,5,1)
  EcoSpold01Location=CH
  properties: carbon content, fossil 0.923077, dry mass 1 kg, heating value, net 51.2 MJ, wet mass 1 kg
  note on carbon content, fossil: C2H2. ecoinvent v2.2 report n 8. Produced from partial oxidation of natural gas
  note on heating value, net: Based on literature, page 25 (Value may refer to HHV), Althaus H.-J., Chudacoff M., Hischier R., Jungbluth N., Osses M. and Primas A. (2007) Life Cycle Inventories of Chemicals. Final report ecoinvent data v2.0 No. 8. EMPA, Swiss Centre for Life Cycle Inventories, Dübendorf, CH, Online-Version under: www.ecoinvent.org.
- argon, liquid: 0.000446 kg; lognormal variance with pedigree 0.06, pedigree (1,5,5,5,1)
  EcoSpold01Location=RER
  properties: dry mass 1 kg, wet mass 1 kg
- chromium: 5.97e-5 kg; lognormal variance with pedigree 0.06, pedigree (1,5,5,5,1)
  EcoSpold01Location=RER
  properties: dry mass 1 kg, wet mass 1 kg
- diesel, burned in building machine: 0.0192 MJ; lognormal variance with pedigree 0.06, pedigree (1,5,5,5,1)
  EcoSpold01Location=GLO
  properties: heating value, net 1 MJ
- electricity, medium voltage: 0.00225651, 0.0450123, 0.015124, 0.00069102, 0.000138307, 2.96976e-5, 0.00464821 kWh (7 suppliers, which the file names only by identifier); sum of these 0.0679 kWh; lognormal variance with pedigree 0.06, pedigree (1,5,5,5,1)
  EcoSpold01Location=UCTE
- flat glass factory: 3.55e-10 unit; lognormal variance with pedigree 1.48, pedigree (5,5,5,5,5)
  EcoSpold01Location=RER
  Estimation of standard deviation
  Uncertainty: Estimation of standard deviation
- flat glass, uncoated: 1.02 kg; lognormal variance with pedigree 0.06, pedigree (1,5,5,5,1)
  EcoSpold01Location=RER
  properties: dry mass 1 kg, wet mass 1 kg
- heat, district or industrial, natural gas: 8.72334e-7, 5.30857e-5 MJ (2 suppliers, which the file names only by identifier); sum of these 5.3958e-5 MJ; lognormal variance with pedigree 0.06, pedigree (1,5,5,5,1)
  EcoSpold01Location=RER
  properties: heating value, net 1 MJ
- liquefied petroleum gas: 1.05674e-6, 1.01484e-5, 3.18584e-6, 7.09094e-7, 3.60456e-5, 0.000150854 kg (6 suppliers, which the file names only by identifier); sum of these 0.000202 kg; lognormal variance with pedigree 0.06, pedigree (1,5,5,5,1)
  EcoSpold01Location=RER
  properties: carbon content, fossil 0.821863, dry mass 1 kg, heating value, net 45.5 MJ, wet mass 1 kg
  note on heating value, net: Indicative value. Reference: Fuels - Higher and Lower Calorific Values, available at: https://www.engineeringtoolbox.com/fuels-higher-calorific-values-d_169.html
- lubricating oil: 0.000202 kg; lognormal variance with pedigree 0.06, pedigree (1,5,5,5,1)
  EcoSpold01Location=RER
  properties: carbon content, fossil 0.75, dry mass 1 kg, heating value, net 40.2 MJ, wet mass 1 kg
  note on carbon content, fossil: Lubricating oil is produced from diesel. C-content/dry mass of fats and oils considered 75%, from: ecoinvent v2.2 report, n 15a, pg 40
  note on heating value, net: Literature value, Source: IPCC 2006, 2006 IPCC Guidelines for National Greenhouse Gas Inventories, Prepared by the National Greenhouse Gas Inventories Programme, Eggleston H.S., Buendia L., Miwa K., Ngara T. and Tanabe K. (eds). Published: IGES, Japan
- municipal solid waste: -3.67481e-7, -4.36368e-8, -2.71584e-7, -0.000207333, -3.05353e-8, -9.80128e-9, -2.21536e-8, -9.22261e-7 kg (8 suppliers, which the file names only by identifier); sum of these -0.000209 kg; lognormal variance with pedigree 0.02, pedigree (1,5,1,5,1)
  EcoSpold01Location=CH
  production volume
    Calculated from the production volume of flat glass, coated in proportion to the respective output amounts.
  properties: carbon content, fossil 0.171549, carbon content, non-fossil 0.261655, dry mass 0.771 kg, heating value, net 11.74 MJ, water content 0.297017, wet mass 1 kg
  note on carbon content, fossil: MSW composition in tab 4.1, ecoinvent v2.2 report 13_I. C content referred to 1 kg DM
  note on heating value, net: Value taken from the general comment of the treatment dataset.
- nickel, class 1: 5.97e-5 kg; lognormal variance with pedigree 0.06, pedigree (1,5,5,5,1)
  EcoSpold01Location=GLO
  properties: dry mass 1 kg, wet mass 1 kg
- nitrogen, liquid: 2.87e-6 kg; lognormal variance with pedigree 0.06, pedigree (1,5,5,5,1)
  EcoSpold01Location=RER
  properties: dry mass 1 kg, wet mass 1 kg
- oxygen, liquid: 0.00143 kg; lognormal variance with pedigree 0.06, pedigree (1,5,5,5,1)
  EcoSpold01Location=RER
  properties: dry mass 1 kg, wet mass 1 kg
- packaging film, low density polyethylene: 0.000202 kg; lognormal variance with pedigree 0.06, pedigree (1,5,5,5,1)
  EcoSpold01Location=RER
  properties: carbon content, fossil 0.857143, dry mass 1 kg, heating value, net 42.47 MJ, wet mass 1 kg
  note on carbon content, fossil: Polyethylene is formed out of a huge amount of ethylene monomers (C2H4) (ecoinvent v2.2 report 11_II). MW=28 g/mol
- paper, woodfree, uncoated: 0.000181 kg; lognormal variance with pedigree 0.06, pedigree (1,5,5,5,1)
  EcoSpold01Location=RER
  properties: carbon content, fossil 0.0251406, carbon content, non-fossil 0.281215, dry mass 0.945 kg, heating value, net 14.11 MJ, water content 0.0582011, wet mass 1 kg
  note on carbon content, fossil: Fossil C content was calculated after fossil C contents of chemicals used in the production of the paper (in Tab 8.54 & 8.55 ecoinvent v2.2 report 11_III, part 8).
  note on carbon content, non-fossil: Biogenic C content was calculated after biogenic C contents of chemicals used in the production of the paper (in Tab 8.54 & 8.55 ecoinvent v2.2 report 11_III, part 8). The cellulose content in 1 kg of paper (on a wet mas basis) was estimated as (1-chemical content), C content of cellulose was considered 0.44 kgC/kg dry mass (ecoinvent v2.2 report, n 15a, pg 40)
- polymethyl methacrylate, beads: 3.2e-5 kg; lognormal variance with pedigree 0.06, pedigree (1,5,5,5,1)
  EcoSpold01Location=RER
  properties: carbon content, fossil 0.6, dry mass 1 kg, heating value, net 27.86 MJ, wet mass 1 kg
  note on carbon content, fossil: Monomer is methyl methacrylate (MMA; CH2-C(CH3)COOCH3) is also called a-methylacrylic acid or 2-methylpropenoic acid (ecoinvent v2.2 report 11_II). MW=100 g/mol
- solvent, organic: 2.66e-6 kg; lognormal variance with pedigree 0.06, pedigree (1,5,5,5,1)
  EcoSpold01Location=GLO
  properties: carbon content, fossil 0.63072, dry mass 1 kg, heating value, net 19.11 MJ, wet mass 1 kg
  note on carbon content, fossil: Mixture of 15 of the most often used solvents (list in ecoinvent v2.2 report 11-III, pg 293). C content was calculated as an unweighted average of C content of the different solvents
- tap water: 2.03137e-7, 3.09665e-7, 5.77819e-7, 1.5566e-6, 1.87373e-7, 7.80852e-6, 8.93569e-5 kg (7 suppliers, which the file names only by identifier); sum of these 0.0001 kg; lognormal variance with pedigree 0.06, pedigree (1,5,5,5,1)
  EcoSpold01Location=RER
  properties: carbon content, fossil 0.00178991, dry mass 0.000337476 kg, water content 2962.17, wet mass 1 kg
  note on carbon content, fossil: Bicarbonate content is 2.93 mol/m3. CO2 content is 0.1 mol/m3 (ecoinvent v2.2 report 8, Tab 93.1).
- transport, passenger car: 0.0022 km; lognormal variance with pedigree 0.18, pedigree (1,5,5,5,1)
- waste glass: -6.47186e-6, -0.0195925, -5.56523e-8, -5.96497e-7, -2.49024e-7, -1.35325e-8, -8.45112e-8 kg (7 suppliers, which the file names only by identifier); sum of these -0.0196 kg; lognormal variance with pedigree 0.02, pedigree (1,5,1,5,1)
  EcoSpold01Location=CH
  production volume
    (same comment as for municipal solid waste)
  properties: dry mass 1 kg, heating value, net 0.05 MJ, wet mass 1 kg
  note on heating value, net: Value extracted from "treatment of waste glass, open dump, very wet infiltration class (1000mm)"
- waste graphical paper: -1.66045e-7, -1.45191e-8, -5.85041e-8, -5.99991e-7, -1.08736e-6, -7.27653e-5, -1.08297e-7 kg (7 suppliers, which the file names only by identifier); sum of these -7.48e-5 kg; lognormal variance with pedigree 0.02, pedigree (1,5,1,5,1)
  EcoSpold01Location=CH
  production volume
    (same comment as for municipal solid waste)
  properties: carbon content, non-fossil 0.454955, dry mass 0.888 kg, heating value, net 14.12 MJ, water content 0.126126, wet mass 1 kg
- waste mineral oil: -2.28e-5 kg; lognormal variance with pedigree 0.02, pedigree (1,5,1,5,1)
  EcoSpold01Location=CH
  production volume
    (same comment as for municipal solid waste)
  properties: carbon content, fossil 0.864444, dry mass 0.9 kg, heating value, net 34.7 MJ, water content 0.111111, wet mass 1 kg
  note on carbon content, fossil: Tab A.6, ecoinvent v2.2 report 13_I. C content has been calculated after data in the tables, and then referred to 1 kg DM
- waste paperboard: -3.14879e-8, -1.26879e-7, -2.34866e-7, -3.60105e-7, -7.03873e-5, -2.35818e-6, -1.30121e-6 kg (7 suppliers, which the file names only by identifier); sum of these -7.48e-5 kg; lognormal variance with pedigree 0.02, pedigree (1,5,1,5,1)
  EcoSpold01Location=CH
  production volume
    (same comment as for municipal solid waste)
  properties: carbon content, non-fossil 0.483259, dry mass 0.804 kg, heating value, net 15.92 MJ, water content 0.243781, wet mass 1 kg
  note on carbon content, non-fossil: C content was calculated for 1 kg DM, using data in Tab A.3, ecoinvent v2.2 report 13_I.
- waste wood, untreated: -4.32665e-6, -1.12624e-7, -8.39268e-5, -1.54045e-6, -6.53653e-7, -1.03337e-6, -1.24064e-5 kg (7 suppliers, which the file names only by identifier); sum of these -0.000104 kg; lognormal variance with pedigree 0.02, pedigree (1,5,1,5,1)
  EcoSpold01Location=CH
  production volume
    (same comment as for municipal solid waste)
  properties: carbon content, non-fossil 0.48632, dry mass 0.8 kg, heating value, net 13.99 MJ, water content 0.25, wet mass 1 kg
  note on carbon content, non-fossil: Tab A.4, ecoinvent v2.2 report 13_I. C content has been referred to 1 kg DM,
- wastewater from glass production: -5.11e-5 m3; lognormal variance with pedigree 0.02, pedigree (1,5,1,5,1)
  EcoSpold01Location=CH
  production volume
    (same comment as for municipal solid waste)
  properties: carbon content, fossil 0.0455242, dry mass 1.09356 kg, water content 913.443, wet mass 1000 kg
  note on carbon content, fossil: COD= 0.115 kg/m3 (Tab A.18, ecoinvent v2.2 report 13_I). COD was converted to TOC, using conversion factors in Tab 4.10 (ecoinvent v2.2 report 13_IV). TOC was considered as Total Carbon.

## Inputs from nature
- Water, unspecified natural origin [natural resource, in water]: 5.1e-5 m3; name water_UNO_input; lognormal variance with pedigree 0.06, pedigree (1,5,5,5,1)
  Calculated value. The amount of water in this flow (input) to the process as provided by the data provider for eiv2 was approximatelly 0.0000111m3. This amount is adjusted, so the water balance is achieved.

## Sampling procedure
Environmental report 2000 of the company Interpane

## Extrapolations
See geography This dataset has been copied from an original dataset covering the geography RER. The uncertainty has been adjusted accordingly.

## Review by Roberto Dones 2007-11-07
passed

## Review by Bo Weidema 2012-09-19
corrected input of production mix to specific product
