# mixed natural gas and biomethane production, high pressure

Dataset: EcoSpold 2, unit process
Geography: CH
Time period: 2018-01-01 to 2023-12-31
Technology level: current
Classification: ISIC rev.4 ecoinvent: 3520:Manufacture of gas; distribution of gaseous fuels through mains
Classification: EcoSpold01Categories: natural gas/fuels
Scenario: Business-as-Usual
System model: Allocation, cut-off by classification
Generated by: Florentine Brunner
Database: ecoinvent
isCopyrightProtected: true
accessRestrictedTo: 1

## General comment
This dataset represents the injection of biomethane (biogas purified to meet the quality requirements to be fed into the natural gas grid) into the natural gas distribution grid. This datasets defines the share of biomethane in the natural gas grid specific to Switzerland (in 2018).
Energy requirements, leakages and losses are accounted for in the respective market datasets for biomethane and natural gas.

## Included activities start
The activity starts with the biomethane ready for injection in the natural gas grid.

## Included activities end
The activity ends with a mixture of biomethane and natural gas being available for the consumer.

## Geography
The share of biomethane in the natural gas grid is specific to Switzerland.

## Technology
The two mixed products are brought to the quality requirements (e.g. methane content) for grid injection in datasets preceeding this mixing activity.

## Time period
Share of biomethane in the natural gas grid extracted from statistics for the year 2018.

## Reference product
- mixed natural gas and biomethane, high pressure: 1 m3; By-product classification allocatable product; CPC 1202: Natural gas, liquefied or in the gaseous state; HS2017 271121: Petroleum gases and other gaseous hydrocarbons; in gaseous state, natural gas
  production volume 3.268e9 m3
    Calculated as the sum of natural gas in the Siwss gas grid of about 3.24E+9m3 and of biomethane injected into the natural gas grid in 2018 of 3.20E+7 (BFE, 2019). Note that this production volume is to be seen in parallel rather than in addition to the production volume for natural gas, high pressure in the market for natural gas, high pressure, CH.
    Reference(s):
    BFE 2019, Schweizerische Statistik der erneuerbaren Energien, Ausgabe 2018. Accessed at https://www.bfe.admin.ch/bfe/de/home/versorgung/statistik-und-geodaten/energiestatistiken/teilstatistiken.exturl.html/aHR0cHM6Ly9wdWJkYi5iZmUuYWRtaW4uY2gvZGUvcHVibGljYX/Rpb24vZG93bmxvYWQvOTc2NQ==.html, March 2020.
  property heating value, gross 40 MJ
    The gross heating value based on Meili et al. (2022) section 5.2 is applied to the mixture of natural gas and biomethane.
  property price 0.166 EUR2005
    Temporary price data. Value assumed to be equal to that of "natural gas, high pressure"
  properties: carbon allocation 0.506 kg, carbon content 0.602381, carbon content, fossil 0.602381, dry mass 0.84 kg, heating value, net 36 MJ, water content 0, water in wet mass 0 kg, wet mass 0.84 kg

## Inputs from technosphere
- biomethane, high pressure: 0.02 m3; lognormal variance with pedigree 0.008, pedigree (1,1,3,1,1)
  According to the Swiss Ministry for Energy (BFE), the share of biomethane injected into the natural gas grid is 2% in 2018. This corresponds to an amount of biomethane of 325.1GWh or 3.2E+7m3 in 3.24E9m3 natural gas in 2018.
  Reference(s):
  BFE 2019, Schweizerische Statistik der erneuerbaren Energien, Ausgabe 2018. Accessed at https://www.bfe.admin.ch/bfe/de/home/versorgung/statistik-und-geodaten/energiestatistiken/teilstatistiken.exturl.html/aHR0cHM6Ly9wdWJkYi5iZmUuYWRtaW4uY2gvZGUvcHVibGljYX/Rpb24vZG93bmxvYWQvOTc2NQ==.html, March 2020.
  properties: carbon content, non-fossil 0.695496, dry mass 0.752 kg, heating value, net 34.97 MJ, wet mass 0.752 kg
  note on heating value, net: Literature value, Source: United Nations Statistics Division (2018) International Recommendations for Energy Statistics (IRES). Available at: http://unstats.un.org/unsd/statcom/doc11/BG-IRES.pdf.
- natural gas, high pressure: 0.98 m3; lognormal variance with pedigree 0.008, pedigree (1,1,3,1,1)
  (same comment as for biomethane, high pressure)
  properties: carbon content, fossil 0.602381, dry mass 0.84 kg, heating value, gross 40 MJ, heating value, net 36 MJ, wet mass 0.84 kg
  note on carbon content, fossil: An average C content of 0.506 kg C/ m3 has been assumed (this average has been calculated using data in Tab 3.5, ecoinvent v2.2 report 6_V
  note on heating value, net: Literature value, Source: Christoph Meili;Niels Jungbluth;Maresa Bussa (2021) Life cycle inventories of crude oil and natural gas extraction. ESU-services Ltd. commissioned by BAFU & VSG, Schaffhausen, Switzerland, http://esu-services.ch/data/public-lci-reports/
