# oat seed production, Swiss integrated production, at farm

Dataset: EcoSpold 2, unit process
Geography: CH
Time period: 1996-01-01 to 2023-12-31
Technology level: current
Classification: ISIC rev.4 ecoinvent: 0111:Growing of cereals (except rice), leguminous crops and oil seeds
Tags: WFLDB
Scenario: Business-as-Usual
System model: Allocation, cut-off by classification
Generated by: Patrik Mouron
Published in: Nemecek T. 2015
Database: ecoinvent
isCopyrightProtected: true
accessRestrictedTo: 1

## General comment
This dataset represents the cultivation of oat seed on an area of 1 ha at farm. The yield of wheat grain is 6425 kg/ha at a moisture content at storage of 15%.
This process is identical to the ecoinvent process 'wheat production, Swiss integrated production, intensive' which is used as a proxy for oat seed production at farm. This dataset refers to an average situation; for specific situations exchanges might differ substantially due to site specific parameters

## Included activities start
This activity starts after the harvest of the previous crop. The inputs of seeds, mineral fertilisers and pesticides are considered. Farm manure as an organic fertiliser is only accounted for in terms of direct field emissions; all pre-processes are included in the animal production systems.

## Included activities end
The dataset includes all machine operations and corresponding machine infrastructure and sheds. Machine operations are: soil cultivation, sowing, fertilisation, weed control, pest and pathogen control, combine-harvest, transport from field to regional processing centre (10 km) and drying of grains. Further, direct field emissions are included. This activity ends after drying of grains at the regional processing centre.

## Technology
Integrated production

## Time period
Time period referring to the data source: 1996-2003. Based on expert opinion data is considered to be valid at least up to 2012.

## Reference product
- oat seed, Swiss integrated production, at farm: 1 kg; By-product classification allocatable product; CPC 01171: Oats, seed; HS2017 100410: Cereals; oats, seeds
  Reference flow: Yield = 6425 kg/ha
  production volume 326898 kg
    Source: FAOSTAT. Average, 2009-2012. Calculation method: crop production volume [kg] / crop productivity [kg/ha] * seeding density [kg/ha] = kg
  property carbon content, non-fossil 0.424106
    calculation: C-content of components according to ecoinvent report No. 15a. Source of composition: Souci, S.W., Fachmann, W., Kraut, H. (Hg.: Bundesminsiterium fur Ernahrung, Landwirtschaft und Forsten, Bonn) 'Die Zusammensetzung der Lebensmittel - Nahrwerttabellen', medpharm Scientific Publishers Stuttgart, CRC Press; 2000.
  property price 0.0603491 EUR2005
    Calculated based on inputs: The price of the product has been calculated as a sum of the values of the material and energy inputs for this product. This value is therefore a rough estimation. It may underestimate the real price since there are additional expenses when producing any product. These expences can include for example labour costs, treatment of waste materials and profit for the producer. Please consider carefully whether this level of data quality is acceptable for your application.
  properties: carbon allocation 0.368788 kg, carbon content 0.424106, carbon content, fossil 0, dry mass 0.869565 kg, water content 0.15, water in wet mass 0.130435 kg, wet mass 1 kg

## Inputs from technosphere
- [sulfonyl]urea-compound: 0.00018281 kg; lognormal variance with pedigree 0.0549308, pedigree (2,2,5,1,1)
  Extrapolated from Ecoinvent v2.2 process 'Wheat seed IP, at regional storehouse/CH U'.
  properties: carbon content, fossil 0.540853, dry mass 1 kg, wet mass 1 kg
- ammonium nitrate: 0.0276063 kg; lognormal variance with pedigree 0.0133563, pedigree (2,1,4,1,1)
  The exchange has been updated from 'ammonium nitrate, as N' into 'ammonium nitrate' and therefore its amount has been scaled (multiplied) from 0.0097 kg by 2.8573 kg of 'ammonium nitrate' per kg of 'ammonium nitrate, as N'. Original comment of the exchange is: Extrapolated from Ecoinvent v2.2 process 'Wheat seed IP, at regional storehouse/CH U'. Corresponds to 0.00966 kg/ha
  properties: dry mass 1 kg, wet mass 1 kg
- ammonium sulfate: 0.00073111 kg; lognormal variance with pedigree 0.0133563, pedigree (2,1,4,1,1)
  Extrapolated from Ecoinvent v2.2 process 'Wheat seed IP, at regional storehouse/CH U'. Corresponds to 0.000731 kg/ha
  properties: dry mass 1 kg, wet mass 1 kg
- application of plant protection product, by field sprayer: 0.00048941 ha; lognormal variance with pedigree 0.0133563, pedigree (2,1,4,1,1)
  Extrapolated from Ecoinvent v2.2 process 'Wheat seed IP, at regional storehouse/CH U'.
- combine harvesting: 0.00014394 ha; lognormal variance with pedigree 0.0133563, pedigree (2,1,4,1,1)
  Extrapolated from Ecoinvent v2.2 process 'Wheat seed IP, at regional storehouse/CH U'.
- cyclic N-compound: 9.0397e-5 kg; lognormal variance with pedigree 0.0549308, pedigree (2,2,5,1,1)
  Extrapolated from Ecoinvent v2.2 process 'Wheat seed IP, at regional storehouse/CH U'.
  properties: carbon content, fossil 0.641962, dry mass 1 kg, wet mass 1 kg
- drying of bread grain, seed and legumes: 0.0152628 l; lognormal variance with pedigree 0.0133563, pedigree (2,1,4,1,1)
  Extrapolated from Ecoinvent v2.2 process 'Wheat seed IP, at regional storehouse/CH U'.
- fertilising, by broadcaster: 0.00057578 ha; lognormal variance with pedigree 0.0133563, pedigree (2,1,4,1,1)
  Extrapolated from Ecoinvent v2.2 process 'Wheat seed IP, at regional storehouse/CH U'.
- inorganic nitrogen fertiliser, as N: 0.0058512 kg; lognormal variance with pedigree 0.0133563, pedigree (2,1,4,1,1)
  Extrapolated from Ecoinvent v2.2 process 'Wheat seed IP, at regional storehouse/CH U'. Corresponds to 0.00101 kg/ha
  properties: dry mass 1 kg, wet mass 1 kg
- inorganic phosphorus fertiliser, as P2O5: 0.00697107 kg; lognormal variance with pedigree 0.0133563, pedigree (2,1,4,1,1)
  Extrapolated from Ecoinvent v2.2 process 'Wheat seed IP, at regional storehouse/CH U'. Corresponds to 0.00377 kg/ha
  properties: dry mass 1 kg, wet mass 1 kg
- liquid manure spreading, by vacuum tanker: 0.00047257 m3; lognormal variance with pedigree 0.0133563, pedigree (2,1,4,1,1)
  Extrapolated from Ecoinvent v2.2 process 'Wheat seed IP, at regional storehouse/CH U'.
- nitrile-compound: 2.735e-5 kg; lognormal variance with pedigree 0.0549308, pedigree (2,2,5,1,1)
  Extrapolated from Ecoinvent v2.2 process 'Wheat seed IP, at regional storehouse/CH U'.
  properties: carbon content, fossil 0.344995, dry mass 1 kg, wet mass 1 kg
- oat seed, for sowing: 0.02591 kg; lognormal variance with pedigree 0.0133563, pedigree (2,1,4,1,1)
  Extrapolated from Ecoinvent v2.2 process 'Wheat seed IP, at regional storehouse/CH U'. Sowing density: 166kg/ha.
  properties: carbon content, non-fossil 0.424106, dry mass 0.869565 kg, water content 0.15, wet mass 1 kg
  note on carbon content, non-fossil: calculation: C-content of components according to ecoinvent report No. 15a. Source of composition: Souci, S.W., Fachmann, W., Kraut, H. (Hg.: Bundesminsiterium fur Ernahrung, Landwirtschaft und Forsten, Bonn) 'Die Zusammensetzung der Lebensmittel - Nahrwerttabellen', medpharm Scientific Publishers Stuttgart, CRC Press; 2000.
- packaging, for fertilisers: 0.0714133 kg; lognormal variance with pedigree 0.0592, pedigree (4,3,4,5,4)
  Total amount of active substance/s of fertilisers needed for the production of 'oat seed, Swiss integrated production, at farm' is calculated to be circa 3.57E-02 kg. Fertiliser/s used in this dataset is/are: 'ammonium nitrate, as N', 'ammonium sulfate, as N', 'nitrogen fertiliser, as N', 'phosphate fertiliser, as P2O5', 'phosphate rock, as P2O5, beneficiated, dry', 'potassium chloride, as K2O', 'potassium sulfate, as K2O', 'urea, as N'. The total amount of active substance/s is doubled in order to account for the packaging of the dilluted product of fertiliser/s that is/are applied. Therefore, 7.14E-02 kg of packaging for fertilisers is justified with this exchange.
  properties: carbon content, fossil 0.825301, dry mass 1 kg, heating value, net 25.01 MJ, price 0.0642 EUR2005, wet mass 1 kg
  note on carbon content, fossil: Considering a chemical formula (C2H4)n for polyethylene, carbon content-fossil is calculated to be 0.856286 kg of Carbon per kg of dry mass.
- packaging, for pesticides: 0.000765212 kg; lognormal variance with pedigree 0.0592, pedigree (4,3,4,5,4)
  Total amount of active substance/s of pesticides needed for the production of oat seed, Swiss integrated production, at farm is calculated to be circa 3.83E-04 kg. Pesticide/s used in this dataset is/are: '[sulfonyl]urea-compound', 'cyclic N-compound', 'nitrile-compound', 'pesticide, unspecified', 'phenoxy-compound'. The total amount of active substance/s is doubled in order to account for the packaging of the dilluted product of pesticide/s that is/are applied. Therefore, 7.65E-04 kg of packaging for pesticides is justified with this exchange.
  properties: carbon content, fossil 0.85714, dry mass 1 kg, heating value, net 25.97 MJ, price 0.0642 EUR2005, wet mass 1 kg
- pesticide, unspecified: 3.7426e-5 kg; lognormal variance with pedigree 0.0549308, pedigree (2,2,5,1,1)
  properties: carbon content, fossil 0.486978, dry mass 1 kg, wet mass 1 kg
- phenoxy-compound: 4.4623e-5 kg; lognormal variance with pedigree 0.0549308, pedigree (2,2,5,1,1)
  Extrapolated from Ecoinvent v2.2 process 'Wheat seed IP, at regional storehouse/CH U'. Extrapolated from Ecoinvent v2.2 process 'Wheat seed IP, at regional storehouse/CH U'.
  properties: carbon content, fossil 0.532559, dry mass 1 kg, wet mass 1 kg
- phosphate rock, beneficiated: 0.0069 kg; lognormal variance with pedigree 0.0133563, pedigree (2,1,4,1,1)
  The exchange has been updated from 'phosphate rock, as P2O5, beneficiated, dry' into 'phosphate rock, beneficiated' and therefore its amount has been scaled (multiplied) from 0.0022 kg by 3.125 kg of 'phosphate rock, beneficiated' per kg of 'phosphate rock, as P2O5, beneficiated, dry'. Original comment of the exchange is: Extrapolated from Ecoinvent v2.2 process 'Wheat seed IP, at regional storehouse/CH U'. Corresponds to 0.00221 kg/ha
  properties: dry mass 1 kg, wet mass 1 kg
- potassium chloride: 0.0102356 kg; lognormal variance with pedigree 0.0133563, pedigree (2,1,4,1,1)
  The exchange has been updated from 'potassium chloride, as K2O' into 'potassium chloride' and therefore its amount has been scaled (multiplied) from 0.0065 kg by 1.5829 kg of 'potassium chloride' per kg of 'potassium chloride, as K2O'. Original comment of the exchange is: Extrapolated from Ecoinvent v2.2 process 'Wheat seed IP, at regional storehouse/CH U'. Corresponds to 0.00647 kg/ha
  properties: dry mass 1 kg, wet mass 1 kg
- potassium sulfate: 0.000784662 kg; lognormal variance with pedigree 0.0133563, pedigree (2,1,4,1,1)
  The exchange has been updated from 'potassium sulfate, as K2O' into 'potassium sulfate' and therefore its amount has been scaled (multiplied) from 0.0004 kg by 1.85 kg of 'potassium sulfate' per kg of 'potassium sulfate, as K2O'. Original comment of the exchange is: Extrapolated from Ecoinvent v2.2 process 'Wheat seed IP, at regional storehouse/CH U'. Corresponds to 0.000424 kg/ha
  properties: dry mass 1 kg, wet mass 1 kg
- solid manure loading and spreading, by hydraulic loader and spreader: 0.015978 kg; lognormal variance with pedigree 0.0133563, pedigree (2,1,4,1,1)
  Extrapolated from Ecoinvent v2.2 process 'Wheat seed IP, at regional storehouse/CH U'.
- sowing: 0.00014394 ha; lognormal variance with pedigree 0.0133563, pedigree (2,1,4,1,1)
  Extrapolated from Ecoinvent v2.2 process 'Wheat seed IP, at regional storehouse/CH U'.
- tillage, cultivating, chiselling: 0.00014394 ha; lognormal variance with pedigree 0.0133563, pedigree (2,1,4,1,1)
  Extrapolated from Ecoinvent v2.2 process 'Wheat seed IP, at regional storehouse/CH U'.
- tillage, currying, by weeder: 0.00014394 ha; lognormal variance with pedigree 0.0133563, pedigree (2,1,4,1,1)
  Extrapolated from Ecoinvent v2.2 process 'Wheat seed IP, at regional storehouse/CH U'.
- tillage, harrowing, by spring tine harrow: 0.00028789 ha; lognormal variance with pedigree 0.0133563, pedigree (2,1,4,1,1)
  Extrapolated from Ecoinvent v2.2 process 'Wheat seed IP, at regional storehouse/CH U'.
- tillage, ploughing: 0.00014394 ha; lognormal variance with pedigree 0.0133563, pedigree (2,1,4,1,1)
  Extrapolated from Ecoinvent v2.2 process 'Wheat seed IP, at regional storehouse/CH U'.
- transport, tractor and trailer, agricultural: 0.010119 metric ton*km; lognormal variance with pedigree 0.0133563, pedigree (2,1,4,1,1)
  Extrapolated from Ecoinvent v2.2 process 'Wheat seed IP, at regional storehouse/CH U'. Corresponds to 65tkm/ha.
- urea: 0.00727412 kg; lognormal variance with pedigree 0.0133563, pedigree (2,1,4,1,1)
  The exchange has been updated from 'urea, as N' into 'urea' and therefore its amount has been scaled (multiplied) from 0.0034 kg by 2.1438 kg of 'urea' per kg of 'urea, as N'. Original comment of the exchange is: Extrapolated from Ecoinvent v2.2 process 'Wheat seed IP, at regional storehouse/CH U'. Corresponds to 0.00339 kg/ha
  properties: carbon content, fossil 0.2, dry mass 1 kg, wet mass 1 kg

## Inputs from nature
- Carbon dioxide, in air [natural resource, in air]: 1.29489 kg; lognormal variance with pedigree 0.0133563, pedigree (2,1,4,1,1)
  Extrapolated from Ecoinvent v2.2 process 'Wheat seed IP, at regional storehouse/CH U'. CO2 uptake by biomass
- Energy, gross calorific value, in biomass [natural resource, biotic]: 15.1385 MJ; lognormal variance with pedigree 0.0133563, pedigree (2,1,4,1,1)
  Extrapolated from Ecoinvent v2.2 process 'Wheat seed IP, at regional storehouse/CH U'. Gross energy content is related to MJ/kg dry matter of product. Source: ecoinvent data
- Occupation, annual crop, non-irrigated [natural resource, land]: 1.14356 m2*year; lognormal variance with pedigree 0.0200616, pedigree (2,1,4,1,1)
  Extrapolated from Ecoinvent v2.2 process 'Wheat seed IP, at regional storehouse/CH U'. Related to the duration from harvest date of previous crop to harvest date of main crop.
- Transformation, from annual crop, non-irrigated [natural resource, land]: 1.02201 m2; lognormal variance with pedigree 0.0442144, pedigree (2,1,4,1,1)
  Extrapolated from Ecoinvent v2.2 process 'Wheat seed IP, at regional storehouse/CH U'. 10000 m2 divided by the life time of the crop.
- Transformation, from pasture, man made, intensive [natural resource, land]: 0.41744 m2; lognormal variance with pedigree 0.0442144, pedigree (2,1,4,1,1)
  (same comment as for Transformation, from annual crop, non-irrigated)
- Transformation, to annual crop, non-irrigated [natural resource, land]: 1.43945 m2; lognormal variance with pedigree 0.0442144, pedigree (2,1,4,1,1)
  (same comment as for Transformation, from annual crop, non-irrigated)

## Emissions to nature
- Ammonia [air, non-urban air or from high stacks]: 0.0013048 kg; source EEA 2013; lognormal variance with pedigree 0.0446216, pedigree (2,1,4,1,1)
  Extrapolated from Ecoinvent v2.2 process 'Wheat seed IP, at regional storehouse/CH U'.
- Carbon dioxide, fossil [air, non-urban air or from high stacks]: 0.0053271 kg; lognormal variance with pedigree 0.0137498, pedigree (2,1,4,1,1)
  Extrapolated from Ecoinvent v2.2 process 'Wheat seed IP, at regional storehouse/CH U'. Calculated value - CO2 emissions from urea and lime. See 'WFLDB-Guidelines.pdf', available at https://ecoquery.ecoinvent.org/File/Reports.
- Dinitrogen monoxide [air, non-urban air or from high stacks]: 0.00087423 kg; lognormal variance with pedigree 0.124564, pedigree (2,1,4,1,1)
  Extrapolated from Ecoinvent v2.2 process 'Wheat seed IP, at regional storehouse/CH U'.
- Nitrogen oxides [air, non-urban air or from high stacks]: 0.00018359 kg; source EEA 2013; lognormal variance with pedigree 0.124564, pedigree (2,1,4,1,1)
  Extrapolated from Ecoinvent v2.2 process 'Wheat seed IP, at regional storehouse/CH U'.
- Cadmium II [soil, agricultural]: 3.4209e-7 kg; lognormal variance with pedigree 0.175866, pedigree (2,2,4,1,1)
  Extrapolated from Ecoinvent v2.2 process 'Wheat seed IP, at regional storehouse/CH U'.
- Chlormequat [soil, agricultural]: 3.3107e-5 kg; lognormal variance with pedigree 0.0857992, pedigree (2,2,5,1,1)
  Extrapolated from Ecoinvent v2.2 process 'Wheat seed IP, at regional storehouse/CH U'.
- Chromium III [soil, agricultural]: 3.5853e-6 kg; lognormal variance with pedigree 0.175866, pedigree (2,2,4,1,1)
  Extrapolated from Ecoinvent v2.2 process 'Wheat seed IP, at regional storehouse/CH U'.
- Copper ion [soil, agricultural]: -1.4096e-6 kg
  Extrapolated from Ecoinvent v2.2 process 'Wheat seed IP, at regional storehouse/CH U'.
- Difenoconazole [soil, agricultural]: 2.591e-6 kg; lognormal variance with pedigree 0.0857992, pedigree (2,2,5,1,1)
  Extrapolated from Ecoinvent v2.2 process 'Wheat seed IP, at regional storehouse/CH U'.
- Fenpropimorph [soil, agricultural]: 6.4775e-5 kg; lognormal variance with pedigree 0.0857992, pedigree (2,2,5,1,1)
  Extrapolated from Ecoinvent v2.2 process 'Wheat seed IP, at regional storehouse/CH U'.
- Ioxynil [soil, agricultural]: 2.735e-5 kg; lognormal variance with pedigree 0.0857992, pedigree (2,2,5,1,1)
  Extrapolated from Ecoinvent v2.2 process 'Wheat seed IP, at regional storehouse/CH U'.
- Isoproturon [soil, agricultural]: 0.00018281 kg; lognormal variance with pedigree 0.0857992, pedigree (2,2,5,1,1)
  Extrapolated from Ecoinvent v2.2 process 'Wheat seed IP, at regional storehouse/CH U'.
- Lead II [soil, agricultural]: 1.5221e-7 kg; lognormal variance with pedigree 0.175866, pedigree (2,2,4,1,1)
  Extrapolated from Ecoinvent v2.2 process 'Wheat seed IP, at regional storehouse/CH U'.
- Mecoprop-P [soil, agricultural]: 4.4623e-5 kg; lognormal variance with pedigree 0.0857992, pedigree (2,2,5,1,1)
  Extrapolated from Ecoinvent v2.2 process 'Wheat seed IP, at regional storehouse/CH U'.
- Mercury II [soil, agricultural]: 5.4813e-10 kg; lognormal variance with pedigree 0.175866, pedigree (2,2,4,1,1)
  Extrapolated from Ecoinvent v2.2 process 'Wheat seed IP, at regional storehouse/CH U'.
- Metaldehyde [soil, agricultural]: 4.3183e-6 kg; lognormal variance with pedigree 0.0857992, pedigree (2,2,5,1,1)
  Extrapolated from Ecoinvent v2.2 process 'Wheat seed IP, at regional storehouse/CH U'.
- Nickel II [soil, agricultural]: 5.0443e-7 kg; lognormal variance with pedigree 0.175866, pedigree (2,2,4,1,1)
  Extrapolated from Ecoinvent v2.2 process 'Wheat seed IP, at regional storehouse/CH U'.
- Tebuconazole [soil, agricultural]: 2.3031e-5 kg; lognormal variance with pedigree 0.0857992, pedigree (2,2,5,1,1)
  Extrapolated from Ecoinvent v2.2 process 'Wheat seed IP, at regional storehouse/CH U'.
- Zinc II [soil, agricultural]: 4.54e-8 kg; lognormal variance with pedigree 0.175866, pedigree (2,2,4,1,1)
  Extrapolated from Ecoinvent v2.2 process 'Wheat seed IP, at regional storehouse/CH U'.
- Cadmium II [water, ground-]: 3.7782e-9 kg; lognormal variance with pedigree 0.356838, pedigree (2,1,4,1,1)
  Extrapolated from Ecoinvent v2.2 process 'Wheat seed IP, at regional storehouse/CH U'.
- Cadmium II [water, surface water]: 2.3266e-9 kg; lognormal variance with pedigree 0.356838, pedigree (2,1,4,1,1)
  Extrapolated from Ecoinvent v2.2 process 'Wheat seed IP, at regional storehouse/CH U'.
- Chromium III [water, ground-]: 1.3046e-6 kg; lognormal variance with pedigree 0.356838, pedigree (2,1,4,1,1)
  Extrapolated from Ecoinvent v2.2 process 'Wheat seed IP, at regional storehouse/CH U'.
- Chromium III [water, surface water]: 1.9027e-7 kg; lognormal variance with pedigree 0.356838, pedigree (2,1,4,1,1)
  Extrapolated from Ecoinvent v2.2 process 'Wheat seed IP, at regional storehouse/CH U'.
- Copper ion [water, ground-]: 3.7651e-7 kg; lognormal variance with pedigree 0.356838, pedigree (2,1,4,1,1)
  Extrapolated from Ecoinvent v2.2 process 'Wheat seed IP, at regional storehouse/CH U'.
- Copper ion [water, surface water]: 2.697e-7 kg; lognormal variance with pedigree 0.356838, pedigree (2,1,4,1,1)
  Extrapolated from Ecoinvent v2.2 process 'Wheat seed IP, at regional storehouse/CH U'.
- Lead II [water, ground-]: 5.4104e-9 kg; lognormal variance with pedigree 0.356838, pedigree (2,1,4,1,1)
  Extrapolated from Ecoinvent v2.2 process 'Wheat seed IP, at regional storehouse/CH U'.
- Lead II [water, surface water]: 2.2559e-8 kg; lognormal variance with pedigree 0.356838, pedigree (2,1,4,1,1)
  Extrapolated from Ecoinvent v2.2 process 'Wheat seed IP, at regional storehouse/CH U'.
- Mercury II [water, ground-]: 2.0167e-10 kg; lognormal variance with pedigree 0.356838, pedigree (2,1,4,1,1)
  Extrapolated from Ecoinvent v2.2 process 'Wheat seed IP, at regional storehouse/CH U'.
- Mercury II [water, surface water]: 1.6715e-10 kg; lognormal variance with pedigree 0.356838, pedigree (2,1,4,1,1)
  Extrapolated from Ecoinvent v2.2 process 'Wheat seed IP, at regional storehouse/CH U'.
- Nickel II [water, surface water]: 1.3933e-7 kg; lognormal variance with pedigree 0.356838, pedigree (2,1,4,1,1)
  Extrapolated from Ecoinvent v2.2 process 'Wheat seed IP, at regional storehouse/CH U'.
- Nitrate [water, ground-]: 0.047736 kg; lognormal variance with pedigree 0.175766, pedigree (2,1,4,1,1)
  Extrapolated from Ecoinvent v2.2 process 'Wheat seed IP, at regional storehouse/CH U'.
- Phosphate [water, ground-]: 3.1767e-5 kg; source Prasuhn V.  2006; lognormal variance with pedigree 0.175766, pedigree (2,1,4,1,1)
  Extrapolated from Ecoinvent v2.2 process 'Wheat seed IP, at regional storehouse/CH U'.
- Phosphate [water, surface water]: 0.00011705 kg; source Prasuhn V.  2006; lognormal variance with pedigree 0.175766, pedigree (2,1,4,1,1)
  Extrapolated from Ecoinvent v2.2 process 'Wheat seed IP, at regional storehouse/CH U'.
- Phosphorus [water, surface water]: 1.7544e-5 kg; source Prasuhn V.  2006; lognormal variance with pedigree 0.175766, pedigree (2,1,4,1,1)
  Extrapolated from Ecoinvent v2.2 process 'Wheat seed IP, at regional storehouse/CH U'.
- Zinc II [water, ground-]: 2.3814e-6 kg; lognormal variance with pedigree 0.356838, pedigree (2,1,4,1,1)
  Extrapolated from Ecoinvent v2.2 process 'Wheat seed IP, at regional storehouse/CH U'.
- Zinc II [water, surface water]: 4.5921e-7 kg; lognormal variance with pedigree 0.356838, pedigree (2,1,4,1,1)
  Extrapolated from Ecoinvent v2.2 process 'Wheat seed IP, at regional storehouse/CH U'.

## Sampling procedure
Data were compiled from statistics, pilot network, fertilising recommendations, documents from extension services, information provided by retailers and expert knowledge. The production data were verified and adjusted by a group of experts.
