# biomethane production, high pressure from synthetic gas, wood, fluidised technology

Dataset: EcoSpold 2, unit process
Geography: RoW
Time period: 2008-01-01 to 2023-12-31
Technology level: current
Classification: ISIC rev.4 ecoinvent: 3520:Manufacture of gas; distribution of gaseous fuels through mains
Classification: EcoSpold01Categories: biomass/fuels
Scenario: Business-as-Usual
System model: Allocation, cut-off by classification
Share of production covered: 0 %
Generated by: Andrea Del Duce
Published in: Andrea Del Duce 2015
Database: ecoinvent
isCopyrightProtected: true
accessRestrictedTo: 1

## General comment
This datasets describes the production of methane from wood. The feedstock is first gasified and then methanised. This dataset describes methane production through a fluidised technology. Gas composition (% mol.) of the gas is 96% CH4 (min.). Density is 0.752 kg/Nm3. Lower heating value of the gas is 34.4 MJ/Nm3. Process heat is supplied by methane combustion. Inventory refers to the net production of 1 Nm3 syngas. Net methane yield is 0.270 Nm3/kg of wood (dry matter) with a conversion efficiency (lower heating value of the methane/lower heating value of the required wood) of around 50%.
This dataset was already contained in the ecoinvent database version 2. It was then updated individually veryfing the original data and transofrmation into a v3 dataset. The fuel characteristics as well as production processes are the same as in the original ecoinvent v2 dataset. The values of the exchanges were updated based on some new scaling calculations where the specific values indicated for the differernt processing steps discussed in the ecoinvent report nr. 17 have been considered instead of the final value originally presented. The changes are minor and concern only a few exchanges.
[This dataset is meant to replace the following datasets:]

## Included activities start
The activity begins with the transport of the wood and other required auxiliaries to the production site.

## Included activities end
This process refers to the conversion of wood chips into synthetic methane (96% vol.) through gasification and subsequent methanation. It includes drying (down to 10-15% moisture) and further comminution of wood chips (down to a size of 30x30x30 mm), FICFB (Fast Internally Circulating Fluidised Bed of the BCL type) gasification of the wood chips, treatment and conditioning of the resulting syngas to remove impurities and contaminants, methanation of the the syngas to methane, and compression of methane to natural gas network pressure (30-70 bar).

## Geography
Data from Paul Scherrer Institut (PSI, Switzerland) and the pilot gasification plant in Güssing (Austria)

## Technology
Gasification technology is FICFB (fast internally circulating fluidized bed of the BCL type). Technology for methanation is developed by PSI.

## Time period
Data mainly from 2004, pilot scale, future technology

## Parameters
- fraction, process water, to air: 0.15 dimensionless; name fraction_PW_to_air; lognormal variance with pedigree 0.092025, pedigree (4,4,3,2,4)
- fraction, tap water, to air: 0.15 dimensionless; name fraction_TW_to_air; lognormal variance with pedigree 0.092025, pedigree (4,4,3,2,4)

## Reference product
- biomethane, high pressure: 1 m3; name RP_amount_1; By-product classification allocatable product; CPC 17200: Coal gas, water gas, producer gas and similar gases, other than petroleum gases and other gaseous hydrocarbons; HS2017 271129: Petroleum gases and other gaseous hydrocarbons; in gaseous state, other than natural gas; CAS 74-82-8
  EcoSpold01Location=CH
  production volume 5.94131e7 m3; name rp_pv
    Estimate. Very limited production, assumed at 50 MW mainly in Latin America and small plants in China using rice husk. See http://www.woodgas.net/files/World%20bank%20tech%20paper%20296.pdf
  property carbon content, non-fossil 0.695496
    Carbon content calculated from composition of the gas, 96% (in vol) methane, 2% (in vol) CO2 (Tab 13.3, ecoinvent v2.2 report 17). The composition in %vol was converted in % weight using density data of the different gases from tab 19.1, ecoinvent v2.2 report 17, part 19.
  property heating value, net 34.97 MJ
    Literature value, Source: United Nations Statistics Division (2018) International Recommendations for Energy Statistics (IRES). Available at: http://unstats.un.org/unsd/statcom/doc11/BG-IRES.pdf.
  property price 0.144 EUR2005
    Temporary price data. Calculated as 90% of purchasers price based on: Same prices per energy output as natural gas, based on the proportional heating value (55.5 MJ/kg for methane; 54.8 MJ/kg for natural gas)
  properties: carbon allocation 0.523013 kg, carbon content 0.695496, carbon content, fossil 0, dry mass 0.752 kg, water content 0, water in wet mass 0 kg, wet mass 0.752 kg

## Inputs from technosphere
All rows: source Jungbluth N. 2007
- aluminium oxide, non-metallurgical: 3.67246e-10, 6.21745e-11 kg (2 suppliers, which the file names only by identifier); sum of these 4.2942e-10 kg; lognormal variance with pedigree 0.0166, pedigree (2,4,3,5,1)
  Based on PSI data (Ecogas project) plus calculations
  EcoSpold01Location=RER
  Uncertainty: Based on PSI data (Ecogas project) plus calculations
  properties: dry mass 1 kg, wet mass 1 kg
- charcoal: 0.019805 kg; lognormal variance with pedigree 0.0166, pedigree (2,4,3,5,1)
  Based on PSI data (Ecogas project) plus calculations
  EcoSpold01Location=GLO
  Uncertainty: Based on PSI data (Ecogas project) plus calculations
  properties: carbon content, non-fossil 0.8, dry mass 1 kg, heating value, net 28.4 MJ, wet mass 1 kg
  note on heating value, net: Indicative value. Reference: Fuels - Higher and Lower Calorific Values, available at: https://www.engineeringtoolbox.com/fuels-higher-calorific-values-d_169.html
- dolomite: 0.0396 kg; lognormal variance with pedigree 0.0072, pedigree (2,4,3,5,1)
  Based on PSI data (Ecogas project) plus calculations. The specific value refers to the specific steps detailed in the ecoinvent v2.2 report nr. 17 and not just to the final value originally presented.
  properties: carbon content, fossil 0.130435, dry mass 1 kg, heating value, net 3.95 MJ, wet mass 1 kg
- electricity, low voltage: 0.000310466, 1.38587e-5, 0.000217938, 0.00452358, 0.0004465, 2.78115e-6, 0.00102522, 0.0015574, 7.71548e-5 kWh (9 suppliers, which the file names only by identifier); sum of these 0.0081749 kWh; lognormal variance with pedigree 0.0346, pedigree (3,3,3,5,3)
  EcoSpold01Location=UCTE
  Calculation, based on 'heat, natural gas, at boiler modulating' (according to heat supply from methane)
  Uncertainty: Calculation, based on 'heat, natural gas, at boiler modulating' (according to heat supply from methane)
- electricity, medium voltage: 0.0231513, 0.461817, 0.155169, 0.00708973, 0.001419, 0.000304692, 0.0322473, 0.0476898, 0.0999117 kWh (9 suppliers, which the file names only by identifier); sum of these 0.8288 kWh; = 0.133+0.0588+0.137+0.5; lognormal variance with pedigree 0.0166, pedigree (2,4,3,5,1)
  EcoSpold01Location=CH
  Based on PSI data (Ecogas project) plus calculations. The specific value refers to the specific steps detailed in the ecoinvent v2.2 report nr. 17 and not just to the final value originally presented. The mathematical relation descibes the sum of the electricity requirements from the various processing steps as derived from the values in the ecoinvent v2.2 report nr. 17.
  Uncertainty: Based on PSI data (Ecogas project) plus calculations
- fatty acid methyl ester: 0.014622 kg; lognormal variance with pedigree 0.0166, pedigree (2,4,3,5,1)
  Based on PSI data (Ecogas project) plus calculations
  Uncertainty: Based on PSI data (Ecogas project) plus calculations
  properties: carbon content, fossil 0.041, carbon content, non-fossil 0.732, dry mass 1 kg, heating value, net 37.2 MJ, wet mass 1 kg
  note on heating value, net: Based on literature, report 17, page 439. Jungbluth, N., Chudacoff, M., Dauriat, A., Dinkel, F., Doka, G., Faist Emmenegger, M., Gnansounou, E., Kljun, N., Schleiss, K., Spielmann, M., Stettler, C., Sutter, J. 2007: Life Cycle Inventories of Bioenergy. ecoinvent report No. 17, Swiss Centre for Life Cycle Inventories, Dübendorf, CH.
- heat, central or small-scale, other than natural gas: 8.30552e-6, 0.000604694 MJ (2 suppliers, which the file names only by identifier); sum of these 0.000613 MJ; lognormal variance with pedigree 0.0166, pedigree (2,4,3,5,1)
  (same comment as for dolomite)
  properties: heating value, net 1 MJ
- industrial furnace, natural gas: 2.0621e-8 unit; lognormal variance with pedigree 0.3346, pedigree (3,3,3,5,3)
  Calculation, based on 'heat, natural gas, at boiler modulating' (according to heat supply from methane)
  EcoSpold01Location=RER
  Uncertainty: Calculation, based on 'heat, natural gas, at boiler modulating' (according to heat supply from methane)
- inert waste: -0.179 kg; name inertwaste_out; lognormal variance with pedigree 0.0146, pedigree (2,4,1,5,1)
  EcoSpold01Location=CH
  Based on PSI data (Ecogas project) plus calculations, recalculated based on the data in the ecoinvent v2.2 report nr. 17.
  Uncertainty: Based on PSI data (Ecogas project) plus calculations
  production volume; = inertwaste_out*rp_pv
    Calculated from the production volume of methane, 96% by volume in proportion to the respective output amounts.The formula multiplies the exchange output with the production volume of the reference product.
  properties: dry mass 1 kg, wet mass 1 kg
- nickel, class 1: 4.2942e-10 kg; lognormal variance with pedigree 0.0166, pedigree (2,4,3,5,1)
  EcoSpold01Location=GLO
  Based on PSI data (Ecogas project) plus calculations
  Uncertainty: Based on PSI data (Ecogas project) plus calculations
  properties: dry mass 1 kg, wet mass 1 kg
- silica sand: 0.0495 kg; lognormal variance with pedigree 0.0166, pedigree (2,4,3,5,1)
  Based on PSI data (Ecogas project) plus calculations. The specific value refers to the specific steps detailed in the ecoinvent v2.2 report nr. 17 and not just to the final value originally presented.
  EcoSpold01Location=DE
  Uncertainty: Based on PSI data (Ecogas project) plus calculations
  properties: dry mass 0.99 kg, water content 0.010101, wet mass 1 kg
- sodium hydroxide, without water, in 50% solution state: 0.00323 kg; lognormal variance with pedigree 0.0346, pedigree (3,3,3,5,3)
  EcoSpold01Location=RER
  Calculation from a typical quality of untreated syngas from wood
  Uncertainty: Calculation from a typical quality of untreated syngas from wood
  properties: dry mass 1 kg, heating value, net 3.03 MJ, wet mass 1 kg
- sulfuric acid: 0.0128 kg; lognormal variance with pedigree 0.0346, pedigree (3,3,3,5,3)
  (same comment as for sodium hydroxide, without water, in 50% solution state)
  properties: dry mass 1 kg, wet mass 1 kg
- synthetic gas factory: 2.9022e-9 unit; lognormal variance with pedigree 0.3166, pedigree (2,4,3,5,1)
  Calculation
  EcoSpold01Location=CH
  Uncertainty: Calculation
- tap water: 0.000681652, 0.00103912, 0.00193895, 0.00522338, 0.000628755, 0.0262025, 0.299849, 0.223437 kg (8 suppliers, which the file names only by identifier); sum of these 0.559 kg; lognormal variance with pedigree 0.0166, pedigree (2,4,3,5,1)
  Based on PSI data (Ecogas project) plus calculations
  EcoSpold01Location=CH
  Uncertainty: Based on PSI data (Ecogas project) plus calculations
  properties: carbon content, fossil 0.00178991, dry mass 0.000337476 kg, water content 2962.17, wet mass 1 kg
  note on carbon content, fossil: Bicarbonate content is 2.93 mol/m3. CO2 content is 0.1 mol/m3 (ecoinvent v2.2 report 8, Tab 93.1).
- waste mineral oil: -0.0105809, -0.00404107 kg (2 suppliers, which the file names only by identifier); sum of these -0.014622 kg; lognormal variance with pedigree 0.0146, pedigree (2,4,1,5,1)
  (same comment as for tap water)
  production volume; = wasteoil_out*rp_pv
    (same comment as for inert waste)
  properties: carbon content, fossil 0.864444, dry mass 0.9 kg, heating value, net 34.7 MJ, water content 0.111111, wet mass 1 kg
  note on carbon content, fossil: Tab A.6, ecoinvent v2.2 report 13_I. C content has been calculated after data in the tables, and then referred to 1 kg DM
  note on heating value, net: Value taken from the general comment of the treatment dataset.
- waste zeolite: -0.00812 kg; name BP_amount_1; lognormal variance with pedigree 0.026, pedigree (4,5,1,1,1)
  Based on PSI data (Ecogas project) plus calculations, recalculated based on the data in the ecoinvent v2.2 report nr. 17.
  production volume; = rp_pv * (BP_amount_1 / RP_amount_1)
    Calculated from production volume of reference product using the relative outputs.
  properties: dry mass 0.95 kg, water content 0.0526316, wet mass 1 kg
- wastewater, average: -0.000866594, -0.00020722, -3.08541e-6 m3 (3 suppliers, which the file names only by identifier); sum of these -0.0010769 m3; lognormal variance with pedigree 0.0146, pedigree (2,4,1,5,1)
  EcoSpold01Location=CH
  Based on PSI data (Ecogas project) plus calculations
  Uncertainty: Based on PSI data (Ecogas project) plus calculations
  production volume; = wastewater_out*rp_pv
    Calculated from the production volume of methane, 96% by volume in proportion to the respective output amounts. The formula multiplies the exchange output with the production volume of the reference product.
  properties: carbon content, non-fossil 0.194039, dry mass 0.346837 kg, mass concentration, TOC 0.1091 kg/m3, mass concentration, calcium 0.039453 kg/m3, mass concentration, chlorine 0.030031 kg/m3, mass concentration, hydrogen 0.013365 kg/m3, mass concentration, nitrogen 0.031015 kg/m3, mass concentration, oxygen 0.069824 kg/m3, mass concentration, sodium 0.06456 kg/m3, mass concentration, sulfur 0.015602 kg/m3, water content 2882.2, wet mass 1000 kg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
  note on carbon content, non-fossil: 0.0673 kg TOC/m3 (Tab A.17, ecoinvent v2.2 report 13_I). TOC was considered as Total Carbon.
- wood ash mixture, pure: -0.0216718, -0.0133102 kg (2 suppliers, which the file names only by identifier); sum of these -0.034982 kg; lognormal variance with pedigree 0.0146, pedigree (2,4,1,5,1)
  (same comment as for wastewater, average)
  production volume; = woodash_out*rp_pv
    (same comment as for inert waste)
  properties: carbon content, non-fossil 0.012, dry mass 1 kg, wet mass 1 kg
- wood chips, dry, measured as dry mass: 0.814 kg; lognormal variance with pedigree 0.0346, pedigree (3,3,3,5,3)
  EcoSpold01Location=RER
  Yield based on PSI data (Ecogas project) plus calculations, distribution of wood qualities from IEA Task 33 CH report
  Uncertainty: Yield based on PSI data (Ecogas project) plus calculations, distribution of wood qualities from IEA Task 33 CH report
  properties: carbon content, non-fossil 0.494, dry mass 1 kg, heating value, net 9.99 MJ, water content 0.4, wet mass 1.4 kg
  note on carbon content, non-fossil: C content of dry mass is 0.494 kgC/kg dry wood (ecoinvent v2.2 report 9).
- wood chips, wet, measured as dry mass: 0.00639675, 0.0576407, 2.82322 kg (3 suppliers, which the file names only by identifier); sum of these 2.88725 kg; lognormal variance with pedigree 0.0346, pedigree (3,3,3,5,3)
  Yield based on PSI data (Ecogas project) plus calculations, distribution of wood qualities from IEA Task 33 CH report.
  EcoSpold01Location=RER
  Uncertainty: Yield based on PSI data (Ecogas project) plus calculations, distribution of wood qualities from IEA Task 33 CH report
  properties: carbon content, non-fossil 0.494, dry mass 1 kg, heating value, net 10.84 MJ, water content 1.4, wet mass 2.4 kg
  note on heating value, net: Value based on the dataset 'softwood forestry, mixed species, sustainable forest management'
- zeolite, powder: 0.00812 kg; lognormal variance with pedigree 0.0072, pedigree (2,4,3,5,1)
  (same comment as for dolomite)
  properties: dry mass 1 kg, wet mass 1 kg
- zinc: 0.0018694 kg; lognormal variance with pedigree 0.0166, pedigree (2,4,3,5,1)
  EcoSpold01Location=RER
  Based on PSI data (Ecogas project) plus calculations
  Uncertainty: Based on PSI data (Ecogas project) plus calculations
  properties: dry mass 1 kg, wet mass 1 kg

## Emissions to nature
All rows: source Jungbluth N. 2007
- Acetaldehyde [air, urban air close to ground]: 7.3648e-9 kg; lognormal variance with pedigree 0.0746, pedigree (3,3,3,5,3)
  Calculation, based on 'heat, natural gas, at boiler modulating' (according to heat supply from methane)
  Uncertainty: Calculation, based on 'heat, natural gas, at boiler modulating' (according to heat supply from methane)
- Acetic acid [air, urban air close to ground]: 1.1047e-6 kg; lognormal variance with pedigree 0.0746, pedigree (3,3,3,5,3)
  (same comment as for Acetaldehyde)
- Benzene [air, urban air close to ground]: 2.9459e-6 kg; lognormal variance with pedigree 0.0746, pedigree (3,3,3,5,3)
  (same comment as for Acetaldehyde)
- Benzo(a)pyrene [air, urban air close to ground]: 7.3648e-11 kg; lognormal variance with pedigree 0.3346, pedigree (3,3,3,5,3)
  (same comment as for Acetaldehyde)
- Butane [air, urban air close to ground]: 5.1553e-6 kg; lognormal variance with pedigree 0.0746, pedigree (3,3,3,5,3)
  (same comment as for Acetaldehyde)
- Carbon dioxide, non-fossil [air, urban air close to ground]: 4.8938 kg; lognormal variance with pedigree 0.013225, pedigree (3,3,3,2,3)
  Calculation, to close carbon balance
  Uncertainty: Calculation, to close carbon balance
- Carbon monoxide, non-fossil [air, urban air close to ground]: 0.0034281 kg; lognormal variance with pedigree 0.6746, pedigree (3,3,3,5,3)
  Calculation, based on 'heat, natural gas, at boiler modulating' (according to heat supply from methane), and PSI data
  Uncertainty: Calculation, based on 'heat, natural gas, at boiler modulating' (according to heat supply from methane), and PSI data
- Dinitrogen monoxide [air, urban air close to ground]: 3.6824e-6 kg; lognormal variance with pedigree 0.0746, pedigree (3,3,3,5,3)
  (same comment as for Acetaldehyde)
- Dioxins, measured as 2,3,7,8-tetrachlorodibenzo-p-dioxin [air, urban air close to ground]: 2.2094e-16 kg; lognormal variance with pedigree 0.3346, pedigree (3,3,3,5,3)
  (same comment as for Acetaldehyde)
- Formaldehyde [air, urban air close to ground]: 7.3648e-7 kg; lognormal variance with pedigree 0.0746, pedigree (3,3,3,5,3)
  (same comment as for Acetaldehyde)
- Hydrocarbons, aliphatic, alkanes, unspecified [air, urban air close to ground]: 7.3626e-5 kg; lognormal variance with pedigree 0.0566, pedigree (2,4,3,5,1)
  Based on PSI data from the Ecogas project
  Uncertainty: Based on PSI data from the Ecogas project
- Hydrocarbons, aliphatic, unsaturated [air, urban air close to ground]: 0.00025081 kg; lognormal variance with pedigree 0.0566, pedigree (2,4,3,5,1)
  (same comment as for Hydrocarbons, aliphatic, alkanes, unspecified)
- Mercury II [air, urban air close to ground]: 2.2094e-10 kg; lognormal variance with pedigree 0.6746, pedigree (3,3,3,5,3)
  (same comment as for Acetaldehyde)
- Methane, non-fossil [air, urban air close to ground]: 1.473e-5 kg; lognormal variance with pedigree 0.0746, pedigree (3,3,3,5,3)
  (same comment as for Acetaldehyde)
- NMVOC, non-methane volatile organic compounds [air, urban air close to ground]: 4.9354e-5 kg; lognormal variance with pedigree 0.0566, pedigree (2,4,3,5,1)
  (same comment as for Hydrocarbons, aliphatic, alkanes, unspecified)
- Nitrogen oxides [air, urban air close to ground]: 0.0020825 kg; lognormal variance with pedigree 0.0746, pedigree (3,3,3,5,3)
  (same comment as for Carbon monoxide, non-fossil)
- PAH, polycyclic aromatic hydrocarbons [air, urban air close to ground]: 9.6363e-7 kg; lognormal variance with pedigree 0.3346, pedigree (3,3,3,5,3)
  (same comment as for Carbon monoxide, non-fossil)
- Particulate Matter, < 2.5 um [air, urban air close to ground]: 5.4583e-5 kg; lognormal variance with pedigree 0.3346, pedigree (3,3,3,5,3)
  (same comment as for Carbon monoxide, non-fossil)
- Pentane [air, urban air close to ground]: 8.8377e-6 kg; lognormal variance with pedigree 0.0746, pedigree (3,3,3,5,3)
  (same comment as for Acetaldehyde)
- Propane [air, urban air close to ground]: 1.473e-6 kg; lognormal variance with pedigree 0.0746, pedigree (3,3,3,5,3)
  (same comment as for Acetaldehyde)
- Propionic acid [air, urban air close to ground]: 1.473e-7 kg; lognormal variance with pedigree 0.0746, pedigree (3,3,3,5,3)
  (same comment as for Acetaldehyde)
- Sulfur dioxide [air, urban air close to ground]: 4.0506e-6 kg; lognormal variance with pedigree 0.0346, pedigree (3,3,3,5,3)
  (same comment as for Acetaldehyde)
- Toluene [air, urban air close to ground]: 1.473e-6 kg; lognormal variance with pedigree 0.0746, pedigree (3,3,3,5,3)
  (same comment as for Acetaldehyde)
- Water [air, unspecified]: 0.00492 m3; name water_to_air_unspecified; lognormal variance with pedigree 0.0447, pedigree (2,2,3,5,1)
  Calculated value based on literature values and expert opinion. See comments in the parametres' comment field.The dataset is not wtaer balanced. Specific information on the water balance was not found.
  property fraction, origin: fresh water 1; name fraction_origin_fresh_water
  property fraction, origin: salt water 0; name fraction_origin_salt_water
  property fraction, origin: unspecified 0; name fraction_origin_unspecified

## Sampling procedure
Data from one source, pilot-to-demonstration plant operation data

## Extrapolations
Combustion of methane (for internal process energy use) is extrapolated from the emission profile of natural gas combustion. This dataset has been copied from an original dataset covering the geography CH. The uncertainty has been adjusted accordingly.
