# natural gas, burned in solid oxide fuel cell, with micro gas turbine, 180kWe, future

Dataset: EcoSpold 2, unit process
Geography: RoW
Time period: 2000-01-01 to 2023-12-31
Technology level: current
Classification: ISIC rev.4 ecoinvent: 3510:Electric power generation, transmission and distribution
Classification: EcoSpold01Categories: natural gas/cogeneration
Synonyms: SOFC gas turbine hybrid; SOFC Gasturbinen Hybridsystem; solid oxide fuel cell hybrid cycle power system; Festoxid Brennstoffzellen Gasturbinen Hybridsystem
Tags: ConvertedDataset; with true value
Scenario: Business-as-Usual
System model: Allocation, cut-off by classification
Generated by: Alex Primas
Published in: Primas A. 2007
Database: ecoinvent
isCopyrightProtected: true
accessRestrictedTo: 1

## General comment
The multioutput-process 'natural gas, burned in SOFC-GT fuel cell 180kWe delivers the coproducts 'heat, natural gas, allocation exergy, at SOFC-GT fuel cell 180kWe' and 'electricity, natural gas, allocation exergy, at SOFC-GT fuel cell 180kWe'. The exergy allocation is the allocation scheme suggested to be used within the ecoinvent database (e.g. in electricity mixes).
[This dataset was already contained in the ecoinvent database version 2. It was not individually updated during the transfer to ecoinvent version 3. Life Cycle Impact Assessment results may still have changed, as they are affected by changes in the supply chain, i.e. in other datasets. This dataset was generated following the ecoinvent quality guidelines for version 2. It may have been subject to central changes described in the ecoinvent version 3 change report (http://www.ecoinvent.org/database/ecoinvent-version-3/reports-of-changes/), and the results of the central updates were reviewed extensively. The changes added e.g. consistent water flows and other information throughout the database. The documentation of this dataset can be found in the ecoinvent reports of version 2, which are still available via the ecoinvent website. The change report linked above covers all central changes that were made during the conversion process.]

## Included activities end
The module includes fuel input, infrastructure, emissions to air, and working materials for operation.

## Geography
Natural gas input modelled for Switzerland. Process applicable in central European conditions.

## Technology
Hybrid system combining a 125 kWe solid oxide fuel cell (SOFC) with tubular stack design and a 55kWe micro gas turbine. For central cogeneration use. Performance, stack lifetime and catalyst use according to expected future values for a serial product. Operation with connection to low pressure gas network. Electrical efficiency 58%, total efficiency 80%. Operation as base load engine with low partial load hours.

## Parameters
- fraction, process water, to air: 0.15 dimensionless; name fraction_PW_to_air; lognormal variance with pedigree 0.092025, pedigree (4,4,3,2,4)
- fraction, tap water, to air: 0.15 dimensionless; name fraction_TW_to_air; lognormal variance with pedigree 0.092025, pedigree (4,4,3,2,4)

## Reference product
- heat, future: 1 MJ; By-product classification allocatable product; CPC 17300: Steam and hot water
  EcoSpold01Location=CH
  production volume 0 MJ
    Future technology, not available today.
  property Corresponding fuel use 4.14125 MJ; name fuel_use; = 0.11655*35.532/1
    Lower heating value of the fuel input related to the heat/electricity output
  property exergy 0.169678 MJ
    allocation factor for electricity (=1) vs. heat, where heat is calculated as the termodynamic mean temperature Tm = (Tfeed-Treturn)/ln(Tfeed/Treturn), relative to the application temperature (Tu, typically = 293 K), i.e. (Tm-Tu)/Tm
  property price 0.0106 EUR2005
    Average European district heat price from Ecoheatcool and Euroheat 2005-2006, Ecoheat Work package 1: The European heat market. Final report. 10.6 EUR/GJ i s the price of district heat. http://www.solarthermalworld.org/files/Ecoheatcool%20WP1%20Web.pdf?download
  properties: allocation factor 0.060469, carbon allocation 0 kg, carbon content 0, heating value, net 1 MJ, true value 0.00537921, true value relation 0.169678

## Inputs from technosphere
- fuel cell, solid oxide, with micro gas turbine, 180kW electrical, future: 3.79306e-9 unit; lognormal variance with pedigree 0.3532, pedigree (2,3,5,5,1)
  EcoSpold01Location=CH
  Uncertainty of life time
  Uncertainty: uncertainty of life time
- lubricating oil: 4.67261e-8 kg; lognormal variance with pedigree 0.0446, pedigree (3,3,5,5,1)
  EcoSpold01Location=RER
  Company data for 100kWel micro gas turbine
  Uncertainty: company data for 100kWel micro gas turbine
  properties: carbon content, fossil 0.75, dry mass 1 kg, heating value, net 40.2 MJ, wet mass 1 kg
  note on carbon content, fossil: Lubricating oil is produced from diesel. C-content/dry mass of fats and oils considered 75%, from: ecoinvent v2.2 report, n 15a, pg 40
  note on heating value, net: Literature value, Source: IPCC 2006, 2006 IPCC Guidelines for National Greenhouse Gas Inventories, Prepared by the National Greenhouse Gas Inventories Programme, Eggleston H.S., Buendia L., Miwa K., Ngara T. and Tanabe K. (eds). Published: IGES, Japan
- maintenance, solid oxide fuel cell, with micro gas turbine, 180kW electrical, future: 3.40825e-8 unit; lognormal variance with pedigree 0.0432, pedigree (2,3,5,5,1)
  EcoSpold01Location=CH
  Uncertainty of maintenance cycle
  Uncertainty: uncertainty of maintenance cycle
- natural gas, low pressure: 6.76099e-5, 0.000126688, 0.000187162, 0.000228611, 0.000356588, 0.000264, 5.52147e-5, 0.000101199, 0.000921334, 0.000310071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 m3 (16 suppliers, which the file names only by identifier); sum of these 0.00704767 m3; lognormal variance with pedigree 0.2106, pedigree (5,5,5,5,5)
  Input
  EcoSpold01Location=CH
  Uncertainty: input
  properties: carbon content, fossil 0.695187, dry mass 1 kg, heating value, gross 40 MJ, heating value, net 36 MJ, wet mass 1 kg
  note on carbon content, fossil: C content considered the same as in high pressure (consumption mix)
  note on heating value, net: Literature value, Source: Christoph Meili;Niels Jungbluth;Maresa Bussa (2021) Life cycle inventories of crude oil and natural gas extraction. ESU-services Ltd. commissioned by BAFU & VSG, Schaffhausen, Switzerland, http://esu-services.ch/data/public-lci-reports/
- storage, 10'000 l: 2.70187e-9 unit; lognormal variance with pedigree 0.3532, pedigree (2,3,5,5,1)
  EcoSpold01Location=RER
  Uncertainty of life time
  Uncertainty: uncertainty of life time
- tap water: 7.0385e-9, 1.07296e-8, 2.00209e-8, 5.39349e-8, 6.49231e-9, 2.70558e-7, 3.09614e-6, 2.30713e-6 kg (8 suppliers, which the file names only by identifier); sum of these 5.77204e-6 kg; lognormal variance with pedigree 0.056, pedigree (3,4,5,5,1)
  Company data
  EcoSpold01Location=CH
  Uncertainty: company data
  properties: carbon content, fossil 0.00178991, dry mass 0.000337476 kg, water content 2962.17, wet mass 1 kg
  note on carbon content, fossil: Bicarbonate content is 2.93 mol/m3. CO2 content is 0.1 mol/m3 (ecoinvent v2.2 report 8, Tab 93.1).
- waste mineral oil: -3.71937e-8, -1.4205e-8 kg (2 suppliers, which the file names only by identifier); sum of these -5.13987e-8 kg
  Calculated from oil input
  EcoSpold01Location=CH
  production volume
    Calculated from the production volume of heat, future in proportion to the respective output amounts.
  properties: carbon content, fossil 0.864444, dry mass 0.9 kg, heating value, net 34.7 MJ, water content 0.111111, wet mass 1 kg
  note on carbon content, fossil: Tab A.6, ecoinvent v2.2 report 13_I. C content has been calculated after data in the tables, and then referred to 1 kg DM
  note on heating value, net: Value taken from the general comment of the treatment dataset.

## Emissions to nature
- Carbon dioxide, fossil [air, urban air close to ground]: 0.0153921 kg; lognormal variance with pedigree 0.0512, pedigree (2,5,5,5,1)
  Composition of natural gas
  Uncertainty: composition of natural gas
- Carbon monoxide, fossil [air, urban air close to ground]: 4.67261e-7 kg; lognormal variance with pedigree 0.6932, pedigree (2,3,5,5,1)
  Estimate based on fuel cell references
  Uncertainty: estimate based on fuel cell references
- Methane, fossil [air, urban air close to ground]: 1.09944e-6 kg; lognormal variance with pedigree 0.1106, pedigree (4,3,5,5,1)
  Estimate based on fuel cell references
  Uncertainty: estimate based on fuel cell references
- NMVOC, non-methane volatile organic compounds [air, urban air close to ground]: 1.92401e-7 kg; lognormal variance with pedigree 0.1006, pedigree (4,3,5,5,1)
  Estimate based on fuel cell references
  Uncertainty: estimate based on fuel cell references
- Nitrogen oxides [air, urban air close to ground]: 3.02345e-6 kg; lognormal variance with pedigree 0.118, pedigree (4,5,5,5,1)
  Estimate based on fuel cell and micro gas turbine references
  Uncertainty: estimate based on fuel cell and micro gas turbine references
- Sulfur dioxide [air, urban air close to ground]: 1.51173e-7 kg; lognormal variance with pedigree 0.0512, pedigree (2,5,5,5,1)
  Composition of natural gas
  Uncertainty: composition of natural gas
- Water [air, unspecified]: 8.65865e-10 m3; name water_to_air_unspecified; lognormal variance with pedigree 0.0827, pedigree (2,2,5,5,1)
  Calculated value based on literature values and expert opinion. See comments in the parametres' comment field.
  property fraction, origin: fresh water 1; name fraction_origin_fresh_water
  property fraction, origin: salt water 0; name fraction_origin_salt_water
  property fraction, origin: unspecified 0; name fraction_origin_unspecified
- Water [water, unspecified]: 4.90657e-9 m3; name water_to_water_unspecified; lognormal variance with pedigree 0.0827, pedigree (2,2,5,5,1)
  (same comment as for Water)
  property carbon content, fossil 0; name C_content_fossil
  property carbon content, non-fossil 0; name C_content_non_fossil
  property dry mass 0 kg; name DM
  property fraction, origin: fresh water 1; name fraction_origin_fresh_water_Ww
  property fraction, origin: salt water 0; name fraction_origin_salt_water_Ww
  property fraction, origin: unspecified 0; name fraction_origin_unspecified_Ww
  property water in wet mass 1000 kg; name WWM
  property wet mass 1000 kg; name WM

## Sampling procedure
Literature data and manufacturer information

## Extrapolations
none This dataset has been copied from an original dataset covering the geography CH. The uncertainty has been adjusted accordingly.

## Review by Rolf Frischknecht 2007-08-13
passed
none

## Review by Emilia Moreno Ruiz 2012-04-16
calculation of fuel use property.
