# autoclaved aerated concrete block production

Dataset: EcoSpold 2, unit process
Geography: RoW
Time period: 1995-01-01 to 2023-12-31
Technology level: current
Classification: EcoSpold01Categories: construction materials/bricks
Classification: ISIC rev.4 ecoinvent: 2395:Manufacture of articles of concrete, cement and plaster
Synonyms: Bimshohlblockstein; Ytong
Tags: combined production; ConvertedDataset
Scenario: Business-as-Usual
System model: Allocation, cut-off by classification
Generated by: Daniel Kellenberger (obsolete)
Published in: Kellenberger D. 2004
Database: ecoinvent
isCopyrightProtected: true
accessRestrictedTo: 1

## General comment
Hardening is assumed to be by air-drying. It is assumed that there is wastewater and solid waste, but as no exact description on the composition of the wastewater and solid waste is available a proxy for each ("treatment, concrete production effluent, to wastewater treatment, class 3" and "disposal, municipal solid waste, 22.9% water, to municipal incineration") is used. The lifespan of the plant is assumed to be 50 years.
[This dataset was already contained in the ecoinvent database version 2. It was not individually updated during the transfer to ecoinvent version 3. Life Cycle Impact Assessment results may still have changed, as they are affected by changes in the supply chain, i.e. in other datasets. This dataset was generated following the ecoinvent quality guidelines for version 2. It may have been subject to central changes described in the ecoinvent version 3 change report (http://www.ecoinvent.org/database/ecoinvent-version-3/reports-of-changes/), and the results of the central updates were reviewed extensively. The changes added e.g. consistent water flows and other information throughout the database. The documentation of this dataset can be found in the ecoinvent reports of version 2, which are still available via the ecoinvent website. The change report linked above covers all central changes that were made during the conversion process.]

## Included activities end
includes the raw materials, their transport to the finishing plant, the energy for the autoclaving process, the packaging, the infrastructure and the disposal of wastewater and some solid household (e.g. packing material) waste

## Geography
For some exchanges CH, RER and GLO modules have been used as proxy.

## Technology
The raw materials (sand/gravel, quicklime, anhydrite, cement and aluminium powder) are mixed with water and poured into a mould. The aluminium powder is reacting with the alcaline and siliceous additives and forms, by hydrogen release, pores with a diameter between 2 and 3mm.

## Parameters
- fraction, process water, to air: 0.15 dimensionless; name fraction_PW_to_air; lognormal variance with pedigree 0.092025, pedigree (4,4,3,2,4)
- fraction, tap water, to air: 0.15 dimensionless; name fraction_TW_to_air; lognormal variance with pedigree 0.092025, pedigree (4,4,3,2,4)

## Reference product
- autoclaved aerated concrete block: 1 kg; name RP; By-product classification allocatable product; CPC 37510: Non-refractory mortars and concretes; HS2017 6810: Cement, concrete or artificial stone; whether or not reinforced, articles thereof
  EcoSpold01Location=CH
  production volume 1.65186e9 kg; name RP_PV; = 705300000000*636/102947
    Estimated value. Accordinf the the USGS the amount of Porland cement sold as blocks is 636 thousand metric tons out of 102947 total cement sold. The prodduction volume is here therefore calculated from the Porland cement production volume 705300000000 (value from the ecoinvent dataset "cement production, Portland, GLO 2009", accessed 20171025), assuming the same share reported in USGS.
  property carbon content, fossil 0
    The hardened autoclaved aereated concrete blocks consits mainly of calcium silicate hydrate and air voids (ecoinvent v2.2 report 7, part XXI, pg 7)
  property carbon content, non-fossil 0
    (same comment as for autoclaved aerated concrete block)
  property price 0.077 EUR2005
    Data are not easily available. Therefore, an average price of products supplied by the activities in the same ISIC 3 code has been applied.This price is obtained as '_49 Concrete, asphalt and other mineral products, EU27 virgin, EU27' in the 'EU & DK Input Output Database' (available in SimaPro). The price is assumed to be valid for both RER2003, RER 2004, world 2003 and world 2004.
  properties: carbon allocation 0 kg, carbon content 0, dry mass 1 kg, water content 0, water in wet mass 0 kg, wet mass 1 kg

## Inputs from technosphere
- aluminium, cast alloy: 0.0007 kg; = 0.0007*RP; lognormal variance with pedigree 0.102, pedigree (3,5,5,5,1)
  flow is multiplied by the reference product as the activity is a combined production
  EcoSpold01Location=RER
  properties: dry mass 1 kg, wet mass 1 kg
- anhydrite: 0.044 kg; = 0.044*RP; lognormal variance with pedigree 0.102, pedigree (3,5,5,5,1)
  EcoSpold01Location=CH
  flow is multiplied by the reference product as the activity is a combined production
  properties: dry mass 0.984 kg, water content 0.0162602, wet mass 1 kg
- cement, Portland: 0.236615, 0.00896646, 0.0119623, 0.000542963, 0.000495032, 0.000482473, 0.00061538, 0.000320363 kg (8 suppliers, which the file names only by identifier); sum of these 0.26 kg; = 0.26*RP+ash*0; lognormal variance with pedigree 0.102, pedigree (3,5,5,5,1)
  flow is multiplied by the reference product as the activity is a combined production
  EcoSpold01Location=CH
  properties: dry mass 1 kg, wet mass 1 kg
- clay pit infrastructure: 1.67e-10 unit; = 0.000000000167*RP; lognormal variance with pedigree 0.692, pedigree (1,1,5,5,1)
  estimated. flow is multiplied by the reference product as the activity is a combined production
  EcoSpold01Location=CH
- diesel, burned in building machine: 0.0252 MJ; = 0.0252*RP; lognormal variance with pedigree 0.102, pedigree (3,5,5,5,1)
  flow is multiplied by the reference product as the activity is a combined production
  EcoSpold01Location=GLO
  properties: heating value, net 1 MJ
- electricity, medium voltage: 5.23695e-5, 4.65783e-6, 0.000406112, 0.000532171, 0.000563571, 0.000287055, 3.96467e-5, 0.000250934, 1.05926e-5, 0.00169592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 kWh (47 suppliers, which the file names only by identifier); sum of these 0.0575 kWh; = 0.0575*RP; lognormal variance with pedigree 0.102, pedigree (3,5,5,5,1)
  flow is multiplied by the reference product as the activity is a combined production
  EcoSpold01Location=UCTE
- heat, district or industrial, natural gas: 0.0076605, 0.466178, 0.172161 MJ (3 suppliers, which the file names only by identifier); sum of these 0.646 MJ; = 0.646*RP; lognormal variance with pedigree 0.102, pedigree (3,5,5,5,1)
  (same comment as for aluminium, cast alloy)
  properties: heating value, net 1 MJ
- municipal solid waste: -2.12448e-7, -1.60287e-7, -1.57008e-7, -0.000119863, -4.03791e-6, -1.76531e-8, -5.66632e-9, -1.28074e-8, -5.33177e-7 kg (9 suppliers, which the file names only by identifier); sum of these -0.000125 kg; = 0.000125*RP; lognormal variance with pedigree 0.652, pedigree (1,1,1,5,1)
  EcoSpold01Location=CH
  estimated. flow is multiplied by the reference product as the activity is a combined production
  production volume; = msw* RP_PV/ABS( RP)
    Calculated from the production volume of autoclaved aerated concrete block in proportion to the respective output amounts.
  properties: carbon content, fossil 0.171549, carbon content, non-fossil 0.261655, dry mass 0.771 kg, heating value, net 11.74 MJ, water content 0.297017, wet mass 1 kg
  note on carbon content, fossil: MSW composition in tab 4.1, ecoinvent v2.2 report 13_I. C content referred to 1 kg DM
  note on heating value, net: Value taken from the general comment of the treatment dataset.
- packing, clay product: 1 kg; = 1*RP; lognormal variance with pedigree 0.692, pedigree (1,1,5,5,1)
  (same comment as for municipal solid waste)
- quicklime, milled, packed: 0.104 kg; = 0.104*RP; lognormal variance with pedigree 0.102, pedigree (3,5,5,5,1)
  (same comment as for cement, Portland)
  properties: dry mass 0.99 kg, water content 0.010101, wet mass 1 kg
- sand: 0.0076276, 0.496372 kg (2 suppliers, which the file names only by identifier); sum of these 0.504 kg; = 0.504*RP; lognormal variance with pedigree 0.102, pedigree (3,5,5,5,1)
  (same comment as for cement, Portland)
  properties: dry mass 1 kg, wet mass 1 kg
- tap water: 0.000235406, 0.000358857, 0.000669609, 0.00180388, 0.000217139, 0.103552, 0.0771633 kg (7 suppliers, which the file names only by identifier); sum of these 0.184 kg; = 0.184*RP; source Dansk Teknologisk Institut 1995; lognormal variance with pedigree 0.0546, pedigree (3,3,5,5,1)
  EcoSpold01Location=RER
  Calculated based on literature, (Vionnet, S., Quantis Water Database - Technical Report, 2012).flow is multiplied by the reference product as the activity is a combined production
  properties: carbon content, fossil 0.00178991, dry mass 0.000337476 kg, water content 2962.17, wet mass 1 kg
  note on carbon content, fossil: Bicarbonate content is 2.93 mol/m3. CO2 content is 0.1 mol/m3 (ecoinvent v2.2 report 8, Tab 93.1).
- wastewater from concrete production: -8.33e-5 m3; name wastewater_output; = 0.0000833*RP; lognormal variance with pedigree 0.652, pedigree (1,1,1,5,1)
  (same comment as for clay pit infrastructure)
  production volume; = wastewater_output* RP_PV/ABS( RP)
    (same comment as for municipal solid waste)
  properties: carbon content, fossil 0.027074, dry mass 0.449139 kg, water content 2225.48, wet mass 1000 kg
  note on carbon content, fossil: TOC =0.01216 kg/m3 (Tab A.20, ecoinvent v2.2 report 13_I). TOC was considered as Total Carbon.

## Emissions to nature
- Water [air, unspecified]: 2.76e-5 m3; name water_to_air_unspecified; = 0.0000276*RP; lognormal variance with pedigree 0.0827, pedigree (2,2,5,5,1)
  Calculated value based on literature values and expert opinion. See comments in the parametres' comment field.flow is multiplied by the reference product as the activity is a combined production
  property fraction, origin: fresh water 1; name fraction_origin_fresh_water
  property fraction, origin: salt water 0; name fraction_origin_salt_water
  property fraction, origin: unspecified 0; name fraction_origin_unspecified
- Water [water, unspecified]: 7.31e-5 m3; name water_to_water_unspecified; = 0.0000731*RP; lognormal variance with pedigree 0.0827, pedigree (2,2,5,5,1)
  Calculated value based on literature values and expert opinion. See comments in the parametres' comment field. flow is multiplied by the reference product as the activity is a combined production
  property carbon content, fossil 0; name C_content_fossil
  property carbon content, non-fossil 0; name C_content_non_fossil
  property dry mass 0 kg; name DM
  property fraction, origin: fresh water 1; name fraction_origin_fresh_water_Ww
  property fraction, origin: salt water 0; name fraction_origin_salt_water_Ww
  property fraction, origin: unspecified 0; name fraction_origin_unspecified_Ww
  property water in wet mass 1000 kg; name WWM
  property wet mass 1000 kg; name WM

## Sampling procedure
Literature

## Extrapolations
See geography This dataset has been copied from an original dataset covering the geography CH. The uncertainty has been adjusted accordingly.

## Review by Roberto Dones 2004-04-05
passed
