# clinker production

Dataset: EcoSpold 2, unit process
Geography: TN
Time period: 2019-01-01 to 2023-12-31
Technology level: current
Classification: ISIC rev.4 ecoinvent: 2394:Manufacture of cement, lime and plaster
Classification: EcoSpold01Categories: construction materials/binder
Synonyms: Portland cement clinker; dry rotary kiln; clinker
Tags: combined production
Scenario: Business-as-Usual
System model: Allocation, cut-off by classification
Share of production covered: 15 %
Generated by: Makrem Cherni
Published in: Cherni Makrem 2022
Database: ecoinvent
isCopyrightProtected: true
accessRestrictedTo: 1

## General comment
The dataset describes the production of Portland cement clinker in Tunisia.
Clinker is the main constituent of Portland cement and also the main responsible for its environmental impacts. Clinker is made by sintering a mixture composed mainly of limestone and clay (called “raw meal”) at temperatures up to 1450 °C. Both primary and secondary fuels are used to this end. After sintering, clinker nodules have a diameter between 5 mm and 25 mm.
Clinker consists of various calcium silicates including alite (3CaO.SiO2 or “C3S”) and belite (2CaO.SiO2 or “C2S”). Tricalcium aluminate (3CaO.Al2O3 or “C3A”) and calcium aluminoferrite (4CaO.Al2O3.Fe2O3 or “C4AF”) are other common components, added to reduce the sintering temperature of the calcium silicates. For special cement types, such as low heat and sulfate resistant, it is necessary to limit the amount of tricalcium aluminate formed.
Pyroprocessing, and cement preparation: - Raw material extraction - Crushing of raw material - Pre-homogenization and raw meal grinding
- Pre-calcining - Production of clinker - Cooling and storage - Clinker grinding and the cement manufacturing process - Milling of cement
After the kiln, clinker is cooled and stored in silos. Clinker production plants are usually integrated with cement plants.
Primary data were gathered from one cement manufacturer in Tunisia who informed the total values of inputs and outputs related to clinker production in 2019 considering all their clinker production sites. All types of flows were reported, namely: primary and secondary raw materials and fuels, auxiliary materials, electricity consumption, water consumption and air emissions (from emissions monitoring reports). It corresponds to 15% of the market share, considered a good representativeness level.
SOURCES:
Schorcht, F., Kourti, I., Scalet, B.M., Roudier, S., Sancho, L.D., 2013. Best available techniques (BAT) reference document for the production of cement, lime and magnesium oxide. Eur. Comm. Jt. Res. Cent. Inst. Prospect. Technol. Stud. Rep. EUR 26129 EN Luxemb. Publ. Off. Eur. Union
Boesch, M.E., Koehler, A., Hellweg, S., 2009. Model for Cradle-to-Gate Life Cycle Assessment of Clinker Production. Environ. Sci. Technol. 43, 7578–7583. https://doi.org/10.1021/es900036e

## Included activities start
The dataset includes the preparation of raw materials (drying, grinding and homogeneization) and fuels (drying-grinding), preheating and precalcining steps, clinker production in the rotary kiln, cooling and storage in silos. Water is used mainly for dust control. Auxiliary materials for factory maintenance are considered. Air emissions stem mainly from the rotary kiln exhaust.

## Included activities end
This activity ends with the storage after cooling of the produced clinker. It includes the whole manufacturing processes to produce clinker (raw material provision, grinding and mixing; rotary kiln process. No administration is included.

## Geography
This dataset represents production of clinker for Tunisia. Data come from one cement manufacturer in Tunisia.

## Technology
Current technology for clinker production in Tunisian dry kilns, considering various fuel types.
In Tunisia, cement plants use dry kilns with preheater and precalciner, being a total of nine cement plants (eight gray clinker and one white clinker) (dry). This dataset represents data for gray clinker from one cement manufacturer. Regarding fuel types, 88,1% are fossil fuels (petroleum coke), 11% biomass (olive poumace) and 0,9% natural gas (data from 2019).
Sources:
Single Market Profile: TUNISIA 2022.
Institut National de la Statistique. Statistiques Tunisie. BULLETIN MENSUEL DES STATISTIQUES. Janvier 2020

## Time period
The dataset represents a cement plant in Tunisia. The time period is set according to the historical data (2019) collected from the industry.
Data correspond to 2019.

## Reference product
- clinker: 1 kg; By-product classification allocatable product; CPC 37430: Cement clinkers; HS2017 252310: Cement clinkers (whether or not coloured)
  Gray clinker for use in cement.
  production volume 6.83302e9 kg; name clinker_production_TN; = 8096*10^6*0.844
    Total production volume of hydraulic cement in Tunisia in 2019: 8'096'000 metric ton. Source: USGS (2019). U.S. Geological Survey, Minerals Yearbook Annual Tables, 2019. Available at: https://www.usgs.gov/centers/national-minerals-information-center/cement-statistics-and-information
    .
    Average clinker to cement ratio in the sample is 0,844
  property price 0.047 EUR2005
    Calculated value based on data from United Nations Commodity Trade Statistics Database (comtrade.un.org). UN comtrade category: 252310 Cement Clinkers. Using exchange rate of 1EURO = 1.209 USD. Average of price of import into 5 main markets (EU, US, JP, IN and CN).
  properties: carbon allocation 0 kg, carbon content 0, carbon content, fossil 0, carbon content, non-fossil 0, dry mass 1 kg, water content 0, water in wet mass 0 kg, wet mass 1 kg

## Inputs from technosphere
- calcareous marl: 0.349 kg; = 0.349*clinker + 0*olivepoumace; lognormal variance with pedigree 0.0032, pedigree (1,3,3,1,1)
  Measured data, based on an annual average. Data provided by the manufacturer. Raw material for clinker production, source of (Ca and Al).
  properties: carbon content, fossil 0.087767, dry mass 1 kg, wet mass 1 kg
- cement factory: 6.27e-12 unit; = 6.27E-12*clinker + 0*olivepoumace; source Kellenberger D. 2007; lognormal variance with pedigree 0.3126, pedigree (4,3,3,5,1)
  Literature Value. 2007, Kellenberger D., Althaus H.-J., Jungbluth N., Künniger T., Life Cycle Inventories of Building Products, Final report ecoinvent data v2.0, 7, Dübendorf, CH, Swiss Centre for LCI, Empa - TSL, 3 - SeparatePublication, CD-ROM
  Uncertainty: Variance of log-transformed data was taken from ecoinvent report no 1, table 10.3. Value represents demand of infrastructure for input/output group c.
- diesel: 3.23e-5 kg; = 3,23E-5* clinker + 0*olivepoumace; lognormal variance with pedigree 0.0046, pedigree (1,4,3,1,1)
  Measured value. Annual average of values informed by manufacturer. Fuel used in factory equipment and heavy engine (fortklift-excavator).
  Uncertainty: B
  properties: carbon content, fossil 0.865, carbon dioxide factor 74 kg/GJ, dry mass 1 kg, heating value, net 42.8 MJ, wet mass 1 kg
  note on carbon content, fossil: C-content of diesel is 86.5% (ecoinvent v2.2 report 6_IV, Tab 3.14)
- electricity, medium voltage: 0.0735 kWh; = 0,0735* clinker + 0*olivepoumace; lognormal variance with pedigree 0.0046, pedigree (1,4,3,1,1)
  Measured value. Annual average of values informed by manufacturer. Electricity used to operate the crusher, mill, the rotary kiln and the clinker cooler.
  Uncertainty: B
- iron ore, crude ore, 46% Fe: 0.0593 kg; = 0,0593*clinker + 0*olivepoumace; lognormal variance with pedigree 0.0046, pedigree (1,4,3,1,1)
  Measured value. Annual average of value informed by manufacturer. Raw material for clinker production (source of Fe).
  Uncertainty: B
  properties: dry mass 1 kg, wet mass 1 kg
- limestone, crushed, for mill: 1.25 kg; = 1,25*clinker + 0*olivepoumace; lognormal variance with pedigree 0.0046, pedigree (1,4,3,1,1)
  Measured value. Weighted average of value informed by manufacturer. Raw material for clinker production.
  Uncertainty: B
  properties: carbon content, fossil 0.11, dry mass 0.998 kg, water content 0.00200401, wet mass 1 kg
- lubricating oil: 9.15e-6 kg; name lubricating_oil_input; = 9,15E-6* clinker + 0*olivepoumace; lognormal variance with pedigree 0.0046, pedigree (1,4,3,1,1)
  Measured value. Annual average of values informed by manufacturer. Lubrication of factory equipment.
  Uncertainty: B
  properties: carbon content, fossil 0.75, dry mass 1 kg, heating value, net 40.2 MJ, wet mass 1 kg
  note on carbon content, fossil: Lubricating oil is produced from diesel. C-content/dry mass of fats and oils considered 75%, from: ecoinvent v2.2 report, n 15a, pg 40
  note on heating value, net: Literature value, Source: IPCC 2006, 2006 IPCC Guidelines for National Greenhouse Gas Inventories, Prepared by the National Greenhouse Gas Inventories Programme, Eggleston H.S., Buendia L., Miwa K., Ngara T. and Tanabe K. (eds). Published: IGES, Japan
- natural gas, low pressure: 0.000989936 m3; = 0,000989936*clinker + 0*olivepoumace; lognormal variance with pedigree 0.0046, pedigree (1,4,3,1,1)
  Measured value. Annual average of the values communicated by the manufacturer. Fuel used in the kiln. Natural gas is used in the cement kiln for the initial start-up of the kiln (use less than 1% of the kiln energy demand).
  Uncertainty: B
  properties: carbon content, fossil 0.741, carbon dioxide factor 56.13 kg/GJ, dry mass 0.735 kg, heating value, gross 40 MJ, heating value, net 36 MJ, wet mass 0.735 kg
  note on heating value, gross: At standard conditions, and assuming amount equal to that of high pressure; based on Meili et al. (2022) section 5.2
- petroleum coke: 0.088661 kg; = 0,088660986* clinker + 0*olivepoumace; lognormal variance with pedigree 0.0046, pedigree (1,4,3,1,1)
  Measured value. Annual average of value informed by manufacturer. Fuel used in kiln.
  Uncertainty: B
  properties: carbon content, fossil 0.8685, carbon dioxide factor 92 kg/GJ, dry mass 1 kg, heating value, net 35 MJ, wet mass 1 kg
  note on carbon content, fossil: C-content is 86.85%, Value from the manufacturer. The carbon content of the petroleum coke was obtained by elemental analysis.
  note on carbon dioxide factor: Value from the manufacturer. Emission factor from laboratory analysis.
- refractory, basic, packed: 0.000182 kg; = 1,82E-4* clinker + 0*olivepoumace; lognormal variance with pedigree 0.0046, pedigree (1,4,3,1,1)
  Measured value. Weighted average of values informed by the manufacturer. Replacement of refractory used in kiln.
  Uncertainty: B
  properties: dry mass 1 kg, wet mass 1 kg
- refractory, fireclay, packed: 5.9e-5 kg; = 5,90e-5* clinker + 0*olivepoumace; lognormal variance with pedigree 0.0072, pedigree (2,4,3,5,1)
  Value extrapolated from clinker production/BR. Replacement of refractory used in kiln. Proportion between refractory types extrapolated from clinker production/BR (accessed 15.08.2022).
  Uncertainty: B
  properties: dry mass 1 kg, wet mass 1 kg
- refractory, high aluminium oxide, packed: 3.4e-5 kg; = 3,4E-5* clinker + 0*olivepoumace; lognormal variance with pedigree 0.0052, pedigree (2,4,3,1,1)
  Measured value. Annual average of value informed by manufacturers. Replacement of refractory used in kiln.
  Uncertainty: B
  properties: dry mass 1 kg, wet mass 1 kg
- sand: 0.00687 kg; = 0,00687*clinker + 0*olivepoumace; lognormal variance with pedigree 0.0046, pedigree (1,4,3,1,1)
  Measured value. Annual average of the values communicated by the manufacturer. Raw material for clinker production.
  Uncertainty: B
  properties: dry mass 1 kg, wet mass 1 kg
- scrap steel: -0.000116 kg; name waste_steel; = 1,16E-4* clinker + 0*olivepoumace; lognormal variance with pedigree 0.0032, pedigree (2,4,1,1,1)
  Data collected from manufacturer. The steel used in the replacement of the machinery must be disposed of after use. Therefore, same amount as steel input is used to model the waste.
  Uncertainty: B
  production volume; = clinker_production_TN*abs(waste_steel)/clinker
    Calculated from the production volume of clinker in proportion to the respective output amounts.
  properties: dry mass 1 kg, wet mass 1 kg
- steel, chromium steel 18/8, hot rolled: 0.000116 kg; name steel_input; = 1,16E-4* clinker + 0*olivepoumace; lognormal variance with pedigree 0.0046, pedigree (1,4,3,1,1)
  Measured value. Annual average of values informed by manufacturer. Replacement of steel wear parts of factory equipment (cables, steel, motors, parts).
  Uncertainty: B
  properties: carbon content, fossil 0.0008, dry mass 1 kg, wet mass 1 kg
  note on carbon content, fossil: Stainless steel model is the grade 304 steel (18/8 stainless, 18% chromium 8% nickel; max. 0.08% C)
- synthetic rubber: 5.34e-6 kg; name rubber_input; = 5,34E-6*clinker + 0*olivepoumace; lognormal variance with pedigree 0.0046, pedigree (1,4,3,1,1)
  Measured value. Annual average of values informed by manufacturer. Replacement of rubber wear parts of factory equipment (belts, tyres).
  Uncertainty: B
  properties: carbon content, fossil 0.871949, dry mass 1 kg, heating value, net 26.42 MJ, wet mass 1 kg
  note on carbon content, fossil: EPDM (Ethylene-propene-diene terpolymer) rubber is a terpolymer of ethylene, propene, and a diene with the residual unsaturated portion of the diene in the side chain (ecoinvent v2.2 report 7-part XX & Ullmann). Chemical formula (deduced from Evidences of Solvent-Induced Miscibility in Polychloroprene-co-Ethylene-Propene Diene Terpolymer Blends, Dubey et al., Journal of Applied Polymer Science, 2009, 111:1884-1891): C20H35
- tap water: 0.148 kg; name tapwater_input; = 0,148* clinker + 0*olivepoumace; lognormal variance with pedigree 0.0046, pedigree (1,4,3,1,1)
  Measured value. Annual average values informed by manufacturer. Water for cooling and dust control and used in the factory (e.g. bathrooms, cleaning, etc.).
  Uncertainty: B
  properties: carbon content, fossil 0.00178991, dry mass 0.000337476 kg, water content 2962.17, wet mass 1 kg
  note on carbon content, fossil: Bicarbonate content is 2.93 mol/m3. CO2 content is 0.1 mol/m3 (ecoinvent v2.2 report 8, Tab 93.1).
- waste mineral oil: -9.15e-6 kg; name wasteoil; = 9,15E-6* clinker + 0*olivepoumace; lognormal variance with pedigree 0.0026, pedigree (1,4,1,1,1)
  It's assumed that the lubricating oil must be disposed of after use (the lubricating oil is used to lube the machinery and does not become part of the product). Therefore, same amount as lubricating oil input is used to model the waste.
  production volume; = clinker_production_TN*abs(wasteoil)/clinker
    (same comment as for scrap steel)
  properties: carbon content, fossil 0.75, dry mass 0.9 kg, heating value, net 34.7 MJ, water content 0.111111, wet mass 1 kg
  note on heating value, net: Value taken from the general comment of the treatment dataset.
- waste rubber, unspecified: -5.34e-6 kg; name w_rubber; = 5,34E-6*clinker + 0*olivepoumace; lognormal variance with pedigree 0.0033, pedigree (2,4,1,3,1)
  It's assumed that the rubber (used for wear parts of factory equipment, such as belt and tyres) must be disposed of after use. Therefore, same amount as input of rubber is considered.
  production volume; = clinker_production_TN*abs(w_rubber)/clinker
    (same comment as for scrap steel)
  properties: carbon content, fossil 0.87195, dry mass 1 kg, heating value, net 27.19 MJ, wet mass 1 kg
- wastewater, average: -2e-5 m3; name wastewater; = 2E-5* clinker + 0*olivepoumace; lognormal variance with pedigree 0.0032, pedigree (2,4,1,1,1)
  Estimation. Calculated as: (tap water used in sanitary/1000)* clinker. Only tap water used in sanitary leave as an effluent (for wastewater treatment). Sanitary water = 2,00e-05 m3
  Uncertainty: B
  production volume; = clinker_production_TN*abs( wastewater)/clinker
    (same comment as for scrap steel)
  properties: carbon content, non-fossil 0.194039, dry mass 0.346837 kg, water content 2882.2, wet mass 1000 kg
  note on carbon content, non-fossil: 0.0673 kg TOC/m3 (Tab A.17, ecoinvent v2.2 report 13_I). TOC was considered as Total Carbon.

## Emissions to nature
- Antimony ion [air, unspecified]: 1.18e-8 kg; = 1,18E-8*clinker + 0*olivepoumace; lognormal variance with pedigree 0.6521, pedigree (1,2,3,1,1)
  Measured data. Instantaneous measurement carried out in 2019, (measurement campaign carried out by the National Agency for Environmental Protection ANPE), data provided by the manufacturer.
  Uncertainty: B
- Arsenic ion [air, unspecified]: 1.39e-8 kg; = 1,39E-8*clinker + 0*olivepoumace; lognormal variance with pedigree 0.6521, pedigree (1,2,3,1,1)
  (same comment as for Antimony ion)
- Cadmium II [air, unspecified]: 6.824e-9 kg; = 6,824E-9*clinker + 0*olivepoumace; lognormal variance with pedigree 0.6546, pedigree (2,4,3,1,1)
  (same comment as for Antimony ion)
- Carbon dioxide, fossil [air, unspecified]: 0.818 kg; = 0,818*clinker + 0*olivepoumace; lognormal variance with pedigree 0.0052, pedigree (2,4,3,1,1)
  Calculated value. Consumption of fossil fuels x lower heating value x CO2 emission factor (in terms of energy), based on information delivered by the manufacturer. (CO2 emission factors from fossil fuel based on laboratory analysis). CO2 from process based on XRF analysis of clinker. Weighted average of individual values. CO2 of calcination = 0.531 kg/kg clinker. CO2 of fossil combustion (petroluem coke+natural gas) = 0.287 kg/kg clinker.
- Carbon dioxide, non-fossil [air, unspecified]: 0.02792 kg; = 0,02792*clinker + 0*olivepoumace; source EPA 2016; lognormal variance with pedigree 0.0052, pedigree (2,4,3,1,1)
  Calculated value. Consumption of biomass fuels (olive pomace) x lower heating value x CO2 emission factor (in terms of energy), based on information delivered by manufacturer or, alternatively, taken from the EPA 2016: Greenhouse Gas Inventory Guidance; Direct Emission from Stationary Combustion Sources" database (CO2 emission factors). Weighted average of individual values. Biomass fuels: olive pomace (11% biomass).
  Uncertainty: B
- Carbon monoxide, fossil [air, unspecified]: 0.00158 kg; = 1,58E-3*clinker + 0*olivepoumace; lognormal variance with pedigree 0.6546, pedigree (2,4,3,1,1)
  Measured data, based on an annual average. Determined from hourly data records from continuous emissions monitoring systems (CEMS). Data provided by the manufacturer.
  Uncertainty: B
- Chromium III [air, unspecified]: 1.08e-7 kg; = 1,08E-7*clinker + 0*olivepoumace; lognormal variance with pedigree 0.654, pedigree (1,4,3,1,1)
  (same comment as for Antimony ion)
- Cobalt II [air, unspecified]: 4.18e-9 kg; = 4.18E-9* clinker + 0*olivepoumace; lognormal variance with pedigree 0.654, pedigree (1,4,3,1,1)
  (same comment as for Antimony ion)
- Copper ion [air, unspecified]: 2.59e-8 kg; = 2.59E-8* clinker + 0*olivepoumace; lognormal variance with pedigree 0.6526, pedigree (1,3,3,1,1)
  (same comment as for Antimony ion)
- Dioxins, measured as 2,3,7,8-tetrachlorodibenzo-p-dioxin [air, unspecified]: 7.18e-14 kg; = 7,18e-14* clinker + 0*olivepoumace; lognormal variance with pedigree 0.3047, pedigree (2,2,3,5,1)
  Value was extrapolated from clinker production/BR (accessed 15.08.2022).
  Uncertainty: B
- Hydrocarbons, unspecified [air, non-urban air or from high stacks]: 1.85e-5 kg; = 1,85e-5*clinker + 0*olivepoumace; lognormal variance with pedigree 0.0466, pedigree (2,4,3,5,1)
  Value was extrapolated from clinker production/BR, since similar amount of petroleum coke is given. (accessed 15.08.2022). "Hydrocarbons, unspecified" used as proxy for "total hydrocarbons".
  Uncertainty: B
- Hydrochloric acid [air, unspecified]: 1.406e-5 kg; = 1,406E-5* clinker + 0*olivepoumace; lognormal variance with pedigree 0.044, pedigree (1,4,3,1,1)
  (same comment as for Antimony ion)
- Hydrogen fluoride [air, unspecified]: 7.201e-7 kg; = 7,201E-7* clinker + 0*olivepoumace; lognormal variance with pedigree 0.044, pedigree (1,4,3,1,1)
  (same comment as for Antimony ion)
- Lead II [air, unspecified]: 4.43e-8 kg; = 4,43E-8* clinker + 0*olivepoumace; lognormal variance with pedigree 0.654, pedigree (1,4,3,1,1)
  (same comment as for Antimony ion)
- Manganese II [air, unspecified]: 1.81e-7 kg; = 1.81E-7*clinker + 0*olivepoumace; lognormal variance with pedigree 0.654, pedigree (1,4,3,1,1)
  (same comment as for Antimony ion)
- Mercury II [air, unspecified]: 2.54e-8 kg; = 2.54E-8* clinker + 0*olivepoumace; lognormal variance with pedigree 0.654, pedigree (1,4,3,1,1)
  (same comment as for Antimony ion)
- Nickel II [air, unspecified]: 5.91e-8 kg; = 5,91E-8* clinker + 0*olivepoumace; lognormal variance with pedigree 0.654, pedigree (1,4,3,1,1)
  (same comment as for Antimony ion)
- Nitrogen oxides [air, unspecified]: 0.003567 kg; = 3.567E-3* clinker + 0*olivepoumace; lognormal variance with pedigree 0.0446, pedigree (2,4,3,1,1)
  (same comment as for Carbon monoxide, fossil)
- Particulate Matter, < 2.5 um [air, non-urban air or from high stacks]: 4.69968e-5 kg; = 4,69968E-05* clinker + 0*olivepoumace; lognormal variance with pedigree 0.3066, pedigree (2,4,3,5,1)
  Measured value. Weighted average of values informed by manufacturers. Manufacturers only informed total particulate matter emission which is 7,34683E-05 kg. The proportion between particle sizes was extrapolated from clinker production/ BR (accessed 15.09.2022).
  Uncertainty: B
- Particulate Matter, > 10 um [air, non-urban air or from high stacks]: 1.10345e-5 kg; = 1,10345E-05* clinker + 0*olivepoumace; lognormal variance with pedigree 0.0466, pedigree (2,4,3,5,1)
  Measured value. Weighted average of values informed by manufacturers. Manufacturers only informed total particulate matter emission which is 7,34683E-05 kg. The proportion between particle sizes was extrapolated from clinker production/ BR (accessed 15.09.2022).
  Uncertainty: E
- Particulate Matter, > 2.5 um and < 10um [air, non-urban air or from high stacks]: 1.54369e-5 kg; = 1,54369E-05* clinker + 0*olivepoumace; lognormal variance with pedigree 0.1266, pedigree (2,4,3,5,1)
  (same comment as for Particulate Matter, < 2.5 um)
- Selenium IV [air, unspecified]: 4.34e-9 kg; = 4,34E-9* clinker + 0*olivepoumace; lognormal variance with pedigree 0.654, pedigree (1,4,3,1,1)
  (same comment as for Antimony ion)
- Sulfur dioxide [air, unspecified]: 2.33e-5 kg; = 2.33E-5* clinker + 0*olivepoumace; lognormal variance with pedigree 0.0052, pedigree (2,4,3,1,1)
  Measured value. Weighted average of values informed by the manufacturer.
- Thallium I [air, unspecified]: 1.57e-8 kg; = 1.57E-8* clinker + 0*olivepoumace; lognormal variance with pedigree 0.654, pedigree (1,4,3,1,1)
  (same comment as for Antimony ion)
- Tin ion [air, unspecified]: 4.89e-8 kg; = 4,89E-8* clinker + 0*olivepoumace; lognormal variance with pedigree 0.654, pedigree (1,4,3,1,1)
  (same comment as for Antimony ion)
- Water [air, unspecified]: 0.000128 m3; name evaporatedwater; = (0.148/1000-0.00002)*clinker + 0*olivepoumace; lognormal variance with pedigree 0.0052, pedigree (2,4,3,1,1)
  Estimation. Calculated as: (tap water input - 0.00002/1000))*clinker. All water input except for water used in sanitary (bathroom) was considered to leave the system as evaporated water, as water is used for cooling.
  Uncertainty: B
- Zinc II [air, unspecified]: 3.92e-7 kg; = 3.92E-7* clinker + 0*olivepoumace; lognormal variance with pedigree 0.658, pedigree (3,4,3,5,1)
  Estimated data. Value extrapolated from clinker/BR (accessed 15.09.2022).
  Uncertainty: B

## Sampling procedure
Primary data were gathered from one cement manufacturer in Tunisia, who informed the total values of inputs and outputs related to clinker production in 2019, considering all their clinker production sites. All types of flows were reported, namely: primary and secondary raw materials and fuels, auxiliary materials, electricity consumption, water consumption and air emissions (from emissions monitoring reports). It corresponds to 15% market share, considered a good representativeness level.
The manufacturer unit flows were calculated, considering its clinker production volume as the weighing factor. This dataset represents the average clinker production for Tunisia. Basic uncertainty was calculated based on the sample's weighted standard deviation.
Water consumption was usually reported for the whole integrated cement plants (clinker + cement production operations). Based on literature and expert opinion, the total water volume was divided equally between the clinker and the cement production processes. Raw materials and fuel inputs were considered to be dry. As water is mainly used for cooling, it was considered that all water evaporates, except for the water input, which was considered to be used as drinking water and whose output is modelled as an effluent.
Fuel consumption was informed by manufacturer in terms of volume or mass. CO2 emissions (both fossil and biogenic) were calculated from fuel inputs. As CO2 emission factors are expressed in terms of energy (kg/GJ), fuel consumption was converted into energy by multiplying them to the corresponding lower heating values. Both the CO2 emission factors and heating values are informed in the "exchange properties" field.
The manufacturer reported the air emissions. Emission are approximated from other ecoinvent regional datasets: proportion between refractory types; proportion between particulate size classes and the infrastructure flow "industrial machine, heavy, unspecified".
The amounts of the exchanges were calculated considering the weighted average of the sample. No conversion to the geometric mean of the lognormal distribution was done, for consistency reasons with other ecoinvent datasets.

## Extrapolations
Primary data corresponding to 15% of the Tunisian cement production were used to represent clinker production on a national scale. Some flows were extrapolated from the clinker production/BR dataset (accessed 30.07.2022).

## Review by Bruno Peuportier 2023-05-02
All explanations and corrections have been completed
