# biomethane, low pressure burned in solid oxide fuel cell 125kWe, future

Dataset: EcoSpold 2, unit process
Geography: RoW
Time period: 2000-01-01 to 2023-12-31
Technology level: current
Classification: ISIC rev.4 ecoinvent: 35:Electricity, gas, steam and air conditioning supply
Classification: EcoSpold01Categories: biomass/cogeneration
Synonyms: Festkeramik Brennstoffzelle; solid oxide fuel cell; oxidkeramische Hochtemperaturbrennstoffzelle; Festoxid Brennstoffzelle
Tags: ConvertedDataset; with true value
Scenario: Business-as-Usual
System model: Allocation, cut-off by classification
Generated by: Alex Primas
Published in: Primas A. 2007
Database: ecoinvent
isCopyrightProtected: true
accessRestrictedTo: 1

## General comment
The multioutput-process 'biogas, burned in SOFC fuel cell 125kWe delivers the coproducts 'heat, biogas, allocation exergy, at SOFC fuel cell 125kWe' and 'electricity, biogas, allocation exergy, at SOFC fuel cell 125kWe' . The exergy allocation is the allocation scheme suggested to be used within the ecoinvent database (e.g. in electricity mixes).
[This dataset was already contained in the ecoinvent database version 2. It was not individually updated during the transfer to ecoinvent version 3. Life Cycle Impact Assessment results may still have changed, as they are affected by changes in the supply chain, i.e. in other datasets. This dataset was generated following the ecoinvent quality guidelines for version 2. It may have been subject to central changes described in the ecoinvent version 3 change report (http://www.ecoinvent.org/database/ecoinvent-version-3/reports-of-changes/), and the results of the central updates were reviewed extensively. The changes added e.g. consistent water flows and other information throughout the database. The documentation of this dataset can be found in the ecoinvent reports of version 2, which are still available via the ecoinvent website. The change report linked above covers all central changes that were made during the conversion process.]

## Included activities end
The module includes fuel input, infrastructure, emissions to air, and working materials for operation.

## Geography
Biogas input modelled for conditions in Switzerland. Process applicable in central European conditions.

## Technology
Solid oxide fuel cell (SOFC) with unpressurised tubular stack design for central cogeneration use. Performance, stack lifetime and catalyst use according to expected future values for a serial product. Operation with refined biogas from low pressure gas network. Electrical efficiency 47%, total efficiency 80%. Operation as base load engine with low partial load hours.

## Parameters
- fraction, process water, to air: 0.15 dimensionless; name fraction_PW_to_air; lognormal variance with pedigree 0.092025, pedigree (4,4,3,2,4)
- fraction, tap water, to air: 0.15 dimensionless; name fraction_TW_to_air; lognormal variance with pedigree 0.092025, pedigree (4,4,3,2,4)

## Reference product
- heat, future: 1 MJ; By-product classification allocatable product; CPC 17300: Steam and hot water
  EcoSpold01Location=CH
  production volume 0 MJ
    Unknown
    Calculated from the production volume of methane, 96% by volume, from biogas, low pressure, at user in proportion to the respective output amounts.
  property exergy 0.169678 MJ
    allocation factor for electricity (=1) vs. heat, where heat is calculated as the termodynamic mean temperature Tm = (Tfeed-Treturn)/ln(Tfeed/Treturn), relative to the application temperature (Tu, typically = 293 K), i.e. (Tm-Tu)/Tm
  property price 0.0106 EUR2005
    Average European district heat price from Ecoheatcool and Euroheat 2005-2006, Ecoheat Work package 1: The European heat market. Final report. 10.6 EUR/GJ i s the price of district heat. http://www.solarthermalworld.org/files/Ecoheatcool%20WP1%20Web.pdf?download
  properties: allocation factor 0.10645, carbon allocation 0 kg, carbon content 0, heating value, net 1 MJ, true value 0.00185946, true value relation 0.169678

## Inputs from technosphere
- biomethane, low pressure: 0.322575 MJ
  properties: carbon content, non-fossil 0.695496, dry mass 0.0218341 kg, wet mass 0.0218341 kg
- fuel cell, solid oxide, 125kW electrical, future: 5.19346e-9 unit; lognormal variance with pedigree 0.3532, pedigree (2,3,5,5,1)
  Uncertainty of life time
  EcoSpold01Location=CH
  Uncertainty: uncertainty of life time
- maintenance, solid oxide fuel cell, 125kW electrical, future: 4.67734e-8 unit; lognormal variance with pedigree 0.0432, pedigree (2,3,5,5,1)
  EcoSpold01Location=CH
  Uncertainty of maintenance cycle
  Uncertainty: uncertainty of maintenance cycle
- storage, 10'000 l: 3.70961e-9 unit; lognormal variance with pedigree 0.3532, pedigree (2,3,5,5,1)
  EcoSpold01Location=RER
  Uncertainty of life time
  Uncertainty: uncertainty of life time
- tap water: 9.44045e-9, 1.43912e-8, 2.68532e-8, 7.23405e-8, 8.70786e-9, 3.62888e-7, 4.15271e-6, 3.09446e-6 kg (8 suppliers, which the file names only by identifier); sum of these 7.7418e-6 kg; lognormal variance with pedigree 0.056, pedigree (3,4,5,5,1)
  EcoSpold01Location=CH
  Company data
  Uncertainty: company data
  properties: carbon content, fossil 0.00178991, dry mass 0.000337476 kg, water content 2962.17, wet mass 1 kg
  note on carbon content, fossil: Bicarbonate content is 2.93 mol/m3. CO2 content is 0.1 mol/m3 (ecoinvent v2.2 report 8, Tab 93.1).

## Emissions to nature
- Carbon dioxide, non-fossil [air, urban air close to ground]: 0.0180071 kg; lognormal variance with pedigree 0.0512, pedigree (2,5,5,5,1)
  Composition of biogas
  Uncertainty: composition of biogas
- Carbon monoxide, non-fossil [air, urban air close to ground]: 5.48377e-7 kg; lognormal variance with pedigree 0.6932, pedigree (2,3,5,5,1)
  Estimate based on different references
  Uncertainty: estimate based on different references
- Methane, non-fossil [air, urban air close to ground]: 1.2903e-6 kg; lognormal variance with pedigree 0.1106, pedigree (4,3,5,5,1)
  Estimate based on few references
  Uncertainty: estimate based on few references
- NMVOC, non-methane volatile organic compounds [air, urban air close to ground]: 2.25802e-7 kg; lognormal variance with pedigree 0.1006, pedigree (4,3,5,5,1)
  Estimate based on different references
  Uncertainty: estimate based on different references
- Nitrogen oxides [air, urban air close to ground]: 6.4515e-7 kg; lognormal variance with pedigree 0.0832, pedigree (2,3,5,5,1)
  Estimate based on different references
  Uncertainty: estimate based on different references
- Sulfur dioxide [air, urban air close to ground]: 1.77416e-7 kg; lognormal variance with pedigree 0.0512, pedigree (2,5,5,5,1)
  Composition of natural gas
  Uncertainty: composition of natural gas
- Water [air, unspecified]: 1.1613e-9 m3; name water_to_air_unspecified; lognormal variance with pedigree 0.0827, pedigree (2,2,5,5,1)
  Calculated value based on literature values and expert opinion. See comments in the parametres' comment field.
  property fraction, origin: fresh water 1; name fraction_origin_fresh_water
  property fraction, origin: salt water 0; name fraction_origin_salt_water
  property fraction, origin: unspecified 0; name fraction_origin_unspecified
- Water [water, unspecified]: 6.58067e-9 m3; name water_to_water_unspecified; lognormal variance with pedigree 0.0827, pedigree (2,2,5,5,1)
  (same comment as for Water)
  property carbon content, fossil 0; name C_content_fossil
  property carbon content, non-fossil 0; name C_content_non_fossil
  property dry mass 0 kg; name DM
  property fraction, origin: fresh water 1; name fraction_origin_fresh_water_Ww
  property fraction, origin: salt water 0; name fraction_origin_salt_water_Ww
  property fraction, origin: unspecified 0; name fraction_origin_unspecified_Ww
  property water in wet mass 1000 kg; name WWM
  property wet mass 1000 kg; name WM

## Sampling procedure
Literature data and manufacturer information

## Extrapolations
none This dataset has been copied from an original dataset covering the geography CH. The uncertainty has been adjusted accordingly.

## Review by Rolf Frischknecht 2007-08-13
passed
none
