# catch crop growing, sunflower, August-October, organic fertiliser 30 kg N

Dataset: EcoSpold 2, unit process
Geography: CH
Time period: 2011-01-01 to 2023-12-31
Technology level: current
Classification: ISIC rev.4 ecoinvent: 0161:Support activities for crop production
Scenario: Business-as-Usual
System model: Allocation, cut-off by classification
Generated by: Thomas Nemecek
Database: ecoinvent
isCopyrightProtected: true
accessRestrictedTo: 1

## General comment
This dataset represents the cultivation of sunflower silage on an area of 1 ha. The dry matter yield is 3534.3 kg/ha. The moisture content of the silage at storage is 75%.

## Included activities start
This activity starts after the harvest of the previous crop. The input of seeds is included. Farm manure as an organic fertiliser - if applied - is only accounted for in terms of direct field emissions; all pre-processes are included in the animal production systems.

## Included activities end
The dataset includes all machine operations and corresponding machine infrastructure and sheds. Machine operations are: soil cultivation, sowing, manuring - if manure is applied -, mowing, haying, swathing, baling, bale loading and transport of silage bales to the farm. Further, direct field emissions are included. This activity ends after the transport of the bales to the farm at the farm gate.

## Technology
Swiss integrated production

## Reference product
- sunflower silage: 1 kg; name REF_PRODUCT; source Lehmann J. 1991; By-product classification allocatable product; CPC 01919: Forage products, n.e.c.; HS2017 1206: Sunflower seeds; whether or not broken
  Dry matter yield per hectare; calculated based on Lehmann (1991): dry matter yield at 25 kg N/ha; 5% added due to higher fertilisation; 10% of silage loss are subtracted (Agridea 2007). --- Sources: AGRIDEA (2007) Landwirtschaftliches Handbuch Pflanzen und Tiere. Wirz Kalender, 2007. Ed. AGRIDEA, Lindau (Switzerland).
  production volume 612500 kg; = 3500*175
    Area of sunflowers in Switzerland 2012: 3,500ha (BLW, Agrarbericht 2013). 10% estimated as sunflower silage (own estimate), 50% of it for this inventory (since 2 different inventories for ryegrass silage in Switzerland).
  property carbon content, non-fossil 0.4216; name REF_PRODUCT_C_content_non_fossil
    Composition data obtained from 'Sonnenblumenganzpflanze, vor Blüte, Silage' in Swiss Feed Database ('Schweizerische Futtermitteldatenbank. V1.0'; http://www.feed-alp.admin.ch/start.php?action=adv_search&cmd=list_feed). First, composition data were refered to 1 kg dry mass. Then, C-contents were calculated considering a C-content/dry mass of 44% in carbohydrates (including fibres), 53% in proteins and 75% in fats. All data from ecoinvent report, n 15a, pg 40, except C-content in protein, that comes from Determination of protein concentration by total organic carbon analysis, Rouwenhorst et al., 1991, J Biochem and Biophys Methods, 22:119-128.
  property dry mass 1 kg; name REF_PRODUCT_DM
  property energy content 17.17 MJ
    Gross calorific value of 'Sonnenblumenganzpflanze, vor Blüte, Silage' in Swiss Feed Database ('Schweizerische Futtermitteldatenbank. V1.0'; http://www.feed-alp.admin.ch/start.php?action=adv_search&cmd=list_feed).
  property price 0.098 EUR2005
    Calculated value based on data from United Nations Commodity Trade Statistics Database (comtrade.un.org). UN comtrade category: 230630 Sunflower seed oil-cake and other solid residues. Year 2006. Using exchange rate of 1EURO = 1.209 USD. Average of price of import into 5 main markets (EU, US, JP, IN and CN).
  properties: carbon allocation 0.4216 kg, carbon content 0.4216, carbon content, fossil 0, water content 3, water in wet mass 3 kg, wet mass 4 kg

## Inputs from technosphere
- bale loading: 0.00571429 unit; source Nemecek, T. 2007; lognormal variance with pedigree 0.0092, pedigree (2,1,4,1,1)
  Calculated from fresh matter yield (25% dry matter content) and bale weigth of 700 kg (fresh matter; Nemecek 2007).
  This exchange has an activity link directly to the producing activity because the product is primarily consumed in the same geographical area where it is produced.
- baling: 0.00571429 unit; source Nemecek, T. 2007; lognormal variance with pedigree 0.0092, pedigree (2,1,4,1,1)
  (same comment as for bale loading)
- haying, by rotary tedder: 0.000565883 ha; source Boessinger M. 2004; lognormal variance with pedigree 0.0092, pedigree (2,1,4,1,1)
  Assumption based on the number of cuts and current practice in Switzerland (cf. Boessinger et. al 2004)
  This exchange has an activity link directly to the producing activity because the product is primarily consumed in the same geographical area where it is produced.
- liquid manure spreading, by vacuum tanker: 0.00652942 m3; source Flisch R. 2009; lognormal variance with pedigree 0.0092, pedigree (2,1,4,1,1)
  Calculated based on the amount of applied nitrogen. Data on nutrient content of slurry from Flisch (2009). Slurry represents the only input of nitrogen.
  This exchange has an activity link directly to the producing activity because the product is primarily consumed in the same geographical area where it is produced.
- mowing, by rotary mower: 0.000282941 ha; source Boessinger M. 2004; lognormal variance with pedigree 0.0092, pedigree (2,1,4,1,1)
  (same comment as for haying, by rotary tedder)
- sowing: 0.000282941 ha; source Boessinger M. 2004; lognormal variance with pedigree 0.0092, pedigree (2,1,4,1,1)
  (same comment as for haying, by rotary tedder)
- sunflower seed, for sowing: 0.00990295 kg; name SEED; source Lehmann J. 1991; lognormal variance with pedigree 0.0092, pedigree (2,1,4,1,1)
  property carbon content, non-fossil 0.776596; name SEED_C_content_non_fossil
  property dry mass 0.94 kg; name SEED_DM
  property energy content 28.435 MJ; name SEED_energy_content
  note on energy content: See chapter 'Product Properties' in '01_crop production - yields & inputs CH & Europe_v1.0.pdf', section 'AGRICULTURAL PRODUCTION IN SWITZERLAND' - pdf-document on the dedicated talk page of ecoinvent (www.ecoinvent.org/documentation)
- swath, by rotary windrower: 0.000282941 ha; source Boessinger M. 2004; lognormal variance with pedigree 0.0092, pedigree (2,1,4,1,1)
  (same comment as for haying, by rotary tedder)
- tillage, cultivating, chiselling: 0.000282941 ha; source Boessinger M. 2004; lognormal variance with pedigree 0.0092, pedigree (2,1,4,1,1)
  (same comment as for haying, by rotary tedder)
- tillage, harrowing, by rotary harrow: 0.000282941 ha; source Boessinger M. 2004; lognormal variance with pedigree 0.0092, pedigree (2,1,4,1,1)
  (same comment as for haying, by rotary tedder)
- transport, tractor and trailer, agricultural: 0.001 metric ton*km; lognormal variance with pedigree 0.1364, pedigree (4,1,4,1,1)
  Transport of silage bales to farm; distance 1 km.

## Inputs from nature
- Carbon dioxide, in air [natural resource, in air]: 1.51936 kg; = 44/12 * (REF_PRODUCT_C_content_non_fossil * REF_PRODUCT * REF_PRODUCT_DM - SEED_C_content_non_fossil * SEED * SEED_DM); lognormal variance with pedigree 0.0498, pedigree (2,2,4,1,1)
  Modelled,see chapter 'CO2 binding' in '01_crop production_direct field emissions and natural resources_v1.0.pdf' - pdf-document on the dedicated talk page of ecoinvent (www.ecoinvent.org/documentation)
- Energy, gross calorific value, in biomass [natural resource, biotic]: 17.17 MJ; lognormal variance with pedigree 0.0099, pedigree (2,3,4,3,1)
  (same comment as for sunflower silage)
- Occupation, annual crop [natural resource, land]: 0.589141 m2*year; lognormal variance with pedigree 0.0109, pedigree (2,1,4,1,1)
  Modelled, see chapter 'Land use' in '01_crop production_direct field emissions and natural resources_v1.0.pdf' - pdf-document on the dedicated talk page of ecoinvent (www.ecoinvent.org/documentation)
- Transformation, from annual crop [natural resource, land]: 2.82941 m2; lognormal variance with pedigree 0.0169, pedigree (2,1,4,1,1)
  (same comment as for Occupation, annual crop)
- Transformation, to annual crop [natural resource, land]: 2.82941 m2; lognormal variance with pedigree 0.0169, pedigree (2,1,4,1,1)
  (same comment as for Occupation, annual crop)

## Emissions to nature
- Ammonia [air, non-urban air or from high stacks]: 0.00495066 kg; lognormal variance with pedigree 0.017, pedigree (2,2,4,1,1)
  Modelled with the 'AGRAMMON model' described in '01_crop production_direct field emissions and natural resources_v1.0.pdf' - pdf-document on the dedicated talk page of ecoinvent (www.ecoinvent.org/documentation)
- Dinitrogen monoxide [air, non-urban air or from high stacks]: 0.000326592 kg; name N2O; lognormal variance with pedigree 0.0498, pedigree (2,2,4,1,1)
  Modelled, see chapter 'Emissions of N2O to the air' in '01_crop production_direct field emissions and natural resources_v1.0.pdf' - pdf-document on the dedicated talk page of ecoinvent (www.ecoinvent.org/documentation)
- Nitrogen oxides [air, non-urban air or from high stacks]: 6.85842e-5 kg; = 0.21*N2O; lognormal variance with pedigree 0.0498, pedigree (2,2,4,1,1)
  Modelled, see chapter 'Emissions of NOx to the air' in '01_crop production_direct field emissions and natural resources_v1.0.pdf' - pdf-document on the dedicated talk page of ecoinvent (www.ecoinvent.org/documentation)
- Cadmium II [soil, agricultural]: 2.85941e-8 kg; lognormal variance with pedigree 0.0498, pedigree (2,2,4,1,1)
  Modelled, see chapter 'Emissions of heavy metals to agricultural soil, surface water and ground water' in '01_crop production_direct field emissions and natural resources_v1.0.pdf' - pdf-document on the dedicated talk page of ecoinvent (www.ecoinvent.org/documentation)
- Chromium III [soil, agricultural]: -2.29737e-6 kg
  (same comment as for Cadmium II)
- Copper ion [soil, agricultural]: 3.74926e-6 kg; lognormal variance with pedigree 0.0498, pedigree (2,2,4,1,1)
  (same comment as for Cadmium II)
- Lead II [soil, agricultural]: 9.88224e-7 kg; lognormal variance with pedigree 0.0498, pedigree (2,2,4,1,1)
  (same comment as for Cadmium II)
- Mercury II [soil, agricultural]: 7.87568e-8 kg; lognormal variance with pedigree 0.0498, pedigree (2,2,4,1,1)
  (same comment as for Cadmium II)
- Nickel II [soil, agricultural]: 8.0013e-7 kg; lognormal variance with pedigree 0.0498, pedigree (2,2,4,1,1)
  (same comment as for Cadmium II)
- Zinc II [soil, agricultural]: 2.09272e-5 kg; lognormal variance with pedigree 0.0498, pedigree (2,2,4,1,1)
  (same comment as for Cadmium II)
- Cadmium II [water, ground-]: 2.94684e-9 kg; lognormal variance with pedigree 0.0951, pedigree (2,2,4,1,1)
  (same comment as for Cadmium II)
- Cadmium II [water, surface water]: 4.0919e-11 kg; lognormal variance with pedigree 0.0951, pedigree (2,2,4,1,1)
  (same comment as for Cadmium II)
- Chromium III [water, ground-]: 3.14934e-6 kg; lognormal variance with pedigree 0.0951, pedigree (2,2,4,1,1)
  (same comment as for Cadmium II)
- Chromium III [water, surface water]: 1.07127e-8 kg; lognormal variance with pedigree 0.0951, pedigree (2,2,4,1,1)
  (same comment as for Cadmium II)
- Copper ion [water, ground-]: 9.5495e-7 kg; lognormal variance with pedigree 0.0951, pedigree (2,2,4,1,1)
  (same comment as for Cadmium II)
- Copper ion [water, surface water]: 4.15217e-9 kg; lognormal variance with pedigree 0.0951, pedigree (2,2,4,1,1)
  (same comment as for Cadmium II)
- Lead II [water, ground-]: 2.93722e-8 kg; lognormal variance with pedigree 0.0951, pedigree (2,2,4,1,1)
  (same comment as for Cadmium II)
- Lead II [water, surface water]: 7.02742e-12 kg; lognormal variance with pedigree 0.0951, pedigree (2,2,4,1,1)
  (same comment as for Cadmium II)
- Mercury II [water, ground-]: 2.84752e-9 kg; lognormal variance with pedigree 0.0951, pedigree (2,2,4,1,1)
  (same comment as for Cadmium II)
- Nickel II [water, surface water]: 1.02552e-10 kg; lognormal variance with pedigree 0.0951, pedigree (2,2,4,1,1)
  (same comment as for Cadmium II)
- Nitrate [water, ground-]: 0.00572873 kg; lognormal variance with pedigree 0.0498, pedigree (2,2,4,1,1)
  Modelled with the 'SALCA-NO3 model' described in '01_crop production_direct field emissions and natural resources_v1.0.pdf' - pdf-document on the dedicated talk page of ecoinvent (www.ecoinvent.org/documentation)
- Phosphate [water, ground-]: 1.32942e-5 kg; lognormal variance with pedigree 0.0498, pedigree (2,2,4,1,1)
  Modelled, see chapter 'Emissions of phosphorous to the water' in '01_crop production_direct field emissions and natural resources_v1.0.pdf' - pdf-document on the dedicated talk page of ecoinvent (www.ecoinvent.org/documentation)
- Phosphate [water, surface water]: 3.73367e-5 kg; lognormal variance with pedigree 0.0498, pedigree (2,2,4,1,1)
  (same comment as for Phosphate)
- Zinc II [water, ground-]: 6.05713e-6 kg; lognormal variance with pedigree 0.0951, pedigree (2,2,4,1,1)
  (same comment as for Cadmium II)
- Zinc II [water, surface water]: 2.9109e-8 kg; lognormal variance with pedigree 0.0951, pedigree (2,2,4,1,1)
  (same comment as for Cadmium II)

## Sampling procedure
Data collected from literature and expert knowledge; some own estimates.

## Review by Thomas Nemecek 2011-12-16
Passed internally.
