# tinplate scrap, sorted to generic market for iron scrap, sorted, pressed

Dataset: EcoSpold 2, unit process
Geography: Europe without Switzerland
Time period: 2012-01-01 to 2023-12-31
Technology level: current
Classification: ISIC rev.4 ecoinvent: 3830:Materials recovery
Scenario: Business-as-Usual
System model: Allocation, cut-off by classification
Generated by: Carl Vadenbo
Database: ecoinvent
isCopyrightProtected: true
accessRestrictedTo: 1

## General comment
According to Haupt (2018), when tinplate is exported from Switzerland, it mostly enters the recycling without prior detinning. Since the process for de-tinning in Switzerland was unavailable for confidentiality reasons, it was assumed that the full amount of tin plate in Europe gets recycled without prior detinning. This renaming activity therefore converts 'tinplate scrap, sorted' into 'iron scrap, sorted, pressed'.
Literature: Melanie Haupt, Thomas Kägi, Stefanie Hellweg, 2018, Life cycle inventories of waste management processes., Data in Brief, 19, 1441-1457. DOI: 10.1016/j.dib.2018.05.067

## Included activities start
The activity starts with tinplate scrap being available to this activity.

## Included activities end
The activity ends with 'iron scrap, sorted, pressed' being available for transportation.

## Geography
Europe without Switzerland

## Reference product
- iron scrap, sorted, pressed: 1 kg; By-product classification Recyclable; CPC 39310: Slag, dross, scalings and other waste from the manufacture of iron or steel; HS2017 261900: Slag, dross; (other than granulated slag), scalings and other waste from the manufacture of iron or steel
  production volume 4.42e8 kg; = 13000000*(28-0.8)/0.8
    PV value is scaled from the CH value given that Switzerland accounts for 0.8% of the global GDP while the whole of Europe (RER) represents 28% of global GDP.
    Based on Haupt et al. (2017): The amount of tinplate scrap sorted in Switzerland is estimated to 13'000 tonnes in 2012. This value is obtained from figure 4. Reference: Haupt, Melanie & Vadenbo, Carl & Hellweg, Stefanie. (2017). Do We Have the Right Performance Indicators for the Circular Economy?: Insight into the Swiss Waste Management System. Journal of Industrial Ecology. vol. 21, no. 3, pp. 615-627.
  property price 0.175 EUR2005
    Temporary price data. Calculated as 90% of purchasers price based on: 2005 import and export prices (total trades (USD) divided by total weight (kg) in biggest economies of the world: EU27, USA, Brasil, China, India, Japan and Russia) from UN Commodity Trade Statistics Database (http://data.un.org/Explorer.aspxDatabase [Accessed 2011.06.20]). Commodity: Waste or scrap, of cast iron
  properties: carbon allocation 0 kg, carbon content 0, carbon content, fossil 0, carbon content, non-fossil 0, dry mass 1 kg, water content 0, water in wet mass 0 kg, wet mass 1 kg

## Inputs from technosphere
- tinplate scrap, sorted: 1 kg
  properties: dry mass 1 kg, wet mass 1 kg

## Extrapolations
This is a renaming activity, converting 'tinplate scrap, sorted' into 'iron scrap, sorted, pressed'.
