# tomato production, fresh grade, in unheated greenhouse

Dataset: EcoSpold 2, unit process
Geography: RoW
Time period: 2006-01-01 to 2023-12-31
Technology level: current
Classification: ISIC rev.4 ecoinvent: 0113:Growing of vegetables and melons, roots and tubers
Tags: WFLDB
Scenario: Business-as-Usual
System model: Allocation, cut-off by classification
Generated by: [System]
Database: ecoinvent
isCopyrightProtected: true
accessRestrictedTo: 1

## General comment
This global dataset is a copy of the regional ES dataset, except for the following modifications.
The production volume represents the global annual production.
The geographicalCorrelation score of every pedigree matrix of was changed to '5'.
Yield of the global dataset = 165000 kg/ha, calculated as a weighted average of the regional yields.
The comments below were part of the ES regional dataset.
This dataset represents the production of 1 kg of loose classic tomato for fresh consumption. The reference flow is the average yield per ha and year, from 2006 - 2009: yield (165 t/ha) obtained under irrigated conditions (total amount of water 4748 m3/ha). The data are representative of loose classic tomatoes for fresh consumption, produced in Spain (Almeria) for the export market. Mineral NPK fertiliser input is 798-506-1562 kg/ha. No organic fertilisers are applied. Total active ingredients (a.i.) applied as pesticides amount to 32.3 kg a.i./ha.
The dataset was modelled within the project 'World Food LCA database (WFLDB)'. The aim of this project was to provide inventories of a broad variety of agricultural products and processes and to cover for each product at least 50% of the global export market. The export share of fresh grade tomatoes produced in Spain amounts to 10.4 % of the global export (tonnage exported in 2010). The production system regarded in this dataset aimed at representing fresh grade tomatoes produced in Spain for the export market.
PEF-Quality: data quality rating (DQR) = 2.0 (i.e. very good quality). This dataset refers to an average situation; for specific situations exchanges might differ substantially due to site specific parameters

## Included activities start
This activity starts with soil cultivation after the harvest of the previous crop.

## Included activities end
This activity ends with harvest and transport to the farm gate. Storage is not included.
The dataset includes all activities during a cycle, i.e. all machine operations, corresponding infrastructure, fuel use and sheds. Machine operations include: soil cultivation, fertilisation, pesticide application, harvesting, and on-farm transport. Further, direct field emissions and land use change are included. Irrigation is included, as well as greenhouses infrastructures and energy consumption when relevant. The inputs of seedlings, fertilisers and pesticides as well as packaging of fertilisers and pesticides are considered. Heavy metal uptake by the crop is considered.

## Technology
Conventional production

## Time period
Time period referring to the data source: 2006-2009. Based on expert opinion data is considered to be valid at least up to 2012.

## Reference product
- tomato, fresh grade: 1 kg; name RP; By-product classification allocatable product; CPC 01234: Tomatoes; HS2017 070200: Vegetables; tomatoes, fresh or chilled
  production volume 7.92361e10 kg; name RP_PV
    Source: FAOSTAT. Average, 2009-2012. Global greenhouse non heated was calculated with the share from ES to fresh grade production of NL & ES & MX
  property carbon content, non-fossil 0.383276
    calculation: C-content of components according to ecoinvent report No. 15a. Source of composition: Souci, S.W., Fachmann, W., Kraut, H. (Hg.: Bundesminsiterium fur Ernahrung, Landwirtschaft und Forsten, Bonn) 'Die Zusammensetzung der Lebensmittel - Nahrwerttabellen', medpharm Scientific Publishers Stuttgart, CRC Press; 2000.
  property price 1.09 EUR2005
    Calculated from the trade statistics for the year 2005 published by the UN (COMTRADE database, accessed 20151105) as an average of 5 biggest importers of tomato in the world; USA, DE, UK, FR and NL. Comtrade cathegory: 702: Tomatoes, fresh or chilled.
  properties: carbon allocation 0.197361 kg, carbon content 0.383276, carbon content, fossil 0, dry mass 0.514933 kg, water content 0.942, water in wet mass 0.485067 kg, wet mass 1 kg

## Inputs from technosphere
- ammonia, anhydrous, liquid: 1.64979e-5, 3.20258e-5, 0.000354986, 1.50055e-5, 3.35665e-6, 0.000123363, 1.06045e-5, 3.26882e-5 kg (8 suppliers, which the file names only by identifier); sum of these 0.000588527 kg; source Torellas M. 2012; lognormal variance with pedigree 0.126177, pedigree (2,1,4,5,1)
  Calculated based on literature values or expert estimation: The total amount of nutrient (Torellas et al. 2012) multiplied by the country-share of fertiliser type (IFA 2014). See supporting documentation 'WFLDB-Documentation.pdf' chapter 'Fertiliser application' for L3 and L4 data (https://ecoquery.ecoinvent.org/File/Reports).
  Corresponds to 97.1 kg/ha
  properties: dry mass 1 kg, wet mass 1 kg
- ammonium nitrate: 0.000142516, 0.000483801, 0.000185421 kg (3 suppliers, which the file names only by identifier); sum of these 0.000811738 kg; source Torellas M. 2012; lognormal variance with pedigree 0.126177, pedigree (2,1,4,5,1)
  The exchange has been updated from 'ammonium nitrate, as N' into 'ammonium nitrate' and therefore its amount has been scaled (multiplied) from 0.0003 kg by 2.8573 kg of 'ammonium nitrate' per kg of 'ammonium nitrate, as N'. Original comment of the exchange is: Calculated based on literature values or expert estimation: The total amount of nutrient (Torellas et al. 2012) multiplied by the country-share of fertiliser type (IFA 2014). See supporting documentation 'WFLDB-Documentation.pdf' chapter 'Fertiliser application' for L3 and L4 data (https://ecoquery.ecoinvent.org/File/Reports).
  Corresponds to 46.9 kg/ha
  properties: dry mass 1 kg, wet mass 1 kg
- ammonium sulfate: 0.000298624 kg; source Torellas M. 2012; lognormal variance with pedigree 0.126177, pedigree (2,1,4,5,1)
  Calculated based on literature values or expert estimation: The total amount of nutrient (Torellas et al. 2012) multiplied by the country-share of fertiliser type (IFA 2014). See supporting documentation 'WFLDB-Documentation.pdf' chapter 'Fertiliser application' for L3 and L4 data (https://ecoquery.ecoinvent.org/File/Reports).
  Corresponds to 49.3 kg/ha
  properties: dry mass 1 kg, wet mass 1 kg
- application of plant protection product, by field sprayer: 1.21212e-5 ha; lognormal variance with pedigree 0.166664, pedigree (2,2,4,5,4)
  Expert estimation. Considered 2 applications per crop cycle, one crop cycle per year
- electricity, low voltage: 1.16097e-5, 1.16561e-7, 3.51332e-6, 2.58417e-9, 4.07358e-7, 8.3642e-7, 3.92557e-7, 9.69068e-8, 5.18238e-7, 3.05711e-8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 kWh (47 suppliers, which the file names only by identifier); sum of these 0.00030303 kWh; source Torellas M. 2012; lognormal variance with pedigree 0.126177, pedigree (2,1,4,5,1)
  Literature value or expert estimation (Torellas et al. 2012).
- expanded perlite: 0.0381343 kg; source Torellas M. 2012
  Literature value or expert estimation (Torellas et al. 2012). Substrate: 18'876.5 kg/ha, Perlite lifespan: 3 years.
  properties: dry mass 1 kg, wet mass 1 kg
- greenhouse, plastic walls and roof: 0.0606061 m2*year; source Torellas M. 2012; lognormal variance with pedigree 0.126177, pedigree (2,1,4,5,1)
  Calculated value: 1 ha divided by the yield in kg/ha. Note: greenhouse dataset stands for 1 m2 used over 1 year
  properties: Surface 7 m2, lifetime 25 year
- inorganic nitrogen fertiliser, as N: 9.79618e-8, 2.69029e-6, 1.7984e-6, 4.78112e-7, 2.29874e-5, 2.72685e-6, 1.77793e-6, 3.46521e-7, 2.92818e-5, 1.49867e-6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 kg (63 suppliers, which the file names only by identifier); sum of these 0.0029409 kg; source Torellas M. 2012; lognormal variance with pedigree 0.126177, pedigree (2,1,4,5,1)
  Calculated based on literature values or expert estimation: The total amount of nutrient (Torellas et al. 2012) multiplied by the country-share of fertiliser type (IFA 2014). See supporting documentation 'WFLDB-Documentation.pdf' chapter 'Fertiliser application' for L3 and L4 data (https://ecoquery.ecoinvent.org/File/Reports).
  Corresponds to 25.1 kg/ha
  properties: dry mass 1 kg, wet mass 1 kg
- inorganic phosphorus fertiliser, as P2O5: 9.442e-7, 2.56452e-7, 6.98034e-7, 1.70293e-6, 2.12479e-5, 4.71628e-5, 6.47452e-6, 7.92454e-7, 9.87027e-6, 4.38379e-7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 kg (63 suppliers, which the file names only by identifier); sum of these 0.00299784 kg; source Torellas M. 2012; lognormal variance with pedigree 0.126177, pedigree (2,1,4,5,1)
  Calculated based on literature values or expert estimation: The total amount of nutrient (Torellas et al. 2012) multiplied by the country-share of fertiliser type (IFA 2014). See supporting documentation 'WFLDB-Documentation.pdf' chapter 'Fertiliser application' for L3 and L4 data (https://ecoquery.ecoinvent.org/File/Reports).
  Corresponds to 90.2 kg/ha
  properties: dry mass 1 kg, wet mass 1 kg
- inorganic potassium fertiliser, as K2O: 1.05047e-6, 5.55127e-6, 1.32376e-6, 4.014e-6, 7.47287e-8, 5.97829e-7, 2.39132e-6, 3.52121e-5, 3.57844e-5, 1.1615e-5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 kg (63 suppliers, which the file names only by identifier); sum of these 0.00619515 kg; source Torellas M. 2012; lognormal variance with pedigree 0.126177, pedigree (2,1,4,5,1)
  Calculated based on literature values or expert estimation: The total amount of nutrient (Torellas et al. 2012) multiplied by the country-share of fertiliser type (IFA 2014). See supporting documentation 'WFLDB-Documentation.pdf' chapter 'Fertiliser application' for L3 and L4 data (https://ecoquery.ecoinvent.org/File/Reports).
  Corresponds to 1020.0 kg/ha
  properties: dry mass 1 kg, wet mass 1 kg
- irrigation: 3.17851e-6, 0.00745401, 6.3565e-5, 0.0038789, 4.89711e-5, 0.000131301, 0.0139926, 2.86459e-5, 7.36734e-7, 0.00172149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 m3 (16 suppliers, which the file names only by identifier); sum of these 0.0287758 m3; source Torellas M. 2012; lognormal variance with pedigree 0.126177, pedigree (2,1,4,5,1)
  Literature value: total amount of water used for irrigation (Torellas et al. 2012). See supporting documentation 'WFLDB-Documentation.pdf' chapter 'Water use for irrigation' (https://ecoquery.ecoinvent.org/File/Reports).
  properties: dry mass 0.11 kg, water content 9089.91, wet mass 1000 kg
- packaging film, low density polyethylene: 0.00195495 kg; source Torellas M. 2012
  Literature value or expert estimation (Torellas et al. 2012). Bed plastic: 694.7 kg/ha, LDPE lifespan: 3 years.
  properties: carbon content, fossil 0.857143, dry mass 1 kg, heating value, net 42.47 MJ, wet mass 1 kg
- packaging, for fertilisers: 0.0349477 kg; lognormal variance with pedigree 0.0592, pedigree (4,3,4,5,4)
  Total amount of active substance/s of fertilisers needed for the production of 'tomato, fresh grade' is calculated to be circa 1.75E-02 kg. Fertiliser/s used in this dataset is/are: 'ammonia, liquid', 'ammonium nitrate, as N', 'ammonium sulfate, as N', 'nitrogen fertiliser, as N', 'phosphate fertiliser, as P2O5', 'phosphate rock, as P2O5, beneficiated, dry', 'potassium chloride, as K2O', 'potassium fertiliser, as K2O', 'potassium sulfate, as K2O', 'urea, as N'. The total amount of active substance/s is doubled in order to account for the packaging of the dilluted product of fertiliser/s that is/are applied. Therefore, 3.49E-02 kg of packaging for fertilisers is justified with this exchange.
  properties: carbon content, fossil 0.825301, dry mass 1 kg, heating value, net 25.01 MJ, price 0.0642 EUR2005, wet mass 1 kg
  note on carbon content, fossil: Considering a chemical formula (C2H4)n for polyethylene, carbon content-fossil is calculated to be 0.856286 kg of Carbon per kg of dry mass.
- packaging, for pesticides: 0.0766602 kg; lognormal variance with pedigree 0.0592, pedigree (4,3,4,5,4)
  Total amount of active substance/s of pesticides needed for the production of tomato, fresh grade is calculated to be circa 3.83E-02 kg. Pesticide/s used in this dataset is/are: 'expanded perlite', 'pesticide, unspecified'. The total amount of active substance/s is doubled in order to account for the packaging of the dilluted product of pesticide/s that is/are applied. Therefore, 7.67E-02 kg of packaging for pesticides is justified with this exchange.
  properties: carbon content, fossil 0.85714, dry mass 1 kg, heating value, net 25.97 MJ, price 0.0642 EUR2005, wet mass 1 kg
- pesticide, unspecified: 0.000195758 kg; source Torellas M. 2012; lognormal variance with pedigree 0.0158498, pedigree (2,2,4,5,1)
  Literature value or expert estimation (Torellas et al. 2012).
  Corresponds to 28.5 kg/ha
  properties: carbon content, fossil 0.486978, dry mass 1 kg, wet mass 1 kg
- phosphate rock, beneficiated: 2.78244e-6, 2.78244e-6, 0.000209587 kg (3 suppliers, which the file names only by identifier); sum of these 0.000215152 kg; source Torellas M. 2012; lognormal variance with pedigree 0.126177, pedigree (2,1,4,5,1)
  The exchange has been updated from 'phosphate rock, as P2O5, beneficiated, dry' into 'phosphate rock, beneficiated' and therefore its amount has been scaled (multiplied) from 0.0001 kg by 3.125 kg of 'phosphate rock, beneficiated' per kg of 'phosphate rock, as P2O5, beneficiated, dry'. Original comment of the exchange is: Calculated based on literature values or expert estimation: The total amount of nutrient (Torellas et al. 2012) multiplied by the country-share of fertiliser type (IFA 2014). See supporting documentation 'WFLDB-Documentation.pdf' chapter 'Fertiliser application' for L3 and L4 data (https://ecoquery.ecoinvent.org/File/Reports).
  Corresponds to 11.4 kg/ha
  properties: dry mass 1 kg, wet mass 1 kg
- planting: 6.06061e-6 ha; lognormal variance with pedigree 0.166177, pedigree (2,1,4,5,4)
  Expert estimation: energy consumption has been estimated as similar to planting in open field
- polystyrene, expandable: 0.00154444 kg; source Torellas M. 2012
  Literature value or expert estimation (Torellas et al. 2012). Substrate bed: 764.5 kg/ha, PS lifespan: 3 years.
  properties: carbon content, fossil 0.923077, dry mass 1 kg, heating value, net 38.67 MJ, wet mass 1 kg
- potassium chloride: 0.00435038 kg; source Torellas M. 2012; lognormal variance with pedigree 0.126177, pedigree (2,1,4,5,1)
  The exchange has been updated from 'potassium chloride, as K2O' into 'potassium chloride' and therefore its amount has been scaled (multiplied) from 0.0027 kg by 1.5829 kg of 'potassium chloride' per kg of 'potassium chloride, as K2O'. Original comment of the exchange is: Calculated based on literature values or expert estimation: The total amount of nutrient (Torellas et al. 2012) multiplied by the country-share of fertiliser type (IFA 2014). See supporting documentation 'WFLDB-Documentation.pdf' chapter 'Fertiliser application' for L3 and L4 data (https://ecoquery.ecoinvent.org/File/Reports).
  properties: dry mass 1 kg, wet mass 1 kg
- potassium sulfate: 0.000968271 kg; source Torellas M. 2012; lognormal variance with pedigree 0.126177, pedigree (2,1,4,5,1)
  The exchange has been updated from 'potassium sulfate, as K2O' into 'potassium sulfate' and therefore its amount has been scaled (multiplied) from 0.0005 kg by 1.85 kg of 'potassium sulfate' per kg of 'potassium sulfate, as K2O'. Original comment of the exchange is: Calculated based on literature values or expert estimation: The total amount of nutrient (Torellas et al. 2012) multiplied by the country-share of fertiliser type (IFA 2014). See supporting documentation 'WFLDB-Documentation.pdf' chapter 'Fertiliser application' for L3 and L4 data (https://ecoquery.ecoinvent.org/File/Reports).
  Corresponds to 86.4 kg/ha
  properties: dry mass 1 kg, wet mass 1 kg
- tomato seedling, for planting: 0.169697 unit; source Martínez-Blanco J. 2011; lognormal variance with pedigree 0.126177, pedigree (2,1,4,5,1)
  Literature value or expert estimation (Martínez-Blanco et al. 2011). 2.5 plants per m2 is considered.
  properties: carbon content, non-fossil 0.439481, dry mass 0.578035 kg, water content 0.73, wet mass 1 kg
  note on carbon content, non-fossil: calculation: C-content of components according to ecoinvent report No. 15a. Source of composition: https://ndb.nal.usda.gov/ndb/search/. Unspecific seedling used as proxy.
- transport, tractor and trailer, agricultural: 0.0010618, 4.31779e-6 metric ton*km (2 suppliers, which the file names only by identifier); sum of these 0.00106612 metric ton*km; lognormal variance with pedigree 0.164439, pedigree (4,1,4,5,1)
  On-farm transport: Yield (in tonnes) multiplied by the average distance from field to farm. The distance was obtained by extrapolation (modified MEXALCA approach). See supporting documentation 'WFLDB-Documentation.pdf' chapter 'Machinery processes' (https://ecoquery.ecoinvent.org/File/Reports).
- urea: 0.000896448, 0.000113375, 0.000765502 kg (3 suppliers, which the file names only by identifier); sum of these 0.00177533 kg; source Torellas M. 2012; lognormal variance with pedigree 0.167577, pedigree (3,1,4,5,4)
  The exchange has been updated from 'urea, as N' into 'urea' and therefore its amount has been scaled (multiplied) from 0.0008 kg by 2.1438 kg of 'urea' per kg of 'urea, as N'. Original comment of the exchange is: Calculated based on literature values or expert estimation: The total amount of nutrient (Torellas et al. 2012) multiplied by the country-share of fertiliser type (IFA 2014). See supporting documentation 'WFLDB-Documentation.pdf' chapter 'Fertiliser application' for L3 and L4 data (https://ecoquery.ecoinvent.org/File/Reports).
  Corresponds to 137.0 kg/ha
  properties: carbon content, fossil 0.2, dry mass 1 kg, wet mass 1 kg
- waste glass: -3.62171e-5, -1.7271e-6, -6.28068e-6, -2.84834e-7, -1.35068e-7, -1.79053e-7, -1.88833e-7, -2.87973e-7, -0.0190138, -2.20057e-7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 kg (42 suppliers, which the file names only by identifier); sum of these -0.0190672 kg
  End-of-life treatment of perlite (glass used as proxy). Based on Torellas et al. (2012), 50% is landfilled and 50% is recycled
  production volume; = waste_glass*RP_PV/ABS(RP)
    Calculated from reference product production volume, reference product amount and byproduct amount.
  properties: dry mass 1 kg, heating value, net 0.05 MJ, wet mass 1 kg
  note on heating value, net: Value extracted from "treatment of waste glass, open dump, very wet infiltration class (1000mm)"
- waste polyethylene: -2.23376e-9, -6.13655e-9, -1.24075e-8, -8.12712e-10, -8.39214e-10, -3.16344e-8, -6.21349e-9, -3.77589e-9, -1.30661e-8, -6.3922e-8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 kg (42 suppliers, which the file names only by identifier); sum of these -0.000195899 kg
  End-of-life treatment of bed plastic and substrate bags (PE used as proxy). Based on Torellas et al. (2012), 50% is landfilled and 50% is recycled
  production volume; = waste_polyethy*RP_PV/ABS(RP)
    (same comment as for waste glass)
  properties: carbon content, fossil 0.825301, dry mass 0.996 kg, heating value, net 42.47 MJ, water content 0.00401606, wet mass 1 kg
  note on heating value, net: Value taken from the general comment of the treatment dataset.
- waste polystyrene: -4.71457e-9, -1.64256e-6, -1.94397e-8, -5.04332e-8, -2.1291e-9, -2.9115e-9, -1.8313e-8, -3.91449e-8, -1.0975e-7, -1.24415e-7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 kg (42 suppliers, which the file names only by identifier); sum of these -0.000773131 kg
  End-of-life treatment of substrate bed (PS). Based on Torellas et al. (2012), 50% is landfilled and 50% is recycled
  production volume; = waste_polysty*RP_PV/ABS(RP)
    (same comment as for waste glass)
  properties: carbon content, fossil 0.922579, dry mass 0.998 kg, heating value, net 38.67 MJ, water content 0.00200401, wet mass 1 kg

## Inputs from nature
- Carbon dioxide, in air [natural resource, in air]: 0.100527 kg; lognormal variance with pedigree 0.0158498, pedigree (2,2,4,5,1)
  CO2 uptake by biomass
- Energy, gross calorific value, in biomass [natural resource, biotic]: 0.903636 MJ; lognormal variance with pedigree 0.0158498, pedigree (2,2,4,5,1)
- Occupation, annual crop [natural resource, land]: 0.0607697 m2*year; lognormal variance with pedigree 0.0220616, pedigree (2,1,4,5,1)
  Related to the duration from harvest date of previous crop to harvest date of main crop.
- Transformation, from arable land, unspecified use [natural resource, land]: 0.0606061 m2; lognormal variance with pedigree 0.0462144, pedigree (2,1,4,5,1)
  Land transformation: 1 ha divided by yield
- Transformation, to arable land, unspecified use [natural resource, land]: 0.0606061 m2; lognormal variance with pedigree 0.0462144, pedigree (2,1,4,5,1)
  Land transformation: 1 ha divided by yield

## Emissions to nature
- Ammonia [air, non-urban air or from high stacks]: 0.000494715 kg; source EEA 2013; lognormal variance with pedigree 0.0467216, pedigree (2,2,4,5,1)
  Calculated value - EMEP/EEA (2013). See 'WFLDB-Guidelines.pdf', available at https://ecoquery.ecoinvent.org/File/Reports.
- Carbon dioxide, fossil [air, non-urban air or from high stacks]: 0.00195018 kg; lognormal variance with pedigree 0.0572498, pedigree (3,2,4,5,4)
  Calculated value - CO2 emissions from urea and lime. See 'WFLDB-Guidelines.pdf', available at https://ecoquery.ecoinvent.org/File/Reports.
- Carbon dioxide, from soil or biomass stock [air, non-urban air or from high stacks]: 0.00820545 kg; normal variance with pedigree 0.5, pedigree (3,3,5,5,2)
  Global average LUC emissions according 2nd edition of the Quantis-modified tool developed by Blonk Consultants 'WFLDB-adapted-Blonk 2014 direct-land-use-change-assessment-tool_2015-05-18a.xlsx', tab. 'Country & land use unknown'. The emission are based on the relative change in production areas in all countries for a given crop. The weighted average is used which takes into acount relative difference in crop expansion into primary forest, secondary forest, grassland, perennial and annual land.
- Dinitrogen monoxide [air, non-urban air or from high stacks]: 8.78398e-5 kg; source IPCC 2006; lognormal variance with pedigree 0.126664, pedigree (2,2,4,5,1)
  Calculated value - IPCC (2006). See 'WFLDB-Guidelines.pdf', available at https://ecoquery.ecoinvent.org/File/Reports.
- Nitrogen oxides [air, non-urban air or from high stacks]: 0.000190691 kg; source EEA 2013; lognormal variance with pedigree 0.126664, pedigree (2,2,4,5,1)
  Calculated value - EEA/EMEP (2013). See 'WFLDB-Guidelines.pdf', available at https://ecoquery.ecoinvent.org/File/Reports.
- Water [air, non-urban air or from high stacks]: 0.0258788 m3; lognormal variance with pedigree 0.126177, pedigree (2,1,4,5,1)
  Calculated value - Emission calculated from water balance. See 'WFLDB-Guidelines.pdf', available at https://ecoquery.ecoinvent.org/File/Reports.
- Cadmium II [soil, agricultural]: 1.89162e-7 kg; source Freiermuth R.  2006
  Comment on mathematicalRelation:
  1.94726469911e-07 from Calculated value - Freiermuth (2006). See 'WFLDB-Guidelines.pdf', available at https://ecoquery.ecoinvent.org/File/Reports.
  -5.564392e-09 from Crop, default, heavy metals uptake model
  Heavy metal uptake can be excluded by setting the parameter heavyMetalUptakeSwitch to zero.
- Chromium III [soil, agricultural]: 2.85983e-6 kg; source Freiermuth R.  2006
  Comment on mathematicalRelation:
  2.8896969164e-06 from Calculated value - Freiermuth (2006). See 'WFLDB-Guidelines.pdf', available at https://ecoquery.ecoinvent.org/File/Reports.
  -2.9866e-08 from Crop, default, heavy metals uptake model
  Heavy metal uptake can be excluded by setting the parameter heavyMetalUptakeSwitch to zero.
- Copper ion [soil, agricultural]: 2.05176e-7 kg; source Freiermuth R.  2006
  Comment on mathematicalRelation:
  5.68330262172e-07 from Calculated value - Freiermuth (2006). See 'WFLDB-Guidelines.pdf', available at https://ecoquery.ecoinvent.org/File/Reports.
  Heavy metal uptake can be excluded by setting the parameter heavyMetalUptakeSwitch to zero.
- Fungicides, unspecified [soil, agricultural]: 0.000172727 kg; lognormal variance with pedigree 0.0467216, pedigree (2,2,4,5,1)
  Calculated value - 100% emission in soil. See 'WFLDB-Guidelines.pdf', available at https://ecoquery.ecoinvent.org/File/Reports.
- Insecticides, unspecified [soil, agricultural]: 2.30303e-5 kg; lognormal variance with pedigree 0.0467216, pedigree (2,2,4,5,1)
  (same comment as for Fungicides, unspecified)
- Lead II [soil, agricultural]: 3.41471e-7 kg; source Freiermuth R.  2006
  Comment on mathematicalRelation:
  -2.9634196e-08 from Crop, default, heavy metals uptake model
  Heavy metal uptake can be excluded by setting the parameter heavyMetalUptakeSwitch to zero.
- Mercury II [soil, agricultural]: 2.05328e-9 kg; source Freiermuth R.  2006
  Comment on mathematicalRelation:
  4.27575209825e-09 from Calculated value - Freiermuth (2006). See 'WFLDB-Guidelines.pdf', available at https://ecoquery.ecoinvent.org/File/Reports.
  -2.2224688e-09 from Crop, default, heavy metals uptake model
  Heavy metal uptake can be excluded by setting the parameter heavyMetalUptakeSwitch to zero.
- Nickel II [soil, agricultural]: 4.02113e-7 kg; source Freiermuth R.  2006
  Comment on mathematicalRelation:
  4.5935702069e-07 from Calculated value - Freiermuth (2006). See 'WFLDB-Guidelines.pdf', available at https://ecoquery.ecoinvent.org/File/Reports.
  -5.724408e-08 from Crop, default, heavy metals uptake model
  Heavy metal uptake can be excluded by setting the parameter heavyMetalUptakeSwitch to zero.
- Zinc II [soil, agricultural]: 2.05486e-6 kg; source Freiermuth R.  2006
  Comment on mathematicalRelation:
  -1.7548604e-06 from Crop, default, heavy metals uptake model
  Heavy metal uptake can be excluded by setting the parameter heavyMetalUptakeSwitch to zero.
- Cadmium II [water, ground-]: 2.97394e-10 kg; source Freiermuth R.  2006; lognormal variance with pedigree 0.358938, pedigree (2,2,4,5,1)
  Calculated value - Freiermuth (2006). See 'WFLDB-Guidelines.pdf', available at https://ecoquery.ecoinvent.org/File/Reports.
- Chromium III [water, ground-]: 1.27897e-7 kg; source Freiermuth R.  2006; lognormal variance with pedigree 0.358938, pedigree (2,2,4,5,1)
  (same comment as for Cadmium II)
- Copper ion [water, ground-]: 2.13515e-8 kg; source Freiermuth R.  2006; lognormal variance with pedigree 0.358938, pedigree (2,2,4,5,1)
  (same comment as for Cadmium II)
- Lead II [water, ground-]: 2.79818e-9 kg; source Freiermuth R.  2006; lognormal variance with pedigree 0.358938, pedigree (2,2,4,5,1)
  (same comment as for Cadmium II)
- Mercury II [water, ground-]: 7.37818e-12 kg; source Freiermuth R.  2006; lognormal variance with pedigree 0.358938, pedigree (2,2,4,5,1)
  (same comment as for Cadmium II)
- Nitrate [water, ground-]: 0.00217576 kg
  Calculated value - Torellas et al. (2012): Water emissions of NO3: 359 kg/ha (The irrigation system is an open- loop drip system, without recirculation of drainage water). See 'WFLDB-Guidelines.pdf', available at https://ecoquery.ecoinvent.org/File/Reports.
- Phosphate [water, ground-]: 1.30364e-6 kg; source Prasuhn V.  2006; lognormal variance with pedigree 0.177866, pedigree (2,2,4,5,1)
  Calculated value - Prasuhn (2006). See 'WFLDB-Guidelines.pdf', available at https://ecoquery.ecoinvent.org/File/Reports.
- Phosphate [water, surface water]: 7.38182e-6 kg; source Prasuhn V.  2006; lognormal variance with pedigree 0.187266, pedigree (3,2,4,5,3)
  (same comment as for Phosphate)
- Water [water, ground-]: 0.000575515 m3; lognormal variance with pedigree 0.126177, pedigree (2,1,4,5,1)
  (same comment as for Water)
- Water [water, surface water]: 0.00230206 m3; lognormal variance with pedigree 0.126177, pedigree (2,1,4,5,1)
  (same comment as for Water)
- Zinc II [water, ground-]: 1.76315e-7 kg; source Freiermuth R.  2006; lognormal variance with pedigree 0.358938, pedigree (2,2,4,5,1)
  (same comment as for Cadmium II)

## Sampling procedure
WFLDB Methodological Guidelines for the Life Cycle Inventory of Agricultural Products in the latest version, available at: https://ecoquery.ecoinvent.org/File/Reports. Data sources: Data were categorised from level 0 (L0) to level (L4) as follows: L0 = estimate, proxy; L1 = statistical data (e.g. FAOSTAT); L2 = L1 adapted to crop and country; L3 = literature data or L1 resp. L2 data approved by experts; medium detailing (i.e. kg of total N-fertiliser); L4 = L3 data of high detailing (i.e. portion N-fertiliser types).In this dataset data were obtained for yield: L3; Fertilisers: L4; Pesticides: L1; Machinery: L0; Irrigation: L2. For information regarding the calculation of individual exchanges see supporting documentation WFLDB-Documentation.pdf

## Extrapolations
The amount of the exchanges are copy from a regional dataset.

## Review by Assumpció ANTON 2016-06-09
Be aware that the use of statistics in input calculations could provide some specific inputs not common for specific crops, this should be corrected if better information is available and better reflexed in DQR . Currently, I would dissent for some of good marks provided, being a revision of criteria applied advisable.
Pesticides will need to be amended periodically checking for update of pesticides' ban.
