# electricity production, medium voltage, petroleum refinery operation

Dataset: EcoSpold 2, unit process
Geography: RoW
Time period: 2014-01-01 to 2023-12-31
Technology level: current
Classification: ISIC rev.4 ecoinvent: 1920:Manufacture of refined petroleum products
Scenario: Business-as-Usual
System model: Allocation, cut-off by classification
Generated by: Florentine Brunner
Database: ecoinvent
isCopyrightProtected: true
accessRestrictedTo: 1

## General comment
This global (GLO) activity for petroleum refinery operation was created as a copy of the corresponding activity in Europe without Switzerland rather than as a production volume weighted average of all available regional activities. According to expert judgement, a production volume-weighted average including the regional activities available in ecoinvent v3.6 (BR, CH, CO, Europe without Switzerland, IN, PE, ZA) would overestimate the share of refinery complexity type IV in the global petroleum refinery sector. The mix of refinery complexity types used for the European activity was, therefore, found to be a more appropriate proxy for this GLO dataset. This limitation in representativeness of the GLO dataset should be kept in mind when using it.
The describes the operation of a petroleum oil refinery of representative configuration and quality of crude oil input for European conditions. Since petroleum refineries are very complex the actual unit process modeling is done in a separate refinery tool, developed by ifeu (Institute for Energy and Environmental Research, Heidelberg, Germany) and this is a subdivided product-specific dataset.
The ifeu petroleum refinery life cycle inventory (LCI) tool is based on the outputs of a complex refinery model that reproduces the complexity of petroleum refinery plants in which the combination and sequence of processes are usually very specific to the characteristics of the raw materials (i.e. the close relation between the composition of the crude oil and the products to be produced). Refineries differ not only in their configurations, process integration, feedstocks, product mixes, unit sizes, designs, and control systems but also the market situations, locations and ages of the refinery or environmental regulations can result in a wide variety of refinery concepts. It represents the current European state-of-the-art. The basic setting of the model reflects the technical characteristics of European refineries as described in the Best Available Techniques (BAT) Reference Document (BREF) for the Refining of Mineral Oil and Gas (European Commission, 2015). Further specific data was collected from companies and production plants and was incorporated in order to elaborate a comprehensive and robust model of a refinery.
The BREF (European Commission, 2015) contains not only aggregated numbers or weighted averages of emission and energy or water consumptions, but also encompasses primary data of the majority of refineries in Europe in anonymous form. This data source has been complemented by various specific confidential refinery datasets, by values from Eurostat (e.g. in the case of the energy source mix or process energy), and by literature data. In the case of the BREF, a range of values were mentioned as process parameters for which the arithmetic averages were applied. After adapting the model to the up-to-date mass and energy flows within the European refineries, it has been validated and calibrated by comparing the results to the dataset of the BREF, the Eurostat and the European Pollutant Release and Transfer Register (E-PRTR).
The simplified LCI tool can be adjusted to average conditions of a specific geography through the following parameters: refinery complexity (according to the complexity classes defined in the BREF document, type I-IV), crude oil sulfur content and American Petroleum Institute (API) gravity classification. To create this dataset, the above parameters were set to represent the average situation in Europe without Switzerland:
Crude quality – API and sulfur content: Crude imports to Europe by country of origin were taken from BP Statistical Review of World Energy 2017 (Oil: Inter-area movements 2016) (BP, 2017) and matched with the crude quality reported for these regions in ENI World Oil Review 2018 (ENI, 2018). The resulting weighted average API grade of crude imports to Europe is 35, and the weighted average sulfur content 1.03%.
Refinery complexity: The 2018 World Refining Survey (OGJ, 2018) reports the configuration of 107 refineries in Europe. According to their configuration each refinery was assigned a refinery type (I-IV) as defined in the BREF document. Weighted by the annual throughput volume, 62% of European refineries classify as type II, 29% as type II and 9% as type IV.
LCIs were generated for BREF type II, III and IV for API 35 and sulfur content 1.03% (applying linear interpolation between sulfur content of 1% and 3%). This dataset was created as weighted average of types II-IV according to the above shares.

## Included activities start
Activity starts with crude oil entering the petroleum refinery. Waste water treatment, freshwater supply (from nature), refinery infrastructure, crude oil and product storage on refinery grounds and energy provision is included. Electricity requirements are assumed to be met by on-site generation, regardless whether this electricity is purchased or supplied internally.

## Included activities end
Activity ends with refined petroleum products (and surplus electricity and/or hydrogen, where relevant) leaving the refinery.

## Allocation
Petroleum oil refineries are highly integrated multi-output production plants where nearly each process step creates a few co-products. The procedure for subdividing and allocating the burden per refinery process step among the product outputs is described in detail in Fehrenbach et al. (2018).

## Geography
Global model calibrated with geography-specific information.

## Technology
This dataset represents the prevailing technology level in Europe, this is a weighted average of BREF complexity types II (62%), III (29%), IV (9%) refineries (see BREF document, European Commission, 2015); API 35; sulfur content 1.03%.
Reference(s):
European Commission (2015) Best Available Techniques (BAT) Reference Document (BREF) for the Refining of Mineral Oil and Gas, Industrial Emissions Directive 2010/75/EU Integrated Pollution Prevention and control, accessible online at http://eippcb.jrc.ec.europa.eu/reference/BREF/REF_BREF_2015.pdf, February 2019

## Reference product
- electricity, medium voltage: 1 kWh; name a_RP; By-product classification allocatable product; CPC 17100: Electrical energy; HS2017 271600: Electrical energy
  According to the applied model, on average 3.6 kg electricity, high voltage are produced per tonne of crude oil intake.
  production volume 4.46841e9 kWh; name PV_RP; = 4011037347979*a_RP/1000
    Calculated value. The production volume was calculated based on the total global refinery intake in 2016 and the proportionate product output modelled in the ifeu tool. According to the applied model, on average 3.6 kWh electricity, high voltage are produced per tonne of crude oil intake. The total global refinery intake in 2016 was 4.01E+12kg of crude oil (BP, 2017).
    Mind that this calculated value may differ from the actual production volume reported in statistics.
    Reference(s):
    BP, 2017, BP Statistical Review 2017, accessed online at https://www.bp.com/content/dam/bp-country/de_ch/PDF/bp-statistical-review-of-world-energy-2017-full-report.pdf, February 2019
  property price 0.1 EUR2005
    Calculated to be between the price of electricity, high voltage and electricity, low voltage.
  properties: carbon allocation 0 kg, carbon content 0

## Inputs from technosphere
- aluminium oxide, non-metallurgical: 1.01625e-5 kg; lognormal variance with pedigree 0.0444, pedigree (3,3,5,4,2)
  properties: dry mass 1 kg, wet mass 1 kg
- cobalt: 2.11718e-7 kg; lognormal variance with pedigree 0.0444, pedigree (3,3,5,4,2)
  properties: dry mass 1 kg, wet mass 1 kg
- hazardous waste, for incineration: -0.000304682, -3.82996e-6 kg (2 suppliers, which the file names only by identifier); sum of these -0.000308512 kg
  production volume; = a_hwi/a_RP*PV_RP
    Calculated from the production volume of the reference product in proportion to the respective output amounts.
  properties: carbon content, fossil 0.554667, dry mass 0.75 kg, heating value, net 17 MJ, water content 0.333333, wet mass 1 kg
  note on carbon content, fossil: Tab A.6, ecoinvent v2.2 report 13_I. C content has been calculated after data in the tables, and then referred to 1 kg DM
  note on heating value, net: Value taken from the general comment of the treatment dataset.
- hazardous waste, for underground deposit: -2.11211e-5 kg; name a_hwud
  production volume; = a_hwud/a_RP*PV_RP
    (same comment as for hazardous waste, for incineration)
  properties: carbon content, fossil 0.554667, dry mass 1 kg, wet mass 1 kg
  note on carbon content, fossil: Tab A.6, ecoinvent v2.2 report 13_I, average hazardous waste composition was used, and referred to 0% water mass. No waste-specific emission are currently inventoried for underground deposits. Accordingly, no waste composition must be specified. For generic, average waste to underground deposit deposition in a 200 liter steel drum without cement solidification is assumed (ecoinvent v2.2 report 13_I).
- hydrochloric acid, without water, in 30% solution state: 0.000181405 kg; lognormal variance with pedigree 0.0444, pedigree (3,3,5,4,2)
  properties: dry mass 1 kg, heating value, net 3.32 MJ, wet mass 1 kg
- kaolin: 2.11718e-6 kg; lognormal variance with pedigree 0.0444, pedigree (3,3,5,4,2)
  properties: dry mass 1 kg, wet mass 1 kg
- lanthanum oxide: 2.11718e-7 kg; lognormal variance with pedigree 0.0444, pedigree (3,3,5,4,2)
  properties: dry mass 1 kg, wet mass 1 kg
- lime, hydrated, packed: 0.000250314 kg; lognormal variance with pedigree 0.0444, pedigree (3,3,5,4,2)
  properties: dry mass 0.997 kg, water content 0.00300903, wet mass 1 kg
- molybdenum trioxide: 2.11718e-7 kg; lognormal variance with pedigree 0.0444, pedigree (3,3,5,4,2)
  properties: bismuth content 8e-5, copper content 0.0006, iron content 0.0044, lead content 0.00015, molecular weight 143.9 g/mol, molybdenum content 0.62, oxygen content 0.29, sulfur content 0.0003
- natural gas, high pressure: 3.25607e-5, 5.49259e-5, 0.00011981, 4.00954e-5, 9.37014e-6, 5.57691e-5, 5.35148e-5, 0.000140718, 4.76964e-6, 5.43266e-5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 m3 (36 suppliers, which the file names only by identifier); sum of these 0.00412005 m3; lognormal variance with pedigree 0.0444, pedigree (3,3,5,4,2)
  properties: carbon content, fossil 0.602381, dry mass 0.84 kg, heating value, gross 40 MJ, heating value, net 36 MJ, wet mass 0.84 kg
  note on carbon content, fossil: An average C content of 0.506 kg C/ m3 has been assumed (this average has been calculated using data in Tab 3.5, ecoinvent v2.2 report 6_V
  note on heating value, net: Literature value, Source: Christoph Meili;Niels Jungbluth;Maresa Bussa (2021) Life cycle inventories of crude oil and natural gas extraction. ESU-services Ltd. commissioned by BAFU & VSG, Schaffhausen, Switzerland, http://esu-services.ch/data/public-lci-reports/
- nickel, class 1: 2.11718e-7 kg; lognormal variance with pedigree 0.0444, pedigree (3,3,5,4,2)
  properties: dry mass 1 kg, wet mass 1 kg
- petroleum: 0.173365, 0.00776656, 0.000180086, 0.0790242, 0.000786934, 0.000740386 kg (6 suppliers, which the file names only by identifier); sum of these 0.261863 kg; lognormal variance with pedigree 0.0444, pedigree (3,3,5,4,2)
  properties: carbon content, fossil 0.85, dry mass 1 kg, heating value, net 43.4 MJ, wet mass 1 kg
- petroleum refinery: 1.42825e-12 unit; lognormal variance with pedigree 0.3438, pedigree (3,3,5,4,2)
  activityLink introduced to establish a direct link to the corresponding regional supply of this product
  properties: lifetime capacity [kg] 3e10 kg
- platinum: 3.17577e-9 kg; lognormal variance with pedigree 0.0444, pedigree (3,3,5,4,2)
  properties: dry mass 1 kg, wet mass 1 kg
- quicklime, milled, packed: 5.59707e-5 kg; lognormal variance with pedigree 0.0444, pedigree (3,3,5,4,2)
  properties: dry mass 0.99 kg, water content 0.010101, wet mass 1 kg
- refinery sludge: -6.81054e-6, -0.00143418 kg (2 suppliers, which the file names only by identifier); sum of these -0.00144099 kg
  production volume; = a_rs/a_RP*PV_RP
    (same comment as for hazardous waste, for incineration)
  properties: carbon content, fossil 0.767857, dry mass 0.105 kg, heating value, net 2.45 MJ, water content 8.52381, wet mass 1 kg
- silicone product: 2.11718e-6 kg; lognormal variance with pedigree 0.0444, pedigree (3,3,5,4,2)
  properties: carbon content, fossil 0.324324, dry mass 1 kg, heating value, net 9.83 MJ, wet mass 1 kg
- sodium hydroxide, without water, in 50% solution state: 9.07027e-5 kg; lognormal variance with pedigree 0.0444, pedigree (3,3,5,4,2)
  properties: dry mass 1 kg, heating value, net 3.03 MJ, wet mass 1 kg
- waste gypsum: -2.88161e-6, -0.000198474 kg (2 suppliers, which the file names only by identifier); sum of these -0.000201356 kg
  production volume; = a_wg/a_RP*PV_RP
    (same comment as for hazardous waste, for incineration)
  properties: dry mass 0.806 kg, water content 0.240695, wet mass 1 kg
- zeolite, powder: 5.9281e-6 kg; lognormal variance with pedigree 0.0444, pedigree (3,3,5,4,2)
  properties: dry mass 1 kg, wet mass 1 kg

## Inputs from nature
- Water, cooling, unspecified natural origin [natural resource, in water]: 0.00553434 m3; lognormal variance with pedigree 0.0444, pedigree (3,3,5,4,2)
- Water, unspecified natural origin [natural resource, in water]: 0.000801255 m3; lognormal variance with pedigree 0.0444, pedigree (3,3,5,4,2)

## Emissions to nature
- Ammonia [air, unspecified]: 1.90692e-5 kg; lognormal variance with pedigree 0.0838, pedigree (3,3,5,4,2)
- Antimony ion [air, unspecified]: 2.10849e-9 kg; lognormal variance with pedigree 0.0838, pedigree (3,3,5,4,2)
- Arsenic ion [air, unspecified]: 3.15098e-9 kg; lognormal variance with pedigree 0.0838, pedigree (3,3,5,4,2)
- Benzene [air, unspecified]: 8.98208e-7 kg; lognormal variance with pedigree 0.0838, pedigree (3,3,5,4,2)
- Benzo(a)pyrene [air, unspecified]: 3.93713e-11 kg; lognormal variance with pedigree 0.0838, pedigree (3,3,5,4,2)
- Beryllium II [air, unspecified]: 4.77569e-11 kg; lognormal variance with pedigree 0.0838, pedigree (3,3,5,4,2)
- Cadmium II [air, unspecified]: 4.59412e-9 kg; lognormal variance with pedigree 0.6938, pedigree (3,3,5,4,2)
- Carbon dioxide, fossil [air, unspecified]: 0.86175 kg; lognormal variance with pedigree 0.0444, pedigree (3,3,5,4,2)
- Carbon dioxide, non-fossil [air, unspecified]: 0.000173847 kg; lognormal variance with pedigree 0.0444, pedigree (3,3,5,4,2)
- Carbon monoxide, fossil [air, unspecified]: 4.8129e-5 kg; lognormal variance with pedigree 0.6938, pedigree (3,3,5,4,2)
- Carbonyl sulfide [air, unspecified]: 6.28856e-8 kg; lognormal variance with pedigree 0.0838, pedigree (3,3,5,4,2)
- Chromium III [air, unspecified]: 4.35105e-9 kg; lognormal variance with pedigree 0.6938, pedigree (3,3,5,4,2)
- Cobalt II [air, unspecified]: 8.70211e-9 kg; lognormal variance with pedigree 0.6938, pedigree (3,3,5,4,2)
- Copper ion [air, unspecified]: 1.36163e-8 kg; lognormal variance with pedigree 0.6938, pedigree (3,3,5,4,2)
- Cyanide [air, unspecified]: 1.339e-8 kg; lognormal variance with pedigree 0.0838, pedigree (3,3,5,4,2)
- Dinitrogen monoxide [air, unspecified]: 3.51534e-6 kg; lognormal variance with pedigree 0.0838, pedigree (3,3,5,4,2)
- Dioxins, measured as 2,3,7,8-tetrachlorodibenzo-p-dioxin [air, unspecified]: 1.05418e-14 kg; lognormal variance with pedigree 0.0838, pedigree (3,3,5,4,2)
- Formaldehyde [air, unspecified]: 4.61822e-7 kg; lognormal variance with pedigree 0.0838, pedigree (3,3,5,4,2)
- Heat, waste [air, unspecified]: 1.11012 MJ; lognormal variance with pedigree 0.0838, pedigree (3,3,5,4,2)
- Hydrogen fluoride [air, unspecified]: 1.10731e-7 kg; lognormal variance with pedigree 0.0838, pedigree (3,3,5,4,2)
- Hydrogen sulfide [air, unspecified]: 9.7407e-7 kg; lognormal variance with pedigree 0.0838, pedigree (3,3,5,4,2)
- Lead II [air, unspecified]: 1.58748e-8 kg; lognormal variance with pedigree 0.6938, pedigree (3,3,5,4,2)
- Manganese II [air, unspecified]: 2.1723e-9 kg; lognormal variance with pedigree 0.6938, pedigree (3,3,5,4,2)
- Mercury II [air, unspecified]: 1.28501e-9 kg; lognormal variance with pedigree 0.6938, pedigree (3,3,5,4,2)
- Methane, fossil [air, unspecified]: 6.1623e-6 kg; lognormal variance with pedigree 0.0838, pedigree (3,3,5,4,2)
- NMVOC, non-methane volatile organic compounds [air, unspecified]: 7.25358e-5 kg; lognormal variance with pedigree 0.0838, pedigree (3,3,5,4,2)
- Nickel II [air, unspecified]: 1.8155e-7 kg; lognormal variance with pedigree 0.6938, pedigree (3,3,5,4,2)
- Nitrogen oxides [air, unspecified]: 0.000297921 kg; lognormal variance with pedigree 0.0838, pedigree (3,3,5,4,2)
- PAH, polycyclic aromatic hydrocarbons [air, unspecified]: 8.45554e-9 kg; lognormal variance with pedigree 0.3438, pedigree (3,3,5,4,2)
- Palladium II [air, unspecified]: 4.28015e-11 kg; lognormal variance with pedigree 0.6938, pedigree (3,3,5,4,2)
- Particulate Matter, < 2.5 um [air, unspecified]: 7.18515e-6 kg; lognormal variance with pedigree 0.3438, pedigree (3,3,5,4,2)
- Particulate Matter, > 10 um [air, unspecified]: 4.88612e-5 kg; lognormal variance with pedigree 0.0838, pedigree (3,3,5,4,2)
- Particulate Matter, > 2.5 um and < 10um [air, unspecified]: 2.15537e-6 kg; lognormal variance with pedigree 0.1638, pedigree (3,3,5,4,2)
- Platinum [air, unspecified]: 4.28015e-11 kg; lognormal variance with pedigree 0.6938, pedigree (3,3,5,4,2)
- Rhodium III [air, unspecified]: 4.28015e-11 kg; lognormal variance with pedigree 0.6938, pedigree (3,3,5,4,2)
- Selenium IV [air, unspecified]: 6.0307e-9 kg; lognormal variance with pedigree 0.0838, pedigree (3,3,5,4,2)
- Sulfur dioxide [air, unspecified]: 0.000197669 kg; lognormal variance with pedigree 0.0498, pedigree (3,3,5,4,2)
- Tellurium [air, unspecified]: 8.04094e-11 kg; lognormal variance with pedigree 0.0838, pedigree (3,3,5,4,2)
- Thallium I [air, unspecified]: 1.15174e-9 kg; lognormal variance with pedigree 0.6938, pedigree (3,3,5,4,2)
- Tin ion [air, unspecified]: 4.65029e-9 kg; lognormal variance with pedigree 0.6938, pedigree (3,3,5,4,2)
- Vanadium V [air, unspecified]: 3.65594e-7 kg; lognormal variance with pedigree 0.6938, pedigree (3,3,5,4,2)
- Water [air, unspecified]: 0.000200744 m3; lognormal variance with pedigree 0.0838, pedigree (3,3,5,4,2)
- Xylenes, unspecified [air, unspecified]: 1.0038e-6 kg; lognormal variance with pedigree 0.0838, pedigree (3,3,5,4,2)
- Zinc II [air, unspecified]: 1.08744e-8 kg; lognormal variance with pedigree 0.0838, pedigree (3,3,5,4,2)
- AOX, Adsorbable Organic Halides [water, unspecified]: 1.71951e-7 kg; lognormal variance with pedigree 0.0838, pedigree (3,3,5,4,2)
- Aluminium III [water, unspecified]: 7.26276e-8 kg; lognormal variance with pedigree 0.0838, pedigree (3,3,5,4,2)
- Ammonium [water, unspecified]: 1.80548e-6 kg; lognormal variance with pedigree 0.0838, pedigree (3,3,5,4,2)
- Arsenic ion [water, unspecified]: 2.57926e-9 kg; lognormal variance with pedigree 0.0838, pedigree (3,3,5,4,2)
- BOD5, Biological Oxygen Demand [water, unspecified]: 8.59754e-6 kg; lognormal variance with pedigree 0.0838, pedigree (3,3,5,4,2)
- Barium II [water, unspecified]: 1.72736e-7 kg; lognormal variance with pedigree 0.0838, pedigree (3,3,5,4,2)
- Benzene [water, unspecified]: 8.59754e-10 kg; lognormal variance with pedigree 0.0838, pedigree (3,3,5,4,2)
- Boron [water, unspecified]: 3.43902e-7 kg; lognormal variance with pedigree 0.0838, pedigree (3,3,5,4,2)
- COD, Chemical Oxygen Demand [water, unspecified]: 5.67438e-5 kg; lognormal variance with pedigree 0.6938, pedigree (3,3,5,4,2)
- Cadmium II [water, unspecified]: 8.59754e-10 kg; lognormal variance with pedigree 0.0838, pedigree (3,3,5,4,2)
- Chloride [water, unspecified]: 0.000525984 kg; lognormal variance with pedigree 0.0838, pedigree (3,3,5,4,2)
- Chromium III [water, unspecified]: 8.59754e-10 kg; lognormal variance with pedigree 0.6938, pedigree (3,3,5,4,2)
- Chromium VI [water, unspecified]: 1.71951e-9 kg; lognormal variance with pedigree 0.6938, pedigree (3,3,5,4,2)
- Cobalt II [water, unspecified]: 8.59754e-10 kg; lognormal variance with pedigree 0.0838, pedigree (3,3,5,4,2)
- Copper ion [water, unspecified]: 4.29877e-8 kg; lognormal variance with pedigree 0.0838, pedigree (3,3,5,4,2)
- Cyanide [water, unspecified]: 1.28963e-8 kg; lognormal variance with pedigree 0.0838, pedigree (3,3,5,4,2)
- DOC, Dissolved Organic Carbon [water, unspecified]: 1.17958e-5 kg; lognormal variance with pedigree 0.0838, pedigree (3,3,5,4,2)
- Fluoride [water, unspecified]: 6.87803e-7 kg; lognormal variance with pedigree 0.0838, pedigree (3,3,5,4,2)
- Heat, waste [water, unspecified]: 0.118168 MJ
- Hydrocarbons, unspecified [water, unspecified]: 1.28963e-6 kg; lognormal variance with pedigree 0.3438, pedigree (3,3,5,4,2)
- Iron ion [water, unspecified]: 3.43902e-7 kg; lognormal variance with pedigree 0.0838, pedigree (3,3,5,4,2)
- Lead II [water, unspecified]: 8.59754e-10 kg; lognormal variance with pedigree 0.6938, pedigree (3,3,5,4,2)
- Manganese II [water, unspecified]: 6.87803e-8 kg; lognormal variance with pedigree 0.6938, pedigree (3,3,5,4,2)
- Mercury II [water, unspecified]: 1.71951e-10 kg; lognormal variance with pedigree 0.6938, pedigree (3,3,5,4,2)
- Molybdenum VI [water, unspecified]: 8.59754e-9 kg; lognormal variance with pedigree 0.6938, pedigree (3,3,5,4,2)
- Nickel II [water, unspecified]: 8.59754e-9 kg; lognormal variance with pedigree 0.6938, pedigree (3,3,5,4,2)
- Nitrate [water, unspecified]: 3.30035e-7 kg; lognormal variance with pedigree 0.0838, pedigree (3,3,5,4,2)
- Nitrite [water, unspecified]: 5.23328e-8 kg; lognormal variance with pedigree 0.0838, pedigree (3,3,5,4,2)
- Nitrogen [water, unspecified]: 4.69018e-6 kg; lognormal variance with pedigree 0.0838, pedigree (3,3,5,4,2)
- PAH, polycyclic aromatic hydrocarbons [water, unspecified]: 6.01828e-10 kg; lognormal variance with pedigree 0.3438, pedigree (3,3,5,4,2)
- Phenol [water, unspecified]: 8.59754e-8 kg; lognormal variance with pedigree 0.0838, pedigree (3,3,5,4,2)
- Phosphorus [water, unspecified]: 5.15852e-7 kg; lognormal variance with pedigree 0.0838, pedigree (3,3,5,4,2)
- Selenium IV [water, unspecified]: 3.43902e-8 kg; lognormal variance with pedigree 0.6938, pedigree (3,3,5,4,2)
- Sodium I [water, unspecified]: 5.21346e-5 kg; lognormal variance with pedigree 0.0838, pedigree (3,3,5,4,2)
- Sulfate [water, unspecified]: 0.000448132 kg; lognormal variance with pedigree 0.0838, pedigree (3,3,5,4,2)
- Sulfide [water, unspecified]: 4.29877e-8 kg; lognormal variance with pedigree 0.0838, pedigree (3,3,5,4,2)
- Suspended solids, unspecified [water, unspecified]: 1.28963e-5 kg; lognormal variance with pedigree 0.0838, pedigree (3,3,5,4,2)
- TOC, Total Organic Carbon [water, unspecified]: 1.20366e-5 kg; lognormal variance with pedigree 0.0838, pedigree (3,3,5,4,2)
- Tin ion [water, unspecified]: 8.59754e-9 kg; lognormal variance with pedigree 0.6938, pedigree (3,3,5,4,2)
- Vanadium V [water, unspecified]: 1.71951e-8 kg; lognormal variance with pedigree 0.6938, pedigree (3,3,5,4,2)
- Water [water, unspecified]: 0.00655117 m3; lognormal variance with pedigree 0.0838, pedigree (3,3,5,4,2)
- Xylenes, unspecified [water, unspecified]: 8.59754e-10 kg; lognormal variance with pedigree 0.6938, pedigree (3,3,5,4,2)
- Zinc II [water, unspecified]: 2.57926e-8 kg; lognormal variance with pedigree 0.6938, pedigree (3,3,5,4,2)
- t-Butyl methyl ether [water, unspecified]: 1.71951e-8 kg; lognormal variance with pedigree 0.0838, pedigree (3,3,5,4,2)
