# containerboard production, linerboard, kraftliner

Dataset: EcoSpold 2, unit process
Geography: RoW
Time period: 2021-01-01 to 2023-12-31
Technology level: current
Classification: ISIC rev.4 ecoinvent: 1702:Manufacture of corrugated paper and paperboard and of containers of paper a
Synonyms: containerboard; linerboard
Scenario: Business-as-Usual
System model: Allocation, cut-off by classification
Generated by: Nora Minas
Published in: FEFCO Corrugated Packaging 2018
Database: ecoinvent
isCopyrightProtected: true
accessRestrictedTo: 1

## General comment
This dataset has been extrapolated from respective regional geographies (RER). This dataset represents the production of kraftliner from virgin wood/ sulfate pulp. Kraftliner is commonly produced from virgin material, while testliner is made from recycled fibers. Nonetheless also Kraftliner can partly be made from recycled fiber input. Both products are used interchangeably as bottom and top layers surrounding the mid layer of “medium” in the production of corrugated board. Data represent the industry average in 2021.
Data for the production of Kraftliner were provided by the industry association CCB (Cepi ContainerBoard). The data for Semichemical Fluting and Kraftliner jointly represent ca. 84% of the total annual production of corrugated base papers from primary fibres in Europe. Primary data were provided by large mills in Austria, Finland, France, Portugal, Poland, and Sweden. Together these mills produced 4 698 905 tonnes of paper products in 2020. Thereby each mill has a production volume of about 94 000 and 467 000 tonnes net saleable paper product (FEFCO, 2021). FEFCO. 2021. European Database for Corrugated Board Life Cycle Studies 2021. Reference(s): https://www.fefco.org/sites/default/files/documents/2022-07-07_FEFCO%20LCA%202021.pdf, last accessed March 2023
In FEFCO 2021 fuel consumption and the related emission to air include only steam and net electricity used on site. Sold electricity is not reported as a sold product and the associated input and output data are not included in the inventory. The fuel consumption and emissions to air associated with the total heat production and the net electricity used on site were allocated to the paper production.
The following air emissions were reported in the study: Particulates, <2.5μm, Particulates, >2.5μm and <10μm, Particulates, >10μm, CO2 (fossil), CO2 (biomass), CO, NOx (as NO2), SOx (as SO2), TRS (H2S as S)
For a more complete air emission profile for Kraftliner production, however, additional air emissions (beyond the ones listed above) were added for the combustion of the external fuels and internal using LCI datasets for combustion of different fuels as proxy. The air emissions were calculated based on the mix of the external and internal fuels in the study and more information about the fuel mix and the proxy are provided under "Extrapolations". No proxy was available for the combustion of black liquor and "other internal fuels". Emissions from this internal energy generation processes are therefore only reflected in the key emission factors provided by the industry.

## Included activities start
The process for the production of kraftliner starts with the transportation of wood and wood chips to the mill gate.

## Included activities end
The process ends with the production of kraftliner. Processes include chipping, screening of chips, cooking to pulp for (kraft cooking process).

## Geography
This dataset has been extrapolated from respective regional geographies (RER)- Data for main producers in Europe (Austria, Finland, France, Germany, Portugal, Poland, and Sweden).

## Technology
Average of present used technology
The kraft cooking process is a highly alkaline cooking process with caustic soda and sodium sulphide as active cooking chemicals with a pulp yield of around 55%. The pulp produced is defiberized in refiners, screened and washed before being sent to the paper mill. The stock passes through one or two head boxes onto the paper machine. Kraftliner is normally a two ply product and therefore requires a paper machine with two head boxes and normally also two wires.

## Reference product
- containerboard, linerboard: 1 kg; name linerboardAmount; By-product classification allocatable product; CPC 32151: Corrugated paper and paperboard; HS2017 480810: Paper and paperboard; corrugated, whether or not perforated, in rolls or sheets, other than paper of headin[...]
  production volume 1.96037e10 kg; name linerboardProductionVolume; = 183685954000*0.72*(0.18/0.942)
    Calculated value cross-checked with industry information. Calculated by splitting the total shipment of corrugated packaging materials in Europe in 2021 as reported by FEFCO (2021) (2.80E+10 kg) according to the reported shares of the consumption of testliner, kraftliner, other recycled liner, semi-chemical fluting and wellentsoff (=recycled fluting), respectively. The sum of shares was scaled to sum up to 100%. Reference(s): FEFCO. 2021. Annual Statistics 2021, accessible online at https://www.fefco.org/sites/default/files/documents/Fefco_AnnualEvaluation_2021_0.pdf, last accessed March 2023
  property price 0.598 EUR2005
    Export prices for the World+ according to: http://faostat.fao.org/site/626/DesktopDefault.aspx?PageID=626#ancor downloaded 28 April 2009; calculated as export value divided by export volume.
  property water content 0.0869565; name U
  property water in wet mass 0.08 kg; name WWM
  property wet mass 1 kg; name WM
  properties: allocation factor 0.976965, carbon allocation 0.4232 kg, carbon content 0.46, carbon content, non-fossil 0.46, dry mass 0.92 kg, heating value, net 15.92 MJ, true value 598

## Inputs from technosphere
- alkylketene dimer sizing agent, for paper production: 0.000673129 kg; lognormal variance with pedigree 0.0029, pedigree (1,2,2,5,1)
  FEFCO 2021. Reported as sizing agents.
  properties: carbon content, non-fossil 0.538229, dry mass 1 kg, heating value, net 16.31 MJ, wet mass 1 kg
- aluminium sulfate, powder: 0.00150453 kg; lognormal variance with pedigree 0.0029, pedigree (1,2,2,5,1)
  FEFCO 2021. Reported as alum Al2(SO4)3.
  properties: dry mass 1 kg, wet mass 1 kg
- ammonia, anhydrous, liquid: 1.0729e-6, 2.08272e-6, 2.30857e-5, 9.75846e-7, 2.18292e-7, 8.02262e-6, 6.89641e-7 kg (7 suppliers, which the file names only by identifier); sum of these 3.61477e-5 kg; lognormal variance with pedigree 0.0029, pedigree (1,2,2,5,1)
  FEFCO 2021. Reported as NH3
  properties: dry mass 1 kg, wet mass 1 kg
- ash from paper production sludge: -0.0126028 kg; name inorganicAshAmount; lognormal variance with pedigree 0.0029, pedigree (1,2,2,5,1)
  Reported by FEFCO (2021) as residue, inorganic ashes, 85 % dry content. Includes coal and lignite ashes.
  production volume; = linerboardProductionVolume*inorganicAshAmount/linerboardAmount
    Calculated from production volume of reference flow.
  properties: carbon content, fossil 0.00170774, carbon content, non-fossil 0.0092, dry mass 0.85 kg, water content 0.176471, wet mass 1 kg
  note on carbon content, fossil: C content was calculated as an addition of C content in the raw materials.
- calcium carbonate, precipitated: 0.0139022 kg; lognormal variance with pedigree 0.0029, pedigree (1,2,2,5,1)
  FEFCO 2021. Reported as CaCO3
  properties: carbon content, fossil 0.12001, dry mass 1 kg, wet mass 1 kg
- carbon dioxide, liquid: 0.00172923 kg; lognormal variance with pedigree 0.0029, pedigree (1,2,2,5,1)
  FEFCO 2021
  properties: carbon content, fossil 0.272727, dry mass 1 kg, heating value, net 8.27 MJ, wet mass 1 kg
- chemical, organic: 9.76965e-6 kg; lognormal variance with pedigree 0.0208, pedigree (4,4,2,5,3)
  FEFCO 2021. Reported as colorants.
  properties: carbon content, fossil 0.628, dry mass 1 kg, heating value, net 19.03 MJ, wet mass 1 kg
  note on carbon content, fossil: This dataset is an unweighted average of 20 organic substances (listed in Tab 88.1, ecoinvent v2.2 report 8, part II), being part of the top100 chemicals included in this database. The C-content has also been calculated as an unweighted average of the C content of the substances composing this dataset.
- diesel, low-sulfur: 3.60855e-7, 1.60819e-6, 1.92027e-5, 8.04365e-7, 5.33478e-8, 7.96778e-7 kg (6 suppliers, which the file names only by identifier); sum of these 2.28263e-5 kg; = 0.001*1000/42.8; lognormal variance with pedigree 0.0046, pedigree (2,3,2,5,2)
  Data provided by FEFCO 2021, indicated in energy content and given as 0.001 GJ/t Calculation into mass/volume was done by using the following conversion factor: Diesel MJ/kg 42.8. Based on literature, page 16, Report6, part 4. Source: https://ecoinvent.org/wp-content/uploads/2021/09/LHV_fuels.xlsx
  properties: carbon content, fossil 0.865, dry mass 1 kg, heating value, net 42.8 MJ, wet mass 1 kg
- dithiocarbamate-compound: 0.000112351 kg; lognormal variance with pedigree 0.0046, pedigree (2,3,2,5,2)
  FEFCO 2021. Reported as biocide. Assumed equally split between dithiocarbamate and triazine-compound
  properties: carbon content, fossil 0.179339, dry mass 1 kg, wet mass 1 kg
- electricity, medium voltage: 0.00990532, 0.197589, 0.00494638, 0.00303335, 0.000607122, 0.000130363, 0.0204041, 0.0586448 kWh (8 suppliers, which the file names only by identifier); sum of these 0.295261 kWh; lognormal variance with pedigree 0.0029, pedigree (1,2,2,5,1)
  FEFCO 2021. Reported as bought electricity
- ethoxylated alcohol (AE3): 0.000166084 kg; lognormal variance with pedigree 0.0046, pedigree (2,3,2,5,2)
  FEFCO 2021. Proxy for defoamer, unspecified.
  properties: carbon content, fossil 0.207952, carbon content, non-fossil 0.485221, dry mass 1 kg, heating value, net 21 MJ, wet mass 1 kg
- hard coal: 9.49773e-5, 2.25374e-5, 0.000672177, 0.00015786, 9.69221e-5, 0.000209462, 4.12171e-5 kg (7 suppliers, which the file names only by identifier); sum of these 0.00129515 kg; = 0.037*1000/27.91; lognormal variance with pedigree 0.0046, pedigree (2,3,2,5,2)
  Data provided by FEFCO 2021, indicated in energy content and given as 0.037 GJ/t . Calculation into mass/volume was done by using the following conversion factor: Hard coal: MJ/kg 27.91. Based on the Characterization factor of Hard coal in the CED method. Source: https://ecoinvent.org/wp-content/uploads/2021/09/LHV_fuels.xlsx
  properties: carbon content, fossil 0.845, dry mass 0.94 kg, heating value, net 27.91 MJ, water content 0.0638298, wet mass 1 kg
  note on carbon content, fossil: C content 75-94% (specified in Tab 1.1, report 6, part VI). A mean content of 0.845 kg C/ kg dry hard coal was considered
  note on heating value, net: Based on the Characterization factor of Hard coal in the CED method
- heat, district or industrial, natural gas: 0.357569 MJ; lognormal variance with pedigree 0.0029, pedigree (1,2,2,5,1)
  FEFCO 2021. Reported as steam
  properties: heating value, net 1 MJ
- heavy fuel oil: 4.02622e-5, 2.34452e-5, 0.000119191, 0.00278627, 3.00768e-5, 0.00015455 kg (6 suppliers, which the file names only by identifier); sum of these 0.00315379 kg; = 0.133*1000/41.2; lognormal variance with pedigree 0.0046, pedigree (2,3,2,5,2)
  Data provided by FEFCO 2021, indicated in energy content and given as 0.133 GJ/t. Calculation into mass/volume was done by using the following conversion factor: Heavy fuel oil: MJ/kg 41.2. Based on literature, page 21, Report6, part 4. Source: https://ecoinvent.org/wp-content/uploads/2021/09/LHV_fuels.xlsx
  properties: carbon content, fossil 0.849, dry mass 1 kg, heating value, net 41.2 MJ, wet mass 1 kg
- hydrogen peroxide, without water, in 50% solution state: 0.00261827 kg; lognormal variance with pedigree 0.0029, pedigree (1,2,2,5,1)
  FEFCO 2021
  properties: dry mass 1 kg, heating value, net 7.13 MJ, wet mass 1 kg
- kaolin: 0.0121925 kg; lognormal variance with pedigree 0.0046, pedigree (2,3,2,5,2)
  FEFCO 2021. Proxy for Fillers
  properties: dry mass 1 kg, wet mass 1 kg
- light fuel oil: 1.02743e-5, 0.00107654, 5.29447e-5, 0.000106855, 7.63548e-6, 7.09077e-6 kg (6 suppliers, which the file names only by identifier); sum of these 0.00126134 kg; = 0.055*1000/42.6; lognormal variance with pedigree 0.0046, pedigree (2,3,2,5,2)
  Data provided by FEFCO 2021, indicated in energy content and given as 0.055 GJ/t.Calculation into mass/volume was done by using the following conversion factor: Light fuel oil: MJ/kg 42.6 Based on literature, page 18, Report6, part 4. Source: https://ecoinvent.org/wp-content/uploads/2021/09/LHV_fuels.xlsx
  properties: carbon content, fossil 0.862, dry mass 1 kg, heating value, net 42.6 MJ, wet mass 1 kg
- limestone residue: -0.0132867 kg; name wasteCalciumCarbonateAmount; lognormal variance with pedigree 0.0029, pedigree (1,2,2,5,1)
  Reported by FEFCO (2021) as "Calcium carbonate" 75% dry content
  production volume; = linerboardProductionVolume*wasteCalciumCarbonateAmount/linerboardAmount
    Calculated from production volume of reference flow.
  properties: carbon content, fossil 0.120005, dry mass 0.75 kg, water content 0.333333, wet mass 1 kg
- liquefied petroleum gas: 2.58353e-6, 2.48109e-5, 7.78876e-6, 1.7336e-6, 8.81243e-5, 0.000368809 kg (6 suppliers, which the file names only by identifier); sum of these 0.00049385 kg; = 0.023*1000/45.50; lognormal variance with pedigree 0.0046, pedigree (2,3,2,5,2)
  FEFCO 2021. Reported as 0.023 GJ/t. Converted to kg using the lower heating value (45.50 MJ/kg). The LHV represents an indicative value. Reference: Fuels - Higher and Lower Calorific Values, available at: https://www.engineeringtoolbox.com/fuels-higher-calorific-values-d_169.html
  properties: carbon content, fossil 0.821863, dry mass 1 kg, heating value, net 45.5 MJ, wet mass 1 kg
  note on heating value, net: Indicative value. Reference: Fuels - Higher and Lower Calorific Values, available at: https://www.engineeringtoolbox.com/fuels-higher-calorific-values-d_169.html
- lubricating oil: 6.74106e-5 kg; lognormal variance with pedigree 0.0029, pedigree (1,2,2,5,1)
  FEFCO 2021. Reported as lubricants
  properties: carbon content, fossil 0.75, dry mass 1 kg, heating value, net 40.2 MJ, wet mass 1 kg
  note on carbon content, fossil: Lubricating oil is produced from diesel. C-content/dry mass of fats and oils considered 75%, from: ecoinvent v2.2 report, n 15a, pg 40
  note on heating value, net: Literature value, Source: IPCC 2006, 2006 IPCC Guidelines for National Greenhouse Gas Inventories, Prepared by the National Greenhouse Gas Inventories Programme, Eggleston H.S., Buendia L., Miwa K., Ngara T. and Tanabe K. (eds). Published: IGES, Japan
- maize starch: 0.00473146 kg; = 4.165/0.86; lognormal variance with pedigree 0.0046, pedigree (2,3,2,5,2)
  FEFCO 2021. Proxy for half of "starch, modified" (5.02 kg), and "wheat starch" (3.31 kg). Other half of the two starches modeled as maize starch. Given as dry mass
  properties: carbon content, non-fossil 0.46, dry mass 0.86 kg, heating value, net 11.64 MJ, water content 0.162791, wet mass 1 kg
  note on carbon content, non-fossil: C-content of starch is considered 46% on dry mass basis (from "Evolutionary and Biochemical Aspects", A.D. Kay and T. Vrede (in Global Ecology, 2010, Elsevier B.V., S.E. Jørgensen Ed.)).
- municipal solid waste: -1.92642e-5, -2.28754e-6, -0.0108688, -1.60073e-6, -5.13805e-7, -1.16134e-6, -4.83469e-5 kg (7 suppliers, which the file names only by identifier); sum of these -0.010942 kg; lognormal variance with pedigree 0.0046, pedigree (2,3,2,5,2)
  Reported by FEFCO (2021) as "residue, rejects, paper-related" (3.7kg), representing paper clips, tags, adhesive labels, fibres etc. and "residue, rejects, other" (7.5 kg), representing e.g. glass, sand, plastics. Dry content 57%
  production volume; = linerboardProductionVolume * (mswAmount/ linerboardAmount)
    Calculated from production volume of reference product using the relative outputs.
  properties: carbon content, fossil 0.171549, carbon content, non-fossil 0.261655, dry mass 0.57 kg, heating value, net 11.74 MJ, water content 0.754386, wet mass 1 kg
  note on carbon content, fossil: MSW composition in tab 4.1, ecoinvent v2.2 report 13_I. C content referred to 1 kg DM
  note on heating value, net: Value taken from the general comment of the treatment dataset.
- natural gas, high pressure: 0.000193286, 0.00032605, 0.000711214, 0.000238013, 5.56228e-5, 0.000331055, 0.000317673, 0.000835329, 0.000322492, 0.000498805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 m3 (36 suppliers, which the file names only by identifier); sum of these 0.0240713 m3; = 0.887*1000/36; lognormal variance with pedigree 0.0046, pedigree (2,3,2,5,2)
  Data provided by FEFCO 2021, indicated in energy content and given as 0.887 GJ/t.Calculation into mass/volume was done by using the following conversion factor: 36 MJ/m3. Literature value, Source: Christoph Meili;Niels Jungbluth;Maresa Bussa (2021) Life cycle inventories of crude oil and natural gas extraction. ESU-services Ltd. commissioned by BAFU & VSG, Schaffhausen, Switzerland, http://esu-services.ch/data/public-lci-reports/
  properties: carbon content, fossil 0.741, dry mass 0.735 kg, heating value, gross 40 MJ, heating value, net 36 MJ, wet mass 0.735 kg
  note on heating value, gross: At standard conditions; based on Meili et al. (2022) section 5.2
- oxygen, liquid: 0.001739 kg; lognormal variance with pedigree 0.0029, pedigree (1,2,2,5,1)
  FEFCO 2021
  properties: dry mass 1 kg, wet mass 1 kg
- paper mill, integrated: 5.30959e-11 unit; = 1 / 50 / 368000; lognormal variance with pedigree 0.3526, pedigree (3,3,5,5,3)
  Estimated value with lifetime (50 years) and yearly production (368 kt) of underlying ecoinvent process (integrated paper mill).
- peat: 0.000681603 kg; = 0.006*1000/10/0.86; lognormal variance with pedigree 0.0046, pedigree (2,3,2,5,2)
  FEFCO 2021. Reported as 0.006 GJ /ton net saleable product. converted with a LHV of 10 MJ/kg. LHV represents an indicative value. Reference: Nature and Management of Tropical Peat Soils, FAO Soils Bulletin 59, available at: http://www.fao.org/3/x5872e/x5872e00.htm#Contents. The scaling factor of 0.86 accounts for the higher carbon content of peat that was assumed in the FEFCO 2021 report.
  properties: carbon content, fossil 0.59, dry mass 0.42 kg, heating value, net 10 MJ, water content 1.38095, wet mass 1 kg
  note on carbon content, fossil: C content of dry peat is 58-60% (specified in Tab 1.1, report 6, part VI). A mean content of 0.59 kg C/kg dry peat was considered.
  note on heating value, net: Indicative value. Reference: Nature and Management of Tropical Peat Soils, FAO Soils Bulletin 59, available at: http://www.fao.org/3/x5872e/x5872e00.htm#Contents
- polyaluminium chloride: 0.00106489 kg; lognormal variance with pedigree 0.0029, pedigree (1,2,2,5,1)
  FEFCO 2021. Reported as PAC
  properties: dry mass 1 kg, wet mass 1 kg
- potato starch: 0.00508632 kg; = 4.165/0.8; lognormal variance with pedigree 0.0046, pedigree (2,3,2,5,2)
  FEFCO 2021. Proxy for half of "starch, modified" (5.02 kg), and "wheat starch" (3.31 kg). Other half of the two starches modeled as maize starch.Given as dry mass
  properties: carbon content, non-fossil 0.46, dry mass 0.8 kg, heating value, net 10.66 MJ, water content 0.25, wet mass 1 kg
- pulpwood, hardwood, measured as solid wood under bark: 0.000129501 m3; = 0.14*0.531431095354094*1000/623.644444444444/0.9; lognormal variance with pedigree 0.0029, pedigree (1,2,2,5,1)
  Reported as 0.14 bone dry tonnes of HW logs. Converted to m3 using the DM property. The split of the different HW inputs is based on the market shares for pulpwood, hardwood, measured as solid wood under bark. The value was scaled with the factor of 0.9 to include the bark.
  properties: basic wood density 563.2, carbon content, non-fossil 0.494, dry mass 623.644 kg, heating value, net 6071.3 MJ, water content 0.8, wet mass 1122.56 kg
  note on heating value, net: Value based on "hardwood forestry, mixed species, sustainable forest management"The property is based on a value of 11.58MJ/kg
- pulpwood, hardwood, measured as solid wood under bark: 1.19417e-5 m3; = 0.14*0.049004873090884*1000/623.644444444444/0.9; lognormal variance with pedigree 0.0029, pedigree (1,2,2,5,1)
  (same comment as for pulpwood, hardwood, measured as solid wood under bark)
- pulpwood, hardwood, measured as solid wood under bark: 0.000106035 m3; = 0.14*0.419564031555022*1000/601.333333333333/0.9; lognormal variance with pedigree 0.0029, pedigree (1,2,2,5,1)
  (same comment as for pulpwood, hardwood, measured as solid wood under bark)
  properties: basic wood density 563.2, carbon content, non-fossil 0.494, dry mass 601.333 kg, heating value, net 6071.3 MJ, water content 0.8, wet mass 1082.4 kg
- pulpwood, softwood, measured as solid wood under bark: 0.000189196 m3; = 0.63*0.132547341339919*1000/490/0.88; lognormal variance with pedigree 0.0029, pedigree (1,2,2,5,1)
  Reported as 0.63 bone dry tonnes of SW logs. Converted to m3 using the DM property. The split of the different SW inputs is based on the market shares for pulpwood, softwood, measured as solid wood under bark. Reported as 0.63 bone dry tonnes of SW logs. The value was scaled with the factor of 0.88 to include the bark
  properties: basic wood density 387.2, carbon content, non-fossil 0.494, dry mass 490 kg, heating value, net 4483.78 MJ, water content 0.8, wet mass 882 kg
  note on heating value, net: Value based on "softwood forestry, mixed species, sustainable forest management"The property is based on a value of 11.58MJ/kg
- pulpwood, softwood, measured as solid wood under bark: 0.000205695 m3; = 0.63*0.126460842676847*1000/430/0.88; lognormal variance with pedigree 0.0029, pedigree (1,2,2,5,1)
  Reported as 0.63 bone dry tonnes of SW logs. Converted to m3 using the DM property. The split of the different SW inputs is based on the market shares for pulpwood, softwood, measured as solid wood under bark. The value was scaled with the factor of 0.88 to include the bark.
  properties: basic wood density 387.2, carbon content, non-fossil 0.494, dry mass 430 kg, heating value, net 4483.78 MJ, water content 0.8, wet mass 774 kg
- pulpwood, softwood, measured as solid wood under bark: 0.000473187 m3; = 0.63*0.331506544535353*1000/490/0.88; lognormal variance with pedigree 0.0029, pedigree (1,2,2,5,1)
  (same comment as for pulpwood, softwood, measured as solid wood under bark)
- pulpwood, softwood, measured as solid wood under bark: 0.00066605 m3; = 0.63*0.409485271447881*1000/430/0.88; lognormal variance with pedigree 0.0029, pedigree (1,2,2,5,1)
  (same comment as for pulpwood, softwood, measured as solid wood under bark)
- quicklime, milled, loose: 0.00419118 kg; lognormal variance with pedigree 0.0029, pedigree (1,2,2,5,1)
  FEFCO 2021. Reported as CaO
  properties: dry mass 0.99 kg, water content 0.010101, wet mass 1 kg
- retention aid, for paper production: 0.00183669 kg; lognormal variance with pedigree 0.0046, pedigree (2,3,2,5,2)
  FEFCO 2021. Proxy for polymer and retention agents
  properties: carbon content, fossil 0.5, dry mass 1 kg, heating value, net 15.15 MJ, wet mass 1 kg
- sludge from pulp and paper production: -0.0184646 kg; name residualSludge; lognormal variance with pedigree 0.0029, pedigree (1,2,2,5,1)
  FEFCO 2021. Reported as residue, inorganic sludges (8.7 kg, 32% dry content) and organic sludges (10.2 kg, 43% dry content).
  production volume; = linerboardProductionVolume * (residualSludge/ linerboardAmount)
    Calculated from production volume of reference product using the relative outputs.
  property aluminium content 0; name sludge_Al_content
  property ammonium fraction of total nitrogen 0; name sludge_AmmoniumFracOfN
  property arsenic content 0; name sludge_As_content
  property boron content 0; name sludge_B_content
  property cadmium content 0; name sludge_Cadmium_content
  property chromium content 0; name sludge_Cr_content
  property cobalt content 0; name sludge_Co_content
  property copper content 0; name sludge_Cu_content
  property iron content 0; name sludge_Fe_content
  property lead content 0; name sludge_Pb_content
  property manganese content 0; name sludge_Mn_content
  property mercury content 0; name sludge_Hg_content
  property molybdenum content 0; name sludge_Mo_content
  property nickel content 0; name sludge_Ni_content
  property nitrogen content 0; name sludge_N_content
  property phosphorus content 0; name sludge_P_content
  property potassium content 0; name sludge_K_content
  property tcdd equivalents 0; name sludge_tcdd_eq
  property zinc content 0; name sludge_Zn_content
  properties: carbon content, non-fossil 0.21, dry mass 0.379365 kg, heating value, net 2.65 MJ, water content 1.63598, wet mass 1 kg
  note on ammonium fraction of total nitrogen: This parameter expresses the ammonium content (NH4-N) of total nitrogen (N tot)
  note on arsenic content: arsenic content on a dry matter basis. Taken from CRAAQ Guide 2nd edition, see references
  note on cadmium content: cadmium content on a dry matter basis. Taken from CRAAQ Guide 2nd edition, see references
  note on chromium content: chromium content on a dry matter basis. Taken from CRAAQ Guide 2nd edition, see references
  note on cobalt content: cobalt content on a dry matter basis. Taken from CRAAQ Guide 2nd edition, see references
  note on copper content: copper content on a dry matter basis. Taken from CRAAQ Guide 2nd edition, see references
  note on lead content: lead content on a dry matter basis. Taken from CRAAQ Guide 2nd edition, see references
  note on mercury content: mercury content on a dry, matter basis. Taken from CRAAQ Guide 2nd edition, see references
  note on molybdenum content: molybdenum content on a dry matter basis. Taken from CRAAQ Guide 2nd edition, see references
  note on nitrogen content: nitrogen content on a dry matter basis. Taken from CRAAQ Guide 2nd edition, see references
  note on tcdd equivalents: TCDD-equivalents represents the amount of dioxins and furanes
  note on zinc content: zinc content on a dry matter basis, Taken from CRAAQ Guide 2nd edition, see references
- sodium hydroxide, without water, in 50% solution state: 0.0065652 kg; lognormal variance with pedigree 0.0029, pedigree (1,2,2,5,1)
  FEFCO 2021
  properties: dry mass 1 kg, heating value, net 3.03 MJ, wet mass 1 kg
- sodium sulfate, anhydrite: 0.000664336 kg; lognormal variance with pedigree 0.0029, pedigree (1,2,2,5,1)
  FEFCO 2021. Reported as Na2SO4
  properties: dry mass 1 kg, wet mass 1 kg
- sulfate pulp, bleached: 0.0458088 kg; = 42.2/0.9; lognormal variance with pedigree 0.0029, pedigree (1,2,2,5,1)
  FEFCO 2021. Reported as dry mass
  properties: carbon content, non-fossil 0.494, dry mass 0.9 kg, heating value, net 13.23 MJ, water content 0.111111, wet mass 1 kg
  note on carbon content, non-fossil: C content of dry mass of sulfate pulp is 0.494 kgC/kg dry wood (ecoinvent v2.2 report 6_IX & ecoinvent v2.2 report 9). No other C containing products in the formulation of the pulp.
- sulfate pulp, unbleached: 0.0410325 kg; = 37.8/0.9; lognormal variance with pedigree 0.0029, pedigree (1,2,2,5,1)
  FEFCO 2021. Reported as dry mass
  properties: carbon content, non-fossil 0.494, dry mass 0.9 kg, heating value, net 13.23 MJ, price 0.355 EUR2005, water content 0.111111, wet mass 1 kg
- sulfuric acid: 0.00595949 kg; lognormal variance with pedigree 0.0029, pedigree (1,2,2,5,1)
  FEFCO 2021
  properties: dry mass 1 kg, wet mass 1 kg
- tap water: 0.000119298, 0.00018186, 0.000339341, 0.00091416, 0.00458578, 0.0524775 kg (6 suppliers, which the file names only by identifier); sum of these 0.0586179 kg; lognormal variance with pedigree 0.0029, pedigree (1,2,2,5,1)
  FEFCO 2021. Reported as Municipal water
  properties: carbon content, fossil 0.00178991, dry mass 0.000337476 kg, water content 2962.17, wet mass 1 kg
  note on carbon content, fossil: Bicarbonate content is 2.93 mol/m3. CO2 content is 0.1 mol/m3 (ecoinvent v2.2 report 8, Tab 93.1).
- transport, freight train: 0.0282221, 0.0071581, 0.0258364, 0.00181258, 0.0356443 metric ton*km (5 suppliers, which the file names only by identifier); sum of these 0.0986735 metric ton*km; lognormal variance with pedigree 0.1223, pedigree (1,2,2,5,1)
  FEFCO 2021. Transport of wood
- transport, freight, inland waterways, barge: 0.290159 metric ton*km; lognormal variance with pedigree 0.1223, pedigree (1,2,2,5,1)
  FEFCO 2021. Transport of wood
- transport, freight, lorry >32 metric ton, EURO5: 0.111512, 0.608511 metric ton*km (2 suppliers, which the file names only by identifier); sum of these 0.720023 metric ton*km; lognormal variance with pedigree 0.1223, pedigree (1,2,2,5,1)
  FEFCO 2021. Transport of wood
- triazine-compound: 0.000112351 kg; lognormal variance with pedigree 0.0046, pedigree (2,3,2,5,2)
  (same comment as for dithiocarbamate-compound)
  properties: carbon content, fossil 0.475616, dry mass 1 kg, wet mass 1 kg
- waste mineral oil: -0.000127005 kg; name wasteLubricantsOilAmount; lognormal variance with pedigree 0.0029, pedigree (1,2,2,5,1)
  FEFCO 2021. Reported as residue, lubricants and oil
  production volume; = linerboardProductionVolume*wasteLubricantsOilAmount/linerboardAmount
    Calculated from production volume of reference flow.
  properties: carbon content, fossil 0.864444, dry mass 0.9 kg, heating value, net 34.7 MJ, water content 0.111111, wet mass 1 kg
  note on carbon content, fossil: Tab A.6, ecoinvent v2.2 report 13_I. C content has been calculated after data in the tables, and then referred to 1 kg DM
- waste paperboard, sorted: 0.271792 kg; lognormal variance with pedigree 0.0029, pedigree (1,2,2,5,1)
  FEFCO 2021. Reported as Mixed Grades (1114.1 kg/t); Corrugated and Kraft. pre- consumer (25.8 kg/t); Corrugated and Kraft. post- consumer (137.3 kg/t); Other grades (1 kg/t)
  properties: carbon content, fossil 0.01, carbon content, non-fossil 0.46, dry mass 0.9 kg, heating value, net 15.92 MJ, water content 0.111111, wet mass 1 kg
  note on carbon content, fossil: Assumed carbon content of the waste paperboard (it is assumed that the content of other materials in the waste paperboard input is about 5%)
- wood chips, dry, measured as dry mass: 0.326349 kg; = 0.2*1000+( 1.823*1000)/13.6; lognormal variance with pedigree 0.0029, pedigree (1,2,2,5,1)
  FEFCO 2021. Reported as sawmill residues, hardwood and biofuels: Sawmill residues are reported in tonne bone dry weight (0.2 t/t), biofuels are reported as bark, scrap wood and tall oil in 1.823 GJ/tonne product. A LHV of 18.9 MJ/kg was assumed.
  properties: carbon content, non-fossil 0.494, dry mass 1 kg, heating value, net 9.99 MJ, water content 0.4, wet mass 1.4 kg
  note on carbon content, non-fossil: C content of dry mass is 0.494 kgC/kg dry wood (ecoinvent v2.2 report 9).

## Inputs from nature
- Oxygen [natural resource, in air]: 0.894111 kg; name O2; = (CO2_fossil+CO2_non_fossil)/(16*2+12) * (16*2) + (CO_fossil+CO_non_fossil)/(16+12) *16; lognormal variance with pedigree 0.0194, pedigree (4,3,2,5,3)
  Oxygen is required for the combustion process. Calculated value
- Water, river [natural resource, in water]: 0.0307842 m3; lognormal variance with pedigree 0.0029, pedigree (1,2,2,5,1)
  FEFCO 2021. Reported as Surface water (31.19 m3) and rain water (0.32 m3)
- Water, well, in ground [natural resource, in water]: 0.000136775 m3; lognormal variance with pedigree 0.0029, pedigree (1,2,2,5,1)
  FEFCO 2021. Reported as Ground water (renrewable)

## Emissions to nature
- Acetaldehyde [air, unspecified]: 2.12017e-7 kg; lognormal variance with pedigree 0.0528, pedigree (3,3,2,5,3)
  Estimation based on fuel input data and emission factors from corresponding ecoinvent fuel combustion datasets (see "Extrapolations" comment). The internal fuels mainly consist of the black liquor and bark from the wood input for pulp production. Internal fuels are represented by the calculated emissions but do not have the corresponding fuel input from technosphere, because they are supplied from within the system boundaries. The amounts of internal fuels used in the process are: Black liquor (8.203 GJ/t), Bark (1.372 GJ/t), biogas and biosludge (0.087 GJ/t), Refuse derived fuel (RDF) (0.024 GJ/t), and other internal fuels (0.114 GJ/t). No proxy was available for the combustion of black liquor, Refuse derived fuel, and other internal fuels. Emissions from these internal energy generation processes are therefore only reflected in the key emission factors provided by the industry, other emissions constitute a data gap.
- Acetic acid [air, unspecified]: 2.22932e-7 kg; lognormal variance with pedigree 0.0528, pedigree (3,3,2,5,3)
  (same comment as for Acetaldehyde)
- Acetone [air, unspecified]: 1.9207e-8 kg; lognormal variance with pedigree 0.0528, pedigree (3,3,2,5,3)
  (same comment as for Acetaldehyde)
- Acetylene [air, unspecified]: 4.73839e-8 kg; lognormal variance with pedigree 0.0528, pedigree (3,3,2,5,3)
  (same comment as for Acetaldehyde)
- Aluminium III [air, unspecified]: 4.56559e-7 kg; lognormal variance with pedigree 0.6628, pedigree (3,3,2,5,3)
  (same comment as for Acetaldehyde)
- Ammonia [air, unspecified]: 5.45006e-6 kg; lognormal variance with pedigree 0.0528, pedigree (3,3,2,5,3)
  (same comment as for Acetaldehyde)
- Antimony ion [air, unspecified]: 2.05421e-10 kg; lognormal variance with pedigree 0.4128, pedigree (3,3,2,5,3)
  (same comment as for Acetaldehyde)
- Arsenic ion [air, unspecified]: 6.02007e-9 kg; lognormal variance with pedigree 0.0528, pedigree (3,3,2,5,3)
  (same comment as for Acetaldehyde)
- Barium II [air, unspecified]: 6.03792e-9 kg; lognormal variance with pedigree 0.0528, pedigree (3,3,2,5,3)
  (same comment as for Acetaldehyde)
- Benzene [air, unspecified]: 3.29963e-6 kg; lognormal variance with pedigree 0.0528, pedigree (3,3,2,5,3)
  (same comment as for Acetaldehyde)
- Benzo(a)pyrene [air, unspecified]: 1.70487e-9 kg; lognormal variance with pedigree 0.3128, pedigree (3,3,2,5,3)
  (same comment as for Acetaldehyde)
- Beryllium II [air, unspecified]: 6.03792e-11 kg; lognormal variance with pedigree 0.0528, pedigree (3,3,2,5,3)
  (same comment as for Acetaldehyde)
- Boron [air, unspecified]: 8.39595e-8 kg; lognormal variance with pedigree 0.6628, pedigree (3,3,2,5,3)
  (same comment as for Acetaldehyde)
- Bromine [air, unspecified]: 1.89123e-7 kg; lognormal variance with pedigree 0.0528, pedigree (3,3,2,5,3)
  (same comment as for Acetaldehyde)
- Butane [air, unspecified]: 6.99012e-7 kg; lognormal variance with pedigree 0.0528, pedigree (3,3,2,5,3)
  (same comment as for Acetaldehyde)
- Cadmium II [air, unspecified]: 2.3037e-9 kg; lognormal variance with pedigree 0.6628, pedigree (3,3,2,5,3)
  (same comment as for Acetaldehyde)
- Calcium II [air, unspecified]: 1.8753e-5 kg; lognormal variance with pedigree 0.0528, pedigree (3,3,2,5,3)
  (same comment as for Acetaldehyde)
- Carbon dioxide, fossil [air, unspecified]: 0.0784601 kg; name CO2_fossil; lognormal variance with pedigree 0.0029, pedigree (1,2,2,5,1)
  FEFCO 2021
- Carbon dioxide, non-fossil [air, unspecified]: 1.14987 kg; name CO2_non_fossil; lognormal variance with pedigree 0.0029, pedigree (1,2,2,5,1)
  FEFCO 2021
- Carbon monoxide, fossil [air, unspecified]: 8.73657e-5 kg; name CO_fossil; = 1.4*0.063875478211073; lognormal variance with pedigree 0.6688, pedigree (4,3,2,5,3)
  FEFCO 2021. Reported as CO. Same shares of fossil and non-fossil are assumed for CO and CO2.
- Carbon monoxide, non-fossil [air, unspecified]: 0.00128039 kg; name CO_non_fossil; = 1.4*0.936124521788927; lognormal variance with pedigree 0.6688, pedigree (4,3,2,5,3)
  (same comment as for Carbon monoxide, fossil)
- Chlorine [air, unspecified]: 5.66073e-7 kg; lognormal variance with pedigree 0.0528, pedigree (3,3,2,5,3)
  (same comment as for Acetaldehyde)
- Chromium III [air, unspecified]: 1.43118e-8 kg; lognormal variance with pedigree 0.6628, pedigree (3,3,2,5,3)
  (same comment as for Acetaldehyde)
- Chromium VI [air, unspecified]: 2.36843e-10 kg; lognormal variance with pedigree 0.6628, pedigree (3,3,2,5,3)
  (same comment as for Acetaldehyde)
- Cobalt II [air, unspecified]: 4.56194e-9 kg; lognormal variance with pedigree 0.6628, pedigree (3,3,2,5,3)
  (same comment as for Acetaldehyde)
- Copper ion [air, unspecified]: 1.10197e-7 kg; lognormal variance with pedigree 0.6628, pedigree (3,3,2,5,3)
  (same comment as for Acetaldehyde)
- Dinitrogen monoxide [air, unspecified]: 7.50951e-6 kg; lognormal variance with pedigree 0.0528, pedigree (3,3,2,5,3)
  (same comment as for Acetaldehyde)
- Dioxins, measured as 2,3,7,8-tetrachlorodibenzo-p-dioxin [air, unspecified]: 9.83364e-14 kg; lognormal variance with pedigree 0.0528, pedigree (3,3,2,5,3)
  (same comment as for Acetaldehyde)
- Ethane [air, unspecified]: 1.42151e-7 kg; lognormal variance with pedigree 0.0528, pedigree (3,3,2,5,3)
  (same comment as for Acetaldehyde)
- Ethanol [air, unspecified]: 3.84141e-8 kg; lognormal variance with pedigree 0.0528, pedigree (3,3,2,5,3)
  (same comment as for Acetaldehyde)
- Ethyl benzene [air, unspecified]: 9.43455e-8 kg; lognormal variance with pedigree 0.0528, pedigree (3,3,2,5,3)
  (same comment as for Acetaldehyde)
- Ethylene [air, unspecified]: 2.84304e-7 kg; lognormal variance with pedigree 0.0528, pedigree (3,3,2,5,3)
  (same comment as for Acetaldehyde)
- Fluorine [air, unspecified]: 1.57243e-7 kg; lognormal variance with pedigree 0.0528, pedigree (3,3,2,5,3)
  (same comment as for Acetaldehyde)
- Formaldehyde [air, unspecified]: 6.16455e-7 kg; lognormal variance with pedigree 0.0528, pedigree (3,3,2,5,3)
  (same comment as for Acetaldehyde)
- Hexachlorobenzene [air, unspecified]: 2.26429e-14 kg; lognormal variance with pedigree 0.0528, pedigree (3,3,2,5,3)
  (same comment as for Acetaldehyde)
- Hydrocarbons, aliphatic, alkanes, unspecified [air, unspecified]: 3.01222e-6 kg; lognormal variance with pedigree 0.0528, pedigree (3,3,2,5,3)
  (same comment as for Acetaldehyde)
- Hydrocarbons, aliphatic, unsaturated [air, unspecified]: 9.80026e-6 kg; lognormal variance with pedigree 0.0528, pedigree (3,3,2,5,3)
  (same comment as for Acetaldehyde)
- Hydrocarbons, aromatic [air, unspecified]: 2.08444e-8 kg; lognormal variance with pedigree 0.0528, pedigree (3,3,2,5,3)
  (same comment as for Acetaldehyde)
- Hydrochloric acid [air, unspecified]: 1.67299e-6 kg; lognormal variance with pedigree 0.0528, pedigree (3,3,2,5,3)
  (same comment as for Acetaldehyde)
- Hydrogen fluoride [air, unspecified]: 5.29132e-8 kg; lognormal variance with pedigree 0.0528, pedigree (3,3,2,5,3)
  (same comment as for Acetaldehyde)
- Hydrogen sulfide [air, unspecified]: 3.63639e-6 kg; = 0.0035/(32.065/34.1); lognormal variance with pedigree 0.0423, pedigree (1,2,2,5,1)
  FEFCO 2021. Reported as S (0.016 kg). Converted stoichiometrically to H2S.
- Iodine [air, unspecified]: 6.7882e-10 kg; lognormal variance with pedigree 0.0528, pedigree (3,3,2,5,3)
  (same comment as for Acetaldehyde)
- Iron ion [air, unspecified]: 3.44501e-7 kg; lognormal variance with pedigree 0.6628, pedigree (3,3,2,5,3)
  (same comment as for Acetaldehyde)
- Lead II [air, unspecified]: 1.00151e-7 kg; lognormal variance with pedigree 0.6628, pedigree (3,3,2,5,3)
  (same comment as for Acetaldehyde)
- Lead-210 [air, unspecified]: 2.0444e-6 kBq; lognormal variance with pedigree 0.3128, pedigree (3,3,2,5,3)
  (same comment as for Acetaldehyde)
- Magnesium [air, unspecified]: 1.31359e-6 kg; lognormal variance with pedigree 0.6628, pedigree (3,3,2,5,3)
  (same comment as for Acetaldehyde)
- Manganese II [air, unspecified]: 5.35572e-7 kg; lognormal variance with pedigree 0.6628, pedigree (3,3,2,5,3)
  (same comment as for Acetaldehyde)
- Mercury II [air, unspecified]: 1.18866e-9 kg; lognormal variance with pedigree 0.6628, pedigree (3,3,2,5,3)
  (same comment as for Acetaldehyde)
- Methane, fossil [air, unspecified]: 4.33682e-6 kg; lognormal variance with pedigree 0.0528, pedigree (3,3,2,5,3)
  (same comment as for Acetaldehyde)
- Methane, non-fossil [air, unspecified]: 9.63971e-6 kg; lognormal variance with pedigree 0.0528, pedigree (3,3,2,5,3)
  (same comment as for Acetaldehyde)
- Methanol [air, unspecified]: 6.53039e-8 kg; lognormal variance with pedigree 0.0528, pedigree (3,3,2,5,3)
  (same comment as for Acetaldehyde)
- Molybdenum VI [air, unspecified]: 1.45482e-9 kg; lognormal variance with pedigree 0.6628, pedigree (3,3,2,5,3)
  (same comment as for Acetaldehyde)
- NMVOC, non-methane volatile organic compounds [air, unspecified]: 2.22602e-5 kg; lognormal variance with pedigree 0.0528, pedigree (3,3,2,5,3)
  (same comment as for Acetaldehyde)
- Nickel II [air, unspecified]: 8.26325e-8 kg; lognormal variance with pedigree 0.6628, pedigree (3,3,2,5,3)
  (same comment as for Acetaldehyde)
- Nitrogen oxides [air, unspecified]: 0.000810881 kg; lognormal variance with pedigree 0.0423, pedigree (1,2,2,5,1)
  FEFCO 2021. Reported as NOx (as NO2)
- PAH, polycyclic aromatic hydrocarbons [air, unspecified]: 4.4754e-8 kg; lognormal variance with pedigree 0.3128, pedigree (3,3,2,5,3)
  (same comment as for Acetaldehyde)
- Particulate Matter, < 2.5 um [air, unspecified]: 2.61827e-5 kg; lognormal variance with pedigree 0.3023, pedigree (1,2,2,5,1)
  FEFCO 2021
- Particulate Matter, > 10 um [air, unspecified]: 7.71802e-5 kg; lognormal variance with pedigree 0.0423, pedigree (1,2,2,5,1)
  FEFCO 2021
- Particulate Matter, > 2.5 um and < 10um [air, unspecified]: 1.45568e-5 kg; lognormal variance with pedigree 0.1223, pedigree (1,2,2,5,1)
  FEFCO 2021
- Pentachlorophenol [air, unspecified]: 2.54733e-11 kg; lognormal variance with pedigree 0.0528, pedigree (3,3,2,5,3)
  (same comment as for Acetaldehyde)
- Pentane [air, unspecified]: 1.18029e-6 kg; lognormal variance with pedigree 0.0528, pedigree (3,3,2,5,3)
  (same comment as for Acetaldehyde)
- Phenol [air, unspecified]: 2.93089e-9 kg; lognormal variance with pedigree 0.0528, pedigree (3,3,2,5,3)
  (same comment as for Acetaldehyde)
- Phosphorus [air, unspecified]: 9.46332e-7 kg; lognormal variance with pedigree 0.0528, pedigree (3,3,2,5,3)
  (same comment as for Acetaldehyde)
- Polonium-210 [air, unspecified]: 3.74098e-6 kBq; lognormal variance with pedigree 0.3128, pedigree (3,3,2,5,3)
  (same comment as for Acetaldehyde)
- Potassium I [air, unspecified]: 7.3644e-5 kg; lognormal variance with pedigree 0.6628, pedigree (3,3,2,5,3)
  (same comment as for Acetaldehyde)
- Potassium-40 [air, unspecified]: 5.85915e-7 kBq; lognormal variance with pedigree 0.3128, pedigree (3,3,2,5,3)
  (same comment as for Acetaldehyde)
- Propane [air, unspecified]: 2.94512e-7 kg; lognormal variance with pedigree 0.0528, pedigree (3,3,2,5,3)
  (same comment as for Acetaldehyde)
- Propionic acid [air, unspecified]: 1.94805e-8 kg; lognormal variance with pedigree 0.0528, pedigree (3,3,2,5,3)
  (same comment as for Acetaldehyde)
- Propylene [air, unspecified]: 4.73839e-8 kg; lognormal variance with pedigree 0.0528, pedigree (3,3,2,5,3)
  (same comment as for Acetaldehyde)
- Radium-226 [air, unspecified]: 5.27587e-7 kBq; lognormal variance with pedigree 0.3128, pedigree (3,3,2,5,3)
  (same comment as for Acetaldehyde)
- Radium-228 [air, unspecified]: 2.40015e-6 kBq; lognormal variance with pedigree 0.3128, pedigree (3,3,2,5,3)
  (same comment as for Acetaldehyde)
- Radon-220 [air, unspecified]: 5.9597e-8 kBq; lognormal variance with pedigree 0.3128, pedigree (3,3,2,5,3)
  (same comment as for Acetaldehyde)
- Radon-222 [air, unspecified]: 5.9597e-8 kBq; lognormal variance with pedigree 0.3128, pedigree (3,3,2,5,3)
  (same comment as for Acetaldehyde)
- Scandium [air, unspecified]: 4.92535e-11 kg; lognormal variance with pedigree 0.0528, pedigree (3,3,2,5,3)
  (same comment as for Acetaldehyde)
- Selenium IV [air, unspecified]: 2.32358e-9 kg; lognormal variance with pedigree 0.0528, pedigree (3,3,2,5,3)
  (same comment as for Acetaldehyde)
- Silicon [air, unspecified]: 1.28044e-6 kg; lognormal variance with pedigree 0.0528, pedigree (3,3,2,5,3)
  (same comment as for Acetaldehyde)
- Sodium I [air, unspecified]: 4.22049e-6 kg; lognormal variance with pedigree 0.0528, pedigree (3,3,2,5,3)
  (same comment as for Acetaldehyde)
- Strontium II [air, unspecified]: 8.42185e-9 kg; lognormal variance with pedigree 0.0528, pedigree (3,3,2,5,3)
  (same comment as for Acetaldehyde)
- Sulfur dioxide [air, unspecified]: 0.000166084 kg; lognormal variance with pedigree 0.0134, pedigree (3,3,2,5,3)
  Estimation based on fuel input data and emission factors from corresponding ecoinvent fuel combustion datasets (see "Extrapolations" comment). The internal fuels mainly consist of the black liquor and bark from the wood input for pulp production. Internal fuels are represented by the calculated emissions but do not have the corresponding fuel input from technosphere, because they are supplied from within the system boundaries. The amounts of internal fuels used in the process are: Black liquor (10.3 GJ/t), Bark (1.6 GJ/t), malodorous gas, methanol and biosludge (0.02 GJ/t), Biogas (0.014 GJ/t). No proxy was available for the combustion of black liquor, malodorous gas and biosludge. Emissions from these internal energy generation processes are therefore only reflected in the key emission factors provided by the industry, other emissions constitute a data gap.
- Thallium I [air, unspecified]: 5.78554e-11 kg; lognormal variance with pedigree 0.0528, pedigree (3,3,2,5,3)
  (same comment as for Acetaldehyde)
- Thorium [air, unspecified]: 8.6446e-11 kg; lognormal variance with pedigree 0.0528, pedigree (3,3,2,5,3)
  (same comment as for Acetaldehyde)
- Thorium-228 [air, unspecified]: 2.42201e-7 kBq; lognormal variance with pedigree 0.3128, pedigree (3,3,2,5,3)
  (same comment as for Acetaldehyde)
- Thorium-232 [air, unspecified]: 1.53489e-7 kBq; lognormal variance with pedigree 0.3128, pedigree (3,3,2,5,3)
  (same comment as for Acetaldehyde)
- Tin ion [air, unspecified]: 3.46875e-11 kg; lognormal variance with pedigree 0.6628, pedigree (3,3,2,5,3)
  (same comment as for Acetaldehyde)
- Titanium ion [air, unspecified]: 1.51838e-8 kg; lognormal variance with pedigree 0.6628, pedigree (3,3,2,5,3)
  (same comment as for Acetaldehyde)
- Toluene [air, unspecified]: 1.15322e-6 kg; lognormal variance with pedigree 0.0528, pedigree (3,3,2,5,3)
  (same comment as for Acetaldehyde)
- Uranium [air, unspecified]: 1.21062e-10 kg; lognormal variance with pedigree 0.0528, pedigree (3,3,2,5,3)
  (same comment as for Acetaldehyde)
- Uranium-238 [air, unspecified]: 4.40046e-7 kBq; lognormal variance with pedigree 0.3128, pedigree (3,3,2,5,3)
  (same comment as for Acetaldehyde)
- Vanadium V [air, unspecified]: 1.30196e-7 kg; lognormal variance with pedigree 0.0528, pedigree (3,3,2,5,3)
  (same comment as for Acetaldehyde)
- Water [air, unspecified]: 0.0013189 m3; lognormal variance with pedigree 0.0423, pedigree (1,2,2,5,1)
  FEFCO 2021. Calculated as water input- output
- Xylenes, unspecified [air, unspecified]: 2.29589e-8 kg; lognormal variance with pedigree 0.0528, pedigree (3,3,2,5,3)
  (same comment as for Acetaldehyde)
- Zinc II [air, unspecified]: 9.88877e-7 kg; lognormal variance with pedigree 0.6628, pedigree (3,3,2,5,3)
  (same comment as for Acetaldehyde)
- m-Xylene [air, unspecified]: 3.77382e-7 kg; lognormal variance with pedigree 0.0528, pedigree (3,3,2,5,3)
  (same comment as for Acetaldehyde)
- AOX, Adsorbable Organic Halides [water, unspecified]: 1.66084e-6 kg; lognormal variance with pedigree 0.0423, pedigree (1,2,2,5,1)
  FEFCO 2021
- BOD5, Biological Oxygen Demand [water, unspecified]: 0.00101604 kg; lognormal variance with pedigree 0.0423, pedigree (1,2,2,5,1)
  FEFCO 2021
- COD, Chemical Oxygen Demand [water, unspecified]: 0.00396648 kg; lognormal variance with pedigree 0.0423, pedigree (1,2,2,5,1)
  FEFCO 2021
- DOC, Dissolved Organic Carbon [water, unspecified]: 0.00103558 kg; lognormal variance with pedigree 0.0922, pedigree (4,4,2,5,4)
  assumed to be equal to TOC
- Nitrogen [water, unspecified]: 8.20651e-5 kg; lognormal variance with pedigree 0.0423, pedigree (1,2,2,5,1)
  FEFCO 2021
- Phosphorus [water, unspecified]: 1.24075e-5 kg; lognormal variance with pedigree 0.0423, pedigree (1,2,2,5,1)
  FEFCO 2021
- Suspended solids, unspecified [water, unspecified]: 0.000752263 kg; lognormal variance with pedigree 0.0423, pedigree (1,2,2,5,1)
  FEFCO 2021
- TOC, Total Organic Carbon [water, unspecified]: 0.00103558 kg; lognormal variance with pedigree 0.0423, pedigree (1,2,2,5,1)
  FEFCO 2021
- Water [water, unspecified]: 0.0296607 m3; lognormal variance with pedigree 0.0046, pedigree (2,3,2,5,2)
  FEFCO 2021. Accounts for both "thermally polluted" (15.21 m3) and "process water after treatment" (15.15 m3) water output

## Sampling procedure
This dataset has been extrapolated from respective regional geographies (RER). Data were collected from the producers by CCB (Cepi ContainerBoard) and FEFCO (European Federation of Corrugated Board Manufacturers) for the European Database for Corrugated Board Life Cycle Studies), checked by technical experts and reviewed by the Institut für Energie- und Umweltforschung Heidelberg (ifeu). The data for Semichemical Fluting and Kraftliner jointly represent ca. 84% of the total annual production of corrugated base papers from primary fibres in Europe. Reference(s): https://www.fefco.org/sites/default/files/documents/2022-07-07_FEFCO%20LCA%202021.pdf, last accessed March 2023

## Extrapolations
This dataset has been extrapolated from respective regional geographies (RER). Additional air emissions from the combustion of fossil fuels estimated based on industrial heating datasets from the ecoinvent database: natural gas: heat production, natural gas, at industrial furnace >100kW, Europe without Switzerland; heavy fuel oil: heat production, heavy fuel oil, at industrial furnace 1MW, Europe without Switzerland; light fuel oil: heat production, light fuel oil, at industrial furnace 1MW, Europe without Switzerland; diesel: heat production, light fuel oil, at industrial furnace 1MW, Europe without Switzerland; LPG: heat production, natural gas, at industrial furnace >100kW, Europe without Switzerland; Coal: heat production, at hard coal industrial furnace 1-10MW, Europe without Switzerland; Peat: heat production, lignite briquette, at stove 5-15kW, Europe without Switzerland; biogas: heat production, natural gas, at industrial furnace >100kW, Europe without Switzerland; Biofuel (bark, scrap wood, tall oil) and bark: heat production, wood chips from industry, at furnace 1000kW, CH; refused derived fuel, biomass: heat production, wood chips from post-consumer wood, at furnace 300kW. CO2, CO and CH4 emissions from biogas were modelled as non-fossil.
