# electricity, high voltage, hydro, import from CA-NF

Dataset: EcoSpold 2, unit process
Geography: CA-QC
Time period: 2016-01-01 to 2023-12-31
Technology level: current
Classification: ISIC rev.4 ecoinvent: 3510:Electric power generation, transmission and distribution
Tags: Canada
Scenario: Business-as-Usual
System model: Allocation, cut-off by classification
Generated by: Florentine Brunner
Published in: National Energy Board 2009
Database: ecoinvent
isCopyrightProtected: true
accessRestrictedTo: 1

## General comment
This dataset represents the amount of imported electricity from Newfoundland and Labrador (Canada) to Quebec (Canada). The electricity comes exclusively from hydropower plants.The import value is valid for 2016 and includes all electricity imports, independently whether used within the importing country, or re-exported. For a discussion of different ways of modeling electricity trade in LCI, please refer to (Itten & Frischknecht 2014).

## Included activities start
This activity represents the point of 'handing over' the electricity from one country to the other at the border.

## Included activities end
This dataset doesn't include any electricity losses or transmission infrastructure as these are accounted for in the market datasets.

## Time period
Annual production volume valid for 2014

## Reference product
- electricity, high voltage: 1 kWh; By-product classification allocatable product; CPC 17100: Electrical energy; HS2017 271600: Electrical energy
  production volume 2.34564e10 kWh
    The volume of this import flow is defined directly in the corresponding electricity market dataset.
  property price 0.0977 EUR2005
    Temporary price data. Calculated as 90% of purchasers price based on: 94% of the average price (to account for a 6% loss in transformation and transmission) for electricity for industrial consumersin 2005 (excluded taxes). From IEA.
  properties: carbon allocation 0 kg, carbon content 0

## Inputs from technosphere
- electricity, high voltage: 1 kWh
  In 2016 more than 95% of electricity from hydropower in CA-NF was generated in reservoir, non-alpine plants, only a small share by run-of-river plants. It is therefore assumed that this import flow is entirely supplied by plants of the type reservoir, non-alpine.

## Sampling procedure
Measured data
