# combine harvesting, soybean

Dataset: EcoSpold 2, unit process
Geography: US
Time period: 2021-01-01 to 2023-12-31
Technology level: current
Classification: ISIC rev.4 ecoinvent: 0161:Support activities for crop production
Scenario: Business-as-Usual
System model: Allocation, cut-off by classification
Generated by: Juanita Barrera
Database: ecoinvent
isCopyrightProtected: true
accessRestrictedTo: 1

## General comment
This dataset models the service of combine harvesting for one hectare of soybean. The working width is 7.6 m (average). The Functional Unit is one ha harvested.

## Included activities start
The combine harvesting process starts with preliminary work at the farm, like attaching the adequate machine to the tractor.

## Included activities end
This activity ends with the delivery of harvesting by combined harvester. This activity ends with transfer back to farm and concluding work, like uncoupling the machine. The inventory includes transfer to field; field work (for a parcel of land of 1 ha surface); the diesel fuel consumption and the amount of agricultural machinery and of the shed, which has to be attributed to the harvesting by combined harvester. Also taken into consideration is the amount of emissions to the air from combustion and the emission to the soil from tyre abrasion during the work process. The overlapping during the field work is considered. The amount of harvested fodder is not taken into account. Not included are dust other than from combustion and noise.

## Geography
The inventory is extrapolated from the geography of Quebec, Canada. Data quality indicators are adjusted accordingly.

## Technology
Fuel consumption and emissions per kg diesel have been extrapolated to the US, but others inputs were taken from the original values.

## Reference product
- combine harvesting, soybean: 1 ha; By-product classification allocatable product; CPC 86119: Other support services to crop production
  production volume 3.33133e7 ha
    FAOSTAT data year 2020 (total area of soybean)
  property price 77.1612 EUR2005
    The price is from the year 2020. Price information has been directly provided by the data provider based on the following reference: University of Minnesota, Machinery cost estimates, W.F. Lazarus, 2020. The prices were adjusted for inflation relative to 2005 using the producer price index (PPI) of the euro area, published by eurostat (https://ec.europa.eu/eurostat/databrowser/view/STS_INPP_A__custom_6416181/default/table?lang=en, last accessed on 2023-06-01).
  properties: carbon allocation 0 kg, carbon content 0

## Inputs from technosphere
- diesel: 13.458 kg; lognormal variance with pedigree 0.0028, pedigree (1,4,2,1,1)
  average of Combine Harvesting Maize data - 2021 Nebraska Crop budget projections, Robert Klein and Glennis McClure, UNL Extension
  properties: carbon content, fossil 0.865, dry mass 1 kg, heating value, net 42.8 MJ, wet mass 1 kg
- harvester: 6.3 kg; lognormal variance with pedigree 0.3042, pedigree (1,4,2,5,1)
  proxy from "combine harvesting, CA-QC"
- shed: 0.00858 m2; lognormal variance with pedigree 0.3042, pedigree (1,4,2,5,1)
  proxy from "combine harvesting, CA-QC"

## Emissions to nature
- Ammonia [air, non-urban air or from high stacks]: 0.000269161 kg; lognormal variance with pedigree 0.058325, pedigree (1,2,2,2,3)
  adapted from "combine harvesting, CA-QC" to match the diesel consumption
- Benzene [air, non-urban air or from high stacks]: 9.82073e-5 kg; lognormal variance with pedigree 0.058325, pedigree (1,2,2,2,3)
  adapted from "combine harvesting, CA-QC" to match the diesel consumption
- Benzo(a)pyrene [air, non-urban air or from high stacks]: 4.03741e-7 kg; lognormal variance with pedigree 0.658325, pedigree (1,2,2,2,3)
  adapted from "combine harvesting, CA-QC" to match the diesel consumption
- Cadmium II [air, non-urban air or from high stacks]: 1.3458e-7 kg; lognormal variance with pedigree 0.658325, pedigree (1,2,2,2,3)
  adapted from "combine harvesting, CA-QC" to match the diesel consumption
- Carbon dioxide, fossil [air, non-urban air or from high stacks]: 41.6269 kg; lognormal variance with pedigree 0.018325, pedigree (1,2,2,2,3)
  adapted from "combine harvesting, CA-QC" to match the diesel consumption
- Carbon monoxide, fossil [air, non-urban air or from high stacks]: 0.129326 kg; lognormal variance with pedigree 0.652225, pedigree (1,4,2,2,1)
  adapted from "combine harvesting, CA-QC" to match the diesel consumption
- Chromium III [air, non-urban air or from high stacks]: 6.74922e-7 kg; lognormal variance with pedigree 0.658325, pedigree (1,2,2,2,3)
  adapted from "combine harvesting, CA-QC" to match the diesel consumption
- Copper ion [air, non-urban air or from high stacks]: 2.28746e-5 kg; lognormal variance with pedigree 0.658325, pedigree (1,2,2,2,3)
  adapted from "combine harvesting, CA-QC" to match the diesel consumption
- Dinitrogen monoxide [air, non-urban air or from high stacks]: 0.00161658 kg; lognormal variance with pedigree 0.058325, pedigree (1,2,2,2,3)
  adapted from "combine harvesting, CA-QC" to match the diesel consumption
- Methane, fossil [air, non-urban air or from high stacks]: 0.00173782 kg; lognormal variance with pedigree 0.058325, pedigree (1,2,2,2,3)
  adapted from "combine harvesting, CA-QC" to match the diesel consumption
- NMVOC, non-methane volatile organic compounds [air, non-urban air or from high stacks]: 0.058601 kg; lognormal variance with pedigree 0.042225, pedigree (1,4,2,2,1)
  adapted from "combine harvesting, CA-QC" to match the diesel consumption
- Nickel II [air, non-urban air or from high stacks]: 9.41658e-7 kg; lognormal variance with pedigree 0.658325, pedigree (1,2,2,2,3)
  adapted from "combine harvesting, CA-QC" to match the diesel consumption
- Nitrogen oxides [air, non-urban air or from high stacks]: 0.687047 kg; lognormal variance with pedigree 0.042225, pedigree (1,4,2,2,1)
  adapted from "combine harvesting, CA-QC" to match the diesel consumption
- PAH, polycyclic aromatic hydrocarbons [air, non-urban air or from high stacks]: 4.4456e-5 kg; lognormal variance with pedigree 0.318325, pedigree (1,2,2,2,3)
  adapted from "combine harvesting, CA-QC" to match the diesel consumption
- Particulate Matter, < 2.5 um [air, non-urban air or from high stacks]: 0.0602176 kg; lognormal variance with pedigree 0.318325, pedigree (1,2,2,2,3)
  adapted from "combine harvesting, CA-QC" to match the diesel consumption
- Selenium IV [air, non-urban air or from high stacks]: 1.3458e-7 kg; lognormal variance with pedigree 0.058325, pedigree (1,2,2,2,3)
  adapted from "combine harvesting, CA-QC" to match the diesel consumption
- Sulfur dioxide [air, non-urban air or from high stacks]: 0.0135793 kg; lognormal variance with pedigree 0.018325, pedigree (1,2,2,2,3)
  adapted from "combine harvesting, CA-QC" to match the diesel consumption
- Zinc II [air, non-urban air or from high stacks]: 1.3458e-5 kg; lognormal variance with pedigree 0.658325, pedigree (1,2,2,2,3)
  adapted from "combine harvesting, CA-QC" to match the diesel consumption
- Cadmium II [soil, agricultural]: 8.82e-7 kg; lognormal variance with pedigree 0.0442, pedigree (1,4,2,5,1)
  proxy from "combine harvesting, CA-QC"
- Lead II [soil, agricultural]: 3.78e-6 kg; lognormal variance with pedigree 0.0442, pedigree (1,4,2,5,1)
  proxy from "combine harvesting, CA-QC"
- Zinc II [soil, agricultural]: 0.00238 kg; lognormal variance with pedigree 0.0442, pedigree (1,4,2,5,1)
  proxy from "combine harvesting, CA-QC"

## Extrapolations
The dataset is modeled for agricultural production system in US. Data Quality indicators are adjusted accordingly.
