# treatment of scrap tin sheet, municipal incineration FAE

Dataset: EcoSpold 2, unit process
Geography: CH
Time period: 2006-01-01 to 2023-12-31
Technology level: current
Classification: ISIC rev.4 ecoinvent: 3821:Treatment and disposal of non-hazardous waste
Scenario: Business-as-Usual
System model: Allocation, cut-off by classification
Generated by: Nikolia Stoikou
Database: ecoinvent
isCopyrightProtected: true
accessRestrictedTo: 1

## General comment
The process represents the treatment of 'scrap tin sheet' in a municipal solid waste incinerator (MSWI). Recommended use of this dataset: For disposal of tin sheet packaging (tin cans, paint buckets) but without paper parts (please inventory any paper separately), which go to disposal as part of communal waste. Larger amounts of separated tin sheet will not be disposed in incinerators or landfills, but rather go to recycling.Inventoried waste contains several fractions: 99.8% tin sheet inert; 0.195% tin volatile; . Waste composition (wet, in ppmw): H2O na; O na; H na; C na; S na; N na; P na; B na; Cl 750; Br na; F na; I na; Ag na; As na; Ba na; Cd 30; Co na; Cr na; Cu 199; Hg na; Mn na; Mo na; Ni na; Pb 380; Sb na; Se na; Sn 3900; V na; Zn 202; Be na; Sc na; Sr na; Ti na; Tl na; W na; Si na; Fe 994570; Ca na; Al na; K na; Mg na; Na na. Share of carbon in initial waste input that is biogenic 61.4%.Share of metals in waste not oxidised and bulk-recyclable (exclude very small or thin parts) Iron: 100%; Alu: 0%; Copper: 0%.Recovery of metal scrap from bottom ash to recycling: 576.83g iron scrap, 0g aluminium scrap, 0g copper scrap. From this waste, the FLUWA process in the technology mix recovers 0.00000218kg (DM) of a hydroxide sludge to be recycled in zinc furnaces. Net energy production: 0MJ/kg electric energy and 0MJ/kg thermal energy.

## Included activities start
The activity starts with the waste being available at the gate of the treatment facility. Collection and transportation of the waste to the treatment plant is not included.

## Included activities end
The activity ends with the waste being treated and waste-specific emissions from the incineration process and auxiliary material consumption for flue gas cleaning are released to the environment (air and water). Infrastructure and waste-specific energy demands for Municipal Solid Waste Incineration (MSWI) and net energy generation are included.

## Geography
Modelling parameters affecting the treatment technology are specific to this geography and to the technology mix encountered in Switzerland in 2012.

## Technology
The waste is treated in the incineration plant with flue gas cleaning. Incineration is the controlled combustion of a waste and it includes fly ash extraction (FAE). Auxiliary material consumption for this step of air pollution control (APC) are included in the process. Air polution control includes electrostatic precipitator for fly ash (ESP), wet flue gas scrubber and 25% SNCR , 42.77% SCR-high dust , 32.68% SCR-low dust -DeNOx facilities and 0% without DeNOx (weighted according to mass of burnt waste). Efficiency of iron scrap separation from slag : 58%. Efficiency of aluminium scrap separation from slag : 31%. Efficiency of copper scrap separation from slag : 31%. The technology mix for this dataset includes a filter ash treatment (FLUWA) of a share of 46.22%. Gross electric efficiency technology mix 15.84% and Gross thermal efficiency technology mix 28.51%

## Reference product
- scrap tin sheet: -1 kg; By-product classification Waste; CPC 39366: Waste and scrap of tin; HS2017 800200: Tin; waste and scrap
  main reference product of this activity (supply of disposal service).
  production volume 3.8675e7 kg
    based on corresponding global production volume of MSW fraction in conventional MSWI (wo fly ash extraction) and scaled down to annual Swiss incinerated MSW mass of 3.02 mio. tonnes.
  property price 0 EUR2005
    Waste products are assigned a price of zero as they are assumed to require further treatment.
  properties: cadmium content 2.99992e-5, carbon allocation 0 kg, carbon content 0, carbon content, fossil 0, carbon content, non-fossil 0, chlorine content 0.00074998, copper content 0.000198995, dry mass 1 kg, heating value, gross 0 MJ, heating value, net 0 MJ, iron content 0.994539, lead content 0.00037999, tin content 0.00389989, water content 0, water in wet mass 0 kg, wet mass 1 kg, zinc content 0.000201995

## Inputs from technosphere
- ammonia, anhydrous, liquid: 9.19947e-5 kg; lognormal variance with pedigree 1.0496, pedigree (1,1,4,1,1)
  Input to DeNOx stage (100% NH3).
  Uncertainty: uncertainty calculated from uncertainty in average DeNOx input, uncertainty in the share of thermal NOx, uncertainty of nitrogen content in average municipal waste and the uncertainty in nitrogen content in *this* waste.
  properties: dry mass 1 kg, wet mass 1 kg
- bottom ash, MSWI[F], scrap tin sheet: -0.626762 kg; lognormal variance with pedigree 0.013407, pedigree (1,1,1,1,1)
  waste-specific bottom ash from the incineration of this waste
  Uncertainty: uncertainty is calculated from uncertainties in waste composition and transfer coefficients in incinerator
  production volume
    calculated in proportion to incinerated waste input
  properties: cadmium content 7.07777e-5, chlorine content 0.00176944, copper content 0.000469492, dry mass 0.676255 kg, iron content 0.985503, lead content 0.000896517, oxygen content 0.00317291, tin content 0.00764133, water content 0.478731, wet mass 1 kg, zinc content 0.00047657
- chemical, inorganic: 6.06995e-11 kg; lognormal variance with pedigree 0.33023, pedigree (1,1,4,1,1)
  auxiliary inputs for the wastewater treatment stage of the incinerator plant. Proxy for Polyelectrolyte.
  Uncertainty: uncertainty calculated from uncertainty in average Polyelectrolyte input, of transfer coefficients in the incinerator, and the uncertainty of the waste composition of this waste
  properties: carbon content, fossil 0.003, dry mass 1 kg, wet mass 1 kg
- chromium trioxide, flakes: 1.17626e-7 kg; lognormal variance with pedigree 1.807, pedigree (1,1,4,1,1)
  Input to DeNOx stage. Active component in SCR catalyst (vanadium pentoxide, V2O5), here approximated with the available chromium trioxide.
  Uncertainty: uncertainty calculated from uncertainty in average DeNOx input, uncertainty in the share of thermal NOx, uncertainty of nitrogen content in average municipal waste and the uncertainty in nitrogen content in *this* waste.
  properties: dry mass 1 kg, wet mass 1 kg
- electricity, for reuse in municipal waste incineration only: 0.128272 kWh; lognormal variance with pedigree 0.00859512, pedigree (1,1,4,1,1)
  Net electricity required to incinerate this waste (subsidised from high-calorific waste fractions).
  Uncertainty: uncertainty is calculated from uncertainties in waste composition and uncertainties in energy efficiency and the uncertainty in internal energy demand
- heat, district or industrial, natural gas: 0.017203 MJ; lognormal variance with pedigree 1.0496, pedigree (1,1,4,1,1)
  Input to DeNOx stage, to heat up flue gas in low-dust SCR.
  Uncertainty: uncertainty calculated from uncertainty in average DeNOx input, uncertainty in the share of thermal NOx, uncertainty of nitrogen content in average municipal waste and the uncertainty in nitrogen content in *this* waste.
  properties: heating value, net 1 MJ
- heat, for reuse in municipal waste incineration only: 0.127729 MJ; lognormal variance with pedigree 0.00859512, pedigree (1,1,4,1,1)
  Net heat required to incinerate this waste (subsidised from high-calorific waste fractions).
  Uncertainty: uncertainty is calculated from uncertainties in waste composition and uncertainties in energy efficiency and the uncertainty in internal energy demand
- hydrochloric acid, without water, in 30% solution state: 2.38197e-5 kg; lognormal variance with pedigree 0.46009, pedigree (1,1,4,1,1)
  auxiliary inputs for the wastewater treatment stage of the incinerator plant.
  Uncertainty: uncertainty calculated from uncertainty in average HCl input, of transfer coefficients in the incinerator, and the uncertainty of the waste composition of this waste
  properties: dry mass 1 kg, heating value, net 3.32 MJ, wet mass 1 kg
- hydrogen peroxide, without water, in 50% solution state: 6.06255e-5 kg; lognormal variance with pedigree 0.46009, pedigree (1,1,4,1,1)
  auxiliary oxidising agent for filter ash treatment (FLUWA).
  Uncertainty: uncertainty calculated from uncertainty in of transfer coefficients in the incinerator, and the uncertainty of the waste composition of this waste
  properties: dry mass 1 kg, heating value, net 7.13 MJ, wet mass 1 kg
- iron scrap, sorted, pressed: -0.576833 kg; lognormal variance with pedigree 0.009085, pedigree (1,1,1,1,1)
  iron scrap recovered from this waste.
  Uncertainty: uncertainty calculated from uncertainty in waste composition, uncertainty of share of recyclable metal, uncertainty of transfer coefficient to bottom ash, uncertainty of the efficiency of scrap removal in MSWI plant.
  production volume
    calculated in proportion to incinerated waste input
  properties: dry mass 1 kg, price 0.175 EUR2005, wet mass 1 kg
- iron(III) chloride, without water, in 40% solution state: 3.02444e-9 kg; lognormal variance with pedigree 0.33023, pedigree (1,1,4,1,1)
  auxiliary inputs for the wastewater treatment stage of the incinerator plant.
  Uncertainty: uncertainty calculated from uncertainty in average FeCl3 input, of transfer coefficients in the incinerator, and the uncertainty of the waste composition of this waste
  properties: dry mass 1 kg, wet mass 1 kg
- metalliferous hydroxide sludge: -8.73752e-6 kg; lognormal variance with pedigree 0.33899, pedigree (1,1,1,1,1)
  Metalliferous hydroxide sludge/zinc concentrate from filter ash leaching (FLUWA).
  Uncertainty: uncertainty is calculated from uncertainties in waste composition and transfer coefficients to filter ash in incinerator and the uncertainty of the transfer coefficients of the FLUWA process.
  production volume
    calculated in proportion to incinerated waste input
  properties: calcium content 0.1045, chlorine content 0.176087, dry mass 0.25 kg, oxygen content 0.212356, phosphorus content 0.01557, potassium content 0.0122, sodium content 0.0163, sulfur content 0.1053, tin content 0.787644, water content 3, wet mass 1 kg, zinc content 0.132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
  note on calcium content: Calculated as a production volume weighted average of properties of all the metalliferous hydroxide sludge products produced in the database.
- municipal waste incineration facility: 2.5e-10 unit
  Infrastructure demands per kilogram incinerated waste.
- residues, MSWI[F], scrap tin sheet: -0.000834978 kg; lognormal variance with pedigree 0.32726, pedigree (1,1,1,1,1)
  waste-specific incineration residues (fly ash + scrubber sludge) from the incineration of this waste
  Uncertainty: uncertainty is calculated from uncertainties in waste composition and transfer coefficients in incinerator
  production volume
    calculated in proportion to incinerated waste input
  properties: dry mass 1 kg, oxygen content 0.212356, tin content 0.787644, wet mass 1 kg
- sodium hydroxide, without water, in 50% solution state: 1.72908e-5 kg; lognormal variance with pedigree 0.46009, pedigree (1,1,4,1,1)
  auxiliary inputs for the flue gas treatment stage of the incinerator plant, and partially in the filter ash treatment (FLUWA).
  Uncertainty: uncertainty calculated from uncertainty in average NaOH input, of transfer coefficients in the incinerator, and the uncertainty of the waste composition of this waste
  properties: dry mass 1 kg, heating value, net 3.03 MJ, wet mass 1 kg
- titanium dioxide: 5.76369e-6 kg; lognormal variance with pedigree 1.807, pedigree (1,1,4,1,1)
  Input to DeNOx stage (TiO2 catalyst carrier)
  Uncertainty: uncertainty calculated from uncertainty in average DeNOx input, uncertainty in the share of thermal NOx, uncertainty of nitrogen content in average municipal waste and the uncertainty in nitrogen content in *this* waste.
  properties: dry mass 1 kg, wet mass 1 kg
- water, decarbonised: 7.19586e-7 kg; lognormal variance with pedigree 0.33023, pedigree (1,1,4,1,1)
  Incinerator process water used in flue gas scrubber stage.
  Uncertainty: uncertainty calculated from uncertainty in average water input, and the uncertainty of the waste composition of this waste
  properties: wet mass 1 kg

## Inputs from nature
- Oxygen [natural resource, in air]: 0.572901 kg; lognormal variance with pedigree 0.00800533, pedigree (1,1,4,1,1)
  oxygen from ambient air needed to combust and oxidise this waste. Net demand, i.e. without O2 leaving the plant in flue gas uncombusted.
  Uncertainty: uncertainty is calculated from uncertainties in waste composition and transfer coefficients to flue gas and solid residues in incinerator

## Emissions to nature
- Ammonia [air, urban air close to ground]: 1.08162e-7 kg; lognormal variance with pedigree 1.1676, pedigree (1,1,4,1,1)
  Nitrogen species emitted to air after DeNOx stage.
  Uncertainty: uncertainty calculated from uncertainty in average N-emissions and uncertainty in the share of thermal NOx and the uncertainty in nitrogen content in *this* waste.
- Benzene [air, urban air close to ground]: 4.68425e-8 kg; lognormal variance with pedigree 0.46653, pedigree (1,1,4,1,1)
  Incomplete combustion product emitted to air.
  Uncertainty: uncertainty calculated from uncertainty in average operation emissions, and the uncertainty of the flue gas volume from this waste.
- Benzo(a)pyrene [air, urban air close to ground]: 1.0424e-12 kg; lognormal variance with pedigree 1.056, pedigree (1,1,4,1,1)
  (same comment as for Benzene)
- Carbon monoxide, fossil [air, urban air close to ground]: 3.0736e-5 kg; lognormal variance with pedigree 1.6442, pedigree (1,1,4,1,1)
  (same comment as for Benzene)
- Carbon monoxide, non-fossil [air, urban air close to ground]: 4.88909e-5 kg; lognormal variance with pedigree 1.6442, pedigree (1,1,4,1,1)
  (same comment as for Benzene)
- Dioxins, measured as 2,3,7,8-tetrachlorodibenzo-p-dioxin [air, urban air close to ground]: 9.36787e-14 kg; lognormal variance with pedigree 1.056, pedigree (1,1,4,1,1)
  (same comment as for Benzene)
- Hexachlorobenzene [air, urban air close to ground]: 9.79452e-11 kg; lognormal variance with pedigree 0.46653, pedigree (1,1,4,1,1)
  (same comment as for Benzene)
- Methane, fossil [air, urban air close to ground]: 2.71218e-7 kg; lognormal variance with pedigree 0.46653, pedigree (1,1,4,1,1)
  (same comment as for Benzene)
- Methane, non-fossil [air, urban air close to ground]: 4.3142e-7 kg; lognormal variance with pedigree 0.46653, pedigree (1,1,4,1,1)
  (same comment as for Benzene)
- NMVOC, non-methane volatile organic compounds [air, urban air close to ground]: 2.13179e-6 kg; lognormal variance with pedigree 0.46653, pedigree (1,1,4,1,1)
  (same comment as for Benzene)
- Nitrogen oxides [air, urban air close to ground]: 3.42514e-5 kg; lognormal variance with pedigree 1.1676, pedigree (1,1,4,1,1)
  sum of fuel-NOx and thermal-NOx emitted to air after DeNOx stage.
  Uncertainty: uncertainty calculated from uncertainty in average N-emissions and uncertainty in the share of thermal NOx and the uncertainty in nitrogen content in *this* waste.
- Particulate Matter, < 2.5 um [air, urban air close to ground]: 5.59262e-6 kg; lognormal variance with pedigree 1.056, pedigree (1,1,4,1,1)
  (same comment as for Benzene)
- Particulate Matter, > 2.5 um and < 10um [air, urban air close to ground]: 2.81036e-8 kg; lognormal variance with pedigree 0.68203, pedigree (1,1,4,1,1)
  (same comment as for Benzene)
- Pentachlorobenzene [air, urban air close to ground]: 2.47485e-10 kg; lognormal variance with pedigree 0.46653, pedigree (1,1,4,1,1)
  (same comment as for Benzene)
- Pentachlorophenol [air, urban air close to ground]: 2.03993e-11 kg; lognormal variance with pedigree 0.46653, pedigree (1,1,4,1,1)
  (same comment as for Benzene)
- Tin ion [air, urban air close to ground]: 1.27372e-9 kg; lognormal variance with pedigree 0.57263, pedigree (1,1,4,1,1)
  Emission to air from waste composition and incinerator transfer coefficients.
  Uncertainty: uncertainty is calculated from uncertainties in waste composition and transfer coefficients in incinerator
- Toluene [air, urban air close to ground]: 9.3685e-8 kg; lognormal variance with pedigree 0.46653, pedigree (1,1,4,1,1)
  (same comment as for Benzene)
- Non-hazardous waste disposed [inventory indicator, waste]: 1 kg
  Inventory indicator for waste mass disposed. To be used in EN15804 "other data" results.
- Tin ion [water, surface water]: 1.7212e-6 kg; lognormal variance with pedigree 0.47417, pedigree (1,1,4,1,1)
  Emissions to water from waste composition and incinerator transfer coefficients.
  Uncertainty: uncertainty is calculated from uncertainties in waste composition and transfer coefficients in incinerator
