# heat production, heavy fuel oil, at industrial furnace 1MW

Dataset: EcoSpold 2, unit process
Geography: RoW
Time period: 2000-01-01 to 2023-12-31
Technology level: current
Classification: EcoSpold01Categories: oil/heating systems
Classification: ISIC rev.4 ecoinvent: 3530:Steam and air conditioning supply
Tags: ConvertedDataset
Scenario: Business-as-Usual
System model: Allocation, cut-off by classification
Generated by: Niels Jungbluth
Published in: Jungbluth, N. 2007
Database: ecoinvent
isCopyrightProtected: true
accessRestrictedTo: 1

## General comment
Inventory for heat supply.
[This dataset was already contained in the ecoinvent database version 2. It was not individually updated during the transfer to ecoinvent version 3. Life Cycle Impact Assessment results may still have changed, as they are affected by changes in the supply chain, i.e. in other datasets. This dataset was generated following the ecoinvent quality guidelines for version 2. It may have been subject to central changes described in the ecoinvent version 3 change report (http://www.ecoinvent.org/database/ecoinvent-version-3/reports-of-changes/), and the results of the central updates were reviewed extensively. The changes added e.g. consistent water flows and other information throughout the database. The documentation of this dataset can be found in the ecoinvent reports of version 2, which are still available via the ecoinvent website. The change report linked above covers all central changes that were made during the conversion process.]

## Included activities end
Heat delivered by the furnace not including losses during distribution in the factory.

## Geography
Assumption for operation in Europe.

## Technology
Non-modulating furnace, efficiency 95%.

## Time period
Estimation for efficiency of furnaces used in 2000.

## Reference product
- heat, district or industrial, other than natural gas: 1 MJ; By-product classification allocatable product; CPC 17300: Steam and hot water
  EcoSpold01Location=CH
  production volume 1.23574e13 MJ
    Assumption. The original value from the global dataset was altered in order to model the correct shares of district/industrial heat producing datasets on the market for heat, district or industrial, other than natural gas according to http://www.iea.org/statistics/statisticssearch/report/?country=WORLD&product=electricityandheat&year=2012. See talk pages for further discussion.
    //Original comment added during dataset update://
    Total heat from oil calculated from IEA Oil statistics for 2007 (http://www.iea.org/stats/oildata.asp?COUNTRY_CODE=29 ; industry and heat plants), using default IEA MJ/kg conversion factors, subtracting the amount used for steam in the chemical industry (1.68EJ), dividing the total evenly between light and heavy oil types, multiplied by conversion efficiency of specific boiler type (0.95), all on a net heat value basis.
  property Corresponding fuel use 1.13297 MJ; name fuel_use; = 0.025926*43.7/1
    Lower heating value of the fuel input related to the heat/electricity output
  property price 0.0106 EUR2005
    Average European district heat price from Ecoheatcool and Euroheat 2005-2006, Ecoheat Work package 1: The European heat market. Final report. 10.6 EUR/GJ i s the price of district heat. http://www.solarthermalworld.org/files/Ecoheatcool%20WP1%20Web.pdf?download
  properties: carbon allocation 0 kg, carbon content 0, heating value, net 1 MJ

## Inputs from technosphere
- chimney: 3.65495e-8 m; lognormal variance with pedigree 0.3546, pedigree (3,3,5,5,1)
  Calculated
  EcoSpold01Location=CH
  Uncertainty: Calculated
- electricity, low voltage: 0.000178179, 1.79016e-6, 2.81515e-5, 0.000584321, 5.76754e-5, 1.4726e-5, 3.59248e-7, 9.96625e-6 kWh (8 suppliers, which the file names only by identifier); sum of these 0.000875168 kWh; lognormal variance with pedigree 0.0446, pedigree (3,3,5,5,1)
  Literature
  EcoSpold01Location=CH
  Uncertainty: Literature
- heavy fuel oil: 0.000330983, 0.000192736, 0.000979831, 0.022905, 0.000247251, 0.0012705 kg (6 suppliers, which the file names only by identifier); sum of these 0.0259263 kg; lognormal variance with pedigree 0.0432, pedigree (2,3,5,5,1)
  EcoSpold01Location=CH
  Literature
  Uncertainty: Literature
  properties: carbon content, fossil 0.849, dry mass 1 kg, heating value, net 41.2 MJ, wet mass 1 kg
- industrial furnace, 1MW, oil: 2.924e-9 unit; lognormal variance with pedigree 0.3546, pedigree (3,3,5,5,1)
  EcoSpold01Location=CH
  Estimation 5000h use per year
  Uncertainty: Estimation 5000h use per year
- oil storage, 3000l: 3.89863e-8 unit; lognormal variance with pedigree 0.3546, pedigree (3,3,5,5,1)
  Calculated
  EcoSpold01Location=CH
  Uncertainty: Calculated

## Emissions to nature
- Acetaldehyde [air, urban air close to ground]: 1.57895e-7 kg; lognormal variance with pedigree 0.8546, pedigree (3,3,5,5,1)
  Literature, basic uncertainty estimated = 6
  Uncertainty: Literature, basic uncertainty estimated = 6
- Acetic acid [air, urban air close to ground]: 6.31579e-7 kg; lognormal variance with pedigree 0.8546, pedigree (3,3,5,5,1)
  (same comment as for Acetaldehyde)
- Acetone [air, urban air close to ground]: 1.57895e-7 kg; lognormal variance with pedigree 0.8546, pedigree (3,3,5,5,1)
  (same comment as for Acetaldehyde)
- Ammonia [air, urban air close to ground]: 1.05263e-8 kg; lognormal variance with pedigree 0.502, pedigree (1,1,5,5,1)
  Literature, calculation from ranges
- Arsenic ion [air, urban air close to ground]: 1.36842e-8 kg; lognormal variance with pedigree 0.6946, pedigree (3,3,5,5,1)
  Literature
  Uncertainty: Literature
- Benzo(a)pyrene [air, urban air close to ground]: 2.94737e-11 kg; lognormal variance with pedigree 0.8546, pedigree (3,3,5,5,1)
  (same comment as for Acetaldehyde)
- Calcium II [air, urban air close to ground]: 1.15789e-7 kg; lognormal variance with pedigree 0.0946, pedigree (3,3,5,5,1)
  Literature
  Uncertainty: Literature
- Carbon dioxide, fossil [air, urban air close to ground]: 0.0831579 kg; lognormal variance with pedigree 0.0446, pedigree (3,3,5,5,1)
  Literature
  Uncertainty: Literature
- Carbon monoxide, fossil [air, urban air close to ground]: 7.36842e-6 kg; lognormal variance with pedigree 0.202, pedigree (1,1,5,5,1)
  Calculation from ranges
- Chromium III [air, urban air close to ground]: 5.21053e-9 kg; lognormal variance with pedigree 0.6946, pedigree (3,3,5,5,1)
  Literature
  Uncertainty: Literature
- Chromium VI [air, urban air close to ground]: 5.26316e-11 kg; lognormal variance with pedigree 1.3746, pedigree (3,3,5,5,1)
  Literature, estimation 1% Cr VI of Cr, basic uncertainity estimated = 10
  Uncertainty: Literature, estimation 1% Cr VI of Cr, basic uncertainity estimated = 10
- Cobalt II [air, urban air close to ground]: 3.47368e-8 kg; lognormal variance with pedigree 0.6946, pedigree (3,3,5,5,1)
  Literature
  Uncertainty: Literature
- Copper ion [air, urban air close to ground]: 1.68421e-8 kg; lognormal variance with pedigree 0.6946, pedigree (3,3,5,5,1)
  Literature
  Uncertainty: Literature
- Dinitrogen monoxide [air, urban air close to ground]: 8.42105e-7 kg; lognormal variance with pedigree 0.572, pedigree (1,1,5,5,1)
  Calculation from ranges
- Dioxins, measured as 2,3,7,8-tetrachlorodibenzo-p-dioxin [air, urban air close to ground]: 4.73684e-16 kg; lognormal variance with pedigree 0.3546, pedigree (3,3,5,5,1)
  Literature
  Uncertainty: Literature
- Ethanol [air, urban air close to ground]: 3.15789e-7 kg; lognormal variance with pedigree 0.8546, pedigree (3,3,5,5,1)
  (same comment as for Acetaldehyde)
- Formaldehyde [air, urban air close to ground]: 4.73684e-7 kg; lognormal variance with pedigree 0.8546, pedigree (3,3,5,5,1)
  (same comment as for Acetaldehyde)
- Hydrocarbons, aliphatic, alkanes, unspecified [air, urban air close to ground]: 6.31579e-7 kg; lognormal variance with pedigree 0.8546, pedigree (3,3,5,5,1)
  (same comment as for Acetaldehyde)
- Hydrocarbons, aliphatic, unsaturated [air, urban air close to ground]: 3.15789e-8 kg; lognormal variance with pedigree 0.8546, pedigree (3,3,5,5,1)
  (same comment as for Acetaldehyde)
- Hydrocarbons, aromatic [air, urban air close to ground]: 1.57895e-7 kg; lognormal variance with pedigree 0.8546, pedigree (3,3,5,5,1)
  (same comment as for Acetaldehyde)
- Hydrochloric acid [air, urban air close to ground]: 1.51579e-6 kg; lognormal variance with pedigree 0.0946, pedigree (3,3,5,5,1)
  Literature
  Uncertainty: Literature
- Hydrogen fluoride [air, urban air close to ground]: 5.05263e-8 kg; lognormal variance with pedigree 0.0946, pedigree (3,3,5,5,1)
  Literature
  Uncertainty: Literature
- Iron ion [air, urban air close to ground]: 8.63158e-7 kg; lognormal variance with pedigree 0.6946, pedigree (3,3,5,5,1)
  Literature
  Uncertainty: Literature
- Lead II [air, urban air close to ground]: 1.52632e-7 kg; lognormal variance with pedigree 0.6946, pedigree (3,3,5,5,1)
  Literature
  Uncertainty: Literature
- Mercury II [air, urban air close to ground]: 1.57895e-10 kg; lognormal variance with pedigree 0.6946, pedigree (3,3,5,5,1)
  Literature
  Uncertainty: Literature
- Methane, fossil [air, urban air close to ground]: 3.15789e-6 kg; lognormal variance with pedigree 0.8546, pedigree (3,3,5,5,1)
  (same comment as for Acetaldehyde)
- Methanol [air, urban air close to ground]: 5.36842e-7 kg; lognormal variance with pedigree 0.0946, pedigree (3,3,5,5,1)
  Literature
  Uncertainty: Literature
- Molybdenum VI [air, urban air close to ground]: 8.42105e-9 kg; lognormal variance with pedigree 0.0446, pedigree (3,3,5,5,1)
  Literature
  Uncertainty: Literature
- Nickel II [air, urban air close to ground]: 5.15789e-7 kg; lognormal variance with pedigree 0.6946, pedigree (3,3,5,5,1)
  Literature
  Uncertainty: Literature
- Nitrogen oxides [air, urban air close to ground]: 0.000105263 kg; lognormal variance with pedigree 0.692, pedigree (1,1,5,5,1)
  Calculation from ranges
- PAH, polycyclic aromatic hydrocarbons [air, urban air close to ground]: 6.10526e-10 kg; lognormal variance with pedigree 0.3546, pedigree (3,3,5,5,1)
  Literature
  Uncertainty: Literature
- Particulate Matter, < 2.5 um [air, urban air close to ground]: 8.84211e-6 kg; lognormal variance with pedigree 0.3546, pedigree (3,3,5,5,1)
  Literature
  Uncertainty: Literature
- Particulate Matter, > 10 um [air, urban air close to ground]: 2.52632e-6 kg; lognormal variance with pedigree 0.3546, pedigree (3,3,5,5,1)
  Literature, basic uncertainty estimated = 3
  Uncertainty: Literature, basic uncertainty estimated = 3
- Particulate Matter, > 2.5 um and < 10um [air, urban air close to ground]: 1.26316e-6 kg; lognormal variance with pedigree 0.3546, pedigree (3,3,5,5,1)
  (same comment as for Particulate Matter, > 10 um)
- Propane [air, urban air close to ground]: 3.15789e-8 kg; lognormal variance with pedigree 0.8546, pedigree (3,3,5,5,1)
  (same comment as for Acetaldehyde)
- Selenium IV [air, urban air close to ground]: 1.26316e-8 kg; lognormal variance with pedigree 0.6946, pedigree (3,3,5,5,1)
  Literature
  Uncertainty: Literature
- Sodium I [air, urban air close to ground]: 7.89474e-7 kg; lognormal variance with pedigree 0.0946, pedigree (3,3,5,5,1)
  Literature
  Uncertainty: Literature
- Sulfur dioxide [air, urban air close to ground]: 0.000414737 kg; lognormal variance with pedigree 1.242, pedigree (1,1,5,5,1)
  Calculation from ranges
- Toluene [air, urban air close to ground]: 3.15789e-8 kg; lognormal variance with pedigree 0.8546, pedigree (3,3,5,5,1)
  (same comment as for Acetaldehyde)
- Vanadium V [air, urban air close to ground]: 1.05263e-6 kg; lognormal variance with pedigree 0.6946, pedigree (3,3,5,5,1)
  Literature
  Uncertainty: Literature
- Zinc II [air, urban air close to ground]: 5.78947e-8 kg; lognormal variance with pedigree 0.6946, pedigree (3,3,5,5,1)
  Literature
  Uncertainty: Literature

## Sampling procedure
Data published in literature

## Extrapolations
none This dataset has been copied from an original dataset covering the geography Europe without Switzerland. The uncertainty has been adjusted accordingly.

## Review by Michael Spielmann (obsolete) 2003-07-04
passed.

## Review by Emilia Moreno Ruiz 2012-04-16
calculation of fuel use property.
