# naphtha, import from RoW

Dataset: EcoSpold 2, unit process
Geography: IN
Time period: 2014-01-01 to 2023-12-31
Technology level: current
Classification: ISIC rev.4 ecoinvent: 1920:Manufacture of refined petroleum products
Scenario: Business-as-Usual
System model: Allocation, cut-off by classification
Generated by: Axel Liebich
Published in: Fehrenbach, H. 2018
Database: ecoinvent
isCopyrightProtected: true
accessRestrictedTo: 1

## General comment
This dataset represents the import of a refined petroleum products of unspecified geographical origin of supply to the domestic/regional market for this product. The transport requirements (expressed in tkm) with tanker ship was assumed to 10'000 km by sea by default. No product losses or other aspects, besides transport requirements have been included. The dataset is only a rough proxy with large uncertainties, and it should hence be revised accordingly if its contribution is expected to be important.

## Included activities start
Activity starts with transport by sea of a refined petroleum product of unspecified geographical origin.

## Included activities end
Activity ends with the refined petroleum product entering the domestic/regional market.

## Reference product
- naphtha: 1 kg; By-product classification allocatable product; CPC 33330: Naphtha; HS2017 271012: Petroleum oils and oils from bituminous minerals, not containing biodiesel, not crude, not waste oils; prep[...]; CAS 8030-30-6
  production volume 2.058e9 kg
    Import according to the JODI-oil database for 2015 (jodidata.org)
  property price 0.265 EUR2005
    Temporary price data. Calculated as 90% of purchasers price based on: Calculated with a factor of 1.38 relative to the crude petroleum price, based on US 1999 relation from the UN Commodity Trade Statistics Database.
  properties: carbon allocation 0.919743 kg, carbon content 0.919743, carbon content, fossil 0.919743, carbon content, non-fossil 0, dry mass 1 kg, heating value, net 45 MJ, water content 0, water in wet mass 0 kg, wet mass 1 kg

## Inputs from technosphere
- naphtha: 1 kg
  Unspecified geographical origin of supply assumed due to lack of information on actual origin or missing corresponding supplying activity.
  properties: carbon content, fossil 0.919743, dry mass 1 kg, heating value, net 45 MJ, wet mass 1 kg
- transport, freight, sea, tanker for petroleum: 10 metric ton*km; lognormal variance with pedigree 0.33, pedigree (5,5,5,5,5)
  A transport distance of 10'000 km by sea assumed by default.
