# metal coating facility construction

Dataset: EcoSpold 2, unit process
Geography: RER
Time period: 2000-01-01 to 2023-12-31
Technology level: current
Classification: ISIC rev.4 ecoinvent: 4100:Construction of buildings
Classification: EcoSpold01Categories: metals/refinement
Tags: ConvertedDataset
Scenario: Business-as-Usual
System model: Allocation, cut-off by classification
Share of production covered: 0 %
Generated by: Niels Jungbluth
Published in: Althaus H.-J. 2000
Database: ecoinvent
isCopyrightProtected: true
accessRestrictedTo: 1

## General comment
Inventory of plant for making selective coatings on metal sheets. Production capacity 100000 m2 of coatings per year. Life time 30a.
[This dataset was already contained in the ecoinvent database version 2. It was not individually updated during the transfer to ecoinvent version 3. Life Cycle Impact Assessment results may still have changed, as they are affected by changes in the supply chain, i.e. in other datasets. This dataset was generated following the ecoinvent quality guidelines for version 2. It may have been subject to central changes described in the ecoinvent version 3 change report (http://www.ecoinvent.org/database/ecoinvent-version-3/reports-of-changes/), and the results of the central updates were reviewed extensively. The changes added e.g. consistent water flows and other information throughout the database. The documentation of this dataset can be found in the ecoinvent reports of version 2, which are still available via the ecoinvent website. The change report linked above covers all central changes that were made during the conversion process.]

## Included activities start
The activity starts with the occupation and transformation of unspecified land.

## Included activities end
The activity ends with the conclusion of the building process. No machinery included.

## Geography
Production plants in DE, DK, US and CH.

## Technology
Sputtering, black majic and black chrome coating.

## Time period
Environmental report.

## Reference product
- metal coating facility: 1 unit; By-product classification allocatable product; CPC 53269: Other constructions for manufacturing
  EcoSpold01Location=RER
  production volume 1.32237 unit
    This is a placeholder value that does not reflect real-world production volumes. This dataset does not currently require a real-world production volume to work in the database framework, and no actual data were collected yet. This has no negative effect on the results of the ecoinvent database. The placeholder value of this activity was scaled according to the nominal GDP of 2005 (source: United Nations, http://data.un.org/Glossary.aspx?q=GDP+%28current+US%24%29, accessed 20130726) to reflect an appropriate share of the global production volume, which is also a placeholder value.
  property price 73333.2 EUR2005
    Calculated based on inputs: The price of the product has been calculated as a sum of the values of the material and energy inputs for this product. This value is therefore a rough estimation. It may underestimate the real price since there are additional expenses when producing any product. These expences can include for example labour costs, treatment of waste materials and profit for the producer. Please consider carefully whether this level of data quality is acceptable for your application.
  properties: carbon allocation 0 kg, carbon content 0

## Inputs from technosphere
- building, hall: 524 m2; lognormal variance with pedigree 0.3426, pedigree (3,3,5,1,1)
  EcoSpold01Location=CH
  Questionnaires
  Uncertainty: Questionnaires

## Inputs from nature
- Occupation, industrial area [natural resource, land]: 48700 m2*year; lognormal variance with pedigree 0.0826, pedigree (3,3,5,1,1)
  50a occupation
  Uncertainty: 50a occupation
- Transformation, from unspecified [natural resource, land]: 1130 m2; lognormal variance with pedigree 0.1626, pedigree (3,3,5,1,1)
  Calculation
  Uncertainty: Calculation
- Transformation, to industrial area [natural resource, land]: 1130 m2; lognormal variance with pedigree 0.1626, pedigree (3,3,5,1,1)
  Questionnaires
  Uncertainty: Questionnaires

## Sampling procedure
Environmental report and personal communication.

## Review by Hans-Jörg Althaus 2003-06-03
passed
