# mine construction, gold

Dataset: EcoSpold 2, unit process
Geography: ZA
Time period: 2002-01-01 to 2023-12-31
Technology level: current
Classification: EcoSpold01Categories: metals/extraction
Classification: ISIC rev.4 ecoinvent: 4290:Construction of other civil engineering projects
Tags: ConvertedDataset
Scenario: Business-as-Usual
System model: Allocation, cut-off by classification
Generated by: Matthias Tuchschmid (obsolete)
Published in: Charikinya E. 2017
Database: ecoinvent
isCopyrightProtected: true
accessRestrictedTo: 1

## General comment
This dataset describes the production of 1 unit of gold mine infrastructure. It includes land use and building and machinery consumption, as both in underground and surface (i.e. open pits) mining. Data correspond to those operations/plants that operates mostly underground mining and some open pits, specifically: AngloGold Ahanti, Harmony, Sibanye and GoldFields.

## Included activities start
From unoccupied land foreseen for a gold mine.

## Included activities end
This activity ends with the transformation of occupied land, in time.

The dataset includes land transformation and occupation during the different stages of the mine, as well as the consumption of buildings and machinery for underground mining.

## Geography
Land use of South-African mine, other inputs based on rough assumptions. Most of the mining operation and unrefined gold production activities are in an area called Witwatersrand basin. The are is approximately 350 km long and 200 km wide: the gold mines in this area are possibly the deepest in the world (mining operation at 3600 m and explortion core-drilling up to 4600 m.
MINE DEPTH: Mine depht: South Africa has thin and extensive precious metal reefs often lying several kilometres beneath the earth’s surface and usually slopes dips at up to 20 degrees. The country’s gold and somehow platinum corporations have to sink the deepest mine shafts in the world sometimes close to 4000 m for Gold in depths to reach and extract t he reefs; the mine depth rages from 2,6 km t up to 4 km beneath the earth’s surface and an average depth is of about 3,335 km.

## Technology
The mine is foreseen to have a lifetime of 50 years.
In South Africa haulage from underground is generally not done by conveyer belt, but through hoisting

## Time period
Period of public environmental report

## Reference product
- mine infrastructure, gold: 1 unit; By-product classification allocatable product; CPC 53261: Mining constructions; triangular min 0.00624484, mostLikely 0.640174, max 2.35358, pedigree (1,2,2,1,1)
  The infrastructure represent an average gold ungerground mine site in South Africa.
  EcoSpold01Location=ZA
  Uncertainty: Companied environmental enad operational reports
  production volume 0.08 unit; = 4/lifetime_UG_ZA
    There are 4 main companies that operate underground mining sites
  property lifetime 50 year; name lifetime_UG_ZA
  property price 3.38664e7 EUR2005
    Calculated based on inputs: The price of the product has been calculated as a sum of the values of the material and energy inputs for this product. This value is therefore a rough estimation. It may underestimate the real price since there are additional expenses when producing any product. These expences can include for example labour costs, treatment of waste materials and profit for the producer. Please consider carefully whether this level of data quality is acceptable for your application.
  properties: carbon allocation 0 kg, carbon content 0, lifetime capacity [kg] 0 kg

## Inputs from technosphere
- building, hall: 12500 m2; source Classen M. 2009; lognormal variance with pedigree 0.318, pedigree (4,5,5,5,5)
  Estimation: As of this exchange, mine construction process represents that of underground mining, and is assumed to be equivalent o the one depicted in the ecoinvent generic dataset (v2) "non-ferrous metal, mine, underground", in Part XIV of cited source.
  EcoSpold01Location=CH
  Uncertainty: Rough estimates
- building, multi-storey: 275000 m3; source Classen M. 2009; lognormal variance with pedigree 0.318, pedigree (4,5,5,5,5)
  EcoSpold01Location=RER
  Estimation: As of this exchange, mine construction process represents that of underground mining, and is assumed to be equivalent o the one depicted in the ecoinvent generic dataset (v2) "non-ferrous metal, mine, underground", in Part XIV of cited source.
  Uncertainty: Rough estimates
- conveyor belt: 600 m; source Classen M. 2009; lognormal variance with pedigree 0.318, pedigree (4,5,5,5,5)
  (same comment as for building, multi-storey)
- industrial machine, heavy, unspecified: 850000 kg; source Classen M. 2009; lognormal variance with pedigree 0.318, pedigree (4,5,5,5,5)
  Estimation: As of this exchange, mine construction process represents that of underground mining, and is assumed to be equivalent o the one depicted in the ecoinvent generic dataset (v2) "non-ferrous metal, mine, underground", in Part XIV of cited source.
  EcoSpold01Location=RER
  Uncertainty: Rough estimates

## Inputs from nature
All rows: source Placer Dome Inc. 2002
- Occupation, mineral extraction site [natural resource, land]: 5.28e8 m2*year; triangular min 275596, mostLikely 1.67644e8, max 1.41608e9, pedigree (1,2,5,1,1)
  Calculated value from companies reports from the total disturbed land. The value is a weighted average (geomean) and it's quite robust since it correlates quite well with the median of the same set of samples (R=0,9963349).The entire area of the mine is not in active use at one time; "disturbed area in active use" values reported in literature are assumed to be the average share of the mine area in use along 50 years of operation.
  The occupation of the mine was then calculated as:
  Ocupation, mineral extraction site = (Total disturbed area in active use) * 50 years = 6.78E+07 m2 * 50 years = 5,28E+08 m2y
- Transformation, from mineral extraction site [natural resource, land]: 6.78e7 m2; triangular min 1.03776e7, mostLikely 5.41229e7, max 1.389e8, pedigree (1,2,5,1,1)
  Calculated value from companies reports from the total disturbed land. The value is a weighted average (geomean) and it's quite robust since it correlates quite well with the median of the same set of samples (R=0,9963349)
  Uncertainty: Environmental report, Placer-Dome 2002
- Transformation, from unspecified [natural resource, land]: 6.78e7 m2; triangular min 151263, mostLikely 788895, max 2.0246e8, pedigree (1,2,5,1,1)
  (same comment as for Transformation, from mineral extraction site)
- Transformation, to mineral extraction site [natural resource, land]: 6.78e7 m2; triangular min 1.03776e7, mostLikely 5.41229e7, max 1.389e8, pedigree (1,2,5,1,1)
  (same comment as for Transformation, from mineral extraction site)
- Transformation, to unspecified [natural resource, land]: 6.78e7 m2; triangular min 151263, mostLikely 788895, max 2.0246e8, pedigree (1,2,5,1,1)
  (same comment as for Transformation, from mineral extraction site)

## Sampling procedure
Companies operational and environmental reports: AngloGlodAshanti Limited, Integrated Report, 2016
AngloGlodAshanti Limited, Sustainable Development Report, 2016
AngloGoldAshanti Limited, Vaal River Operational Report, 2016
AngloGoldAshanti Limited, West Wits Operational Report, 2016
GoldFields, Integrated Annual Report, 2016
GoldFields, GRI G4 Content Index, 2016
Harmony, Integrated Annual Report, 2016
Harmony, Operational Performance, 2016
SibanyeGold, Integrated Annual Report, 2016

## Extrapolations
Buildings and machinery are based on global assumptions. The figures are extrapolated on the basis of the ore production. Transformation and occupation figures have been calculate as weighted average according to the shares of production, so as to represent an average gold mining site. One additional data, not reported in the Exchanges, but it's worth to mention, is the so-called Mining Rigth Land: this figure for an average gold mining site is of 3,56E+07 m2; values range from 5,03E+04 m2 to 6,11E+08 m2. Data are from years 2012-2016.

## Review by Roberto Dones 2007-09-20
passed
none

## Review by Roland Hischier 2011-09-19
Transfer of documentation done.

## Review by Sirje Vares 2017-09-25
The mine construction data set is correct in the viewpoint of the appropriateness of the information provided. It based on the industry data and the dataset includes all relevant information in view of data quality and scope of application.
