# transport, freight, light commercial vehicle

Dataset: EcoSpold 2, unit process
Geography: RoW
Time period: 2005-01-01 to 2023-12-31
Technology level: current
Classification: ISIC rev.4 ecoinvent: 4923:Freight transport by road
Scenario: Business-as-Usual
System model: Allocation, cut-off by classification
Share of production covered: 100 %
Generated by: Michael Spielmann (obsolete)
Published in: Spielmann M. 2007
Database: ecoinvent
isCopyrightProtected: true
accessRestrictedTo: 1

## General comment
Based on 'transport, freight, light commercial vehicle, CH 2005' and 'transport, freight, light commercial vehicle, Europe without Switzerland 2005'. Inventory refers to the entire transport life cycle. For road infrastructure, expenditures and environmental interventions due to construction of roads have been allocated based on the Gross tonne kilometre performance. Expenditures due to operation of the road infrastructure, as well as land use have been allocated based on the yearly vehicle kilometre performance. For the attribution of vehicle share to the transport performance a vehicle life time performance of 220000 tkm/vehicle has been assumed. The data of the energy use and combustion emissions are average data for the operation of an average Swiss van (fleet average) in the year 2005, comprising various emission

## Included activities end
operation of vehicle; production and maintenance of vehicles; construction of road. In the energy use and combustion emissions dataset, fuel consumption is included. Direct airborne emissions of gaseous substances, particulate matters and heavy metals are accounted for. Particulate emissions comprise exhaust- and abrasions emissions. Heavy metal emissions to soil and water caused by tyre abrasion are included.

## Geography
Extrapolated from 'transport, freight, light commercial vehicle, CH 2005' and 'transport, freight, light commercial vehicle, Europe without Switzerland 2005'. The data for vehicle operation and road infrastructure reflect Swiss conditions. Data for vehicle manufacturing and maintenance represents generic European data. Data for the energy use and combustion emissions reflect the Swiss situation.

## Technology
Petrol, various emission treatment standards. Diesel and petrol vehicles.

## Reference product
- transport, freight, light commercial vehicle: 1 metric ton*km; By-product classification allocatable product; CPC 65119: Other road transport services of freight
  production volume 4.7028e11 metric ton*km; name transport_RP_PV
    2.8E12 vehicle-km with vans = light trucks (Borken et al. (2007)) ; 5.3015 km/tkm
  property price 0.59595 EUR2005
    Calculated based on inputs: The price of the product has been calculated as a sum of the values of the material and energy inputs for this product. This value is therefore a rough estimation. It may underestimate the real price since there are additional expenses when producing any product. These expences can include for example labour costs, treatment of waste materials and profit for the producer. Please consider carefully whether this level of data quality is acceptable for your application.
  properties: carbon allocation 0 kg, carbon content 0

## Inputs from technosphere
- diesel, low-sulfur: 0.00502339, 0.0223873, 0.267317, 0.0111974, 0.000742644, 0.0110918 kg (6 suppliers, which the file names only by identifier); sum of these 0.31776 kg; lognormal variance with pedigree 0.042, pedigree (1,1,5,5,1)
  Weighted average of the datasets 'transport, freight, light commercial vehicle, CH 2005' and 'transport, freight, light commercial vehicle, Europe without Switzerland 2005'.
  Uncertainty: d
  properties: carbon content, fossil 0.865, dry mass 1 kg, heating value, net 42.8 MJ, wet mass 1 kg
- light commercial vehicle: 2.3951e-5 unit; lognormal variance with pedigree 0.344, pedigree (3,1,5,5,1)
  Uncertainty: o
- maintenance, light commercial vehicle: 2.39508e-5 unit; lognormal variance with pedigree 0.344, pedigree (3,1,5,5,1)
  Uncertainty: o
- petrol, low-sulfur: 0.075265 kg; lognormal variance with pedigree 0.042, pedigree (1,1,5,5,1)
  (same comment as for diesel, low-sulfur)
  properties: carbon content, fossil 0.865, dry mass 1 kg, heating value, net 42.5 MJ, wet mass 1 kg
  note on heating value, net: Based on literature, page 611, Report 17: Jungbluth, N., Chudacoff, M., Dauriat, A., Dinkel, F., Doka, G., Faist Emmenegger, M., Gnansounou, E., Kljun, N., Schleiss, K., Spielmann, M., Stettler, C., Sutter, J. 2007: Life Cycle Inventories of Bioenergy. ecoinvent report No. 17, Swiss Centre for Life Cycle Inventories, Dübendorf, CH.
- road: 0.0067191 m*year; lognormal variance with pedigree 0.344, pedigree (3,1,5,5,1)
  Uncertainty: o
- road maintenance: 0.00146774 m*year; lognormal variance with pedigree 0.344, pedigree (3,1,5,5,1)
  Calculated value based demand factors and underlying assumptions for European road transport services. Values are based on total vkm of all road transport services (RER) and the relative shares of each specific form (e.g. 3.5-7.5t lorry). The value per tkm is then based on the average load factor (see Activity Description). Transport performance data is derived from TREMOVE (2009).
  Uncertainty: o

## Emissions to nature
- Acetaldehyde [air, unspecified]: 8.359e-5 kg; lognormal variance with pedigree 0.0832, pedigree (2,3,5,5,1)
  (same comment as for diesel, low-sulfur)
- Ammonia [air, unspecified]: 2.7315e-5 kg; lognormal variance with pedigree 0.0532, pedigree (2,3,5,5,1)
  (same comment as for diesel, low-sulfur)
- Benzene [air, unspecified]: 1.0718e-5 kg; lognormal variance with pedigree 0.082, pedigree (1,1,5,5,1)
  (same comment as for diesel, low-sulfur)
- Cadmium II [air, unspecified]: 4.9724e-9 kg; lognormal variance with pedigree 0.758, pedigree (4,5,5,5,1)
  Weighted average of the datasets 'transport, freight, light commercial vehicle, CH 2005' and 'transport, freight, light commercial vehicle, Europe without Switzerland 2005'.
  Uncertainty: t
- Carbon dioxide, fossil [air, unspecified]: 1.2282 kg; lognormal variance with pedigree 0.0426, pedigree (2,1,5,5,1)
  Weighted average of the datasets 'transport, freight, light commercial vehicle, CH 2005' and 'transport, freight, light commercial vehicle, Europe without Switzerland 2005'.
  Uncertainty: o
- Carbon monoxide, fossil [air, unspecified]: 0.011714 kg; lognormal variance with pedigree 0.692, pedigree (1,1,5,5,1)
  (same comment as for diesel, low-sulfur)
- Chromium III [air, unspecified]: 6.3833e-8 kg; lognormal variance with pedigree 0.758, pedigree (4,5,5,5,1)
  (same comment as for Cadmium II)
- Chromium VI [air, unspecified]: 4.885e-11 kg; lognormal variance with pedigree 0.758, pedigree (4,5,5,5,1)
  (same comment as for Carbon dioxide, fossil)
- Copper ion [air, unspecified]: 3.8341e-6 kg; lognormal variance with pedigree 0.758, pedigree (4,5,5,5,1)
  (same comment as for Cadmium II)
- Dinitrogen monoxide [air, unspecified]: 4.8902e-5 kg; lognormal variance with pedigree 0.0832, pedigree (2,3,5,5,1)
  (same comment as for diesel, low-sulfur)
- Formaldehyde [air, unspecified]: 0.00015504 kg; lognormal variance with pedigree 0.0832, pedigree (2,3,5,5,1)
  (same comment as for diesel, low-sulfur)
- Lead II [air, unspecified]: 2.0225e-7 kg; lognormal variance with pedigree 0.758, pedigree (4,5,5,5,1)
  (same comment as for Cadmium II)
- Mercury II [air, unspecified]: 9.7702e-12 kg; lognormal variance with pedigree 0.758, pedigree (4,5,5,5,1)
  (same comment as for Cadmium II)
- Methane, fossil [air, unspecified]: 4.0652e-5 kg; lognormal variance with pedigree 0.082, pedigree (1,1,5,5,1)
  (same comment as for diesel, low-sulfur)
- NMVOC, non-methane volatile organic compounds [air, unspecified]: 0.00096687 kg; lognormal variance with pedigree 0.082, pedigree (1,1,5,5,1)
  (same comment as for diesel, low-sulfur)
- Nickel II [air, unspecified]: 5.9025e-8 kg; lognormal variance with pedigree 0.758, pedigree (4,5,5,5,1)
  (same comment as for Cadmium II)
- Nitrogen oxides [air, unspecified]: 0.0059472 kg; lognormal variance with pedigree 0.082, pedigree (1,1,5,5,1)
  (same comment as for diesel, low-sulfur)
- PAH, polycyclic aromatic hydrocarbons [air, unspecified]: 2.1077e-9 kg; lognormal variance with pedigree 1.5832, pedigree (2,3,5,5,1)
  Weighted average of the datasets 'transport, freight, light commercial vehicle, CH 2005' and 'transport, freight, light commercial vehicle, Europe without Switzerland 2005'.
  Uncertainty: r
- Particulate Matter, < 2.5 um [air, unspecified]: 0.00055694 kg; lognormal variance with pedigree 0.342, pedigree (1,1,5,5,1)
  Weighted average of the datasets 'transport, freight, light commercial vehicle, CH 2005' and 'transport, freight, light commercial vehicle, Europe without Switzerland 2005'.
  Uncertainty: i
- Particulate Matter, > 10 um [air, unspecified]: 7.6371e-5 kg; lognormal variance with pedigree 0.0826, pedigree (1,3,5,5,1)
  Weighted average of the datasets 'transport, freight, light commercial vehicle, CH 2005' and 'transport, freight, light commercial vehicle, Europe without Switzerland 2005'.
  Uncertainty: a
- Particulate Matter, > 2.5 um and < 10um [air, unspecified]: 9.4876e-5 kg; lognormal variance with pedigree 0.1646, pedigree (3,3,5,5,1)
  (same comment as for Particulate Matter, > 10 um)
- Selenium IV [air, unspecified]: 4.885e-9 kg; lognormal variance with pedigree 0.758, pedigree (4,5,5,5,1)
  (same comment as for Cadmium II)
- Sulfur dioxide [air, unspecified]: 3.9302e-5 kg; lognormal variance with pedigree 0.0426, pedigree (2,1,5,5,1)
  (same comment as for Carbon dioxide, fossil)
- Toluene [air, unspecified]: 2.7006e-5 kg; lognormal variance with pedigree 0.082, pedigree (1,1,5,5,1)
  (same comment as for diesel, low-sulfur)
- Xylenes, unspecified [air, unspecified]: 1.9327e-5 kg; lognormal variance with pedigree 0.082, pedigree (1,1,5,5,1)
  (same comment as for diesel, low-sulfur)
- Zinc II [air, unspecified]: 1.5815e-6 kg; lognormal variance with pedigree 0.758, pedigree (4,5,5,5,1)
  (same comment as for Cadmium II)
- Cadmium II [soil, unspecified]: 4.32e-10 kg; lognormal variance with pedigree 0.21, pedigree (5,5,5,5,1)
  (same comment as for Particulate Matter, > 10 um)
- Chromium III [soil, unspecified]: 2.0602e-9 kg; lognormal variance with pedigree 0.21, pedigree (5,5,5,5,1)
  (same comment as for Particulate Matter, > 10 um)
- Copper ion [soil, unspecified]: 2.891e-8 kg; lognormal variance with pedigree 0.21, pedigree (5,5,5,5,1)
  (same comment as for Particulate Matter, > 10 um)
- Lead II [soil, unspecified]: 1.7779e-8 kg; lognormal variance with pedigree 0.21, pedigree (5,5,5,5,1)
  (same comment as for Particulate Matter, > 10 um)
- Nickel II [soil, unspecified]: 5.5826e-9 kg; lognormal variance with pedigree 0.21, pedigree (5,5,5,5,1)
  (same comment as for Particulate Matter, > 10 um)
- Zinc II [soil, unspecified]: 1.2201e-6 kg; lognormal variance with pedigree 0.21, pedigree (5,5,5,5,1)
  (same comment as for Particulate Matter, > 10 um)
- Cadmium II [water, unspecified]: 4.32e-10 kg; lognormal variance with pedigree 0.47, pedigree (5,5,5,5,1)
  (same comment as for Particulate Matter, > 10 um)
- Chromium III [water, unspecified]: 2.0602e-9 kg; lognormal variance with pedigree 0.47, pedigree (5,5,5,5,1)
  (same comment as for Particulate Matter, > 10 um)
- Copper ion [water, unspecified]: 2.891e-8 kg; lognormal variance with pedigree 0.47, pedigree (5,5,5,5,1)
  (same comment as for Particulate Matter, > 10 um)
- Lead II [water, unspecified]: 1.7779e-8 kg; lognormal variance with pedigree 0.81, pedigree (5,5,5,5,1)
  (same comment as for Particulate Matter, > 10 um)
  property carbon content, fossil 0; name C_content_fossil
  property carbon content, non-fossil 0; name C_content_non_fossil
  property dry mass 1 kg; name DM
  property water content 0; name water_content
  property water in wet mass 0 kg; name WWM
  property wet mass 1 kg; name WM
- Nickel II [water, unspecified]: 5.5826e-9 kg; lognormal variance with pedigree 0.81, pedigree (5,5,5,5,1)
  (same comment as for Particulate Matter, > 10 um)
- Zinc II [water, unspecified]: 1.2201e-6 kg; lognormal variance with pedigree 0.81, pedigree (5,5,5,5,1)
  (same comment as for Particulate Matter, > 10 um)

## Sampling procedure
Literature data.

## Extrapolations
none This dataset has been copied from an original dataset covering the geography Europe without Switzerland. The uncertainty has been adjusted accordingly.
