# wheat grain, import from RoW

Dataset: EcoSpold 2, unit process
Geography: ZA
Time period: 2015-01-01 to 2023-12-31
Technology level: current
Classification: EcoSpold01Categories: agricultural means of production/feed
Classification: ISIC rev.4 ecoinvent: 0111:Growing of cereals (except rice), leguminous crops and oil seeds
Scenario: Business-as-Usual
System model: Allocation, cut-off by classification
Generated by: Avraam Symeonidis
Database: ecoinvent
isCopyrightProtected: true
accessRestrictedTo: 1

## General comment
This data represents the import of one kg of wheat grain from Rest of the World to South Africa.

## Included activities start
From transportation of wheat grain from the harbor.

## Included activities end
This activity ends with imported wheat grain at a main harbour in South Africa.The dataset includes transportation to South Africa harbour by freight ship.

## Reference product
- wheat grain: 1 kg; By-product classification allocatable product; CPC 01112: Wheat, other; HS2017 100199: Cereals; wheat and meslin, other than durum wheat, other than seed
  production volume 1.40742e9 kg
    Average of of 5 years between 2012-2018. http://www.sagis.org.za/historical%20prod%20consumption%20imp%20exp.html
  property carbon content, non-fossil 0.464601; name REF_PRODUCT_C_content_non_fossil
    Estimate not geography specific. Value and comment from "wheat production, GLO": biogene carbon content on a dry matter basis
    Composition data obtained from Wheat, soft red winter, in (http://www.nal.usda.gov/fnic/foodcomp/search/). First, composition data were refered to 1 kg dry mass. Then, C-contents were calculated considering a C-content/dry mass of 46% in carbohydrates (including fibres), 53% in proteins and 75% in fats. All data from 'Evolutionary and Biochemical Aspects', A.D. Kay and T. Vrede (in Global Ecology, 2010, Elsevier B.V., S.E. Jørgensen Ed.).
  property dry mass 0.855 kg; name REF_PRODUCT_DM; = REF_PRODUCT_WM- REF_PRODUCT_WWM
  property price 0.22 EUR2005
    Literature value. Based on SAFEX price of R 3,727 per tonne, source: SAGIS, 2018. Retrieved from: http://www.sagis.org.za/safex_historic.html, accessed 28May2018
  property water content 0.169591; name REF_PRODUCT_water_content_1; = REF_PRODUCT_WWM/ REF_PRODUCT_DM
  property water in wet mass 0.145 kg; name REF_PRODUCT_WWM
  property wet mass 1 kg; name REF_PRODUCT_WM
  properties: carbon allocation 0.397234 kg, carbon content 0.464601, carbon content, fossil 0

## Inputs from technosphere
- transport, freight, sea, bulk carrier for dry goods: 7.13 metric ton*km; lognormal variance with pedigree 0.1226, pedigree (2,1,3,1,1)
  Estimated value based on the percentage grain imported of processed (SAGIS, 2017a;SAGIS, 2017b), breakdown by exporting country and distance from exporting country port to Durban Port. The 10-year average grain imports of consumption of 48% was used (SAGIS, 2017b). The breakdown by exporting country was determined using export tonnages reported by country for combined product 100199 (Wheat and meslin, excluding seed for sowing, and durum wheat) and product 100119 (Durum wheat, excluding seed for sowing) for 2015 and 2016 calendar years. Export tonnages was retrieved online from TradeMap (http://www.trademap.org/). The distances were estimated using Ports.com. Exporting countries (ports) applied are as folllows: 35% Russia (Novorossiysk), 14% Germany (Hamburg), 10% Canada (Vancouver), 10% Australia (Fremantle/ Albany/ Port Adelaide), 8% USA (South Louisiana), 7% Argentina (San Martin/San Lorenzo/Rosario), 7% Lithuania (Klaipeda), 6% Ukraine (Yuzhny/Odessa/Chernomorsk) and the remainder Poland (Gdansk/Gdynia). The corresponding ports were identified to be either the designated port for grain exports, or where data was not available, the largest exporting terminal in the region. Reference(s): SAGIS (2017a) Supply and Demand: Marketing Year October 2016 to September 2017, South African Grain Information System. Available at: http://www.sagis.org.za/sd_marketing_year.html. (Accessed April 2017); SAGIS (2017b) Historic Deliveries, Consumption, Imports and Exprts of Wheat, South African Grain Information System. Available at: http://www.sagis.org.za/historical%20prod%20consumption%20imp%20exp.html. (Accessed August 2017)
- wheat grain: 1 kg
  Wheat grain produced in RoW and imported to South Africa.
  properties: carbon content, non-fossil 0.464601, dry mass 0.85 kg, water content 0.176471, wet mass 1 kg

## Sampling procedure
literature
