# cast iron production

Dataset: EcoSpold 2, unit process
Geography: RoW
Time period: 2001-01-01 to 2023-12-31
Technology level: current
Classification: EcoSpold01Categories: metals/extraction
Classification: ISIC rev.4 ecoinvent: 2410:Manufacture of basic iron and steel
Synonyms: grey iron; white iron; Grauguss
Tags: ConvertedDataset
Scenario: Business-as-Usual
System model: Allocation, cut-off by classification
Generated by: Hans-Jörg Althaus
Published in: Classen M. 2009
Database: ecoinvent
isCopyrightProtected: true
accessRestrictedTo: 1

## General comment
35% scrap and 65% pig iron assumed as iron input
[This dataset was already contained in the ecoinvent database version 2. It was not individually updated during the transfer to ecoinvent version 3. Life Cycle Impact Assessment results may still have changed, as they are affected by changes in the supply chain, i.e. in other datasets. This dataset was generated following the ecoinvent quality guidelines for version 2. It may have been subject to central changes described in the ecoinvent version 3 change report (http://www.ecoinvent.org/database/ecoinvent-version-3/reports-of-changes/), and the results of the central updates were reviewed extensively. The changes added e.g. consistent water flows and other information throughout the database. The documentation of this dataset can be found in the ecoinvent reports of version 2, which are still available via the ecoinvent website. The change report linked above covers all central changes that were made during the conversion process.]

## Included activities start
The activity starts with the reception of the raw materials at the plant gate.

## Included activities end
Transports of metal and other input materials to electric arc furnace, melting and refining process and casting.

## Geography
Data relate to plants in the EU

## Technology
Electric arc furnace for melting. Energy consumption and emissions from EAF steel making

## Parameters
- fraction, cooling water, cooling pond system, to air: 0.032 dimensionless; name fraction_CW_CP_to_air; lognormal variance with pedigree 0.0413, pedigree (2,3,1,3,1)
  Calculated based on literature value (Scown, C.D., 2011, Water Footprint of U.S. Transportation Fuels and supplying information of the article) (Vionnet, S., Quantis Water Database - Technical Report, 2012).
- fraction, cooling water, once-through system, to air: 0.004 dimensionless; name fraction_CW_OT_to_air; lognormal variance with pedigree 0.0413, pedigree (2,3,1,3,1)
  (same comment as for fraction, cooling water, cooling pond system, to air)
- fraction, cooling water, recirculating system, to air: 0.771 dimensionless; name fraction_CW_R_to_air; lognormal variance with pedigree 0.0413, pedigree (2,3,1,3,1)
  (same comment as for fraction, cooling water, cooling pond system, to air)
- fraction, cooling water, to air: 0.3875 dimensionless; name fraction_CW_to_air; = (0.5*fraction_CW_OT_to_air)+(0.5*fraction_CW_R_to_air); lognormal variance with pedigree 0.092025, pedigree (4,4,3,2,4)
  Calculated value based on literature value (see comments of the other parametres present in this dataset) and expert opinion. In the case when no industry/literature data are available about the type of cooling or directly fraction, cooling water, to air specific for the process a default assumption is applied. It is assumed that the once-through cooling system is used in 50% of all cases and recirculating system is used in another 50% of all cases.
- fraction, process water, to air: 0.095 dimensionless; name fraction_PW_to_air; lognormal variance with pedigree 0.092025, pedigree (4,4,3,2,4)

## Reference product
- cast iron: 1 kg; name RP_amount; By-product classification allocatable product; CPC 41111: Pig iron and spiegeleisen in pigs, blocks or other primary forms; HS2017 7201: Pig iron and spiegeleisen in pigs, blocks or other primary forms
  EcoSpold01Location=RER
  production volume 6.62395e10 kg; name RP_PV
    Calculated as a sum of grey iron, ductile iron and maleable iron casting production for the year of 2019.
    Reference:
    Modern Casting, 2021. Total Casting Tons Dip in 2019, Modern Casting, A publication of the American Foundry Society Available from: http://www.qgdigitalpublishing.com/publication/?m=55001&i=687958&p=30&ver=html5 (last accessed on 2021-08-17).
  property carbon content, fossil 0.04
    Cast iron is made by remelting pig iron in small furnaces (e.g. cupola furnaces or electric arc furnaces) and poured into moulds to make castings. It usually contains 2% to 6% carbon (ecoinvent v2.2 report 10_partII). An average content of 4% was considered
  property heating value, net 0 MJ
    Non combustible products are assumed to have an LHV equal to zero (0).
  property price 1.07 EUR2005
    Calculated value based on data from United Nations Commodity Trade Statistics Database (comtrade.un.org, accessed 20140430). UN comtrade category: 7325 Cast articles, of iron or steel nes. Using exchange rate of 1EURO = 1.209 USD. Average (weigheted by the NetWeight of the import) of price of import into 5 main markets (EU, US, IN, JP, and CH). Data for the year 2005.
  properties: carbon allocation 0.04 kg, carbon content 0.04, carbon content, non-fossil 0, dry mass 1 kg, water content 0, water in wet mass 0 kg, wet mass 1 kg

## Inputs from technosphere
- anode, for metal electrolysis: 0.003 kg; lognormal variance with pedigree 0.0612, pedigree (2,3,5,5,3)
  EcoSpold01Location=RER
  properties: carbon content, fossil 0.865971, dry mass 1 kg, wet mass 1 kg
  note on carbon content, fossil: The main component of the anode is carbon, coming from bitumen and petroleum coke (ecoinvent v2.2 report 10). The C content in those components of the anode has been taken into account to calculate the anode final C content.
- electric arc furnace converter: 4e-11 unit; lognormal variance with pedigree 0.5, pedigree (5,5,5,5,5)
  EcoSpold01Location=RER
- electric arc furnace dust: -0.00923412, -0.000365883 kg (2 suppliers, which the file names only by identifier); sum of these -0.0096 kg; lognormal variance with pedigree 0.0214, pedigree (2,3,2,5,3)
  EcoSpold01Location=CH
  production volume; = abs( EAF_dust_amount/ RP_amount)* RP_PV
    Calculated from the production volume of cast iron in proportion to the respective output amounts.
  properties: carbon content, fossil 0.01339, dry mass 0.846 kg, water content 0.182033, wet mass 1 kg
- electric arc furnace slag: -0.0927588, -4.11941e-5 kg (2 suppliers, which the file names only by identifier); sum of these -0.0928 kg; lognormal variance with pedigree 0.0214, pedigree (2,3,2,5,3)
  EcoSpold01Location=CH
  production volume; = abs( EAF_slag_amount/ RP_amount)* RP_PV
    (same comment as for electric arc furnace dust)
  properties: carbon content, fossil 0.00338635, dry mass 1 kg, wet mass 1 kg
- electricity, medium voltage: 0.0140777, 0.28082, 0.0943545, 0.00431109, 0.00086286, 0.000185275, 0.028999 kWh (7 suppliers, which the file names only by identifier); sum of these 0.42361 kWh; lognormal variance with pedigree 0.0612, pedigree (2,3,5,5,3)
  EcoSpold01Location=UCTE
- hard coal: 0.000925477, 0.000219609, 0.00654982, 0.00153822, 0.000944428, 0.00137978, 0.00204104, 0.000401628 kg (8 suppliers, which the file names only by identifier); sum of these 0.014 kg; lognormal variance with pedigree 0.0612, pedigree (2,3,5,5,3)
  EcoSpold01Location=UCTE
  properties: carbon content, fossil 0.845, dry mass 0.94 kg, heating value, net 27.91 MJ, water content 0.0638298, wet mass 1 kg
  note on carbon content, fossil: C content 75-94% (specified in Tab 1.1, report 6, part VI). A mean content of 0.845 kg C/ kg dry hard coal was considered
  note on heating value, net: Based on the Characterization factor of Hard coal in the CED method
- inert waste, for final disposal: -0.005 kg; name inert_waste; lognormal variance with pedigree 0.0214, pedigree (2,3,2,5,3)
  EcoSpold01Location=CH
  production volume; = abs( inert_waste/ RP_amount)* RP_PV
    (same comment as for electric arc furnace dust)
  properties: dry mass 0.995 kg, water content 0.00502513, wet mass 1 kg
- iron scrap, sorted, pressed: 0.38675 kg; lognormal variance with pedigree 0.0612, pedigree (2,3,5,5,3)
  EcoSpold01Location=RER
  properties: dry mass 1 kg, wet mass 1 kg
- natural gas, high pressure: 0.000193039, 0.000325633, 0.000710306, 0.000237709, 5.55517e-5, 0.000330633, 0.000317267, 0.000834262, 0.00032208, 0.000498168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 m3 (37 suppliers, which the file names only by identifier); sum of these 0.025 m3; lognormal variance with pedigree 0.0612, pedigree (2,3,5,5,3)
  EcoSpold01Location=RER
  properties: carbon content, fossil 0.602381, dry mass 0.84 kg, heating value, gross 40 MJ, heating value, net 36 MJ, wet mass 0.84 kg
  note on carbon content, fossil: An average C content of 0.506 kg C/ m3 has been assumed (this average has been calculated using data in Tab 3.5, ecoinvent v2.2 report 6_V
  note on heating value, net: Literature value, Source: Christoph Meili;Niels Jungbluth;Maresa Bussa (2021) Life cycle inventories of crude oil and natural gas extraction. ESU-services Ltd. commissioned by BAFU & VSG, Schaffhausen, Switzerland, http://esu-services.ch/data/public-lci-reports/
- oxygen, liquid: 0.05073 kg; lognormal variance with pedigree 0.0612, pedigree (2,3,5,5,3)
  EcoSpold01Location=RER
  properties: dry mass 1 kg, wet mass 1 kg
- pig iron: 0.71825 kg; lognormal variance with pedigree 0.0612, pedigree (2,3,5,5,3)
  EcoSpold01Location=GLO
  properties: carbon content, fossil 0.045, dry mass 1 kg, wet mass 1 kg
  note on carbon content, fossil: Pig iron is the iron produced in the blast furnace. It is an alloy of 94% Fe and more than 2% C (world average 4.5%). (ecoinvent v2.2 report 10_partII)
- quicklime, in pieces, loose: 0.055 kg; lognormal variance with pedigree 0.0612, pedigree (2,3,5,5,3)
  EcoSpold01Location=CH
  properties: dry mass 0.99 kg, water content 0.010101, wet mass 1 kg
- refractory, basic, packed: 0.0135 kg; lognormal variance with pedigree 0.0612, pedigree (2,3,5,5,3)
  EcoSpold01Location=DE
  properties: dry mass 1 kg, wet mass 1 kg

## Inputs from nature
- Water, cooling, unspecified natural origin [natural resource, in water]: 0.00521637 m3; name water_cooling_UNO_input; source Byers, W. 2003; lognormal variance with pedigree 0.0546, pedigree (3,3,5,5,1)
  Calculated based on literature, (Vionnet, S., Quantis Water Database - Technical Report, 2012).
  property carbon content, fossil 0.0104329; name C_content_fossil
  property carbon content, non-fossil 0; name C_content_non_fossil
  property dry mass 0.1101 kg; name DM
  property water content 9081.65; name water_content
  property water in wet mass 999.89 kg; name WWM
  property wet mass 1000 kg; name WM

## Emissions to nature
- Benzene [air, unspecified]: 2.285e-6 kg; lognormal variance with pedigree 0.1812, pedigree (2,3,5,5,3)
- Cadmium II [air, unspecified]: 3.65e-8 kg; lognormal variance with pedigree 0.7112, pedigree (2,3,5,5,3)
- Carbon monoxide, fossil [air, unspecified]: 0.00232 kg; lognormal variance with pedigree 0.7112, pedigree (2,3,5,5,3)
- Chromium III [air, unspecified]: 1.254e-6 kg; lognormal variance with pedigree 0.7112, pedigree (2,3,5,5,3)
- Copper ion [air, unspecified]: 2.305e-7 kg; lognormal variance with pedigree 0.7112, pedigree (2,3,5,5,3)
- Dioxins, measured as 2,3,7,8-tetrachlorodibenzo-p-dioxin [air, unspecified]: 4.535e-12 kg; lognormal variance with pedigree 0.3612, pedigree (2,3,5,5,3)
- Hexachlorobenzene [air, unspecified]: 2e-8 kg; lognormal variance with pedigree 0.1812, pedigree (2,3,5,5,3)
- Hydrocarbons, aromatic [air, unspecified]: 7.7008e-5 kg; lognormal variance with pedigree 0.1012, pedigree (2,3,5,5,3)
- Hydrochloric acid [air, unspecified]: 5.2e-6 kg; lognormal variance with pedigree 0.1012, pedigree (2,3,5,5,3)
- Hydrogen fluoride [air, unspecified]: 2.35e-6 kg; lognormal variance with pedigree 0.1012, pedigree (2,3,5,5,3)
- Lead II [air, unspecified]: 1.808e-6 kg; lognormal variance with pedigree 0.7112, pedigree (2,3,5,5,3)
- Mercury II [air, unspecified]: 2.238e-6 kg; lognormal variance with pedigree 0.7112, pedigree (2,3,5,5,3)
- Nickel II [air, unspecified]: 7.005e-7 kg; lognormal variance with pedigree 0.7112, pedigree (2,3,5,5,3)
- Nitrogen oxides [air, unspecified]: 0.00018 kg; lognormal variance with pedigree 0.1012, pedigree (2,3,5,5,3)
- PAH, polycyclic aromatic hydrocarbons [air, unspecified]: 3.725e-8 kg; lognormal variance with pedigree 0.3612, pedigree (2,3,5,5,3)
- Particulate Matter, < 2.5 um [air, unspecified]: 0.00016596 kg; lognormal variance with pedigree 0.3612, pedigree (2,3,5,5,3)
- Particulate Matter, > 10 um [air, unspecified]: 5.8575e-5 kg; lognormal variance with pedigree 0.1012, pedigree (2,3,5,5,3)
- Particulate Matter, > 2.5 um and < 10um [air, unspecified]: 0.00016596 kg; lognormal variance with pedigree 0.1812, pedigree (2,3,5,5,3)
- Polychlorinated biphenyls [air, unspecified]: 2.325e-8 kg; lognormal variance with pedigree 0.3612, pedigree (2,3,5,5,3)
- Sulfur dioxide [air, unspecified]: 7.7e-5 kg; lognormal variance with pedigree 0.0612, pedigree (2,3,5,5,3)
- Water [air, unspecified]: 0.00202134 m3; name water_to_air_unspecified; lognormal variance with pedigree 0.0827, pedigree (2,2,5,5,1)
  Calculated value based on literature values and expert opinion. See comments in the parametres' comment field.
  property fraction, origin: fresh water 0; name fraction_origin_fresh_water
  property fraction, origin: salt water 0; name fraction_origin_salt_water
  property fraction, origin: unspecified 1; name fraction_origin_unspecified
- Zinc II [air, unspecified]: 2.294e-5 kg; lognormal variance with pedigree 0.7112, pedigree (2,3,5,5,3)
- Water [water, unspecified]: 0.00319503 m3; name water_to_water_unspecified; lognormal variance with pedigree 0.0827, pedigree (2,2,5,5,1)
  (same comment as for Water)
  property fraction, origin: fresh water 0; name fraction_origin_fresh_water_Ww
  property fraction, origin: salt water 0; name fraction_origin_salt_water_Ww
  property fraction, origin: unspecified 1; name fraction_origin_unspecified_Ww

## Sampling procedure
Internet search

## Extrapolations
see technology This dataset has been copied from an original dataset covering the geography RER. The uncertainty has been adjusted accordingly.

## Review by Roland Hischier 2007-08-13
passed
