# transmission network construction, electricity, high voltage direct current subsea cable

Dataset: EcoSpold 2, unit process
Geography: RoW
Time period: 1998-01-01 to 2023-12-31
Technology level: current
Classification: ISIC rev.4 ecoinvent: 4220:Construction of utility projects
Synonyms: HVDC subsea cable
Scenario: Business-as-Usual
System model: Allocation, cut-off by classification
Generated by: Heidi Hottenroth
Published in: Arvesen, A. 2014
Database: ecoinvent
isCopyrightProtected: true
accessRestrictedTo: 1

## General comment
This dataset represents the production, laying, and decommissioning of 1 km of an high voltage direct current subsea cable transmission network. All materials end up in used cables. The service life of the network was assumed to be 40 years. Maintenance is included as a service.
The inventory was modelled according to A. Arvesen et al. (2014) LCA of an offshore grid interconnecting wind farms and customers across the north sea. Int J Life Cylce Assess 19:826-837. p.831, table 2.

## Included activities start
The activity starts with cable production according to material composition (energy requirements for cable production not included) and cable laying. Maintenance is included as a service. Substations are not included.

## Included activities end
This activity ends with decommissioning of subsea cable according to material composition

## Geography
The scope of the underlying literature source is Europe

## Technology
The voltage level is assumed to be 450 kV. 2x790-mm² copper conductors, mass-impregnated paper insulation, and steel and lead sheeting

## Time period
Time frame of the underlying literature sources

## Parameters
- lifetime: 40 year

## Reference product
- transmission network, electricity, high voltage direct current subsea cable: 1 km; name RP; By-product classification allocatable product; CPC 53242: Long-distance communication and power lines (cables)
  high voltage direct current subsea cable (450 kV, 2x790-mm² copper conductors, mass-impregnated paper insulation, and steel and lead sheeting)
  production volume 694 km; name PV_RP
    calculated according to data from https://en.wikipedia.org/wiki/List_of_HVDC_projects retrieved on 09.10.2020
    Length of subsea cables in Europe in the years 1992-2012
  property lifetime 40 year; name RP_lifetime
  properties: carbon allocation 0 kg, carbon content 0, price 106643 EUR2005

## Inputs from technosphere
- copper scrap, sorted, pressed: -12699 kg; name BP_copper_recycling; = copper*0.9; lognormal variance with pedigree 0.0152, pedigree (3,3,3,5,3)
  Proxy for copper generated through dismantling of the transmission network. 90 % Recycling is assumed by the original source. Based on the amount of the corresponding material inputs.
  production volume; = abs(BP_copper_recycling/RP)*PV_RP
    Calculated from production volume of reference product using the relative outputs.
  properties: dry mass 1 kg, price 2.84 EUR2005, wet mass 1 kg
- copper, cathode: 14110 kg; name copper; lognormal variance with pedigree 0.0132, pedigree (3,3,4,5,1)
  Literature Value.
  properties: copper content 1, dry mass 1 kg, wet mass 1 kg
- electricity, medium voltage: 3113.91, 62115.6, 20870.7, 953.587, 190.859, 40.9818, 6414.4 kWh (7 suppliers, which the file names only by identifier); sum of these 93700 kWh; lognormal variance with pedigree 0.0132, pedigree (3,3,4,5,1)
  Literature Value.
- heat, district or industrial, natural gas: 1039.53, 63260.5 MJ (2 suppliers, which the file names only by identifier); sum of these 64300 MJ; lognormal variance with pedigree 0.0132, pedigree (3,3,4,5,1)
  Literature Value.
- iron scrap, unsorted: -31680 kg; name BP_iron_scrap; = steel*0.9; lognormal variance with pedigree 0.0152, pedigree (3,3,3,5,3)
  Proxy for iron and steel scrap generated through dismantling of the transmission network. 90 % Recycling is assumed by the original source. Based on the amount of the corresponding material inputs.
  production volume; = abs(BP_iron_scrap/RP)*PV_RP
    Calculated from production volume of reference product using the relative outputs.
  properties: carbon content, fossil 0.005, dry mass 1 kg, price 0.149 EUR2005, wet mass 1 kg
- kraft paper: 5960 kg; name paper; lognormal variance with pedigree 0.0132, pedigree (3,3,4,5,1)
  Literature Value. Kraft paper (insulation)
  properties: carbon content, fossil 9.3e-6, carbon content, non-fossil 0.428894, dry mass 0.945 kg, water content 0.0582011, wet mass 1 kg
- lead: 24900 kg; lognormal variance with pedigree 0.0132, pedigree (3,3,4,5,1)
  Literature Value.
  properties: dry mass 1 kg, wet mass 1 kg
- maintenance, transmission network, electricity, high voltage direct current subsea cable: 40 km*year; = lifetime; lognormal variance with pedigree 0.0152, pedigree (3,4,4,5,2)
  Calculated Value.
- polypropylene, granulate: 3250 kg; name plastic; lognormal variance with pedigree 0.0132, pedigree (3,3,4,5,1)
  Literature Value. Processing unknown
  properties: carbon content, fossil 0.857143, dry mass 1 kg, wet mass 1 kg
- scrap copper: -1411 kg; name BP_copper_waste; = copper*0.1; lognormal variance with pedigree 0.0152, pedigree (3,3,3,5,3)
  Waste generated through dismantling of the transmission network. Based on the amount of the corresponding material inputs.
  production volume; = abs(BP_copper_waste/RP)*PV_RP
    Calculated from production volume of reference product using the relative outputs.
  properties: dry mass 1 kg, wet mass 1 kg
- scrap steel: -3520 kg; name BP_steel; = steel*0.1; lognormal variance with pedigree 0.0152, pedigree (3,3,3,5,3)
  Waste generated by disposal of product. Based in the input of material.
  production volume; = abs(BP_steel/RP)*PV_RP
    Calculated from production volume of reference product using the relative outputs.
  properties: carbon content, fossil 0.005, dry mass 1 kg, wet mass 1 kg
- steel, low-alloyed: 35200 kg; name steel; lognormal variance with pedigree 0.0132, pedigree (3,3,4,5,1)
  Literature Value. Processing unknown
  properties: carbon content, fossil 0.005, dry mass 1 kg, wet mass 1 kg
- waste paper, unsorted: -5960 kg; name BP_paper; = paper; lognormal variance with pedigree 0.0152, pedigree (3,3,3,5,3)
  Waste generated by disposal of product. Based in the input of material.
  production volume; = abs(BP_paper/RP)*PV_RP
    Calculated from production volume of reference product using the relative outputs.
  property carbon content, fossil 9.3e-6; name BP_paper_C_content_fossil
  property carbon content, non-fossil 0.428894; name BP_paper_C_content_non_fossil
  property dry mass 0.945 kg; name BP_paper_DM
  property water content 0.0582011; name BP_paper_water_content
  property wet mass 1 kg; name BP_paper_WM
  properties: price 0.093 EUR2005
- waste wire plastic: -3250 kg; name BP_wire_plastic; = plastic; lognormal variance with pedigree 0.0152, pedigree (3,3,3,5,3)
  (same comment as for scrap copper)
  production volume; = abs(BP_wire_plastic/RP)*PV_RP
    Calculated from production volume of reference product using the relative outputs.
  properties: carbon content, fossil 0.549508, dry mass 0.9645 kg, heating value, net 25.95 MJ, water content 0.0368066, wet mass 1 kg
  note on heating value, net: Value taken from the general comment of the treatment dataset.
- wire drawing, copper: 14110 kg; = copper; lognormal variance with pedigree 0.2106, pedigree (5,5,5,5,5)
  Calculated Value. Represents the processing of the copper.
- zinc coat, coils: 565 m2; name zinc; lognormal variance with pedigree 0.0132, pedigree (3,3,4,5,1)
  Literature Value.
- zinc scrap, post-consumer: -565 kg; name BP_zinc; = zinc; lognormal variance with pedigree 0.0152, pedigree (3,3,3,5,3)
  Proxy for zinc generated through dismantling of the transmission network.
  production volume; = abs(BP_zinc/RP)*PV_RP
    Calculated from production volume of reference product using the relative outputs.
  properties: dry mass 1 kg, price 0.55 EUR2005, wet mass 1 kg, zinc content 1

## Inputs from nature
- Occupation, seabed, infrastructure [natural resource, land]: 4400 m2*year; = transformation*lifetime; lognormal variance with pedigree 0.25, pedigree (5,5,5,5,5)
  Calculated Value.
- Transformation, from seabed, unspecified [natural resource, land]: 110 m2; lognormal variance with pedigree 0.33, pedigree (5,5,5,5,5)
  Estimated value according to dataset pipeline construction, petroleum, offshore - GLO
- Transformation, to seabed, infrastructure [natural resource, land]: 110 m2; name transformation; lognormal variance with pedigree 0.33, pedigree (5,5,5,5,5)
  Estimated value according to dataset pipeline construction, petroleum, offshore - GLO

## Sampling procedure
material composition according to environmental product declaration, further information from literature

## Extrapolations
The dataset is extrapolated from the respective regional dataset with uncertainty adjusted.
