# mine construction, open cast, lignite

Dataset: EcoSpold 2, unit process
Geography: RoW
Time period: 1983-01-01 to 2023-12-31
Technology level: current
Classification: EcoSpold01Categories: lignite/production
Classification: ISIC rev.4 ecoinvent: 4290:Construction of other civil engineering projects
Tags: ConvertedDataset
Scenario: Business-as-Usual
System model: Allocation, cut-off by classification
Generated by: Christian Bauer
Published in: Röder, A. 2007
Database: ecoinvent
isCopyrightProtected: true
accessRestrictedTo: 1

## General comment
Information was available only for a few mines. For the preparation of this module only amounts per tonne were available. The module has to be considered as a first approximation and may not reflect specific mines. Lifetime is assumed to be 30 years to take into account the lifetime of machinery. No information was available that could allow a direct estimation of the average annual production of lignite mines in Europe. Therefore the total lifetime production of 100 million tonne for the model lignite mine has been extrapolated from the value assumed for the model hard coal mine taking into account the difference between the low heating values. Therefore this total lifetime production shall be considered as a normalisation factor more than an actual average value for the real mines. No explosives are necessary for open up the mine. Mostly mobile installations are used.
[This dataset was already contained in the ecoinvent database version 2. It was not individually updated during the transfer to ecoinvent version 3. Life Cycle Impact Assessment results may still have changed, as they are affected by changes in the supply chain, i.e. in other datasets. This dataset was generated following the ecoinvent quality guidelines for version 2. It may have been subject to central changes described in the ecoinvent version 3 change report (http://www.ecoinvent.org/database/ecoinvent-version-3/reports-of-changes/), and the results of the central updates were reviewed extensively. The changes added e.g. consistent water flows and other information throughout the database. The documentation of this dataset can be found in the ecoinvent reports of version 2, which are still available via the ecoinvent website. The change report linked above covers all central changes that were made during the conversion process.]

## Included activities end
This module includes an estimation of the most important construction materials and energy use for the mine. The machinery used for mining operation has been included in this module, because the relevant material use is not separated from the total material use in the available references. Land use for the infrastructure is not included, because due to lack of information it cannot be seperated from the land use during the operation of the mine.

## Geography
Average data from Austria, Germany and Russian Federation.

## Technology
Average technology of the time period considered.

## Reference product
- mine infrastructure, open cast, lignite: 1 unit; By-product classification allocatable product; CPC 53261: Mining constructions
  EcoSpold01Location=RER
  production volume 2.67763 unit
    This is a placeholder value that does not reflect real-world production volumes. This dataset does not currently require a real-world production volume to work in the database framework, and no actual data were collected yet. This has no negative effect on the results of the ecoinvent database.
  property price 6.70931e8 EUR2005
    EU27 I/O database(in the 'EU & DK Input Output Database' (available in SimaPro)); -79 Building, non-residential EU 27 (calculated to be 38.169 EUR2003/kg). Based on consumption of (_53 Iron basic, virgin, EU27;7.25517782294095E-3 kg/EUR building; 0.45 EUR2003 per kg DS), (_61 Iron, after first processing, EU27;5.8766830719783E-3kg/EUR building; 0.62 EUR2003 per kg DS), (_65 Fabricated metal products, except machinery, EU27; 8.9167022775554E-3 kg/EUR building; 3.63 EUR2003 per kg DS) and (_66 Machinery and equipment n.e.c., EU27;4.15071881936446E-3 kg/EUR building; 5.71 EUR2003 per kg DS) -17700000 kg
  properties: carbon allocation 0 kg, carbon content 0

## Inputs from technosphere
- concrete, normal strength: 83.653, 18.3698, 11.9485, 354.247, 148.716, 176.296, 6306.77 m3 (7 suppliers, which the file names only by identifier); sum of these 7100 m3; lognormal variance with pedigree 0.162, pedigree (1,1,5,5,1)
  own assumption
  EcoSpold01Location=CH
  properties: dry mass 2190 kg, water content 0.086758, wet mass 2380 kg
- copper, cathode: 700000 kg; lognormal variance with pedigree 0.162, pedigree (1,1,5,5,1)
  EcoSpold01Location=RER
  own assumption
  properties: dry mass 1 kg, wet mass 1 kg
- diesel, burned in building machine: 1e8 MJ; lognormal variance with pedigree 0.162, pedigree (1,1,5,5,1)
  own assumption
  EcoSpold01Location=GLO
  properties: heating value, net 1 MJ
- electricity, medium voltage: 276829, 5.52212e6, 1.85542e6, 84774.6, 16967.5, 3643.31, 570245 kWh (7 suppliers, which the file names only by identifier); sum of these 8.33e6 kWh; lognormal variance with pedigree 0.162, pedigree (1,1,5,5,1)
  EcoSpold01Location=UCTE
  own assumption
- heat, district or industrial, other than natural gas: 9.99537e7, 46306.7 MJ (2 suppliers, which the file names only by identifier); sum of these 1e8 MJ; lognormal variance with pedigree 0.162, pedigree (1,1,5,5,1)
  EcoSpold01Location=RER
  own assumption
  properties: heating value, net 1 MJ
- plywood: 5500 m3; lognormal variance with pedigree 0.162, pedigree (1,1,5,5,1)
  own assumption
  EcoSpold01Location=RER
  properties: carbon content, fossil 0.09783, carbon content, non-fossil 0.409818, dry mass 768.6 kg, heating value, net 11688.9 MJ, price 400 EUR2005, water content 0.070778, wet mass 823 kg
- reinforcing steel: 1.3e7 kg; lognormal variance with pedigree 0.162, pedigree (1,1,5,5,1)
  EcoSpold01Location=RER
  own assumption
  properties: carbon content, fossil 0.004, dry mass 1 kg, wet mass 1 kg
- steel, low-alloyed, hot rolled: 4e6 kg; lognormal variance with pedigree 0.162, pedigree (1,1,5,5,1)
  EcoSpold01Location=RER
  own assumption
  properties: carbon content, fossil 0.005, dry mass 1 kg, wet mass 1 kg
  note on carbon content, fossil: Low alloyed steel composition given in Tab. 3.2 ecoinvent v2.2 report 10_partII. Steel assumed to have a C content of 0.5%
- waste wood, untreated: -124807, -3248.77, -2.42097e6, -44436, -18855.4, -29808.8, -357878 kg (7 suppliers, which the file names only by identifier); sum of these -3e6 kg; lognormal variance with pedigree 0.302, pedigree (1,1,1,5,1)
  own assumption
  EcoSpold01Location=CH
  production volume
    Calculated from the production volume of mine infrastructure, open cast, lignite in proportion to the respective output amounts.
  properties: carbon content, non-fossil 0.48632, dry mass 0.8 kg, heating value, net 13.99 MJ, water content 0.25, wet mass 1 kg
  note on carbon content, non-fossil: Tab A.4, ecoinvent v2.2 report 13_I. C content has been referred to 1 kg DM,
  note on heating value, net: Value taken from the general comment of the treatment dataset.

## Sampling procedure
literature

## Extrapolations
none This dataset has been copied from an original dataset covering the geography RER. The uncertainty has been adjusted accordingly.

## Review by Christian Bauer 2003-08-19
passed
