# combine harvesting, maize

Dataset: EcoSpold 2, unit process
Geography: US
Time period: 2021-01-01 to 2023-12-31
Technology level: current
Classification: ISIC rev.4 ecoinvent: 0161:Support activities for crop production
Scenario: Business-as-Usual
System model: Allocation, cut-off by classification
Generated by: Juanita Barrera
Database: ecoinvent
isCopyrightProtected: true
accessRestrictedTo: 1

## General comment
This dataset models the service of a combine harvesting for one hectare of maize. It includes stand alone machine, not trailed by tractor. The working width is 4.5m while the Functionl Unit is one ha harvested.

## Included activities start
The activity starts from the agricultural field foreseen to be processed.

## Included activities end
This activity ends with the delivery of harvesting by combined harvester. The inventory takes into account the diesel fuel consumption and the amount of agricultural machinery and of the shed, which has to be attributed to the harvesting by combined harvester. Also taken into consideration is the amount of emissions to the air from combustion and the emission to the soil from tyre abrasion during the work process. The following activities were considered part of the work process: preliminary work at the farm, like attaching the adequate machine to the tractor; transfer to field (with an assumed distance of 1 km); field work (for a parcel of land of 1 ha surface); transfer to farm and concluding work, like uncoupling the machine. The overlapping during the field work is considered. The amount of harvested fodder is not taken into account. Not included are dust other than from combustion and noise.

## Geography
The inventory is extrapolated from the geography of South Africa. Data quality indicators are adjusted accordingly.

## Technology
Fuel consumption and emissions per kg diesel have been extrapolated to the US, but others inputs were taken from the original values.

## Reference product
- combine harvesting, maize: 1 ha; By-product classification allocatable product; CPC 86119: Other support services to crop production
  production volume 3.33736e7 ha
    FAOSTAT data, year 2020, total area of maize
  property price 78.3223 EUR2005
    The price is from the year 2020. Price information has been directly provided by the data provider based on the following reference: University of Minnesota, Machinery cost estimates, W.F. Lazarus, 2020. The prices were adjusted for inflation relative to 2005 using the producer price index (PPI) of the euro area, published by eurostat (https://ec.europa.eu/eurostat/databrowser/view/STS_INPP_A__custom_6416181/default/table?lang=en, last accessed on 2023-06-01).
  properties: carbon allocation 0 kg, carbon content 0

## Inputs from technosphere
- diesel: 13.2225 kg; lognormal variance with pedigree 0.0426, pedigree (1,4,5,1,1)
  average of Combine Harvesting data - UMN Farm Machinery Economic Cost Estimation Spreadsheet (MACHDATA.XLSM) Lazarus, 2022 - 2021 Nebraska Crop budget projections, Robert Klein and Glennis McClure, UNL Extension
  properties: carbon content, fossil 0.865, dry mass 1 kg, heating value, net 42.8 MJ, wet mass 1 kg
- harvester: 6.3 kg; lognormal variance with pedigree 0.344, pedigree (1,4,5,5,1)
  proxy from "combine harvesting, ZA"
- shed: 0.00858 m2; lognormal variance with pedigree 0.344, pedigree (1,4,5,5,1)
  proxy from "combine harvesting, ZA"

## Emissions to nature
- Ammonia [air, non-urban air or from high stacks]: 0.00026445 kg; lognormal variance with pedigree 0.098125, pedigree (1,2,5,2,3)
  adapted from "combine harvesting, ZA" to match the diesel consumption
- Benzene [air, non-urban air or from high stacks]: 9.64887e-5 kg; lognormal variance with pedigree 0.098125, pedigree (1,2,5,2,3)
  adapted from "combine harvesting, ZA" to match the diesel consumption
- Benzo(a)pyrene [air, non-urban air or from high stacks]: 3.96676e-7 kg; lognormal variance with pedigree 0.698125, pedigree (1,2,5,2,3)
  adapted from "combine harvesting, ZA" to match the diesel consumption
- Cadmium II [air, non-urban air or from high stacks]: 1.32225e-7 kg; lognormal variance with pedigree 0.698125, pedigree (1,2,5,2,3)
  adapted from "combine harvesting, ZA" to match the diesel consumption
- Carbon dioxide, fossil [air, non-urban air or from high stacks]: 40.8985 kg; lognormal variance with pedigree 0.058125, pedigree (1,2,5,2,3)
  adapted from "combine harvesting, ZA" to match the diesel consumption
- Carbon monoxide, fossil [air, non-urban air or from high stacks]: 0.127063 kg; lognormal variance with pedigree 0.692025, pedigree (1,4,5,2,1)
  adapted from "combine harvesting, ZA" to match the diesel consumption
- Chromium III [air, non-urban air or from high stacks]: 6.63111e-7 kg; lognormal variance with pedigree 0.698125, pedigree (1,2,5,2,3)
  adapted from "combine harvesting, ZA" to match the diesel consumption
- Copper ion [air, non-urban air or from high stacks]: 2.24743e-5 kg; lognormal variance with pedigree 0.698125, pedigree (1,2,5,2,3)
  adapted from "combine harvesting, ZA" to match the diesel consumption
- Dinitrogen monoxide [air, non-urban air or from high stacks]: 0.00158829 kg; lognormal variance with pedigree 0.098125, pedigree (1,2,5,2,3)
  adapted from "combine harvesting, ZA" to match the diesel consumption
- Methane, fossil [air, non-urban air or from high stacks]: 0.00170741 kg; lognormal variance with pedigree 0.098125, pedigree (1,2,5,2,3)
  adapted from "combine harvesting, ZA" to match the diesel consumption
- NMVOC, non-methane volatile organic compounds [air, non-urban air or from high stacks]: 0.0575755 kg; lognormal variance with pedigree 0.082025, pedigree (1,4,5,2,1)
  adapted from "combine harvesting, ZA" to match the diesel consumption
- Nickel II [air, non-urban air or from high stacks]: 9.25179e-7 kg; lognormal variance with pedigree 0.698125, pedigree (1,2,5,2,3)
  adapted from "combine harvesting, ZA" to match the diesel consumption
- Nitrogen oxides [air, non-urban air or from high stacks]: 0.675024 kg; lognormal variance with pedigree 0.082025, pedigree (1,4,5,2,1)
  adapted from "combine harvesting, ZA" to match the diesel consumption
- PAH, polycyclic aromatic hydrocarbons [air, non-urban air or from high stacks]: 4.3678e-5 kg; lognormal variance with pedigree 0.358125, pedigree (1,2,5,2,3)
  adapted from "combine harvesting, ZA" to match the diesel consumption
- Particulate Matter, < 2.5 um [air, non-urban air or from high stacks]: 0.0591638 kg; lognormal variance with pedigree 0.358125, pedigree (1,2,5,2,3)
  adapted from "combine harvesting, ZA" to match the diesel consumption
- Selenium IV [air, non-urban air or from high stacks]: 1.32225e-7 kg; lognormal variance with pedigree 0.098125, pedigree (1,2,5,2,3)
  adapted from "combine harvesting, ZA" to match the diesel consumption
- Sulfur dioxide [air, non-urban air or from high stacks]: 0.0132225 kg; lognormal variance with pedigree 0.058125, pedigree (1,2,5,2,3)
  adapted from "combine harvesting, ZA" to match the diesel consumption
- Zinc II [air, non-urban air or from high stacks]: 1.32225e-5 kg; lognormal variance with pedigree 0.698125, pedigree (1,2,5,2,3)
  adapted from "combine harvesting, ZA" to match the diesel consumption
- Cadmium II [soil, agricultural]: 8.82e-7 kg; lognormal variance with pedigree 0.084, pedigree (1,4,5,5,1)
  proxy from "combine harvesting, ZA"
- Lead II [soil, agricultural]: 3.78e-6 kg; lognormal variance with pedigree 0.084, pedigree (1,4,5,5,1)
  proxy from "combine harvesting, ZA"
- Zinc II [soil, agricultural]: 0.00238 kg; lognormal variance with pedigree 0.084, pedigree (1,4,5,5,1)
  proxy from "combine harvesting, ZA"

## Extrapolations
The dataset is modeled for agricultural production system in US. Data Quality indicators are adjusted accordingly.
