# gas power plant construction, combined cycle, 400MW electrical

Dataset: EcoSpold 2, unit process
Geography: RoW
Time period: 1990-01-01 to 2023-12-31
Technology level: current
Classification: EcoSpold01Categories: natural gas/power plants
Classification: ISIC rev.4 ecoinvent: 4220:Construction of utility projects
Synonyms: GCC; GuD
Tags: ConvertedDataset
Scenario: Business-as-Usual
System model: Allocation, cut-off by classification
Generated by: Thomas Heck
Published in: Faist Emmenegger, M. 2007
Database: ecoinvent
isCopyrightProtected: true
accessRestrictedTo: 1

## General comment
New combined cycle power plant of 400MWe class. Data of reference power plant: gas turbine 265MWe, steam turbine 140MWe.
[This dataset was already contained in the ecoinvent database version 2. It was not individually updated during the transfer to ecoinvent version 3. Life Cycle Impact Assessment results may still have changed, as they are affected by changes in the supply chain, i.e. in other datasets. This dataset was generated following the ecoinvent quality guidelines for version 2. It may have been subject to central changes described in the ecoinvent version 3 change report (http://www.ecoinvent.org/database/ecoinvent-version-3/reports-of-changes/), and the results of the central updates were reviewed extensively. The changes added e.g. consistent water flows and other information throughout the database. The documentation of this dataset can be found in the ecoinvent reports of version 2, which are still available via the ecoinvent website. The change report linked above covers all central changes that were made during the conversion process.]

## Included activities end
The module includes the most important materials used for construction. It includes also the energy requirements for construction; transport is implicitly included in energy consumption. (Life time for operation assumed 180'000 h.)

## Geography
Average conditions for European combined cycle plants.

## Technology
Best technology. Current gas turbine technology; other parts of power plant from literature 1996.

## Reference product
- gas power plant, combined cycle, 400MW electrical: 1 unit; By-product classification allocatable product; CPC 53262: Power plants
  EcoSpold01Location=RER
  production volume 2.67763 unit
    This is a placeholder value that does not reflect real-world production volumes. This dataset does not currently require a real-world production volume to work in the database framework, and no actual data were collected yet. This has no negative effect on the results of the ecoinvent database.
  property price 1.57717e7 EUR2005
    Calculated based on inputs: The price of the product has been calculated as a sum of the values of the material and energy inputs for this product. This value is therefore a rough estimation. It may underestimate the real price since there are additional expenses when producing any product. These expences can include for example labour costs, treatment of waste materials and profit for the producer. Please consider carefully whether this level of data quality is acceptable for your application.
  properties: carbon allocation 0 kg, carbon content 0

## Inputs from technosphere
- aluminium, cast alloy: 140800 kg; = 440000*0.32; lognormal variance with pedigree 0.342, pedigree (1,1,5,5,1)
  basic uncertainty
  property carbon content, fossil 0; name C_content_fossil
  property carbon content, non-fossil 0; name C_content_non_fossil
  property water content 0; name water_content
  property water in wet mass 0 kg; name WWM
  properties: dry mass 1 kg, wet mass 1 kg
- aluminium, wrought alloy: 299200 kg; = 440000*0.68; lognormal variance with pedigree 0.342, pedigree (1,1,5,5,1)
  basic uncertainty
  properties: dry mass 1 kg, wet mass 1 kg
- ceramic tile: 4200 kg; lognormal variance with pedigree 0.342, pedigree (1,1,5,5,1)
  basic uncertainty
  EcoSpold01Location=CH
  properties: dry mass 1 kg, wet mass 1 kg
- chromium: 976 kg; lognormal variance with pedigree 0.342, pedigree (1,1,5,5,1)
  EcoSpold01Location=RER
  basic uncertainty
  properties: dry mass 1 kg, wet mass 1 kg
- cobalt: 720 kg; lognormal variance with pedigree 0.342, pedigree (1,1,5,5,1)
  basic uncertainty
  EcoSpold01Location=GLO
  properties: dry mass 1 kg, wet mass 1 kg
- concrete, normal strength: 70.6926, 15.5238, 10.0973, 299.363, 125.676, 148.982, 5329.66 m3 (7 suppliers, which the file names only by identifier); sum of these 6000 m3; lognormal variance with pedigree 0.342, pedigree (1,1,5,5,1)
  EcoSpold01Location=CH
  basic uncertainty
  properties: dry mass 2190 kg, water content 0.086758, wet mass 2380 kg
- copper, cathode: 440000 kg; lognormal variance with pedigree 0.342, pedigree (1,1,5,5,1)
  basic uncertainty
  EcoSpold01Location=RER
  properties: dry mass 1 kg, wet mass 1 kg
- diesel, burned in building machine: 1.48e8 MJ; lognormal variance with pedigree 0.612, pedigree (1,1,5,5,1)
  EcoSpold01Location=GLO
  uncertainty of amount of material and of energy needed
  properties: heating value, net 1 MJ
- electricity, medium voltage: 100363, 2.00202e6, 672672, 30734.6, 6151.5, 1320.87, 206739 kWh (7 suppliers, which the file names only by identifier); sum of these 3.02e6 kWh; lognormal variance with pedigree 0.612, pedigree (1,1,5,5,1)
  uncertainty of amount of material and of energy needed
  EcoSpold01Location=UCTE
- heat, district or industrial, other than natural gas: 1.40535e8, 65107.2 MJ (2 suppliers, which the file names only by identifier); sum of these 1.406e8 MJ; lognormal variance with pedigree 0.612, pedigree (1,1,5,5,1)
  uncertainty of amount of material and of energy needed
  EcoSpold01Location=RER
  properties: heating value, net 1 MJ
- nickel, class 1: 6300 kg; lognormal variance with pedigree 0.342, pedigree (1,1,5,5,1)
  basic uncertainty
  EcoSpold01Location=GLO
  properties: dry mass 1 kg, wet mass 1 kg
- polyethylene, low density, granulate: 1.3e6 kg; lognormal variance with pedigree 0.342, pedigree (1,1,5,5,1)
  basic uncertainty
  EcoSpold01Location=RER
  properties: carbon content, fossil 0.857143, dry mass 1 kg, heating value, net 42.47 MJ, wet mass 1 kg
  note on carbon content, fossil: Polyethylene is formed out of a huge amount of ethylene monomers (C2H4) (ecoinvent v2.2 report 11_II). MW=28 g/mol
- reinforcing steel: 8.8e6 kg; lognormal variance with pedigree 0.342, pedigree (1,1,5,5,1)
  basic uncertainty
  EcoSpold01Location=RER
  properties: carbon content, fossil 0.004, dry mass 1 kg, wet mass 1 kg
- steel, chromium steel 18/8, hot rolled: 1.8e6 kg; lognormal variance with pedigree 0.342, pedigree (1,1,5,5,1)
  EcoSpold01Location=RER
  basic uncertainty
  properties: carbon content, fossil 0.0008, dry mass 1 kg, wet mass 1 kg
  note on carbon content, fossil: Stainless steel model is the grade 304 steel (18/8 stainless, 18% chromium 8% nickel; max. 0.08% C)
- stone wool, packed: 660000 kg; lognormal variance with pedigree 0.342, pedigree (1,1,5,5,1)
  EcoSpold01Location=CH
  basic uncertainty
  properties: carbon content, fossil 0.015401, dry mass 1 kg, wet mass 1 kg
  note on carbon content, fossil: The chemical composition of the glass fibres used in the rock wool production is similar to the composition of naturally cooled volcano basalt and has a composition listed in Tab. 3.1 and 3.2 in ecoinvent v2.2 report 16, part XIV. Rock wool contains: a minimum of 96% mineral fibres,between 0.5 and 3.0 weight percent of phenolic resin depending on the specific product characteristics, and about 0.2 percent mineral oil (ecoinvent v2.2 report 16, part XIV). An average composition of 1.8% phenolic resin, 0.2% mineral oil, and 98% mineral fibres has been assumed and used to calculate C content of the rock wool

## Inputs from nature
- Occupation, industrial area [natural resource, land]: 1.44e6 m2*year; lognormal variance with pedigree 0.522, pedigree (1,1,5,5,1)
  uncertainty of land use and life time
- Transformation, from unspecified [natural resource, land]: 40000 m2; lognormal variance with pedigree 0.342, pedigree (1,1,5,5,1)
  estimated from range of values in literature
- Transformation, to industrial area [natural resource, land]: 40000 m2; lognormal variance with pedigree 0.342, pedigree (1,1,5,5,1)
  estimated from range of values in literature

## Sampling procedure
Literature

## Extrapolations
none This dataset has been copied from an original dataset covering the geography RER. The uncertainty has been adjusted accordingly.

## Review by Michael Spielmann (obsolete) 2003-07-08
passed.
