# section bar rolling, steel

Dataset: EcoSpold 2, unit process
Geography: RER
Time period: 1997-01-01 to 2023-12-31
Technology level: current
Classification: ISIC rev.4 ecoinvent: 2410:Manufacture of basic iron and steel
Classification: EcoSpold01Categories: metals/processing
Synonyms: profile
Tags: ConvertedDataset
Scenario: Business-as-Usual
System model: Allocation, cut-off by classification
Share of production covered: 0 %
Generated by: Silvio Blaser
Published in: Classen M. 2009
Database: ecoinvent
isCopyrightProtected: true
accessRestrictedTo: 1

## General comment
As most other types of mills, section rolling mills are divided into roughing, intermediate and finish-ing stands, preceded by a descaling machine installed between the reheating furnace and the roughing mill. After cooling on the cooling bed, the bars are straightened on mechanical or hydraulic straightening machines and cut to length by saws as required
[This dataset was already contained in the ecoinvent database version 2. It was not individually updated during the transfer to ecoinvent version 3. Life Cycle Impact Assessment results may still have changed, as they are affected by changes in the supply chain, i.e. in other datasets. This dataset was generated following the ecoinvent quality guidelines for version 2. It may have been subject to central changes described in the ecoinvent version 3 change report (http://www.ecoinvent.org/database/ecoinvent-version-3/reports-of-changes/), and the results of the central updates were reviewed extensively. The changes added e.g. consistent water flows and other information throughout the database. The documentation of this dataset can be found in the ecoinvent reports of version 2, which are still available via the ecoinvent website. The change report linked above covers all central changes that were made during the conversion process.]

## Included activities start
The activity starts with the reception of the semi finished workpiece. The material on which this activity is applied it is not included as input.

## Included activities end
The module describes the rolling process of section bar. It includes 50% of the wire drawing process. Does not include the material being rolled.

## Geography
Data-set is representative for European Union

## Technology
Average technique for EU. Because of the lack of data about the production process, it was approximated with the production process of wire drawing.

## Reference product
- section bar rolling, steel: 1 kg; By-product classification allocatable product; CPC 88601: Basic iron and steel manufacturing services
  EcoSpold01Location=RER
  production volume 1.2e11 kg
    No data available
    Estimate including Turkey and CIS based on year 2000 data in IISI: Steel Statistical Yearbook 2007 ('Hot rolled long products')
  property price 0.028558 EUR2005
    Calculated based on inputs: The price of the product has been calculated as a sum of the values of the material and energy inputs for this product. This value is therefore a rough estimation. It may underestimate the real price since there are additional expenses when producing any product. These expences can include for example labour costs, treatment of waste materials and profit for the producer. Please consider carefully whether this level of data quality is acceptable for your application.
  properties: carbon allocation 0 kg, carbon content 0

## Inputs from technosphere
- wire drawing, steel: 0.5 kg; lognormal variance with pedigree 0.084, pedigree (4,5,5,1,3)
  activityLink introduced to establish a direct link to the corresponding regional supply of this product
  EcoSpold01Location=RER

## Sampling procedure
Literature and estimation

## Extrapolations
see technology

## Review by Roland Hischier 2003-08-14
Passed.
