# limestone quarry operation

Dataset: EcoSpold 2, unit process
Geography: IN
Time period: 2014-04-01 to 2023-12-31
Technology level: current
Classification: ISIC rev.4 ecoinvent: 0810:Quarrying of stone, sand and clay
Classification: EcoSpold01Categories: construction materials/additives
Scenario: Business-as-Usual
System model: Allocation, cut-off by classification
Share of production covered: 30 %
Generated by: P V Kiran Ananth
Published in: Kiran Ananth P. V. 2017
Database: ecoinvent
isCopyrightProtected: true
accessRestrictedTo: 1

## General comment
Limestone is a calcareous sedimentary rock consisting essentially of carbonates. The two most important constituents are calcite and dolomite. There are variety of limestone, however the limestone used by industries in bulk quantity is a sedimentary limestone. Limestone is basic raw material for Cement production. Total production of limestone in India is 292.8 million tonne in 2014-15 year. Total consumption of limestone in India is 239.26 million tonne out of which 221.08 million tonne are consumed by Cement industry (Nearly 92.4%)

## Included activities start
Exporation, Mining, Drilling & Blasting

## Included activities end
This activity ends with the unprocessed limestone, at the quarry gate.

This dataset includes all transports within the quarry (for extraction and recultivation)

## Geography
The representativeness at national scale is more than 30%. The data were represented for all geographical locations in India.

## Technology
In India, limestone mines are worked by opencast method. Captive mines are mechanised and supply feed to cement and iron & steel units.

## Time period
Data collected and analysied for year 2014-15. and has been assumed that there is no significant change in technology.

## Parameters
- fraction, process water, to air: 1 dimensionless; name fraction_PW_to_air; lognormal variance with pedigree 0.092025, pedigree (4,4,3,2,4)
  Literature value (Statistics Canada, 2007 & Shaffer, K.H., 2008, Consumptive water use in the Great Lakes Basin, USGS) (Vionnet, S., Quantis Water Database - Technical Report, 2012).

## Reference product
- limestone, unprocessed: 1 kg; By-product classification allocatable product; CPC 15200: Gypsum; anhydrite; limestone flux; limestone and other calcareous stone, of a kind used for the manufacture of[…]; HS2017 252100: Limestone flux; limestone and other calcareous stone, of a kind used for the manufacture of lime or cement; CAS 1317-65-3
  EcoSpold01Location=CH
  production volume 2.928e11 kg; = 292.8E9
    Total limestone production in India during the year April 2014 to March 2015 is 292.8 million tonnes. Total limestone consumption by cement plant in India during the year April 2014 to March 2015 is 221.08 million tonnes. Indian Minerals Yearbook 2015. 54th edition. Limestone and other calcareous minerals
  property carbon content, fossil 0.117257
    Table 3.1, ecoinvent v2.2 report 7, part VII, pg 3. MW CaCO3=100, MW MgCO3=84. C content of limestone is 0.117257 kg/kg DM
  property price 0.014 EUR2005
    Calculated value based on data from United Nations Commodity Trade Statistics Database (comtrade.un.org). UN comtrade category: 252100 Limestone materials for manufacture of lime or cement. Year 2005. Using exchange rate of 1EURO = 1.209 USD. Average of price of import into 5 main markets (EU, US, JP, IN and CN).
  properties: carbon allocation 0.117023 kg, carbon content 0.117257, carbon content, non-fossil 0, dry mass 0.998 kg, heating value, net 0 MJ, water content 0.00200401, water in wet mass 0.002 kg, wet mass 1 kg

## Inputs from technosphere
- blasting: 0.000208433 kg; lognormal variance with pedigree 0.049825, pedigree (2,3,5,2,3)
  Data retrieved from the plants interviewed.
  EcoSpold01Location=RER
- diesel, burned in building machine: 0.01554 MJ; lognormal variance with pedigree 0.161225, pedigree (2,3,5,2,1)
  Data retrieved from the plants interviewed. Diesel used for operation of compressor, pumps etc.
  EcoSpold01Location=GLO
  properties: heating value, net 1 MJ
- electricity, medium voltage: 0.000193536 kWh; lognormal variance with pedigree 0.011325, pedigree (2,2,3,2,3)
  Utility power consumption - Pump, Compressor, Lighting etc. The data were retrieved from received from30 cement plants.
- heat, central or small-scale, other than natural gas: 0.00055836 MJ; lognormal variance with pedigree 0.0912, pedigree (5,5,5,5,2)
  Data from limestone quarry operation/GLO (accessed 20170720).
  EcoSpold01Location=CH
  properties: heating value, net 1 MJ
- limestone quarry infrastructure: 5.25e-11 unit; lognormal variance with pedigree 0.3906, pedigree (5,5,5,5,2)
  EcoSpold01Location=CH
  Data from limestone quarry operation/GLO (accessed 20170720).
- recultivation, limestone mine: 0.00033 m2; lognormal variance with pedigree 0.161225, pedigree (2,3,5,2,1)
  EcoSpold01Location=CH
  Data taken from Environmental Impact Assesment Report of Limestone mining of Cement plant.

## Inputs from nature
- Calcite [natural resource, in ground]: 1 kg; lognormal variance with pedigree 0.0346, pedigree (3,3,3,5,3)
  Estimated value. No losses considered in the process.
- Occupation, mineral extraction site [natural resource, land]: 0.0234 m2*year; lognormal variance with pedigree 0.0902, pedigree (3,2,5,3,3)
  Calculated value based on 1.03 million tonne of production per year and excavation area 33.97 hecare. Data taken from Environmental Impact Assesment Report of Limestone mining of Cement plant and has been mentioned in secorial report.
- Transformation, from forest, unspecified [natural resource, land]: 0.00033 m2; lognormal variance with pedigree 0.169225, pedigree (2,3,5,2,3)
  (same comment as for Occupation, mineral extraction site)
- Transformation, to mineral extraction site [natural resource, land]: 0.00033 m2; lognormal variance with pedigree 0.1693, pedigree (2,3,5,3,3)
  (same comment as for Occupation, mineral extraction site)
- Water, unspecified natural origin [natural resource, in water]: 1.13975e-5 m3; name water_in; lognormal variance with pedigree 0.059225, pedigree (2,3,5,2,3)
  Data retrieved from the plants interviewed.
  property carbon content, fossil 0.0104329; name C_content_fossil
  property carbon content, non-fossil 0; name C_content_non_fossil
  property dry mass 0.1101 kg; name DM
  property water content 9081.65; name water_content
  property water in wet mass 999.89 kg; name WWM
  property wet mass 1000 kg; name WM

## Emissions to nature
- Particulate Matter, < 2.5 um [air, non-urban air or from high stacks]: 8e-6 kg; lognormal variance with pedigree 0.43, pedigree (1,5,5,5,4)
  Data from limestone quarry operation/GLO (accessed 20170720).
- Particulate Matter, > 10 um [air, non-urban air or from high stacks]: 0.000112 kg; lognormal variance with pedigree 0.17, pedigree (1,5,5,5,4)
  Data from limestone quarry operation/GLO (accessed 20170720).
  Uncertainty: ;
- Particulate Matter, > 2.5 um and < 10um [air, non-urban air or from high stacks]: 4e-5 kg; lognormal variance with pedigree 0.25, pedigree (1,5,5,5,4)
  Data from limestone quarry operation/GLO (accessed 20170720).
- Water [air, unspecified]: 1.13975e-5 m3; = water_in; lognormal variance with pedigree 0.059225, pedigree (2,3,5,2,3)
  Calculated value

## Sampling procedure
For this activity sample questionnaire has been prepared and circulated to all cement manufacturing units in India. For this dataset environment statement report for limestone mining and literature has refered. Data refered from environment statement of nearly 15 cement units in India.

## Extrapolations
Some missing data have been retrived from the existing ecoinvent process Limestone quarry operation/GLO (accessed on 1070823)
