# electric arc furnace converter construction

Dataset: EcoSpold 2, unit process
Geography: RER
Time period: 2002-01-01 to 2023-12-31
Technology level: current
Classification: ISIC rev.4 ecoinvent: 2815:Manufacture of ovens, furnaces and furnace burners
Classification: EcoSpold01Categories: metals/extraction
Tags: ConvertedDataset
Scenario: Business-as-Usual
System model: Allocation, cut-off by classification
Generated by: Hans-Jörg Althaus
Published in: Classen M. 2009
Database: ecoinvent
isCopyrightProtected: true
accessRestrictedTo: 1

## General comment
Assumptions for medium sized plant. Output: 500'000 t/a, life time: 50 years.
[This dataset was already contained in the ecoinvent database version 2. It was not individually updated during the transfer to ecoinvent version 3. Life Cycle Impact Assessment results may still have changed, as they are affected by changes in the supply chain, i.e. in other datasets. This dataset was generated following the ecoinvent quality guidelines for version 2. It may have been subject to central changes described in the ecoinvent version 3 change report (http://www.ecoinvent.org/database/ecoinvent-version-3/reports-of-changes/), and the results of the central updates were reviewed extensively. The changes added e.g. consistent water flows and other information throughout the database. The documentation of this dataset can be found in the ecoinvent reports of version 2, which are still available via the ecoinvent website. The change report linked above covers all central changes that were made during the conversion process.]

## Included activities start
The activity starts from the transformation of unspecified land to industrial area.

## Included activities end
Infrastructure for input material unloading and storage, for EAF processes and casting and for administrative buildings.

## Geography
Some Swiss datasets are used for European processes.

## Technology
Assumed technology of medium sized plant.

## Reference product
- electric arc furnace converter: 1 unit; By-product classification allocatable product; CPC 53269: Other constructions for manufacturing; HS2017 8514: Industrial or laboratory electric furnaces and ovens (including those functioning by induction or dielectric [...]
  production volume 1.32237 unit
    This is a placeholder value that does not reflect real-world production volumes. This dataset does not currently require a real-world production volume to work in the database framework, and no actual data were collected yet. This has no negative effect on the results of the ecoinvent database. The placeholder value of this activity was scaled according to the nominal GDP of 2005 (source: United Nations, http://data.un.org/Glossary.aspx?q=GDP+%28current+US%24%29, accessed 20130726) to reflect an appropriate share of the global production volume, which is also a placeholder value.
  property price 4.30322e8 EUR2005
    Convert from EU 27 price to the world by currency exchange rate.
  properties: carbon allocation 0 kg, carbon content 0

## Inputs from technosphere
All rows: lognormal variance with pedigree 0.8, pedigree (5,5,5,5,5)
- building, hall: 250000 m2
  Rough estimation
  Uncertainty: r
- building, multi-storey: 2000 m3
  Rough estimation
  Uncertainty: r
- concrete, normal strength: 3226.82, 1773.18 m3 (2 suppliers, which the file names only by identifier); sum of these 5000 m3
  Rough estimation
  Uncertainty: r
  properties: dry mass 2190 kg, water content 0.086758, wet mass 2380 kg
- industrial machine, heavy, unspecified: 1.1e7 kg
  Rough estimation
  Uncertainty: r
- refractory, basic, packed: 100000 kg
  Rough estimation
  Uncertainty: r
  properties: dry mass 1 kg, wet mass 1 kg
- waste brick: -654.401, -4345.6 kg (2 suppliers, which the file names only by identifier); sum of these -5000 kg
  Rough estimation
  Uncertainty: r
  production volume
    Calculated from the production volume of electric arc furnace converter in proportion to the respective output amounts.
  properties: dry mass 1 kg, wet mass 1 kg
- waste concrete, not reinforced: -1.08847e7, -115331 kg (2 suppliers, which the file names only by identifier); sum of these -1.1e7 kg
  Rough estimation
  Uncertainty: r
  production volume
    (same comment as for waste brick)
  properties: dry mass 1 kg, wet mass 1 kg

## Inputs from nature
- Occupation, industrial area [natural resource, land]: 2.5e7 m2*year; lognormal variance with pedigree 0.8, pedigree (5,5,5,5,5)
  Rough estimation
  Uncertainty: r
- Transformation, from unspecified [natural resource, land]: 500000 m2; lognormal variance with pedigree 0.8, pedigree (5,5,5,5,5)
  Rough estimation
  Uncertainty: r
- Transformation, to industrial area [natural resource, land]: 500000 m2; lognormal variance with pedigree 0.8, pedigree (5,5,5,5,5)
  Rough estimation
  Uncertainty: r

## Sampling procedure
Internet search

## Extrapolations
see Geography

## Review by Roland Hischier 2007-08-13
passed
