# polystyrene foam slab production, 45% recycled

Dataset: EcoSpold 2, unit process
Geography: RoW
Time period: 2009-01-01 to 2023-12-31
Technology level: current
Classification: ISIC rev.4 ecoinvent: 2220:Manufacture of plastics products
Classification: EcoSpold01Categories: insulation materials/production
Synonyms: EPS
Tags: ConvertedDataset
Scenario: Business-as-Usual
System model: Allocation, cut-off by classification
Share of production covered: 0 %
Generated by: Annelore Kleijer
Published in: Hischier, R. 2010
Database: ecoinvent
isCopyrightProtected: true
accessRestrictedTo: 1

## General comment
Combination of material and processing module. EPS foam slab has a density of 28 kg/m3 and a thermal conductivity of 0.036 W/mK
[This dataset was already contained in the ecoinvent database version 2. It was not individually updated during the transfer to ecoinvent version 3. Life Cycle Impact Assessment results may still have changed, as they are affected by changes in the supply chain, i.e. in other datasets. This dataset was generated following the ecoinvent quality guidelines for version 2. It may have been subject to central changes described in the ecoinvent version 3 change report (http://www.ecoinvent.org/database/ecoinvent-version-3/reports-of-changes/), and the results of the central updates were reviewed extensively. The changes added e.g. consistent water flows and other information throughout the database. The documentation of this dataset can be found in the ecoinvent reports of version 2, which are still available via the ecoinvent website. The change report linked above covers all central changes that were made during the conversion process.]

## Included activities end
Includes grinding and thermoforming processes

## Geography
Data from swisspor Romandie SA in Châtel-st-Denis FR

## Technology
Swiss average EPS production; process from 1 factory in Switzerland

## Parameters
- fraction, cooling water, cooling pond system, to air: 0.032 dimensionless; name fraction_CW_CP_to_air; lognormal variance with pedigree 0.0413, pedigree (2,3,1,3,1)
  Calculated based on literature value (Scown, C.D., 2011, Water Footprint of U.S. Transportation Fuels and supplying information of the article) (Vionnet, S., Quantis Water Database - Technical Report, 2012).
- fraction, cooling water, once-through system, to air: 0.004 dimensionless; name fraction_CW_OT_to_air; lognormal variance with pedigree 0.0413, pedigree (2,3,1,3,1)
  (same comment as for fraction, cooling water, cooling pond system, to air)
- fraction, cooling water, recirculating system, to air: 0.771 dimensionless; name fraction_CW_R_to_air; lognormal variance with pedigree 0.0413, pedigree (2,3,1,3,1)
  (same comment as for fraction, cooling water, cooling pond system, to air)
- fraction, cooling water, to air: 0.3875 dimensionless; name fraction_CW_to_air; = (0.5*fraction_CW_OT_to_air)+(0.5*fraction_CW_R_to_air); lognormal variance with pedigree 0.092025, pedigree (4,4,3,2,4)
  Calculated value based on literature value (see comments of the other parametres present in this dataset) and expert opinion. In the case when no industry/literature data are available about the type of cooling or directly fraction, cooling water, to air specific for the process a default assumption is applied. It is assumed that the once-through cooling system is used in 50% of all cases and recirculating system is used in another 50% of all cases.
- fraction, water, decarbonised, to air: 0.3875 dimensionless; name fraction_WDC_to_air; lognormal variance with pedigree 0.092025, pedigree (4,4,3,2,4)

## Reference product
- polystyrene foam slab: 1 kg; By-product classification allocatable product; CPC 34720: Polymers of styrene, in primary forms; HS2017 391520: Styrene polymers; waste, parings and scrap
  EcoSpold01Location=CH
  production volume 5.57511e8 kg
    Recycling rate of EPS estimated to 13% (25% of packaging use), with half used in 40% recycled products
  property carbon content, fossil 0.859091
    XPS consists in 91% of polystyrene, 7% of blowing agent and the re-maining 2% are flame retardants (bromine compounds) and other additives (ecoinvent v2.2 report 7, part XIV, pg69). The chemical formula of polystyrene is (C8H8)n. Here, the blowing agent is CO2.
  property carbon content, non-fossil 0
    (same comment as for polystyrene foam slab)
  property price 1.24 EUR2005
    Calculated value based on data from United Nations Commodity Trade Statistics Database (comtrade.un.org). UN comtrade category: 390311 Polystyrene, expansible in primary forms. Year 2005. Using exchange rate of 1EURO = 1.209 USD. Average of price of import into 5 main markets (EU, US, JP, IN and CN).
  properties: carbon allocation 0.859091 kg, carbon content 0.859091, dry mass 1 kg, heating value, net 38.67 MJ, water content 0, water in wet mass 0 kg, wet mass 1 kg

## Inputs from technosphere
All rows: lognormal variance with pedigree 0.0446, pedigree (2,4,5,5,1)
- electricity, low voltage: 0.00518779, 0.000231575, 0.00364167, 0.0755876, 0.00746087, 4.64722e-5, 0.0171311, 0.0260237, 0.00128923 kWh (9 suppliers, which the file names only by identifier); sum of these 0.1366 kWh
  Includ crusching, induction, foam salb making
  EcoSpold01Location=CH
  Uncertainty: Includ crusching, induction, foam salb making
- heat, district or industrial, natural gas: 0.0975497, 5.93637, 2.19232 MJ (3 suppliers, which the file names only by identifier); sum of these 8.22624 MJ
  EcoSpold01Location=RER
  Natural gaz for water vapor heating
  Uncertainty: natural gaz for water vapor heating
  properties: heating value, net 1 MJ
- polystyrene scrap, post-consumer: 0.45 kg
  EcoSpold01Location=CH
  45% from 1 kg of polystyren foam slab, no loss, average of 2 differents thickness
  Uncertainty: 45% from 1 kg of polystyren foam slab, no loss, average of 2 differents thickness
  properties: carbon content, fossil 0.922579, dry mass 1 kg, heating value, net 38.67 MJ, wet mass 1 kg
  note on carbon content, fossil: Tab & Fig 6.12, ecoinvent v2.2 report 7, part XXI. Chemical formula of polystyrene is (C8H8)n
- polystyrene, expandable: 0.57652 kg
  55% from 1 kg of polystyren foam slab + 4.6% pentane weight,no loss, average of 6 differents thickness
  EcoSpold01Location=RER
  Uncertainty: 55% from 1 kg of polystyren foam slab + 4.6% pentane weight,no loss, average of 6 differents thickness
  properties: carbon content, fossil 0.923077, dry mass 1 kg, heating value, net 38.67 MJ, wet mass 1 kg
  note on carbon content, fossil: Chemical formula of polystyrene is (C8H8)n (ecoinvent v2.2 report 11_II)
- water, decarbonised: 3.047e-6, 4.4522e-5, 2.28005e-6, 3.77932e-5, 3.87327e-6, 2.39279e-5, 5.93269e-6, 2.13828e-7, 5.84307e-6, 2.91257e-7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 kg (12 suppliers, which the file names only by identifier); sum of these 0.000136 kg
  For steam process
  EcoSpold01Location=RER
  Uncertainty: For steam process
  properties: wet mass 1 kg

## Emissions to nature
- Pentane [air, non-urban air or from high stacks]: 0.0074948 kg; lognormal variance with pedigree 0.0846, pedigree (2,4,5,5,1)
  1.3% pentane in air after foam slab fabrication, when disposed before using
  Uncertainty: 1.3% pentane in air after foam slab fabrication, when disposed before using
- Water [air, unspecified]: 5.27e-8 m3; name water_to_air_unspecified; lognormal variance with pedigree 0.0827, pedigree (2,2,5,5,1)
  Calculated value based on literature values and expert opinion. See comments in the parametres' comment field.
  property fraction, origin: fresh water 1; name fraction_origin_fresh_water
  property fraction, origin: salt water 0; name fraction_origin_salt_water
  property fraction, origin: unspecified 0; name fraction_origin_unspecified
- Water [water, unspecified]: 8.33e-8 m3; name water_to_water_unspecified; lognormal variance with pedigree 0.0827, pedigree (2,2,5,5,1)
  (same comment as for Water)
  property carbon content, fossil 0; name C_content_fossil
  property carbon content, non-fossil 0; name C_content_non_fossil
  property dry mass 0 kg; name DM
  property fraction, origin: fresh water 1; name fraction_origin_fresh_water_Ww
  property fraction, origin: salt water 0; name fraction_origin_salt_water_Ww
  property fraction, origin: unspecified 0; name fraction_origin_unspecified_Ww
  property water in wet mass 1000 kg; name WWM
  property wet mass 1000 kg; name WM

## Extrapolations
none This dataset has been copied from an original dataset covering the geography CH. The uncertainty has been adjusted accordingly.

## Review by Hans-Jörg Althaus 2010-02-07
passed
none
