# steel production, electric, low-alloyed

Dataset: EcoSpold 2, unit process
Geography: CH
Time period: 2012-01-01 to 2023-12-31
Technology level: current
Classification: ISIC rev.4 ecoinvent: 2410:Manufacture of basic iron and steel
Classification: EcoSpold01Categories: metals/extraction
Scenario: Business-as-Usual
System model: Allocation, cut-off by classification
Generated by: Melanie Haupt
Published in: Melanie Haupt 2018
Database: ecoinvent
isCopyrightProtected: true
accessRestrictedTo: 1

## General comment
This activity represent the recycling of ferrous scrap in an electric arc furnace (EAF) in Switzerland, producing low-alloyed electric carbon steel. The acitivty starts when scrap arrives at the recycling facility and ends with secondary steel (billets) produced.
The major feedstock for the EAF is ferrous scrap, which may comprise internal scrap from inside the steelworks, cut-offs from steel product manufacturers (e.g. the automotive industry), post-consumer scrap, and scrap recovered from other waste treatment processes (e.g. municipal solid waste incineration). The production of steel in the EAF process is a discontinuous process, which involves raw material handling and storage, furnace charging with/without scrap preheating, EAF scrap melting, steel and slag tapping, ladle furnace treatments for quality adjustment, slag handling and continuous casting. The actual melting is done by lowering graphite electrodes into the scrap until they strike an arc that melts the scrap.
The steel produced in this activity process is “low-alloyed”, containing a maximum share of 5% of alloying elements. This steel is mostly used in the construction industry.
Literature: Melanie Haupt, Thomas Kägi, Stefanie Hellweg, 2018, Life cycle inventories of waste management processes., Data in Brief, 19, 1441-1457. DOI: 10.1016/j.dib.2018.05.067

## Included activities start
This activity starts with 'Iron scrap, sorted, pressed' being available to the recycling facility (electric arc furnance).

## Included activities end
This activity ends with the secondary steel (billets) produced. Wood waste generated from single-use packaging material for input materials has been omitted.

## Geography
Data are sourced from plants located or activities taking place in Switzerland and/or relevant literature sources.

## Technology
Technology encountered in CH for the underlying time frame.

## Time period
Data mainly reflecting situation in Switzerland in 2012.

## Reference product
- steel, low-alloyed: 1 kg; name RP; By-product classification allocatable product; CPC 41122: Alloy steel in ingots or other primary forms and semi-finished products of alloy steel; HS2017 7218: Stainless steel in ingots or other primary forms; semi-finished products of stainless steel
  This processes ends with the production of the steel billet.
  production volume 1.5e9 kg; name PVRP
    Production volume in 2019 (worldsteel, 2020). All steel produced in Switzerland is produced through the EF route according to worldsteel (2020).
    References:
    worldsteel (2020). Steel Statistical Yearbook 2020 [online]. Available from: https://www.worldsteel.org/en/dam/jcr:5001dac8-0083-46f3-aadd-35aa357acbcc/Steel%2520Statistical%2520Yearbook%25202020%2520%2528concise%2520version%2529.pdf (accessed 20.07.2021).
  property heating value, net 0 MJ
    Non combustible products are assumed to have an LHV equal to zero (0).
  properties: carbon allocation 0.005 kg, carbon content 0.005, carbon content, fossil 0.005, carbon content, non-fossil 0, dry mass 1 kg, price 0.468 EUR2005, water content 0, water in wet mass 0 kg, wet mass 1 kg

## Inputs from technosphere
- aluminium, cast alloy: 0.00131529 kg; lognormal variance with pedigree 0.0093, pedigree (2,2,4,1,1)
  properties: dry mass 1 kg, wet mass 1 kg
- anode, for metal electrolysis: 0.00172585 kg; lognormal variance with pedigree 0.0093, pedigree (2,2,4,1,1)
  properties: carbon content, fossil 0.865971, dry mass 1 kg, wet mass 1 kg
- chemical, inorganic: 2.20561e-5 kg; lognormal variance with pedigree 0.0093, pedigree (2,2,4,1,1)
  properties: carbon content, fossil 0.003, dry mass 1 kg, wet mass 1 kg
- electric arc furnace converter: 4.31461e-11 unit; lognormal variance with pedigree 0.4701, pedigree (4,2,5,5,5)
  Input of (immobile) infrastructure modelled with an activity link to the supplying activity (construction) of matching geography.
- electric arc furnace dust: -0.0161887 kg; name BP2; lognormal variance with pedigree 0.0013, pedigree (2,2,1,1,1)
  production volume; = BP2*PVRP/RP
    Calculated based on the production volume of the reference product.
  properties: carbon content, fossil 0.01339, dry mass 0.846 kg, water content 0.182033, wet mass 1 kg
- electric arc furnace slag: -0.172763 kg; name BP1; lognormal variance with pedigree 0.0013, pedigree (2,2,1,1,1)
  This exchange is an approximation for "slag from electric arc furnace (recycled as gravel)", a waste that is actually recycled as gravel in a process that is not (yet) available in the database. A user can set this amount to zero in order to reintroduce the cut-off.
  production volume; = BP1*PVRP/RP
    Calculated based on the production volume of the reference product.
  properties: carbon content, fossil 0.00338635, dry mass 1 kg, wet mass 1 kg
- electricity, medium voltage: 0.453275 kWh; lognormal variance with pedigree 0.0093, pedigree (2,2,4,1,1)
- ferromanganese, high-coal, 74.5% Mn: 0.0117099 kg; name FerroMn_amount; lognormal variance with pedigree 0.0093, pedigree (2,2,4,1,1)
  properties: carbon content, fossil 0.075, dry mass 1 kg, heating value, net 2.27 MJ, wet mass 1 kg
- ferrosilicon: 0.00445108 kg; lognormal variance with pedigree 0.0093, pedigree (2,2,4,1,1)
  properties: carbon content, fossil 0.1, dry mass 1 kg, heating value, net 3.03 MJ, wet mass 1 kg
- hard coal: 0.0165659 kg; name hardcoal_amount; = 0.012291435801989+0.00228658396861534; lognormal variance with pedigree 0.0093, pedigree (2,2,4,1,1)
  Sum of all hard coal inputs listed in the orignal dataset in Haupt et al. (2018).
  properties: carbon content, fossil 0.845, dry mass 0.94 kg, heating value, net 27.91 MJ, water content 0.0638298, wet mass 1 kg
  note on heating value, net: Based on the Characterization factor of Hard coal in the CED method
- heat, district or industrial, other than natural gas: 0.0394863 MJ; lognormal variance with pedigree 0.0093, pedigree (2,2,4,1,1)
  This exchange is linked directly to ensure the supply chain that was identified during the data collection.
  properties: heating value, net 1 MJ
- hydrochloric acid, without water, in 30% solution state: 0.000149705 kg; lognormal variance with pedigree 0.0093, pedigree (2,2,4,1,1)
  properties: dry mass 1 kg, heating value, net 3.32 MJ, wet mass 1 kg
- inert waste: -0.00842254 kg; name BP4; = 0.00170937605477045+0.0057024599119585; lognormal variance with pedigree 0.0013, pedigree (2,2,1,1,1)
  This exchange is an approximation for "debris (separation of metals which are sent to recycling, rest landfilled)" and "tinder (treatment unknown)", a waste that is actually of unknown composition and its treatment process is not (yet) available in the database. Users can set this amount to zero in order to reintroduce the cut-off.
  production volume; = BP4*PVRP/RP
    Calculated based on the production volume of the reference product.
  properties: dry mass 1 kg, wet mass 1 kg
- inert waste, for final disposal: -0.0193853 kg; name BP3; = 1.60813E-02+9.77729E-04; lognormal variance with pedigree 0.0013, pedigree (2,2,1,1,1)
  This exchange is derived as the sum of the flows reported in Haupt et al. (2018) as 'inert waste, for final disposal' (1.60813E-02 kg/kg scrap input) and 'dummy - used refractory (recycled)' (9.77729E-04 kg/kg scrap input). Used refractory is in this case actually recycled in a process that is not (yet) available in the database. A user can set this amount to zero in order to reintroduce the cut-off.
  production volume; = BP3*PVRP/RP
    Calculated based on the production volume of the reference product.
  properties: dry mass 0.995 kg, water content 0.00502513, wet mass 1 kg
- iron scrap, sorted, pressed: 1.13636 kg; lognormal variance with pedigree 0.0093, pedigree (2,2,4,1,1)
  properties: dry mass 1 kg, wet mass 1 kg
- natural gas, high pressure: 0.0210753 m3; name NG_amount; lognormal variance with pedigree 0.0093, pedigree (2,2,4,1,1)
  properties: carbon content, fossil 0.602381, dry mass 0.84 kg, heating value, gross 40 MJ, heating value, net 36 MJ, wet mass 0.84 kg
  note on heating value, net: Literature value, Source: Christoph Meili;Niels Jungbluth;Maresa Bussa (2021) Life cycle inventories of crude oil and natural gas extraction. ESU-services Ltd. commissioned by BAFU & VSG, Schaffhausen, Switzerland, http://esu-services.ch/data/public-lci-reports/
- oxygen, liquid: 0.0382459 kg; lognormal variance with pedigree 0.0093, pedigree (2,2,4,1,1)
  properties: dry mass 1 kg, wet mass 1 kg
- quicklime, in pieces, loose: 0.0484765 kg; lognormal variance with pedigree 0.0093, pedigree (2,2,4,1,1)
  properties: dry mass 0.99 kg, water content 0.010101, wet mass 1 kg
- refractory, basic, packed: 0.0109124 kg; lognormal variance with pedigree 0.0093, pedigree (2,2,4,1,1)
  properties: dry mass 1 kg, wet mass 1 kg
- sulfuric acid: 8.1777e-5 kg; lognormal variance with pedigree 0.0093, pedigree (2,2,4,1,1)
  properties: dry mass 1 kg, wet mass 1 kg

## Inputs from nature
- Water, cooling, unspecified natural origin [natural resource, in water]: 0.000965648 m3; name water_cooling; lognormal variance with pedigree 0.0093, pedigree (2,2,4,1,1)

## Emissions to nature
- Cadmium II [air, urban air close to ground]: 1.47051e-8 kg; lognormal variance with pedigree 0.6587, pedigree (2,2,4,1,1)
- Carbon dioxide, fossil [air, urban air close to ground]: 0.0685203 kg; lognormal variance with pedigree 0.6587, pedigree (2,2,4,1,1)
  Calculated value based on the input of hard coal, natural gas and ferromanganese, and corrected for the emission factors for carbon monoxide and methane, as well as the carbon contained in the reference product and main by-products.
- Carbon monoxide, fossil [air, urban air close to ground]: 0.000497784 kg; name CO_amount; lognormal variance with pedigree 0.6587, pedigree (2,2,4,1,1)
- Chromium III [air, urban air close to ground]: 3.59459e-8 kg; lognormal variance with pedigree 0.6587, pedigree (2,2,4,1,1)
- Copper ion [air, urban air close to ground]: 5.06511e-8 kg; lognormal variance with pedigree 0.6587, pedigree (2,2,4,1,1)
- Dioxins, measured as 2,3,7,8-tetrachlorodibenzo-p-dioxin [air, urban air close to ground]: 6.53562e-14 kg; lognormal variance with pedigree 0.0487, pedigree (2,2,4,1,1)
- Hydrochloric acid [air, urban air close to ground]: 6.91142e-7 kg; lognormal variance with pedigree 0.0487, pedigree (2,2,4,1,1)
- Lead II [air, urban air close to ground]: 5.96375e-7 kg; lognormal variance with pedigree 0.6587, pedigree (2,2,4,1,1)
- Mercury II [air, urban air close to ground]: 9.64004e-8 kg; lognormal variance with pedigree 0.6587, pedigree (2,2,4,1,1)
- Methane, fossil [air, urban air close to ground]: 2.46685e-5 kg; name CH4_amount_1; lognormal variance with pedigree 0.0487, pedigree (2,2,4,1,1)
- NMVOC, non-methane volatile organic compounds [air, urban air close to ground]: 2.46687e-5 kg; lognormal variance with pedigree 0.0487, pedigree (2,2,4,1,1)
- Nickel II [air, urban air close to ground]: 3.26781e-9 kg; lognormal variance with pedigree 0.6587, pedigree (2,2,4,1,1)
- Nitrogen oxides [air, urban air close to ground]: 8.85283e-5 kg; lognormal variance with pedigree 0.0487, pedigree (2,2,4,1,1)
- PAH, polycyclic aromatic hydrocarbons [air, urban air close to ground]: 1.38882e-7 kg; lognormal variance with pedigree 0.3087, pedigree (2,2,4,1,1)
- Particulate Matter, < 2.5 um [air, urban air close to ground]: 8.61901e-6 kg; lognormal variance with pedigree 0.3087, pedigree (2,2,4,1,1)
- Particulate Matter, > 10 um [air, urban air close to ground]: 3.042e-6 kg; lognormal variance with pedigree 0.0487, pedigree (2,2,4,1,1)
- Particulate Matter, > 2.5 um and < 10um [air, urban air close to ground]: 8.61901e-6 kg; lognormal variance with pedigree 0.1287, pedigree (2,2,4,1,1)
- Polychlorinated biphenyls [air, urban air close to ground]: 8.98648e-10 kg; lognormal variance with pedigree 0.0487, pedigree (2,2,4,1,1)
- Sulfur dioxide [air, urban air close to ground]: 2.30217e-6 kg; lognormal variance with pedigree 0.0093, pedigree (2,2,4,1,1)
- Water [air, urban air close to ground]: 0.000873987 m3; name water_toAir; = water_cooling - water_toWater; lognormal variance with pedigree 0.21, pedigree (5,5,5,5,5)
  Amount of water to air was not provided in Haupt et al. (2018), hence estimated here as input of cooling water minus water released back to water.
- Zinc II [air, urban air close to ground]: 8.77244e-6 kg; lognormal variance with pedigree 0.6587, pedigree (2,2,4,1,1)
- Cadmium II [water, unspecified]: 1.96069e-10 kg; lognormal variance with pedigree 0.6587, pedigree (2,2,4,1,1)
- Copper ion [water, unspecified]: 9.64004e-8 kg; lognormal variance with pedigree 0.6587, pedigree (2,2,4,1,1)
- Lead II [water, unspecified]: 1.96069e-8 kg; lognormal variance with pedigree 0.6587, pedigree (2,2,4,1,1)
- Mercury II [water, unspecified]: 3.92137e-10 kg; lognormal variance with pedigree 0.6587, pedigree (2,2,4,1,1)
- Nickel II [water, unspecified]: 3.92137e-9 kg; lognormal variance with pedigree 0.6587, pedigree (2,2,4,1,1)
- Water [water, unspecified]: 9.16607e-5 m3; name water_toWater; lognormal variance with pedigree 0.0087, pedigree (2,2,4,1,1)
- Zinc II [water, unspecified]: 3.21879e-7 kg; lognormal variance with pedigree 0.6587, pedigree (2,2,4,1,1)

## Extrapolations
The data is representative for recycling in Switzerland. Most information in this dataset was collected at an electric arc furnace in Switzerland. No data was found on the infrastructure requirements. The same amount as in existing European datasets is therefore assumed. The exchange amounts have been scaled by 1/1.05 compared to the original inventory in Haupt et al. (2018) to correct for the input of iron scrap. The generation of wastes and by-products reported in Haupt et al. (2018) has been aligned/approximated with the exhanges availble in the ecoinvent database to the extent possible. The wood waste from single-use packaging (1.58162E-04kg per kg scrap input) has been omitted.
