# manganese(III) oxide production

Dataset: EcoSpold 2, unit process
Geography: RoW
Time period: 2009-01-01 to 2023-12-31
Technology level: current
Classification: ISIC rev.4 ecoinvent: 2011:Manufacture of basic chemicals
Classification: EcoSpold01Categories: chemicals/inorganics
Synonyms: Manganese sesquioxide
Tags: ConvertedDataset
Scenario: Business-as-Usual
System model: Allocation, cut-off by classification
Generated by: Dominic Notter
Published in: Hischier, R. 2009
Database: ecoinvent
isCopyrightProtected: true
accessRestrictedTo: 1

## General comment
The dataset can be used for example as base material in the production of spinell type lithium manganese oxide Data are based on patents.
[This dataset was already contained in the ecoinvent database version 2. It was not individually updated during the transfer to ecoinvent version 3. Life Cycle Impact Assessment results may still have changed, as they are affected by changes in the supply chain, i.e. in other datasets. This dataset was generated following the ecoinvent quality guidelines for version 2. It may have been subject to central changes described in the ecoinvent version 3 change report (http://www.ecoinvent.org/database/ecoinvent-version-3/reports-of-changes/), and the results of the central updates were reviewed extensively. The changes added e.g. consistent water flows and other information throughout the database. The documentation of this dataset can be found in the ecoinvent reports of version 2, which are still available via the ecoinvent website. The change report linked above covers all central changes that were made during the conversion process.]

## Included activities end
This dataset includes rosting of manganese carbonate in a rotary kiln in a specified nitrogen/oxygen-atmosphere. Energy consumption, carbon monoxide and carbon dioxide emissions to air are calculated. For infrastructure, the ecoinvent dataset "chemical plant, organics" is accounted. Transportation efforts are based on ecoinvent standard estimates.

## Geography
Some Swiss or European datasets are used for global processes.

## Technology
This dataset includes rosting of manganese carbonate in a rotary kiln at temperatures around 500°C. Assumption: CO to the atmosphere is equal to the CO after thermal post-combustion (<20mgC/Nm3). No infrastructure for thermal post combustion an no heat through the burning process of CO is calculated.

## Reference product
- manganese(III) oxide: 1 kg; By-product classification allocatable product; CPC 34220: Zinc oxide; zinc peroxide; chromium oxides and hydroxides; manganese oxides; iron oxides and hydroxides; earth[…]; HS2017 282090: Manganese oxides; excluding manganese dioxide; CAS 1317-34-6
  EcoSpold01Location=CN
  production volume 3.80251 kg
    This is a placeholder value that does not reflect real-world production volumes. This dataset does not currently require a real-world production volume to work in the database framework, and no actual data were collected yet. This has no negative effect on the results of the ecoinvent database.
  property price 0.41 EUR2005
    Calculated value based on data from United Nations Commodity Trade Statistics Database (comtrade.un.org). UN comtrade category: 282090 Manganese oxides other than manganese dioxide. Year 2005. Using exchange rate of 1EURO = 1.209 USD. Average of price of import into 5 main markets (EU, US, JP, IN and CN).
  properties: carbon allocation 0 kg, carbon content 0, carbon content, fossil 0, carbon content, non-fossil 0, dry mass 1 kg, water content 0, water in wet mass 0 kg, wet mass 1 kg

## Inputs from technosphere
- chemical factory, organics: 4e-10 unit; lognormal variance with pedigree 0.448, pedigree (5,5,5,5,3)
  EcoSpold01Location=RER
- electricity, medium voltage: 6.5075e-6, 5.78788e-7, 5.0464e-5, 6.61282e-5, 7.00301e-5, 3.56699e-5, 4.92655e-6, 3.11814e-5, 1.31625e-6, 0.000210737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 kWh (47 suppliers, which the file names only by identifier); sum of these 0.005 kWh; lognormal variance with pedigree 0.096, pedigree (4,5,5,5,3)
  EcoSpold01Location=CN
- heat, district or industrial, natural gas: 4.129 MJ; lognormal variance with pedigree 0.08, pedigree (4,4,5,5,3)
  EcoSpold01Location=RER
  properties: heating value, net 1 MJ
- inert waste, for final disposal: -0.255288, -0.00166199 kg (2 suppliers, which the file names only by identifier); sum of these -0.25695 kg; lognormal variance with pedigree 0.0326, pedigree (2,4,1,5,3)
  EcoSpold01Location=CH
  production volume
    Calculated from the production volume of manganese(III) oxide in proportion to the respective output amounts.
  properties: dry mass 0.995 kg, water content 0.00502513, wet mass 1 kg
- manganese concentrate: 1.713 kg; lognormal variance with pedigree 0.1246, pedigree (2,4,5,5,4)
  EcoSpold01Location=GLO
  properties: dry mass 1 kg, wet mass 1 kg
- nitrogen, liquid: 2.01225, 0.552349 kg (2 suppliers, which the file names only by identifier); sum of these 2.5646 kg; lognormal variance with pedigree 0.054, pedigree (1,4,5,5,1)
  EcoSpold01Location=RER
  properties: dry mass 1 kg, wet mass 1 kg
- oxygen, liquid: 0.115667, 0.421543 kg (2 suppliers, which the file names only by identifier); sum of these 0.53721 kg; lognormal variance with pedigree 0.054, pedigree (1,4,5,5,1)
  EcoSpold01Location=RER
  properties: dry mass 1 kg, wet mass 1 kg

## Emissions to nature
- Carbon dioxide, fossil [air, unspecified]: 0.55731 kg; lognormal variance with pedigree 0.062, pedigree (1,1,5,5,1)
  composite
- Carbon monoxide, fossil [air, unspecified]: 4.6667e-5 kg; lognormal variance with pedigree 0.782, pedigree (4,4,5,5,4)

## Sampling procedure
patent, ecoinvent

## Extrapolations
see Geography This dataset has been copied from an original dataset covering the geography CN. The uncertainty has been adjusted accordingly.

## Review by Christian Bauer 2010-02-08
passed
