# door production, inner, glass-wood

Dataset: EcoSpold 2, unit process
Geography: RoW
Time period: 1997-01-01 to 2023-12-31
Technology level: current
Classification: ISIC rev.4 ecoinvent: 1622:Manufacture of builders' carpentry and joinery
Classification: EcoSpold01Categories: building components/doors
Tags: ConvertedDataset
Scenario: Business-as-Usual
System model: Allocation, cut-off by classification
Generated by: Martin Lehmann
Published in: Kellenberger D. 2007
Database: ecoinvent
isCopyrightProtected: true
accessRestrictedTo: 1

## General comment
The dataset can be applied to describe an average room door. The door frame is made of massive wood, the door leaf is made of wood with a glass insert (62 % wood, 38% glass). The lock, door handles and frame joints are fabricated from steel. Data are based on a door of 0.8x2.0 m and scaled to 1m2. 1 m2 of the wooden inner door weighs 27.6 kg. The functional life time for the door frame is 50 years, for the door leaf it is 30 years.
[This dataset was already contained in the ecoinvent database version 2. It was not individually updated during the transfer to ecoinvent version 3. Life Cycle Impact Assessment results may still have changed, as they are affected by changes in the supply chain, i.e. in other datasets. This dataset was generated following the ecoinvent quality guidelines for version 2. It may have been subject to central changes described in the ecoinvent version 3 change report (http://www.ecoinvent.org/database/ecoinvent-version-3/reports-of-changes/), and the results of the central updates were reviewed extensively. The changes added e.g. consistent water flows and other information throughout the database. The documentation of this dataset can be found in the ecoinvent reports of version 2, which are still available via the ecoinvent website. The change report linked above covers all central changes that were made during the conversion process.]

## Included activities end
This dataset describes the production of 1m2 (visible area) inner door, including the processes for the installation. Not included are transports from plant to construction site.

## Geography
Data from producers in Switzerland.

## Technology
The technology represents average European production.

## Reference product
- door, inner, glass-wood: 1 m2; By-product classification allocatable product; CPC 31600: Builders' joinery and carpentry of wood (including cellular wood panels, assembled parquet panels, shingles an[…]; HS2017 441820: Wood; doors and their frames and thresholds
  EcoSpold01Location=RER
  production volume 2.67763 m2
    This is a placeholder value that does not reflect real-world production volumes. This dataset does not currently require a real-world production volume to work in the database framework, and no actual data were collected yet. This has no negative effect on the results of the ecoinvent database.
  property carbon content, fossil 0.0665144
    Calculated as an addition of C content in the product, then referred to 1 kg DM.
  property price 51.3 EUR2005
    Calculated based on literature values. The price of 1 kg of wooden doors is calculated to be 1.86 euro/kg. This price is calculated as a weighted average of prices calculated based on import (net trade) of this material from the world into 5 big economies; EU, Japan, China, India, USA. The net weight and the trade value is obtained from the UN Comtrade database (commodity no. 441820 Doors, frames amd thresholds, of wood), year 2005. The weight of the door, inner, glass-wood is 27.6kg/m2 based on the description of the dataset.
  properties: carbon allocation 18.0307 kg, carbon content 0.687671, carbon content, non-fossil 0.621156, dry mass 26.22 kg, water content 0.0526316, water in wet mass 1.38 kg, wet mass 27.6 kg

## Inputs from technosphere
- acrylic dispersion, with water, in 58% solution state: 0.187 kg; lognormal variance with pedigree 0.0526, pedigree (1,3,5,5,1)
  EcoSpold01Location=RER
  properties: carbon content, fossil 0.342442, dry mass 0.59 kg, heating value, net 16.66 MJ, water content 0.70041, wet mass 1 kg
  note on carbon content, fossil: The carbon content was calculated from the carbon content of the inputs.
- acrylic filler: 0.0125 kg; lognormal variance with pedigree 0.0526, pedigree (1,3,5,5,1)
  EcoSpold01Location=RER
  properties: carbon content, fossil 0.127885, dry mass 0.9 kg, heating value, net 3.2 MJ, water content 0.111111, wet mass 1 kg
  note on carbon content, fossil: Raw materials are listed in Tab 5.2, ecoinvent v2.2 report 7, part XVII. C content is calculated after C content of raw materials (15% acrylic binder, and 4% chemicals organic. Pigment is TiO2), then referred to 1 kg DM
- acrylic varnish, with water, in 53% solution state: 0.187 kg; lognormal variance with pedigree 0.0526, pedigree (1,3,5,5,1)
  EcoSpold01Location=RER
  properties: carbon content, fossil 0.2066, dry mass 0.53 kg, heating value, net 20.44 MJ, water content 0.883983, wet mass 1 kg
- alkyd paint, white, without water, in 60% solution state: 0.523 kg; lognormal variance with pedigree 0.0526, pedigree (1,3,5,5,1)
  EcoSpold01Location=RER
  properties: carbon content, fossil 0.414587, carbon content, non-fossil 0.161654, dry mass 1 kg, heating value, net 17.46 MJ, wet mass 1 kg
  note on carbon content, fossil: C content was calculated as an addition of C content in the raw materials.
- aluminium, wrought alloy: 0.15 kg; lognormal variance with pedigree 0.0526, pedigree (1,3,5,5,1)
  EcoSpold01Location=RER
  properties: dry mass 1 kg, wet mass 1 kg
- ammonia, anhydrous, liquid: 0.000131473, 0.000255215, 0.0028289, 0.000119579, 2.67493e-5, 0.000983085, 8.45079e-5, 0.000260494 kg (8 suppliers, which the file names only by identifier); sum of these 0.00469 kg; lognormal variance with pedigree 0.052, pedigree (1,1,5,5,1)
  composite
  EcoSpold01Location=RER
  properties: dry mass 1 kg, wet mass 1 kg
- anodising, aluminium sheet: 0.0137 m2; lognormal variance with pedigree 0.0526, pedigree (1,3,5,5,1)
  EcoSpold01Location=RER
- brazing solder, cadmium free: 0.000375 kg; lognormal variance with pedigree 0.0526, pedigree (1,3,5,5,1)
  EcoSpold01Location=RER
  properties: dry mass 1 kg, wet mass 1 kg
- chemical, organic: 0.00261 kg; lognormal variance with pedigree 0.052, pedigree (1,1,5,5,1)
  EcoSpold01Location=GLO
  composite
  properties: carbon content, fossil 0.628, dry mass 1 kg, heating value, net 19.03 MJ, wet mass 1 kg
  note on carbon content, fossil: This dataset is an unweighted average of 20 organic substances (listed in Tab 88.1, ecoinvent v2.2 report 8, part II), being part of the top100 chemicals included in this database. The C-content has also been calculated as an unweighted average of the C content of the substances composing this dataset.
- corrugated board box: 0.00101874, 3.79481e-5, 0.00222331 kg (3 suppliers, which the file names only by identifier); sum of these 0.00328 kg; lognormal variance with pedigree 0.052, pedigree (1,1,5,5,1)
  EcoSpold01Location=RER
  composite
  properties: carbon content, fossil 0.00365437, carbon content, non-fossil 0.450248, dry mass 0.945 kg, heating value, net 12.86 MJ, water content 0.0582011, wet mass 1 kg
- diesel, burned in building machine: 2.57 MJ; lognormal variance with pedigree 0.172, pedigree (1,1,5,5,1)
  EcoSpold01Location=GLO
  composite
  properties: heating value, net 1 MJ
- electricity, medium voltage: 0.508462, 10.1427, 3.40791, 0.155708, 0.0311649, 0.0066918, 1.04739 kWh (7 suppliers, which the file names only by identifier); sum of these 15.3 kWh; lognormal variance with pedigree 0.052, pedigree (1,1,5,5,1)
  EcoSpold01Location=UCTE
  composite
- ethylene dichloride: 3.67e-5 kg; lognormal variance with pedigree 0.0526, pedigree (1,3,5,5,1)
  EcoSpold01Location=RER
  properties: carbon content, fossil 0.244898, dry mass 1 kg, heating value, net 12.25 MJ, wet mass 1 kg
- fibreboard, hard: 0.00426 m3; lognormal variance with pedigree 0.0526, pedigree (1,3,5,5,1)
  EcoSpold01Location=RER
  properties: carbon content, fossil 0.0124326, carbon content, non-fossil 0.486283, dry mass 841.121 kg, heating value, net 12565.8 MJ, water content 0.07, wet mass 900 kg
  note on carbon content, fossil: C content calculated as the addition of the C contents in the final product components (4.14kg paraffin, and 9 kg phenolic resin)
  note on carbon content, non-fossil: The fibreboard is composed of wood, paraffin and Phenolic resin. The weight of the wood is assumed to be the DM kg minus 13.14 kg additives. C content of wood is 0.494 kgC/kg dry wood (ecoinvent v2.2 report 9)
- glass wool mat: 0.000208 kg; lognormal variance with pedigree 0.052, pedigree (1,1,5,5,1)
  EcoSpold01Location=CH
  composite
  properties: carbon content, fossil 0.0107327, dry mass 1 kg, wet mass 1 kg
  note on carbon content, fossil: A share of 16 w-% for the binders is taken into account. The binder used in this study is a mixture of phenol, formaldehyde and urea resins (ecoinvent v2.2 report 16_part XIV), and the C content was calculated as a weigthed average of phenol, formaldehyde and urea C content.
- glazing, double, U<1.1 W/m2K, laminated safety glass: 0.38 m2; lognormal variance with pedigree 0.0526, pedigree (1,3,5,5,1)
  EcoSpold01Location=RER
  properties: carbon content, fossil 0.0175264, dry mass 27.56 kg, wet mass 27.56 kg
  note on carbon content, fossil: Calculated as an addition of C content in the product, then referred to 1 kg DM.
- hazardous waste, for incineration: -3.3e-5 kg; lognormal variance with pedigree 0.0206, pedigree (1,3,4,5,1)
  EcoSpold01Location=CH
  production volume
    Calculated from the production volume of door, inner, glass-wood in proportion to the respective output amounts.
  properties: carbon content, fossil 0.554667, dry mass 0.75 kg, heating value, net 17 MJ, water content 0.333333, wet mass 1 kg
  note on carbon content, fossil: Tab A.6, ecoinvent v2.2 report 13_I. C content has been calculated after data in the tables, and then referred to 1 kg DM
  note on heating value, net: Value taken from the general comment of the treatment dataset.
- heat, district or industrial, natural gas: 0.000784822, 0.0477602 MJ (2 suppliers, which the file names only by identifier); sum of these 0.048545 MJ; lognormal variance with pedigree 0.052, pedigree (1,1,5,5,1)
  composite
  EcoSpold01Location=RER
  properties: heating value, net 1 MJ
- heat, district or industrial, other than natural gas: 101.953, 0.0472328 MJ (2 suppliers, which the file names only by identifier); sum of these 102 MJ; lognormal variance with pedigree 0.042, pedigree (1,1,5,5,1)
  composite
  EcoSpold01Location=CH
  properties: heating value, net 1 MJ
- hydrochloric acid, without water, in 30% solution state: 0.0104 kg; lognormal variance with pedigree 0.052, pedigree (1,1,5,5,1)
  EcoSpold01Location=RER
  composite
  properties: dry mass 1 kg, heating value, net 3.32 MJ, wet mass 1 kg
- inert waste: -0.00794 kg; lognormal variance with pedigree 0.012, pedigree (1,1,1,5,1)
  EcoSpold01Location=CH
  composite
  production volume
    (same comment as for hazardous waste, for incineration)
  properties: dry mass 1 kg, wet mass 1 kg
- kraft paper: 0.105 kg; lognormal variance with pedigree 0.0526, pedigree (1,3,5,5,1)
  EcoSpold01Location=RER
  properties: carbon content, fossil 0.0020219, carbon content, non-fossil 0.41662, dry mass 0.945 kg, heating value, net 14.11 MJ, water content 0.0582011, wet mass 1 kg
  note on carbon content, fossil: Fossil C content was calculated after fossil C contents of chemicals used in the production of the paper (in Tab 9.4 ecoinvent v2.2 report 11_III, part 9).
  note on carbon content, non-fossil: Biogenic C content was calculated after biogenic C contents of chemicals used in the production of the paper (in Tab 9.4 ecoinvent v2.2 report 11_III, part 9). The cellulose content in 1 kg of paper (on a wet mas basis) was estimated as (1-chemical content), C content of cellulose was considered 0.44 kgC/kg dry mass (ecoinvent v2.2 report, n 15a, pg 40)
- lubricating oil: 0.0144 kg; lognormal variance with pedigree 0.052, pedigree (1,1,5,5,1)
  composite
  EcoSpold01Location=RER
  properties: carbon content, fossil 0.75, dry mass 1 kg, heating value, net 40.2 MJ, wet mass 1 kg
  note on carbon content, fossil: Lubricating oil is produced from diesel. C-content/dry mass of fats and oils considered 75%, from: ecoinvent v2.2 report, n 15a, pg 40
  note on heating value, net: Literature value, Source: IPCC 2006, 2006 IPCC Guidelines for National Greenhouse Gas Inventories, Prepared by the National Greenhouse Gas Inventories Programme, Eggleston H.S., Buendia L., Miwa K., Ngara T. and Tanabe K. (eds). Published: IGES, Japan
- melamine formaldehyde resin: 0.0697 kg; lognormal variance with pedigree 0.0526, pedigree (1,3,5,5,1)
  EcoSpold01Location=RER
  properties: carbon content, fossil 0.311708, dry mass 1 kg, heating value, net 9.44 MJ, wet mass 1 kg
  note on carbon content, fossil: Chemical formula of the melamine formaldehide monomer was assumed to be C4H6N6O
- metal working factory: 1.26e-8 unit; lognormal variance with pedigree 0.3546, pedigree (2,4,5,5,1)
  EcoSpold01Location=RER
- municipal solid waste: -0.000167037, -1.98349e-5, -0.000123447, -0.0942421, -1.38797e-5, -4.45513e-6, -1.00698e-5, -0.000419209 kg (8 suppliers, which the file names only by identifier); sum of these -0.095 kg; lognormal variance with pedigree 0.012, pedigree (1,1,1,5,1)
  composite
  EcoSpold01Location=CH
  production volume
    (same comment as for hazardous waste, for incineration)
  properties: carbon content, fossil 0.171549, carbon content, non-fossil 0.261655, dry mass 0.771 kg, heating value, net 11.74 MJ, water content 0.297017, wet mass 1 kg
  note on carbon content, fossil: MSW composition in tab 4.1, ecoinvent v2.2 report 13_I. C content referred to 1 kg DM
- nylon 6-6: 0.027 kg; lognormal variance with pedigree 0.052, pedigree (1,1,5,5,1)
  EcoSpold01Location=RER
  composite
  properties: carbon content, fossil 0.637168, dry mass 1 kg, heating value, net 30.9 MJ, wet mass 1 kg
  note on carbon content, fossil: Nylon 66 is derived from hexamethylene diamine and adipic acid and has the following structure: -(HN-(CH2)6-NH-CO-(CH2)4-CO)n- (ecoinvent v2.2 report 11_II), C12H22N2O2. MW=226 g/mol.
  note on heating value, net: Assumed equal to Nylon-66. Reference: Walters, R. N., Hackett, S. M. and Lyon, R. E. (2000) ‘Heats of combustion of high temperature polymers’, Fire and Materials, 24(5), pp. 245–252. doi: 10.1002/1099-1018(200009/10)24:5<245::AID-FAM744>3.0.CO;2-7.
- particleboard, uncoated: 0.0112 m3; lognormal variance with pedigree 0.0526, pedigree (1,3,5,5,1)
  EcoSpold01Location=RER
  properties: carbon content, fossil 0.045339, carbon content, non-fossil 0.4416, dry mass 599.3 kg, heating value, net 8749.71 MJ, water content 0.0629067, wet mass 637 kg
- polyethylene, low density, granulate: 0.625 kg; lognormal variance with pedigree 0.0526, pedigree (1,3,5,5,1)
  EcoSpold01Location=RER
  properties: carbon content, fossil 0.857143, dry mass 1 kg, heating value, net 42.47 MJ, wet mass 1 kg
  note on carbon content, fossil: Polyethylene is formed out of a huge amount of ethylene monomers (C2H4) (ecoinvent v2.2 report 11_II). MW=28 g/mol
- reinforcing steel: 0.75 kg; lognormal variance with pedigree 0.052, pedigree (1,1,5,5,1)
  EcoSpold01Location=RER
  composite
  properties: carbon content, fossil 0.004, dry mass 1 kg, wet mass 1 kg
- sawnwood, hardwood, dried (u=10%), planed: 5.24e-6 m3; lognormal variance with pedigree 0.0526, pedigree (1,3,5,5,1)
  EcoSpold01Location=RER
  properties: carbon content, non-fossil 0.494, dry mass 650 kg, heating value, net 9569.82 MJ, water content 0.1, wet mass 715 kg
  note on carbon content, non-fossil: C content of dry mass is 0.494 kgC/kg dry wood (ecoinvent v2.2 report 9)
- sawnwood, softwood, dried (u=10%), planed: 0.0363 m3; lognormal variance with pedigree 0.042, pedigree (1,1,5,5,1)
  composite
  EcoSpold01Location=RER
  properties: carbon content, non-fossil 0.494, dry mass 450 kg, heating value, net 6625.26 MJ, water content 0.1, wet mass 495 kg
- steel, low-alloyed, hot rolled: 0.0396 kg; lognormal variance with pedigree 0.052, pedigree (1,1,5,5,1)
  composite
  EcoSpold01Location=RER
  properties: carbon content, fossil 0.005, dry mass 1 kg, wet mass 1 kg
  note on carbon content, fossil: Low alloyed steel composition given in Tab. 3.2 ecoinvent v2.2 report 10_partII. Steel assumed to have a C content of 0.5%
- straw: 0.0353 kg; lognormal variance with pedigree 0.0526, pedigree (1,3,5,5,1)
  properties: carbon content, non-fossil 0.437377, dry mass 0.85 kg, heating value, net 14.25 MJ, water content 0.176471, wet mass 1 kg
  note on heating value, net: Literature value, Source: Phyllis2, database for (treated) biomass, algae, feedstocks for biogas production and biochar, https://phyllis.nl/Biomass/View/1271, ECN.TNO
- synthetic rubber: 0.156 kg; lognormal variance with pedigree 0.0526, pedigree (1,3,5,5,1)
  EcoSpold01Location=RER
  properties: carbon content, fossil 0.871949, dry mass 1 kg, heating value, net 26.42 MJ, wet mass 1 kg
  note on carbon content, fossil: EPDM (Ethylene-propene-diene terpolymer) rubber is a terpolymer of ethylene, propene, and a diene with the residual unsaturated portion of the diene in the side chain (ecoinvent v2.2 report 7-part XX & Ullmann). Chemical formula (deduced from Evidences of Solvent-Induced Miscibility in Polychloroprene-co-Ethylene-Propene Diene Terpolymer Blends, Dubey et al., Journal of Applied Polymer Science, 2009, 111:1884–1891): C20H35
- urea formaldehyde resin: 0.143 kg; lognormal variance with pedigree 0.0526, pedigree (1,3,5,5,1)
  EcoSpold01Location=RER
  properties: carbon content, fossil 0.408958, dry mass 1 kg, heating value, net 12.39 MJ, wet mass 1 kg
  note on carbon content, fossil: Chemical formula of the urea formaldehide monomer was assumed to be C3H8N2O
- vinyl acetate: 0.132 kg; lognormal variance with pedigree 0.0526, pedigree (1,3,5,5,1)
  EcoSpold01Location=RER
  properties: carbon content, fossil 0.55814, dry mass 1 kg, heating value, net 25.35 MJ, wet mass 1 kg
  note on carbon content, fossil: Vinyl acetate (CH3CO2CH=CH2) (ecoinvent v2.2 report 11_II), C4H6O2. MW=86 g/mol
- waste mineral oil: -0.0025 kg; lognormal variance with pedigree 0.0206, pedigree (1,3,4,5,1)
  EcoSpold01Location=CH
  production volume
    (same comment as for hazardous waste, for incineration)
  properties: carbon content, fossil 0.864444, dry mass 0.9 kg, heating value, net 34.7 MJ, water content 0.111111, wet mass 1 kg
- waste plastic, mixture: -1.98781e-6, -1.88761e-6, -0.00741812, -7.20289e-5, -4.81269e-6, -8.03054e-7, -3.63976e-7 kg (7 suppliers, which the file names only by identifier); sum of these -0.0075 kg; lognormal variance with pedigree 0.0206, pedigree (1,3,4,5,1)
  EcoSpold01Location=CH
  production volume
    (same comment as for hazardous waste, for incineration)
  properties: carbon content, fossil 0.747344, dry mass 0.847 kg, heating value, net 30.79 MJ, water content 0.180638, wet mass 1 kg
  note on carbon content, fossil: C content in 1 kg DM was calculated using data in Tab A.2, ecoinvent v2.2 report 13_I
- waste polyethylene: -3.96895e-5, -0.000101193, -4.17963e-5, -7.65306e-6, -0.623278, -1.68852e-5, -0.0015145 kg (7 suppliers, which the file names only by identifier); sum of these -0.625 kg; lognormal variance with pedigree 0.0206, pedigree (1,3,4,5,1)
  EcoSpold01Location=CH
  production volume
    (same comment as for hazardous waste, for incineration)
  properties: carbon content, fossil 0.825301, dry mass 0.996 kg, heating value, net 42.47 MJ, water content 0.00401606, wet mass 1 kg
  note on carbon content, fossil: C content in 1 kg DM was calculated using data in Tab A.1, ecoinvent v2.2 report 13_I
- wood chips, dry, measured as dry mass: 6.3882 kg; lognormal variance with pedigree 0.042, pedigree (1,1,5,5,1)
  composite
  EcoSpold01Location=RER
  properties: carbon content, non-fossil 0.494, dry mass 1 kg, heating value, net 9.99 MJ, water content 0.4, wet mass 1.4 kg
  note on carbon content, non-fossil: C content of dry mass is 0.494 kgC/kg dry wood (ecoinvent v2.2 report 9).
- zinc: 0.00054 kg; lognormal variance with pedigree 0.0526, pedigree (1,3,5,5,1)
  EcoSpold01Location=RER
  properties: dry mass 1 kg, wet mass 1 kg
- zinc coat, pieces: 0.06 m2; lognormal variance with pedigree 0.052, pedigree (1,1,5,5,1)
  EcoSpold01Location=RER
  composite

## Emissions to nature
- Ethylene dichloride [air, unspecified]: 3.67e-6 kg; lognormal variance with pedigree 0.1726, pedigree (1,3,5,5,1)
- NMVOC, non-methane volatile organic compounds [air, unspecified]: 0.000488 kg; lognormal variance with pedigree 0.1726, pedigree (1,3,5,5,1)

## Sampling procedure
Published study, Internet search

## Extrapolations
see Geography This dataset has been copied from an original dataset covering the geography RER. The uncertainty has been adjusted accordingly.

## Review by Rolf Frischknecht 2007-11-13
passed
