# containerboard production, linerboard, testliner

Dataset: EcoSpold 2, unit process
Geography: RoW
Time period: 2007-01-01 to 2023-12-31
Technology level: current
Classification: ISIC rev.4 ecoinvent: 1702:Manufacture of corrugated paper and paperboard and of containers of paper a
Synonyms: containerboard; recycled liner; linerboard
Scenario: Business-as-Usual
System model: Allocation, cut-off by classification
Generated by: Nora Minas
Database: ecoinvent
isCopyrightProtected: true
accessRestrictedTo: 1

## General comment
This dataset was built as a weighted average of regional datasets of the same activityName. Weights are based on production volumes.
RER: production volume = 9.89e+09 kg/year, weight = 0.97266
CA-QC: production volume = 2.78e+08 kg/year, weight = 0.02734

## Included activities start
The process starts wih the reception of the recovered paper.

## Included activities end
The process for the production of Testliner ends with the production of corrugated board base paper.

## Geography
This dataset is a weighted average built from the following geographies: RER, CA-QC.

## Reference product
- containerboard, linerboard: 1 kg; name linerboardAmount; By-product classification allocatable product; CPC 32151: Corrugated paper and paperboard; HS2017 480810: Paper and paperboard; corrugated, whether or not perforated, in rolls or sheets, other than paper of headin[...]
  production volume 3.6722e10 kg; name linerboardProductionVolume; = 183685954000*0.72*(0.334/0.942)
    Estimation: In Europe corrugated board box production (FEFCO Annual Statistics 2021) has a share of 72% in production volume of "case materials" (FAOSTAT http://www.fao.org/faostat/en/#data/FO). The same share is applied to global production volume of "case materials" and multiplied by European average consumption of testliner in total raw material consumption of corrugated board production (from FEFCO Annual Statistics 2021 (https://www.fefco.org/sites/default/files/documents/Fefco_AnnualEvaluation_2021_0.pdf, last accessed March 2023).
  property price 0.598 EUR2005
    Export prices for the World+ according to: http://faostat.fao.org/site/626/DesktopDefault.aspx?PageID=626#ancor downloaded 28 April 2009; calculated as export value divided by export volume.
  properties: carbon allocation 0.425926 kg, carbon content 0.46, carbon content, non-fossil 0.46, dry mass 0.925926 kg, heating value, net 15.92 MJ, water content 0.08, water in wet mass 0.0740741 kg, wet mass 1 kg

## Inputs from technosphere
- EUR-flat pallet: 1.24369e-8 unit; lognormal variance with pedigree 0.0052, pedigree (3,3,1,5,1)
  Caluclated as weighted average of regional datasets of the same activityName
  properties: carbon content, fossil 0.0311351, carbon content, non-fossil 0.58833, dry mass 18.3333 kg, heating value, net 335.11 MJ, water content 0.2, wet mass 22 kg
- alkylketene dimer sizing agent, for paper production: 0.000532103 kg; lognormal variance with pedigree 0.0029, pedigree (1,2,2,5,1)
  Caluclated as weighted average of regional datasets of the same activityName
  properties: carbon content, non-fossil 0.538229, dry mass 1 kg, heating value, net 16.31 MJ, wet mass 1 kg
- aluminium sulfate, powder: 8.754e-6 kg; lognormal variance with pedigree 0.0029, pedigree (1,2,2,5,1)
  Caluclated as weighted average of regional datasets of the same activityName
  properties: dry mass 1 kg, wet mass 1 kg
- ammonia, anhydrous, liquid: 2.88698e-7, 5.60422e-7, 6.21192e-6, 2.62582e-7, 5.87382e-8, 2.15874e-6, 1.85569e-7 kg (7 suppliers, which the file names only by identifier); sum of these 9.72666e-6 kg; lognormal variance with pedigree 0.0029, pedigree (1,2,2,5,1)
  Caluclated as weighted average of regional datasets of the same activityName
  properties: dry mass 1 kg, wet mass 1 kg
- ammonium chloride: 6.33499e-7 kg; lognormal variance with pedigree 0.002, pedigree (1,1,1,5,1)
  Caluclated as weighted average of regional datasets of the same activityName
  properties: dry mass 1 kg, wet mass 1 kg
- ash from paper production sludge: -0.0109911 kg; name ashAmount; lognormal variance with pedigree 0.0029, pedigree (1,2,2,5,1)
  Caluclated as weighted average of regional datasets of the same activityName
  production volume; = linerboardProductionVolume*ashAmount/linerboardAmount
    calculated with PV of reference product and ratio of amount of reference product and byproduct
  properties: carbon content, non-fossil 0.0092, dry mass 1 kg, wet mass 1 kg
- calcium carbonate, precipitated: 0.00294718 kg; lognormal variance with pedigree 0.0029, pedigree (1,2,2,5,1)
  Caluclated as weighted average of regional datasets of the same activityName
- calcium nitrate: 5.18796e-7 kg; lognormal variance with pedigree 0.002, pedigree (1,1,1,5,1)
  Caluclated as weighted average of regional datasets of the same activityName
  properties: dry mass 1 kg, wet mass 1 kg
- chemical, organic: 0.000359117 kg; lognormal variance with pedigree 0.0208, pedigree (4,4,2,5,3)
  Caluclated as weighted average of regional datasets of the same activityName
  properties: carbon content, fossil 0.628, dry mass 1 kg, heating value, net 19.03 MJ, wet mass 1 kg
  note on carbon content, fossil: This dataset is an unweighted average of 20 organic substances (listed in Tab 88.1, ecoinvent v2.2 report 8, part II), being part of the top100 chemicals included in this database. The C-content has also been calculated as an unweighted average of the C content of the substances composing this dataset.
- core board: 3.38174e-5 kg; lognormal variance with pedigree 0.0046, pedigree (1,4,1,5,1)
  Caluclated as weighted average of regional datasets of the same activityName
  properties: carbon content, non-fossil 0.430314, dry mass 0.945 kg, heating value, net 12.19 MJ, water content 0.0582011, wet mass 1 kg
- diesel, low-sulfur: 1.79634e-6, 8.00559e-6, 9.55912e-5, 4.00413e-6, 2.65566e-7, 3.96636e-6 kg (6 suppliers, which the file names only by identifier); sum of these 0.000113629 kg; lognormal variance with pedigree 0.0046, pedigree (2,3,2,5,2)
  Caluclated as weighted average of regional datasets of the same activityName
  properties: carbon content, fossil 0.865, dry mass 1 kg, heating value, net 42.8 MJ, wet mass 1 kg
- dithiocarbamate-compound: 0.000236969 kg; lognormal variance with pedigree 0.0046, pedigree (2,3,2,5,2)
  Caluclated as weighted average of regional datasets of the same activityName
  properties: carbon content, fossil 0.179339, dry mass 1 kg, wet mass 1 kg
- electricity, medium voltage: 0.00753475, 0.150301, 0.0037626, 0.0023074, 0.000461823, 9.91638e-5, 0.0155209, 0.0446098 kWh (8 suppliers, which the file names only by identifier); sum of these 0.224598 kWh; lognormal variance with pedigree 0.0048, pedigree (1,4,2,5,1)
  Caluclated as weighted average of regional datasets of the same activityName
- ethoxylated alcohol (AE3): 0.000139531 kg; lognormal variance with pedigree 0.006, pedigree (2,4,2,5,2)
  Caluclated as weighted average of regional datasets of the same activityName
  properties: carbon content, fossil 0.207952, carbon content, non-fossil 0.485221, dry mass 1 kg, heating value, net 21 MJ, wet mass 1 kg
- fatty alcohol: 7.97601e-6 kg; lognormal variance with pedigree 0.0046, pedigree (1,4,1,5,1)
  Caluclated as weighted average of regional datasets of the same activityName
  properties: carbon content, fossil 0.0408973, carbon content, non-fossil 0.743434, dry mass 1 kg, heating value, net 41.01 MJ, wet mass 1 kg
- formaldehyde: 6.33499e-7 kg; lognormal variance with pedigree 0.002, pedigree (1,1,1,5,1)
  Caluclated as weighted average of regional datasets of the same activityName
  properties: carbon content, fossil 0.4, dry mass 1 kg, heating value, net 20.19 MJ, wet mass 1 kg
- hard coal: 0.000851034, 0.000201944, 0.00602297, 0.00141449, 0.00086846, 0.00187686, 0.000369322 kg (7 suppliers, which the file names only by identifier); sum of these 0.0116051 kg; lognormal variance with pedigree 0.0046, pedigree (2,3,2,5,2)
  Caluclated as weighted average of regional datasets of the same activityName
  properties: carbon content, fossil 0.845, dry mass 0.94 kg, heating value, net 27.91 MJ, water content 0.0638298, wet mass 1 kg
  note on carbon content, fossil: C content 75-94% (specified in Tab 1.1, report 6, part VI). A mean content of 0.845 kg C/ kg dry hard coal was considered
  note on heating value, net: Based on the Characterization factor of Hard coal in the CED method
- heat, district or industrial, natural gas: 0.60698 MJ; lognormal variance with pedigree 0.0048, pedigree (1,4,2,5,1)
  Caluclated as weighted average of regional datasets of the same activityName
  properties: heating value, net 1 MJ
- heavy fuel oil: 6.02783e-7, 3.51009e-7, 1.78446e-6, 4.17144e-5, 4.50292e-7, 2.31383e-6 kg (6 suppliers, which the file names only by identifier); sum of these 4.72168e-5 kg; lognormal variance with pedigree 0.0046, pedigree (2,3,2,5,2)
  Caluclated as weighted average of regional datasets of the same activityName
  properties: carbon content, fossil 0.849, dry mass 1 kg, heating value, net 41.2 MJ, wet mass 1 kg
- iron sulfate: 2.45376e-7 kg; lognormal variance with pedigree 0.002, pedigree (1,1,1,5,1)
  Caluclated as weighted average of regional datasets of the same activityName
  properties: dry mass 1 kg, wet mass 1 kg
- kaolin: 0.00124501 kg; lognormal variance with pedigree 0.0046, pedigree (2,3,2,5,2)
  Caluclated as weighted average of regional datasets of the same activityName
  properties: dry mass 1 kg, wet mass 1 kg
- light fuel oil: 2.60376e-6, 0.000272822, 1.34175e-5, 2.70798e-5, 1.93502e-6, 1.79698e-6 kg (6 suppliers, which the file names only by identifier); sum of these 0.000319656 kg; lognormal variance with pedigree 0.0046, pedigree (2,3,2,5,2)
  Caluclated as weighted average of regional datasets of the same activityName
  properties: carbon content, fossil 0.862, dry mass 1 kg, heating value, net 42.6 MJ, wet mass 1 kg
- lignite briquettes: 0.154654 MJ; lognormal variance with pedigree 0.0029, pedigree (1,2,2,5,1)
  Caluclated as weighted average of regional datasets of the same activityName
  properties: carbon content, fossil 0.65679, dry mass 0.0415385 kg, heating value, net 19.5 MJ, water content 0.234568, wet mass 0.0512821 kg
  note on heating value, net: Based on literature, page 52, Report 5: Dones, R., Bauer, C., Bolliger, R., Burger, B., faist Emmenegger, M., Frischknecht, R., Heck, T., Jungbluth, N., Röder, A., Tuchschmid, M. (2007) Life Cycle Inventories of Energy Systems: Resulst for current Systems in Switzerland and other UCTE Countries. ecoinvent report No. 5. Paul Scherrer Institut Villigen, Swiss Centre for Life Cycle Inventories, Dübendorf, CH
- liquefied petroleum gas: 1.11833e-7, 1.07399e-6, 3.37152e-7, 7.5042e-8, 3.81463e-6, 1.59646e-5 kg (6 suppliers, which the file names only by identifier); sum of these 2.13773e-5 kg; lognormal variance with pedigree 0.0046, pedigree (2,3,2,5,2)
  Caluclated as weighted average of regional datasets of the same activityName
  properties: carbon content, fossil 0.821863, dry mass 1 kg, heating value, net 45.5 MJ, wet mass 1 kg
  note on heating value, net: Indicative value. Reference: Fuels - Higher and Lower Calorific Values, available at: https://www.engineeringtoolbox.com/fuels-higher-calorific-values-d_169.html
- lubricating oil: 5.49201e-5 kg; lognormal variance with pedigree 0.0034, pedigree (1,3,2,5,1)
  Caluclated as weighted average of regional datasets of the same activityName
  properties: carbon content, fossil 0.75, dry mass 1 kg, heating value, net 40.2 MJ, wet mass 1 kg
  note on carbon content, fossil: Lubricating oil is produced from diesel. C-content/dry mass of fats and oils considered 75%, from: ecoinvent v2.2 report, n 15a, pg 40
  note on heating value, net: Literature value, Source: IPCC 2006, 2006 IPCC Guidelines for National Greenhouse Gas Inventories, Prepared by the National Greenhouse Gas Inventories Programme, Eggleston H.S., Buendia L., Miwa K., Ngara T. and Tanabe K. (eds). Published: IGES, Japan
- maize starch: 0.0358586 kg; lognormal variance with pedigree 0.0046, pedigree (2,3,2,5,2)
  Caluclated as weighted average of regional datasets of the same activityName
  properties: carbon content, non-fossil 0.46, dry mass 0.86 kg, heating value, net 11.64 MJ, water content 0.162791, wet mass 1 kg
  note on carbon content, non-fossil: C-content of starch is considered 46% on dry mass basis (from "Evolutionary and Biochemical Aspects", A.D. Kay and T. Vrede (in Global Ecology, 2010, Elsevier B.V., S.E. Jørgensen Ed.)).
- methanol: 5.99275e-8, 1.1622e-7, 1.10073e-8 kg (3 suppliers, which the file names only by identifier); sum of these 1.87155e-7 kg; lognormal variance with pedigree 0.002, pedigree (1,1,1,5,1)
  Caluclated as weighted average of regional datasets of the same activityName
  properties: carbon content, fossil 0.375, dry mass 1 kg, heating value, net 20 MJ, wet mass 1 kg
  note on heating value, net: Based on literature, page 533, Report 17: Jungbluth, N., Chudacoff, M., Dauriat, A., Dinkel, F., Doka, G., Faist Emmenegger, M., Gnansounou, E., Kljun, N., Schleiss, K., Spielmann, M., Stettler, C., Sutter, J. 2007: Life Cycle Inventories of Bioenergy. ecoinvent report No. 17, Swiss Centre for Life Cycle Inventories, Dübendorf, CH.
- municipal solid waste: -8.47489e-5, -1.00636e-5, -0.0478153, -7.04209e-6, -2.26038e-6, -5.10909e-6, -0.000212693 kg (7 suppliers, which the file names only by identifier); sum of these -0.0481372 kg; lognormal variance with pedigree 0.006, pedigree (2,4,2,5,2)
  Caluclated as weighted average of regional datasets of the same activityName
  production volume; = linerboardProductionVolume*MSWAmount/linerboardAmount
    (same comment as for ash from paper production sludge)
  properties: carbon content, fossil 0.171549, carbon content, non-fossil 0.261655, dry mass 0.771 kg, heating value, net 11.74 MJ, water content 0.297017, wet mass 1 kg
  note on carbon content, fossil: MSW composition in tab 4.1, ecoinvent v2.2 report 13_I. C content referred to 1 kg DM
  note on heating value, net: Value taken from the general comment of the treatment dataset.
- natural gas, high pressure: 0.000873879, 0.00147413, 0.00321552, 0.0010761, 0.00025148, 0.00149676, 0.00143625, 0.00377666, 0.00145804, 0.00225518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 m3 (36 suppliers, which the file names only by identifier); sum of these 0.108831 m3; lognormal variance with pedigree 0.0046, pedigree (2,3,2,5,2)
  Caluclated as weighted average of regional datasets of the same activityName
  properties: carbon content, fossil 0.741, dry mass 0.735 kg, heating value, gross 40 MJ, heating value, net 36 MJ, wet mass 0.735 kg
  note on heating value, gross: At standard conditions; based on Meili et al. (2022) section 5.2
- nylon 6: 6.56012e-7 kg; lognormal variance with pedigree 0.002, pedigree (1,1,1,5,1)
  Caluclated as weighted average of regional datasets of the same activityName
  properties: carbon content, fossil 0.637168, dry mass 1 kg, heating value, net 30.9 MJ, wet mass 1 kg
  note on carbon content, fossil: It is a chain of caprolactam molecules, originating from aminocarboxylic acids - here caproic acid or caprolactam. The structure of nylon 6 is -(NH-(CH2)5-CO)n-, C6H11NO (ecoinvent v2.2 report 11_II). MW=113 g/mol
  note on heating value, net: Assumed equal to Nylon-66. Reference: Walters, R. N., Hackett, S. M. and Lyon, R. E. (2000) ‘Heats of combustion of high temperature polymers’, Fire and Materials, 24(5), pp. 245–252. doi: 10.1002/1099-1018(200009/10)24:5<245::AID-FAM744>3.0.CO;2-7.
- paper mill, integrated: 5.43493e-11 unit; lognormal variance with pedigree 0.4706, pedigree (4,3,5,5,5)
  Caluclated as weighted average of regional datasets of the same activityName
- phosphoric acid, fertiliser grade, without water, in 70% solution state: 2.6984e-6 kg; lognormal variance with pedigree 0.002, pedigree (1,1,1,5,1)
  Caluclated as weighted average of regional datasets of the same activityName
  properties: dry mass 1 kg, wet mass 1 kg
- pitch despergents, in paper production: 2.43167e-5 kg; lognormal variance with pedigree 0.0029, pedigree (1,2,2,5,1)
  Caluclated as weighted average of regional datasets of the same activityName
  properties: carbon content, fossil 0.290994, dry mass 1 kg, heating value, net 8.82 MJ, wet mass 1 kg
- polyaluminium chloride: 0.000126447 kg; lognormal variance with pedigree 0.0029, pedigree (1,2,2,5,1)
  Caluclated as weighted average of regional datasets of the same activityName
- potato starch: 0.0174337 kg; lognormal variance with pedigree 0.006, pedigree (2,4,2,5,2)
  Caluclated as weighted average of regional datasets of the same activityName
  properties: carbon content, non-fossil 0.46, dry mass 0.8 kg, heating value, net 10.66 MJ, water content 0.25, wet mass 1 kg
- propane, burned in building machine: 0.00035534 MJ; lognormal variance with pedigree 0.0046, pedigree (1,4,1,5,1)
  Caluclated as weighted average of regional datasets of the same activityName
  properties: heating value, net 1 MJ
- quicklime, milled, loose: 0.0001459 kg; lognormal variance with pedigree 0.0029, pedigree (1,2,2,5,1)
  Caluclated as weighted average of regional datasets of the same activityName
  properties: dry mass 0.99 kg, water content 0.010101, wet mass 1 kg
- retention aid, for paper production: 0.00105664 kg; lognormal variance with pedigree 0.006, pedigree (2,4,2,5,2)
  Caluclated as weighted average of regional datasets of the same activityName
  properties: carbon content, fossil 0.5, dry mass 1 kg, heating value, net 15.15 MJ, wet mass 1 kg
- sludge from pulp and paper production: -0.137835 kg; name sludgeAmount; lognormal variance with pedigree 0.0029, pedigree (1,2,2,5,1)
  Caluclated as weighted average of regional datasets of the same activityName
  production volume; = linerboardProductionVolume*sludgeAmount/linerboardAmount
    (same comment as for ash from paper production sludge)
  properties: carbon content, non-fossil 0.21, dry mass 0.75 kg, heating value, net 2.65 MJ, water content 0.333333, wet mass 1 kg
- sodium chlorate, powder: 3.89066e-5 kg; lognormal variance with pedigree 0.0029, pedigree (1,2,2,5,1)
  Caluclated as weighted average of regional datasets of the same activityName
  properties: dry mass 1 kg, wet mass 1 kg
- sodium hydroxide, without water, in 50% solution state: 0.000330935 kg; lognormal variance with pedigree 0.0029, pedigree (1,2,2,5,1)
  Caluclated as weighted average of regional datasets of the same activityName
  properties: dry mass 1 kg, heating value, net 3.03 MJ, wet mass 1 kg
- sodium hypochlorite, without water, in 15% solution state: 4.05634e-8 kg; lognormal variance with pedigree 0.002, pedigree (1,1,1,5,1)
  Caluclated as weighted average of regional datasets of the same activityName
  properties: dry mass 1 kg, wet mass 1 kg
- sulfate pulp, bleached: 0.000324222 kg; lognormal variance with pedigree 0.0029, pedigree (1,2,2,5,1)
  Caluclated as weighted average of regional datasets of the same activityName
  properties: carbon content, non-fossil 0.494, dry mass 0.9 kg, heating value, net 13.23 MJ, water content 0.111111, wet mass 1 kg
  note on carbon content, non-fossil: C content of dry mass of sulfate pulp is 0.494 kgC/kg dry wood (ecoinvent v2.2 report 6_IX & ecoinvent v2.2 report 9). No other C containing products in the formulation of the pulp.
- sulfuric acid: 6.80866e-5 kg; lognormal variance with pedigree 0.0029, pedigree (1,2,2,5,1)
  Caluclated as weighted average of regional datasets of the same activityName
  properties: dry mass 1 kg, wet mass 1 kg
- tap water: 0.000874897, 0.00133371, 0.00248863, 0.00670418, 0.0336308, 0.384854 kg (6 suppliers, which the file names only by identifier); sum of these 0.429886 kg; lognormal variance with pedigree 0.0034, pedigree (1,3,2,5,1)
  Caluclated as weighted average of regional datasets of the same activityName
  properties: carbon content, fossil 0.00178991, dry mass 0.000337476 kg, water content 2962.17, wet mass 1 kg
  note on carbon content, fossil: Bicarbonate content is 2.93 mol/m3. CO2 content is 0.1 mol/m3 (ecoinvent v2.2 report 8, Tab 93.1).
- textile, woven cotton: 6.56012e-7 kg; lognormal variance with pedigree 0.002, pedigree (1,1,1,5,1)
  Caluclated as weighted average of regional datasets of the same activityName
  properties: carbon content, non-fossil 0.46, dry mass 1 kg, heating value, net 13.94 MJ, wet mass 1 kg
  note on carbon content, non-fossil: Cotton fibers are considered to have a 46% C-content in dry mass ("Evolutionary and Biochemical Aspects", A.D. Kay and T. Vrede (in Global Ecology, 2010, Elsevier B.V., S.E. Jørgensen Ed.)
- triazine-compound: 0.000236969 kg; lognormal variance with pedigree 0.0046, pedigree (2,3,2,5,2)
  Caluclated as weighted average of regional datasets of the same activityName
  properties: carbon content, fossil 0.475616, dry mass 1 kg, wet mass 1 kg
- urea: 6.63504e-6, 5.66585e-6 kg (2 suppliers, which the file names only by identifier); sum of these 1.23009e-5 kg; lognormal variance with pedigree 0.002, pedigree (1,1,1,5,1)
  Caluclated as weighted average of regional datasets of the same activityName
  properties: carbon content, fossil 0.2, dry mass 1 kg, wet mass 1 kg
- waste mineral oil: -4.21867e-5 kg; name wasteLubricantsOilAmount; lognormal variance with pedigree 0.0048, pedigree (1,4,2,5,1)
  Caluclated as weighted average of regional datasets of the same activityName
  production volume; = linerboardProductionVolume*wasteLubricantsOilAmount/linerboardAmount
    (same comment as for ash from paper production sludge)
  properties: carbon content, fossil 0.864444, dry mass 0.9 kg, heating value, net 34.7 MJ, water content 0.111111, wet mass 1 kg
  note on carbon content, fossil: Tab A.6, ecoinvent v2.2 report 13_I. C content has been calculated after data in the tables, and then referred to 1 kg DM
- waste paperboard, sorted: 1.06593 kg; lognormal variance with pedigree 0.0048, pedigree (1,4,2,5,1)
  Caluclated as weighted average of regional datasets of the same activityName
  properties: heating value, net 15.92 MJ
- water, deionised: 0.000650827 kg; lognormal variance with pedigree 0.002, pedigree (1,1,1,5,1)
  Caluclated as weighted average of regional datasets of the same activityName
  properties: wet mass 1 kg
- wood chips, dry, measured as dry mass: 0.0251749 kg; lognormal variance with pedigree 0.0046, pedigree (2,3,2,5,2)
  Caluclated as weighted average of regional datasets of the same activityName
  properties: carbon content, non-fossil 0.494, dry mass 1 kg, heating value, net 9.99 MJ, water content 0.4, wet mass 1.4 kg
  note on carbon content, non-fossil: C content of dry mass is 0.494 kgC/kg dry wood (ecoinvent v2.2 report 9).
- wood chips, from post-consumer wood, measured as dry mass: 0.0102988 kg; lognormal variance with pedigree 0.0046, pedigree (2,3,2,5,2)
  Caluclated as weighted average of regional datasets of the same activityName
  properties: carbon content, non-fossil 0.494, dry mass 1 kg, heating value, net 9.99 MJ, water content 0.4, wet mass 1.4 kg

## Inputs from nature
- Oxygen [natural resource, in air]: 0.248127 kg; lognormal variance with pedigree 0.0194, pedigree (4,3,2,5,3)
  Caluclated as weighted average of regional datasets of the same activityName
- Water, river [natural resource, in water]: 0.00454704 m3; lognormal variance with pedigree 0.0054, pedigree (2,4,2,5,1)
  Caluclated as weighted average of regional datasets of the same activityName
- Water, well, in ground [natural resource, in water]: 0.00304445 m3; lognormal variance with pedigree 0.0029, pedigree (1,2,2,5,1)
  Caluclated as weighted average of regional datasets of the same activityName

## Emissions to nature
- Acetaldehyde [air, unspecified]: 5.16346e-8 kg; lognormal variance with pedigree 0.0528, pedigree (3,3,2,5,3)
  Caluclated as weighted average of regional datasets of the same activityName
- Acetic acid [air, unspecified]: 6.27785e-7 kg; lognormal variance with pedigree 0.0528, pedigree (3,3,2,5,3)
  Caluclated as weighted average of regional datasets of the same activityName
- Acetone [air, unspecified]: 2.87557e-10 kg; lognormal variance with pedigree 0.0528, pedigree (3,3,2,5,3)
  Caluclated as weighted average of regional datasets of the same activityName
- Acetylene [air, unspecified]: 9.35228e-7 kg; lognormal variance with pedigree 0.0528, pedigree (3,3,2,5,3)
  Caluclated as weighted average of regional datasets of the same activityName
- Aluminium III [air, unspecified]: 5.3063e-6 kg; lognormal variance with pedigree 0.6628, pedigree (3,3,2,5,3)
  Caluclated as weighted average of regional datasets of the same activityName
- Ammonia [air, unspecified]: 1.34054e-6 kg; lognormal variance with pedigree 0.0528, pedigree (3,3,2,5,3)
  Caluclated as weighted average of regional datasets of the same activityName
- Antimony ion [air, unspecified]: 4.42453e-9 kg; lognormal variance with pedigree 0.4128, pedigree (3,3,2,5,3)
  Caluclated as weighted average of regional datasets of the same activityName
- Arsenic ion [air, unspecified]: 1.68033e-8 kg; lognormal variance with pedigree 0.0528, pedigree (3,3,2,5,3)
  Caluclated as weighted average of regional datasets of the same activityName
- Barium II [air, unspecified]: 7.9941e-8 kg; lognormal variance with pedigree 0.0528, pedigree (3,3,2,5,3)
  Caluclated as weighted average of regional datasets of the same activityName
- Benzene [air, unspecified]: 3.31021e-6 kg; lognormal variance with pedigree 0.0528, pedigree (3,3,2,5,3)
  Caluclated as weighted average of regional datasets of the same activityName
- Benzo(a)pyrene [air, unspecified]: 3.5253e-9 kg; lognormal variance with pedigree 0.0528, pedigree (3,3,2,5,3)
  Caluclated as weighted average of regional datasets of the same activityName
- Beryllium II [air, unspecified]: 7.9941e-10 kg; lognormal variance with pedigree 0.0528, pedigree (3,3,2,5,3)
  Caluclated as weighted average of regional datasets of the same activityName
- Boron [air, unspecified]: 1.91659e-6 kg; lognormal variance with pedigree 0.6628, pedigree (3,3,2,5,3)
  Caluclated as weighted average of regional datasets of the same activityName
- Bromine [air, unspecified]: 5.18177e-8 kg; lognormal variance with pedigree 0.0528, pedigree (3,3,2,5,3)
  Caluclated as weighted average of regional datasets of the same activityName
- Butane [air, unspecified]: 2.93011e-6 kg; lognormal variance with pedigree 0.0528, pedigree (3,3,2,5,3)
  Caluclated as weighted average of regional datasets of the same activityName
- Cadmium II [air, unspecified]: 2.24546e-9 kg; lognormal variance with pedigree 0.6628, pedigree (3,3,2,5,3)
  Caluclated as weighted average of regional datasets of the same activityName
- Calcium II [air, unspecified]: 1.2742e-5 kg; lognormal variance with pedigree 0.0528, pedigree (3,3,2,5,3)
  Caluclated as weighted average of regional datasets of the same activityName
- Carbon dioxide, fossil [air, unspecified]: 0.291207 kg; lognormal variance with pedigree 0.0029, pedigree (1,2,2,5,1)
  Caluclated as weighted average of regional datasets of the same activityName
- Carbon dioxide, non-fossil [air, unspecified]: 0.0499172 kg; lognormal variance with pedigree 0.0029, pedigree (1,2,2,5,1)
  Caluclated as weighted average of regional datasets of the same activityName
- Carbon monoxide, fossil [air, unspecified]: 5.56324e-5 kg; lognormal variance with pedigree 0.6688, pedigree (4,3,2,5,3)
  Caluclated as weighted average of regional datasets of the same activityName
- Carbon monoxide, non-fossil [air, unspecified]: 9.53624e-6 kg; lognormal variance with pedigree 0.6688, pedigree (4,3,2,5,3)
  Caluclated as weighted average of regional datasets of the same activityName
- Chlorine [air, unspecified]: 1.39189e-7 kg; lognormal variance with pedigree 0.0528, pedigree (3,3,2,5,3)
  Caluclated as weighted average of regional datasets of the same activityName
- Chromium III [air, unspecified]: 2.1201e-8 kg; lognormal variance with pedigree 0.6628, pedigree (3,3,2,5,3)
  Caluclated as weighted average of regional datasets of the same activityName
- Chromium VI [air, unspecified]: 1.04101e-9 kg; lognormal variance with pedigree 0.6628, pedigree (3,3,2,5,3)
  Caluclated as weighted average of regional datasets of the same activityName
- Cobalt II [air, unspecified]: 6.94822e-9 kg; lognormal variance with pedigree 0.6628, pedigree (3,3,2,5,3)
  Caluclated as weighted average of regional datasets of the same activityName
- Copper ion [air, unspecified]: 3.94238e-8 kg; lognormal variance with pedigree 0.6628, pedigree (3,3,2,5,3)
  Caluclated as weighted average of regional datasets of the same activityName
- Dinitrogen monoxide [air, unspecified]: 2.6963e-6 kg; lognormal variance with pedigree 0.0528, pedigree (3,3,2,5,3)
  Caluclated as weighted average of regional datasets of the same activityName
- Dioxins, measured as 2,3,7,8-tetrachlorodibenzo-p-dioxin [air, unspecified]: 3.08935e-14 kg; lognormal variance with pedigree 0.0528, pedigree (3,3,2,5,3)
  Caluclated as weighted average of regional datasets of the same activityName
- Ethane [air, unspecified]: 2.80568e-6 kg; lognormal variance with pedigree 0.0528, pedigree (3,3,2,5,3)
  Caluclated as weighted average of regional datasets of the same activityName
- Ethanol [air, unspecified]: 5.75113e-10 kg; lognormal variance with pedigree 0.0528, pedigree (3,3,2,5,3)
  Caluclated as weighted average of regional datasets of the same activityName
- Ethyl benzene [air, unspecified]: 2.31981e-8 kg; lognormal variance with pedigree 0.0528, pedigree (3,3,2,5,3)
  Caluclated as weighted average of regional datasets of the same activityName
- Ethylene [air, unspecified]: 5.61137e-6 kg; lognormal variance with pedigree 0.0528, pedigree (3,3,2,5,3)
  Caluclated as weighted average of regional datasets of the same activityName
- Fluorine [air, unspecified]: 3.86635e-8 kg; lognormal variance with pedigree 0.0528, pedigree (3,3,2,5,3)
  Caluclated as weighted average of regional datasets of the same activityName
- Formaldehyde [air, unspecified]: 5.77116e-7 kg; lognormal variance with pedigree 0.0528, pedigree (3,3,2,5,3)
  Caluclated as weighted average of regional datasets of the same activityName
- Hexachlorobenzene [air, unspecified]: 5.56754e-15 kg; lognormal variance with pedigree 0.0528, pedigree (3,3,2,5,3)
  Caluclated as weighted average of regional datasets of the same activityName
- Hydrocarbons, aliphatic, alkanes, unspecified [air, unspecified]: 1.6489e-6 kg; lognormal variance with pedigree 0.0528, pedigree (3,3,2,5,3)
  Caluclated as weighted average of regional datasets of the same activityName
- Hydrocarbons, aliphatic, unsaturated [air, unspecified]: 3.33242e-6 kg; lognormal variance with pedigree 0.0528, pedigree (3,3,2,5,3)
  Caluclated as weighted average of regional datasets of the same activityName
- Hydrocarbons, aromatic [air, unspecified]: 8.40662e-10 kg; lognormal variance with pedigree 0.0528, pedigree (3,3,2,5,3)
  Caluclated as weighted average of regional datasets of the same activityName
- Hydrochloric acid [air, unspecified]: 1.3635e-5 kg; lognormal variance with pedigree 0.0528, pedigree (3,3,2,5,3)
  Caluclated as weighted average of regional datasets of the same activityName
- Hydrogen fluoride [air, unspecified]: 4.27571e-7 kg; lognormal variance with pedigree 0.0528, pedigree (3,3,2,5,3)
  Caluclated as weighted average of regional datasets of the same activityName
- Hydrogen sulfide [air, unspecified]: 1.54654e-8 kg; lognormal variance with pedigree 0.0528, pedigree (3,3,2,5,3)
  Caluclated as weighted average of regional datasets of the same activityName
- Iodine [air, unspecified]: 1.07294e-8 kg; lognormal variance with pedigree 0.0528, pedigree (3,3,2,5,3)
  Caluclated as weighted average of regional datasets of the same activityName
- Iron ion [air, unspecified]: 3.53658e-6 kg; lognormal variance with pedigree 0.6628, pedigree (3,3,2,5,3)
  Caluclated as weighted average of regional datasets of the same activityName
- Lead II [air, unspecified]: 5.0024e-8 kg; lognormal variance with pedigree 0.6628, pedigree (3,3,2,5,3)
  Caluclated as weighted average of regional datasets of the same activityName
- Lead-210 [air, unspecified]: 2.46507e-5 kBq; lognormal variance with pedigree 0.3128, pedigree (3,3,2,5,3)
  Caluclated as weighted average of regional datasets of the same activityName
- Magnesium [air, unspecified]: 2.6783e-6 kg; lognormal variance with pedigree 0.6628, pedigree (3,3,2,5,3)
  Caluclated as weighted average of regional datasets of the same activityName
- Manganese II [air, unspecified]: 1.42527e-7 kg; lognormal variance with pedigree 0.6628, pedigree (3,3,2,5,3)
  Caluclated as weighted average of regional datasets of the same activityName
- Mercury II [air, unspecified]: 3.04979e-9 kg; lognormal variance with pedigree 0.6628, pedigree (3,3,2,5,3)
  Caluclated as weighted average of regional datasets of the same activityName
- Methane, fossil [air, unspecified]: 5.74972e-5 kg; lognormal variance with pedigree 0.0528, pedigree (3,3,2,5,3)
  Caluclated as weighted average of regional datasets of the same activityName
- Methane, non-fossil [air, unspecified]: 3.4836e-6 kg; lognormal variance with pedigree 0.0528, pedigree (3,3,2,5,3)
  Caluclated as weighted average of regional datasets of the same activityName
- Methanol [air, unspecified]: 9.77693e-10 kg; lognormal variance with pedigree 0.0528, pedigree (3,3,2,5,3)
  Caluclated as weighted average of regional datasets of the same activityName
- Molybdenum VI [air, unspecified]: 8.38641e-9 kg; lognormal variance with pedigree 0.6628, pedigree (3,3,2,5,3)
  Caluclated as weighted average of regional datasets of the same activityName
- NMVOC, non-methane volatile organic compounds [air, unspecified]: 1.01691e-5 kg; lognormal variance with pedigree 0.0528, pedigree (3,3,2,5,3)
  Caluclated as weighted average of regional datasets of the same activityName
- Nickel II [air, unspecified]: 2.05332e-8 kg; lognormal variance with pedigree 0.6628, pedigree (3,3,2,5,3)
  Caluclated as weighted average of regional datasets of the same activityName
- Nitrogen oxides [air, unspecified]: 0.00052524 kg; lognormal variance with pedigree 0.0423, pedigree (1,2,2,5,1)
  Caluclated as weighted average of regional datasets of the same activityName
- PAH, polycyclic aromatic hydrocarbons [air, unspecified]: 5.03708e-8 kg; lognormal variance with pedigree 0.3128, pedigree (3,3,2,5,3)
  Caluclated as weighted average of regional datasets of the same activityName
- Particulate Matter, < 2.5 um [air, unspecified]: 2.0426e-6 kg; lognormal variance with pedigree 0.3023, pedigree (1,2,2,5,1)
  Caluclated as weighted average of regional datasets of the same activityName
- Particulate Matter, > 10 um [air, unspecified]: 5.93326e-6 kg; lognormal variance with pedigree 0.0423, pedigree (1,2,2,5,1)
  Caluclated as weighted average of regional datasets of the same activityName
- Particulate Matter, > 2.5 um and < 10um [air, unspecified]: 1.06993e-6 kg; lognormal variance with pedigree 0.1223, pedigree (1,2,2,5,1)
  Caluclated as weighted average of regional datasets of the same activityName
- Pentachlorophenol [air, unspecified]: 6.26348e-12 kg; lognormal variance with pedigree 0.0528, pedigree (3,3,2,5,3)
  Caluclated as weighted average of regional datasets of the same activityName
- Pentane [air, unspecified]: 5.01695e-6 kg; lognormal variance with pedigree 0.0528, pedigree (3,3,2,5,3)
  Caluclated as weighted average of regional datasets of the same activityName
- Phenol [air, unspecified]: 7.7327e-8 kg; lognormal variance with pedigree 0.0528, pedigree (3,3,2,5,3)
  Caluclated as weighted average of regional datasets of the same activityName
- Phosphorus [air, unspecified]: 2.68072e-7 kg; lognormal variance with pedigree 0.0528, pedigree (3,3,2,5,3)
  Caluclated as weighted average of regional datasets of the same activityName
- Polonium-210 [air, unspecified]: 4.51635e-5 kBq; lognormal variance with pedigree 0.3128, pedigree (3,3,2,5,3)
  Caluclated as weighted average of regional datasets of the same activityName
- Potassium I [air, unspecified]: 1.87377e-5 kg; lognormal variance with pedigree 0.6628, pedigree (3,3,2,5,3)
  Caluclated as weighted average of regional datasets of the same activityName
- Potassium-40 [air, unspecified]: 6.9556e-6 kBq; lognormal variance with pedigree 0.3128, pedigree (3,3,2,5,3)
  Caluclated as weighted average of regional datasets of the same activityName
- Propane [air, unspecified]: 2.7064e-6 kg; lognormal variance with pedigree 0.0528, pedigree (3,3,2,5,3)
  Caluclated as weighted average of regional datasets of the same activityName
- Propionic acid [air, unspecified]: 8.35514e-8 kg; lognormal variance with pedigree 0.0528, pedigree (3,3,2,5,3)
  Caluclated as weighted average of regional datasets of the same activityName
- Propylene [air, unspecified]: 9.35228e-7 kg; lognormal variance with pedigree 0.0528, pedigree (3,3,2,5,3)
  Caluclated as weighted average of regional datasets of the same activityName
- Radium-226 [air, unspecified]: 6.36147e-6 kBq; lognormal variance with pedigree 0.3128, pedigree (3,3,2,5,3)
  Caluclated as weighted average of regional datasets of the same activityName
- Radium-228 [air, unspecified]: 2.23846e-5 kBq; lognormal variance with pedigree 0.3128, pedigree (3,3,2,5,3)
  Caluclated as weighted average of regional datasets of the same activityName
- Radon-220 [air, unspecified]: 9.42533e-7 kBq; lognormal variance with pedigree 0.3128, pedigree (3,3,2,5,3)
  Caluclated as weighted average of regional datasets of the same activityName
- Radon-222 [air, unspecified]: 9.42533e-7 kBq; lognormal variance with pedigree 0.3128, pedigree (3,3,2,5,3)
  Caluclated as weighted average of regional datasets of the same activityName
- Scandium [air, unspecified]: 5.05877e-10 kg; lognormal variance with pedigree 0.0528, pedigree (3,3,2,5,3)
  Caluclated as weighted average of regional datasets of the same activityName
- Selenium IV [air, unspecified]: 1.48165e-8 kg; lognormal variance with pedigree 0.0528, pedigree (3,3,2,5,3)
  Caluclated as weighted average of regional datasets of the same activityName
- Silicon [air, unspecified]: 2.3831e-5 kg; lognormal variance with pedigree 0.0528, pedigree (3,3,2,5,3)
  Caluclated as weighted average of regional datasets of the same activityName
- Sodium I [air, unspecified]: 1.56247e-6 kg; lognormal variance with pedigree 0.0528, pedigree (3,3,2,5,3)
  Caluclated as weighted average of regional datasets of the same activityName
- Strontium II [air, unspecified]: 1.02528e-7 kg; lognormal variance with pedigree 0.0528, pedigree (3,3,2,5,3)
  Caluclated as weighted average of regional datasets of the same activityName
- Sulfur dioxide [air, unspecified]: 7.8786e-5 kg; lognormal variance with pedigree 0.0029, pedigree (1,2,2,5,1)
  Caluclated as weighted average of regional datasets of the same activityName
- Thallium I [air, unspecified]: 5.31276e-10 kg; lognormal variance with pedigree 0.0528, pedigree (3,3,2,5,3)
  Caluclated as weighted average of regional datasets of the same activityName
- Thorium [air, unspecified]: 1.08404e-9 kg; lognormal variance with pedigree 0.0528, pedigree (3,3,2,5,3)
  Caluclated as weighted average of regional datasets of the same activityName
- Thorium-228 [air, unspecified]: 2.92598e-6 kBq; lognormal variance with pedigree 0.3128, pedigree (3,3,2,5,3)
  Caluclated as weighted average of regional datasets of the same activityName
- Thorium-232 [air, unspecified]: 1.84512e-6 kBq; lognormal variance with pedigree 0.3128, pedigree (3,3,2,5,3)
  Caluclated as weighted average of regional datasets of the same activityName
- Tin ion [air, unspecified]: 5.17117e-10 kg; lognormal variance with pedigree 0.6628, pedigree (3,3,2,5,3)
  Caluclated as weighted average of regional datasets of the same activityName
- Titanium ion [air, unspecified]: 1.61892e-7 kg; lognormal variance with pedigree 0.6628, pedigree (3,3,2,5,3)
  Caluclated as weighted average of regional datasets of the same activityName
- Toluene [air, unspecified]: 1.25515e-6 kg; lognormal variance with pedigree 0.0528, pedigree (3,3,2,5,3)
  Caluclated as weighted average of regional datasets of the same activityName
- Uranium [air, unspecified]: 1.60051e-9 kg; lognormal variance with pedigree 0.0528, pedigree (3,3,2,5,3)
  Caluclated as weighted average of regional datasets of the same activityName
- Uranium-238 [air, unspecified]: 5.31154e-6 kBq; lognormal variance with pedigree 0.3128, pedigree (3,3,2,5,3)
  Caluclated as weighted average of regional datasets of the same activityName
- Vanadium V [air, unspecified]: 3.47625e-8 kg; lognormal variance with pedigree 0.0528, pedigree (3,3,2,5,3)
  Caluclated as weighted average of regional datasets of the same activityName
- Water [air, unspecified]: 0.00175319 m3; lognormal variance with pedigree 0.0448, pedigree (2,4,2,5,1)
  Caluclated as weighted average of regional datasets of the same activityName
- Xylenes, unspecified [air, unspecified]: 5.4275e-7 kg; lognormal variance with pedigree 0.0528, pedigree (3,3,2,5,3)
  Caluclated as weighted average of regional datasets of the same activityName
- Zinc II [air, unspecified]: 2.47578e-7 kg; lognormal variance with pedigree 0.6628, pedigree (3,3,2,5,3)
  Caluclated as weighted average of regional datasets of the same activityName
- m-Xylene [air, unspecified]: 9.27924e-8 kg; lognormal variance with pedigree 0.0528, pedigree (3,3,2,5,3)
  Caluclated as weighted average of regional datasets of the same activityName
- AOX, Adsorbable Organic Halides [water, unspecified]: 2.51117e-5 kg; lognormal variance with pedigree 0.0508, pedigree (2,5,2,5,1)
  Caluclated as weighted average of regional datasets of the same activityName
- Aluminium III [water, unspecified]: 3.17619e-6 kg; lognormal variance with pedigree 0.044, pedigree (1,4,1,5,1)
  Caluclated as weighted average of regional datasets of the same activityName
- Ammonium [water, unspecified]: 5.57501e-8 kg; lognormal variance with pedigree 0.0822, pedigree (1,1,2,5,4)
  Caluclated as weighted average of regional datasets of the same activityName
- Antimony ion [water, unspecified]: 7.65348e-8 kg; lognormal variance with pedigree 0.044, pedigree (1,4,1,5,1)
  Caluclated as weighted average of regional datasets of the same activityName
- Arsenic ion [water, unspecified]: 5.30276e-7 kg; lognormal variance with pedigree 0.654, pedigree (1,4,1,5,1)
  Caluclated as weighted average of regional datasets of the same activityName
- BOD5, Biological Oxygen Demand [water, unspecified]: 0.000197595 kg; lognormal variance with pedigree 0.0442, pedigree (1,4,2,5,1)
  Caluclated as weighted average of regional datasets of the same activityName
- Barium II [water, unspecified]: 4.51555e-6 kg; lognormal variance with pedigree 0.044, pedigree (1,4,1,5,1)
  Caluclated as weighted average of regional datasets of the same activityName
- Beryllium II [water, unspecified]: 7.1068e-8 kg; lognormal variance with pedigree 0.044, pedigree (1,4,1,5,1)
  Caluclated as weighted average of regional datasets of the same activityName
- COD, Chemical Oxygen Demand [water, unspecified]: 0.0020731 kg; lognormal variance with pedigree 0.0442, pedigree (1,4,2,5,1)
  Caluclated as weighted average of regional datasets of the same activityName
- Cadmium II [water, unspecified]: 1.12069e-7 kg; lognormal variance with pedigree 0.654, pedigree (1,4,1,5,1)
  Caluclated as weighted average of regional datasets of the same activityName
- Chlorides, unspecified [water, unspecified]: 2.07737e-5 kg; lognormal variance with pedigree 0.0506, pedigree (2,5,1,5,1)
  Caluclated as weighted average of regional datasets of the same activityName
- Chromium III [water, unspecified]: 7.05213e-7 kg; lognormal variance with pedigree 0.654, pedigree (1,4,1,5,1)
  Caluclated as weighted average of regional datasets of the same activityName
- Copper ion [water, unspecified]: 1.27102e-7 kg; lognormal variance with pedigree 0.654, pedigree (1,4,1,5,1)
  Caluclated as weighted average of regional datasets of the same activityName
- DOC, Dissolved Organic Carbon [water, unspecified]: 1.77083e-5 kg; lognormal variance with pedigree 0.0922, pedigree (4,4,2,5,4)
  Caluclated as weighted average of regional datasets of the same activityName
- Hydrocarbons, unspecified [water, unspecified]: 1.76303e-6 kg; lognormal variance with pedigree 0.304, pedigree (1,4,1,5,1)
  Caluclated as weighted average of regional datasets of the same activityName
- Lead II [water, unspecified]: 5.6581e-8 kg; lognormal variance with pedigree 0.654, pedigree (1,4,1,5,1)
  Caluclated as weighted average of regional datasets of the same activityName
- Manganese II [water, unspecified]: 4.07548e-5 kg; lognormal variance with pedigree 0.654, pedigree (1,4,1,5,1)
  Caluclated as weighted average of regional datasets of the same activityName
- Mercury II [water, unspecified]: 3.5534e-8 kg; lognormal variance with pedigree 0.654, pedigree (1,4,1,5,1)
  Caluclated as weighted average of regional datasets of the same activityName
- Nickel II [water, unspecified]: 7.98148e-7 kg; lognormal variance with pedigree 0.654, pedigree (1,4,1,5,1)
  Caluclated as weighted average of regional datasets of the same activityName
- Nitrogen [water, unspecified]: 9.83873e-5 kg; lognormal variance with pedigree 0.0428, pedigree (1,3,2,5,1)
  Caluclated as weighted average of regional datasets of the same activityName
- Phosphorus [water, unspecified]: 9.14459e-6 kg; lognormal variance with pedigree 0.0823, pedigree (1,2,2,5,4)
  Caluclated as weighted average of regional datasets of the same activityName
- Polychlorinated biphenyls [water, unspecified]: 8.20015e-9 kg; lognormal variance with pedigree 0.044, pedigree (1,4,1,5,1)
  Caluclated as weighted average of regional datasets of the same activityName
- Selenium IV [water, unspecified]: 2.11837e-6 kg; lognormal variance with pedigree 0.044, pedigree (1,4,1,5,1)
  Caluclated as weighted average of regional datasets of the same activityName
- Silver I [water, unspecified]: 1.36669e-8 kg; lognormal variance with pedigree 0.654, pedigree (1,4,1,5,1)
  Caluclated as weighted average of regional datasets of the same activityName
- Suspended solids, unspecified [water, unspecified]: 0.000479668 kg; lognormal variance with pedigree 0.0442, pedigree (1,4,2,5,1)
  Caluclated as weighted average of regional datasets of the same activityName
- TOC, Total Organic Carbon [water, unspecified]: 1.77083e-5 kg; lognormal variance with pedigree 0.0423, pedigree (1,2,2,5,1)
  Caluclated as weighted average of regional datasets of the same activityName
- Water [water, surface water]: 7.03492e-5 m3; lognormal variance with pedigree 0.0046, pedigree (1,4,1,5,1)
  Caluclated as weighted average of regional datasets of the same activityName
- Water [water, unspecified]: 0.00619588 m3; lognormal variance with pedigree 0.0046, pedigree (2,3,2,5,2)
  Caluclated as weighted average of regional datasets of the same activityName
- Zinc II [water, unspecified]: 7.28994e-6 kg; lognormal variance with pedigree 0.654, pedigree (1,4,1,5,1)
  Caluclated as weighted average of regional datasets of the same activityName

## Extrapolations
This dataset was built as a weighted average of regional datasets of the same activityName. Weights are based on production volumes. RER: production volume = 9.89e+09 kg/year, weight = 0.97266 CA-QC: production volume = 2.78e+08 kg/year, weight = 0.02734
