# natural gas liquids production

Dataset: EcoSpold 2, unit process
Geography: GLO
Time period: 2000-01-01 to 2023-12-31
Technology level: current
Classification: ISIC rev.4 ecoinvent: 3520:Manufacture of gas; distribution of gaseous fuels through mains
Classification: EcoSpold01Categories: natural gas/production
Scenario: Business-as-Usual
System model: Allocation, cut-off by classification
Generated by: Sofia Parada Tur
Published in: Faist Emmenegger, M. 2007
Database: ecoinvent
isCopyrightProtected: true
accessRestrictedTo: 1

## General comment
This inventory represents the production of natural gas liquids (NGL) from unprocessed natural gas. Due to a lack of process-specific data, the dataset for drying, natural gas is used as a proxy. The uncertainty has been adjusted accordingly.

## Included activities start
The activity starts with the reception of natural gas, unprocessed in the NGL production plant

## Included activities end
The activity ends with the processing of natural gas and the production of NGLs.

## Geography
based on dataset drying, natural gas

## Technology
Most extracted natural gas contains Natural Gas Liquids (NGL) to varying degrees. The NGL are separated through fractionation and it is a mixture of ethane, propane, butane, pentanes and natural gasoline in differing relative amounts. The process occurs in stages as the gas steam rises through several towers where heating units raise the temperature of the stream, causing the various liquids to separate and exit into specific holding tanks.

## Reference product
- helium, crude: 1 kg; name helium_crude; = helium_crude_PV/ NGL_PV; By-product classification allocatable product; CPC 34231: Chemical elements n.e.c.; inorganic acids except phosphoric, nitric and sulphonitric; inorganic oxygen compoun[…]; HS2017 280429: Gases, rare; other than argon; CAS 7440-59-7
  Calculated based on relationship of the production volumes.
  production volume 1.30426e7 kg; name helium_crude_PV; = 181000000*( helium_crude_density*1000)*0.99995*(1/0.9)*(1/ helium_crude_He_content)*0.44*(0.67)
    Calculated based on literature and assumptions. 1.81E+08m3 is the global production of Grade-A helium in the world in 2005 (USGS, http://minerals.usgs.gov/minerals/pubs/commodity/helium/heliumyb05.pdf, accessed 20130403) 0.165 kg/m3 is density of helium 99.995% is the fraction of helium in Grade-A helium 75% is the fraction of helium in both helium, crude and helium, crude, for storage 90% is the efficiency of helium purification (i.e. 10% are losses), estimate 44% is the fraction of helium sold which has been previously stored, calculated based on literature (USGS; http://minerals.usgs.gov/minerals/pubs/commodity/helium/myb1-2010-heliu.pdf, Figure 2 Helium recovery in the United States, accessed 20130403) 67% is the fraction of helium extracted from natural gas, calculated based on literature (USGS, http://minerals.usgs.gov/minerals/pubs/commodity/helium/myb1-2007-heliu.pdf, accessed 20130403), 14 out of 21 helium plants extract helium from natural gas
  property density 0.000165 kg/l; name helium_crude_density
  property helium content 0.75; name helium_crude_He_content
    helium content on a dry matter basis
  properties: allocation factor 0.000338, carbon allocation 0 kg, carbon content 0, carbon content, fossil 0, carbon content, non-fossil 0, dry mass 1 kg, price 2.1 EUR2005, true value 8.72335e-5, water content 0, water in wet mass 0 kg, wet mass 1 kg

## Inputs from technosphere
All rows: source Faist Emmenegger, M. 2007
- average incineration residue: -1.11812e-11, -2.32315e-7 kg (2 suppliers, which the file names only by identifier); sum of these -2.32327e-7 kg; = 0.0000000217*natural_gas_input; lognormal variance with pedigree 0.188, pedigree (5,5,4,5,5)
  Calculated based on drying, natural gas. Scaled based on the input of natural gas.
  EcoSpold01Location=CH
  Uncertainty: Norwegian data
  production volume; = incineration_waste*NGL_PV
    calculated from relative outputs
  properties: carbon content, fossil 0.0325466, carbon content, non-fossil 0.0511208, dry mass 1 kg, wet mass 1 kg
  note on carbon content, fossil: Tab A.1, ecoinvent v2.2 report 13_I. It is considered that 61.1% of the C has a biogenic origin
- chemical, inorganic: 2.83717e-5 kg; = 0.00000265*natural_gas_input; lognormal variance with pedigree 0.22, pedigree (5,5,5,5,5)
  EcoSpold01Location=GLO
  Calculated based on drying, natural gas. Scaled based on the input of natural gas.
  Uncertainty: environmental report
  properties: carbon content, fossil 0.003, dry mass 1 kg, wet mass 1 kg
  note on carbon content, fossil: This dataset is an unweighted average of 20 inorganic substances (listed in Tab 88.1, ecoinvent v2.2 report 8, part II), being part of the top100 chemicals included in this database. The C-content has also been calculated as an unweighted average of the C content of the substances composing this dataset.
- chemical, organic: 2.83717e-5 kg; = 0.00000265*natural_gas_input; lognormal variance with pedigree 0.22, pedigree (5,5,5,5,5)
  Calculated based on drying, natural gas. Scaled based on the input of natural gas.
  EcoSpold01Location=GLO
  Uncertainty: environmental report
  properties: carbon content, fossil 0.628, dry mass 1 kg, heating value, net 19.03 MJ, wet mass 1 kg
  note on carbon content, fossil: This dataset is an unweighted average of 20 organic substances (listed in Tab 88.1, ecoinvent v2.2 report 8, part II), being part of the top100 chemicals included in this database. The C-content has also been calculated as an unweighted average of the C content of the substances composing this dataset.
- diesel: 6.41307e-5 kg; = 0.00000599*natural_gas_input; lognormal variance with pedigree 0.22, pedigree (5,5,5,5,5)
  EcoSpold01Location=RER
  Calculated based on drying, natural gas. Scaled based on the input of natural gas.
  Uncertainty: environmental report, aggregation of different processes
  properties: carbon content, fossil 0.865, dry mass 1 kg, heating value, net 42.8 MJ, wet mass 1 kg
  note on carbon content, fossil: C-content of diesel is 86.5% (ecoinvent v2.2 report 6_IV, Tab 3.14)
- electricity, medium voltage: 0.218408 kWh; = 0.0204*natural_gas_input; lognormal variance with pedigree 0.22, pedigree (5,5,5,5,5)
  Calculated based on drying, natural gas. Scaled based on the input of natural gas.
  EcoSpold01Location=NO
  Uncertainty: environmental report, standard module
- ethylene glycol: 1.11107e-6, 1.83744e-5 kg (2 suppliers, which the file names only by identifier); sum of these 1.94855e-5 kg; = 0.00000182*natural_gas_input; lognormal variance with pedigree 0.22, pedigree (5,5,5,5,5)
  Calculated based on drying, natural gas. Scaled based on the input of natural gas.
  EcoSpold01Location=RER
  Uncertainty: environmental report
  properties: carbon content, fossil 0.387097, dry mass 1 kg, heating value, net 23.44 MJ, wet mass 1 kg
- municipal solid waste: -7.5401e-7, -3.87195e-8, -4.59777e-9, -2.92129e-8, -2.86154e-8, -2.18455e-5, -3.21734e-9, -1.03271e-9, -2.3342e-9, -9.71735e-8 kg (10 suppliers, which the file names only by identifier); sum of these -2.28044e-5 kg; = 0.00000213*natural_gas_input; lognormal variance with pedigree 0.188, pedigree (5,5,4,5,5)
  EcoSpold01Location=CH
  Calculated based on drying, natural gas. Scaled based on the input of natural gas.
  Uncertainty: Norwegian data
  production volume; = solid_waste*NGL_PV
    calculated from relative outputs
  properties: carbon content, fossil 0.171549, carbon content, non-fossil 0.261655, dry mass 0.771 kg, heating value, net 11.74 MJ, water content 0.297017, wet mass 1 kg
  note on carbon content, fossil: MSW composition in tab 4.1, ecoinvent v2.2 report 13_I. C content referred to 1 kg DM
  note on heating value, net: Value taken from the general comment of the treatment dataset.
- natural gas processing plant: 4.21828e-12 unit; = 0.000000000000394*natural_gas_input; lognormal variance with pedigree 0.22, pedigree (5,5,5,5,5)
  EcoSpold01Location=GLO
  Calculated based on drying, natural gas. Scaled based on the input of natural gas.
  Uncertainty: environmental report, standard module
- natural gas, high pressure: 10.7063 m3; name natural_gas_input; = 1/0.76; lognormal variance with pedigree 0.22, pedigree (5,5,5,5,5)
  The amount of NGL contained in 1 m3 of natural gas is 0.76 kg.
  EcoSpold01Location=NO
  Uncertainty: environmental report, aggregation of different processes
  property density 0.0008 kg/l; name natural_gas_input_density; = 0.8/1000
  properties: carbon content, fossil 0.602381, dry mass 0.84 kg, heating value, net 36 MJ, wet mass 0.84 kg
  note on carbon content, fossil: An average C content of 0.506 kg C/ m3 has been assumed (this average has been calculated using data in Tab 3.5, ecoinvent v2.2 report 6_V
  note on density: Literature value (http://www.engineeringtoolbox.com/gas-density-d_158.html, accessed 20120713). Density at STP (standard temperature and pressure), i.e. air at 0°C (273.15 K, 32°F) and 1 atm (101.325 kN/m2, 101.325 kPa, 14.7 psia, 0 psig, 30 in Hg, 760 torr).
  note on heating value, net: Literature value, Source: Christoph Meili;Niels Jungbluth;Maresa Bussa (2021) Life cycle inventories of crude oil and natural gas extraction. ESU-services Ltd. commissioned by BAFU & VSG, Schaffhausen, Switzerland, http://esu-services.ch/data/public-lci-reports/
- soda ash, light: 1.84607e-5, 4.12963e-6 kg (2 suppliers, which the file names only by identifier); sum of these 2.25903e-5 kg; = 0.00000211*natural_gas_input; lognormal variance with pedigree 0.22, pedigree (5,5,5,5,5)
  EcoSpold01Location=RER
  Calculated based on drying, natural gas. Scaled based on the input of natural gas.
  Uncertainty: environmental report
  properties: carbon content, fossil 0.0517241, dry mass 1 kg, heating value, net 3.43 MJ, wet mass 1 kg
- spent antifreezer liquid: -4.32534e-5 kg; name spent_antifreezer; = 0.00000404*natural_gas_input; lognormal variance with pedigree 0.188, pedigree (5,5,4,5,5)
  (same comment as for municipal solid waste)
  production volume; = spent_antifreezer* NGL_PV
    calculated from relative outputs
  properties: carbon content, fossil 0.431328, dry mass 0.482 kg, heating value, net 0.56 MJ, water content 1.07469, wet mass 1 kg
  note on carbon content, fossil: Tab A.7, ecoinvent v2.2 report 13_I. C content has been calculated after data in the tables, and then referred to 1 kg DM
- spent solvent mixture: -4.96384e-8, -2.11872e-6, -5.4224e-6 kg (3 suppliers, which the file names only by identifier); sum of these -7.59076e-6 kg; = 7.09E-07*natural_gas_input; lognormal variance with pedigree 0.188, pedigree (5,5,4,5,5)
  (same comment as for average incineration residue)
  production volume; = spent_solvent* NGL_PV
    calculated from relative outputs
  properties: carbon content, fossil 0.571257, dry mass 0.835 kg, heating value, net 21.7 MJ, water content 0.197605, wet mass 1 kg
- waste emulsion paint: -3.9866e-7, -4.66833e-8, -3.89324e-11 kg (3 suppliers, which the file names only by identifier); sum of these -4.45382e-7 kg; = 0.0000000416*natural_gas_input; lognormal variance with pedigree 0.188, pedigree (5,5,4,5,5)
  (same comment as for municipal solid waste)
  production volume; = paint_waste*NGL_PV
    calculated from relative outputs
  properties: carbon content, fossil 0.27, dry mass 1 kg, heating value, net 8.18 MJ, wet mass 1 kg
  note on carbon content, fossil: Tab A.4, ecoinvent v2.2 report 13_I. C content has been calculated after data in the tables, and then referred to 1 kg DM
- waste mineral oil: -3.18656e-7, -3.3703e-5, -1.28719e-5 kg (3 suppliers, which the file names only by identifier); sum of these -4.68936e-5 kg; = 0.00000438*natural_gas_input; lognormal variance with pedigree 0.188, pedigree (5,5,4,5,5)
  (same comment as for average incineration residue)
  production volume; = waste_oil* NGL_PV
    calculated from relative outputs
  properties: carbon content, fossil 0.864444, dry mass 0.9 kg, heating value, net 34.7 MJ, water content 0.111111, wet mass 1 kg
  note on carbon content, fossil: Tab A.6, ecoinvent v2.2 report 13_I. C content has been calculated after data in the tables, and then referred to 1 kg DM
- waste textile, soiled: -9.18511e-7, -5.69664e-7 kg (2 suppliers, which the file names only by identifier); sum of these -1.48817e-6 kg; = 1.39E-07* natural_gas_input; lognormal variance with pedigree 0.188, pedigree (5,5,4,5,5)
  (same comment as for average incineration residue)
  production volume; = waste_textile* NGL_PV
    calculated from relative outputs
  properties: carbon content, non-fossil 0.570519, dry mass 0.75 kg, heating value, net 14.45 MJ, water content 0.333333, wet mass 1 kg
  note on carbon content, non-fossil: C content of 1 kg DM was calculated after data in Tab A.4, ecoinvent v2.2 report 13_I,
- waste wood, untreated: -1.36642e-7, -3.55683e-9, -2.65053e-6, -4.86495e-8, -2.06433e-8, -8.37453e-7, -3.26353e-8, -3.91813e-7 kg (8 suppliers, which the file names only by identifier); sum of these -4.12192e-6 kg; = 0.000000385*natural_gas_input; lognormal variance with pedigree 0.188, pedigree (5,5,4,5,5)
  (same comment as for municipal solid waste)
  production volume; = wood_waste*NGL_PV
    calculated from relative outputs
  properties: carbon content, non-fossil 0.48632, dry mass 0.8 kg, heating value, net 13.99 MJ, water content 0.25, wet mass 1 kg
  note on carbon content, non-fossil: Tab A.4, ecoinvent v2.2 report 13_I. C content has been referred to 1 kg DM,

## Emissions to nature
- Carbon dioxide, fossil [air, non-urban air or from high stacks]: 0.178795 kg; = 0.0167*natural_gas_input; source Faist Emmenegger, M. 2007; lognormal variance with pedigree 0.22, pedigree (5,5,5,5,5)
  Calculated based on drying, natural gas. Scaled based on the input of natural gas.
  Uncertainty: environmental report, aggregation of different processes
- Helium [air, unspecified]: 0.000258472 kg; = (3.2E+9/35.31*0.667* ( helium_crude_density*1000))/ NGL_PV; lognormal variance with pedigree 0.22, pedigree (5,5,5,5,5)
  Calculated based on literature values and estimates. 3.2bcf is the amount of helium lost in total (Dunn et al., 1996) 35.31 scf = 1m3 of helium 0.165 kg/m3 is density of helium 67% is the fraction of helium extracted from natural gas, calculated based on literature (USGS, http://minerals.usgs.gov/minerals/pubs/commodity/helium/myb1-2007-heliu.pdf, accessed 20130403), 14 out of 21 helium plants extract helium from natural gas The amount of the helium released to air is recalculated from the total production volume based on relationship with the production volume of the natural gas liquids.
- Methane, fossil [air, non-urban air or from high stacks]: 0.000175583 kg; = 0.0000164*natural_gas_input; source Faist Emmenegger, M. 2007; lognormal variance with pedigree 0.26, pedigree (5,5,5,5,5)
  (same comment as for Carbon dioxide, fossil)
- NMVOC, non-methane volatile organic compounds [air, non-urban air or from high stacks]: 0.000719463 kg; = 0.0000672*natural_gas_input; source Faist Emmenegger, M. 2007; lognormal variance with pedigree 0.34, pedigree (5,5,5,5,5)
  (same comment as for Carbon dioxide, fossil)
- Nitrogen oxides [air, non-urban air or from high stacks]: 0.000164877 kg; = 0.0000154*natural_gas_input; source Faist Emmenegger, M. 2007; lognormal variance with pedigree 0.26, pedigree (5,5,5,5,5)
  (same comment as for Carbon dioxide, fossil)
- Sulfur dioxide [air, non-urban air or from high stacks]: 5.06408e-7 kg; = 0.0000000473*natural_gas_input; source Faist Emmenegger, M. 2007; lognormal variance with pedigree 0.22, pedigree (5,5,5,5,5)
  (same comment as for Carbon dioxide, fossil)
- AOX, Adsorbable Organic Halides [water, unspecified]: 9.89262e-13 kg; = 0.0000000000000924*natural_gas_input; source Faist Emmenegger, M. 2007; lognormal variance with pedigree 0.25, pedigree (5,5,5,5,5)
  Calculated based on drying, natural gas. Scaled based on the input of natural gas.
  Uncertainty: Extrapolation for sum parameter
- Ammonium [water, unspecified]: 1.01389e-8 kg; = 0.000000000947*natural_gas_input; source Faist Emmenegger, M. 2007; lognormal variance with pedigree 0.26, pedigree (5,5,5,5,5)
  (same comment as for Carbon dioxide, fossil)
- BOD5, Biological Oxygen Demand [water, unspecified]: 2.91211e-6 kg; = 0.000000272*natural_gas_input; source Faist Emmenegger, M. 2007; lognormal variance with pedigree 0.25, pedigree (5,5,5,5,5)
  (same comment as for AOX, Adsorbable Organic Halides)
- COD, Chemical Oxygen Demand [water, unspecified]: 2.91211e-6 kg; = 0.000000272*natural_gas_input; source Faist Emmenegger, M. 2007; lognormal variance with pedigree 0.25, pedigree (5,5,5,5,5)
  (same comment as for AOX, Adsorbable Organic Halides)
- DOC, Dissolved Organic Carbon [water, unspecified]: 7.1411e-6 kg; = 0.000000667*natural_gas_input; source Faist Emmenegger, M. 2007; lognormal variance with pedigree 0.25, pedigree (5,5,5,5,5)
  (same comment as for AOX, Adsorbable Organic Halides)
- Methanol [water, unspecified]: 4.30393e-7 kg; = 0.0000000402*natural_gas_input; source Faist Emmenegger, M. 2007; lognormal variance with pedigree 0.52, pedigree (5,5,5,5,5)
  (same comment as for Carbon dioxide, fossil)
- Nitrogen [water, unspecified]: 7.41946e-11 kg; = 0.00000000000693*natural_gas_input; source Faist Emmenegger, M. 2007; lognormal variance with pedigree 0.25, pedigree (5,5,5,5,5)
  (same comment as for AOX, Adsorbable Organic Halides)
- Oils, unspecified [water, unspecified]: 9.60355e-8 kg; = 0.00000000897*natural_gas_input; source Faist Emmenegger, M. 2007; lognormal variance with pedigree 0.52, pedigree (5,5,5,5,5)
  (same comment as for Carbon dioxide, fossil)
- Phenol [water, unspecified]: 5.06408e-9 kg; = 0.000000000473*natural_gas_input; source Faist Emmenegger, M. 2007; lognormal variance with pedigree 0.52, pedigree (5,5,5,5,5)
  (same comment as for Carbon dioxide, fossil)
- Sulfur [water, unspecified]: 2.56951e-10 kg; = 0.000000000024*natural_gas_input; source Faist Emmenegger, M. 2007; lognormal variance with pedigree 0.25, pedigree (5,5,5,5,5)
  (same comment as for AOX, Adsorbable Organic Halides)
  property carbon content, fossil 0; name C_content_fossil
  property carbon content, non-fossil 0; name C_content_non_fossil
  property dry mass 1 kg; name DM
  property water content 0; name water_content
  property water in wet mass 0 kg; name WWM
  property wet mass 1 kg; name WM
- TOC, Total Organic Carbon [water, unspecified]: 7.1411e-6 kg; = 0.000000667*natural_gas_input; source Faist Emmenegger, M. 2007; lognormal variance with pedigree 0.26, pedigree (5,5,5,5,5)
  (same comment as for Carbon dioxide, fossil)
- Triethylene glycol [water, unspecified]: 1.29546e-6 kg; = 0.000000121*natural_gas_input; source Faist Emmenegger, M. 2007; lognormal variance with pedigree 0.52, pedigree (5,5,5,5,5)
  (same comment as for Carbon dioxide, fossil)

## Sampling procedure
inventory based on dataset drying, natural gas

## Extrapolations
Emissions are copied from dataset drying, natural gas. Original flow refered to 1 m3 natural gas after the drying process (Emmenegger, 2007). This has been recalculated to fit the input amount of natural gas.

## Review by Bo Weidema 2012-03-26
passed

## Review by Stephan Pfister 2012-03-26
The water flows should be checked (i.e. emissions all to ocean for a global dataset and if there is no direct water use)

## Review by Bo Weidema 2013-04-05
Helium emissions and crude helium for storage was added to the dataset. The resource input of helium, which is an input that occurs in the natural gas extraction and follows the natural gas liquids, has not been accounted for in the database yet.

## Review by Emilia Moreno Ruiz 2014-06-11
to fit the new helium, crude stockpiling model
