# purse seiner maintenance, wood

Dataset: EcoSpold 2, unit process
Geography: RoW
Time period: 2010-01-01 to 2023-12-31
Technology level: current
Classification: ISIC rev.4 ecoinvent: 0311:Marine fishing
Scenario: Business-as-Usual
System model: Allocation, cut-off by classification
Generated by: [System]
Published in: Avadí, A. 2018
Database: ecoinvent
isCopyrightProtected: true
accessRestrictedTo: 1

## General comment
This dataset represents the maintenance of wooden purse seiners, per 1000 kg of light ship weight, based on data from Peru, corresponding to 10 vessels for which data was avilable with different levels of detail. Specific data for specific inventory items may be based on sub-samples for which detailed data was available. Vessel dimensions, landings and fuel use were available for roughly 689 purse seiners
System boundaries and relation between activities

## Included activities start
Maintenance of vessels, including provision of all materials and work

## Included activities end
End of life of replaced materials. Batteries are excluded, as they do not exist in the database

## Geography
Data from Peru, extrapolated to global (GLO)

## Technology
Peru features various shipyards and relevant ship-building and ship-retrofitting expertise.

## Reference product
- purse seiner maintenance, wood: 1 kg; name RP_amount_1; = steel+copper+nylon+lead+engine*1000+paint+wood*640; source Pierre Fréon 2014; By-product classification allocatable product; CPC 8729: Maintenance and repair services of other goods n.e.c.
  Maintenance of a wooden purse seiner, per 1000 kg of light ship weight (LSW) over its lifetime. Regressions based on mainly primary data were created to relate the weight of each inventory item to a purse seiner's LSW. The list of inventory items (granularity) contribute >95% of environmental impacts, as described in the reference publication.
  production volume 0.912835 kg; name RP_PV_1
    Unquantifiable
  property price 0.709855 EUR2005
    Calculated based on inputs: The price of the product has been calculated as a sum of the values of the material and energy inputs for this product. This value is therefore a rough estimation. It may underestimate the real price since there are additional expenses when producing any product. These expences can include for example labour costs, treatment of waste materials and profit for the producer. Please consider carefully whether this level of data quality is acceptable for your application.
  properties: carbon allocation 0 kg, carbon content 0

## Inputs from technosphere
All rows: source Pierre Fréon 2014
- alkyd paint, white, without solvent, in 60% solution state: 0.054035 kg; triangular min 0.0373413, mostLikely 0.0467864, max 0.0779774, pedigree (1,3,2,5,1)
  Hull and deck paint, including antifouling, maintenance, every 2 years
  Uncertainty: Data from 10 vessels
  properties: carbon content, fossil 0.140367, carbon content, non-fossil 0.199629, dry mass 1 kg, heating value, net 10.3 MJ, wet mass 1 kg
  note on carbon content, fossil: C content was calculated as an addition of C content in the raw materials.
- alkyd paint, white, without solvent, in 60% solution state: 0.0113827 kg; triangular min 0.00786608, mostLikely 0.00985573, max 0.0164262, pedigree (1,3,2,5,1)
  (same comment as for alkyd paint, white, without solvent, in 60% solution state)
- copper scrap, sorted, pressed: -0.00614251 kg; name BP_amount_5; = copper
  Waste copper wire
  production volume; = RP_PV_1 * (BP_amount_5 / RP_amount_1)
    Calculated from production volume of reference product using the relative outputs.
  properties: dry mass 1 kg, price 2.84 EUR2005, wet mass 1 kg
- copper, cathode: 0.00614251 kg; = copper
  Copper wire for electric circuit construction, 50% recycled
  properties: dry mass 1 kg, wet mass 1 kg
- iron scrap, unsorted: -0.0396192 kg; name BP_amount_6; = steel
  Waste steel
  production volume; = RP_PV_1 * (BP_amount_6 / RP_amount_1)
    Calculated from production volume of reference product using the relative outputs.
  properties: dry mass 1 kg, price 0.149 EUR2005, wet mass 1 kg
- lead: 0.0144349 kg; triangular min 0.0110779, mostLikely 0.0118333, max 0.0203935, pedigree (2,3,2,5,1)
  Fishing net maintenance, 10% replacement every 2 years
  Uncertainty: Data from 10 vessels
  properties: dry mass 1 kg, wet mass 1 kg
- lead in car shredder residue: -0.000214831, -0.0142201 kg (2 suppliers, which the file names only by identifier); sum of these -0.0144349 kg; = lead
  Waste lead
  production volume; = RP_PV_1 * (BP_amount_3 / RP_amount_1)
    Calculated from production volume of reference product using the relative outputs.
  properties: dry mass 1 kg, wet mass 1 kg
- marine engine: 1.44349e-5 unit; name engine; triangular min 7.46632e-6, mostLikely 1.16972e-5, max 2.41411e-5, pedigree (3,3,2,5,1)
  Marine diesel engine maintenance, 1 replacement over lifetime
  Uncertainty: Data from 10 vessels, assumptions on replacement/maintenance
  property lifetime 15 year; name engine_lifetime
  property lifetime capacity [h] 8000 hour; name engine_lifetime_capacity_PMH
- nylon 6-6: 0.0493421 kg; triangular min 0.0380639, mostLikely 0.0406015, max 0.0693609, pedigree (2,3,2,5,1)
  Fishing net maintenance, 10% replacement every 2 years
  Uncertainty: Data from 10 vessels
  properties: carbon content, fossil 0.637168, dry mass 1 kg, heating value, net 30.9 MJ, wet mass 1 kg
  note on heating value, net: Assumed equal to Nylon-66. Reference: Walters, R. N., Hackett, S. M. and Lyon, R. E. (2000) ‘Heats of combustion of high temperature polymers’, Fire and Materials, 24(5), pp. 245–252. doi: 10.1002/1099-1018(200009/10)24:5<245::AID-FAM744>3.0.CO;2-7.
- nylon 6-6: 0.024368 kg; triangular min 0.0187982, mostLikely 0.0200514, max 0.0342544, pedigree (2,3,2,5,1)
  Fishing net maintenance, 10% replacement every 2 years
  Uncertainty: Data from 10 vessels
- sawnwood, board, hardwood, dried (u=20%), planed: 0.00115222 m3; triangular min 0.00108386, mostLikely 0.00117174, max 0.00120104, pedigree (3,3,2,5,1)
  Hull, 30% replacement
  Uncertainty: Data from 10 vessels
  properties: carbon content, non-fossil 0.494, dry mass 563.2 kg, heating value, net 8524.3 MJ, water content 0.2, wet mass 675.84 kg
- sawnwood, board, hardwood, dried (u=20%), planed: 7.59976e-5 m3; triangular min 7.14893e-5, mostLikely 7.72857e-5, max 7.92179e-5, pedigree (3,3,2,5,1)
  Hull, 30% replacement
  Uncertainty: Data from 10 vessels
- sawnwood, board, hardwood, dried (u=20%), planed: 2.8774e-7 m3; triangular min 2.7067e-7, mostLikely 2.92617e-7, max 2.99932e-7, pedigree (3,3,2,5,1)
  Hull, 30% replacement
  Uncertainty: Data from 10 vessels
- steel, low-alloyed, hot rolled: 0.0396192 kg; name steel; triangular min 0.030865, mostLikely 0.0349262, max 0.0530662, pedigree (2,3,2,5,1)
  Structural steel, keel lining, bolts, rigging
  Uncertainty: Data from 10 vessels
  property carbon content, non-fossil 0; name steel_C_content_non_fossil
  properties: carbon content, fossil 0.005, dry mass 1 kg, wet mass 1 kg
  note on carbon content, fossil: Low alloyed steel composition given in Tab. 3.2 ecoinvent v2.2 report 10_partII. Steel assumed to have a C content of 0.5%
  note on carbon content, non-fossil: Low alloyed steel composition given in Tab. 3.2 ecoinvent v2.2 report 10_partII.
- waste paint on wood: -0.0217992, -6.7148e-6 kg (2 suppliers, which the file names only by identifier); sum of these -0.0218059 kg; = paint*1/3
  Waste paint, 2/3 of solids emitted to ocean
  production volume; = RP_PV_1 * (BP_amount_2 / RP_amount_1)
    Calculated from production volume of reference product using the relative outputs.
  properties: carbon content, fossil 0.140367, carbon content, non-fossil 0.199629, dry mass 1 kg, heating value, net 19.7 MJ, wet mass 1 kg
- waste plastic, mixture: -1.95243e-5, -0.000807834, -1.85401e-5, -0.0728606, -3.57497e-6 kg (5 suppliers, which the file names only by identifier); sum of these -0.0737101 kg; = nylon
  Waste nylon
  production volume; = RP_PV_1 * (BP_amount_4 / RP_amount_1)
    Calculated from production volume of reference product using the relative outputs.
  properties: carbon content, fossil 0.637168, dry mass 1 kg, heating value, net 30.79 MJ, wet mass 1 kg
  note on heating value, net: Value taken from the general comment of the treatment dataset.
- waste wood, post-consumer: -0.786241 kg; name BP_amount_1; = wood*640
  Waste wood. Density of wood: 640 kg/m3, ecoinvent dataset information (UPR): planing, board, hardwood, u=20%, GLO
  production volume; = RP_PV_1 * (BP_amount_1 / RP_amount_1)
    Calculated from production volume of reference product using the relative outputs.
  properties: carbon content, non-fossil 0.494, dry mass 0.833333 kg, heating value, net 9.99 MJ, price 0.079 EUR2005, water content 0.2, wet mass 1 kg
- wire drawing, copper: 0.00614251 kg; name copper; triangular min 0.00373531, mostLikely 0.00498041, max 0.0097118, pedigree (3,3,2,5,1)
  Manufacture of copper wire, 1 replacement over lifetime
  Uncertainty: Assumptions on replacement rates

## Emissions to nature
- Solids, inorganic [water, ocean]: 0.0436118 kg; = paint*2/3; source Avadí, A. 2018
  Waste paint, 2/3 of solids emitted to ocean
