# bell pepper production, open field

Dataset: EcoSpold 2, unit process
Geography: IN-MH
Time period: 2015-01-01 to 2023-12-31
Technology level: current
Classification: ISIC rev.4 ecoinvent: 0128:Growing of spices, aromatic, drug and pharmaceutical crops
Scenario: Business-as-Usual
System model: Allocation, cut-off by classification
Generated by: Sanjeevan Bajaj
Database: ecoinvent
isCopyrightProtected: true
accessRestrictedTo: 1

## General comment
This dataset represents the production of 1 kg of fresh Capsicum during September, 2015-July, 2016 at a farm located in village Vadner Bhairav, District Nashik of Maharashtra. The farmer has reported a yield of 81,250 kg fresh matter per ha for this crop cycle which has been cross-checked with yield potential of 80-100 t/ha (http://www.agrifarming.in/capsicum-farming). Sowing date for the crop is 14-Feburary, 2016 and harvesting date is 16-July, 2016. Mineral NPK fertilizer input is 197.50-459.63-137.25 kg/ha. Micro-macro nutrients applied are Ca 32.90, Zn 0.42, Borax 13.45, Manganese sulfate 1.41, Portafer 0.47, and Sulfite 0.77 kg per ha. Organic fertilizer applied amounts to 25,000 kg of homemade compost. Fungicide used has active ingredients Difenoconazol (562.5 g/ha), Carbendazin (4500 g/ha), Clorothilonil (5062.5 g/ha). Insecticide used has active ingredient as Dichlorovos (3135 g/ha, proxy used Dichlorovos DDVP). Other pesticides used is plant based horticultural oil Neemazol (7.13 kg/ha). Machinery is used only for plant protection with fuel consumption of 15.60 kg/ha on spraying, and for soil cultivation with fuel consumption of 18.30 kg/ha using plough (20% consumption) and rotary cultivator (80% consumption) for soil tillage.
[This dataset is meant to replace the following datasets:]

## Included activities start
This activity starts about four weeks after the harvest of the previous crop. The soil is prepared for cultivation in mid- September and sowing was done about five months after soil preparation. Thereafter the crop is mature for harvesting in about 5 months.

## Included activities end
The activity ends with the harvesting of the mature Capsicum from the Capsicum plant

## Geography
village-Makhmalabad, District Nashik of Maharashtra

## Technology
Cultivation of Capsicum follows conventional production standards

## Time period
Soil cultivating date for the main crop: 15-September, 2015; Harvesting date main crop: 16-July, 2016. The soil cultivation, sowing and harvesting dates are taken as the middle date of the week or fortnight told to the data collector by the farmer. Total time from date of sowing to date of harvesting comes to 153 days. The data is collected for one crop cycle. The cycle of one year is considered for entry in ecoeditor.

## Parameters
- LUC_crop_specific: 1 dimensionless
  This parameter allows to switch between a "crop specific" and a "country specific" approach when calculating the LUC of a crop. By default, the chosen approach is "crop specific", so the value of the parameter is 1. If you want to apply a "country specific" approach, turn the parameter to 0.

## Reference product
- bell pepper: 1 kg; By-product classification allocatable product; CPC 01231: Chillies and peppers, green (Capsicum spp. and Pimenta spp.); HS2017 090411: Spices; pepper (of the genus piper), neither crushed nor ground
  production volume 2.933e7 kg; = 29.33*1000*1000
    The data is for production in the Indian State of Maharashtra. Figure is given in thousand tonnes so multipled with 1000*1000 to convert into kgs. Given data is for the year 2015-16. Source: http://agriexchange.apeda.gov.in/India%20Production/India_Productions.aspx?hscode=1072
  property price 0.687623 EUR2005
    Literature value. Price from FAOSTAT data Producer Prices - Annual (retrieved from: http://www.fao.org/faostat/en/#data/PP, accessed 15Feb2018). Data from 2005.
  properties: carbon allocation 0 kg, carbon content 0

## Inputs from technosphere
- application of plant protection product, by field sprayer: 0.000109091 ha; lognormal variance with pedigree 0.0106, pedigree (2,4,3,1,1)
  Calculated Value. This value has been calculated by using the ecoinvent LCI calculation tool for crop production.
- benzimidazole-compound: 5.53846e-5 kg; lognormal variance with pedigree 0.0106, pedigree (2,4,3,1,1)
  (same comment as for application of plant protection product, by field sprayer)
  properties: carbon content, fossil 0.529668, dry mass 1 kg, wet mass 1 kg
- borax, anhydrous, powder: 0.000165538 kg; lognormal variance with pedigree 0.0376, pedigree (2,4,3,1,1)
  (same comment as for application of plant protection product, by field sprayer)
  properties: dry mass 1 kg, wet mass 1 kg
- chlorothalonil: 6.23077e-5 kg; lognormal variance with pedigree 0.0106, pedigree (2,4,3,1,1)
  The data was collected for a hectare area through interview
  properties: carbon content, fossil 0.360902, dry mass 1 kg, wet mass 1 kg
- compost: 0.307692 kg; lognormal variance with pedigree 0.0376, pedigree (2,4,3,1,1)
  Home made
  property cadmium content 3.6e-7; name Cd_content
  property chromium content 2.23e-5; name Cr_content
  property copper content 5.77e-5; name Cu_content
  property dry mass 0.5 kg; name DM
  property lead content 4.9e-5; name Pb_content
  property mercury content 1.2e-7; name Hg_content
  property nickel content 1.63e-5; name Ni_content
  property nitrogen content 0.014; name N_content
  property phosphorus content 0.0035; name P_content
  property potassium content 0.01; name K_content
  property zinc content 0.000184; name Zn_content
  properties: carbon content, non-fossil 0.183645, water content 1, wet mass 1 kg
- cyclic N-compound: 6.92308e-6 kg; lognormal variance with pedigree 0.0376, pedigree (2,4,3,1,1)
  (same comment as for application of plant protection product, by field sprayer)
  properties: carbon content, fossil 0.641962, dry mass 1 kg, wet mass 1 kg
- inorganic nitrogen fertiliser, as N: 0.00243077 kg; lognormal variance with pedigree 0.0052, pedigree (2,4,3,1,1)
  This exchange is an aggregation of amounts:
  0.00158. Comment:
  4.6184615384615383E-4. Comment:
  3.8892307692307696E-4. Comment:
  properties: dry mass 1 kg, wet mass 1 kg
- inorganic phosphorus fertiliser, as P2O5: 0.00362047 kg; lognormal variance with pedigree 0.0052, pedigree (2,4,3,1,1)
  This exchange is an aggregation of amounts:
  0.003394190769230769. Comment:
  2.2627938461538462E-4. Comment:
  properties: dry mass 1 kg, wet mass 1 kg
- irrigation: 0.155958 m3; lognormal variance with pedigree 0.0052, pedigree (2,4,3,1,1)
  The data was collected for a hectare area through interview
  properties: dry mass 0.11 kg, water content 9089.91, wet mass 1000 kg
- land use change, annual crop: 3.92668e-6 ha; = (0.3190429359924372 * LUC_crop_specific + 0.07057913009354706 * (1-LUC_crop_specific))/81250
  (same comment as for application of plant protection product, by field sprayer)
- lime: 0.00101122 kg; lognormal variance with pedigree 0.0376, pedigree (2,4,3,1,1)
  (same comment as for application of plant protection product, by field sprayer)
  properties: carbon content, fossil 0.120005, dry mass 1 kg, wet mass 1 kg
- manganese sulfate: 1.73538e-5 kg; lognormal variance with pedigree 0.0106, pedigree (2,4,3,1,1)
  The data was collected for a hectare area through interview
  property molecular weight 0 g/mol; name manganese_sulfate_output_MW
  properties: dry mass 1 kg, wet mass 1 kg
- naphtha: 8.76923e-5 kg; lognormal variance with pedigree 0.0106, pedigree (2,4,3,1,1)
  Neemazol
  properties: carbon content, fossil 0.919743, dry mass 1 kg, heating value, net 45 MJ, wet mass 1 kg
- onion seedling, for planting: 0.307692 unit; lognormal variance with pedigree 0.0052, pedigree (2,4,3,1,1)
  (same comment as for application of plant protection product, by field sprayer)
  properties: carbon content, non-fossil 1, dry mass 0.03 kg, wet mass 0.03 kg
- organophosphorus-compound, unspecified: 3.85846e-5 kg; lognormal variance with pedigree 0.0052, pedigree (2,4,3,1,1)
  The data was collected for a hectare area through interview
  properties: carbon content, fossil 0.260898, dry mass 1 kg, wet mass 1 kg
- packaging, for fertilisers: 0.0215764 kg; lognormal variance with pedigree 0.0532, pedigree (4,3,3,5,4)
  Total amount of active substance/s of fertilisers needed for the production of 'bell pepper' is calculated to be circa 1.08E-02 kg. Fertiliser/s used in this dataset is/are: 'lime', 'nitrogen fertiliser, as N', 'phosphate fertiliser, as P2O5', 'phosphate rock, as P2O5, beneficiated, dry', 'potassium chloride, as K2O', 'potassium sulfate, as K2O'. The total amount of active substance/s is doubled in order to account for the packaging of the dilluted product of fertiliser/s that is/are applied. Therefore, 2.16E-02 kg of packaging for fertilisers is justified with this exchange.
  properties: carbon content, fossil 0.825301, dry mass 1 kg, heating value, net 25.01 MJ, price 0.0642 EUR2005, wet mass 1 kg
  note on carbon content, fossil: Considering a chemical formula (C2H4)n for polyethylene, carbon content-fossil is calculated to be 0.856286 kg of Carbon per kg of dry mass.
- packaging, for pesticides: 0.000749968 kg; lognormal variance with pedigree 0.0532, pedigree (4,3,3,5,4)
  Total amount of active substance/s of pesticides needed for the production of bell pepper is calculated to be circa 3.75E-04 kg. Pesticide/s used in this dataset is/are: 'benzimidazole-compound', 'borax, anhydrous, powder', 'chlorothalonil', 'cyclic N-compound', 'manganese sulfate', 'organophosphorus-compound, unspecified', 'portafer', 'sulfite', 'zinc monosulfate'. The total amount of active substance/s is doubled in order to account for the packaging of the dilluted product of pesticide/s that is/are applied. Therefore, 7.50E-04 kg of packaging for pesticides is justified with this exchange.
  properties: carbon content, fossil 0.85714, dry mass 1 kg, heating value, net 25.97 MJ, price 0.0642 EUR2005, wet mass 1 kg
- phosphate rock, beneficiated: 0.00636411 kg; lognormal variance with pedigree 0.0376, pedigree (2,4,3,1,1)
  The exchange has been updated from 'phosphate rock, as P2O5, beneficiated, dry' into 'phosphate rock, beneficiated' and therefore its amount has been scaled (multiplied) from 0.002 kg by 3.125 kg of 'phosphate rock, beneficiated' per kg of 'phosphate rock, as P2O5, beneficiated, dry'. Original comment of the exchange is: Calculated Value. This value has been calculated by using the ecoinvent LCI calculation tool for crop production.
  properties: dry mass 1 kg, wet mass 1 kg
- polyethylene, high density, granulate: 0.00142154 kg; lognormal variance with pedigree 0.0106, pedigree (2,4,3,1,1)
  (same comment as for application of plant protection product, by field sprayer)
  properties: carbon content, fossil 0.857143, dry mass 1 kg, heating value, net 42.47 MJ, wet mass 1 kg
  note on carbon content, fossil: Polyethylene is formed out of a huge amount of ethylene monomers (C2H4) (ecoinvent v2.2 report 11_II). MW=28 g/mol
- portafer: 5.78462e-6 kg; lognormal variance with pedigree 0.0376, pedigree (2,4,3,1,1)
  (same comment as for application of plant protection product, by field sprayer)
  properties: dry mass 1 kg, wet mass 1 kg
- potassium chloride: 0.0013102 kg; lognormal variance with pedigree 0.0376, pedigree (2,4,3,1,1)
  The exchange has been updated from 'potassium chloride, as K2O' into 'potassium chloride' and therefore its amount has been scaled (multiplied) from 0.0008 kg by 1.5829 kg of 'potassium chloride' per kg of 'potassium chloride, as K2O'. Original comment of the exchange is: Calculated Value. This value has been calculated by using the ecoinvent LCI calculation tool for crop production.
  properties: dry mass 1 kg, wet mass 1 kg
- potassium sulfate: 0.00159376 kg; lognormal variance with pedigree 0.0376, pedigree (2,4,3,1,1)
  The exchange has been updated from 'potassium sulfate, as K2O' into 'potassium sulfate' and therefore its amount has been scaled (multiplied) from 0.0009 kg by 1.85 kg of 'potassium sulfate' per kg of 'potassium sulfate, as K2O'. Original comment of the exchange is: Calculated Value. This value has been calculated by using the ecoinvent LCI calculation tool for crop production.
  properties: dry mass 1 kg, wet mass 1 kg
- sulfite: 9.47692e-6 kg; lognormal variance with pedigree 0.0376, pedigree (2,4,3,1,1)
  (same comment as for application of plant protection product, by field sprayer)
  properties: dry mass 1 kg, wet mass 1 kg
- tillage, ploughing: 1.72591e-6 ha; lognormal variance with pedigree 0.0106, pedigree (2,4,3,1,1)
  (same comment as for application of plant protection product, by field sprayer)
- tillage, rotary cultivator: 1.27791e-5 ha; lognormal variance with pedigree 0.0106, pedigree (2,4,3,1,1)
  (same comment as for application of plant protection product, by field sprayer)
- zinc monosulfate: 1.36299e-5 kg; lognormal variance with pedigree 0.0376, pedigree (2,4,3,1,1)
  (same comment as for application of plant protection product, by field sprayer)
  properties: dry mass 1 kg, wet mass 1 kg

## Inputs from nature
- Carbon dioxide, in air [natural resource, in air]: 0.320983 kg; lognormal variance with pedigree 0.0106, pedigree (2,4,3,1,1)
  (same comment as for application of plant protection product, by field sprayer)
- Energy, gross calorific value, in biomass [natural resource, biotic]: 3.7104 MJ; lognormal variance with pedigree 0.0106, pedigree (2,4,3,1,1)
  The data was collected for a hectare area through interview
- Occupation, annual crop, irrigated [natural resource, land]: 0.112821 m2*year; lognormal variance with pedigree 0.0066, pedigree (2,4,3,1,1)
  (same comment as for application of plant protection product, by field sprayer)
- Transformation, from annual crop, irrigated [natural resource, land]: 0.123077 m2; lognormal variance with pedigree 0.0126, pedigree (2,4,3,1,1)
  (same comment as for application of plant protection product, by field sprayer)
- Transformation, to annual crop, irrigated [natural resource, land]: 0.123077 m2; lognormal variance with pedigree 0.0126, pedigree (2,4,3,1,1)
  (same comment as for application of plant protection product, by field sprayer)

## Emissions to nature
- Ammonia [air, non-urban air or from high stacks]: 0.000374615 kg; lognormal variance with pedigree 0.0126, pedigree (2,4,3,1,1)
  (same comment as for application of plant protection product, by field sprayer)
- Carbon dioxide, fossil [air, non-urban air or from high stacks]: 0.000444644 kg; lognormal variance with pedigree 0.0052, pedigree (2,4,3,1,1)
  (same comment as for application of plant protection product, by field sprayer)
- Dinitrogen monoxide [air, non-urban air or from high stacks]: 0.000106894 kg; lognormal variance with pedigree 0.0346, pedigree (2,4,3,1,1)
  (same comment as for application of plant protection product, by field sprayer)
- Nitrogen oxides [air, non-urban air or from high stacks]: 0.000281166 kg; lognormal variance with pedigree 0.0446, pedigree (2,4,3,1,1)
  (same comment as for application of plant protection product, by field sprayer)
- Water [air, non-urban air or from high stacks]: 0.0795386 m3; lognormal variance with pedigree 0.0052, pedigree (2,4,3,1,1)
  (same comment as for application of plant protection product, by field sprayer)
- Cadmium II [soil, agricultural]: 3.39902e-7 kg; lognormal variance with pedigree 0.0446, pedigree (2,4,3,1,1)
  (same comment as for application of plant protection product, by field sprayer)
- Carbendazim [soil, agricultural]: 5.53846e-5 kg; lognormal variance with pedigree 0.0376, pedigree (2,4,3,1,1)
  The data was collected for a hectare area through interview
- Chlorothalonil [soil, agricultural]: 6.23077e-5 kg; lognormal variance with pedigree 0.0376, pedigree (2,4,3,1,1)
  The data was collected for a hectare area through interview
- Chromium III [soil, agricultural]: 5.78306e-6 kg; lognormal variance with pedigree 0.0446, pedigree (2,4,3,1,1)
  (same comment as for application of plant protection product, by field sprayer)
- Copper ion [soil, agricultural]: 9.13194e-6 kg; lognormal variance with pedigree 0.0446, pedigree (2,4,3,1,1)
  (same comment as for application of plant protection product, by field sprayer)
- Dichlorvos [soil, agricultural]: 3.85846e-5 kg; lognormal variance with pedigree 0.0376, pedigree (2,4,3,1,1)
  The data was collected for a hectare area through interview
- Difenoconazole [soil, agricultural]: 6.92308e-6 kg; lognormal variance with pedigree 0.0376, pedigree (2,4,3,1,1)
  The data was collected for a hectare area through interview
- Lead II [soil, agricultural]: 1.19316e-5 kg; lognormal variance with pedigree 0.0446, pedigree (2,4,3,1,1)
  (same comment as for application of plant protection product, by field sprayer)
- Mercury II [soil, agricultural]: 2.53412e-8 kg; lognormal variance with pedigree 0.0446, pedigree (2,4,3,1,1)
  (same comment as for application of plant protection product, by field sprayer)
- Mineral oil [soil, agricultural]: 8.76923e-5 kg; lognormal variance with pedigree 0.0376, pedigree (2,4,3,1,1)
  Neemazol
- Nickel II [soil, agricultural]: 2.28493e-6 kg; lognormal variance with pedigree 0.0446, pedigree (2,4,3,1,1)
  (same comment as for application of plant protection product, by field sprayer)
- Zinc II [soil, agricultural]: 3.43733e-5 kg; lognormal variance with pedigree 0.0446, pedigree (2,4,3,1,1)
  (same comment as for application of plant protection product, by field sprayer)
- Cadmium II [water, ground-]: 5.52358e-10 kg; lognormal variance with pedigree 0.0946, pedigree (2,4,3,1,1)
  (same comment as for application of plant protection product, by field sprayer)
- Cadmium II [water, surface water]: 1.10608e-8 kg; lognormal variance with pedigree 0.0946, pedigree (2,4,3,1,1)
  (same comment as for application of plant protection product, by field sprayer)
- Chromium III [water, ground-]: 2.37803e-7 kg; lognormal variance with pedigree 0.0946, pedigree (2,4,3,1,1)
  (same comment as for application of plant protection product, by field sprayer)
- Chromium III [water, surface water]: 9.87739e-7 kg; lognormal variance with pedigree 0.0946, pedigree (2,4,3,1,1)
  (same comment as for application of plant protection product, by field sprayer)
- Copper ion [water, ground-]: 4.05194e-8 kg; lognormal variance with pedigree 0.0946, pedigree (2,4,3,1,1)
  (same comment as for application of plant protection product, by field sprayer)
- Copper ion [water, surface water]: 1.43894e-6 kg; lognormal variance with pedigree 0.0946, pedigree (2,4,3,1,1)
  (same comment as for application of plant protection product, by field sprayer)
- Lead II [water, ground-]: 6.66204e-9 kg; lognormal variance with pedigree 0.0946, pedigree (2,4,3,1,1)
  (same comment as for application of plant protection product, by field sprayer)
- Lead II [water, surface water]: 9.01679e-7 kg; lognormal variance with pedigree 0.0946, pedigree (2,4,3,1,1)
  (same comment as for application of plant protection product, by field sprayer)
- Mercury II [water, ground-]: 1.44242e-11 kg; lognormal variance with pedigree 0.0946, pedigree (2,4,3,1,1)
  (same comment as for application of plant protection product, by field sprayer)
- Mercury II [water, surface water]: 2.78636e-9 kg; lognormal variance with pedigree 0.0946, pedigree (2,4,3,1,1)
  (same comment as for application of plant protection product, by field sprayer)
- Nickel II [water, surface water]: 8.96069e-7 kg; lognormal variance with pedigree 0.0946, pedigree (2,4,3,1,1)
  (same comment as for application of plant protection product, by field sprayer)
- Nitrate [water, ground-]: 0.00697224 kg; lognormal variance with pedigree 0.0446, pedigree (2,4,3,1,1)
  (same comment as for application of plant protection product, by field sprayer)
- Phosphate [water, ground-]: 2.4215e-6 kg; lognormal variance with pedigree 0.0446, pedigree (2,4,3,1,1)
  (same comment as for application of plant protection product, by field sprayer)
- Phosphate [water, surface water]: 1.301e-5 kg; lognormal variance with pedigree 0.0446, pedigree (2,4,3,1,1)
  (same comment as for application of plant protection product, by field sprayer)
- Phosphorus [water, surface water]: 7.56002e-5 kg; lognormal variance with pedigree 0.0446, pedigree (2,4,3,1,1)
  (same comment as for application of plant protection product, by field sprayer)
- Water [water, ground-]: 0.0608236 m3; lognormal variance with pedigree 0.0052, pedigree (2,4,3,1,1)
  (same comment as for application of plant protection product, by field sprayer)
- Water [water, surface water]: 0.0155958 m3; lognormal variance with pedigree 0.0052, pedigree (2,4,3,1,1)
  (same comment as for application of plant protection product, by field sprayer)
- Zinc II [water, ground-]: 3.635e-7 kg; lognormal variance with pedigree 0.0946, pedigree (2,4,3,1,1)
  (same comment as for application of plant protection product, by field sprayer)
- Zinc II [water, surface water]: 2.51829e-6 kg; lognormal variance with pedigree 0.0946, pedigree (2,4,3,1,1)
  (same comment as for application of plant protection product, by field sprayer)

## Sampling procedure
The farmer was identified and contacted by agriculture science faculty familiar with the local farmers in the region. Data was collected directly from the farmer through semi-structured interview using a questionnaire based on the input requirements of the ecoinvent LCI calculation tool for crop production. The farmer does not maintain any written records and has provided the data from recent memory. In this region, typically farmers are unable to provide exact name of active ingredient in the pesticide they use and the same was noted from details given on the pesticide packet. Individual farmer is not able to calculate fuel consumption for his own farm alone and this information has been collected from farming community of the area.

## Extrapolations
Ecoinvent LCI calculation tool for crop production was used to calculate field emissions from the cultivation process.
