# treatment of waste polyurethane, inert material landfill

Dataset: EcoSpold 2, unit process
Geography: CH
Time period: 1995-01-01 to 2023-12-31
Technology level: current
Classification: ISIC rev.4 ecoinvent: 3821:Treatment and disposal of non-hazardous waste
Scenario: Business-as-Usual
System model: Allocation, cut-off by classification
Generated by: Gabor Doka (obsolete)
Published in: Doka G. 2007
Database: ecoinvent
isCopyrightProtected: true
accessRestrictedTo: 1

## General comment
This dataset represents the activity of waste disposal of 'waste polyurethane' in an inert material landfill.

## Included activities start
The activity starts with the waste being available at the gate of the treatment facility. Collection and transportation of the waste to the treatment plant is not included.

## Included activities end
The activity ends with the waste being treated and no direct emissions from inert material landfill (leachate) are inventoried, as they are considered negligible. The dataset contains only exchanges to process-specific burdens (energy, land use) and infrastructure.

## Geography
Modelling parameters affecting the treatment technology are specific to this geography and to the technology mix encountered in Switzerland in 2000.

## Technology
Inert material landfill with leachate collection system and renaturation after closure. 50% of the sites is equipped with a base seal.

## Reference product
- waste polyurethane: -1 kg; name RP; By-product classification Waste; CPC 39270: Waste, parings and scrap of plastics; HS2017 391590: Plastics n.e.c. in heading no. 3915; waste, parings and scrap; CAS 9009-54-5
  production volume 22019.2 kg; name RP_PV; = 533860000/0.330592351639303*0.00841688555967824*(0.13+0.14)*0.15*0.08*0.5
    Estimated value. The EU market for sealants in 2012 was of 533.860 thousand tons of sealants, more than 50% of this is constituted by silicon and polyurethane (ASI 2013). The percentage of polyurethane sealant (14%) and polyurethane foam (13%) are taken from Nerlfi et al. (2013). The CH production volume is extrapolated from the EU production volume using the nominal GDP of 2005 (source: United Nations, http://data.un.org/Glossary.aspx?q=GDP+%28current+US%24%29, accessed 20130726 and 20130312). Where EU GDP is 33% of the world and the CH GDP is 0.8% of the world. As the main application of this material is in the construction sector, the rate of waste production is assumed to be 15% (taken from the estimated value for gypsum (WRAP, n.d). The treatment route is taken from Hincapié et al. (2015) for the category of combustible waste (which includes sealants), where 28% is sent to recycling, 64% incineration, and 8% landfill. ASI (2013) Market Trends: Sealant Demand Growing in Europe. The construction industry continues to control the demand for sealants. Retrieved from: <http://www.adhesivesmag.com/articles/92423-market-trends-sealant-demand-growing-in-europe>, accessed 9th May 2016 Steven Nerlfi, Minesh Kusumgar and Michael Growney (2013) The Global Sealants Industry. Paint and Coatings Industry (PCI) (http://www.pcimag.com/articles/97675-the-global-sealants-market, accessed 20160122) WRAP (n.d.) International practice in plasterboard recycling: Canada. Retrieved from: http://www.wrap.org.uk/sites/files/wrap/Case%20study%20-%20Plasterboard%20recycling%20in%20Canada.pdf, accessed 3 May 2016 Ingrid Hincapié, Alejandro Caballero-Guzmán, Bernd Nowack (2015) Nanomaterials in Landfills Module 3: Nanomaterials in Construction Waste. EMPA, Swiss Federal Laboratories for Materials Science and Technology. St. Gallen, Switzerland
  property carbon content, fossil 0.641283
    C content was calculated for 1 kg DM, using data in Tab A.2, ecoinvent v2.2 report 13_I.
  property heating value, net 30.67 MJ
    Value taken from the general comment of the treatment dataset.
  property price 0 EUR2005
    Waste products are assigned a price of zero as they are assumed to require further treatment.
  properties: carbon allocation 0.64 kg, carbon content 0.641283, carbon content, non-fossil 0, dry mass 0.998 kg, water content 0.00200401, water in wet mass 0.002 kg, wet mass 1 kg

## Inputs from technosphere
- inert material landfill: 1.48e-9 unit; lognormal variance with pedigree 0.04, pedigree (1,1,5,1,1)
  landfill infrastructure per kg waste, uncerteinty heeded in module. This exchange has an activity link directly to the producing activity because the product is primarily consumed in the same geographical area where it is produced.
- process-specific burdens, inert material landfill: 1 kg; lognormal variance with pedigree 0.04, pedigree (1,1,5,1,1)
  process-specific burdens per kg waste, uncerteinty heeded in module.;activityLink introduced to establish a direct link to the corresponding regional supply of this product

## Review by Niels Jungbluth 2003-05-28
Passed.
