# treatment of waste polyurethane foam, collection for final disposal

Dataset: EcoSpold 2, unit process
Geography: RoW
Time period: 1994-01-01 to 2023-12-31
Technology level: current
Classification: ISIC rev.4 ecoinvent: 3821:Treatment and disposal of non-hazardous waste
Classification: EcoSpold01Categories: waste management/building demolition
Synonyms: PUR; PU; diol-diisocyanate copolymer
Tags: Treatment; ConvertedDataset
Scenario: Business-as-Usual
System model: Allocation, cut-off by classification
Generated by: Gabor Doka (obsolete)
Published in: Doka G. 2007
Database: ecoinvent
isCopyrightProtected: true
accessRestrictedTo: 1

## General comment
This is a renaming activity.The waste contains 1kg polyurethane (GSD=100%). Waste density is 30 kg/m3.
[This dataset was already contained in the ecoinvent database version 2. It was not individually updated during the transfer to ecoinvent version 3. Life Cycle Impact Assessment results may still have changed, as they are affected by changes in the supply chain, i.e. in other datasets. This dataset was generated following the ecoinvent quality guidelines for version 2. It may have been subject to central changes described in the ecoinvent version 3 change report (http://www.ecoinvent.org/database/ecoinvent-version-3/reports-of-changes/), and the results of the central updates were reviewed extensively. The changes added e.g. consistent water flows and other information throughout the database. The documentation of this dataset can be found in the ecoinvent reports of version 2, which are still available via the ecoinvent website. The change report linked above covers all central changes that were made during the conversion process.]

## Included activities end
transport to dismantling facilities, final disposal of waste material,

## Geography
Specific to the technology mix encountered in Switzerland in late 1990ies

## Technology
Building demolition with skid-steer loaders.

## Reference product
- waste polyurethane foam: -1 kg; name RP; By-product classification Waste; CPC 39270: Waste, parings and scrap of plastics; HS2017 391590: Plastics n.e.c. in heading no. 3915; waste, parings and scrap; CAS 9009-54-5
  EcoSpold01Location=CH
  production volume 2.70322e7 kg; name RP_PV; = 1691898160*0.13*0.15*0.82
    Estimated value. Total global sealants market consumes 1.69 billion kg of sealants, of which 240 million kg are polyurethane (excluding foam). To calculate the amount of waste per year, the ratio of 0.15 used for other C&D products is used (e.g. gypsum products boards and plasters WRAP (n.d.)
    From previous versions of the database, 82% is sent to disposal and 18% to sorting.
    Steven Nerlfi, Minesh Kusumgar and Michael Growney (2013) The Global Sealants Industry. Paint and Coatings Industry (PCI) (http://www.pcimag.com/articles/97675-the-global-sealants-market, accessed 20160122)
    WRAP (n.d.) International practice in plasterboard recycling: Canada. Retrieved from: http://www.wrap.org.uk/sites/files/wrap/Case%20study%20-%20Plasterboard%20recycling%20in%20Canada.pdf, accessed 3 May 2016
  property carbon content, fossil 0.641283
    Tab A.2, ecoinvent v2.2 report 13_I. Then C content was referred to 1 kg DM
  property price 0 EUR2005
    Waste products are assigned a price of zero as they are assumed to require further treatment.
  properties: carbon allocation 0.64 kg, carbon content 0.641283, carbon content, non-fossil 0, dry mass 0.998 kg, heating value, net 30.67 MJ, water content 0.00200401, water in wet mass 0.002 kg, wet mass 1 kg

## Inputs from technosphere
- waste polyurethane: -0.0117147, -0.00078273, -0.000130608, -0.976701, -0.000306999, -0.00998146, -5.91966e-5, -0.000323296 kg (8 suppliers, which the file names only by identifier); sum of these -1 kg; lognormal variance with pedigree 0.002, pedigree (1,1,1,5,1)
  disposed masses. Uncertainty calculated from uncertainty of waste composition
  EcoSpold01Location=CH
  production volume; = waste_polyurethane*RP_PV/ABS(RP)
    Calculated from the production volume of waste polyurethane foam in proportion to the respective output amounts.
  properties: carbon content, fossil 0.641283, dry mass 0.998 kg, heating value, net 30.67 MJ, water content 0.00200401, wet mass 1 kg
  note on carbon content, fossil: C content was calculated for 1 kg DM, using data in Tab A.2, ecoinvent v2.2 report 13_I.
  note on heating value, net: Value taken from the general comment of the treatment dataset.

## Sampling procedure
waste-specific calculation based on literature data

## Extrapolations
none This dataset has been copied from an original dataset covering the geography CH. The uncertainty has been adjusted accordingly.

## Review by Niels Jungbluth 2003-05-22
Passed. Calculation for standard deviation 95 of infrastructure, land occupation, transport services and other services can differ from standard Pedigree approach used in this project and figures obtained by this procedure.
