# treatment of non-sulfidic overburden, off-site

Dataset: EcoSpold 2, unit process
Geography: GLO
Time period: 2003-01-01 to 2023-12-31
Technology level: current
Classification: ISIC rev.4 ecoinvent: 3822:Treatment and disposal of hazardous waste
Classification: EcoSpold01Categories: waste management/residual material landfill
Tags: ConvertedDataset; Treatment
Scenario: Business-as-Usual
System model: Allocation, cut-off by classification
Generated by: Mischa Classen
Published in: Althaus H.-J. 2000
Database: ecoinvent
isCopyrightProtected: true
accessRestrictedTo: 1

## General comment
The module is designed for unspecific use for disposal of sulphidic tailings in non-ferrous metal extraction. The module includes land use. No rehabilitation is assumed
[This dataset was already contained in the ecoinvent database version 2. It was not individually updated during the transfer to ecoinvent version 3. Life Cycle Impact Assessment results may still have changed, as they are affected by changes in the supply chain, i.e. in other datasets. This dataset was generated following the ecoinvent quality guidelines for version 2. It may have been subject to central changes described in the ecoinvent version 3 change report (http://www.ecoinvent.org/database/ecoinvent-version-3/reports-of-changes/), and the results of the central updates were reviewed extensively. The changes added e.g. consistent water flows and other information throughout the database. The documentation of this dataset can be found in the ecoinvent reports of version 2, which are still available via the ecoinvent website. The change report linked above covers all central changes that were made during the conversion process.]

## Geography
No geographical context, inventory based on calculations

## Technology
No rehabilitation is assumed

## Reference product
- non-sulfidic overburden, off-site: -1 kg; By-product classification Waste; CPC 39990: Other wastes n.e.c.
  EcoSpold01Location=GLO
  production volume 1 kg
    NA
    Dummy value to be replaced by value to be calculated from the demand for this treatment activity
  property price 0 EUR2005
    Waste products are assigned a price of zero as they are assumed to require further treatment.
  properties: carbon allocation 0 kg, carbon content 0, carbon content, fossil 0, carbon content, non-fossil 0, dry mass 1 kg, water content 0, water in wet mass 0 kg, wet mass 1 kg

## Inputs from nature
- Occupation, dump site [natural resource, land]: 0.00663 m2*year; lognormal variance with pedigree 0.0987, pedigree (1,3,5,3,3)
- Transformation, from unspecified [natural resource, land]: 5.1e-5 m2; lognormal variance with pedigree 0.1787, pedigree (1,3,5,3,3)
- Transformation, to dump site [natural resource, land]: 5.1e-5 m2; lognormal variance with pedigree 0.1787, pedigree (1,3,5,3,3)

## Sampling procedure
Literature

## Extrapolations
see Geography and Technology

## Review by Roland Hischier 2003-07-02
Passed.
