# maintenance, locomotive

Dataset: EcoSpold 2, unit process
Geography: RoW
Time period: 1993-01-01 to 2023-12-31
Technology level: current
Classification: ISIC rev.4 ecoinvent: 3315:Repair of transport equipment, except motor vehicles
Classification: EcoSpold01Categories: transport systems/train
Tags: ConvertedDataset
Scenario: Business-as-Usual
System model: Allocation, cut-off by classification
Generated by: Michael Spielmann (obsolete)
Published in: Spielmann M. 2007
Database: ecoinvent
isCopyrightProtected: true
accessRestrictedTo: 1

## General comment
The values are obtained top down, using the overall yearly consumption of service garages and the number of locomotives used for goods transportation and owned by the SBB (307 in 2000). In order to allocate the maintenance expenditures between locomotives and wagons, we allocate 95% of the maintenance expenditures to wagon maintenance and 5% to locomotive maintenance. This al-location is based on the average vehicle weight (the weight of a locomotive is 3 times higher than an average wagon) and the number of vehicles in the rail equipment.
[This dataset was already contained in the ecoinvent database version 2. It was not individually updated during the transfer to ecoinvent version 3. Life Cycle Impact Assessment results may still have changed, as they are affected by changes in the supply chain, i.e. in other datasets. This dataset was generated following the ecoinvent quality guidelines for version 2. It may have been subject to central changes described in the ecoinvent version 3 change report (http://www.ecoinvent.org/database/ecoinvent-version-3/reports-of-changes/), and the results of the central updates were reviewed extensively. The changes added e.g. consistent water flows and other information throughout the database. The documentation of this dataset can be found in the ecoinvent reports of version 2, which are still available via the ecoinvent website. The change report linked above covers all central changes that were made during the conversion process.]

## Included activities end
This inventory includes energy processes (electricity, oil, natural gas and coal) which are obtained from service garages in Switzerland. Furthermore material expenditures for break shoes, lubricates and paint are included. Also, the disposal of wood and sludge is addressed. Land use and material expenditures due to buildings of service garages are not included.

## Geography
Maintenance data reflect the situation in Switzerland

## Technology
The data represent current maintenance standards.

## Time period
The energy data represents conditions in 2001. For some materials data from 1993 has been employed.

## Reference product
- maintenance, locomotive: 1 unit; By-product classification allocatable product; CPC 87149: Maintenance and repair services of other transport equipment
  EcoSpold01Location=RER
  production volume 2.67763 unit
    This is a placeholder value that does not reflect real-world production volumes. This dataset does not currently require a real-world production volume to work in the database framework, and no actual data were collected yet. This has no negative effect on the results of the ecoinvent database.
  property price 28926.2 EUR2005
    Calculated based on inputs: The price of the product has been calculated as a sum of the values of the material and energy inputs for this product. This value is therefore a rough estimation. It may underestimate the real price since there are additional expenses when producing any product. These expences can include for example labour costs, treatment of waste materials and profit for the producer. Please consider carefully whether this level of data quality is acceptable for your application.
  properties: carbon allocation 0 kg, carbon content 0

## Inputs from technosphere
- alkyd paint, white, without solvent, in 60% solution state: 121 kg; lognormal variance with pedigree 0.054, pedigree (3,1,5,5,1)
  Oral communication
  EcoSpold01Location=RER
  Uncertainty: oral communication
  properties: carbon content, fossil 0.140367, carbon content, non-fossil 0.199629, dry mass 1 kg, heating value, net 10.3 MJ, wet mass 1 kg
  note on carbon content, fossil: C content was calculated as an addition of C content in the raw materials.
- cast iron: 998 kg; lognormal variance with pedigree 0.0706, pedigree (4,3,5,5,1)
  EcoSpold01Location=RER
  Oral communication
  Uncertainty: oral communication
  properties: carbon content, fossil 0.04, dry mass 1 kg, wet mass 1 kg
  note on carbon content, fossil: Cast iron is made by remelting pig iron in small furnaces (e.g. cupola furnaces or electric arc furnaces) and poured into moulds to make castings. It usually contains 2% to 6% carbon (ecoinvent v2.2 report 10_partII). An average content of 4% was considered
- coke: 746.297, 1583.7 MJ (2 suppliers, which the file names only by identifier); sum of these 2330 MJ; lognormal variance with pedigree 0.082, pedigree (4,4,5,5,1)
  Oral communication
  EcoSpold01Location=RER
  Uncertainty: oral communication
  properties: carbon content, fossil 0.869149, dry mass 0.0328671 kg, heating value, net 28.6 MJ, water content 0.0638298, wet mass 0.034965 kg
  note on carbon content, fossil: 81.7% C and 6% water in wet mass (ecoinvent v2.1 report 6_VI Table 7.1)
- copper, cathode: 266 kg; lognormal variance with pedigree 0.07, pedigree (4,1,5,5,1)
  EcoSpold01Location=RER
  Oral communication
  Uncertainty: oral communication
  properties: dry mass 1 kg, wet mass 1 kg
- electricity, medium voltage: 1133.24, 22605.6, 7595.4, 347.037, 69.459, 14.9144, 2334.38 kWh (7 suppliers, which the file names only by identifier); sum of these 34100 kWh; lognormal variance with pedigree 0.054, pedigree (3,1,5,5,1)
  Oral communication
  EcoSpold01Location=UCTE
  Uncertainty: oral communication
- heat, district or industrial, natural gas: 345.568, 21029.4 MJ (2 suppliers, which the file names only by identifier); sum of these 21375 MJ; lognormal variance with pedigree 0.054, pedigree (3,1,5,5,1)
  EcoSpold01Location=RER
  Oral communication
  Uncertainty: oral communication
  properties: heating value, net 1 MJ
- heat, district or industrial, other than natural gas: 364581, 168.904 MJ (2 suppliers, which the file names only by identifier); sum of these 364750 MJ; lognormal variance with pedigree 0.054, pedigree (3,1,5,5,1)
  Oral communication
  EcoSpold01Location=RER
  Uncertainty: oral communication
  properties: heating value, net 1 MJ
- lubricating oil: 690 kg; lognormal variance with pedigree 0.054, pedigree (3,1,5,5,1)
  EcoSpold01Location=RER
  Oral communication
  Uncertainty: oral communication
  properties: carbon content, fossil 0.75, dry mass 1 kg, heating value, net 40.2 MJ, wet mass 1 kg
  note on carbon content, fossil: Lubricating oil is produced from diesel. C-content/dry mass of fats and oils considered 75%, from: ecoinvent v2.2 report, n 15a, pg 40
  note on heating value, net: Literature value, Source: IPCC 2006, 2006 IPCC Guidelines for National Greenhouse Gas Inventories, Prepared by the National Greenhouse Gas Inventories Programme, Eggleston H.S., Buendia L., Miwa K., Ngara T. and Tanabe K. (eds). Published: IGES, Japan
- polyvinylchloride, emulsion polymerised: 5.1064 kg; lognormal variance with pedigree 0.09, pedigree (5,5,5,5,1)
  Oral communication
  EcoSpold01Location=RER
  Uncertainty: oral communication
  properties: carbon content, fossil 0.387097, dry mass 1 kg, heating value, net 21.5 MJ, wet mass 1 kg
  note on carbon content, fossil: Monomer is vynyl chloride, C2H3Cl (ecoinvent v2.2 report 11_II). MW=62 g/mol
- polyvinylchloride, suspension polymerised: 34.8936 kg; lognormal variance with pedigree 0.09, pedigree (5,5,5,5,1)
  Oral communication
  EcoSpold01Location=RER
  Uncertainty: oral communication
  properties: carbon content, fossil 0.387097, dry mass 1 kg, heating value, net 21.5 MJ, wet mass 1 kg
- reinforcing steel: 29100 kg; lognormal variance with pedigree 0.0706, pedigree (4,3,5,5,1)
  Oral communication
  EcoSpold01Location=RER
  Uncertainty: oral communication
  properties: carbon content, fossil 0.004, dry mass 1 kg, wet mass 1 kg
- synthetic rubber: 840 kg; lognormal variance with pedigree 0.0706, pedigree (4,3,5,5,1)
  Oral communication
  EcoSpold01Location=RER
  Uncertainty: oral communication
  properties: carbon content, fossil 0.871949, dry mass 1 kg, heating value, net 26.42 MJ, wet mass 1 kg
  note on carbon content, fossil: EPDM (Ethylene-propene-diene terpolymer) rubber is a terpolymer of ethylene, propene, and a diene with the residual unsaturated portion of the diene in the side chain (ecoinvent v2.2 report 7-part XX & Ullmann). Chemical formula (deduced from Evidences of Solvent-Induced Miscibility in Polychloroprene-co-Ethylene-Propene Diene Terpolymer Blends, Dubey et al., Journal of Applied Polymer Science, 2009, 111:1884–1891): C20H35
- waste mineral oil: -920 kg; lognormal variance with pedigree 0.014, pedigree (3,1,1,5,1)
  Oral communication
  EcoSpold01Location=CH
  Uncertainty: oral communication
  production volume
    Calculated from the production volume of maintenance, locomotive in proportion to the respective output amounts.
  properties: carbon content, fossil 0.864444, dry mass 0.9 kg, heating value, net 34.7 MJ, water content 0.111111, wet mass 1 kg
  note on carbon content, fossil: Tab A.6, ecoinvent v2.2 report 13_I. C content has been calculated after data in the tables, and then referred to 1 kg DM
  note on heating value, net: Value taken from the general comment of the treatment dataset.
- waste wood, untreated: -239.214, -6.22681, -4640.18, -85.1689, -36.1395, -57.1335, -685.933 kg (7 suppliers, which the file names only by identifier); sum of these -5750 kg; lognormal variance with pedigree 0.014, pedigree (3,1,1,5,1)
  EcoSpold01Location=CH
  Oral communication
  Uncertainty: oral communication
  production volume
    (same comment as for waste mineral oil)
  properties: carbon content, non-fossil 0.48632, dry mass 0.8 kg, heating value, net 13.99 MJ, water content 0.25, wet mass 1 kg
  note on carbon content, non-fossil: Tab A.4, ecoinvent v2.2 report 13_I. C content has been referred to 1 kg DM,

## Sampling procedure
Maintenance expenditures for all SBB service garages available in form of oral communication.

## Extrapolations
Data from the Swiss Rail Company is used as an first estimate for Europe This dataset has been copied from an original dataset covering the geography RER. The uncertainty has been adjusted accordingly.

## Review by Niels Jungbluth 2003-07-23
passed
