# heat production, light fuel oil, at industrial furnace 1MW

Dataset: EcoSpold 2, unit process
Geography: CA-QC
Time period: 2000-01-01 to 2023-12-31
Technology level: current
Classification: ISIC rev.4 ecoinvent: 3530:Steam and air conditioning supply
Classification: EcoSpold01Categories: oil/heating systems
Tags: Recontextualization
Scenario: Business-as-Usual
System model: Allocation, cut-off by classification
Generated by: Pablo Tirado
Published in: Jungbluth, N. 2007
Database: ecoinvent
isCopyrightProtected: true
accessRestrictedTo: 1

## General comment
This dataset represents the production of heat from light fuel oil at industrial furnaces in Quebec.This is an adaptation for Quebec from the light fuel oil global dataset. Only time period, annual production volume and heating value have been modified. Uncertainties have been adjusted accordingly.

## Included activities start
Activity starts with the combustion of the fuel.

## Included activities end
This activity ends with 1MJ of heat produced by the furnace.
This dataset includes:

-fuel inputs;
-emissions due to combustion of fuel;
-inputs needed for combustion (electricity);
-by-products of combustion
-infrastructures

## Geography
Quebec dataset based on Global dataset, which was itself based on european conditions. Uncertainty has been modified accordingly

## Technology
Based on GLO dataset. Uncertainty has been modified accordingly. New data for regulated emissions like NOx, particles, other figures are partly based on older literature data. Uncertainty has been modified accordingly.

## Time period
Average non-modulating, non-condensing furnace used in 2000. It is considered valid until 2015. Uncertainty has been modified accordingly.

## Parameters
- annual fuel consumption in kg: 4.51156e7 kg; name annualFuelConsumptionKg; = annualFuelConsumptionLitre* LFOIn_density; lognormal variance with pedigree 0.0012, pedigree (2,1,1,1,1)
  Data on fuel consumption of industrial sectors provided by the MDDEP (Quebec Ministry of Sustainable Development, Environment, Wildlife and Parks).
  Average of the period 2005-2009
  Uncertainty: Variance from default value table.
  DQP based on the quality of the data (primary data from Quebec gouvernment)
- annual fuel consumption in liters: 5.246e7 l; name annualFuelConsumptionLitre; lognormal variance with pedigree 0.0012, pedigree (2,1,1,1,1)
  (same comment as for annual fuel consumption in kg)

## Reference product
- heat, district or industrial, other than natural gas: 1 MJ; By-product classification allocatable product; CPC 17300: Steam and hot water
  EcoSpold01Location=RER
  production volume 1.83005e9 MJ; = annualFuelConsumptionKg/ LFOIn
    Literature/calculated value. Annual fuel consumption, in mass (statistics from Quebec), divided by the amount of fuel needed to produce 1MJ (this amount includes the efficiency of the process).
  property Corresponding fuel use 1.05022 MJ; name fuel_use; = 0.024653*42.6/1
    This property represents the inverse of the efficiency of the boiler. It is calculated by dividing the lower heating value of the fuel input by the heat/electricity output.
  property price 0.0106 EUR2005
    Average European district heat price from Ecoheatcool and Euroheat 2005-2006, Ecoheat Work package 1: The European heat market. Final report. 10.6 EUR/GJ i s the price of district heat. http://www.solarthermalworld.org/files/Ecoheatcool%20WP1%20Web.pdf?download
  properties: carbon allocation 0 kg, carbon content 0, heating value, net 1 MJ

## Inputs from technosphere
All rows: source Jungbluth, N. 2007
- chimney: 3.65495e-8 m; lognormal variance with pedigree 0.3626, pedigree (3,3,5,5,3)
  Calculated
  EcoSpold01Location=CH
  Uncertainty: Completeness, temporal, geographical and technological indicators adapted considering differences with original dataset.
- electricity, low voltage: 0.000875168 kWh; lognormal variance with pedigree 0.0512, pedigree (2,3,5,5,3)
  Literature
  EcoSpold01Location=UCTE
  Uncertainty: Completeness, temporal, geographical and technological indicators adapted considering differences with original dataset.
- industrial furnace, 1MW, oil: 2.924e-9 unit; lognormal variance with pedigree 0.3626, pedigree (3,3,5,5,3)
  Estimation 5000h use per year
  EcoSpold01Location=CH
  Uncertainty: Completeness, temporal, geographical and technological indicators adapted considering differences with original dataset.
- light fuel oil: 0.0246526 kg; name LFOIn; lognormal variance with pedigree 0.0512, pedigree (2,3,5,5,3)
  EcoSpold01Location=RER
  Literature
  Uncertainty: Completeness, temporal, geographical and technological indicators adapted considering differences with original dataset.
  property density 0.86 kg/l; name LFOIn_density
  properties: carbon content, fossil 0.862, dry mass 1 kg, heating value, net 42.6 MJ, wet mass 1 kg
- oil storage, 3000l: 3.89863e-8 unit; lognormal variance with pedigree 0.3626, pedigree (3,3,5,5,3)
  (same comment as for chimney)

## Emissions to nature
All rows: source Jungbluth, N. 2007
- Ammonia [air, urban air close to ground]: 1.57895e-7 kg; lognormal variance with pedigree 0.51, pedigree (1,1,5,5,3)
  Literature, calculation from ranges
  Uncertainty: Completeness, temporal, geographical and technological indicators adapted considering differences with original dataset.
- Benzene [air, urban air close to ground]: 1.57895e-8 kg; lognormal variance with pedigree 0.8626, pedigree (3,3,5,5,3)
  Literature, basic uncertainty estimated = 6
  Uncertainty: Completeness, temporal, geographical and technological indicators adapted considering differences with original dataset.
- Benzo(a)pyrene [air, urban air close to ground]: 2.94737e-11 kg; lognormal variance with pedigree 0.8626, pedigree (3,3,5,5,3)
  (same comment as for Benzene)
- Butane [air, urban air close to ground]: 3.31579e-7 kg; lognormal variance with pedigree 0.8626, pedigree (3,3,5,5,3)
  (same comment as for Benzene)
- Carbon dioxide, fossil [air, urban air close to ground]: 0.0778947 kg; lognormal variance with pedigree 0.0526, pedigree (3,3,5,5,3)
  Literature
  Uncertainty: Completeness, temporal, geographical and technological indicators adapted considering differences with original dataset.
- Carbon monoxide, fossil [air, urban air close to ground]: 4.21053e-6 kg; lognormal variance with pedigree 0.2112, pedigree (2,3,5,5,3)
  Calculation from ranges
  Uncertainty: Completeness, temporal, geographical and technological indicators adapted considering differences with original dataset.
- Copper ion [air, urban air close to ground]: 7.36842e-7 kg; lognormal variance with pedigree 0.7026, pedigree (3,3,5,5,3)
  (same comment as for Carbon dioxide, fossil)
- Dinitrogen monoxide [air, urban air close to ground]: 6.31579e-7 kg; lognormal variance with pedigree 0.58, pedigree (1,1,5,5,3)
  (same comment as for Carbon monoxide, fossil)
- Dioxins, measured as 2,3,7,8-tetrachlorodibenzo-p-dioxin [air, urban air close to ground]: 4.73684e-16 kg; lognormal variance with pedigree 0.3626, pedigree (3,3,5,5,3)
  (same comment as for Carbon dioxide, fossil)
- Formaldehyde [air, urban air close to ground]: 9.47368e-7 kg; lognormal variance with pedigree 0.8612, pedigree (2,3,5,5,3)
  (same comment as for Benzene)
- Hydrocarbons, aliphatic, alkanes, unspecified [air, urban air close to ground]: 5.05263e-7 kg; lognormal variance with pedigree 0.8626, pedigree (3,3,5,5,3)
  (same comment as for Benzene)
- Hydrocarbons, aromatic [air, urban air close to ground]: 3.15789e-8 kg; lognormal variance with pedigree 0.8626, pedigree (3,3,5,5,3)
  (same comment as for Benzene)
- Hydrochloric acid [air, urban air close to ground]: 9.89474e-8 kg; lognormal variance with pedigree 0.1026, pedigree (3,3,5,5,3)
  (same comment as for Carbon dioxide, fossil)
- Hydrogen fluoride [air, urban air close to ground]: 9.47368e-9 kg; lognormal variance with pedigree 0.1026, pedigree (3,3,5,5,3)
  (same comment as for Carbon dioxide, fossil)
- Mercury II [air, urban air close to ground]: 5.26316e-10 kg; lognormal variance with pedigree 0.7026, pedigree (3,3,5,5,3)
  (same comment as for Carbon dioxide, fossil)
- Methane, fossil [air, urban air close to ground]: 1.05263e-6 kg; lognormal variance with pedigree 0.8612, pedigree (2,3,5,5,3)
  (same comment as for Benzene)
- Nitrogen oxides [air, urban air close to ground]: 5.26316e-5 kg; lognormal variance with pedigree 0.7012, pedigree (2,3,5,5,3)
  (same comment as for Carbon monoxide, fossil)
- PAH, polycyclic aromatic hydrocarbons [air, urban air close to ground]: 6.10526e-10 kg; lognormal variance with pedigree 0.3626, pedigree (3,3,5,5,3)
  (same comment as for Carbon dioxide, fossil)
- Particulate Matter, < 2.5 um [air, urban air close to ground]: 1.05263e-7 kg; lognormal variance with pedigree 0.3626, pedigree (3,3,5,5,3)
  (same comment as for Carbon dioxide, fossil)
- Pentane [air, urban air close to ground]: 2.21053e-7 kg; lognormal variance with pedigree 0.8626, pedigree (3,3,5,5,3)
  (same comment as for Benzene)
- Propane [air, urban air close to ground]: 2.11579e-8 kg; lognormal variance with pedigree 0.8626, pedigree (3,3,5,5,3)
  (same comment as for Benzene)
- Sulfur dioxide [air, urban air close to ground]: 4.93053e-5 kg; lognormal variance with pedigree 1.2512, pedigree (2,3,5,5,3)
  (same comment as for Carbon monoxide, fossil)
- Toluene [air, urban air close to ground]: 3.15789e-8 kg; lognormal variance with pedigree 0.8626, pedigree (3,3,5,5,3)
  (same comment as for Benzene)
- Zinc II [air, urban air close to ground]: 7.36842e-7 kg; lognormal variance with pedigree 0.7026, pedigree (3,3,5,5,3)
  (same comment as for Carbon dioxide, fossil)

## Sampling procedure
Data published in literature based on measurements.

## Extrapolations
see Geography This dataset has been extrapolated from the corresponding global dataset, which was itself extrapolated from a dataset covering the geography RER without Switzerland. The uncertainty has been adjusted accordingly.

## Review by Christian Bauer 2013-10-11
passed
