# mine construction, gold

Dataset: EcoSpold 2, unit process
Geography: RoW
Time period: 2001-01-01 to 2023-12-31
Technology level: current
Classification: EcoSpold01Categories: metals/extraction
Classification: ISIC rev.4 ecoinvent: 4290:Construction of other civil engineering projects
Tags: ConvertedDataset
Scenario: Business-as-Usual
System model: Allocation, cut-off by classification
Generated by: Matthias Tuchschmid (obsolete)
Published in: Classen M. 2009
Database: ecoinvent
isCopyrightProtected: true
accessRestrictedTo: 1

## General comment
This data set includes land use of the considered mines (open pit and underground) incl. revegetated areas as well as estimates of buildings and machinery of the mine based on the data set non-ferrous metal, mine, surface/underground.
[This dataset was already contained in the ecoinvent database version 2. It was not individually updated during the transfer to ecoinvent version 3. Life Cycle Impact Assessment results may still have changed, as they are affected by changes in the supply chain, i.e. in other datasets. This dataset was generated following the ecoinvent quality guidelines for version 2. It may have been subject to central changes described in the ecoinvent version 3 change report (http://www.ecoinvent.org/database/ecoinvent-version-3/reports-of-changes/), and the results of the central updates were reviewed extensively. The changes added e.g. consistent water flows and other information throughout the database. The documentation of this dataset can be found in the ecoinvent reports of version 2, which are still available via the ecoinvent website. The change report linked above covers all central changes that were made during the conversion process.]

## Included activities start
The activity starts with the occupation and transformation of unspecified land.

## Included activities end
Land use, buildings and machinery of mining.

## Geography
Land use of Australian mine, other inputs based on rough assumptions.

## Technology
Assumptions for buildings and machinery based on the data set "non-ferrous metal, mine, surface/underground with 50 years life time.

## Time period
Period of public environmental report

## Reference product
- mine infrastructure, gold: 1 unit; By-product classification allocatable product; CPC 53261: Mining constructions
  EcoSpold01Location=AU
  production volume 4.50633 unit
    Calculated as the weighted average of the requirement per kg gold in the gold production datasets
  property price 3.38664e7 EUR2005
    Calculated based on inputs: The price of the product has been calculated as a sum of the values of the material and energy inputs for this product. This value is therefore a rough estimation. It may underestimate the real price since there are additional expenses when producing any product. These expences can include for example labour costs, treatment of waste materials and profit for the producer. Please consider carefully whether this level of data quality is acceptable for your application.
  properties: carbon allocation 0 kg, carbon content 0

## Inputs from technosphere
- building, hall: 13157.9 m2; lognormal variance with pedigree 0.318, pedigree (4,5,5,5,5)
  EcoSpold01Location=CH
  Rough estimates
  Uncertainty: Rough estimates
- building, multi-storey: 275000 m3; lognormal variance with pedigree 0.318, pedigree (4,5,5,5,5)
  EcoSpold01Location=RER
  Rough estimates
  Uncertainty: Rough estimates
- conveyor belt: 2021.08 m; lognormal variance with pedigree 0.318, pedigree (4,5,5,5,5)
  Rough estimates
  EcoSpold01Location=RER
  Uncertainty: Rough estimates
- industrial machine, heavy, unspecified: 263604, 533764 kg (2 suppliers, which the file names only by identifier); sum of these 797368 kg; lognormal variance with pedigree 0.318, pedigree (4,5,5,5,5)
  Rough estimates
  EcoSpold01Location=RER
  Uncertainty: Rough estimates

## Inputs from nature
- Occupation, mineral extraction site [natural resource, land]: 2.11954e9 m2*year; lognormal variance with pedigree 0.0826, pedigree (1,3,5,5,1)
  Environmental report, Newmont 2005
  Uncertainty: Environmental report, Newmont 2005
- Transformation, from mineral extraction site [natural resource, land]: 6.35558e7 m2; lognormal variance with pedigree 0.1626, pedigree (1,3,5,5,1)
  Environmental report, Newmont 2005
  Uncertainty: Environmental report, Newmont 2005
- Transformation, from unspecified [natural resource, land]: 6.35558e7 m2; lognormal variance with pedigree 0.1626, pedigree (1,3,5,5,1)
  Environmental report, Newmont 2005
  Uncertainty: Environmental report, Newmont 2005
- Transformation, to heterogeneous, agricultural [natural resource, land]: 6.69181e6 m2; lognormal variance with pedigree 0.1626, pedigree (1,3,5,5,1)
  Environmental report, Newmont 2005
  Uncertainty: Environmental report, Newmont 2005
- Transformation, to mineral extraction site [natural resource, land]: 6.35558e7 m2; lognormal variance with pedigree 0.1626, pedigree (1,3,5,5,1)
  Environmental report, Newmont 2005
  Uncertainty: Environmental report, Newmont 2005
- Transformation, to unspecified [natural resource, land]: 5.68641e7 m2; lognormal variance with pedigree 0.1626, pedigree (1,3,5,5,1)
  Environmental report, Newmont 2005
  Uncertainty: Environmental report, Newmont 2005

## Sampling procedure
environmental report

## Extrapolations
Buildings and machinery are based on global assumptions. The figures are extrapolated on the basis of the ore production. This dataset has been copied from an original dataset covering the geography AU. The uncertainty has been adjusted accordingly.

## Review by Roberto Dones 2007-09-20
passed
none
