# bell pepper production, open field

Dataset: EcoSpold 2, unit process
Geography: IN-UP
Time period: 2015-01-01 to 2023-12-31
Technology level: current
Classification: ISIC rev.4 ecoinvent: 0128:Growing of spices, aromatic, drug and pharmaceutical crops
Scenario: Business-as-Usual
System model: Allocation, cut-off by classification
Generated by: Sanjeevan Bajaj
Database: ecoinvent
isCopyrightProtected: true
accessRestrictedTo: 1

## General comment
This dataset represents the production of 1 kg of fresh Capsicum during September, 2015-May, 2016 at a farm located in village Bhagatpur Ratan, District Moradabad of Uttar Pradesh State in India. In this area, fields are irrigated with ground water using electric pump for surface irrigation. The farm has a yield of 3000 kg fresh matter per ha for this crop cycle. Sowing date for the crop is 12-October, 2015 and harvesting date is 14-Feburary, 2016. Mineral NP fertilizer input is 245.63-69 kg/ha. Organic fertilizer applied amounts to 60,000 kg of manure from cattle dung. Insecticide used has active ingredient as Carbofuran 450g/ha, Chlorantranilipore 60g/ha (Clothianidin used as proxy), Thiomethoxam 75g/ha, Monocrotophos 540g/ha (Dichlorvos (DDVP) used as proxy). Machinery is used only for soil cultivation with fuel consumption of 12.48 kg/ha using plough and rotary cultivator for soil tillage.
[This dataset is meant to replace the following datasets:]

## Included activities start
This activity starts about twelve weeks after the harvest of the previous crop. The soil is prepared for cultivation in First week of September and sowing of seeds started about five weeks after soil preparation. Thereafter the crop is mature for harvesting in about 4 months.

## Included activities end
The activity ends with the harvesting of the mature Capsicum from the Capsicum plant

## Geography
Village Bhagatpur Ratan, District Moradabad of Uttar Pradesh State in India

## Technology
Cultivation of Capsicum follows conventional production standards

## Time period
Soil cultivating date for the main crop: 07-September, 2015; Harvesting date main crop: 14-Feburary, 2016. The soil cultivation, sowing and harvesting dates are taken as the middle date of the week or fortnight told to the data collector by the farmer. Total time from date of sowing to date of harvesting comes to 125 days. The data is collected for one crop cycle. The cycle of one year is considered for entry in ecoeditor.

## Parameters
- LUC_crop_specific: 1 dimensionless
  This parameter allows to switch between a "crop specific" and a "country specific" approach when calculating the LUC of a crop. By default, the chosen approach is "crop specific", so the value of the parameter is 1. If you want to apply a "country specific" approach, turn the parameter to 0.

## Reference product
- bell pepper: 1 kg; By-product classification allocatable product; CPC 01231: Chillies and peppers, green (Capsicum spp. and Pimenta spp.); HS2017 090411: Spices; pepper (of the genus piper), neither crushed nor ground
  production volume 8.189e7 kg; = (33.84+25.89+17.35+4.81)*1000*1000
    http://agriexchange.apeda.gov.in/India%20Production/India_Productions.aspx?hscode=1072 Production volume for Madhya Pradesh, Jharkhand, Haryana, Punjab is taken, as similar conditions prevail in these four States in reference to the actual location of the farm from which the data is collected. Figure is in thousand tonnes
  property price 0.687623 EUR2005
    Literature value. Price from FAOSTAT data Producer Prices - Annual (retrieved from: http://www.fao.org/faostat/en/#data/PP, accessed 15Feb2018). Data from 2005.
  properties: carbon allocation 0 kg, carbon content 0

## Inputs from technosphere
- [thio]carbamate-compound: 0.00015 kg; lognormal variance with pedigree 0.0052, pedigree (2,4,3,1,1)
  Calculated Value. This value has been calculated by using the ecoinvent LCI calculation tool for crop production.
  properties: carbon content, fossil 0.626349, dry mass 1 kg, wet mass 1 kg
- compost: 20 kg; lognormal variance with pedigree 0.0052, pedigree (2,4,3,1,1)
  Home made compost
  property cadmium content 3.6e-7; name Cd_content
  property chromium content 2.23e-5; name Cr_content
  property copper content 5.77e-5; name Cu_content
  property dry mass 0.5 kg; name DM
  property lead content 4.9e-5; name Pb_content
  property mercury content 1.2e-7; name Hg_content
  property nickel content 1.63e-5; name Ni_content
  property nitrogen content 0.014; name N_content
  property phosphorus content 0.0035; name P_content
  property potassium content 0.01; name K_content
  property zinc content 0.000184; name Zn_content
  properties: carbon content, non-fossil 0.183645, water content 1, wet mass 1 kg
- cyclic N-compound: 4.5e-5 kg; lognormal variance with pedigree 0.0052, pedigree (2,4,3,1,1)
  This exchange is an aggregation of amounts:
  1.9999999999999998E-5. Comment:
  2.4999999999999998E-5. Comment:
  properties: carbon content, fossil 0.641962, dry mass 1 kg, wet mass 1 kg
- inorganic nitrogen fertiliser, as N: 0.0131 kg; lognormal variance with pedigree 0.0052, pedigree (2,4,3,1,1)
  This exchange is an aggregation of amounts:
  5.92281387178312E-6. Comment:
  1.0884954469483347E-4. Comment:
  4.888900782089441E-4. Comment:
  4.888900782089441E-4. Comment:
  2.39572171843368E-4. Comment:
  properties: dry mass 1 kg, wet mass 1 kg
- inorganic phosphorus fertiliser, as P2O5: 0.023 kg; lognormal variance with pedigree 0.0052, pedigree (2,4,3,1,1)
  (same comment as for inorganic nitrogen fertiliser, as N)
  properties: dry mass 1 kg, wet mass 1 kg
- irrigation: 0.27 m3; lognormal variance with pedigree 0.0052, pedigree (2,4,3,1,1)
  The data was collected for a hectare area through interview
  properties: dry mass 0.11 kg, water content 9089.91, wet mass 1000 kg
- lime: 0.0117373 kg; lognormal variance with pedigree 0.0052, pedigree (2,4,3,1,1)
  (same comment as for [thio]carbamate-compound)
  properties: carbon content, fossil 0.120005, dry mass 1 kg, wet mass 1 kg
- organophosphorus-compound, unspecified: 0.00018 kg; lognormal variance with pedigree 0.0052, pedigree (2,4,3,1,1)
  (same comment as for [thio]carbamate-compound)
  properties: carbon content, fossil 0.260898, dry mass 1 kg, wet mass 1 kg
- packaging, for fertilisers: 0.233225 kg; lognormal variance with pedigree 0.0532, pedigree (4,3,3,5,4)
  Total amount of active substance/s of fertilisers needed for the production of 'bell pepper' is calculated to be circa 1.17E-01 kg. Fertiliser/s used in this dataset is/are: 'lime', 'nitrogen fertiliser, as N', 'phosphate fertiliser, as P2O5', 'urea, as N'. The total amount of active substance/s is doubled in order to account for the packaging of the dilluted product of fertiliser/s that is/are applied. Therefore, 2.33E-01 kg of packaging for fertilisers is justified with this exchange.
  properties: carbon content, fossil 0.825301, dry mass 1 kg, heating value, net 25.01 MJ, price 0.0642 EUR2005, wet mass 1 kg
  note on carbon content, fossil: Considering a chemical formula (C2H4)n for polyethylene, carbon content-fossil is calculated to be 0.856286 kg of Carbon per kg of dry mass.
- packaging, for pesticides: 0.00075 kg; lognormal variance with pedigree 0.0532, pedigree (4,3,3,5,4)
  Total amount of active substance/s of pesticides needed for the production of bell pepper is calculated to be circa 3.75E-04 kg. Pesticide/s used in this dataset is/are: '[thio]carbamate-compound', 'cyclic N-compound', 'organophosphorus-compound, unspecified'. The total amount of active substance/s is doubled in order to account for the packaging of the dilluted product of pesticide/s that is/are applied. Therefore, 7.50E-04 kg of packaging for pesticides is justified with this exchange.
  properties: carbon content, fossil 0.85714, dry mass 1 kg, heating value, net 25.97 MJ, price 0.0642 EUR2005, wet mass 1 kg
- polyethylene, high density, granulate: 0.00198333 kg; lognormal variance with pedigree 0.0052, pedigree (2,4,3,1,1)
  (same comment as for [thio]carbamate-compound)
  properties: carbon content, fossil 0.857143, dry mass 1 kg, heating value, net 42.47 MJ, wet mass 1 kg
  note on carbon content, fossil: Polyethylene is formed out of a huge amount of ethylene monomers (C2H4) (ecoinvent v2.2 report 11_II). MW=28 g/mol
- tillage, ploughing: 0.000106789 ha; lognormal variance with pedigree 0.0052, pedigree (2,4,3,1,1)
  (same comment as for [thio]carbamate-compound)
- tillage, rotary cultivator: 9.73617e-5 ha; lognormal variance with pedigree 0.0052, pedigree (2,4,3,1,1)
  (same comment as for [thio]carbamate-compound)
- urea: 0.14744 kg; lognormal variance with pedigree 0.0052, pedigree (2,4,3,1,1)
  The exchange has been updated from 'urea, as N' into 'urea' and therefore its amount has been scaled (multiplied) from 0.0688 kg by 2.1438 kg of 'urea' per kg of 'urea, as N'. Original comment of the exchange is: The data was collected for a hectare area through interview
  properties: carbon content, fossil 0.2, dry mass 1 kg, wet mass 1 kg

## Inputs from nature
- Carbon dioxide, in air [natural resource, in air]: 0.320983 kg; lognormal variance with pedigree 0.0052, pedigree (2,4,3,1,1)
  (same comment as for [thio]carbamate-compound)
- Energy, gross calorific value, in biomass [natural resource, biotic]: 3.7104 MJ; lognormal variance with pedigree 0.0052, pedigree (2,4,3,1,1)
  The data was collected for a hectare area through interview
- Occupation, annual crop, irrigated [natural resource, land]: 2.08333 m2*year; lognormal variance with pedigree 0.0066, pedigree (2,4,3,1,1)
  (same comment as for [thio]carbamate-compound)
- Transformation, from annual crop, irrigated [natural resource, land]: 3.33333 m2; lognormal variance with pedigree 0.0126, pedigree (2,4,3,1,1)
  (same comment as for [thio]carbamate-compound)
- Transformation, to annual crop, irrigated [natural resource, land]: 3.33333 m2; lognormal variance with pedigree 0.0126, pedigree (2,4,3,1,1)
  (same comment as for [thio]carbamate-compound)

## Emissions to nature
- Ammonia [air, non-urban air or from high stacks]: 0.0264796 kg; lognormal variance with pedigree 0.0126, pedigree (2,4,3,1,1)
  (same comment as for [thio]carbamate-compound)
- Carbon dioxide, fossil [air, non-urban air or from high stacks]: 0.113207 kg; lognormal variance with pedigree 0.0052, pedigree (2,4,3,1,1)
  (same comment as for [thio]carbamate-compound)
- Dinitrogen monoxide [air, non-urban air or from high stacks]: 0.00448087 kg; lognormal variance with pedigree 0.0346, pedigree (2,4,3,1,1)
  (same comment as for [thio]carbamate-compound)
- Nitrogen oxides [air, non-urban air or from high stacks]: 0.0136072 kg; lognormal variance with pedigree 0.0446, pedigree (2,4,3,1,1)
  (same comment as for [thio]carbamate-compound)
- Water [air, non-urban air or from high stacks]: 0.1377 m3; lognormal variance with pedigree 0.0052, pedigree (2,4,3,1,1)
  (same comment as for [thio]carbamate-compound)
- Cadmium II [soil, agricultural]: 4.46263e-6 kg; lognormal variance with pedigree 0.0446, pedigree (2,4,3,1,1)
  (same comment as for [thio]carbamate-compound)
- Carbofuran [soil, agricultural]: 0.00015 kg; lognormal variance with pedigree 0.0376, pedigree (2,4,3,1,1)
  (same comment as for [thio]carbamate-compound)
- Chromium III [soil, agricultural]: 0.000218322 kg; lognormal variance with pedigree 0.0446, pedigree (2,4,3,1,1)
  (same comment as for [thio]carbamate-compound)
- Clothianidin [soil, agricultural]: 2e-5 kg; lognormal variance with pedigree 0.0376, pedigree (2,4,3,1,1)
  (same comment as for [thio]carbamate-compound)
- Copper ion [soil, agricultural]: 0.000557218 kg; lognormal variance with pedigree 0.0446, pedigree (2,4,3,1,1)
  (same comment as for [thio]carbamate-compound)
- Dichlorvos [soil, agricultural]: 0.00018 kg; lognormal variance with pedigree 0.0376, pedigree (2,4,3,1,1)
  (same comment as for [thio]carbamate-compound)
- Lead II [soil, agricultural]: 0.00047367 kg; lognormal variance with pedigree 0.0446, pedigree (2,4,3,1,1)
  (same comment as for [thio]carbamate-compound)
- Mercury II [soil, agricultural]: 1.1898e-6 kg; lognormal variance with pedigree 0.0126, pedigree (2,4,3,1,1)
  (same comment as for [thio]carbamate-compound)
- Nickel II [soil, agricultural]: 0.00015101 kg; lognormal variance with pedigree 0.0446, pedigree (2,4,3,1,1)
  (same comment as for [thio]carbamate-compound)
- Thiamethoxam [soil, agricultural]: 2.5e-5 kg; lognormal variance with pedigree 0.0376, pedigree (2,4,3,1,1)
  (same comment as for [thio]carbamate-compound)
- Zinc II [soil, agricultural]: 0.00179281 kg; lognormal variance with pedigree 0.0446, pedigree (2,4,3,1,1)
  (same comment as for [thio]carbamate-compound)
- Cadmium II [water, ground-]: 1.0109e-8 kg; lognormal variance with pedigree 0.0946, pedigree (2,4,3,1,1)
  (same comment as for [thio]carbamate-compound)
- Cadmium II [water, surface water]: 1.64792e-7 kg; lognormal variance with pedigree 0.0946, pedigree (2,4,3,1,1)
  (same comment as for [thio]carbamate-compound)
- Chromium III [water, ground-]: 4.40263e-6 kg; lognormal variance with pedigree 0.0946, pedigree (2,4,3,1,1)
  (same comment as for [thio]carbamate-compound)
- Chromium III [water, surface water]: 1.48868e-5 kg; lognormal variance with pedigree 0.0946, pedigree (2,4,3,1,1)
  (same comment as for [thio]carbamate-compound)
- Copper ion [water, ground-]: 7.49355e-7 kg; lognormal variance with pedigree 0.0946, pedigree (2,4,3,1,1)
  (same comment as for [thio]carbamate-compound)
- Copper ion [water, surface water]: 2.16637e-5 kg; lognormal variance with pedigree 0.0946, pedigree (2,4,3,1,1)
  (same comment as for [thio]carbamate-compound)
- Lead II [water, ground-]: 1.24017e-7 kg; lognormal variance with pedigree 0.0946, pedigree (2,4,3,1,1)
  (same comment as for [thio]carbamate-compound)
- Lead II [water, surface water]: 1.36644e-5 kg; lognormal variance with pedigree 0.0946, pedigree (2,4,3,1,1)
  (same comment as for [thio]carbamate-compound)
- Mercury II [water, ground-]: 2.68591e-10 kg; lognormal variance with pedigree 0.0946, pedigree (2,4,3,1,1)
  (same comment as for [thio]carbamate-compound)
- Mercury II [water, surface water]: 4.22376e-8 kg; lognormal variance with pedigree 0.0946, pedigree (2,4,3,1,1)
  (same comment as for [thio]carbamate-compound)
- Nickel II [water, surface water]: 1.36237e-5 kg; lognormal variance with pedigree 0.0946, pedigree (2,4,3,1,1)
  (same comment as for [thio]carbamate-compound)
- Nitrate [water, ground-]: 0.117817 kg; lognormal variance with pedigree 0.0446, pedigree (2,4,3,1,1)
  (same comment as for [thio]carbamate-compound)
- Phosphate [water, ground-]: 4.47152e-5 kg; lognormal variance with pedigree 0.0446, pedigree (2,4,3,1,1)
  (same comment as for [thio]carbamate-compound)
- Phosphate [water, surface water]: 0.000131072 kg; lognormal variance with pedigree 0.0446, pedigree (2,4,3,1,1)
  (same comment as for [thio]carbamate-compound)
- Phosphorus [water, surface water]: 0.00113647 kg; lognormal variance with pedigree 0.0446, pedigree (2,4,3,1,1)
  (same comment as for [thio]carbamate-compound)
- Water [water, ground-]: 0.1053 m3; lognormal variance with pedigree 0.0052, pedigree (2,4,3,1,1)
  (same comment as for [thio]carbamate-compound)
- Water [water, surface water]: 0.027 m3; lognormal variance with pedigree 0.0052, pedigree (2,4,3,1,1)
  (same comment as for [thio]carbamate-compound)
- Zinc II [water, ground-]: 6.8061e-6 kg; lognormal variance with pedigree 0.0946, pedigree (2,4,3,1,1)
  (same comment as for [thio]carbamate-compound)
- Zinc II [water, surface water]: 3.83852e-5 kg; lognormal variance with pedigree 0.0946, pedigree (2,4,3,1,1)
  (same comment as for [thio]carbamate-compound)

## Sampling procedure
The farmer was identified and contacted by agriculture science faculty familiar with the local farmers in the region. Data was collected directly from the farmer through semi-structured interview using a questionnaire based on the input requirements of the ecoinvent LCI calculation tool for crop production. The farmer does not maintain any written records and has provided the data from recent memory. In this region, typically farmers are unable to provide exact name of active ingredient in the pesticide they use and the same was noted from details given on the pesticide packet. Individual farmer is not able to calculate fuel consumption for his own farm alone and this information has been collected from farming community of the area

## Extrapolations
Ecoinvent LCI calculation tool for crop production was used to calculate field emissions from the cultivation process. Number of wet days have been taken for neighboring region (New Delhi) and rainfall data is Normal rainfall for Western Uttar Pradesh where the farm is located.
