# electrolysis of magnesium chloride, from zirconium sponge production

Dataset: EcoSpold 2, unit process
Geography: RoW
Time period: 2020-01-01 to 2024-12-31
Technology level: current
Classification: ISIC rev.4 ecoinvent: 2420:Manufacture of basic precious and other non-ferrous metals
Scenario: Business-as-Usual
System model: Allocation, cut-off by classification
Generated by: Efstathios Kakkos
Database: ecoinvent
isCopyrightProtected: true
accessRestrictedTo: 1

## General comment
This dataset models the electrolysis of 1 kg of magnesium chloride produced during the production of zirconium sponge using the Kroll process, which is modelled by the following reaction: ZrCl4+ 2Mg → Zr + 2MgCl2. The electrolysis of magnesium chloride separates the magnesium from the chlorine through the following reaction: MgCl2 → Mg + Cl2. The recovered magnesium is fed back to the reduction and distillation process (which produces zirconium sponge) and the chlorine is fed back to the carbochlorination process of zircon (which produces zirconium tetrachloride bundled with hafnium).
Based on stoichiometry, 2.0874 kg of magnesium chloride is produced as a byproduct per kg of produced Zr sponge. Because 0.0484 kg of MgCl2 is lost in the reduction and distillation step, 2.0386 kg of MgCl2 per kg Zr sponge are sent to electrolysis (for more information consult the exchange comments of the exchanges ''inert waste'' and ''magnesium chloride, from zirconium sponge production'' of the dataset ''zirconium sponge production, from zirconium tetrachloride, FR'').
Due to absence of data, the electrolysis process of magnesium chloride after the production of 1 kg of zirconium sponge was approximated with the electrolysis process of magnesium chloride after the production of 1 kg of titanium sponge (consult dataset ''electrolysis of magnesium chloride, from titanium sponge production'' available in version 3.8 of Ecoinvent).This approximation is considered acceptable, as the treatment of magnesium chloride through electrolysis is assumed to be independent of the origin of magnesium chloride. Therefore, all the reported assumptions from the previously mentioned dataset apply also to this one. The aforementioned dataset was based on the Gao et al. (2018) publication.
Reference: Gao, F., Nie, Z., Yang, D., Sun, B., Liu, Y., Gong, X., & Wang, Z. (2018). Environmental impacts analysis of titanium sponge production using Kroll process in China. Journal of Cleaner Production, 174, 771-779. doi:https://doi.org/10.1016/j.jclepro.2017.09.240.

## Included activities start
The activity starts with the reception of magnesium chloride, obtained from the production of zirconium sponge using the Kroll process.

## Included activities end
The activity ends with the recovery of magnesium and chlorine. Infrastructure use is not included as this process is assumed to take place in the same facility as zirconium sponge production.

## Geography
Dataset valid for the entire corresponding region.

## Technology
The reduction and distillation step of the Kroll process produces zirconium sponge and magnesium chloride as a byproduct based on the following stoichiometric equation: ZrCl4+ 2Mg → Zr + 2MgCl2. Based on stoichiometry, 0.53286 kg of magnesium are required as an input per kg of Zr Sponge and 2.0874 kg of magnesium chloride is produced as a byproduct per kg of produced Zr sponge. Because 0.0484 kg of MgCl2 is lost in the reduction and distillation step, 2.0386 kg of MgCl2 per kg Zr sponge are sent to electrolysis.
The magnesium chloride is then separated via electrolysis in order to recover the magnesium and chlorine through the following reaction: MgCl2 → Mg + Cl2. After refining, the magnesium is recycled and serves again as input to the reduction and distillation process, during which zirconium sponge is produced, while chlorine (after it is filtrated and purified) is recycled and sent back to the carbochlorination process as an input.

## Time period
Data are considered representative of current production practices. The data are assumed to be valid on average for 5 years after the publication of that article.

## Reference product
- magnesium, for reuse in zirconium sponge production: 1 kg; name magnesium_amount; By-product classification allocatable product; CPC 41601: Tungsten, molybdenum, tantalum, magnesium, cobalt, cadmium, titanium, zirconium, beryllium, gallium, hafnium, […]; HS2017 810411: Magnesium; unwrought, containing at least 99.8% by weight of magnesium; CAS 7439-95-4
  This exchange represents the magnesium obtained from the electrolysis of 1 kg of magnesium chloride. This magnesium is recycled back to the zirconium sponge production process.
  The electrolysis process of magnesium chloride after the production of 1 kg of zirconium sponge was approximated with the electrolysis process of magnesium chloride after the production of 1 kg of titanium sponge (consult ''electrolysis of magnesium chloride, from titanium sponge production'' available in version 3.8 of Ecoinvent).This approximation is considered acceptable, as the treatment of magnesium chloride through electrolysis is assumed to be independent of the origin of magnesium chloride. Consequently, the value for the recycled magnesium, was taken from the abovementioned dataset.
  The original description from the dataset is the following:
  [Value calculated based on value given Table 2 (column "Electrolysis of MgCl2") in Gao et al. (2018). Based on the stoichiometric reaction of the reduction and distillation step used for titanium sponge production (TiCl4 + 2Mg → Ti + 2MgCl2), roughly 1.016 kg of Mg are required as input. Gao et al. (2018) report an input of 41 kg per metric ton of titanium sponge to compensate for the amount of Mg that is not recycled. The overall recovery rate of Mg is therefore approximately 96%. Because 0.093 kg of MgCl2 is lost in the reduction and distillation step, this means that 3.885 kg of MgCl2 per kg Ti are sent to electrolysis. Out of that amount, 0.97 kg of Mg is recovered. The amount of Mg recovered per kg of MgCl2 entering the electrolysis step is therefore roughly 0.251 kg and corresponds to a recovery rate of 98.3% in this step.
  Reference: Gao, F., Nie, Z., Yang, D., Sun, B., Liu, Y., Gong, X., & Wang, Z. (2018). Environmental impacts analysis of titanium sponge production using Kroll process in China. Journal of Cleaner Production, 174, 771-779. doi:https://doi.org/10.1016/j.jclepro.2017.09.240.]
  production volume 1.43256e6 kg; = RP_PV*ABS(magnesium_amount/RP_amount)
    Calculated from production volume of reference product using the relative outputs.
  property price 1.79941 EUR2005
    The price is set equal to that of the product "magnesium". Please refer to the price comment of that exchange for more information on how it was obtained.
  properties: allocation factor 0.898306, carbon allocation 0 kg, carbon content 0, carbon content, fossil 0, carbon content, non-fossil 0, dry mass 1 kg, magnesium content 1, true value 0.451598, water content 0, water in wet mass 0 kg, wet mass 1 kg

## Inputs from technosphere
- electricity, medium voltage: 0.00613875, 0.00918907, 0.00290291, 0.0540343, 0.0317141, 0.291823, 0.0376001, 0.456715, 0.00108927, 9.11044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 kWh (47 suppliers, which the file names only by identifier); sum of these 13.3592 kWh; lognormal variance with pedigree 0.0454, pedigree (2,4,2,5,4)
  This exchange represents the electricity required as input during the electrolysis of 1 kg of magnesium chloride.
  The electrolysis process of magnesium chloride after the production of 1 kg of zirconium sponge was approximated with the electrolysis process of magnesium chloride after the production of 1 kg of titanium sponge (consult ''electrolysis of magnesium chloride, from titanium sponge production'' available in version 3.8 of Ecoinvent).This approximation is considered acceptable, as the treatment of magnesium chloride through electrolysis is assumed to be independent of the origin of magnesium chloride. Consequently, the value for electricity consumption, was taken from the abovementioned dataset.
  The original description from the dataset is the following:
  [Value from Table 2 (column "Electrolysis of MgCl2") in Gao et al. (2018). The amount of electricity consumed in the electrolysis process is 1.45E+04 kWh per metric ton of titanium sponge. This value was adjusted considering that for 1 kg of titanium sponge produced, 3.885 kg of MgCl2 is sent to the electrolysis step.
  Reference: Gao, F., Nie, Z., Yang, D., Sun, B., Liu, Y., Gong, X., & Wang, Z. (2018). Environmental impacts analysis of titanium sponge production using Kroll process in China. Journal of Cleaner Production, 174, 771-779. doi:https://doi.org/10.1016/j.jclepro.2017.09.240.]
- inert waste: -1.50473 kg; name inert_waste_amount; = (ABS(RP_amount) + sulfuric_acid_amount) - (chlorine_amount + magnesium_amount + HCl_amount + HF_amount); lognormal variance with pedigree 0.0528, pedigree (3,5,2,5,4)
  This exchange represents the inert waste produced as a byproduct during the electrolysis of 1 kg of magnesium chloride.
  The amount of inert waste is calculated such that the mass of the inputs is equal to the mass of the outputs. According to Table 2 (column "Electrolysis of MgCl2") in Gao et al. (2018), 1.62E-01 kg of "other residue" (approximated here as inert waste) is produced in the electrolysis step per metric ton of titanium sponge. However, neither this amount nor the amount reported in the reduction and distillation step are large enough to account for the amounts of magnesium and chlorine that are not recovered by the electrolysis of MgCl2. Therefore, the amount of inert waste is calculated such that the mass of the inputs is equal to the mass of the outputs.
  Reference: Gao, F., Nie, Z., Yang, D., Sun, B., Liu, Y., Gong, X., & Wang, Z. (2018). Environmental impacts analysis of titanium sponge production using Kroll process in China. Journal of Cleaner Production, 174, 771-779. doi:https://doi.org/10.1016/j.jclepro.2017.09.240.
  production volume; = RP_PV*ABS(inert_waste_amount/RP_amount)
    Calculated from production volume of reference product using the relative outputs.
  properties: dry mass 1 kg, wet mass 1 kg
- magnesium chloride, from zirconium sponge production: 3.57934 kg; name RP_amount
  Since this activity represents the treatment of magnesium chloride, which is produced during the production of zirconium sponge, the reference product (magnesium chloride) has a negative sign. The negative sign indicates that the treatment activity (electrolysis) supplies the service of treating magnesium chloride (i.e the magnesium chloride is an input to the electrolysis process).
  production volume; name RP_PV; = 6E+06*2.0386
    Equal to the amount of magnesium chloride produced in zirconium sponge production (GLO).
  properties: chlorine content 0.744725, dry mass 1 kg, magnesium content 0.255275, price 0.0935471 EUR2005, wet mass 1 kg
- sulfuric acid: 0.0643099 kg; name sulfuric_acid_amount; lognormal variance with pedigree 0.0454, pedigree (2,4,2,5,4)
  This exchange represents the sulfuric acid required as input during the electrolysis of 1 kg of magnesium chloride.
  The electrolysis process of magnesium chloride after the production of 1 kg of zirconium sponge was approximated with the electrolysis process of magnesium chloride after the production of 1 kg of titanium sponge (consult ''electrolysis of magnesium chloride, from titanium sponge production'' available in version 3.8 of Ecoinvent).This approximation is considered acceptable, as the treatment of magnesium chloride through electrolysis is assumed to be independent of the origin of magnesium chloride. Consequently, the value for sulfuric acid, was taken from the abovementioned dataset.
  The original description from the dataset is the following:
  [Value from Table 2 (column "Electrolysis of MgCl2") in Gao et al. (2018). The amount of sulfuric acid required in the electrolysis process is 6.98E+01 kg per metric ton of titanium sponge. This value was adjusted considering that for 1 kg of titanium sponge produced, 3.885 kg of MgCl2 is sent to the electrolysis step.
  Reference: Gao, F., Nie, Z., Yang, D., Sun, B., Liu, Y., Gong, X., & Wang, Z. (2018). Environmental impacts analysis of titanium sponge production using Kroll process in China. Journal of Cleaner Production, 174, 771-779. doi:https://doi.org/10.1016/j.jclepro.2017.09.240.]
  properties: dry mass 1 kg, wet mass 1 kg

## Emissions to nature
- Hydrochloric acid [air, non-urban air or from high stacks]: 0.00361155 kg; name HCl_amount; lognormal variance with pedigree 0.0848, pedigree (2,4,2,5,4)
  This exchange represents the hydrogen chloride emissions during the electrolysis of 1 kg of magnesium chloride.
  The electrolysis process of magnesium chloride after the production of 1 kg of zirconium sponge was approximated with the electrolysis process of magnesium chloride after the production of 1 kg of titanium sponge (consult ''electrolysis of magnesium chloride, from titanium sponge production'' available in version 3.8 of Ecoinvent).This approximation is considered acceptable, as the treatment of magnesium chloride through electrolysis is assumed to be independent of the origin of magnesium chloride. Consequently, the value for the hydrogen chloride emissions, was taken from the abovementioned dataset.
  The original description from the dataset is the following:
  [Value from Table 2 (column "Electrolysis of MgCl2") in Gao et al. (2018). An emission of HCl is reported to occur in the electrolysis process. It is assumed to be an emission to air. The reported amount is 3.92 kg per metric ton of titanium sponge. This value was adjusted considering that for 1 kg of titanium sponge produced, 3.885 kg of MgCl2 is sent to the electrolysis step.
  Reference: Gao, F., Nie, Z., Yang, D., Sun, B., Liu, Y., Gong, X., & Wang, Z. (2018). Environmental impacts analysis of titanium sponge production using Kroll process in China. Journal of Cleaner Production, 174, 771-779. doi:https://doi.org/10.1016/j.jclepro.2017.09.240]
- Hydrogen fluoride [air, non-urban air or from high stacks]: 0.000585973 kg; name HF_amount; lognormal variance with pedigree 0.0848, pedigree (2,4,2,5,4)
  This exchange represents the hydrogen fluoride emissions during the electrolysis of 1 kg of magnesium chloride.
  The electrolysis process of magnesium chloride after the production of 1 kg of zirconium sponge was approximated with the electrolysis process of magnesium chloride after the production of 1 kg of titanium sponge (consult ''electrolysis of magnesium chloride, from titanium sponge production'' available in version 3.8 of Ecoinvent).This approximation is considered acceptable, as the treatment of magnesium chloride through electrolysis is assumed to be independent of the origin of magnesium chloride. Consequently, the value for the hydrogen fluoride emissions, was taken from the abovementioned dataset.
  The original description from the dataset is the following:
  [Value from Table 2 (column "Electrolysis of MgCl2") in Gao et al. (2018). An emission of HF is reported to occur in the electrolysis process. It is assumed to be an emission to air. The reported amount is 6.36E-01 kg per metric ton of titanium sponge. This value was adjusted considering that for 1 kg of titanium sponge produced, 3.885 kg of MgCl2 is sent to the electrolysis step.
  Reference: Gao, F., Nie, Z., Yang, D., Sun, B., Liu, Y., Gong, X., & Wang, Z. (2018). Environmental impacts analysis of titanium sponge production using Kroll process in China. Journal of Cleaner Production, 174, 771-779. doi:https://doi.org/10.1016/j.jclepro.2017.09.240.]

## Sampling procedure
Due to absence of data, all data regarding the electrolysis process were taken from the dataset ''electrolysis of magnesium chloride, from titanium sponge production, GLO'' as found in Ecoinvent version 3.8, which deals with the electrolysis of magnesium chloride (MgCl2 → Mg + Cl2) produced as a byproduct from the titanium sponge production process (TiCl4+ 2Mg → Ti + 2MgCl2 - same process used for the production of zirconium sponge). The previously mentioned dataset was based on the Gao et al. (2018) publication.

Reference: Gao, F., Nie, Z., Yang, D., Sun, B., Liu, Y., Gong, X., & Wang, Z. (2018). Environmental impacts analysis of titanium sponge production using Kroll process in China. Journal of Cleaner Production, 174, 771-779. doi:https://doi.org/10.1016/j.jclepro.2017.09.240.

## Extrapolations
Approximation of the electrolysis process of magnesium chloride after the production of 1 kg of zirconium sponge with the electrolysis process of magnesium chloride after the production of 1 kg of titanium sponge (consult dataset ''electrolysis of magnesium chloride, from titanium sponge production'' available in version 3.8 of Ecoinvent).This approximation is considered acceptable, as the treatment of magnesium chloride through electrolysis is assumed to be independent of the origin of magnesium chloride.
