# transport, freight train, electricity

Dataset: EcoSpold 2, unit process
Geography: RoW
Time period: 1999-01-01 to 2023-12-31
Technology level: current
Classification: ISIC rev.4 ecoinvent: 4912:Freight rail transport
Scenario: Business-as-Usual
System model: Allocation, cut-off by classification
Generated by: Frédéric Gindroz
Published in: Röder, A. 2007
Database: ecoinvent
isCopyrightProtected: true
accessRestrictedTo: 1

## General comment
Based on Swiss, Chinese and European electric freight train. The datasets represents the entire transport life cycle of an electric freight train.
[This dataset is meant to replace the following datasets:]

## Included activities start
The dataset starts with the production of a locomotive.

## Included activities end
Based on Swiss, Chinese and European electric freight train; it includes operation of electric freight train only. This dataset calls the modules 'production, maintenance of vehicle'; 'construction of railway track'.

## Geography
Extrapolated from "transport, freight train, electricity, CH 2000", "transport, freight train, electricity, CN 2004" and "transport, freight train, electricity, Europe without Switzerland 2000"

## Technology
Average technology

## Reference product
- transport, freight train: 1 metric ton*km; By-product classification allocatable product; CPC 6512: Railway transport services of freight
  production volume 7.96486e11 metric ton*km
    Literature data. Total production volume for the country is taken from 2019 Railway Statistics Synopsis (https://uic.org/IMG/pdf/uic-statistics-synopsis-2019.pdf). The technology share in calculated based on the weighted average of the technology of all geographies available in the ecoinvent database.
  properties: carbon allocation 0 kg, carbon content 0, price 0.026 EUR2005

## Inputs from technosphere
- diesel: 1.54122e-6, 0.00063891, 4.53219e-6, 3.20593e-5 kg (4 suppliers, which the file names only by identifier); sum of these 0.000677043 kg; lognormal variance with pedigree 0.0426, pedigree (1,1,5,5,1)
  Weighted average of the datasets "transport, freight train, electricity, CH 2000", "transport, freight train, electricity, CN 2004" and "transport, freight train, electricity, Europe without Switzerland 2000".
  Uncertainty: Pedigree matrix set according to expert judgment and variance of log-transformed data set to default value
  properties: carbon content, fossil 0.865, dry mass 1 kg, heating value, net 42.8 MJ, wet mass 1 kg
  note on carbon content, fossil: C-content of diesel is 86.5% (ecoinvent v2.2 report 6_IV, Tab 3.14)
- electricity, high voltage: 5.95548e-7, 7.86619e-5, 1.41857e-5, 7.86214e-6, 5.21831e-5, 2.13466e-5, 0.000984042, 1.27814e-5, 1.82962e-5, 0.000267642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 kWh (71 suppliers, which the file names only by identifier); sum of these 0.0134833 kWh; lognormal variance with pedigree 0.0426, pedigree (1,1,5,5,1)
  (same comment as for diesel)
- electricity, high voltage, for Swiss Federal Railways: 0.00124332 kWh; lognormal variance with pedigree 0.0426, pedigree (1,1,5,5,1)
  (same comment as for diesel)
- electricity, medium voltage: 2.81062e-6, 0.000320127, 4.06068e-5, 3.61164e-6, 0.000314895, 1.39878e-6, 0.00041264, 8.9661e-6, 0.000436988, 0.00022258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 kWh (71 suppliers, which the file names only by identifier); sum of these 0.0208232 kWh; lognormal variance with pedigree 0.0426, pedigree (1,1,5,5,1)
  (same comment as for diesel)
- goods wagon: 4.59e-8 unit; lognormal variance with pedigree 0.342, pedigree (1,1,5,5,1)
  (same comment as for diesel)
- locomotive: 7.11e-10 unit; lognormal variance with pedigree 0.342, pedigree (1,1,5,5,1)
  (same comment as for diesel)
- maintenance, goods wagon: 4.59e-8 unit; lognormal variance with pedigree 0.342, pedigree (1,1,5,5,1)
  (same comment as for diesel)
- maintenance, locomotive: 7.11e-10 unit; lognormal variance with pedigree 0.342, pedigree (1,1,5,5,1)
  (same comment as for diesel)
- railway track: 9.29184e-5 m*year; lognormal variance with pedigree 0.344, pedigree (3,1,5,5,1)
  (same comment as for diesel)

## Emissions to nature
- Ammonia [air, unspecified]: 1.35009e-8 kg; lognormal variance with pedigree 0.0912, pedigree (2,3,5,5,3)
  (same comment as for diesel)
- Benzene [air, unspecified]: 6.77043e-8 kg; lognormal variance with pedigree 0.0912, pedigree (2,3,5,5,3)
  (same comment as for diesel)
- Cadmium II [air, unspecified]: 6.77043e-12 kg; lognormal variance with pedigree 0.708, pedigree (4,5,5,5,1)
  (same comment as for diesel)
- Carbon dioxide, fossil [air, unspecified]: 0.00213014 kg; lognormal variance with pedigree 0.0438, pedigree (2,3,5,5,1)
  (same comment as for diesel)
- Carbon monoxide, fossil [air, unspecified]: 1.07007e-5 kg; lognormal variance with pedigree 0.6932, pedigree (2,3,5,5,1)
  (same comment as for diesel)
- Chromium III [air, unspecified]: 3.38318e-11 kg; lognormal variance with pedigree 0.708, pedigree (4,5,5,5,1)
  (same comment as for diesel)
- Copper ion [air, unspecified]: 1.15007e-9 kg; lognormal variance with pedigree 0.708, pedigree (4,5,5,5,1)
  (same comment as for diesel)
- Dinitrogen monoxide [air, unspecified]: 6.77043e-8 kg; lognormal variance with pedigree 0.0912, pedigree (2,3,5,5,3)
  (same comment as for diesel)
- Lead II [air, unspecified]: 7.4153e-14 kg; lognormal variance with pedigree 0.708, pedigree (4,5,5,5,1)
  (same comment as for diesel)
- Mercury II [air, unspecified]: 1.35009e-14 kg; lognormal variance with pedigree 0.708, pedigree (4,5,5,5,1)
  (same comment as for diesel)
- Methane, fossil [air, unspecified]: 8.79353e-8 kg; lognormal variance with pedigree 0.0912, pedigree (2,3,5,5,3)
  (same comment as for diesel)
- NMVOC, non-methane volatile organic compounds [air, unspecified]: 3.42318e-6 kg; lognormal variance with pedigree 0.0912, pedigree (2,3,5,5,3)
  (same comment as for diesel)
- Nickel II [air, unspecified]: 4.73327e-11 kg; lognormal variance with pedigree 0.708, pedigree (4,5,5,5,1)
  (same comment as for diesel)
- Nitrogen oxides [air, unspecified]: 3.7132e-5 kg; lognormal variance with pedigree 0.0832, pedigree (2,3,5,5,1)
  (same comment as for diesel)
- Particulate Matter, < 2.5 um [air, unspecified]: 8.61085e-7 kg; lognormal variance with pedigree 0.3446, pedigree (3,3,5,5,1)
  (same comment as for diesel)
- Particulate Matter, > 10 um [air, unspecified]: 6.06404e-6 kg; lognormal variance with pedigree 0.0846, pedigree (3,3,5,5,1)
  (same comment as for diesel)
- Particulate Matter, > 2.5 um and < 10um [air, unspecified]: 3.93328e-6 kg; lognormal variance with pedigree 0.1646, pedigree (3,3,5,5,1)
  (same comment as for diesel)
- Selenium IV [air, unspecified]: 6.77043e-12 kg; lognormal variance with pedigree 0.708, pedigree (4,5,5,5,1)
  (same comment as for diesel)
- Sulfur dioxide [air, unspecified]: 4.06026e-7 kg; lognormal variance with pedigree 0.0438, pedigree (2,3,5,5,1)
  (same comment as for diesel)
- Sulfur hexafluoride [air, unspecified]: 2.12529e-9 kg; lognormal variance with pedigree 0.1, pedigree (3,5,5,5,3)
  (same comment as for diesel)
- Toluene [air, unspecified]: 2.70314e-8 kg; lognormal variance with pedigree 0.0926, pedigree (3,3,5,5,3)
  (same comment as for diesel)
- Xylenes, unspecified [air, unspecified]: 2.70314e-8 kg; lognormal variance with pedigree 0.0926, pedigree (3,3,5,5,3)
  (same comment as for diesel)
- Zinc II [air, unspecified]: 6.77043e-10 kg; lognormal variance with pedigree 0.708, pedigree (4,5,5,5,1)
  (same comment as for diesel)
- Iron ion [soil, unspecified]: 1.99e-5 kg; lognormal variance with pedigree 0.25, pedigree (5,5,5,5,5)
  (same comment as for diesel)

## Sampling procedure
literature and statistics

## Extrapolations
see Geography/Text This dataset has been copied from an original dataset covering the geography CH, CN, RER. The uncertainty has been adjusted accordingly.
