# silicon production, metallurgical grade

Dataset: EcoSpold 2, unit process
Geography: RoW
Time period: 2000-01-01 to 2023-12-31
Technology level: current
Classification: ISIC rev.4 ecoinvent: 2420:Manufacture of basic precious and other non-ferrous metals
Synonyms: Silicone; Monosilane; Silicon tetrahydride; 7440-21-3; Silicon metal; metal grade silicon
Scenario: Business-as-Usual
System model: Allocation, cut-off by classification
Share of production covered: 50 %
Generated by: Niels Jungbluth
Published in: Jungbluth, N. 2007
Database: ecoinvent
isCopyrightProtected: true
accessRestrictedTo: 1

## General comment
This dataset represents the production of 1 kg of metallurgical-grade silicon (MG-silicon) with a purity of 99%. Silicon is used for the production of aluminium compounds (ca. 50%), silicones (plastics) (ca. 40%) and electronics (ca. 4%). Most of the MG-silicon is produced by carbothermic reduction. For the use in semiconductors further purification is necessary. About one million tonnes of MG-silicon with a purity of 98.5-99.5% was produced in the year 2000. The electricity use is the most important economic factors. The major producers are in Norway, the USA, South-Africa, Brazil, France and Australia.
This dataset is based on production in Norway (electricity supply is basically from hydropower), because most data are available for this country and it represents an important share of the total production. Most of the five production plants (Meraker, Bremanger, Fiskaa, Salten and Thamshavn) are in low-density populated areas and have a direct access to a harbour.
Reference(s):
Jungbluth N., Stucki M, and Frischknecht R. (2009) Photovoltaics. In Dones, R. (Ed.) et al., Sachbilanzen von Energiesystemen: Grundlagen für den ökologischen Vergleich von Energiesystemen und den Einbezug von Energiesystemen in Ökobilanzen für die Schweiz. ecoinvent report No. 6-XII, Swiss Centre for Life Cycle Inventories, Dübendorf, CH, 2009.

## Included activities start
The activity starts when the raw materials enter the process.

## Included activities end
This activity ends with the production of MG-silicon from silica sand. The dataset includes material inputs, energy use, wastes and air emissions. Emissions to water are not included.

## Geography
This dataset is based on data from Norwegian Silicon plants only. However, the data are assumed to be representative of the global production.

## Technology
The production of MG-silicon with a purity of over 99% is based on carbothermal reduction of silica sand using petrol coke, charcoal and wood chips as reduction agents.
The technology used is modern; waste heat is partly recovered and used for electricity generation and/or district heating. Further improvement options for the process are mainly a further reduction of energy consumption by heat recovery, reduction of emissions with environmental technology and use of sustainable biogenic carbon sources instead of fossil carbon sources.
Reference:
Jungbluth N., Stucki M, and Frischknecht R. (2009) Photovoltaics. In Dones, R. (Ed.) et al., Sachbilanzen von Energiesystemen: Grundlagen für den ökologischen Vergleich von Energiesystemen und den Einbezug von Energiesystemen in Ökobilanzen für die Schweiz. ecoinvent report No. 6-XII, Swiss Centre for Life Cycle Inventories, Dübendorf, CH, 2009.

## Time period
Time of publication.

## Reference product
- silicon, metallurgical grade: 1 kg; name RP; By-product classification allocatable product; CPC 34250: Salts of oxometallic or peroxometallic acids; colloidal precious metals and compounds thereof; inorganic and o[…]; HS2017 285000: Hydrides, nitrides, azides, silicides and borides, whether or not chemically defined, other than compounds [...]; CAS 7440-21-3
  Metallurgical-grade silicon is used for the production of aluminium compounds, silicones and semiconductors. For the use in semiconductors, further purification is necessary.
  References:
  Jungbluth N., Stucki M, and Frischknecht R. (2009) Photovoltaics. In Dones, R. (Ed.) et al., Sachbilanzen von Energiesystemen: Grundlagen für den ökologischen Vergleich von Energiesystemen und den Einbezug von Energiesystemen in Ökobilanzen für die Schweiz. ecoinvent report No. 6-XII, Swiss Centre for Life Cycle Inventories, Dübendorf, CH, 2009.
  production volume 3e9 kg; name RP_PV
    Helmut Föll (s.d.) Electronic materials (http://www.tf.uni-kiel.de/matwis/amat/elmat_en/)
  properties: carbon allocation 0 kg, carbon content 0, carbon content, fossil 0, carbon content, non-fossil 0, dry mass 1 kg, price 2.32 EUR2005, water content 0, water in wet mass 0 kg, wet mass 1 kg

## Inputs from technosphere
- charcoal: 0.17 kg; lognormal variance with pedigree 0.0427, pedigree (2,2,5,5,1)
  Literature value, Jungbluth et al. (2009) are combining several different literature sources for this value.
  Reference(s): Jungbluth N., Stucki M, and Frischknecht R. (2009) Photovoltaics. In Dones, R. (Ed.) et al., Sachbilanzen von Energiesystemen: Grundlagen für den ökologischen Vergleich von Energiesystemen und den Einbezug von Energiesystemen in Ökobilanzen für die Schweiz. ecoinvent report No. 6-XII, Swiss Centre for Life Cycle Inventories, Dübendorf, CH, 2009.
  Uncertainty: L
  properties: carbon content, non-fossil 0.8, dry mass 1 kg, heating value, net 28.4 MJ, wet mass 1 kg
  note on heating value, net: Indicative value. Reference: Fuels - Higher and Lower Calorific Values, available at: https://www.engineeringtoolbox.com/fuels-higher-calorific-values-d_169.html
- coke: 7.40531, 15.7147 MJ (2 suppliers, which the file names only by identifier); sum of these 23.12 MJ; lognormal variance with pedigree 0.0427, pedigree (2,2,5,5,1)
  Literature value, reported as 'coal' in Jungbluth et al. (2009). Several different literature sources are combined by Jungbluth et al. (2009).
  Reference(s): Jungbluth N., Stucki M, and Frischknecht R. (2009) Photovoltaics. In Dones, R. (Ed.) et al., Sachbilanzen von Energiesystemen: Grundlagen für den ökologischen Vergleich von Energiesystemen und den Einbezug von Energiesystemen in Ökobilanzen für die Schweiz. ecoinvent report No. 6-XII, Swiss Centre for Life Cycle Inventories, Dübendorf, CH, 2009.'
  Uncertainty: L
  properties: carbon content, fossil 0.869149, dry mass 0.0328671 kg, heating value, net 28.6 MJ, water content 0.0638298, wet mass 0.034965 kg
  note on carbon content, fossil: 81.7% C and 6% water in wet mass (ecoinvent v2.1 report 6_VI Table 7.1)
- electricity, medium voltage: 0.0041521, 0.00196346, 0.943773, 0.30891, 6.16207, 2.07044, 0.0580403, 0.0130285, 0.00861063, 0.094599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 kWh (23 suppliers, which the file names only by identifier); sum of these 11 kWh; lognormal variance with pedigree 0.0427, pedigree (2,2,5,5,1)
  Literature value, Jungbluth et al. (2009) are combining several different literature sources. Lower range taken here to account for heat recovery.
  Reference(s): Jungbluth N., Stucki M, and Frischknecht R. (2009) Photovoltaics. In Dones, R. (Ed.) et al., Sachbilanzen von Energiesystemen: Grundlagen für den ökologischen Vergleich von Energiesystemen und den Einbezug von Energiesystemen in Ökobilanzen für die Schweiz. ecoinvent report No. 6-XII, Swiss Centre for Life Cycle Inventories, Dübendorf, CH, 2009.'
  Uncertainty: L
- graphite: 0.1 kg; lognormal variance with pedigree 0.0427, pedigree (2,2,5,5,1)
  Literature value, reported as 'graphite electrodes' in Jungbluth et al. (2009). Several different literature sources are combined by Jungbluth et al. (2009).
  Reference(s): Jungbluth N., Stucki M, and Frischknecht R. (2009) Photovoltaics. In Dones, R. (Ed.) et al., Sachbilanzen von Energiesystemen: Grundlagen für den ökologischen Vergleich von Energiesystemen und den Einbezug von Energiesystemen in Ökobilanzen für die Schweiz. ecoinvent report No. 6-XII, Swiss Centre for Life Cycle Inventories, Dübendorf, CH, 2009.'
  Uncertainty: L
  properties: carbon content, fossil 1, dry mass 1 kg, heating value, net 30.3 MJ, wet mass 1 kg
- oxygen, liquid: 0.02 kg; lognormal variance with pedigree 0.056, pedigree (3,4,5,5,1)
  (same comment as for charcoal)
  properties: dry mass 1 kg, wet mass 1 kg
- petroleum coke: 0.5 kg; lognormal variance with pedigree 0.0427, pedigree (2,2,5,5,1)
  (same comment as for charcoal)
  properties: carbon content, fossil 0.885, dry mass 1 kg, heating value, net 35 MJ, wet mass 1 kg
- silica sand: 2.7 kg; lognormal variance with pedigree 0.0427, pedigree (2,2,5,5,1)
  (same comment as for charcoal)
  properties: dry mass 0.99 kg, water content 0.010101, wet mass 1 kg
- silicone factory: 1e-11 unit; lognormal variance with pedigree 0.3601, pedigree (1,2,5,5,3)
  Estimation.
  Uncertainty: E
- slag from metallurgical grade silicon production: -0.0247896, -0.000210422 kg (2 suppliers, which the file names only by identifier); sum of these -0.025 kg; lognormal variance with pedigree 0.0029, pedigree (2,2,2,5,1)
  Literature value. This slag is reported to be disposed in a landfill.
  Uncertainty: L
  production volume; = RP_PV*BP_slag_from_metallurgical_grade_silicon/ABS(RP)
    Calculated from the production volume of silicon, metallurgical grade in proportion to the respective output amounts.
  properties: carbon content, fossil 0.0898657, dry mass 1 kg, heating value, net 2.72 MJ, wet mass 1 kg
- wood chips, wet, measured as dry mass: 0.00124184, 0.000425741, 0.548089 kg (3 suppliers, which the file names only by identifier); sum of these 0.549757 kg; lognormal variance with pedigree 0.0427, pedigree (2,2,5,5,1)
  Literature value, Jungbluth et al. (2009) are combining several different literature sources for this value (1.35 kg).
  Reference(s): Jungbluth N., Stucki M, and Frischknecht R. (2009) Photovoltaics. In Dones, R. (Ed.) et al., Sachbilanzen von Energiesystemen: Grundlagen für den ökologischen Vergleich von Energiesystemen und den Einbezug von Energiesystemen in Ökobilanzen für die Schweiz. ecoinvent report No. 6-XII, Swiss Centre for Life Cycle Inventories, Dübendorf, CH, 2009.
  Uncertainty: L
  properties: carbon content, non-fossil 0.494, dry mass 1 kg, heating value, net 10.84 MJ, water content 1.4, wet mass 2.4 kg
  note on carbon content, non-fossil: C content of dry mass is 0.494 kgC/kg dry wood (ecoinvent v2.2 report 9).
  note on heating value, net: Value based on the dataset 'softwood forestry, mixed species, sustainable forest management'

## Emissions to nature
- Aluminium III [air, non-urban air or from high stacks]: 1.5508e-6 kg; lognormal variance with pedigree 0.696, pedigree (3,4,5,5,1)
  Literature, in dust.
  Uncertainty: L
- Antimony ion [air, non-urban air or from high stacks]: 7.8519e-9 kg; lognormal variance with pedigree 0.696, pedigree (3,4,5,5,1)
  Literature, in dust.
  Uncertainty: L
- Arsenic ion [air, non-urban air or from high stacks]: 9.4223e-9 kg; lognormal variance with pedigree 0.696, pedigree (3,4,5,5,1)
  Literature, in dust.
  Uncertainty: L
- Boron [air, non-urban air or from high stacks]: 2.7914e-7 kg; lognormal variance with pedigree 0.696, pedigree (3,4,5,5,1)
  Literature, in dust.
  Uncertainty: L
- Cadmium II [air, non-urban air or from high stacks]: 3.1408e-10 kg; lognormal variance with pedigree 0.696, pedigree (3,4,5,5,1)
  Literature, in dust.
  Uncertainty: L
- Calcium II [air, non-urban air or from high stacks]: 7.7538e-7 kg; lognormal variance with pedigree 0.696, pedigree (3,4,5,5,1)
  Literature, in dust.
  Uncertainty: L
- Carbon dioxide, fossil [air, non-urban air or from high stacks]: 3.5808 kg; lognormal variance with pedigree 0.0427, pedigree (2,2,5,5,1)
  Calculation, fossil fuels.
  Uncertainty: C
- Carbon dioxide, non-fossil [air, non-urban air or from high stacks]: 1.6098 kg; lognormal variance with pedigree 0.0427, pedigree (2,2,5,5,1)
  Calculation, biogenic fuels.
  Uncertainty: C
- Carbon monoxide, fossil [air, non-urban air or from high stacks]: 0.0013797 kg; lognormal variance with pedigree 0.696, pedigree (3,4,5,5,1)
  Literature value.
  Uncertainty: L
- Carbon monoxide, non-fossil [air, non-urban air or from high stacks]: 0.00062027 kg; lognormal variance with pedigree 0.696, pedigree (3,4,5,5,1)
  Literature value.
  Uncertainty: L
- Chlorine [air, non-urban air or from high stacks]: 7.8519e-8 kg; lognormal variance with pedigree 0.106, pedigree (3,4,5,5,1)
  Literature value.
  Uncertainty: L
- Chromium III [air, non-urban air or from high stacks]: 7.8519e-9 kg; lognormal variance with pedigree 0.696, pedigree (3,4,5,5,1)
  Literature, in dust.
  Uncertainty: L
- Cyanide [air, non-urban air or from high stacks]: 6.8704e-6 kg; lognormal variance with pedigree 0.106, pedigree (3,4,5,5,1)
  Estimation.
  Uncertainty: E
- Fluorine [air, non-urban air or from high stacks]: 3.8769e-8 kg; lognormal variance with pedigree 0.106, pedigree (3,4,5,5,1)
  Literature, in dust.
  Uncertainty: L
- Hydrogen fluoride [air, non-urban air or from high stacks]: 0.0005 kg; lognormal variance with pedigree 0.106, pedigree (3,4,5,5,1)
  Estimation.
  Uncertainty: E
- Hydrogen sulfide [air, non-urban air or from high stacks]: 0.0005 kg; lognormal variance with pedigree 0.106, pedigree (3,4,5,5,1)
  Estimation.
  Uncertainty: E
- Iron ion [air, non-urban air or from high stacks]: 3.8769e-6 kg; lognormal variance with pedigree 0.696, pedigree (3,4,5,5,1)
  Literature, in dust.
  Uncertainty: L
- Lead II [air, non-urban air or from high stacks]: 3.4352e-7 kg; lognormal variance with pedigree 0.696, pedigree (3,4,5,5,1)
  Literature, in dust.
  Uncertainty: L
- Mercury II [air, non-urban air or from high stacks]: 7.8519e-9 kg; lognormal variance with pedigree 0.696, pedigree (3,4,5,5,1)
  Literature, in dust.
  Uncertainty: L
- NMVOC, non-methane volatile organic compounds [air, non-urban air or from high stacks]: 9.6e-5 kg; lognormal variance with pedigree 0.106, pedigree (3,4,5,5,1)
  Literature.
  Uncertainty: L
- Nitrogen oxides [air, non-urban air or from high stacks]: 0.0097432 kg; lognormal variance with pedigree 0.0841, pedigree (3,2,5,5,1)
  Calculation based on environmental report.
  Uncertainty: C
- Particulate Matter, > 10 um [air, non-urban air or from high stacks]: 0.0077538 kg; lognormal variance with pedigree 0.0841, pedigree (3,2,5,5,1)
  Calculation based on environmental report.
  Uncertainty: C
- Potassium I [air, non-urban air or from high stacks]: 6.203e-5 kg; lognormal variance with pedigree 0.086, pedigree (3,4,5,5,1)
  Literature, in dust.
  Uncertainty: L
- Silicon [air, non-urban air or from high stacks]: 0.0075134 kg; lognormal variance with pedigree 0.696, pedigree (3,4,5,5,1)
  Literature, SiO2 in dust.
  Uncertainty: L
- Sodium I [air, non-urban air or from high stacks]: 7.7538e-7 kg; lognormal variance with pedigree 0.086, pedigree (3,4,5,5,1)
  Literature, in dust.
  Uncertainty: L
- Sulfur dioxide [air, non-urban air or from high stacks]: 0.012241 kg; lognormal variance with pedigree 0.0441, pedigree (3,2,5,5,1)
  Calculation based on environmental report.
  Uncertainty: C
- Tin ion [air, non-urban air or from high stacks]: 7.8519e-9 kg; lognormal variance with pedigree 0.696, pedigree (3,4,5,5,1)
  Literature, in dust.
  Uncertainty: L

## Sampling procedure
Publication of plant-specific data in a European survey.

## Extrapolations
Air emissions of different pollutants are extrapolated from environmental reports. This dataset has been copied from an original dataset covering the geography NO. The uncertainty has been adjusted accordingly.

## Review by Gregor Wernet 2017-08-04
This dataset was additionally reviewed in a separate review process by Eric Johnson of Atlantic Consulting as well as Emilia Moreno Ruiz and Gregor Wernet of ecoinvent.
