# transmission network construction, electricity, high voltage

Dataset: EcoSpold 2, unit process
Geography: CH
Time period: 1988-01-01 to 2023-12-31
Technology level: current
Classification: ISIC rev.4 ecoinvent: 4220:Construction of utility projects
Classification: EcoSpold01Categories: electricity/distribution
Scenario: Business-as-Usual
System model: Allocation, cut-off by classification
Share of production covered: 100 %
Generated by: Johannes Müller
Published in: René Itten 2014
Database: ecoinvent
isCopyrightProtected: true
accessRestrictedTo: 1

## General comment
This dataset describes the infrastructure (masts, cables etc.) of the electricity high voltage transmission network in Switzerland. It represents an average of underground cable and aerial lines per km of high voltage electricity transmission grid infrastructure. Switching stations are not included in this dataset, since switching stations for voltage transformation from high to medium voltage level are attributed to the medium voltage level and transformers from medium to low voltage level are attributed to the low voltage level.
The high voltage level is considred above 24 kV. Sometimes a highest voltage level is distinguished from the high voltage level grid; both are merged in this dataset. Typically large scale industry is supplied from this voltage level (Itten et al. 2014). Most power generation feeds into the high voltage grid.
Reference(s): René Itten, Rolf Frischknecht, Matthias Stucki, 2014, Life Cycle Inventories of Electricity Mixes and Grid

## Included activities start
The activity includes the land and material requirements of an average km of high voltage transmission grid infrastructrure in Switzerland.

## Included activities end
The activity ends with the disposal of the waste materials. It is assumed that 80 % of the cables are recycled.

## Geography
Data collected for Switzerland

## Technology
Average of high voltage underground cable (1843km) and aerial line (13988km) in Switzerland in 2010 (Itten et al. 2014).
The lifetime of the network is assumed to be 30 years (lifetime of most individual components assumed 40 years).

## Time period
This dataset is based on a study by Itten et. al (2014), which is based on a number of literature sources representing the years 2010 and 2011. Due to the long lifetime, as well as project planning and construction times of ectricity transmission and distribution infrastructure, the 2010 situation is considered valid at least until 2020.

## Reference product
- transmission network, electricity, high voltage: 1 km; name trans_net_RP; By-product classification allocatable product; CPC 53252: Local cables and related works
  production volume 395.775 km; name trans_net_RP_PV; = 15831/40
    Estimate: Total high voltage grid length of 15'831km as reported by Itten et al. (2014). divided by lifetime of 40 years.
    Reference(s): René Itten, Rolf Frischknecht, Matthias Stucki, 2014, Life Cycle Inventories of Electricity Mixes and Grid
  property lifetime 30 year; name trans_net_RP_lifetime
    according to: 2014, Itten R., Frischknecht R., Stucki M., Life Cycle Inventories of Electricity Mixes and Grid. Version 1.3, Uster, Switzerland, treeze, 3
  property price 4.7697e6 EUR2005
    The production volume of this product is small compared to other products supplied by the activities within the same ISIC 3 category. Calculated from Aluminium consumption. According to activity '_80 Infrastructure, excluding buildings, EU27' in the EU & DK IO database (Simapro, (0.0000404 (Al, after first processing) + 0.000615 (Al basic, virgin)) kg Al per EURO.. Ecoinvent: 3150 kg Al per km (dataset 'transmission network construction, electricity, high voltage').
  properties: carbon allocation 0 kg, carbon content 0

## Inputs from technosphere
- aluminium scrap, post-consumer: -8071.99 kg; name alu_scrap; = aluminium *0.8* 0.9; lognormal variance with pedigree 0.482025, pedigree (3,5,3,2,5)
  Estimation. Assuming 80% are recycled and 90% recovery rate in the recycling.
  production volume; = trans_net_RP_PV * (alu_scrap / trans_net_RP)
    Calculated from production volume of reference product using the relative outputs.
  properties: dry mass 1 kg, price 0.685 EUR2005, wet mass 1 kg
- aluminium, wrought alloy: 11211.1 kg; name aluminium; lognormal variance with pedigree 0.0527, pedigree (3,2,5,1,2)
  Literature data; Jorge et al. 2011.
  Reference(s): René Itten, Rolf Frischknecht, Matthias Stucki, 2014, Life Cycle Inventories of Electricity Mixes and Grid
  properties: dry mass 1 kg, wet mass 1 kg
- bronze: 372.8 kg; lognormal variance with pedigree 0.0527, pedigree (3,2,5,1,2)
  (same comment as for aluminium, wrought alloy)
  properties: dry mass 1 kg, wet mass 1 kg
- bronze scrap, post-consumer: -372.8 kg; name bronze_scrap; = bronze; lognormal variance with pedigree 0.482025, pedigree (3,5,3,2,5)
  Estimation. Assuming all goes to recycling.
  production volume; = trans_net_RP_PV * (bronze_scrap / trans_net_RP)
    Calculated from production volume of reference product using the relative outputs.
  properties: dry mass 1 kg, wet mass 1 kg
- building, hall, steel construction: 0.065 m2; lognormal variance with pedigree 0.0932, pedigree (3,3,5,1,2)
  Estimate by Itten et al. 2014.
  This exchange has an activity link directly to the producing activity because the product is primarily consumed in the same geographical area where it is produced.
  Reference(s): René Itten, Rolf Frischknecht, Matthias Stucki, 2014, Life Cycle Inventories of Electricity Mixes and Grid
- building, multi-storey: 2.53 m3; lognormal variance with pedigree 0.0932, pedigree (3,3,5,1,2)
  (same comment as for building, hall, steel construction)
- cement, Portland: 59.3 kg; lognormal variance with pedigree 0.0532, pedigree (3,3,5,1,2)
  (same comment as for aluminium, wrought alloy)
  properties: dry mass 1 kg, wet mass 1 kg
- concrete, normal strength: 57 m3; name concrete; lognormal variance with pedigree 0.0532, pedigree (3,3,5,1,2)
  (same comment as for aluminium, wrought alloy)
  properties: dry mass 2190 kg, water content 0.086758, wet mass 2380 kg
- copper scrap, sorted, pressed: -720 kg; name copper_scrap; = copper *0.8* 0.9; lognormal variance with pedigree 0.482025, pedigree (3,5,3,2,5)
  Estimation. Assuming 80% are recycled and 90% recovery rate in the recycling.
  production volume; = trans_net_RP_PV * (copper_scrap / trans_net_RP)
    Calculated from production volume of reference product using the relative outputs.
  properties: dry mass 1 kg, price 2.84 EUR2005, wet mass 1 kg
- copper, cathode: 1000 kg; name copper; lognormal variance with pedigree 0.0532, pedigree (3,3,5,1,2)
  (same comment as for aluminium, wrought alloy)
  properties: dry mass 1 kg, wet mass 1 kg
- excavation, hydraulic digger: 101 m3; lognormal variance with pedigree 0.0632, pedigree (3,3,5,1,2)
  Literature data; VSE 1988, own calculations by Itten et al. 2014. Reported as 4.13m3 "transformation to industrial area, built up" and 1.14m3 "transformation to industrial area, vegetation".
  Reference(s): René Itten, Rolf Frischknecht, Matthias Stucki, 2014, Life Cycle Inventories of Electricity Mixes and Grid
- flat glass, uncoated: 956 kg; name glass; lognormal variance with pedigree 0.0532, pedigree (3,3,5,1,2)
  (same comment as for aluminium, wrought alloy)
  properties: dry mass 1 kg, wet mass 1 kg
- iron scrap, unsorted: -23171.8 kg; name iron_scrap; = (steel + steel_low) * 0.8 * 0.9; lognormal variance with pedigree 0.482025, pedigree (3,5,3,2,5)
  Estimation. Assuming 80% are recycled and 90% recovery rate in the recycling.
  production volume; = trans_net_RP_PV * (iron_scrap / trans_net_RP)
    Calculated from production volume of reference product using the relative outputs.
  properties: dry mass 1 kg, price 0.149 EUR2005, wet mass 1 kg
- lead: 1630 kg; lognormal variance with pedigree 0.0532, pedigree (3,3,5,1,2)
  (same comment as for aluminium, wrought alloy)
  properties: dry mass 1 kg, wet mass 1 kg
- light fuel oil: 1120 kg; lognormal variance with pedigree 0.0532, pedigree (3,3,5,1,2)
  (same comment as for aluminium, wrought alloy)
  properties: carbon content, fossil 0.862, dry mass 1 kg, wet mass 1 kg
- paper, woodcontaining, lightweight coated: 442 kg; lognormal variance with pedigree 0.0527, pedigree (3,2,5,1,2)
  (same comment as for aluminium, wrought alloy)
  properties: carbon content, fossil 0.032531, carbon content, non-fossil 0.247213, dry mass 0.945 kg, water content 0.0582011, wet mass 1 kg
- polypropylene, granulate: 221 kg; name polypropylene; lognormal variance with pedigree 0.0532, pedigree (3,3,5,1,2)
  (same comment as for aluminium, wrought alloy)
  properties: carbon content, fossil 0.857143, dry mass 1 kg, wet mass 1 kg
- scrap copper: -280 kg; name scrap_copper; = copper * (0.2 + 0.8 * 0.1); lognormal variance with pedigree 0.482025, pedigree (3,5,3,2,5)
  Estimation. Assuming 80% are recycled and 90% recovery rate in the recycling.
  production volume; = trans_net_RP_PV * (scrap_copper / trans_net_RP)
    Calculated from production volume of reference product using the relative outputs.
  properties: dry mass 1 kg, wet mass 1 kg
- scrap steel: -514.928 kg; name scrap_steel; = (steel + steel_low) * (0.2 * + 0.8*0.1); lognormal variance with pedigree 0.482025, pedigree (3,5,3,2,5)
  Estimation. Assuming 80% are recycled and 90% recovery rate in the recycling.
  production volume; = trans_net_RP_PV * (scrap_steel / trans_net_RP)
    Calculated from production volume of reference product using the relative outputs.
  properties: dry mass 1 kg, wet mass 1 kg
- steel, low-alloyed: 1183 kg; name steel_low; lognormal variance with pedigree 0.0532, pedigree (3,3,5,1,2)
  (same comment as for aluminium, wrought alloy)
  properties: carbon content, fossil 0.005, dry mass 1 kg, wet mass 1 kg
- steel, unalloyed: 31000 kg; name steel; lognormal variance with pedigree 0.0532, pedigree (3,3,5,1,2)
  (same comment as for aluminium, wrought alloy)
  properties: carbon content, fossil 0.0025, dry mass 1 kg, wet mass 1 kg
  note on carbon content, fossil: Unalloyed steels or carbon steels are those in which the level of an individual element in no case reaches or exceeds the limiting concentration given in Tab. 3.1 ecoinvent v2.2 report 10_partII. Assumed to have a C content of 0.25%
- waste aluminium: -3139.11 kg; name waste_alu; = aluminium * (0.2 + 0.8 * 0.1); lognormal variance with pedigree 0.482025, pedigree (3,5,3,2,5)
  Estimation. Assuming 80% are recycled and 90% recovery rate in the recycling.
  production volume; = trans_net_RP_PV * (waste_alu / trans_net_RP)
    Calculated from production volume of reference product using the relative outputs.
  properties: dry mass 1 kg, wet mass 1 kg
- waste concrete: -125442 kg; name waste_concrete_byP; lognormal variance with pedigree 0.352, pedigree (2,3,2,1,2)
  Estimation; 100% disposed. Reported as "disposal, concrete, 5% water, to inert material landfill".
  Reference(s): René Itten, Rolf Frischknecht, Matthias Stucki, 2014, Life Cycle Inventories of Electricity Mixes and Grid
  production volume; = trans_net_RP_PV * (waste_concrete_byP / trans_net_RP)
    Calculated from production volume of reference product using the relative outputs.
  properties: dry mass 0.5 kg, water content 1, wet mass 1 kg
- waste glass: -956 kg; name waste_polyeth; = glass; lognormal variance with pedigree 0.482025, pedigree (3,5,3,2,5)
  Estimation. 100% disposed.
  production volume; = trans_net_RP_PV * (waste_polyeth / trans_net_RP)
    Calculated from production volume of reference product using the relative outputs.
  properties: dry mass 1 kg, heating value, net 0.05 MJ, wet mass 1 kg
  note on heating value, net: Value extracted from "treatment of waste glass, open dump, very wet infiltration class (1000mm)"
- waste mineral oil: -1120 kg; name waste_min_oil_byP; lognormal variance with pedigree 0.352, pedigree (2,3,2,1,2)
  Estimation; 100% disposed. Reported as "disposal, used mineral oil, 10% water, to hazardous waste incineration".
  Reference(s): René Itten, Rolf Frischknecht, Matthias Stucki, 2014, Life Cycle Inventories of Electricity Mixes and Grid
  production volume; = waste_min_oil_byP/ trans_net_RP* trans_net_RP_PV
    Calculated from the production volume of transmission network, electricity, high voltage in proportion to the respective output amounts.
  properties: carbon content, fossil 0.864444, dry mass 0.9 kg, water content 0.111111, wet mass 1 kg
  note on carbon content, fossil: Tab A.6, ecoinvent v2.2 report 13_I. C content has been calculated after data in the tables, and then referred to 1 kg DM
- waste polypropylene: -221 kg; name waste_polyprop; = polypropylene; lognormal variance with pedigree 0.482025, pedigree (3,5,3,2,5)
  Estimation. 100% disposed.
  production volume; = trans_net_RP_PV * (waste_polyprop / trans_net_RP)
    Calculated from production volume of reference product using the relative outputs.
  properties: carbon content, fossil 0.825208, dry mass 0.841 kg, heating value, net 32.78 MJ, water content 0.189061, wet mass 1 kg
  note on heating value, net: Value assumed for all polypropylene products. Source: Phyllis2, database for (treated) biomass, algae, feedstocks for biogas production and biochar, https://phyllis.nl/Biomass/View/1186, ECN.TNO
- zinc: 722 kg; lognormal variance with pedigree 0.0532, pedigree (3,3,5,1,2)
  (same comment as for aluminium, wrought alloy)
  properties: dry mass 1 kg, wet mass 1 kg
- zinc scrap, post-consumer: -722 kg; name zinc_scrap; = zinc; lognormal variance with pedigree 0.482025, pedigree (3,5,3,2,5)
  Estimation. Assuming all goes to recycling.
  production volume; = trans_net_RP_PV * (zinc_scrap / trans_net_RP)
    Calculated from production volume of reference product using the relative outputs.
  properties: dry mass 1 kg, price 0.55 EUR2005, wet mass 1 kg, zinc content 1

## Inputs from nature
- Occupation, industrial area [natural resource, land]: 1778.3 m2*year; = 1108.4+669.9; lognormal variance with pedigree 0.2132, pedigree (3,3,5,1,2)
  sum of two types of occupation according to data source (Itten et al., 2014)
- Transformation, from arable land, unspecified use [natural resource, land]: 24.7 m2; lognormal variance with pedigree 0.0932, pedigree (3,3,5,1,2)
  (same comment as for excavation, hydraulic digger)
- Transformation, from forest, unspecified [natural resource, land]: 19.7 m2; lognormal variance with pedigree 0.0932, pedigree (3,3,5,1,2)
  (same comment as for excavation, hydraulic digger)
- Transformation, to industrial area [natural resource, land]: 44.4 m2; = 16.7 + 27.7; lognormal variance with pedigree 0.0932, pedigree (3,3,5,1,2)
  Literature data; VSE 1988, own calculations by Itten et al. 2014. Reported as 16.7 m3 "transformation to industrial area, built up" and 27.7 m3 "transformation to industrial area, vegetation".
  Reference(s): René Itten, Rolf Frischknecht, Matthias Stucki, 2014, Life Cycle Inventories of Electricity Mixes and Grid

## Sampling procedure
literature
