# anode production, paste, for aluminium electrolysis

Dataset: EcoSpold 2, unit process
Geography: RoW
Time period: 2015-01-01 to 2023-12-31
Technology level: old
Classification: EcoSpold01Categories: metals/extraction
Classification: ISIC rev.4 ecoinvent: 2790:Manufacture of other electrical equipment
Scenario: Business-as-Usual
System model: Allocation, cut-off by classification
Share of production covered: 1 %
Generated by: Linlin Wu
Published in: International Aluminium Insitute 2015
Database: ecoinvent
isCopyrightProtected: false
accessRestrictedTo: 1

## General comment
Industry average of paste anodes for use in the Hall-Héroult process using Söderberg technology.
[This dataset is meant to replace the following datasets:]

## Included activities start
The unit process begins with the unloading of process materials to the storage areas on site. The operations associated with this unit process include:
* anode mix preparation and anode briquette forming;
* maintenance and repair of plant and equipment; and
* treatment of process air, liquids and solids.
Treatment of scrubber sludges are excluded, as there is no corresponding waste treatment in the ecoinvent database.

## Included activities end
The output of this process is anode paste (briquettes) to be transported to electrolysis plants employing Söderberg technology.

## Geography
Data mostly from global surveys by IAI.

## Reference product
- anode, paste, for aluminium electrolysis: 1 kg; name anodePasteAmount; By-product classification allocatable product; CPC 46950: Carbon electrodes, carbon brushes, lamp carbons, battery carbons and other articles of graphite or other carbo[…]; HS2017 8545: Carbon electrodes, carbon brushes, lamp carbons, battery carbons and other articles of graphite or other carb[...]
  production volume 1.008e8 kg; name anodePasteProductionVolume
    Calculated value based on reported data, scaled up to correspond with Annual Production Volume of aluminium using Söderberg technology.
  property price 0.15 EUR2005
    Literature value; U.S. Department of Energy (Inert Anode Roadmap, 1998, http://www1.eere.energy.gov/manufacturing/industries_technologies/aluminum/pdfs/inertroad.pdf).
  properties: carbon allocation 0.868686 kg, carbon content 0.868686, carbon content, fossil 0.868686, carbon content, non-fossil 0, dry mass 1 kg, water content 0, water in wet mass 0 kg, wet mass 1 kg

## Inputs from technosphere
- anode factory: 2.5e-10 unit; source Classen M. 2008; lognormal variance with pedigree 0.5, pedigree (5,5,5,5,5)
  EcoSpold01Location=RER
  Rough estimate
  Uncertainty: rough guess
- electricity, medium voltage: 4.27204e-5, 6.79324e-6, 7.69669e-5, 3.43408e-6, 8.72929e-6, 2.02018e-5, 8.0023e-5, 3.38083e-6, 0.000997346, 2.1671e-5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 kWh (102 suppliers, which the file names only by identifier); sum of these 0.078 kWh; source International Aluminium Insitute 2015; lognormal variance with pedigree 0.0087, pedigree (1,2,4,1,1)
  EcoSpold01Location=UCTE
- fly ash and scrubber sludge: -0.000650303, -7.69737e-6 kg (2 suppliers, which the file names only by identifier); sum of these -0.000658 kg; source International Aluminium Insitute 2015; lognormal variance with pedigree 0.0020006, pedigree (1,4,1,1,1)
  Reported as scrubber sludges in landfill solid waste
  production volume; = anodePasteProductionVolume * (BP_amount_2 / anodePasteAmount)
    Calculated from production volume of reference product using the relative outputs.
  properties: carbon content, fossil 0.167, dry mass 0.1 kg, water content 9, wet mass 1 kg
  note on carbon content, fossil: Tab A.6, ecoinvent v2.2 report 13_I. C content has been calculated after data in the tables, and then referred to 1 kg DM
- heat, district or industrial, natural gas: 0.00014189, 0.00863467, 2.66838e-6 MJ (3 suppliers, which the file names only by identifier); sum of these 0.00877923 MJ; = Net_Heat_Value_ng*40.4 * m3fuel_use_ng/ fuel_use_ng; source International Aluminium Insitute 2015; lognormal variance with pedigree 0.008, pedigree (1,1,4,1,1)
  Natural gas combustion
  Uncertainty: No uncertainty added - uncertainty should be based on propagation of the uncertainty of the underlying parameters.
  properties: Corresponding fuel use 1.04 MJ, fuel input in physical units, m3 0.000226 m3, heating value, net 1 MJ
  note on Corresponding fuel use: Lower heating value of the fuel input related to the heat/electricity output, based on an efficiency of 96%
  note on heating value, net: net (lower) heating (calorific) value. Based on European average as reported in Dones et al. 2007.
- heat, district or industrial, other than natural gas: 0.338082 MJ; = Net_Heat_Value_HFO*40.0 * kgFuel_Input_HFO /fuel_use_HFO; source International Aluminium Insitute 2015; lognormal variance with pedigree 0.008, pedigree (1,1,4,1,1)
  Heavy oil combustion.
  Uncertainty: No uncertainty added - uncertainty should be based on propagation of the uncertainty of the underlying parameters.
  property Corresponding fuel use 1.053 MJ; name fuel_use_HFO
  property fuel input in physical units, kg 0.0089 kg; name kgFuel_Input_HFO
  property heating value, net 1 MJ; name Net_Heat_Value_HFO
  note on Corresponding fuel use: Lower heating value of the fuel input related to the heat/electricity output
- inert waste, for final disposal: -0.000973661, -6.33879e-6 kg (2 suppliers, which the file names only by identifier); sum of these -0.00098 kg; lognormal variance with pedigree 0.00061, pedigree (1,3,1,1,1)
  as ecoInvent does not relevent recycled by-products, this number includes external recyceled by products, as well as landfilled industrial waste.
  production volume; = anodePasteProductionVolume * (BP_amount_1 / anodePasteAmount)
    Calculated from production volume of reference product using the relative outputs.
  properties: dry mass 0.995 kg, water content 0.00502513, wet mass 1 kg
- petroleum coke: 0.702 kg; source International Aluminium Insitute 2015; lognormal variance with pedigree 0.0087, pedigree (1,2,4,1,1)
  EcoSpold01Location=RER
  properties: carbon content, fossil 0.885, dry mass 1 kg, heating value, net 35 MJ, wet mass 1 kg
- pitch: 0.00239439, 0.00118024, 0.000451201, 0.301974 kg (4 suppliers, which the file names only by identifier); sum of these 0.306 kg; source International Aluminium Insitute 2015; lognormal variance with pedigree 0.0087, pedigree (1,2,4,1,1)
  EcoSpold01Location=RER
  Reported as Pitch in IAI report
  properties: carbon content, fossil 0.83, dry mass 1 kg, heating value, net 28 MJ, wet mass 1 kg
- waste asphalt: -1.27534e-7, -0.00264987 kg (2 suppliers, which the file names only by identifier); sum of these -0.00265 kg; source International Aluminium Insitute 2015; lognormal variance with pedigree 0.0012, pedigree (1,3,1,1,1)
  EcoSpold01Location=CH
  Proxy for treatment of waste carbon
  production volume; = wasteCarbonAmount*anodePasteProductionVolume
    Calculated from the production volume of anode, for aluminium electrolysis in proportion to the respective output amounts.
  properties: carbon content, fossil 0.0440796, dry mass 0.999 kg, water content 0.001001, wet mass 1 kg
  note on carbon content, fossil: The waste contains 94.7% inert material (see Tab A.5 for details) 5.3% bitumen (see Tab A.6 for details), ecoinvent v2.2 report 13_I

## Inputs from nature
- Water, cooling, unspecified natural origin [natural resource, in water]: 0.00475 m3; source International Aluminium Insitute 2015; lognormal variance with pedigree 0.0098, pedigree (2,3,4,1,1)
  Specified as freshwater in IAI report.

## Emissions to nature
- Benzo(a)pyrene [air, unspecified]: 2e-8 kg; name BaPAmount; source International Aluminium Insitute 2015; lognormal variance with pedigree 0.31, pedigree (1,4,4,1,1)
  Reporting rate 4%
- Nitrogen oxides [air, unspecified]: 1.5e-5 kg; source International Aluminium Insitute 2015; lognormal variance with pedigree 0.0486, pedigree (1,3,4,1,1)
- PAH, polycyclic aromatic hydrocarbons [air, unspecified]: 1e-7 kg; source International Aluminium Insitute 2015; lognormal variance with pedigree 0.0086, pedigree (1,3,4,1,1)
  Reporting rate 7%
  Uncertainty: Uncertainty calculated from that of underlying variables.
  property total PAH emission to air 7.5e-6 kg; name totalPAH
- Particulate Matter, > 10 um [air, unspecified]: 4.9e-5 kg; source International Aluminium Insitute 2015; lognormal variance with pedigree 0.0406, pedigree (1,3,5,1,1)
  the only particulates that is reported in the IAI 2015 LCI survey
  Uncertainty: Uncertainty calculated from that of underlying variables.
  property ratio pf particulates greater than 10 microns 0.2; name PM_greater_10um; = (4-3.2)/4
  property total particulates 0.0001 kg; name PM_total_2
- Sulfur dioxide [air, unspecified]: 5.1e-5 kg; source International Aluminium Insitute 2015; lognormal variance with pedigree 0.0092, pedigree (1,3,4,1,1)
- Water [air, unspecified]: 0.00071 m3; source International Aluminium Insitute 2015; lognormal variance with pedigree 0.2106, pedigree (5,5,5,5,5)
  IAI data reported as "Fresh Water Consumption"
- Fluoride [water, unspecified]: 7.1e-5 kg; source International Aluminium Insitute 2015; lognormal variance with pedigree 0.01001, pedigree (1,4,4,1,1)
- Hydrocarbons, unspecified [water, unspecified]: 2.02e-5 kg; source International Aluminium Insitute 2015; lognormal variance with pedigree 0.010001, pedigree (1,4,4,1,1)
  Reported as Oil and grease/total hydrocarbons in IAI survey, reporting rate 2%
- PAH, polycyclic aromatic hydrocarbons [water, unspecified]: 3e-8 kg; source International Aluminium Insitute 2015; lognormal variance with pedigree 0.0106, pedigree (1,4,4,1,1)
  Reported as PAH (6 Borneff components)
- Suspended solids, unspecified [water, unspecified]: 0.00011 kg; source International Aluminium Insitute 2015; lognormal variance with pedigree 0.0106, pedigree (1,4,4,1,1)
- Water [water, surface water]: 0.0042 m3; lognormal variance with pedigree 0.0098, pedigree (2,3,4,1,1)

## Sampling procedure
Flows are based on a life cycle inventory (LCI) survey and an energy survey carried out by IAI for its member and non member companies. The survey was conducted in 2016 for 2015 data. Total percent representativeness is based on 2015 LCI data, using 2015 production volumes. 19% of global soderberg production. The 2015 energy survey has a much higher response rate (95% of global soderberg productionl).

## Extrapolations
The infrastructure input was not covered by the IAI survey and uses the rough guess in ecoinvent 2.2.

## Review by Louis Brimacombe 2018-06-07
Comments as per emails with Tereza.
