# planting with starter fertiliser or amendment, by row crop planter

Dataset: EcoSpold 2, unit process
Geography: US
Time period: 2021-01-01 to 2023-12-31
Technology level: current
Classification: ISIC rev.4 ecoinvent: 0161:Support activities for crop production
Scenario: Business-as-Usual
System model: Allocation, cut-off by classification
Generated by: Juanita Barrera
Database: ecoinvent
isCopyrightProtected: true
accessRestrictedTo: 1

## General comment
This dataset represents the service of planting by row crop planter, with starter fertiliser or amendment. Seed and fertiliser are not included. The dataset covers the application of seeds and starter fertiliser in the field with a tractor of 250 hp and 10771 kg coupled to an implement that weighs 16000 kg. The functional unit (FU) is one ha seeded and the operation time is 0.21 h/FU.
40 m² are occupied inside the shed. The implement can be used to fertilising besides seeding. In this case, both activities are made in the same operation.

## Included activities start
The activity starts from the agricultural field foreseen to be processed.

## Included activities end
The inventory takes into account the diesel fuel consumption and the amount of agricultural machinery and of the shed, which has to be attributed to the seeding operation. Also taken into consideration is the amount of emissions to the air from combustion and the emissions to soil from tyre abrasion during the work process. Seeds and fertilisers are not taken into account. Not included are dust other than from combustion. This activity ends with the transfer back to the shed and uncoupling of the implement from the tractor.

## Geography
The inventory is extrapolated from the Global geography. Data quality indicators from adjusted accordingly.

## Technology
Fuel consumption and emissions per kg diesel have been extrapolated to the US, but others inputs were taken from the original values.

## Reference product
- planting with starter fertiliser or amendment, by row crop planter: 1 ha; By-product classification allocatable product; CPC 86119: Other support services to crop production
  production volume 1.57737e8 ha
    FAOSTAT data year 2020: area of arable land.
  property price 33.7399 EUR2005
    The price is from the year 2020. Price information has been directly provided by the data provider based on the following reference: University of Minnesota, Machinery cost estimates, W.F. Lazarus, 2020. The prices were adjusted for inflation relative to 2005 using the producer price index (PPI) of the euro area, published by eurostat (https://ec.europa.eu/eurostat/databrowser/view/STS_INPP_A__custom_6416181/default/table?lang=en, last accessed on 2023-06-01).
  properties: carbon allocation 0 kg, carbon content 0

## Inputs from technosphere
- agricultural machinery, unspecified: 2.26944 kg; lognormal variance with pedigree 0.3029, pedigree (2,2,2,5,1)
  proxy from "planting with starter fertiliser, by no till planter, GLO"
- diesel: 2.62544 kg; lognormal variance with pedigree 0.0015, pedigree (2,2,2,1,1)
  average of no till planter data - UMN Farm Machinery Economic Cost Estimation Spreadsheet (MACHDATA.XLSM) Lazarus, 2022; 2021 Nebraska Crop budget projections, Robert Klein and Glennis McClure, UNL Extension
  properties: carbon content, fossil 0.865, dry mass 1 kg, heating value, net 42.8 MJ, wet mass 1 kg
- shed: 0.0018912 m2; lognormal variance with pedigree 0.3029, pedigree (2,2,2,5,1)
  proxy from "planting with starter fertiliser, by no till planter, GLO"
- tractor, 4-wheel, agricultural: 0.38194 kg; lognormal variance with pedigree 0.3029, pedigree (2,2,2,5,1)
  proxy from "planting with starter fertiliser, by no till planter, GLO"

## Emissions to nature
- Ammonia [air, non-urban air or from high stacks]: 5.25089e-5 kg; lognormal variance with pedigree 0.090125, pedigree (3,2,4,2,4)
  adapted from "planting with starter fertiliser, by no till planter, GLO" to match the diesel consumption
- Benzene [air, non-urban air or from high stacks]: 1.91657e-5 kg; lognormal variance with pedigree 0.090125, pedigree (3,2,4,2,4)
  (same comment as for Ammonia)
- Benzo(a)pyrene [air, non-urban air or from high stacks]: 7.87633e-8 kg; lognormal variance with pedigree 0.090125, pedigree (3,2,4,2,4)
  (same comment as for Ammonia)
- Cadmium II [air, non-urban air or from high stacks]: 2.62544e-8 kg; lognormal variance with pedigree 0.700125, pedigree (3,2,4,2,4)
  (same comment as for Ammonia)
- Carbon dioxide, fossil [air, non-urban air or from high stacks]: 8.19138 kg; lognormal variance with pedigree 0.050725, pedigree (3,2,4,2,4)
  (same comment as for Ammonia)
- Carbon monoxide, fossil [air, non-urban air or from high stacks]: 0.0016415 kg; lognormal variance with pedigree 0.700125, pedigree (3,2,4,2,4)
  (same comment as for Ammonia)
- Chromium III [air, non-urban air or from high stacks]: 1.31272e-7 kg; lognormal variance with pedigree 0.700125, pedigree (3,2,4,2,4)
  (same comment as for Ammonia)
- Copper ion [air, non-urban air or from high stacks]: 4.46325e-6 kg; lognormal variance with pedigree 0.700125, pedigree (3,2,4,2,4)
  (same comment as for Ammonia)
- Dinitrogen monoxide [air, non-urban air or from high stacks]: 0.000315053 kg; lognormal variance with pedigree 0.090125, pedigree (3,2,4,2,4)
  (same comment as for Ammonia)
- Methane, fossil [air, non-urban air or from high stacks]: 0.000338682 kg; lognormal variance with pedigree 0.090125, pedigree (3,2,4,2,4)
  (same comment as for Ammonia)
- NMVOC, non-methane volatile organic compounds [air, non-urban air or from high stacks]: 0.000769452 kg; lognormal variance with pedigree 0.090125, pedigree (3,2,4,2,4)
  (same comment as for Ammonia)
- Nickel II [air, non-urban air or from high stacks]: 1.83781e-7 kg; lognormal variance with pedigree 0.700125, pedigree (3,2,4,2,4)
  (same comment as for Ammonia)
- Nitrogen oxides [air, non-urban air or from high stacks]: 0.00872045 kg; lognormal variance with pedigree 0.090125, pedigree (3,2,4,2,4)
  (same comment as for Ammonia)
- PAH, polycyclic aromatic hydrocarbons [air, non-urban air or from high stacks]: 8.59929e-6 kg; lognormal variance with pedigree 0.350125, pedigree (3,2,4,2,4)
  (same comment as for Ammonia)
- Particulate Matter, < 2.5 um [air, non-urban air or from high stacks]: 0.0192881 kg; lognormal variance with pedigree 0.350125, pedigree (3,2,4,2,4)
  (same comment as for Ammonia)
- Selenium IV [air, non-urban air or from high stacks]: 2.62544e-8 kg; lognormal variance with pedigree 0.700125, pedigree (3,2,4,2,4)
  (same comment as for Ammonia)
- Sulfur dioxide [air, non-urban air or from high stacks]: 0.0026517 kg; lognormal variance with pedigree 0.050725, pedigree (3,2,4,2,4)
  (same comment as for Ammonia)
- Zinc II [air, non-urban air or from high stacks]: 2.62544e-6 kg; lognormal variance with pedigree 0.700125, pedigree (3,2,4,2,4)
  (same comment as for Ammonia)
- Cadmium II [soil, agricultural]: 8.46989e-6 kg; lognormal variance with pedigree 0.0921, pedigree (3,2,4,5,4)
  proxy from "planting with starter fertiliser, by no till planter, GLO"
- Lead II [soil, agricultural]: 3.67029e-5 kg; lognormal variance with pedigree 0.0921, pedigree (3,2,4,5,4)
  proxy from "planting with starter fertiliser, by no till planter, GLO"
- Zinc II [soil, agricultural]: 0.000225864 kg; lognormal variance with pedigree 0.0921, pedigree (3,2,4,5,4)
  proxy from "planting with starter fertiliser, by no till planter, GLO"

## Extrapolations
The dataset is modeled for agricultural production system in US. Data Quality indicators are adjusted accordingly.
