# cement, all types to generic market for cement, unspecified

Dataset: EcoSpold 2, unit process
Geography: EC
Time period: 2019-01-01 to 2023-12-31
Technology level: current
Classification: ISIC rev.4 ecoinvent: 2394:Manufacture of cement, lime and plaster
Scenario: Business-as-Usual
System model: Allocation, cut-off by classification
Generated by: K.Flasher;E.Barros;J.Aguirre;S.Martines
Published in: Petroche, D.M. 2022
Database: ecoinvent
isCopyrightProtected: true
accessRestrictedTo: 1

## General comment
This is a linking (transfering) activity which links the specific cement to the generic market for cement, unspecified.

## Included activities start
The activity starts with the reception of a specific cement.

## Included activities end
The activity ends with cement, unspecified which is supplied to the generic market for cement, unspecified.

## Geography
This dataset represents production of 'cement, unspecified' for Ecuador.

## Time period
The time period is the same as in the cement production datasets for Ecuador.

## Reference product
- cement, unspecified: 1 kg; source cemsuisse 2022; By-product classification allocatable product; CPC 37440: Portland cement, aluminous cement, slag cement and similar hydraulic cements, except in the form of clinkers; HS2017 2523: Portland cement, aluminous cement (ciment fondu), slag cement, supersulphate cement and similar hydraulic cem[...]
  production volume 4.59913e8 kg; = 2299566291*20%
    Calculated based on regional PV, assuming 20% of cement is redirected to the generic market for cement unspecified.
  property price 0.0615 EUR2005
    2005 import and export prices (total trades (USD) divided by total weight (kg) in China, India, USA, Japan, Russia and Europe, major producers and consumers (http://www.cementchina.net/freport/showfre.asp?id=749) from UN Commodity Trade Statistics Database (http://data.un.org/Explorer.aspxDatabase [Accessed 2 July 2010]). Commodity: Cement (portland, aluminious, slag or hydraulic)
  properties: carbon allocation 0 kg, carbon content 0, carbon content, fossil 0, carbon content, non-fossil 0, dry mass 1 kg, water content 0, water in wet mass 0 kg, wet mass 1 kg

## Inputs from technosphere
- cement, type general use: 1 kg; name cement
  property carbon content, fossil 0; name cement_C_content_fossil
  property carbon content, non-fossil 0; name cement_C_content_non_fossil
  property dry mass 1 kg; name cement_DM
  property water content 0; name cement_water_content
  property water in wet mass 0 kg; name cement_WWM
  property wet mass 1 kg; name cement_WM
