# carboxymethyl cellulose production, powder

Dataset: EcoSpold 2, unit process
Geography: RoW
Time period: 1993-01-01 to 2023-12-31
Technology level: current
Classification: EcoSpold01Categories: washing agents/auxiliary agents
Classification: ISIC rev.4 ecoinvent: 2011:Manufacture of basic chemicals
Synonyms: CMC
Tags: ConvertedDataset
Scenario: Business-as-Usual
System model: Allocation, cut-off by classification
Generated by: Rainer Zah
Published in: Zah R. 2007
Database: ecoinvent
isCopyrightProtected: true
accessRestrictedTo: 1

## General comment
data based on company information for a former detergent study of EMPA
[This dataset was already contained in the ecoinvent database version 2. It was not individually updated during the transfer to ecoinvent version 3. Life Cycle Impact Assessment results may still have changed, as they are affected by changes in the supply chain, i.e. in other datasets. This dataset was generated following the ecoinvent quality guidelines for version 2. It may have been subject to central changes described in the ecoinvent version 3 change report (http://www.ecoinvent.org/database/ecoinvent-version-3/reports-of-changes/), and the results of the central updates were reviewed extensively. The changes added e.g. consistent water flows and other information throughout the database. The documentation of this dataset can be found in the ecoinvent reports of version 2, which are still available via the ecoinvent website. The change report linked above covers all central changes that were made during the conversion process.]

## Included activities end
This module contains material and energy input, production of waste and emissions for the production of carboxy methyl cellulose. Transport and infrastructure have been estimated.

## Geography
data from 1 European producer, used as European average

## Technology
Processing of alkaline cellulose with mono acetic acid, used as average technology for the mid 90s

## Time period
year of reported data

## Reference product
- carboxymethyl cellulose, powder: 1 kg; By-product classification allocatable product; CPC 35240: Sugars, chemically pure n.e.c.; sugar ethers and sugar esters and their salts n.e.c.; HS2017 391239: Cellulose ethers; (other than carboxymethylcellulose and its salts), in primary forms; CAS 9000-11-7
  EcoSpold01Location=RER
  production volume 2.67763 kg
    This is a placeholder value that does not reflect real-world production volumes. This dataset does not currently require a real-world production volume to work in the database framework, and no actual data were collected yet. This has no negative effect on the results of the ecoinvent database.
  property carbon content, fossil 0.0979592
    Chemical structure: Cellulose-O-CH2-COO-Na+. CMC is produced by the processing of alkaline cellulose with mono acetic acid (ecoinvent v2.2 report 12, pg 76 & 81). MW Acetic acid (CH3-COOH) is 60 g/mol. The degree of carboxymethyl substitution in CMC is variable. It was considered that every molecule of glucose (monomers of cellulose) had a carboxymethyl substitution. MW of glucose (C6H10O5) is 162 g/mol; cellulose is (C6H10O5)n. MW of Na is 23
  property carbon content, non-fossil 0.293878
    Chemical structure: Cellulose-O-CH2-COO-Na+. CMC is produced by the processing of alkaline cellulose with mono acetic acid (ecoinvent v2.2 report 12, pg 76 & 81). MW Acetic acid is 60 g/mol. The degree of carboxymethyl substitution in CMC is variable. It was considered that every molecule of glucose (monomers of cellulose) had a carboxymethyl substitution. MW of glucose (C6H10O5) is 162 g/mol; cellulose is (C6H10O5)n.
  property heating value, net 20.19 MJ
    LHV is calculated based on the elemental composition of the substance. Based on the CAS number of the substance (009000-11-7), the chemical formula of the substance is found to be: C8H16O8, (PubChem 2020).
    Reference: Kim, S., Chen, J., Cheng, T., Gindulyte, A., He, J., He, S., Li, Q., Shoemaker, B. A., Thiessen, P. A., Yu, B., Zaslavsky, L., Zhang, J., & Bolton, E. E. (2019). PubChem 2019 update: improved access to chemical data. Nucleic acids research, 47(D1), D1102–D1109. https://doi.org/10.1093/nar/gky1033
  property price 0.968353 EUR2005
    Calculated based on inputs: The price of the product has been calculated as a sum of the values of the material and energy inputs for this product. This value is therefore a rough estimation. It may underestimate the real price since there are additional expenses when producing any product. These expences can include for example labour costs, treatment of waste materials and profit for the producer. Please consider carefully whether this level of data quality is acceptable for your application.
  properties: carbon allocation 0.391837 kg, carbon content 0.391837, dry mass 1 kg, water content 0, water in wet mass 0 kg, wet mass 1 kg

## Inputs from technosphere
- chemical factory, organics: 4e-10 unit; lognormal variance with pedigree 0.3632, pedigree (2,3,5,5,1)
  EcoSpold01Location=RER
- chloroacetic acid: 0.33 kg; lognormal variance with pedigree 0.0632, pedigree (2,3,5,5,1)
  EcoSpold01Location=RER
  properties: carbon content, fossil 0.255319, dry mass 1 kg, heating value, net 11.55 MJ, wet mass 1 kg
- electricity, medium voltage: 0.0488953, 0.975352, 0.327715, 0.0149734, 0.00299691, 0.000643505, 0.10072 kWh (7 suppliers, which the file names only by identifier); sum of these 1.4713 kWh; lognormal variance with pedigree 0.0632, pedigree (2,3,5,5,1)
  EcoSpold01Location=UCTE
- heat, district or industrial, natural gas: 0.260481, 15.8515 MJ (2 suppliers, which the file names only by identifier); sum of these 16.112 MJ; lognormal variance with pedigree 0.0632, pedigree (2,3,5,5,1)
  properties: heating value, net 1 MJ
- heat, district or industrial, other than natural gas: 8.98888, 0.00416438 MJ (2 suppliers, which the file names only by identifier); sum of these 8.99304 MJ; lognormal variance with pedigree 0.0632, pedigree (2,3,5,5,1)
  properties: heating value, net 1 MJ
- hydrochloric acid, without water, in 30% solution state: 0.022 kg; lognormal variance with pedigree 0.0632, pedigree (2,3,5,5,1)
  EcoSpold01Location=RER
  properties: dry mass 1 kg, heating value, net 3.32 MJ, wet mass 1 kg
- sodium hydroxide, without water, in 50% solution state: 0.31 kg; lognormal variance with pedigree 0.0632, pedigree (2,3,5,5,1)
  EcoSpold01Location=RER
  properties: dry mass 1 kg, heating value, net 3.03 MJ, wet mass 1 kg
- sulfate pulp, bleached: 0.4275 kg; = 0.45*0.95; lognormal variance with pedigree 0.0632, pedigree (2,3,5,5,1)
  pulp input is 5% unbleached pulp and 95% bleached pulp
  properties: carbon content, non-fossil 0.494, dry mass 0.9 kg, heating value, net 13.23 MJ, water content 0.111111, wet mass 1 kg
  note on carbon content, non-fossil: C content of dry mass of sulfate pulp is 0.494 kgC/kg dry wood (ecoinvent v2.2 report 6_IX & ecoinvent v2.2 report 9). No other C containing products in the formulation of the pulp.
- sulfate pulp, unbleached: 0.0225 kg; = 0.45*0.05; lognormal variance with pedigree 0.0632, pedigree (2,3,5,5,1)
  pulp input is 5% unbleached pulp and 95% bleached pulp
  properties: carbon content, non-fossil 0.494, dry mass 0.9 kg, heating value, net 13.23 MJ, price 0.355 EUR2005, water content 0.111111, wet mass 1 kg

## Emissions to nature
- NMVOC, non-methane volatile organic compounds [air, unspecified]: 0.0001 kg; lognormal variance with pedigree 0.0932, pedigree (2,3,5,5,1)
- Particulate Matter, > 10 um [air, unspecified]: 0.0003 kg; lognormal variance with pedigree 0.0932, pedigree (2,3,5,5,1)

## Sampling procedure
company data

## Extrapolations
see technology and geography This dataset has been copied from an original dataset covering the geography RER. The uncertainty has been adjusted accordingly.

## Review by Heiko Kunst 2003-07-04
Passed.
