# application of plant protection product, by airplane

Dataset: EcoSpold 2, unit process
Geography: US
Time period: 2021-01-01 to 2023-12-31
Technology level: current
Classification: ISIC rev.4 ecoinvent: 0161:Support activities for crop production
Scenario: Business-as-Usual
System model: Allocation, cut-off by classification
Generated by: Juanita Barrera
Database: ecoinvent
isCopyrightProtected: true
accessRestrictedTo: 1

## General comment
This dataset represents the application of protection product by an agricultural airplane in one hectare (ha). The Functional Unit (FU) is one hectare and the operation time is about 0.00625 hour per ha. Plant protection product is not included. This is a service activity.

## Included activities start
The activity starts from the agricultural field foreseen to be processed.

## Included activities end
This activity ends with the application of plant protection product. The inventory includes the airplane input, kerosene consumption, and emissions from the fuel. The amount of protection products is not taken into account.

## Geography
The inventory is modeled for agricultural production system in the United States.

## Technology
This activity is performed by an agricultural airplane, with a weight of 2012 kg and an operation capacity of 160ha/hour.

## Reference product
- application of plant protection product, by airplane: 1 ha; By-product classification allocatable product; CPC 86119: Other support services to crop production
  This dataset represents the application of protection product by an agricultural airplane in one hectare (ha).
  production volume 5.13951e7 ha
    Up to 2019, in the US, it is estimated that around 127 million acres have been treated with aerial application. Source: https://agairupdate.com/2021/08/02/a-century-of-agricultural-aviation-1921-2021/
  property price 20.1925 EUR2005
    The price is from the year 2023. The price is estimated as a proxy based on the source: https://ag.purdue.edu/commercialag/home/resource/2023/03/indiana-farm-custom-rates/. The prices were adjusted for inflation relative to 2005 using the producer price index (PPI) of the euro area, published by eurostat (https://ec.europa.eu/eurostat/databrowser/view/STS_INPP_A__custom_6416181/default/table?lang=en, last accessed on 2023-06-01).
  properties: carbon allocation 0 kg, carbon content 0

## Inputs from technosphere
- aircraft, agricultural: 2.21631e-5 unit; lognormal variance with pedigree 0.1214, pedigree (2,1,2,1,2)
  45120 ha in a lifetime. Average calculation based on 4 different agricultural aircrafts (Moraes, T.R., Cornago Junior, V.M., De Araújo, V.C., Esperancini, M.S. and Antuniassi, U.R., 2021. COST OF AERIAL AND GROUND SPRAYINGS AND TECHNOLOGICAL REPLACEMENT POINT: A CASE STUDY IN THE REGION OF MINEIROS, GO, BRAZIL. Engenharia Agrícola, 41, pp.359-367.)
  properties: lifetime 20 year
- kerosene: 0.877 kg; lognormal variance with pedigree 0.002, pedigree (2,1,2,1,2)
  171.6 l/hour average consumption of kerosene, 160ha/hour based on (Moraes, T.R., Cornago Junior, V.M., De Araújo, V.C., Esperancini, M.S. and Antuniassi, U.R., 2021. COST OF AERIAL AND GROUND SPRAYINGS AND TECHNOLOGICAL REPLACEMENT POINT: A CASE STUDY IN THE REGION OF MINEIROS, GO, BRAZIL. Engenharia Agrícola, 41, pp.359-367.) and (Albaugh, T.J., Vance, E.D., Gaudreault, C., Fox, T.R., Allen, H.L., Stape, J.L. and Rubilar, R.A., 2012. Carbon emissions and sequestration from fertilization of pine in the southeastern United States. Forest Science, 58(5), pp.419-429.).
  properties: carbon content, fossil 0.85, dry mass 1 kg, heating value, net 43 MJ, wet mass 1 kg

## Emissions to nature
- Cadmium II [air, non-urban air or from high stacks]: 8.77e-9 kg; lognormal variance with pedigree 0.716, pedigree (4,5,5,5,3)
  scaled for 0.877 kg input of kesorese based on "transport, passenger aircraft, very short haul, GLO"
- Carbon dioxide, fossil [air, non-urban air or from high stacks]: 2.73332 kg; lognormal variance with pedigree 0.002, pedigree (2,1,2,1,2)
  (same comment as for Cadmium II)
- Carbon monoxide, fossil [air, non-urban air or from high stacks]: 0.00614964 kg; lognormal variance with pedigree 0.6514, pedigree (2,1,2,1,2)
  (same comment as for Cadmium II)
- Chromium III [air, non-urban air or from high stacks]: 4.385e-8 kg; lognormal variance with pedigree 0.716, pedigree (4,5,5,5,3)
  (same comment as for Cadmium II)
- Copper ion [air, non-urban air or from high stacks]: 4.385e-8 kg; lognormal variance with pedigree 0.716, pedigree (4,5,5,5,3)
  (same comment as for Cadmium II)
- Lead II [air, non-urban air or from high stacks]: 1.754e-5 kg; lognormal variance with pedigree 0.716, pedigree (4,5,5,5,3)
  (same comment as for Cadmium II)
- Mercury II [air, non-urban air or from high stacks]: 6.139e-11 kg; lognormal variance with pedigree 0.716, pedigree (4,5,5,5,3)
  (same comment as for Cadmium II)
- NMVOC, non-methane volatile organic compounds [air, non-urban air or from high stacks]: 0.000427079 kg; lognormal variance with pedigree 0.0414, pedigree (2,1,2,1,2)
  (same comment as for Cadmium II)
- Nickel II [air, non-urban air or from high stacks]: 6.139e-8 kg; lognormal variance with pedigree 0.716, pedigree (4,5,5,5,3)
  (same comment as for Cadmium II)
- Nitrogen oxides [air, non-urban air or from high stacks]: 0.0136845 kg; lognormal variance with pedigree 0.0414, pedigree (2,1,2,1,2)
  (same comment as for Cadmium II)
- Particulate Matter, < 2.5 um [air, non-urban air or from high stacks]: 0.000159646 kg; lognormal variance with pedigree 0.3014, pedigree (2,1,2,1,2)
  (same comment as for Cadmium II)
- Selenium IV [air, non-urban air or from high stacks]: 8.77e-9 kg; lognormal variance with pedigree 0.716, pedigree (4,5,5,5,3)
  (same comment as for Cadmium II)
- Sulfur dioxide [air, non-urban air or from high stacks]: 0.00073668 kg; lognormal variance with pedigree 0.002, pedigree (2,1,2,1,2)
  (same comment as for Cadmium II)
- Water [air, non-urban air or from high stacks]: 6.71024e-6 m3; lognormal variance with pedigree 0.002, pedigree (2,1,2,1,2)
  (same comment as for Cadmium II)
- Zinc II [air, non-urban air or from high stacks]: 8.77e-6 kg; lognormal variance with pedigree 0.716, pedigree (4,5,5,5,3)
  (same comment as for Cadmium II)

## Sampling procedure
Average calculation based on 4 different agricultural aircrafts (Moraes, T.R., Cornago Junior, V.M., De Araújo, V.C., Esperancini, M.S. and Antuniassi, U.R., 2021. COST OF AERIAL AND GROUND SPRAYINGS AND TECHNOLOGICAL REPLACEMENT POINT: A CASE STUDY IN THE REGION OF MINEIROS, GO, BRAZIL. Engenharia Agrícola, 41, pp.359-367.) & 171.6 l/hour average consumption of kerosene, 160ha/hour based on (Moraes, T.R., Cornago Junior, V.M., De Araújo, V.C., Esperancini, M.S. and Antuniassi, U.R., 2021. COST OF AERIAL AND GROUND SPRAYINGS AND TECHNOLOGICAL REPLACEMENT POINT: A CASE STUDY IN THE REGION OF MINEIROS, GO, BRAZIL. Engenharia Agrícola, 41, pp.359-367.) and (Albaugh, T.J., Vance, E.D., Gaudreault, C., Fox, T.R., Allen, H.L., Stape, J.L. and Rubilar, R.A., 2012. Carbon emissions and sequestration from fertilization of pine in the southeastern United States. Forest Science, 58(5), pp.419-429.)."

## Extrapolations
The dataset is modeled for agricultural production system in US. Data Quality indicators are adjusted accordingly. Scaled for 0,877 kg of input of kasorese based on the transport, passenger aircraft, very short haul. GLO
