# cement production, CEM IV/B

Dataset: EcoSpold 2, unit process
Geography: Europe without Switzerland
Time period: 2005-01-01 to 2023-12-31
Technology level: current
Classification: ISIC rev.4 ecoinvent: 2394:Manufacture of cement, lime and plaster
Synonyms: Pozzolanic cement; CEM IV/B
Tags: combined production
Scenario: Business-as-Usual
System model: Allocation, cut-off by classification
Share of production covered: 100 %
Generated by: Michael Elias Boesch
Published in: Boesch, M.E. 2010
Database: ecoinvent
isCopyrightProtected: true
accessRestrictedTo: 1

## General comment
The dataset describes the production of cement (CEM IV/B) in Europe.
[Dataset to be replaced by 'cement production, pozzolana and fly ash 36-55%, Europe without Switzerland and Austria, 2005 - 2009']
[Dataset to be replaced by 'cement production, pozzolana and fly ash 36-55%, Europe without Switzerland and Austria, 2005 - 2009']

## Included activities start
From cradle, i.e. including all upstream activities. As source of gypsum, waste gypsum from flue gas treatment is assumed.

## Included activities end
This activity ends with the cement produced in the cement mill. The dataset does not include packaging and administration.

## Reference product
- cement, CEM IV/B: 1 kg; name cement; source Boesch, M.E. 2010; By-product classification allocatable product; CPC 37440: Portland cement, aluminous cement, slag cement and similar hydraulic cements, except in the form of clinkers; HS2017 252329: Cement; portland, other than white, whether or not artificially coloured
  Literature Value
  production volume 3.89074e8 kg; name APV_cement; = 204776*10^6*1.90%*10%
    Total production volume of hydraulic cement in the geography Europe without Switzerland in 2019: 204'776'000 ton. Source: USGS (2019). U.S. Geological Survey, Minerals Yearbook Annual Tables, 2019. Available at: https://www.usgs.gov/centers/national-minerals-information-center/cement-statistics-and-information
    Domestic delivery of CEM IV of 1.90% in 2015 in Europe (EU28). This value was scaled according to the reported shares of CEM IV and unspecified cement. Source: European Commission (2017). Competitiveness of the European Cement and Lime Sectors - Final Report. Available at: <http://publications.europa.eu/resource/cellar/07d18924-07ce-11e8-b8f5-01aa75ed71a1.0001.01/DOC_1>
    The initial shares from the data provider between CEM IV/A (90.00%) and CEM IV/B (10.00%) were scaled to represent the updated production volumes (2019).
  property price 0.0615 EUR2005
    2005 import and export prices (total trades (USD) divided by total weight (kg) in China, India, USA, Japan, Russia and Europe, major producers and consumers (http://www.cementchina.net/freport/showfre.asp?id=749) from UN Commodity Trade Statistics Database (http://data.un.org/Explorer.aspxDatabase [Accessed 2 July 2010]). Commodity: Cement (portland, aluminious, slag or hydraulic)
  properties: carbon allocation 0 kg, carbon content 0, carbon content, fossil 0, carbon content, non-fossil 0, dry mass 1 kg, water content 0, water in wet mass 0 kg, wet mass 1 kg

## Inputs from technosphere
- cement factory: 5.36e-11 unit; = 5.36e-11* cement; source Kellenberger D. 2007; lognormal variance with pedigree 0.3087, pedigree (2,1,4,3,1)
  Literature Value
  Uncertainty: Variance of log-transformed data was taken from ecoinvent report no 1, table 10.3. Value represents demand of infrastructure for input/output group c.
- clinker: 0.5178 kg; = 0.5178* cement; source Boesch, M.E. 2010; lognormal variance with pedigree 0.0113, pedigree (3,3,4,3,1)
  Literature Value
  Uncertainty: Variance of log-transformed data was taken from ecoinvent report no 1, table 10.3. Value represents demand of products, electricity etc. for input/output group c.
  properties: dry mass 1 kg, wet mass 1 kg
- electricity, medium voltage: 0.0278 kWh; = 0.0278* cement; source Boesch, M.E. 2010; lognormal variance with pedigree 0.0113, pedigree (3,3,4,3,1)
  (same comment as for clinker)
- ethylene glycol: 0.00031 kg; = 3.1e-4* cement; source Kellenberger D. 2007; lognormal variance with pedigree 0.0113, pedigree (3,3,4,3,1)
  Ancillary product for grinding
  Uncertainty: Variance of log-transformed data was taken from ecoinvent report no 1, table 10.3. Value represents demand of products, electricity etc. for input/output group c.
  properties: carbon content, fossil 0.387097, dry mass 1 kg, heating value, net 23.44 MJ, wet mass 1 kg
- gypsum, mineral: 0.0273 kg; = 0.0273* cement; source Boesch, M.E. 2010; lognormal variance with pedigree 0.0113, pedigree (3,3,4,3,1)
  (same comment as for clinker)
  properties: dry mass 1 kg, wet mass 1 kg
- steel, low-alloyed: 0.00011 kg; name steel; = 0.00011* cement; source Kellenberger D. 2007; lognormal variance with pedigree 0.0113, pedigree (3,3,4,3,1)
  Literature value
  Uncertainty: Variance of log-transformed data was taken from ecoinvent report no 1, table 10.3. Value represents demand of products, electricity etc. for input/output group c.
  properties: carbon content, fossil 0.005, dry mass 1 kg, wet mass 1 kg

## Emissions to nature
- Heat, waste [air, unspecified]: 0.1 MJ; = 0.100* cement; source Boesch, M.E. 2010; lognormal variance with pedigree 0.0507, pedigree (3,3,4,3,1)
  Literature Value
  Uncertainty: Variance of log-transformed data was taken from ecoinvent report no 1, table 10.3. Value represents others emitted to air for input/output group p.

## Sampling procedure
Data approximates average European production
