# wood cladding production, softwood

Dataset: EcoSpold 2, unit process
Geography: RoW
Time period: 2012-01-01 to 2023-12-31
Technology level: current
Classification: ISIC rev.4 ecoinvent: 1622:Manufacture of builders' carpentry and joinery
Classification: EcoSpold01Categories: wooden materials/extraction
Synonyms: siding
Tags: single enterprise data
Scenario: Business-as-Usual
System model: Allocation, cut-off by classification
Share of production covered: 85 %
Generated by: Hugues Imbeault-Tétreault
Database: ecoinvent
isCopyrightProtected: true
accessRestrictedTo: 1

## General comment
This dataset represents the production of stained solid softwood cladding in the region of Quebec for outdoor use. Wood cladding is an exterior wall cladding, which consists of wood boards of different cross-sections (see figure) sawn out of beams (softwood in this case) and then stained. They are most of the time installed on house walls, horizontally or vertically jointed. The functional unit represents 1 m² of covered exterior wall with stained wood cladding. The average overlap of the installed cladding on the wall is 20% (overlap area / board area).
This dataset has been copied from an original dataset covering the geography Québec. The uncertainty has been adjusted accordingly.

## Included activities start
This activity starts with the raw material delivery at the factory gate.

## Included activities end
This activity ends with the ready for shipping packaged softwood wood cladding at the factory gate.
The dataset includes the raw materials and energy consumption for production, waste generation, estimation of the infrastructure (approximation) and VOC emissions. The colour and acrylic varnish components are directly included since the composition information has been provided by the data provider through Material Safety Data Sheets for these inputs. The included components represent 99.15% of the combined total mass of the colour and acrylic varnish.
The dataset does not include LDPE film as primary packaging (0.09 kg LDPE/m² of cladding) according to ecoinvent guidelines.

## Parameters
- Quebec gross domestic product 2011: 3.11e11 USD(2011); name quebecGDP2011; lognormal variance with pedigree 0.0006, pedigree (1,1,1,1,1)
  Quebec Gross domestic product for 2011, expressed in 2011 USD. Source: Institut de la statistique du Québec. Converted from CAD to USD using a yearly average exchange rate of 0.989 CAD/USD (Source: bank of Canada)
- quebec production volume: 1.35e6 kg; name PV_Quebec; lognormal variance with pedigree 0.0106, pedigree (4,4,1,1,1)
  Value taken from the ecoinvent v3.0 dataset "wood cladding production, softwood, Québec 2012".
- world gross domestic product 2011: 7e13 USD(2011); name worldGDP2011; lognormal variance with pedigree 0.0006, pedigree (1,1,1,1,1)
  World Gross domestic product for 2011, expressed in 2011 USD. Source: World Bank

## Reference product
- wood cladding, softwood: 1 m2; name RefProd; By-product classification allocatable product; CPC 31600: Builders' joinery and carpentry of wood (including cellular wood panels, assembled parquet panels, shingles an[…]; HS2017 441899: Wood; builders' joinery and carpentry of wood n.e.c. in heading no. 4418, other than of bamboo
  production volume 3.02509e8 m2; name ProdVol; = PV_Quebec*worldGDP2011/quebecGDP2011
    Gross approximation of world production volume using relative value of world GDP to Québec GDP. The Quebec value is estimated with the production volume of an important maker in Quebec in 2013 and its market share.
  property carbon content, fossil 0.00747019; = (acrylicBinder * acrylicBinder_DM * acrylicBinder_fcc + carbonBlack * carbonBlack_DM * carbonBlack_fcc + chlorothalonil * chlorothalonil_DM * chlorothalonil_fcc + diethyleneGlycol * diethyleneGlycol_DM *diethyleneGlycol_fcc + ethyleneGlycol * ethyleneGlycol_DM * ethyleneGlycol_fcc +ethyleneGlycolMonoethylEther * ethyleneGlycolMonoethylEther_DM * ethyleneGlycolMonoethylEther_fcc + propyleneGlycol * propyleneGlycol_DM * propyleneGlycol_fcc + talc * talc_DM * talc_fcc - VOC * VOC_DM * VOC_fcc - wastePaint * wastePaint_DM * wastePaint_fcc)/RefProd_DM
    Calculated with fossil carbon content of carbon black, limestone, ethylene glycol, diethylene glycol, propylene glycol, ethylene glycol monoethyl ether, chlorothalonil and acrylic binder inputs, which compose stains applied on the product. Fossil carbon content of waste paint and VOC emissions are substracted from this amount.
  property carbon content, non-fossil 0.494
    C content of dry mass is 0.494 kgC/kg dry wood (ecoinvent v2.2 report 9).
  property dry mass 6.01883 kg; name RefProd_DM
  property price 8.83547 EUR2005
    Calculated based on inputs: The price of the product has been calculated as a sum of the values of the material and energy inputs for this product. This value is therefore a rough estimation. It may underestimate the real price since there are additional expenses when producing any product. These expences can include for example labour costs, treatment of waste materials and profit for the producer. Please consider carefully whether this level of data quality is acceptable for your application.
  property water content 0.15; name RefProd_WC
  property water in wet mass 0.902825 kg; name RefProd_WWM; = RefProd_WM-RefProd_DM
  property wet mass 6.92166 kg; name RefProd_WM; = RefProd_DM*(1+RefProd_WC)
  properties: allocation factor 0.960579, carbon allocation 3.01826 kg, carbon content 0.50147, true value 8.83547

## Inputs from technosphere
- acrylic binder, with water, in 54% solution state: 0.0256872, 0.121941 kg (2 suppliers, which the file names only by identifier); sum of these 0.147628 kg; lognormal variance with pedigree 0.1306, pedigree (5,5,5,5,4)
  Proxy. Calculated amount from reported measured amounts of acrylic varnish and since acrylic binder does not appear in the composition information from the Material Safety Data Sheets provided for the varnishes by the data providing wood cladding manufacturing company, the amount of acrylic binder, without water, in 34% solution state indicated in the ecoinvent v3.0 data "acrylic varnish, without water, in 87.5% solution state, GLO 2001" was used combined with the varnish solution concentration indicated (87.5%), giving 0.5 kg/kg acrylic varnish, without water x 87.5% = 0.4375 kg acrylic binder/kg acrylic varnish solution.
  properties: carbon content, fossil 0.643752, dry mass 0.54 kg, heating value, net 18.18 MJ, water content 0.851852, wet mass 1 kg
  note on carbon content, fossil: The carbon content was calculated from the carbon content of the inputs.
- aluminium hydroxide: 0.00352229 kg; lognormal variance with pedigree 0.0146, pedigree (3,4,4,5,1)
  Proxy.
  Calculated amount from reported measured amounts of colour and acrylic varnish and composition information from the Material Safety Data Sheets provided for these by the data providing wood cladding manufacturing company (the average value was used as default when the component content was given in the form of a range of values), giving 0,002914659 kg of Al(OH)3/m2 of wood cladding.
  Measured amount given by data providing wood cladding manufacturing company, reported as polyaluminium chloride used in cleaning water treatment. According to the Material Safety Data Sheet provided, the product contains 15-40% polyaluminium choride with CAS 39290-78-3, whose formula, from http://chem.sis.nlm.nih.gov/chemidplus/rn/39290-78-3, is AlClHO5S with MW = 175.504 which gives 26.982/175.504 = 15.374% Al. According to http://en.wikipedia.org/wiki/Polyaluminium_chloride, aluminium hydroxide Al(OH)3 MW = 78.0027 which gives 26.982/78.0027 = 34.591% Al, can be used as raw material to produce polyaluminium chlorides.
  Since there is no exact dataset for this intermediary product, it was modelled as the corresponding amount of aluminium from Al(OH)3, giving 0,000752177 kg Al(OH)3/m2 of wood cladding.
  properties: dry mass 1 kg, wet mass 1 kg
- carbon black: 0.00076701 kg; name carbonBlack; lognormal variance with pedigree 0.0146, pedigree (3,4,4,5,1)
  Proxy. Calculated amount from reported measured amounts of colour and acrylic varnish and composition information from the Material Safety Data Sheets provided for these by the data providing wood cladding manufacturing company (the average value was used as default when the component content was given in the form of a range of values), giving 0,000798487 kg of carbon black/m2 of wood cladding.
  property carbon content, fossil 0.85; name carbonBlack_fcc
  property dry mass 1 kg; name carbonBlack_DM
  properties: heating value, net 25.76 MJ, wet mass 1 kg
- chlorothalonil: 0.00141335 kg; lognormal variance with pedigree 0.0146, pedigree (3,4,4,5,1)
  Proxy. Calculated amount from reported measured amounts of colour and acrylic varnish and composition information from the Material Safety Data Sheets provided for these by the data providing wood cladding manufacturing company (the average value was used as default when the component content was given in the form of a range of values).
  property carbon content, fossil 0.360902; name chlorothalonil_fcc
  property dry mass 1 kg; name chlorothalonil_DM
  properties: wet mass 1 kg
- clay: 0.00225722, 3.46476e-7 kg (2 suppliers, which the file names only by identifier); sum of these 0.00225756 kg; lognormal variance with pedigree 0.0146, pedigree (3,4,4,5,1)
  (same comment as for chlorothalonil)
  properties: dry mass 0.965 kg, water content 0.0362694, wet mass 1 kg
- diesel, burned in building machine: 0.596927 MJ; name diesel; = diesel_fuel_input_in_liter * diesel_density * diesel_Net_Heat_Value*42.8; lognormal variance with pedigree 0.008, pedigree (1,1,4,1,1)
  Calculated values, see Exchange Properties.
  Uncertainty: Calculated variable. Uncertainty will be determined from propagation of uncertainty factors of underlying variables.
  property density 0.84 kg/l; name diesel_density
  property heating value, net 1 MJ; name diesel_Net_Heat_Value
  property literFuel_Input 0.0172848 l; name diesel_fuel_input_in_liter
  note on density: Density value. Value Taken from Table 5.1 of report "Overview and methodology, Data quality guideline for the ecoinvent database version 3" (ecoinvent report No. 1 (v3), 2011)
  note on heating value, net: Net (lower) heating (calorific) value. Value Taken from Table 5.1 of report "Overview and methodology, Data quality guideline for the ecoinvent database version 3" (ecoinvent report No. 1 (v3), 2011)
  note on literFuel_Input: Measured value given by data providing wood cladding manufacturing company.
- diethylene glycol: 8.08957e-5, 0.00133781 kg (2 suppliers, which the file names only by identifier); sum of these 0.00141871 kg; lognormal variance with pedigree 0.0146, pedigree (3,4,4,5,1)
  (same comment as for chlorothalonil)
  properties: carbon content, fossil 0.45283, dry mass 1 kg, heating value, net 25.14 MJ, wet mass 1 kg
- electricity, medium voltage: 0.0620335, 1.23743, 0.0309774, 0.0189968, 0.267859, 0.00380219, 0.000816415, 0.0864059, 0.127784, 0.367272 kWh (10 suppliers, which the file names only by identifier); sum of these 2.20338 kWh; lognormal variance with pedigree 0.0126, pedigree (1,4,4,5,1)
  Measured value given by data providing wood cladding manufacturing company.
  EcoSpold01Location=UCTE
- epoxy resin, liquid: 0.0020766, 0.000437443 kg (2 suppliers, which the file names only by identifier); sum of these 0.00251404 kg; lognormal variance with pedigree 0.0126, pedigree (1,4,4,5,1)
  Proxy. Measured value given by data providing wood cladding manufacturing company, reported as Quickwood(R) epoxy resin containing tri (dimethylaminomethyl) phenol.
  properties: carbon content, fossil 0.42325, dry mass 1 kg, heating value, net 12.82 MJ, wet mass 1 kg
- ethylene glycol: 0.00030651, 0.0050689 kg (2 suppliers, which the file names only by identifier); sum of these 0.00537541 kg; lognormal variance with pedigree 0.0146, pedigree (3,4,4,5,1)
  (same comment as for chlorothalonil)
  properties: carbon content, fossil 0.387097, dry mass 1 kg, heating value, net 23.44 MJ, wet mass 1 kg
- ethylene glycol monoethyl ether: 0.00641375, 0.00316748 kg (2 suppliers, which the file names only by identifier); sum of these 0.00958123 kg; lognormal variance with pedigree 0.0146, pedigree (3,4,4,5,1)
  Proxy. Reported as ethylene glycol monobutyl ether.
  Calculated amount from reported measured amounts of colour and acrylic varnish and composition information from the Material Safety Data Sheets provided for these by the data providing wood cladding manufacturing company (the average value was used as default when the component content was given in the form of a range of values).
  properties: carbon content, fossil 0.610169, dry mass 1 kg, heating value, net 29.6 MJ, wet mass 1 kg
- feldspar: 0.00136875 kg; lognormal variance with pedigree 0.0146, pedigree (3,4,4,5,1)
  Proxy. Reported as nepheline syenite (according to http://en.wikipedia.org/wiki/Nepheline_syenite, a holocrystalline plutonic rock that consists largely of nepheline and alkali feldspar).
  Calculated amount from reported measured amounts of colour and acrylic varnish and composition information from the Material Safety Data Sheets provided for these by the data providing wood cladding manufacturing company (the average value was used as default when the component content was given in the form of a range of values).
  properties: dry mass 1 kg, wet mass 1 kg
- heat, district or industrial, other than natural gas: 3.44007, 0.0878894 MJ (2 suppliers, which the file names only by identifier); sum of these 3.52796 MJ; = heatLFO_fuel_input_in_liter * heatLFO_density * heatLFO_Net_Heat_Value*42.7 / heatLFO_fuel_use; lognormal variance with pedigree 0.008, pedigree (1,1,4,1,1)
  (same comment as for diesel, burned in building machine)
  properties: Corresponding fuel use 1.0526 MJ, density 0.84 kg/l, heating value, net 1 MJ, literFuel_Input 0.107782 l
  note on Corresponding fuel use: Lower heating value of the fuel input related to the heat/electricity output. Assume a 95% energy efficiency based on Section 4.3.6 of report "Life cycle Inventories of Energy Systems, Results for Current Systems in Switzerland and other UCTE Countries" (ecoinvent report No. 5, 2007)
- kaolin: 0.00821248 kg; lognormal variance with pedigree 0.0146, pedigree (3,4,4,5,1)
  Proxy. Reported as hydrous kaolin clay.
  Calculated amount from reported measured amounts of colour and acrylic varnish and composition information from the Material Safety Data Sheets provided for these by the data providing wood cladding manufacturing company (the average value was used as default when the component content was given in the form of a range of values).
  properties: dry mass 1 kg, wet mass 1 kg
- limestone, crushed, washed: 0.00559969, 4.77462e-5 kg (2 suppliers, which the file names only by identifier); sum of these 0.00564744 kg; lognormal variance with pedigree 0.0146, pedigree (3,4,4,5,1)
  Proxy. Reported as talc.
  Calculated amount from reported measured amounts of colour and acrylic varnish and composition information from the Material Safety Data Sheets provided for these by the data providing wood cladding manufacturing company (the average value was used as default when the component content was given in the form of a range of values), giving 0,005879201 kg of talc/m2 of wood cladding.
  properties: carbon content, fossil 0.117257, dry mass 0.998 kg, water content 0.00200401, wet mass 1 kg
  note on carbon content, fossil: Table 3.1, ecoinvent v2.2 report 7, part VII, pg 3. MW CaCO3=100, MW MgCO3=84. C content of limestone is 0.117257 kg/kg DM
- lubricating oil: 8.27905e-5, 0.000393017 kg (2 suppliers, which the file names only by identifier); sum of these 0.000475808 kg; lognormal variance with pedigree 0.0126, pedigree (1,4,4,5,1)
  Measured value given by data providing wood cladding manufacturing company.
  properties: carbon content, fossil 0.75, dry mass 1 kg, heating value, net 40.2 MJ, wet mass 1 kg
  note on carbon content, fossil: Lubricating oil is produced from diesel. C-content/dry mass of fats and oils considered 75%, from: ecoinvent v2.2 report, n 15a, pg 40
  note on heating value, net: Literature value, Source: IPCC 2006, 2006 IPCC Guidelines for National Greenhouse Gas Inventories, Prepared by the National Greenhouse Gas Inventories Programme, Eggleston H.S., Buendia L., Miwa K., Ngara T. and Tanabe K. (eds). Published: IGES, Japan
- propylene glycol, liquid: 0.00025258, 0.000511442 kg (2 suppliers, which the file names only by identifier); sum of these 0.000764022 kg; lognormal variance with pedigree 0.0146, pedigree (3,4,4,5,1)
  (same comment as for chlorothalonil)
  properties: carbon content, fossil 0.473684, dry mass 1 kg, heating value, net 27.09 MJ, wet mass 1 kg
- sawnwood, softwood, dried (u=10%), planed: 0.00783625, 0.0150803 m3 (2 suppliers, which the file names only by identifier); sum of these 0.0229166 m3; lognormal variance with pedigree 0.0126, pedigree (1,4,4,5,1)
  Calculated value with the total mass of wood outputs.
  properties: carbon content, non-fossil 0.494, dry mass 428.533 kg, heating value, net 6625.26 MJ, water content 0.15, wet mass 492.813 kg
- silica sand: 0.00627748 kg; name silica; lognormal variance with pedigree 0.0146, pedigree (3,4,4,5,1)
  Proxy. Reported as amorphous silica; silica gel, pptd., cristal free; and quartz.
  Calculated amount from reported measured amounts of colour and acrylic varnish and composition information from the Material Safety Data Sheets provided for these by the data providing wood cladding manufacturing company (the average value was used as default when the component content was given in the form of a range of values).
  property water in wet mass 0.01 kg; name silica_WWM
  properties: dry mass 0.99 kg, water content 0.010101, wet mass 1 kg
- sodium hydroxide, without water, in 50% solution state: 5.14776e-5, 0.000527172 kg (2 suppliers, which the file names only by identifier); sum of these 0.00057865 kg; lognormal variance with pedigree 0.0126, pedigree (1,4,4,5,1)
  Measured value given by data providing wood cladding manufacturing company, reported as used for cleaning water treatment.
  properties: dry mass 1 kg, heating value, net 3.03 MJ, wet mass 1 kg
- tap water: 0.0026452, 0.00403239, 0.00752424, 0.0202698, 0.101681, 1.16359, 0.868879 kg (7 suppliers, which the file names only by identifier); sum of these 2.16862 kg; lognormal variance with pedigree 0.0126, pedigree (1,4,4,5,1)
  Measured value given by data providing wood cladding manufacturing company.
  properties: carbon content, fossil 0.00178991, dry mass 0.000337476 kg, water content 2962.17, wet mass 1 kg
  note on carbon content, fossil: Bicarbonate content is 2.93 mol/m3. CO2 content is 0.1 mol/m3 (ecoinvent v2.2 report 8, Tab 93.1).
- titanium dioxide: 0.0246431, 0.0123216 kg (2 suppliers, which the file names only by identifier); sum of these 0.0369647 kg; lognormal variance with pedigree 0.0146, pedigree (3,4,4,5,1)
  (same comment as for chlorothalonil)
  properties: dry mass 1 kg, wet mass 1 kg
- waste paint: -7.77337e-6, -6.40334e-5, -2.95328e-8 kg (3 suppliers, which the file names only by identifier); sum of these -7.18363e-5 kg; lognormal variance with pedigree 0.0046, pedigree (1,4,1,5,1)
  Measured value given by data providing wood cladding manufacturing company, reported as "paint sludge".
  production volume; = ProdVol*WastePaint/RefProd
    Calculated from production volume of reference product using the relative outputs.
  properties: carbon content, fossil 0.65, dry mass 1 kg, heating value, net 19.7 MJ, wet mass 1 kg
- wastewater, average: -9.38408e-6, -0.00156155, -0.000373399 m3 (3 suppliers, which the file names only by identifier); sum of these -0.00194434 m3; lognormal variance with pedigree 0.0046, pedigree (1,4,1,5,1)
  Measured value given by data providing wood cladding manufacturing company.
  production volume; = ProdVol*Wastewater/RefProd
    Calculated from production volume of reference product using the relative outputs.
  properties: carbon content, non-fossil 0.194039, dry mass 0.346837 kg, water content 2882.2, wet mass 1000 kg
  note on carbon content, non-fossil: 0.0673 kg TOC/m3 (Tab A.17, ecoinvent v2.2 report 13_I). TOC was considered as Total Carbon.
- water, deionised: 0.00082879, 2.98344e-6, 0.00269051 kg (3 suppliers, which the file names only by identifier); sum of these 0.00352229 kg; lognormal variance with pedigree 0.1306, pedigree (5,5,5,5,4)
  Proxy. Calculated amount from reported measured amounts of colour and acrylic varnish and composition information from the Material Safety Data Sheets provided for these by the data providing wood cladding manufacturing company, water was assumed to make up the remainder of the colour and acrylic varnish mass once the other components have been quantified.
  properties: wet mass 1 kg
- wooden board factory, organic bonded boards: 1.10467e-10 unit; lognormal variance with pedigree 0.51, pedigree (5,5,5,5,5)
  Estimated value.
  Uncertainty: No data were collected, the uncerrtainty has then been maximized.

## Inputs from nature
- Carbon dioxide, non-fossil, resource correction [natural resource, in air]: -7.8005 kg

## Emissions to nature
- NMVOC, non-methane volatile organic compounds [air, unspecified]: 0.0220566 kg; name VOC; lognormal variance with pedigree 0.052, pedigree (1,4,4,5,1)
  Measured value given by data providing wood cladding manufacturing company.
  property carbon content, fossil 0.854049; name VOC_fcc
  property dry mass 1 kg; name VOC_DM
- Water [air, unspecified]: 9.30071e-5 m3; = ((sawnwood*sawnwood_WWM+tap*tap_WWM+talc*talc_WWM+silica*silica_WWM+clay*clay_WWM+deionised*deionised_WWM)-(RefProd*RefProd_WWM+Chips*Chips_WWM+SawDust*SawDust_WWM+Wastewater*Wastewater_WWM))/water_WWM; lognormal variance with pedigree 0.008, pedigree (1,1,4,1,1)
  Calculated value based on water balance, all water not accounted for in the outputs is assumed to be evaporated.
  Uncertainty: Calculated variable. Uncertainty will be determined from propagation of uncertainty factors of underlying variables.
  property water in wet mass 1000 kg; name water_WWM

## Sampling procedure
Data based on questionnaire from one manufacturing company, except for the infrastructure which is based on standard assumptions on plant lifetime and annual production volume.

## Extrapolations
Composition data for the colour and acrylic varnish were provided for 90% of the colour and 98.5% of the acrylic varnish total mass, these were then extrapolated, i.e. scaled-up, to the total mass.
This dataset has been copied from an original dataset covering the geography Québec. The uncertainty has been adjusted accordingly.
