# fertilising, by broadcaster

Dataset: EcoSpold 2, unit process
Geography: US
Time period: 2021-01-01 to 2023-12-31
Technology level: current
Classification: ISIC rev.4 ecoinvent: 0161:Support activities for crop production
Scenario: Business-as-Usual
System model: Allocation, cut-off by classification
Generated by: Juanita Barrera
Database: ecoinvent
isCopyrightProtected: true
accessRestrictedTo: 1

## General comment
This dataset represents the service of loading 1 kg of solid manure with hydraulic loader (power take-off driven) from dung slab on manure spreader and spreading the manure onto field with the manure spreader. Working load 5 t (5.8 m3, dry matter content 22%), solid manure production and any emission from manure are not included.

## Included activities start
The activity starts from preliminary work at farm, like attaching the adequate machinery to the tractor.

## Included activities end
This activity ends with transfer back to farm and concluding work, like uncoupling the machine. The dataset includes broadcasting solid mineral fertilizer or applying liquid mineral fertilizer over 1 ha of field, including field turning, idling and overlapping. The inventory takes into account the diesel fuel consumption and the amount of agricultural machinery and of the shed, which has to be attributed to the fertilizing. Also taken into consideration is the amount of emissions to the air from combustion and the emission to the soil from tyre abrasion during the work process. The amount of applied fertilizer is not taken into account, nor dust other than from combustion and noise.

## Geography
The inventory is extrapolated from the geography of Quebec, Canada. Data quality indicators are adjusted accordingly.

## Technology
Fuel consumption and emissions per kg diesel have been extrapolated to the US, but others inputs were taken from the original values.

## Reference product
- fertilising, by broadcaster: 1 ha; By-product classification allocatable product; CPC 86119: Other support services to crop production
  production volume 6.36347e8 ha
    FAOSTAT data source for the year 2020: 2 applications per year assumed in the area of arable land and permanent crops. (own estimation)
  property price 11.7936 EUR2005
    The price is from the year 2023. The price is estimated as a proxy based on the source: https://ag.purdue.edu/commercialag/home/resource/2023/03/indiana-farm-custom-rates/. The prices were adjusted for inflation relative to 2005 using the producer price index (PPI) of the euro area, published by eurostat (https://ec.europa.eu/eurostat/databrowser/view/STS_INPP_A__custom_6416181/default/table?lang=en, last accessed on 2023-06-01).
  properties: carbon allocation 0 kg, carbon content 0

## Inputs from technosphere
- agricultural machinery, unspecified: 0.241 kg; lognormal variance with pedigree 0.3042, pedigree (1,4,2,5,1)
  proxy from "fertilising, by broadcaster, CA-QC"
- diesel: 1.77726 kg; lognormal variance with pedigree 0.0028, pedigree (1,4,2,1,1)
  Helsel, 2007 Fuel Requirements and Energy Savings Tips for Field Operations, The State University of New Jersey Available at: https://njaes.rutgers.edu/pubs/publication.php?pid=FS1068
  properties: carbon content, fossil 0.865, dry mass 1 kg, heating value, net 42.8 MJ, wet mass 1 kg
- shed: 0.00171 m2; lognormal variance with pedigree 0.3042, pedigree (1,4,2,5,1)
  proxy from "fertilising, by broadcaster, CA-QC"
- tractor, 4-wheel, agricultural: 0.687 kg; lognormal variance with pedigree 0.3042, pedigree (1,4,2,5,1)
  proxy from "fertilising, by broadcaster, CA-QC"

## Emissions to nature
- Ammonia [air, non-urban air or from high stacks]: 3.56124e-5 kg; lognormal variance with pedigree 0.058325, pedigree (1,2,2,2,3)
  adapted from "fertilising, by broadcaster, CA-QC" to match the diesel consumption
- Benzene [air, non-urban air or from high stacks]: 1.29683e-5 kg; lognormal variance with pedigree 0.058325, pedigree (1,2,2,2,3)
  adapted from "fertilising, by broadcaster, CA-QC" to match the diesel consumption
- Benzo(a)pyrene [air, non-urban air or from high stacks]: 5.34186e-8 kg; lognormal variance with pedigree 0.658325, pedigree (1,2,2,2,3)
  adapted from "fertilising, by broadcaster, CA-QC" to match the diesel consumption
- Cadmium II [air, non-urban air or from high stacks]: 1.77726e-8 kg; lognormal variance with pedigree 0.658325, pedigree (1,2,2,2,3)
  adapted from "fertilising, by broadcaster, CA-QC" to match the diesel consumption
- Carbon dioxide, fossil [air, non-urban air or from high stacks]: 5.54344 kg; lognormal variance with pedigree 0.018325, pedigree (1,2,2,2,3)
  adapted from "fertilising, by broadcaster, CA-QC" to match the diesel consumption
- Carbon monoxide, fossil [air, non-urban air or from high stacks]: 0.00705529 kg; lognormal variance with pedigree 0.652225, pedigree (1,4,2,2,1)
  adapted from "fertilising, by broadcaster, CA-QC" to match the diesel consumption
- Chromium III [air, non-urban air or from high stacks]: 8.9031e-8 kg; lognormal variance with pedigree 0.658325, pedigree (1,2,2,2,3)
  adapted from "fertilising, by broadcaster, CA-QC" to match the diesel consumption
- Copper ion [air, non-urban air or from high stacks]: 3.02369e-6 kg; lognormal variance with pedigree 0.658325, pedigree (1,2,2,2,3)
  adapted from "fertilising, by broadcaster, CA-QC" to match the diesel consumption
- Dinitrogen monoxide [air, non-urban air or from high stacks]: 0.000213338 kg; lognormal variance with pedigree 0.058325, pedigree (1,2,2,2,3)
  adapted from "fertilising, by broadcaster, CA-QC" to match the diesel consumption
- Methane, fossil [air, non-urban air or from high stacks]: 0.000229465 kg; lognormal variance with pedigree 0.058325, pedigree (1,2,2,2,3)
  adapted from "fertilising, by broadcaster, CA-QC" to match the diesel consumption
- NMVOC, non-methane volatile organic compounds [air, non-urban air or from high stacks]: 0.00480431 kg; lognormal variance with pedigree 0.042225, pedigree (1,4,2,2,1)
  adapted from "fertilising, by broadcaster, CA-QC" to match the diesel consumption
- Nickel II [air, non-urban air or from high stacks]: 1.24307e-7 kg; lognormal variance with pedigree 0.658325, pedigree (1,2,2,2,3)
  adapted from "fertilising, by broadcaster, CA-QC" to match the diesel consumption
- Nitrogen oxides [air, non-urban air or from high stacks]: 0.0776081 kg; lognormal variance with pedigree 0.042225, pedigree (1,4,2,2,1)
  adapted from "fertilising, by broadcaster, CA-QC" to match the diesel consumption
- PAH, polycyclic aromatic hydrocarbons [air, non-urban air or from high stacks]: 5.84581e-6 kg; lognormal variance with pedigree 0.318325, pedigree (1,2,2,2,3)
  adapted from "fertilising, by broadcaster, CA-QC" to match the diesel consumption
- Particulate Matter, < 2.5 um [air, non-urban air or from high stacks]: 0.00698809 kg; lognormal variance with pedigree 0.318325, pedigree (1,2,2,2,3)
  adapted from "fertilising, by broadcaster, CA-QC" to match the diesel consumption
- Selenium IV [air, non-urban air or from high stacks]: 1.77726e-8 kg; lognormal variance with pedigree 0.058325, pedigree (1,2,2,2,3)
  adapted from "fertilising, by broadcaster, CA-QC" to match the diesel consumption
- Sulfur dioxide [air, non-urban air or from high stacks]: 0.0017907 kg; lognormal variance with pedigree 0.018325, pedigree (1,2,2,2,3)
  adapted from "fertilising, by broadcaster, CA-QC" to match the diesel consumption
- Zinc II [air, non-urban air or from high stacks]: 1.77726e-6 kg; lognormal variance with pedigree 0.658325, pedigree (1,2,2,2,3)
  adapted from "fertilising, by broadcaster, CA-QC" to match the diesel consumption
- Cadmium II [soil, agricultural]: 3.4e-7 kg; lognormal variance with pedigree 0.0442, pedigree (1,4,2,5,1)
  proxy from "fertilising, by broadcaster, CA-QC"
- Lead II [soil, agricultural]: 1.49e-6 kg; lognormal variance with pedigree 0.0442, pedigree (1,4,2,5,1)
  proxy from "fertilising, by broadcaster, CA-QC"
- Zinc II [soil, agricultural]: 0.000897 kg; lognormal variance with pedigree 0.0442, pedigree (1,4,2,5,1)
  proxy from "fertilising, by broadcaster, CA-QC"

## Extrapolations
The dataset is modeled for agricultural production system in US. Data Quality indicators are adjusted accordingly.
