# sulfate pulp production, from softwood, unbleached

Dataset: EcoSpold 2, unit process
Geography: RLA
Time period: 2020-01-01 to 2023-12-31
Technology level: current
Classification: ISIC rev.4 ecoinvent: 1701:Manufacture of pulp, paper and paperboard
Synonyms: kraft pulp; Kraftzellstoff
Scenario: Business-as-Usual
System model: Allocation, cut-off by classification
Share of production covered: 82 %
Generated by: AISBL
Database: ecoinvent
isCopyrightProtected: true
accessRestrictedTo: 1

## General comment
This dataset represents the Latin American production of unbleached kraft pulp, obtained from softwood for the year 2020. Industry data was used which was provided by the European Pulp Industry Sector Association AISBL (EPIS). The data represents a weighted average of the participating mills located in Latin America. The represented technology is considered state of the art for a Latin American average.
PULP is a wood-based raw material to make different paper, board and other products. The pulp, or fibers from the wood are separated in a kraft cooking process in a so-called fiber line. In a recovery line, the chemicals used in the cooking process are recovered to be used again and energy is produced. The third process is effluent treatment where gaseous and liquid discharges to the environment are continuously minimized and monitored.
MAIN END USES FOR MARKET PULP • Tissue (toilet paper) • Graphic papers • Specialty products • Packaging • Fluff pulp • Viscose • CMC etc.
PRODUCTS GENERATED IN THE PULPING PROCESS include electricity
CAPACITIES Global production of unbleached kraft pulp was 36 million tonnes in 2021, of which around 2.3 million was dried, baled and sold to market.
SPECIES Softwood pulp is made from coniferous trees, most typically from different species of pine and spruce. Hardwood pulp is made from non-coniferous trees, in Nordic countries primarily of birch. Eucalyptus hardwood pulp is made exclusively of eucalyptus species.
CHARACTERISTICS Softwood fibers are long and slender and are used to give the paper and board products their strength properties. Hardwood fibers are short and can be rounder and their number per gram of pulp is much larger; they give the end product its smoothness, softness and optical properties like opacity (that you cannot see through the paper).

## Included activities start
This activity starts with the transport of pulpwood to the pulp factory. The pulpwood input has an activity links to the supplying activities and is therefore not supplied via market dataset

## Included activities end
The process includes transports to the pulp mill, wood handling, chemical pulping, and drying process, energy production on-site, recovery cycles of chemicals and internal waste water treatment. The following air emissions were reported in the study: CO2 (fossil and biogenic), SO2 (reported as S) and NOx. Next to these key emissions, additional emissions from on-site energy production from external and internal fuels were calculated, using emission profiles from ecoinvent combustion processes. Internal biogenic fuels are represented by the calculated emissions but do not have the corresponding fuel input from technosphere, because they are supplied from within the system boundaries. The amounts of internal fuels used in the process are: Black liquor(1.85E+04MJ/t) and bark (4.35E+03MJ/t). Black liquor was not included in the emissions calculations because no specific emission profiles, e.g., for the black liquor recovery process, were available. Emissions from these internal energy generation processes are therefore only reflected in the key emission factors provided by the industry, other emissions constitute a data gap. The activity ends when the kraft pulp is ready to be sold.

## Geography
Data is coming from mills in Latin America.

## Technology
Average Latin American technology in 2020 of kraft pulp production of unbleached pulp

## Time period
Data gathered in 2021 and represents data of 2020 values. Recent technology valid for the upcoming years.

## Reference product
- electricity, high voltage: 1 kWh; name a_electricity; By-product classification allocatable product; CPC 17100: Electrical energy; HS2017 271600: Electrical energy
  Data provided by industry (EPIS) 2020. Represents electricity sold.
  production volume 7.85433e7 kWh; = APV_RP*a_electricity
    Calculated from production volume of reference product using the relative outputs.
  property price 0.0977 EUR2005
    Temporary price data. Calculated as 90% of purchasers price based on: 94% of the average price (to account for a 6% loss in transformation and transmission) for electricity for industrial consumersin 2005 (excluded taxes). From IEA.
  property true value relation 3.6; name a_electricity_true_value_relation
    property to calculate "true value" from
  properties: allocation factor 0.0406609, carbon allocation 0 kg, carbon content 0, exergy 3.6 MJ, true value 0.370046

## Inputs from technosphere
- calcium carbonate, precipitated: 0.00404036 kg; lognormal variance with pedigree 0.0009, pedigree (1,2,2,1,1)
  Data provided by industry (EPIS) 2020. Represents Make-up limestone (CaCO3)
  properties: carbon content, fossil 0.120005, dry mass 1 kg, wet mass 1 kg
- electricity, high voltage: 0.00212636 kWh; lognormal variance with pedigree 0.0009, pedigree (1,2,2,1,1)
  Data provided by industry (EPIS) 2020. Represents Grid supply.
- green liquor dregs: -0.00527083 kg; name a_green_liquor_dregs; lognormal variance with pedigree 0.0007, pedigree (1,2,1,1,1)
  Data provided by industry (EPIS) 2020
  production volume; = APV_RP* a_green_liquor_dregs
    Calculated from production volume of reference product using the relative outputs.
  properties: carbon content, non-fossil 0.390667, dry mass 0.75 kg, water content 0.333333, wet mass 1 kg
- heavy fuel oil: 0.00218822, 0.00127423, 0.00839964 kg (3 suppliers, which the file names only by identifier); sum of these 0.0118621 kg; lognormal variance with pedigree 0.0095, pedigree (2,2,2,1,3)
  Data provided by industry (EPIS) 2020, indicated in energy content and given as 1.85 MJ/kg . Calculation into mass/volume was done by using the following conversion factor: Heavy fuel oil: MJ/kg 41.2. Based on literature, page 21, Report6, part 4. Source: https://ecoinvent.org/wp-content/uploads/2021/09/LHV_fuels.xlsx
  properties: carbon content, fossil 0.849, dry mass 1 kg, heating value, net 41.2 MJ, wet mass 1 kg
- hydrogen peroxide, without water, in 50% solution state: 0.00108862 kg; lognormal variance with pedigree 0.0009, pedigree (1,2,2,1,1)
  Data provided by industry (EPIS) 2020
  properties: dry mass 1 kg, heating value, net 7.13 MJ, wet mass 1 kg
- limestone residue: -0.0103957 kg; name a_limestone_residues; lognormal variance with pedigree 0.0007, pedigree (1,2,1,1,1)
  Data provided by industry (EPIS) 2020; including ash and lime mud
  production volume; = APV_RP* a_limestone_residues
    Calculated from production volume of reference product using the relative outputs.
  properties: carbon content, fossil 0.0468753, dry mass 0.995 kg, water content 0.00502513, wet mass 1 kg
  note on carbon content, fossil: Calculated based on the carbon content of the input “calcium carbonate, precipitated”
- pulp factory: 1.26387e-11 unit; lognormal variance with pedigree 0.3023, pedigree (3,2,2,1,1)
  Own estimation with yearly production volume and a lifetime of a factory of 50 years; activityLink introduced to establish a direct link to the corresponding regional supply of this product
- pulpwood, softwood, measured as solid wood under bark: 0.00110974 m3; lognormal variance with pedigree 0.0029, pedigree (3,2,2,1,1)
  This value represents a calculated value, i.e., it is not based on EPIS (2020) data. There was found to be an imbalance in carbon and therefore this value had to be recalculated to close the balance. The original amounts reported by EPIS (2020) is pine 2.268 (kg dry/kg). “softwood forestry, pine, sustainable forest management, GLO, 2010 – 2012” is used as a Proxy to represent pulpwood production in RLA.
  properties: basic wood density 387.2, carbon content, non-fossil 0.494, dry mass 490 kg, heating value, net 4483.78 MJ, water content 0.8, wet mass 882 kg
  note on heating value, net: Value based on "softwood forestry, mixed species, sustainable forest management"The property is based on a value of 11.58MJ/kg
- sludge from pulp and paper production: -0.00381416 kg; name a_sludge; lognormal variance with pedigree 0.0007, pedigree (1,2,1,1,1)
  Data provided by industry (EPIS) 2020. Reported as biological treatment sludge
  production volume; = APV_RP* a_sludge
    Calculated from production volume of reference product using the relative outputs.
  properties: carbon content, non-fossil 0.21, dry mass 0.75 kg, heating value, net 2.65 MJ, water content 0.333333, wet mass 1 kg
- sodium hydroxide, without water, in 50% solution state: 0.000495754 kg; lognormal variance with pedigree 0.0009, pedigree (1,2,2,1,1)
  Data provided by industry (EPIS) 2020
  properties: dry mass 1 kg, heating value, net 3.03 MJ, wet mass 1 kg
- sulfuric acid: 0.00314639 kg; lognormal variance with pedigree 0.0009, pedigree (1,2,2,1,1)
  Data provided by industry (EPIS) 2020
  properties: dry mass 1 kg, wet mass 1 kg
- transport, freight train: 0.0734091 metric ton*km; lognormal variance with pedigree 0.0009, pedigree (1,2,2,1,1)
  Data provided by industry (EPIS) 2020, Represents transport of pulpwood
- transport, freight, lorry >32 metric ton, EURO5: 0.0734091 metric ton*km; lognormal variance with pedigree 0.0009, pedigree (1,2,2,1,1)
  Data provided by industry (EPIS) 2020. Represents transport of pulpwood
- waste wood, untreated: -0.000286685, -0.000121648, -0.0023089 kg (3 suppliers, which the file names only by identifier); sum of these -0.00271723 kg; lognormal variance with pedigree 0.0007, pedigree (1,2,1,1,1)
  represents bark and wood waste
  production volume; = APV_RP* a_wood_waste
    Calculated from production volume of reference product using the relative outputs.
  properties: carbon content, non-fossil 0.48632, dry mass 0.8 kg, heating value, net 13.99 MJ, water content 0.25, wet mass 1 kg

## Inputs from nature
- Oxygen [natural resource, in air]: 0.422019 kg; name O2; = (CO2_fossil+CO2_non_fossil)/(16*2+12) * (16*2) + (CO_fossil)/(16+12) *16; lognormal variance with pedigree 0.0494, pedigree (2,5,2,1,4)
  Oxygen is required for the combustion process. Calculated value
- Water, unspecified natural origin [natural resource, in water]: 0.0129288 m3; lognormal variance with pedigree 0.0009, pedigree (1,2,2,1,1)
  Represents surface water. Data provided by industry (EPIS) 2020

## Emissions to nature
- Acetaldehyde [air, urban air close to ground]: 1.42241e-7 kg; lognormal variance with pedigree 0.1388, pedigree (2,5,2,1,4)
  Estimation based on fuel input data and emission factors from corresponding ecoinvent fuel combustion (see "Extrapolations" comment). Apart from external fuel inputs, internal fuels such as black liquor are generated during the process and supply considerable amounts of process energy. Internal fuels are represented by the calculated emissions but do not have the corresponding fuel input from technosphere, because they are supplied from within the system boundaries. The amounts of internal fuels used in the process are: Black liquor(1.85E+04MJ/t) and bark (4.35E+03MJ/t). Black liquor was not included in the emissions calculations because no specific emission profiles were available. Emissions from this internal energy generation process are therefore only reflected in the key emission factors provided by the industry, other emissions constitute a data gap.
- Acetic acid [air, urban air close to ground]: 2.88967e-7 kg; lognormal variance with pedigree 0.1388, pedigree (2,5,2,1,4)
  (same comment as for Acetaldehyde)
- Acetone [air, urban air close to ground]: 7.22417e-8 kg; lognormal variance with pedigree 0.1388, pedigree (2,5,2,1,4)
  (same comment as for Acetaldehyde)
- Ammonia [air, urban air close to ground]: 1.99003e-6 kg; lognormal variance with pedigree 0.1388, pedigree (2,5,2,1,4)
  (same comment as for Acetaldehyde)
- Arsenic ion [air, urban air close to ground]: 7.40847e-9 kg; lognormal variance with pedigree 0.1388, pedigree (2,5,2,1,4)
  (same comment as for Acetaldehyde)
- Benzene [air, urban air close to ground]: 1.04425e-6 kg; lognormal variance with pedigree 0.1388, pedigree (2,5,2,1,4)
  (same comment as for Acetaldehyde)
- Benzo(a)pyrene [air, urban air close to ground]: 5.87248e-10 kg; lognormal variance with pedigree 0.1388, pedigree (2,5,2,1,4)
  (same comment as for Acetaldehyde)
- Calcium II [air, urban air close to ground]: 6.766e-6 kg; lognormal variance with pedigree 0.3988, pedigree (2,5,2,1,4)
  (same comment as for Acetaldehyde)
- Carbon dioxide, fossil [air, urban air close to ground]: 0.038019 kg; name CO2_fossil; lognormal variance with pedigree 0.0494, pedigree (2,5,2,1,4)
  This value represents a calculated value, i.e., it is not based on EPIS (2020) data. It was calculated based on the fossil fuel input data and emission factors from corresponding ecoinvent fuel combustion datasets (see "Extrapolations" comment).
- Carbon dioxide, non-fossil [air, urban air close to ground]: 0.542255 kg; name CO2_non_fossil; lognormal variance with pedigree 0.0009, pedigree (1,2,2,1,1)
  Key emission provided by industry (EPIS) 2020
- Carbon monoxide, fossil [air, urban air close to ground]: 3.37128e-6 kg; name CO_fossil; lognormal variance with pedigree 0.6988, pedigree (2,5,2,1,4)
  (same comment as for Acetaldehyde)
- Chromium III [air, urban air close to ground]: 6.92817e-9 kg; lognormal variance with pedigree 0.6988, pedigree (2,5,2,1,4)
  (same comment as for Acetaldehyde)
- Chromium VI [air, urban air close to ground]: 6.99816e-11 kg; lognormal variance with pedigree 0.6988, pedigree (2,5,2,1,4)
  (same comment as for Acetaldehyde)
- Cobalt II [air, urban air close to ground]: 1.58932e-8 kg; lognormal variance with pedigree 0.6988, pedigree (2,5,2,1,4)
  (same comment as for Acetaldehyde)
- Copper ion [air, urban air close to ground]: 3.29513e-8 kg; lognormal variance with pedigree 0.6988, pedigree (2,5,2,1,4)
  (same comment as for Acetaldehyde)
- Dinitrogen monoxide [air, urban air close to ground]: 3.0246e-6 kg; lognormal variance with pedigree 0.1388, pedigree (2,5,2,1,4)
  (same comment as for Acetaldehyde)
- Dioxins, measured as 2,3,7,8-tetrachlorodibenzo-p-dioxin [air, urban air close to ground]: 3.579e-14 kg; lognormal variance with pedigree 0.1388, pedigree (2,5,2,1,4)
  (same comment as for Acetaldehyde)
- Ethanol [air, urban air close to ground]: 1.44483e-7 kg; lognormal variance with pedigree 0.1388, pedigree (2,5,2,1,4)
  (same comment as for Acetaldehyde)
- Formaldehyde [air, urban air close to ground]: 3.65903e-7 kg; lognormal variance with pedigree 0.1388, pedigree (2,5,2,1,4)
  (same comment as for Acetaldehyde)
- Hydrocarbons, aliphatic, alkanes, unspecified [air, urban air close to ground]: 1.33321e-6 kg; lognormal variance with pedigree 0.1388, pedigree (2,5,2,1,4)
  (same comment as for Acetaldehyde)
- Hydrocarbons, aliphatic, unsaturated [air, urban air close to ground]: 3.57178e-6 kg; lognormal variance with pedigree 0.1388, pedigree (2,5,2,1,4)
  (same comment as for Acetaldehyde)
- Hydrocarbons, aromatic [air, urban air close to ground]: 7.22417e-8 kg; lognormal variance with pedigree 0.1388, pedigree (2,5,2,1,4)
  (same comment as for Acetaldehyde)
- Hydrochloric acid [air, urban air close to ground]: 6.9352e-7 kg; lognormal variance with pedigree 0.1388, pedigree (2,5,2,1,4)
  (same comment as for Acetaldehyde)
- Hydrogen fluoride [air, urban air close to ground]: 2.31173e-8 kg; lognormal variance with pedigree 0.1388, pedigree (2,5,2,1,4)
  (same comment as for Acetaldehyde)
- Iron ion [air, urban air close to ground]: 3.94921e-7 kg; lognormal variance with pedigree 0.6988, pedigree (2,5,2,1,4)
  (same comment as for Acetaldehyde)
- Lead II [air, urban air close to ground]: 9.85218e-8 kg; lognormal variance with pedigree 0.6988, pedigree (2,5,2,1,4)
  (same comment as for Acetaldehyde)
- Mercury II [air, urban air close to ground]: 4.16499e-10 kg; lognormal variance with pedigree 0.6988, pedigree (2,5,2,1,4)
  (same comment as for Acetaldehyde)
- Methane, fossil [air, urban air close to ground]: 1.44483e-6 kg; lognormal variance with pedigree 0.1388, pedigree (2,5,2,1,4)
  (same comment as for Acetaldehyde)
- Methanol [air, urban air close to ground]: 2.45622e-7 kg; lognormal variance with pedigree 0.1388, pedigree (2,5,2,1,4)
  (same comment as for Acetaldehyde)
- Molybdenum VI [air, urban air close to ground]: 3.85289e-9 kg; lognormal variance with pedigree 0.6988, pedigree (2,5,2,1,4)
  (same comment as for Acetaldehyde)
- Nickel II [air, urban air close to ground]: 2.42875e-7 kg; lognormal variance with pedigree 0.6988, pedigree (2,5,2,1,4)
  (same comment as for Acetaldehyde)
- Nitrogen oxides [air, urban air close to ground]: 0.000611772 kg; lognormal variance with pedigree 0.0403, pedigree (1,2,2,1,1)
  Key emission provided by industry (EPIS) 2020
- PAH, polycyclic aromatic hydrocarbons [air, urban air close to ground]: 1.30169e-8 kg; lognormal variance with pedigree 0.1388, pedigree (2,5,2,1,4)
  (same comment as for Acetaldehyde)
- Particulate Matter, < 2.5 um [air, unspecified]: 5.56842e-5 kg; lognormal variance with pedigree 0.3488, pedigree (2,5,2,1,4)
  (same comment as for Acetaldehyde)
- Particulate Matter, > 10 um [air, urban air close to ground]: 1.15587e-6 kg; lognormal variance with pedigree 0.0888, pedigree (2,5,2,1,4)
  (same comment as for Acetaldehyde)
- Particulate Matter, > 2.5 um and < 10um [air, unspecified]: 3.44675e-6 kg; lognormal variance with pedigree 0.1688, pedigree (2,5,2,1,4)
  (same comment as for Acetaldehyde)
- Propane [air, urban air close to ground]: 1.44483e-8 kg; lognormal variance with pedigree 0.1388, pedigree (2,5,2,1,4)
  (same comment as for Acetaldehyde)
- Selenium IV [air, urban air close to ground]: 5.77933e-9 kg; lognormal variance with pedigree 0.6988, pedigree (2,5,2,1,4)
  (same comment as for Acetaldehyde)
- Sodium I [air, urban air close to ground]: 1.85299e-6 kg; lognormal variance with pedigree 0.6988, pedigree (2,5,2,1,4)
  (same comment as for Acetaldehyde)
- Sulfur dioxide [air, urban air close to ground]: 0.000981482 kg; lognormal variance with pedigree 0.0009, pedigree (1,2,2,1,1)
  Key emission provided by industry (EPIS) 2020. Reported as SO2 (reported as S)
- Toluene [air, urban air close to ground]: 3.58706e-7 kg; lognormal variance with pedigree 0.1388, pedigree (2,5,2,1,4)
  (same comment as for Acetaldehyde)
- Vanadium V [air, urban air close to ground]: 4.81611e-7 kg; lognormal variance with pedigree 0.6988, pedigree (2,5,2,1,4)
  (same comment as for Acetaldehyde)
- Water [air, unspecified]: 0.000164148 m3; lognormal variance with pedigree 0.0428, pedigree (3,3,2,1,1)
  Calculated value. Represents the evaporated water from the combustion process of wood. It is assumed that all hydrogen contained in the wood evaporates as water. The H content of wood is assumed to be 6 %.
- Zinc II [air, urban air close to ground]: 3.70746e-7 kg; lognormal variance with pedigree 0.6988, pedigree (2,5,2,1,4)
  (same comment as for Acetaldehyde)
- BOD5, Biological Oxygen Demand [water, surface water]: 0.00013603 kg; lognormal variance with pedigree 0.0403, pedigree (1,2,2,1,1)
  Data provided by industry (EPIS) 2020
- COD, Chemical Oxygen Demand [water, surface water]: 0.00211685 kg; lognormal variance with pedigree 0.0403, pedigree (1,2,2,1,1)
  Data provided by industry (EPIS) 2020
- DOC, Dissolved Organic Carbon [water, surface water]: 0.000784017 kg; lognormal variance with pedigree 0.0414, pedigree (2,3,2,1,1)
  Calculated as equal to TOC.
- Nitrogen [water, surface water]: 3.04549e-5 kg; lognormal variance with pedigree 0.0403, pedigree (1,2,2,1,1)
  Data provided by industry (EPIS) 2020
- Phosphorus [water, surface water]: 2.26688e-6 kg; lognormal variance with pedigree 0.0403, pedigree (1,2,2,1,1)
  Data provided by industry (EPIS) 2020
- Suspended solids, unspecified [water, surface water]: 0.000177315 kg; lognormal variance with pedigree 0.0403, pedigree (1,2,2,1,1)
  Data provided by industry (EPIS) 2020
- TOC, Total Organic Carbon [water, surface water]: 0.000784017 kg; lognormal variance with pedigree 0.0414, pedigree (2,3,2,1,1)
  Calculated value. COD = 2.7*TOC
- Water [water, unspecified]: 0.0130743 m3; lognormal variance with pedigree 0.0403, pedigree (1,2,2,1,1)
  Data provided by industry (EPIS) 2020. Represents process water (44.64m3/t) and the difference between water input and output (4.33m3/t).

## Sampling procedure
Weighted average of several mills providing 82% of the Latin American capacity of unbleached kraft pulp from softwood.

## Extrapolations
Industry data provided key emission factors for CO2 (biogenic), SO2, and NOx. Additional air emissions resulting from on-site energy production, i.e. the combustion of fuels, were calculated based on industrial heating datasets from the ecoinvent database. The following combustion processes were used: heavy fuel oil: heat production, heavy fuel oil, at industrial furnace 1MW, Europe without Switzerland; wood chips: heat production, wood chips from industry, at furnace 1000kW, CH
