# mine construction, open cast, steatite

Dataset: EcoSpold 2, unit process
Geography: RoW
Time period: 1988-01-01 to 2023-12-31
Technology level: current
Classification: EcoSpold01Categories: metals/extraction
Classification: ISIC rev.4 ecoinvent: 4290:Construction of other civil engineering projects
Synonyms: steatite pit
Scenario: Business-as-Usual
System model: Allocation, cut-off by classification
Generated by: Geneviève Martineau
Database: ecoinvent
isCopyrightProtected: true
accessRestrictedTo: 1

## General comment
This dataset represent the construction of a steatite open cast mine. Lifetime estimated to 50 years, output: 320t per year. Data quality indicators adjusted accordingly.

## Included activities start
Starts from beginning of site exploitation.

## Included activities end
This activity ends with the end of site exploitation.
The dataset includes the land transformation, land occupation, as well as building and machinery infrastructures.
The dataset doesn't include recultivation of the site.

## Geography
Representative of Quebec steatite open cast mine. Data quality indicators adjusted accordingly.

## Parameters
- building surface: 1400 m2; name surface_building; lognormal variance with pedigree 0.302, pedigree (1,1,1,5,1)
  Measured value, based on aerial photograph
- number of building machines: 1 unit; name number_machines; lognormal variance with pedigree 0.342, pedigree (1,1,1,5,4)
  Measured value (from company). Reported as "loader".
- number of diggers: 1 unit; name number_diggers; lognormal variance with pedigree 0.31, pedigree (1,1,1,5,3)
  Measured value (from company)
- number of lorries: 2 unit; name number_lorries; lognormal variance with pedigree 0.31, pedigree (1,1,1,5,3)
  Measured value (from company)
- production volume country 01: 1 dimensionless; name total_sites; lognormal variance with pedigree 0.002, pedigree (1,1,1,5,1)
  Measured data. There is only one steatite mine in Quebec
- quebec production volume: 304000 kg; name Steatite_PV_Quebec; lognormal variance with pedigree 0.0006, pedigree (1,1,1,1,1)
  Estimated by only company producing steatite in Quebec. Assuming 95% of extraction of the open cast mine is composed of steatite.
  Uncertainty: Production volume for Quebec Steatite mine (provided by company)
- quebec production volume in units: 0.02 unit; name PV_Quebec_Units; = total_sites/lifetime_mine
  Calculated value.
- total surface: 122500 m2; name total_surface; lognormal variance with pedigree 0.122, pedigree (1,1,1,5,1)
  Measured value, based on aerial photograph.
- world production volume: 5.6e8 kg; name Steatite_PV_World; lognormal variance with pedigree 0.0006, pedigree (1,1,1,1,1)
  World production of Steatite (2011) Source: http://www.indexmundi.com/en/commodities/minerals/talc/talc_t5.html

## Reference product
- mine infrastructure, steatite: 1 unit; By-product classification allocatable product; CPC 53261: Mining constructions
  production volume 36.8221 unit; name APV_ref_prod; = PV_Quebec_Units*Steatite_PV_World/Steatite_PV_Quebec
    Gross approximation of the production volume based on an estimate of the Quebec production volume (provided by the only producer) scaled to GLO by the ratio of global and Quebec GDP for 2011 (7e13/3.11e11). It should be replaced as soon as better data is found.
  property annual production 320000 kg; name total_annual_extraction
    Net total quantity of mineral extracted annualy. Source: questionnaire
  property lifetime 50 year; name lifetime_mine
    Own estimation
  property lifetime capacity [kg] 1.6e7 kg; = lifetime_mine*total_annual_extraction
  property price 503216 EUR2005
    Calculated based on inputs: The price of the product has been calculated as a sum of the values of the material and energy inputs for this product. This value is therefore a rough estimation. It may underestimate the real price since there are additional expenses when producing any product. These expences can include for example labour costs, treatment of waste materials and profit for the producer. Please consider carefully whether this level of data quality is acceptable for your application.
  properties: carbon allocation 0 kg, carbon content 0

## Inputs from technosphere
- building machine: 2.5 unit; = number_machines*lifetime_mine/lifetime_machine; lognormal variance with pedigree 0.008, pedigree (1,1,4,1,1)
  See parameters and properties
  Uncertainty: Calculated variable. Uncertainty will be determined from propagation of uncertainty factors of underlying variables.
  property lifetime 20 year; name lifetime_machine
- building, hall, steel construction: 1400 m2; = surface_building*lifetime_mine/lifetime_building; lognormal variance with pedigree 0.008, pedigree (1,1,4,1,1)
  (same comment as for building machine)
  property lifetime 50 year; name lifetime_building
- hydraulic digger: 2.5 unit; = number_diggers*lifetime_mine/lifetime_digger; lognormal variance with pedigree 0.008, pedigree (1,1,4,1,1)
  (same comment as for building machine)
  property lifetime 20 year; name lifetime_digger
- lorry, 40 metric ton: 3.34704, 1.65296 unit (2 suppliers, which the file names only by identifier); sum of these 5 unit; = number_lorries*lifetime_mine/lifetime_lorry; lognormal variance with pedigree 0.008, pedigree (1,1,4,1,1)
  (same comment as for building machine)
  properties: lifetime 20 year

## Inputs from nature
- Occupation, mineral extraction site [natural resource, land]: 6.125e6 m2*year; = total_surface*lifetime_mine; lognormal variance with pedigree 0.008, pedigree (1,1,4,1,1)
  (same comment as for building machine)
- Transformation, from unspecified [natural resource, land]: 122500 m2; = total_surface; lognormal variance with pedigree 0.008, pedigree (1,1,4,1,1)
  See parameters.
  Uncertainty: Calculated variable. Uncertainty will be determined from propagation of uncertainty factors of underlying variables.
- Transformation, to mineral extraction site [natural resource, land]: 122500 m2; = total_surface; lognormal variance with pedigree 0.008, pedigree (1,1,4,1,1)
  (same comment as for Transformation, from unspecified)

## Sampling procedure
Literature

## Extrapolations
see Geography and Technology. Based on Quebec steatite mine. Data quality indicators adjusted accordingly.
