# multi-Si wafer production, ribbon

Dataset: EcoSpold 2, unit process
Geography: RER
Time period: 2005-01-01 to 2023-12-31
Technology level: current
Classification: EcoSpold01Categories: photovoltaic/production of components
Classification: ISIC rev.4 ecoinvent: 2610:Manufacture of electronic components and boards
Synonyms: polycrystalline; multi-crystalline; silicon
Scenario: Business-as-Usual
System model: Allocation, cut-off by classification
Share of production covered: 20 %
Generated by: Mariska J. de Wild-Scholten
Published in: Jungbluth, N. 2007
Database: ecoinvent
isCopyrightProtected: true
accessRestrictedTo: 1

## General comment
The reference flow for the life cycle inventory is 1 square metre of wafer surface. The ribbon silicon wafers have a wafer thickness of 200-300 um. The wafer area is 120-156 cm2, thickness 250 um. The weight is 583 g/m2

## Included activities end
Sawing and cleaning of wafers. The process data include electricity use, water and working material consumption (e.g. stainless steel for saw-blades, argon gas, hydrofluoric and hydrochloric acid). Production wastes to be treated and process-specific NOx- and waterborne pollutants are considered. No data on other process specific air emissions.

## Geography
Europe, Western + North America

## Technology
Average from 3 specific processes of which one in pilot phase.

## Time period
Use of data from an environmental report for a production plant (ca. 3 million wafers per year) and some data from older publications.

## Reference product
- multi-Si wafer, ribbon: 1 m2; By-product classification allocatable product; CPC 47173: Parts for the goods of subclasses 47140 to 47160; HS2017 854150: Electrical apparatus; photosensitive semiconductor devices n.e.c. in heading no. 8541, including photovolta[...]
  EcoSpold01Location=RER
  production volume 136842 m2
    Not known.
    Production volumes were inferred from global production volumes, considering that the proportion of ribbon wafers among the multi-Si wafers was the same (5% ribbon, 95% multi-Si wafer)
  property price 26.0602 EUR2005
    Calculated based on inputs: The price of the product has been calculated as a sum of the values of the material and energy inputs for this product. This value is therefore a rough estimation. It may underestimate the real price since there are additional expenses when producing any product. These expences can include for example labour costs, treatment of waste materials and profit for the producer. Please consider carefully whether this level of data quality is acceptable for your application.
  properties: carbon allocation 0 kg, carbon content 0, carbon content, fossil 0, carbon content, non-fossil 0, dry mass 0.583 kg, water content 0, water in wet mass 0 kg, wet mass 0.583 kg

## Inputs from technosphere
- argon, liquid: 5.21 kg; lognormal variance with pedigree 0.0541, pedigree (3,4,5,3,1)
  Literature value (de Wild 2007), protection gas sawing
  EcoSpold01Location=RER
  Uncertainty: Protection gas sawing, de Wild 2007
  properties: dry mass 1 kg, wet mass 1 kg
- electricity, medium voltage: 42.3 kWh; lognormal variance with pedigree 0.1741, pedigree (3,4,5,3,1)
  Estimation based on literature data, high range of literature values
  EcoSpold01Location=UCTE
  Uncertainty: Estimation based on literature data, high range of literature values
- graphite: 0.0066 kg; lognormal variance with pedigree 0.0401, pedigree (1,2,5,1,1)
  Literature value (de Wild 2007), graphite
  EcoSpold01Location=RER
  Uncertainty: de Wild 2007, graphite
  properties: carbon content, fossil 1, dry mass 1 kg, heating value, net 30.3 MJ, wet mass 1 kg
- packaging film, low density polyethylene: 0.1 kg; lognormal variance with pedigree 0.0701, pedigree (4,4,5,3,1)
  EcoSpold01Location=RER
  Estimated value; packaging
  Uncertainty: estimation packaging
  properties: carbon content, fossil 0.857143, dry mass 1 kg, heating value, net 42.47 MJ, wet mass 1 kg
  note on carbon content, fossil: Polyethylene is formed out of a huge amount of ethylene monomers (C2H4) (ecoinvent v2.2 report 11_II). MW=28 g/mol
- paper, woodfree, coated: 0.19 kg; lognormal variance with pedigree 0.0541, pedigree (3,4,5,3,1)
  Literature value (Hagedorn 1992)
  EcoSpold01Location=RER
  Uncertainty: Hagedorn 1992
  properties: carbon content, fossil 0.0590617, carbon content, non-fossil 0.22775, dry mass 0.945 kg, heating value, net 14.11 MJ, water content 0.0582011, wet mass 1 kg
  note on carbon content, fossil: Fossil C content was calculated after fossil C contents of chemicals used in the production of the paper (in Tab 8.72 & 8.73 ecoinvent v2.2 report 11_III, part 8).
  note on carbon content, non-fossil: Biogenic C content was calculated after biogenic C contents of chemicals used in the production of the paper (in Tab 8.72 & 8.73 ecoinvent v2.2 report 11_III, part 8). The cellulose content in 1 kg of paper (on a wet mas basis) was estimated as (1-chemical content), C content of cellulose was considered 0.44 kgC/kg dry mass (ecoinvent v2.2 report, n 15a, pg 40)
- polystyrene, high impact: 0.2 kg; lognormal variance with pedigree 0.0701, pedigree (4,4,5,3,1)
  EcoSpold01Location=RER
  Estimated value; packaging
  Uncertainty: estimation packaging
  properties: carbon content, fossil 0.923077, dry mass 1 kg, heating value, net 38.67 MJ, wet mass 1 kg
  note on carbon content, fossil: Chemical formula of polystyrene is (C8H8)n (ecoinvent v2.2 report 11_II)
- silicon, electronics grade: 0.1077 kg; = 0.74*0.14554; lognormal variance with pedigree 0.0407, pedigree (1,2,5,1,1)
  Literature value. This value is the total silicon, electronics grade needed minus internally recycled silicon broken wafers. The ratio between silicon, electronics grade and silicon, solar grade is based on world production volumes (Jungbluth, 2007, ecoinvent v2 report no.6).
  property carbon content, fossil 0; name C_content_fossil
  property carbon content, non-fossil 0; name C_content_non_fossil
  property dry mass 1 kg; name DM
  property water content 0; name water_content
  property water in wet mass 0 kg; name WWM
  property wet mass 1 kg; name WM
- silicon, solar grade: 0.632302 kg; = 0.74*0.854462; lognormal variance with pedigree 0.0407, pedigree (1,2,5,1,1)
  Literature value. This value is the total silicon, solar grade needed minus internally recycled silicon broken wafers. The ratio between silicon, electronics grade and silicon, solar grade is based on world production volumes (Jungbluth, 2007, ecoinvent v2 report no.6).
  properties: dry mass 1 kg, wet mass 1 kg
- wafer factory: 4e-6 unit; lognormal variance with pedigree 0.3401, pedigree (1,2,5,1,1)
  LIterature value
  EcoSpold01Location=DE
  Uncertainty: Literature
- waste, from silicon wafer production: -0.007 kg; lognormal variance with pedigree 0.0001, pedigree (1,2,1,1,1)
  Literature value (de Wild 2007), estimate for unused parts of crystal
  EcoSpold01Location=DE
  Uncertainty: de Wild 2007, estimate for unused parts of crystal
  production volume
    Calculated from the production volume of multi-Si wafer, ribbon in proportion to the respective output amounts.
  properties: carbon content, fossil 0.0347496, dry mass 1 kg, wet mass 1 kg

## Emissions to nature
- AOX, Adsorbable Organic Halides [water, surface water]: 0.00050129 kg; lognormal variance with pedigree 0.0927, pedigree (2,4,5,3,1)
  Literature value (Environmental report Wacker 2006), formed by nitric acid use
  Uncertainty: Environmental report Wacker 2006, formed by nitric acid use
- BOD5, Biological Oxygen Demand [water, surface water]: 0.029555 kg; lognormal variance with pedigree 0.0941, pedigree (3,4,5,3,1)
  Calculated value; extrapolation for sum parameter
  Uncertainty: Extrapolation for sum parameter
- COD, Chemical Oxygen Demand [water, surface water]: 0.029555 kg; lognormal variance with pedigree 0.0927, pedigree (2,4,5,3,1)
  Literature value (Environmental report Wacker 2000)
  Uncertainty: Environmental report Wacker 2000
- Cadmium II [water, surface water]: 6.0508e-6 kg; lognormal variance with pedigree 0.3527, pedigree (2,4,5,3,1)
  (same comment as for COD, Chemical Oxygen Demand)
- Chromium III [water, surface water]: 3.0254e-5 kg; lognormal variance with pedigree 0.3527, pedigree (2,4,5,3,1)
  (same comment as for COD, Chemical Oxygen Demand)
- Copper ion [water, surface water]: 6.0508e-5 kg; lognormal variance with pedigree 0.3527, pedigree (2,4,5,3,1)
  (same comment as for COD, Chemical Oxygen Demand)
- DOC, Dissolved Organic Carbon [water, surface water]: 0.011083 kg; lognormal variance with pedigree 0.0941, pedigree (3,4,5,3,1)
  (same comment as for BOD5, Biological Oxygen Demand)
- Lead II [water, surface water]: 3.0254e-5 kg; lognormal variance with pedigree 0.7027, pedigree (2,4,5,3,1)
  (same comment as for COD, Chemical Oxygen Demand)
- Mercury II [water, surface water]: 6.0508e-6 kg; lognormal variance with pedigree 0.7027, pedigree (2,4,5,3,1)
  (same comment as for COD, Chemical Oxygen Demand)
- Nickel II [water, surface water]: 6.0508e-5 kg; lognormal variance with pedigree 0.7027, pedigree (2,4,5,3,1)
  (same comment as for COD, Chemical Oxygen Demand)
- Nitrogen [water, surface water]: 0.0099449 kg; lognormal variance with pedigree 0.0927, pedigree (2,4,5,3,1)
  Literature value (Environmental report Wacker 2006), 50% of total emissions
  Uncertainty: Environmental report Wacker 2006, 50% of total emissions
- Phosphate [water, surface water]: 0.00050129 kg; lognormal variance with pedigree 0.0927, pedigree (2,4,5,3,1)
  Literature value (Environmental report Wacker 2006)
  Uncertainty: Environmental report Wacker 2006
- TOC, Total Organic Carbon [water, surface water]: 0.011083 kg; lognormal variance with pedigree 0.0941, pedigree (3,4,5,3,1)
  (same comment as for BOD5, Biological Oxygen Demand)

## Sampling procedure
Data collection by factory representatives. Environmental report and LCA studies.

## Review by Roberto Dones 2007-08-23
Passed.
none

## Review by Bo Weidema 2012-07-23
Former input of silicon production mix now specified in specific types of silicon.
