# ammonium nitrite production

Dataset: EcoSpold 2, unit process
Geography: RoW
Time period: 2010-01-01 to 2023-12-31
Technology level: current
Classification: ISIC rev.4 ecoinvent: 2011:Manufacture of basic chemicals
Synonyms: N2H4O2
Scenario: Business-as-Usual
System model: Allocation, cut-off by classification
Share of production covered: 100 %
Generated by: Jürgen Sutter
Database: ecoinvent
isCopyrightProtected: true
accessRestrictedTo: 1

## General comment
The process “ammonium nitrite, at plant, GLO" is modelled for the production of ammonium nitrite from ammonium carbonate. Raw materials are modelled with a stoechiometric calculation. Emissions are estimated. Energy consumptions, infrastructure and transports are calculated with standard values.
Ammonium nitrite (NH4NO2; CAS 13446-48-5) is a very unstable compound that is virtually always handled in aqueous solution. It has an enthalpy of formation of ΔH298 = –260 ± 5 kJ/mol and forms cubic crystals.
Ammonium nitrite is highly hygroscopic and readily soluble in water. The saturated solution contains 42.5 wt% ammonium nitrite at the cryohydric point (–27.9 °C), 55.4% at 0 °C, and 65.0% at 20 °C. Hydrated solid phases are not known.
Solid ammonium nitrite is stable only in the pure, dry state. Exothermic decomposition begins at 60 °C and may occur explosively,
Ammonium nitrite is produced and utilized industrially solely in the form of a weakly ammoniacal solution with pH > 7.5. When ammonium nitrite solution is prepared, the simultaneous formation of ammonium nitrate must be avoided because the two compounds cannot be separated from one another.
Ammonium nitrite is produced on an industrial scale from nitrogen oxides and ammonia or ammonium carbonate. The reaction is similar to that used for the formation of sodium nitrite. Because of the instability of ammonium nitrite (reaction 6.1), however, care must be taken to keep the pH between 8 and 9 and the temperature between 0 and + 5 °C.
The heat balance of ammonium nitrite formation depends strongly on the feed ammonium compound.
Use of ammonium bicarbonate appears advantageous because no water is formed in the reaction to dilute the solution. However, since it has a low solubility the use of ammonium carbonate is generally preferred.
The process is usually carried out under an overpressure of 0.1–0.6 kPa . The NO2–NO gas mixture is first cooled to 0 °C to decrease the degree of oxidation (see Section Production) to 35–40% by condensation of dilute nitric acid, and then fed into absorption columns connected in series and packed with ceramic Raschig rings or fitted with sieve trays. The circulating solution is held at ca. 0 °C by coolers located at the bottoms of the columns and outside them. To prevent crystallization of ammonium bicarbonate, a metered amount of aqueous ammonia solution is added along with the ammonium carbonate. The final product solution has a pH of 8 and contains ca. 150–200 g/L ammonium nitrite, 20 g/L ammonium nitrate, 20 g/L ammonium carbonate, and 2–5 g/L ammonia. Ammonium nitrite mist is formed in the absorption step, a final gas scrub is therefore used to recover ammonium carbonate solution for reuse.
The ammonium nitrite yield relative to the nitrogen oxides inlet to ammoniacal absorption is less than 90%. Losses include nitrate formation, nitrite decomposition, and tail-gas and mist losses.
Ammonium nitrite is produced and utilized industrially solely in the form of a weakly ammoniacal solution with pH > 7.5. When ammonium nitrite solution is prepared, the simultaneous formation of ammonium nitrate must be avoided because the two compounds cannot be separated from one another.
Ammonium nitrite is produced on an industrial scale from nitrogen oxides and ammonia or ammonium carbonate. The reaction is similar to that used for the formation of sodium nitrite. Because of the instability of ammonium nitrite (reaction 6.1), however, care must be taken to keep the pH between 8 and 9 and the temperature between 0 and + 5 °C.
The heat balance of ammonium nitrite formation depends strongly on the feed ammonium compound.
Use of ammonium bicarbonate appears advantageous because no water is formed in the reaction to dilute the solution. However, since it has a low solubility the use of ammonium carbonate is generally preferred.
The process is usually carried out under an overpressure of 0.1–0.6 kPa . The NO2–NO gas mixture is first cooled to 0 °C to decrease the degree of oxidation (see Section Production) to 35–40% by condensation of dilute nitric acid, and then fed into absorption columns connected in series and packed with ceramic Raschig rings or fitted with sieve trays. The circulating solution is held at ca. 0 °C by coolers located at the bottoms of the columns and outside them. To prevent crystallization of ammonium bicarbonate, a metered amount of aqueous ammonia solution is added along with the ammonium carbonate. The final product solution has a pH of 8 and contains ca. 150–200 g/L ammonium nitrite, 20 g/L ammonium nitrate, 20 g/L ammonium carbonate, and 2–5 g/L ammonia. Ammonium nitrite mist is formed in the absorption step, a final gas scrub is therefore used to recover ammonium carbonate solution for reuse.
The ammonium nitrite yield relative to the nitrogen oxides inlet to ammoniacal absorption is less than 90%. Losses include nitrate formation, nitrite decomposition, and tail-gas and mist losses.
Ammonium nitrite can be used to passivate steam boiler equipment and chemical plants because it does not leave any nonvolatile residues behind. It is also used as a blowing agent in the manufacture of hollow rubber articles. In the laboratory, very pure nitrites can be prepared from pure ammonium nitrite and the hydroxides of other cations.
Frischknecht R., Jungbluth N., Althaus H.-J., Doka G., Dones R., Heck T., Hellweg S., Hischier R., Nemecek T., Rebitzer G. and Spielmann M. (2007) Overview and Methodology. Final report ecoinvent v2.0 No. 1. Swiss Centre for Life Cycle Inventories, Dübendorf, CH, retrieved from: www.ecoinvent.org.
Gendorf (2000) Umwelterklärung 2000, Werk Gendorf. Werk Gendorf, Burgkirchen as pdf-File under: http://www.gendorf.de/pdf/umwelterklaerung2000.pdf
Wolfgang Laue, Michael Thiemann, Erich Scheibler, Karl Wilhelm Wiegand: Nitrates and Nitrites. Published online: 2002. In: Ullmann's Encyclopedia of Industrial Chemistry, Seventh Edi-tion, 2004 Electronic Release (ed. Fiedler E., Grossmann G., Kersebohm D., Weiss G. and Witte C.). 7 th Electronic Release Edition. Wiley InterScience, New York, Online-Version under: DOI: 10.1002/14356007.a17_265

## Included activities end
production of ammonium nitrite including materials, energy uses, infrastructure, and emissions

## Geography
The inventory is modelled for the world.

## Technology
reaction of ammonium carbonate, nitrous oxide, and nitrous dioxide

## Time period
Time of publications

## Parameters
- fraction, cooling water, cooling pond system, to air: 0.032 dimensionless; name fraction_CW_CP_to_air; lognormal variance with pedigree 0.0413, pedigree (2,3,1,3,1)
  Calculated based on literature value (Scown, C.D., 2011, Water Footprint of U.S. Transportation Fuels and supplying information of the article) (Vionnet, S., Quantis Water Database - Technical Report, 2012).
- fraction, cooling water, once-through system, to air: 0.004 dimensionless; name fraction_CW_OT_to_air; lognormal variance with pedigree 0.0413, pedigree (2,3,1,3,1)
  (same comment as for fraction, cooling water, cooling pond system, to air)
- fraction, cooling water, recirculating system, to air: 0.771 dimensionless; name fraction_CW_R_to_air; lognormal variance with pedigree 0.0413, pedigree (2,3,1,3,1)
  (same comment as for fraction, cooling water, cooling pond system, to air)
- fraction, cooling water, to air: 0.3875 dimensionless; name fraction_CW_to_air; = (0.5*fraction_CW_OT_to_air)+(0.5*fraction_CW_R_to_air); lognormal variance with pedigree 0.092025, pedigree (4,4,3,2,4)
  Calculated value based on literature value (see comments of the other parametres present in this dataset) and expert opinion. In the case when no industry/literature data are available about the type of cooling or directly fraction, cooling water, to air specific for the process a default assumption is applied. It is assumed that the once-through cooling system is used in 50% of all cases and recirculating system is used in another 50% of all cases.

## Reference product
- ammonium nitrite: 1 kg; By-product classification allocatable product; CPC 34653: Ammonium chloride; nitrites; HS2017 283410: Nitrites; CAS 13446-48-5
  EcoSpold01Location=RER
  production volume 6.7e6 kg
    Expert judgment
  property carbon content, fossil 0
    Calculated based on molecular structure. See tab "chemicals".
  property price 1.04154 EUR2005
    Calculated based on inputs: The price of the product has been calculated as a sum of the values of the material and energy inputs for this product. This value is therefore a rough estimation. It may underestimate the real price since there are additional expenses when producing any product. These expences can include for example labour costs, treatment of waste materials and profit for the producer. Please consider carefully whether this level of data quality is acceptable for your application.
  properties: carbon allocation 0 kg, carbon content 0, carbon content, non-fossil 0, dry mass 1 kg, water content 0, water in wet mass 0 kg, wet mass 1 kg

## Inputs from technosphere
- ammonium carbonate: 0.83333 kg; lognormal variance with pedigree 0.0655, pedigree (4,5,5,1,1)
  Ullmanns 2004 reports a yield of ammonium nitrite less than 90% based on the inputs. In this study a yield of 90% is assumed.
  EcoSpold01Location=RER
  Uncertainty: Stoechiometric calculation
  properties: carbon content, fossil 0.125, dry mass 1 kg, heating value, net 13.88 MJ, wet mass 1 kg
- chemical factory, organics: 4e-10 unit; lognormal variance with pedigree 0.3846, pedigree (2,4,5,5,4)
  EcoSpold01Location=RER
  Calculated based on literature data published by the industry. For this activity, no information was readily available concerning infrastructure and land-use. Therefore, the infrastructure is estimated based on data from two chemical factories, the BASF site of Ludwigshafen and the chemical factory in Gendorf (which are both located in Germany), which produce a wide range of chemical substances. Based on this data, the following assumptions are made: the built area amounts to about 4.2 ha, the plant has an average output of 50'000 t/a and a lifespan of fifty years. The estimated infrastructure amount is therefore 4.00 E-10 units per kg of produced chemical.
  References:
  Althaus H.-J., Chudacoff M., Hischier R., Jungbluth N., Osses M. and Primas A. (2007) Life Cycle Inventories of Chemicals. ecoinvent report No. 8, v2.0. EMPA Dübendorf, Swiss Centre for Life Cycle Inventories, Dübendorf, CH.
  Gendorf (2000) Umwelterklärung 2000, Werk Gendorf. Werk Gendorf, Burgkirchen.
  Uncertainty: Estimation
- electricity, medium voltage: 0.013262, 0.264547, 0.088887, 0.00406128, 0.00081286, 0.000174539, 0.0273186 kWh (7 suppliers, which the file names only by identifier); sum of these 0.399063 kWh; lognormal variance with pedigree 0.0852, pedigree (2,4,5,5,4)
  EcoSpold01Location=UCTE
  Calculated based on literature data published by the GENDORF Chemical Park. The factory produced an average of 2462760 tonnes of chemical substances (including intermediates) per year in the years 2015-2019. The average consumption of electricity in the years 2015-2019 was 982796751 kWh per year. This equals 0.39906 kWh/kg chemical produced.
  References:
  Chemiepark GENDORF, Umwelterklärung 2016, https://www.gendorf.de/Nachbarn/Umweltschutz/Industrie%20und%20Nachhaltigkeit
  Chemiepark GENDORF, Umwelterklärung 2017, https://www.gendorf.de/Nachbarn/Umweltschutz/Industrie%20und%20Nachhaltigkeit
  Chemiepark GENDORF, Umwelterklärung 2020, https://www.gendorf.de/Nachbarn/Umweltschutz/Industrie%20und%20Nachhaltigkeit
  Uncertainty: Estimation
- heat, district or industrial, natural gas: 0.0304984, 1.85597 MJ (2 suppliers, which the file names only by identifier); sum of these 1.88647 MJ; lognormal variance with pedigree 0.0852, pedigree (2,4,5,5,4)
  Calculated based on literature data published by the GENDORF Chemical Park. The factory produced an average of 2462760 tonnes of chemical substances (including intermediates) per year in the years 2015-2019. The average consumption of natural gas in the years 2015-2019 was 4645920000 MJ per year. This equals 1.8865 MJ/kg chemical produced.
  References:
  Chemiepark GENDORF, Umwelterklärung 2016, https://www.gendorf.de/Nachbarn/Umweltschutz/Industrie%20und%20Nachhaltigkeit
  Chemiepark GENDORF, Umwelterklärung 2017, https://www.gendorf.de/Nachbarn/Umweltschutz/Industrie%20und%20Nachhaltigkeit
  Chemiepark GENDORF, Umwelterklärung 2020, https://www.gendorf.de/Nachbarn/Umweltschutz/Industrie%20und%20Nachhaltigkeit
  properties: heating value, net 1 MJ
- heat, from steam, in chemical industry: 0.20781 MJ; lognormal variance with pedigree 0.0852, pedigree (2,4,5,5,4)
  EcoSpold01Location=RER
  Calculated based on literature data published by the GENDORF Chemical Park. The factory produced an average of 2462760 tonnes of chemical substances (including intermediates) per year in the years 2015-2019. The average consumption of steam (internal and external sources) in the years 2015-2019 was 511785800 MJ per year. This equals 0.2078 MJ/kg chemical produced.
  References:
  Chemiepark GENDORF, Umwelterklärung 2016, https://www.gendorf.de/Nachbarn/Umweltschutz/Industrie%20und%20Nachhaltigkeit
  Chemiepark GENDORF, Umwelterklärung 2017, https://www.gendorf.de/Nachbarn/Umweltschutz/Industrie%20und%20Nachhaltigkeit
  Chemiepark GENDORF, Umwelterklärung 2020, https://www.gendorf.de/Nachbarn/Umweltschutz/Industrie%20und%20Nachhaltigkeit
  Uncertainty: Estimation
  properties: heating value, net 1 MJ
- nitrous dioxide: 0.39931 kg; lognormal variance with pedigree 0.0655, pedigree (4,5,5,1,1)
  (same comment as for ammonium carbonate)
  properties: dry mass 1 kg, wet mass 1 kg
- nitrous oxide: 0.26042 kg; lognormal variance with pedigree 0.0655, pedigree (4,5,5,1,1)
  (same comment as for ammonium carbonate)
  properties: dry mass 1 kg, wet mass 1 kg
- wastewater, average: -2.26904e-6, -8.07865e-9 m3 (2 suppliers, which the file names only by identifier); sum of these -2.27712e-6 m3; lognormal variance with pedigree 0.0452, pedigree (2,4,1,5,4)
  Calculated based on literature data published by the GENDORF Chemical Park. The factory produced an average of 2462760 tonnes of chemical substances (including intermediates) per year in the years 2015-2019. The average ouput of wastewater going to an external wastewater treatment plant in the years 2015-2019 was 5608 m3 per year. This equals 0.000002277 m3/kg chemical produced.
  References:
  Chemiepark GENDORF, Umwelterklärung 2016, https://www.gendorf.de/Nachbarn/Umweltschutz/Industrie%20und%20Nachhaltigkeit
  Chemiepark GENDORF, Umwelterklärung 2017, https://www.gendorf.de/Nachbarn/Umweltschutz/Industrie%20und%20Nachhaltigkeit
  Chemiepark GENDORF, Umwelterklärung 2020, https://www.gendorf.de/Nachbarn/Umweltschutz/Industrie%20und%20Nachhaltigkeit
  properties: carbon content, non-fossil 0.194039, dry mass 0.346837 kg, mass concentration, TOC 0.1091 kg/m3, mass concentration, calcium 0.039453 kg/m3, mass concentration, chlorine 0.030031 kg/m3, mass concentration, hydrogen 0.013365 kg/m3, mass concentration, nitrogen 0.031015 kg/m3, mass concentration, oxygen 0.069824 kg/m3, mass concentration, sodium 0.06456 kg/m3, mass concentration, sulfur 0.015602 kg/m3, water content 2882.2, wet mass 1000 kg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
  note on carbon content, non-fossil: 0.0673 kg TOC/m3 (Tab A.17, ecoinvent v2.2 report 13_I). TOC was considered as Total Carbon.

## Inputs from nature
- Water, cooling, unspecified natural origin [natural resource, in water]: 0.014707 m3; lognormal variance with pedigree 0.0852, pedigree (2,4,5,5,4)
  Calculated based on literature data published by the GENDORF Chemical Park. The factory produced an average of 2462760 tonnes of chemical substances (including intermediates) per year in the years 2015-2019. The average amount of cooling water released in the years 2015-2019 was 34408800 t per year. It was assumed that 5% of the cooling water was emitted to air during its use, therefore, to calculate the input of cooling water, the output value reported by GENDORF was scaled up by the factor 1/0.95. This equals 0.014707 m3/kg chemical produced.
  References:
  Chemiepark GENDORF, Umwelterklärung 2016, https://www.gendorf.de/Nachbarn/Umweltschutz/Industrie%20und%20Nachhaltigkeit
  Chemiepark GENDORF, Umwelterklärung 2017, https://www.gendorf.de/Nachbarn/Umweltschutz/Industrie%20und%20Nachhaltigkeit
  Chemiepark GENDORF, Umwelterklärung 2020, https://www.gendorf.de/Nachbarn/Umweltschutz/Industrie%20und%20Nachhaltigkeit
  Uncertainty: Estimation
- Water, river [natural resource, in water]: 0.000965426 m3; lognormal variance with pedigree 0.0852, pedigree (2,4,5,5,4)
  Calculated based on literature data published by the GENDORF Chemical Park. The factory produced an average of 2462760 tonnes of chemical substances (including intermediates) per year in the years 2015-2019. The average consumption of river water in the years 2015-2019 was 22000820 t per year. However, since the cooling water is modelled as an input, the amount of river water was adjusted to avoid double counting. 55% of the input amount of cooling water was deducted from the amount of river water, as that is the share of river water versus well water. This equals 0.00096543 m3/kg chemical produced.
  References:
  Chemiepark GENDORF, Umwelterklärung 2016, https://www.gendorf.de/Nachbarn/Umweltschutz/Industrie%20und%20Nachhaltigkeit
  Chemiepark GENDORF, Umwelterklärung 2017, https://www.gendorf.de/Nachbarn/Umweltschutz/Industrie%20und%20Nachhaltigkeit
  Chemiepark GENDORF, Umwelterklärung 2020, https://www.gendorf.de/Nachbarn/Umweltschutz/Industrie%20und%20Nachhaltigkeit
- Water, well, in ground [natural resource, in water]: 0.000816522 m3; lognormal variance with pedigree 0.0852, pedigree (2,4,5,5,4)
  Calculated based on literature data published by the GENDORF Chemical Park. The factory produced an average of 2462760 tonnes of chemical substances (including intermediates) per year in the years 2015-2019. The average consumption of well water in the years 2015-2019 was 18607480 t per year. However, since the cooling water is modelled as an input, the amount of well water was adjusted to avoid double counting. 45% of the input amount of cooling water was deducted from the amount of well water, as that is the share of well water versus river water. This equals 0.00081652 m3/kg chemical produced.
  References:
  Chemiepark GENDORF, Umwelterklärung 2016, https://www.gendorf.de/Nachbarn/Umweltschutz/Industrie%20und%20Nachhaltigkeit
  Chemiepark GENDORF, Umwelterklärung 2017, https://www.gendorf.de/Nachbarn/Umweltschutz/Industrie%20und%20Nachhaltigkeit
  Chemiepark GENDORF, Umwelterklärung 2020, https://www.gendorf.de/Nachbarn/Umweltschutz/Industrie%20und%20Nachhaltigkeit

## Emissions to nature
- Carbon dioxide, fossil [air, urban air close to ground]: 0.34375 kg; lognormal variance with pedigree 0.1786, pedigree (4,5,5,5,5)
  The produced carbon dioxide is considered to be emitted to air.
  Uncertainty: Estimation
- Nitrogen oxides [air, urban air close to ground]: 0.0013194 kg; lognormal variance with pedigree 0.1786, pedigree (4,5,5,5,5)
  There was no data available on process emissions to air for the ammonium nitrite production. As approximation the air emissions occurring from the purge vent, the distillation vent and fugitive emission sources were estimated to 0.2% of the input of nitrous dioxide and nitrous oxide.The remaining amount of unreacted nitrous dioxide and nitrous oxide is considered to be oxidated to nitrogen.
  Uncertainty: Estimation
- Water [air, unspecified]: 0.00147008 m3; lognormal variance with pedigree 0.1246, pedigree (2,4,5,5,4)
  Calculated based on literature data published by the GENDORF Chemical Park. The factory produced an average of 2462760 tonnes of chemical substances (including intermediates) per year in the years 2015-2019. To determine the emissions of water to air, the difference of all water inputs (from river, well, tap water and cooling) and outputs (wastewater, emissions to water) was calculated. The average ouput of water to air in the years 2015-2019 was 3620444 m3 per year. This equals 0.00147 m3/kg chemical produced. For more information on the other water exchanges please consult the respective exchange comment.
  References:
  Chemiepark GENDORF, Umwelterklärung 2016, https://www.gendorf.de/Nachbarn/Umweltschutz/Industrie%20und%20Nachhaltigkeit
  Chemiepark GENDORF, Umwelterklärung 2017, https://www.gendorf.de/Nachbarn/Umweltschutz/Industrie%20und%20Nachhaltigkeit
  Chemiepark GENDORF, Umwelterklärung 2020, https://www.gendorf.de/Nachbarn/Umweltschutz/Industrie%20und%20Nachhaltigkeit
  property fraction, origin: fresh water 0; name fraction_origin_fresh_water
  property fraction, origin: salt water 0; name fraction_origin_salt_water
  property fraction, origin: unspecified 1; name fraction_origin_unspecified
- Ammonium [water, surface water]: 0.03125 kg; lognormal variance with pedigree 0.1786, pedigree (4,5,5,5,5)
  The remaining amount of unreacted ammonium carbonate is assumed to leave the production process with the waste water. It is accounted as ammonium and carbonate emission to water.
  Uncertainty: Estimation
- Carbonate [water, surface water]: 0.052083 kg; lognormal variance with pedigree 0.3184, pedigree (4,5,5,5,5)
  (same comment as for Ammonium)
- Water [water, unspecified]: 0.0150391 m3; lognormal variance with pedigree 0.1246, pedigree (2,4,5,5,4)
  Calculated based on literature data published by the GENDORF Chemical Park. The factory produced an average of 2462760 tonnes of chemical substances (including intermediates) per year in the years 2015-2019. The amount of water released back to the environment consists of the sum of the amount of process water treated in the internal WWTP that is then released back to the environment and the amount of cooling water released back to the environment. The average ouput of the internal WWTP in the years 2015-2019 was 2628800 m3 and that of cooling water released back to the environment was 34408800 m3. This gives a yearly average of 37037600 m3 emissions of water to water. This equals 0.01504 m3/kg chemical produced.
  References:
  Chemiepark GENDORF, Umwelterklärung 2016, https://www.gendorf.de/Nachbarn/Umweltschutz/Industrie%20und%20Nachhaltigkeit
  Chemiepark GENDORF, Umwelterklärung 2017, https://www.gendorf.de/Nachbarn/Umweltschutz/Industrie%20und%20Nachhaltigkeit
  Chemiepark GENDORF, Umwelterklärung 2020, https://www.gendorf.de/Nachbarn/Umweltschutz/Industrie%20und%20Nachhaltigkeit
  property fraction, origin: fresh water 0; name fraction_origin_fresh_water_Ww
  property fraction, origin: salt water 0; name fraction_origin_salt_water_Ww
  property fraction, origin: unspecified 1; name fraction_origin_unspecified_Ww

## Sampling procedure
Literature data

## Extrapolations
Emissions are modelled with standard methods.
