# transport, passenger, motor scooter

Dataset: EcoSpold 2, unit process
Geography: CH
Time period: 2005-01-01 to 2023-12-31
Technology level: current
Classification: ISIC rev.4 ecoinvent: 4922:Other passenger land transport
Scenario: Business-as-Usual
System model: Allocation, cut-off by classification
Generated by: Marianne Leuenberger
Published in: M. Leuenberger 2010
Database: ecoinvent
isCopyrightProtected: true
accessRestrictedTo: 1

## General comment
The data set reflects the transport of one person on one kilometer on a scooter. Capacity utilisation: 1.1 persons. Data of the energy use and operation emissions derived from average data for motorcycle operation in Europe in the year 2010. HBEFA data extrapolated to 3.5 lt/100km fuel consumption.

## Included activities end
This data includes the operation, production and maintenance of scooter and the use of the road infrastructure. The data set refers to a mix of two and four-stroke engines. It includes as well data for the operation of a scooter with a 50cc motor. Fuel consumption for two-stroke petrol included. Direct airborne emissions of gaseous substances and particulates matter according to HBEFA (2004) for motorcycles (with catalyst). Heavy metal emissions caused by tyre wear extrapolated from average passenger car emissions.

## Geography
Data for transport in Switzerland. Data of energy use and operation emissions refers to Swiss Conditions

## Technology
Average transport by 50-150cc scooter: 45% 2-stroke and 55% 4-stroke engines. Life expectancy: 50000km. Data for the energy use and operation emissions represents average values for Swiss 50cc-150cc fleet: two-stroke: 45%, four-stroke: 55%

## Reference product
- transport, passenger, motor scooter: 1 person*km; By-product classification allocatable product; CPC 64119: Other land transportation services of passengers, n.e.c.
  production volume 0.0336675 person*km; name transport_RP_PV
    This is a placeholder value that does not reflect real-world production volumes. This dataset does not currently require a real-world production volume to work in the database framework, and no actual data were collected yet. This has no negative effect on the results of the ecoinvent database. The placeholder value of this activity was scaled according to the nominal GDP of 2005 (source: United Nations, http://data.un.org/Glossary.aspx?q=GDP+%28current+US%24%29, accessed 20130726) to reflect an appropriate share of the global production volume, which is also a placeholder value.
  property price 0.0298211 EUR2005
    Calculated based on inputs: The price of the product has been calculated as a sum of the values of the material and energy inputs for this product. This value is therefore a rough estimation. It may underestimate the real price since there are additional expenses when producing any product. These expences can include for example labour costs, treatment of waste materials and profit for the producer. Please consider carefully whether this level of data quality is acceptable for your application.
  properties: carbon allocation 0 kg, carbon content 0

## Inputs from technosphere
- maintenance, motor scooter: 1.8182e-5 unit; lognormal variance with pedigree 0.3406, pedigree (2,1,5,1,1)
  activityLink introduced to establish a direct link to the corresponding regional supply of this product
  Uncertainty: E
- motor scooter, 50 cubic cm engine: 1.8182e-5 unit; lognormal variance with pedigree 0.3406, pedigree (2,1,5,1,1)
  Uncertainty: E
- petrol, low-sulfur: 0.0126 kg; lognormal variance with pedigree 0.0406, pedigree (1,3,5,1,1)
  Energy use and operation emisions
  Uncertainty: L
  properties: carbon content, fossil 0.865, dry mass 1 kg, heating value, net 42.5 MJ, wet mass 1 kg
  note on heating value, net: Based on literature, page 611, Report 17: Jungbluth, N., Chudacoff, M., Dauriat, A., Dinkel, F., Doka, G., Faist Emmenegger, M., Gnansounou, E., Kljun, N., Schleiss, K., Spielmann, M., Stettler, C., Sutter, J. 2007: Life Cycle Inventories of Bioenergy. ecoinvent report No. 17, Swiss Centre for Life Cycle Inventories, Dübendorf, CH.
- petrol, two-stroke blend: 0.0103091 kg; lognormal variance with pedigree 0.0406, pedigree (1,3,5,1,1)
  Energy use and operation emisions;activityLink introduced to establish a direct link to the corresponding regional supply of this product
  Uncertainty: L
  properties: carbon content, fossil 0.865, dry mass 1 kg, heating value, net 43.2 MJ, wet mass 1 kg
  note on heating value, net: Assumed equal to "petroleum". LHV for petroleum: Based on literature, page 7, Report6, part 4
- road: 8.3792e-5 m*year; lognormal variance with pedigree 0.428, pedigree (4,1,5,1,4)
  activityLink introduced to establish a direct link to the corresponding regional supply of this product
  Uncertainty: a
- road maintenance: 0.00117416 m*year; lognormal variance with pedigree 0.428, pedigree (4,1,5,1,4)
  This input indicates the unit of road per vkm used during the transport activity. The road input is composed by two demand factors: - Road infrastructure and disposal (RI&D), which varies according to the gross vehicle weight. - Road operations & maintenance (RO&M), which does not vary according to the gross vehicle weight.
  Uncertainty: a

## Emissions to nature
- Acetaldehyde [air, unspecified]: 1.54727e-6 kg; lognormal variance with pedigree 0.1512, pedigree (2,3,5,1,4)
  Energy use and operation emisions
  Uncertainty: c
  property carbon content, fossil 0.545296; name C_content_fossil
  property carbon content, non-fossil 0; name C_content_non_fossil
  property dry mass 1 kg; name DM
  property water content 0; name water_content
  property water in wet mass 0 kg; name WWM
  property wet mass 1 kg; name WM
- Ammonia [air, unspecified]: 1.69763e-6 kg; lognormal variance with pedigree 0.0692, pedigree (2,3,5,1,3)
  Energy use and operation emisions
  Uncertainty: H
- Benzene [air, unspecified]: 0.000110127 kg; lognormal variance with pedigree 0.0992, pedigree (2,3,5,1,3)
  Energy use and operation emisions
  Uncertainty: H
- Cadmium II [air, unspecified]: 4.1679e-10 kg; lognormal variance with pedigree 0.7612, pedigree (2,3,5,1,4)
  Energy use and operation emisions
  Uncertainty: c
- Carbon dioxide, fossil [air, unspecified]: 0.0719527 kg; lognormal variance with pedigree 0.0592, pedigree (2,3,5,1,3)
  Energy use and operation emisions
  Uncertainty: H
- Carbon monoxide, fossil [air, unspecified]: 0.00881854 kg; lognormal variance with pedigree 0.6992, pedigree (2,3,5,1,3)
  Energy use and operation emisions
  Uncertainty: H
- Chromium III [air, unspecified]: 4.79063e-9 kg; lognormal variance with pedigree 0.7612, pedigree (2,3,5,1,4)
  Energy use and operation emisions
  Uncertainty: c
- Chromium VI [air, unspecified]: 3.44391e-12 kg; lognormal variance with pedigree 0.7612, pedigree (2,3,5,1,4)
  Energy use and operation emisions
  Uncertainty: c
- Copper ion [air, unspecified]: 2.78454e-7 kg; lognormal variance with pedigree 0.7612, pedigree (2,3,5,1,4)
  Energy use and operation emisions
  Uncertainty: c
- Dinitrogen monoxide [air, unspecified]: 8.48817e-7 kg; lognormal variance with pedigree 0.0992, pedigree (2,3,5,1,3)
  Energy use and operation emisions
  Uncertainty: H
- Formaldehyde [air, unspecified]: 3.33727e-6 kg; lognormal variance with pedigree 0.1512, pedigree (2,3,5,1,4)
  Energy use and operation emisions
  Uncertainty: c
- Lead II [air, unspecified]: 1.40382e-8 kg; lognormal variance with pedigree 0.6992, pedigree (2,3,5,1,3)
  Energy use and operation emisions
  Uncertainty: c
- Mercury II [air, unspecified]: 6.8879e-13 kg; lognormal variance with pedigree 0.7612, pedigree (2,3,5,1,4)
  Energy use and operation emisions
  Uncertainty: c
- Methane, fossil [air, unspecified]: 0.000192154 kg; lognormal variance with pedigree 0.0992, pedigree (2,3,5,1,3)
  Energy use and operation emisions
  Uncertainty: H
- NMVOC, non-methane volatile organic compounds [air, unspecified]: 0.00215027 kg; lognormal variance with pedigree 0.0992, pedigree (2,3,5,1,3)
  Energy use and operation emisions
  Uncertainty: H
- Nickel II [air, unspecified]: 4.59845e-9 kg; lognormal variance with pedigree 0.7612, pedigree (2,3,5,1,4)
  Energy use and operation emisions
  Uncertainty: c
- Nitrogen oxides [air, unspecified]: 0.000205109 kg; lognormal variance with pedigree 0.0992, pedigree (2,3,5,1,3)
  Energy use and operation emisions
  Uncertainty: H
- PAH, polycyclic aromatic hydrocarbons [air, unspecified]: 3.429e-10 kg; lognormal variance with pedigree 0.4112, pedigree (2,3,5,1,4)
  Energy use and operation emisions
  Uncertainty: c
- Particulate Matter, < 2.5 um [air, unspecified]: 1.45154e-5 kg; lognormal variance with pedigree 0.3592, pedigree (2,3,5,1,3)
  Energy use and operation emisions
  Uncertainty: H
- Particulate Matter, > 10 um [air, unspecified]: 6.81081e-6 kg; lognormal variance with pedigree 0.0992, pedigree (2,3,5,1,3)
  Energy use and operation emisions
  Uncertainty: H
- Particulate Matter, > 2.5 um and < 10um [air, unspecified]: 7.68545e-6 kg; lognormal variance with pedigree 0.1792, pedigree (2,3,5,1,3)
  Energy use and operation emisions
  Uncertainty: H
- Selenium IV [air, unspecified]: 3.44391e-10 kg; lognormal variance with pedigree 0.7612, pedigree (2,3,5,1,4)
  Energy use and operation emisions
  Uncertainty: c
- Sulfur dioxide [air, unspecified]: 3.66554e-7 kg; lognormal variance with pedigree 0.0592, pedigree (2,3,5,1,3)
  Energy use and operation emisions
  Uncertainty: H
- Toluene [air, unspecified]: 0.000252882 kg; lognormal variance with pedigree 0.0992, pedigree (2,3,5,1,3)
  Energy use and operation emisions
  Uncertainty: H
- Xylenes, unspecified [air, unspecified]: 0.000222545 kg; lognormal variance with pedigree 0.0992, pedigree (2,3,5,1,3)
  Energy use and operation emisions
  Uncertainty: H
- Zinc II [air, unspecified]: 1.16436e-7 kg; lognormal variance with pedigree 0.7612, pedigree (2,3,5,1,4)
  Energy use and operation emisions
  Uncertainty: c
- Cadmium II [soil, unspecified]: 5.45245e-11 kg; lognormal variance with pedigree 0.1512, pedigree (2,3,5,1,4)
  Energy use and operation emisions
  Uncertainty: c
- Chromium III [soil, unspecified]: 2.60036e-10 kg; lognormal variance with pedigree 0.1512, pedigree (2,3,5,1,4)
  Energy use and operation emisions
  Uncertainty: c
- Copper ion [soil, agricultural]: 3.649e-9 kg; lognormal variance with pedigree 0.1512, pedigree (2,3,5,1,4)
  Energy use and operation emisions
  Uncertainty: c
- Lead II [soil, unspecified]: 2.24391e-9 kg; lognormal variance with pedigree 0.1512, pedigree (2,3,5,1,4)
  Energy use and operation emisions
  Uncertainty: c
- Nickel II [soil, unspecified]: 7.04608e-10 kg; lognormal variance with pedigree 0.1512, pedigree (2,3,5,1,4)
  Energy use and operation emisions
  Uncertainty: c
- Zinc II [soil, unspecified]: 1.53991e-7 kg; lognormal variance with pedigree 0.1512, pedigree (2,3,5,1,4)
  Energy use and operation emisions
  Uncertainty: c
- Cadmium II [water, unspecified]: 5.45245e-11 kg; lognormal variance with pedigree 0.4112, pedigree (2,3,5,1,4)
  Energy use and operation emisions
  Uncertainty: c
- Chromium III [water, unspecified]: 2.60036e-10 kg; lognormal variance with pedigree 0.4112, pedigree (2,3,5,1,4)
  Energy use and operation emisions
  Uncertainty: c
- Copper ion [water, unspecified]: 3.649e-9 kg; lognormal variance with pedigree 0.4112, pedigree (2,3,5,1,4)
  Energy use and operation emisions
  Uncertainty: c
- Lead II [water, unspecified]: 2.24391e-9 kg; lognormal variance with pedigree 0.7612, pedigree (2,3,5,1,4)
  Energy use and operation emisions
  Uncertainty: c
- Nickel II [water, unspecified]: 7.04608e-10 kg; lognormal variance with pedigree 0.7612, pedigree (2,3,5,1,4)
  Energy use and operation emisions
  Uncertainty: c
- Zinc II [water, unspecified]: 1.53991e-7 kg; lognormal variance with pedigree 0.7612, pedigree (2,3,5,1,4)
  Energy use and operation emisions
  Uncertainty: c

## Sampling procedure
Literature and statistics

## Extrapolations
Some data extrapolated from motorcycle use
