# biomethane, low pressure burned in polymer electrolyte membrane fuel cell 2kWe, future

Dataset: EcoSpold 2, unit process
Geography: CH
Time period: 2000-01-01 to 2023-12-31
Technology level: current
Classification: EcoSpold01Categories: biomass/cogeneration
Classification: ISIC rev.4 ecoinvent: 35:Electricity, gas, steam and air conditioning supply
Synonyms: PEMFC; PEFC; polymer electrolyte fuel cell; proton exchange membrane fuel cell; Membran Brennstoffzelle; Polymer Elektrolyt Membran Brennstoffzelle
Tags: with true value; ConvertedDataset
Scenario: Business-as-Usual
System model: Allocation, cut-off by classification
Generated by: Alex Primas
Published in: Primas A. 2007
Database: ecoinvent
isCopyrightProtected: true
accessRestrictedTo: 1

## General comment
The multioutput-process 'biogas, burned in PEM fuel cell 2kWe delivers the coproducts 'heat, biogas, allocation exergy, at PEM fuel cell 2kWe' and 'electricity, biogas, allocation exergy, at PEM fuel cell 2kWe'. The exergy allocation is the allocation scheme suggested to be used within the ecoinvent database (e.g. in electricity mixes).
[This dataset was already contained in the ecoinvent database version 2. It was not individually updated during the transfer to ecoinvent version 3. Life Cycle Impact Assessment results may still have changed, as they are affected by changes in the supply chain, i.e. in other datasets. This dataset was generated following the ecoinvent quality guidelines for version 2. It may have been subject to central changes described in the ecoinvent version 3 change report (http://www.ecoinvent.org/database/ecoinvent-version-3/reports-of-changes/), and the results of the central updates were reviewed extensively. The changes added e.g. consistent water flows and other information throughout the database. The documentation of this dataset can be found in the ecoinvent reports of version 2, which are still available via the ecoinvent website. The change report linked above covers all central changes that were made during the conversion process.]

## Included activities end
The module includes fuel input, infrastructure and emissions to air.

## Geography
Biogas input modelled for conditions in Switzerland. Process applicable in central European conditions.

## Technology
polymer electrolyte membrane (PEM) fuel cell for stationary cogeneration. Performance, stack lifetime and catalyst use according to expected future values for a serial product. Operation with refined biogas from low pressure gas network. Electrical efficiency 32%, total efficiency 87%.

## Reference product
- electricity, low voltage: 1 kWh; By-product classification allocatable product; CPC 17100: Electrical energy; HS2017 271600: Electrical energy
  production volume 0.02 kWh; = 4*0.5%
    This is a placeholder value that does not reflect real-world production volumes. This dataset does not currently require a real-world production volume to work in the database framework, and no actual data were collected yet. This has no negative effect on the results of the ecoinvent database.
    The placeholder value of this dataset was calculated by scaling the placeholder value of the GLO dataset, using the Swiss average GDP share relative to the global GDP (based on constant 2017 international USD from 2015-2019, World Bank (2022)).
    Reference:
    World bank (2022). GDP, PPP (constant 2017 international $). https://data.worldbank.org/indicator/NY.GDP.MKTP.PP.KD (last accessed on 2022-05-17).
  property price 0.107 EUR2005
    Temporary price data. Calculated as 90% of purchasers price based on: IEA Key world energy statistics 2004 (www.iea.org/textbase/nppdf/free/2004/keyworld2004.pdf)
  properties: allocation factor 0.806828, carbon allocation 0 kg, carbon content 0, exergy 3.6 MJ, true value 0.0123776, true value relation 3.6

## Inputs from technosphere
- biomethane, low pressure: 9.0768 MJ
  properties: carbon content, non-fossil 0.695496, dry mass 0.0218341 kg, wet mass 0.0218341 kg
- fuel cell, polymer electrolyte membrane, 2kW electrical, future: 7.52639e-6 unit; lognormal variance with pedigree 0.3512, pedigree (2,3,5,1,1)
  Uncertainty of life time
  This exchange has an activity link directly to the producing activity because the product is primarily consumed in the same geographical area where it is produced.
- maintenance, polymer electrolyte membrane fuel cell, 2kW electrical: 0.000105373 unit; lognormal variance with pedigree 0.0412, pedigree (2,3,5,1,1)
  Uncertainty of maintenance cycle
  This exchange has an activity link directly to the producing activity because the product is primarily consumed in the same geographical area where it is produced.
- storage, 650 l mini CHP plant: 5.29858e-6 unit; lognormal variance with pedigree 0.3512, pedigree (2,3,5,1,1)
  (same comment as for fuel cell, polymer electrolyte membrane, 2kW electrical, future)

## Emissions to nature
- Carbon dioxide, non-fossil [air, urban air close to ground]: 0.506703 kg; lognormal variance with pedigree 0.0512, pedigree (2,5,5,5,1)
  Composition of biogas
- Carbon monoxide, non-fossil [air, urban air close to ground]: 1.54306e-5 kg; lognormal variance with pedigree 0.6912, pedigree (2,3,5,1,1)
  Estimate based on different references
- Methane, non-fossil [air, urban air close to ground]: 3.63072e-5 kg; lognormal variance with pedigree 0.1086, pedigree (4,3,5,1,1)
  Estimate based on few references
- NMVOC, non-methane volatile organic compounds [air, urban air close to ground]: 2.72304e-6 kg; lognormal variance with pedigree 0.0986, pedigree (4,3,5,1,1)
  Estimate based on different references
- Nitrogen oxides [air, urban air close to ground]: 1.17998e-5 kg; lognormal variance with pedigree 0.0812, pedigree (2,3,5,1,1)
  Estimate based on different references
- Particulate Matter, < 2.5 um [air, urban air close to ground]: 1.81536e-9 kg; lognormal variance with pedigree 0.388025, pedigree (4,4,5,2,3)
  Estimate based on one references
- Sulfur dioxide [air, urban air close to ground]: 4.99224e-6 kg; lognormal variance with pedigree 0.0512, pedigree (2,5,5,5,1)
  Composition of natural gas

## Sampling procedure
Literature data and manufacturer information

## Review by Rolf Frischknecht 2007-08-13
passed
none
