# peat production

Dataset: EcoSpold 2, unit process
Geography: NORDEL
Time period: 1983-01-01 to 2023-12-31
Technology level: current
Classification: ISIC rev.4 ecoinvent: 0892:Extraction of peat
Classification: EcoSpold01Categories: lignite/production
Tags: ConvertedDataset
Scenario: Business-as-Usual
System model: Allocation, cut-off by classification
Generated by: Christian Bauer
Published in: Röder, A. 2007
Database: ecoinvent
isCopyrightProtected: true
accessRestrictedTo: 1

## General comment
In first approximation same conditions as for open cast mine, lignite, RER, are assumed.
[This dataset was already contained in the ecoinvent database version 2. It was not individually updated during the transfer to ecoinvent version 3. Life Cycle Impact Assessment results may still have changed, as they are affected by changes in the supply chain, i.e. in other datasets. This dataset was generated following the ecoinvent quality guidelines for version 2. It may have been subject to central changes described in the ecoinvent version 3 change report (http://www.ecoinvent.org/database/ecoinvent-version-3/reports-of-changes/), and the results of the central updates were reviewed extensively. The changes added e.g. consistent water flows and other information throughout the database. The documentation of this dataset can be found in the ecoinvent reports of version 2, which are still available via the ecoinvent website. The change report linked above covers all central changes that were made during the conversion process.]

## Included activities end
The module quantifies the directly affected area, electricity requirements and some diesel for mining operation and the extraction of groundwater.

## Geography
No information.

## Technology
No specific information available.

## Parameters
- fraction, process water, to air: 0.15 dimensionless; name fraction_PW_to_air; lognormal variance with pedigree 0.092025, pedigree (4,4,3,2,4)
  Literature value. In case when no industry/process specific data are available, default evaporation fraction value is used. This value is 15% and is based on literature (Statistics Canada, 2007 & Shaffer, K.H., 2008, Consumptive water use in the Great Lakes Basin, USGS & Shiklomanov, 2003, World Water Resources at the Beginning of the 21st Century) and has been approved by an expert.

## Reference product
- peat: 1 kg; By-product classification allocatable product; CPC 11050: Peat; HS2017 270300: Peat; (including peat litter), whether or not agglomerated
  EcoSpold01Location=NORDEL
  production volume 0.0736804 kg
    This is a placeholder value that does not reflect real-world production volumes. This dataset does not currently require a real-world production volume to work in the database framework, and no actual data were collected yet. This has no negative effect on the results of the ecoinvent database. The placeholder value of this activity was scaled according to the nominal GDP of 2005 (source: United Nations, http://data.un.org/Glossary.aspx?q=GDP+%28current+US%24%29, accessed 20130726) to reflect an appropriate share of the global production volume, which is also a placeholder value.
  property carbon content, fossil 0.59
    C content of dry peat is 58-60% (specified in Tab 1.1, report 6, part VI). A mean content of 0.59 kg C/kg dry peat was considered.
  property heating value, net 10 MJ
    Indicative value. Reference: Nature and Management of Tropical Peat Soils, FAO Soils Bulletin 59, available at: http://www.fao.org/3/x5872e/x5872e00.htm#Contents
  property price 0.16 EUR2005
    Calculated value based on data from United Nations Commodity Trade Statistics Database (comtrade.un.org). UN comtrade category: 270300 Peat (including peat litter). Year 2005. Using exchange rate of 1EURO = 1.209 USD. Average of price of import into 5 main markets (EU, US, JP, IN and CN).
  properties: carbon allocation 0.2478 kg, carbon content 0.59, carbon content, non-fossil 0, dry mass 0.42 kg, water content 1.38095, water in wet mass 0.58 kg, wet mass 1 kg

## Inputs from technosphere
- diesel, burned in building machine: 0.015 MJ; lognormal variance with pedigree 0.16, pedigree (1,1,5,1,1)
  own assumption
  EcoSpold01Location=GLO
  properties: heating value, net 1 MJ
- electricity, high voltage: 0.00798015, 0.00439956, 0.00762029 kWh (3 suppliers, which the file names only by identifier); sum of these 0.02 kWh; lognormal variance with pedigree 0.16, pedigree (1,1,5,1,1)
  EcoSpold01Location=UCTE
  own assumption
- mine infrastructure, open cast, peat: 1e-11 unit; lognormal variance with pedigree 0.04, pedigree (1,1,5,1,1)
  EcoSpold01Location=NORDEL
  per definition

## Inputs from nature
- Occupation, mineral extraction site [natural resource, land]: 0.0011 m2*year; lognormal variance with pedigree 0.34, pedigree (1,1,5,1,1)
  own assumption
- Peat [natural resource, biotic]: 1 kg; lognormal variance with pedigree 0.04, pedigree (1,1,5,1,1)
  per definition
- Transformation, from mineral extraction site [natural resource, land]: 3.7e-5 m2; lognormal variance with pedigree 0.34, pedigree (1,1,5,1,1)
  own assumption
- Transformation, from unspecified [natural resource, land]: 3.7e-5 m2; lognormal variance with pedigree 0.34, pedigree (1,1,5,1,1)
  own assumption
- Transformation, to annual crop [natural resource, land]: 3.7e-5 m2; lognormal variance with pedigree 0.34, pedigree (1,1,5,1,1)
  own assumption
- Transformation, to mineral extraction site [natural resource, land]: 3.7e-5 m2; lognormal variance with pedigree 0.34, pedigree (1,1,5,1,1)
  own assumption
- Water, well, in ground [natural resource, in water]: 0.0035 m3; name water_well_in_ground_input; lognormal variance with pedigree 0.16, pedigree (1,1,5,1,1)
  own assumption

## Emissions to nature
- Methane, fossil [air, non-urban air or from high stacks]: 0.00023 kg; lognormal variance with pedigree 0.16, pedigree (1,1,5,1,1)
  own assumption
- Particulate Matter, > 10 um [air, non-urban air or from high stacks]: 0.0004 kg; lognormal variance with pedigree 0.16, pedigree (1,1,5,1,1)
  own assumption
- Radon-222 [air, non-urban air or from high stacks]: 0.003 kBq; lognormal variance with pedigree 0.69, pedigree (1,1,5,1,1)
  own assumption
- Water [air, unspecified]: 0.000525 m3; name water_to_air_unspecified; = (water_well_in_ground_input*fraction_PW_to_air); lognormal variance with pedigree 0.0807, pedigree (2,2,5,1,1)
  Calculated value based on literature values and expert opinion. See comments in the parametres' comment field.
  property fraction, origin: fresh water 1; name fraction_origin_fresh_water
  property fraction, origin: salt water 0; name fraction_origin_salt_water
  property fraction, origin: unspecified 0; name fraction_origin_unspecified
- Iron ion [water, ground-]: 0.0016 kg; lognormal variance with pedigree 0.16, pedigree (1,1,5,1,1)
  own assumption
- Solids, inorganic [water, ground-]: 0.0035 kg; lognormal variance with pedigree 0.16, pedigree (1,1,5,1,1)
  own assumption
- Sulfate [water, ground-]: 0.0033 kg; lognormal variance with pedigree 0.16, pedigree (1,1,5,1,1)
  own assumption
- Water [water, unspecified]: 0.002975 m3; name water_to_water_unspecified; = water_well_in_ground_input*(1-fraction_PW_to_air); lognormal variance with pedigree 0.0807, pedigree (2,2,5,1,1)
  (same comment as for Water)
  property carbon content, fossil 0; name C_content_fossil
  property carbon content, non-fossil 0; name C_content_non_fossil
  property dry mass 0 kg; name DM
  property fraction, origin: fresh water 1; name fraction_origin_fresh_water_Ww
  property fraction, origin: salt water 0; name fraction_origin_salt_water_Ww
  property fraction, origin: unspecified 0; name fraction_origin_unspecified_Ww
  property water in wet mass 1000 kg; name WWM
  property wet mass 1000 kg; name WM

## Sampling procedure
literature

## Extrapolations
see Geography/Text

## Review by Hans-Jörg Althaus 2003-09-23
passed
