# diesel, import from Europe

Dataset: EcoSpold 2, unit process
Geography: CH
Time period: 2000-01-01 to 2023-12-31
Technology level: old
Classification: ISIC rev.4 ecoinvent: 1920:Manufacture of refined petroleum products
Scenario: Business-as-Usual
System model: Allocation, cut-off by classification
Generated by: Carl Vadenbo
Published in: Jungbluth, N. 2018
Database: ecoinvent
isCopyrightProtected: true
accessRestrictedTo: 1

## General comment
This dataset represents the import of a refined petroleum product (diesel) from Europe (without Switzerland) into Switzerland. The quality of diesel imported is assumed to generally have a lower sulfur content ('diesel, low sulfur'). This dataset for 'diesel' should only be considered a proxy activity (withoug a real annual production volume) to enable the same share of import to be reflected in the supply of 'diesel' for older activities in the database that are modelled with this diesel quality as an input.

## Included activities start
This activity starts with the supply of the finished petroleum product from petroleum refinery operation in Europe without Switzerland.

## Included activities end
This activity covers the transport requirements for import of the finished petroleum product to Switzerland. Only transport of the product to Switzerland is considered here, whereas losses and infrastructure requirements during the import activities are omitted.

## Geography
Switzerland

## Reference product
- diesel: 1 kg; name RP_amount; By-product classification allocatable product; CPC 33360: Gas oil; HS2017 271019: Petroleum oils and oils from bituminous minerals, not containing biodiesel, not crude, not waste oils; prep[...]; CAS 68334-30-5
  production volume 1 kg
    Diesel generally assumed to be imported with a lower sulfur content due to legal requirements. No actual production volume assigned to this proxy import activitiy for 'diesel'.
  property calculation property, kg 0 kg
    Mass output. Defined here for use in the combined production calculations.
  property carbon content, fossil 0.865
    C-content of diesel is 86.5% (ecoinvent v2.2 report 6_IV, Tab 3.14)
  property price 0.37 EUR2005
    Temporary price data. Calculated as 90% of purchasers price based on: Source: International Energy Agency (http://wds.iea.org/WDS/TableViewer/tableView.aspx downloaded 4 July 2009) for Germany and excl. taxes, applying diesel density of 0.844 kg/litre
  properties: carbon allocation 0.865 kg, carbon content 0.865, carbon content, non-fossil 0, dry mass 1 kg, heating value, net 42.8 MJ, water content 0, water in wet mass 0 kg, wet mass 1 kg

## Inputs from technosphere
- diesel: 1 kg
  A direct link is set to petroleum refinery operation in Europe without Switzerland for consistency with modelling found in v2.2.
  properties: carbon content, fossil 0.865, dry mass 1 kg, heating value, net 42.8 MJ, wet mass 1 kg
  note on carbon content, fossil: C-content of diesel is 86.5% (ecoinvent v2.2 report 6_IV, Tab 3.14)
- transport, freight train: 0.281 metric ton*km; source Jungbluth, N. 2007; lognormal variance with pedigree 0.1221, pedigree (3,2,1,1,1)
  Amount based on transport requirements for import of mineral oil products from Europe to Switzerland for the year 2016, in Jungbluth & Meili (2018), table 8.1. Reference: Jungbluth, N. & Meili, C. (2018) Life cycle inventories of oil products - final report. ESU-services Ltd. Available from: https://esu-services.ch/data/public-lci-reports/
- transport, freight, inland waterways, barge tanker: 0.263 metric ton*km; source Jungbluth, N. 2007; lognormal variance with pedigree 0.1221, pedigree (3,2,1,1,1)
  (same comment as for transport, freight train)
- transport, freight, lorry, unspecified: 0.044 metric ton*km; source Jungbluth, N. 2007; lognormal variance with pedigree 0.1221, pedigree (3,2,1,1,1)
  (same comment as for transport, freight train)
- transport, pipeline, onshore, petroleum: 0.069 metric ton*km; source Jungbluth, N. 2007; lognormal variance with pedigree 0.1221, pedigree (3,2,1,1,1)
  (same comment as for transport, freight train)

## Sampling procedure
Transport distances were sourced from Jungbluth & Meili (2018) Life cycle inventories of oil products distribution, table 8.1, which where based on estimated distances and modes of transport from the main countries of origin in 2016. The annual gross import (i.e., production volume of the activity) to Switzerland was taken from Swiss energy statistics for 2022 (BFE 2023. Schweizerische Gesamtenergiestatistik 2022, table 21. Available from: https://www.bfe.admin.ch/bfe/de/home/versorgung/statistik-und-geodaten/energiestatistiken/gesamtenergiestatistik.html/)
