# sealing tape production, aluminium/PE, 50 mm wide

Dataset: EcoSpold 2, unit process
Geography: RoW
Time period: 2003-01-01 to 2023-12-31
Technology level: current
Classification: ISIC rev.4 ecoinvent: 2220:Manufacture of plastics products
Classification: EcoSpold01Categories: ventilation/production of components
Tags: ConvertedDataset
Scenario: Business-as-Usual
System model: Allocation, cut-off by classification
Generated by: Alex Primas
Published in: Hässig, W. 2007
Database: ecoinvent
isCopyrightProtected: true
accessRestrictedTo: 1

## General comment
Production of a typical component used for a ventilation system in a multi family house. The house considered in the investigation includes 6 flats with 130 m2 floor area each and a ventilation rate of 120 m3/h.
[This dataset was already contained in the ecoinvent database version 2. It was not individually updated during the transfer to ecoinvent version 3. Life Cycle Impact Assessment results may still have changed, as they are affected by changes in the supply chain, i.e. in other datasets. This dataset was generated following the ecoinvent quality guidelines for version 2. It may have been subject to central changes described in the ecoinvent version 3 change report (http://www.ecoinvent.org/database/ecoinvent-version-3/reports-of-changes/), and the results of the central updates were reviewed extensively. The changes added e.g. consistent water flows and other information throughout the database. The documentation of this dataset can be found in the ecoinvent reports of version 2, which are still available via the ecoinvent website. The change report linked above covers all central changes that were made during the conversion process.]

## Included activities end
Materials used for the production. Estimation of electricity use for the different production steps. Energy use for heating of the production building. Transport of raw materials to the plant. Estimation for the Infrastructure of the Production site included.

## Geography
Data for production in Germany used.

## Technology
Tape made of Polyethylene, laminated with aluminium foil and acrylic glue as adherent layer. Weight 0.057 kg/m

## Time period
Materials investigated in 2003

## Reference product
- sealing tape, aluminium/PE, 50 mm wide: 1 m; By-product classification allocatable product; CPC 36920: Self-adhesive plates, sheets, film, foil, tape, strip and other flat shapes, of plastics; HS2017 391910: Plastics; plates, sheets, film, foil, tape, strip, other flat shapes thereof, self-adhesive, in rolls of a [...]
  EcoSpold01Location=RER
  production volume 2.67763 m
    This is a placeholder value that does not reflect real-world production volumes. This dataset does not currently require a real-world production volume to work in the database framework, and no actual data were collected yet. This has no negative effect on the results of the ecoinvent database.
  property carbon content, fossil 0.707644
    C content calculated as the addition of the C contents in the final product components (Tape made of Polyethylene, laminated with aluminium foil and acrylic glue as adherent layer)
  property price 0.226 EUR2005
    From UN trade-database. Import data. (USD/kg). Category: Rubberised textile adhesive tape < 20cm wide. Weight per meter 0.057 kg
  properties: carbon allocation 0.0403357 kg, carbon content 0.707644, carbon content, non-fossil 0, dry mass 0.057 kg, water content 0, water in wet mass 0 kg, wet mass 0.057 kg

## Inputs from technosphere
- acrylic binder, with water, in 54% solution state: 0.065 kg; lognormal variance with pedigree 0.074, pedigree (3,4,5,5,3)
  EcoSpold01Location=RER
  Questionnaire, estimations
  Uncertainty: Questionnaire, estimations
  properties: carbon content, fossil 0.643752, dry mass 0.54 kg, heating value, net 18.18 MJ, water content 0.851852, wet mass 1 kg
  note on carbon content, fossil: The carbon content was calculated from the carbon content of the inputs.
- aluminium, wrought alloy: 0.00567 kg; lognormal variance with pedigree 0.0546, pedigree (2,4,5,5,1)
  Questionnaire
  EcoSpold01Location=RER
  Uncertainty: Questionnaire
  properties: dry mass 1 kg, wet mass 1 kg
- electricity, medium voltage: 0.00022698, 0.00452774, 0.00152131, 6.95091e-5, 1.39122e-5, 2.98725e-6, 0.00046756 kWh (7 suppliers, which the file names only by identifier); sum of these 0.00683 kWh; lognormal variance with pedigree 0.11, pedigree (3,5,5,5,3)
  Data estimated from related processes
  EcoSpold01Location=UCTE
  Uncertainty: Data estimated from related processes
- heat, district or industrial, natural gas: 0.00182767, 0.111222 MJ (2 suppliers, which the file names only by identifier); sum of these 0.11305 MJ; lognormal variance with pedigree 0.078, pedigree (4,5,5,5,1)
  EcoSpold01Location=RER
  Data estimated from related companies
  Uncertainty: Data estimated from related companies
  properties: heating value, net 1 MJ
- heat, district or industrial, other than natural gas: 0.112998, 5.23497e-5 MJ (2 suppliers, which the file names only by identifier); sum of these 0.11305 MJ; lognormal variance with pedigree 0.072, pedigree (1,1,5,5,1)
  4,5,1,1,1,5; Data estimated from related companies
  EcoSpold01Location=RER
  properties: heating value, net 1 MJ
- laminating service, foil, with acrylic binder: 0.05 m2; lognormal variance with pedigree 0.074, pedigree (3,4,5,5,3)
  Questionnaire, approximation for technology
  EcoSpold01Location=RER
  Uncertainty: Questionnaire, approximation for technology
- packaging film, low density polyethylene: 0.00157 kg; lognormal variance with pedigree 0.056, pedigree (3,4,5,5,1)
  EcoSpold01Location=RER
  Questionnaire, estimations
  Uncertainty: Questionnaire, estimations
  properties: carbon content, fossil 0.857143, dry mass 1 kg, heating value, net 42.47 MJ, wet mass 1 kg
  note on carbon content, fossil: Polyethylene is formed out of a huge amount of ethylene monomers (C2H4) (ecoinvent v2.2 report 11_II). MW=28 g/mol
- sheet rolling, aluminium: 0.00567 kg; lognormal variance with pedigree 0.056, pedigree (3,4,5,5,1)
  Questionnaire, estimations
  EcoSpold01Location=RER
  Uncertainty: Questionnaire, estimations
- ventilation components factory: 2.28e-10 unit; lognormal variance with pedigree 0.396, pedigree (4,5,5,5,3)
  Calculated with data of a similar company
  EcoSpold01Location=RER
  Uncertainty: Calculated with data of a similar company
- waste paint: -0.015 kg; lognormal variance with pedigree 0.032, pedigree (4,4,1,5,1)
  Estimations on precentage material disposed
  EcoSpold01Location=CH
  Uncertainty: Estimations on precentage material disposed
  production volume
    Calculated from the production volume of sealing tape, aluminum/PE, 50 mm wide in proportion to the respective output amounts.
  properties: carbon content, fossil 0.65, dry mass 1 kg, heating value, net 19.7 MJ, wet mass 1 kg
  note on carbon content, fossil: Tab A.5, ecoinvent v2.2 report 13_I. C content has been calculated after data in the tables, and then referred to 1 kg DM
- waste polyethylene: -4.76274e-9, -1.21432e-8, -5.01556e-9, -9.18367e-10, -7.47934e-5, -2.02623e-9, -1.8174e-7 kg (7 suppliers, which the file names only by identifier); sum of these -7.5e-5 kg; lognormal variance with pedigree 0.032, pedigree (4,4,1,5,1)
  EcoSpold01Location=CH
  Estimations on precentage material disposed
  Uncertainty: Estimations on precentage material disposed
  production volume
    (same comment as for waste paint)
  properties: carbon content, fossil 0.825301, dry mass 0.996 kg, heating value, net 42.47 MJ, water content 0.00401606, wet mass 1 kg
  note on carbon content, fossil: C content in 1 kg DM was calculated using data in Tab A.1, ecoinvent v2.2 report 13_I
  note on heating value, net: Value taken from the general comment of the treatment dataset.

## Sampling procedure
Technical information of producer. Data of one common product used.

## Extrapolations
none This dataset has been copied from an original dataset covering the geography RER. The uncertainty has been adjusted accordingly.

## Review by Rolf Frischknecht 2007-08-16
passed
none
