# packaging glass production, white

Dataset: EcoSpold 2, unit process
Geography: RER w/o CH+DE
Time period: 2000-01-01 to 2023-12-31
Technology level: old
Classification: ISIC rev.4 ecoinvent: 2310:Manufacture of glass and glass products
Classification: EcoSpold01Categories: glass/packaging
Tags: ConvertedDataset
Scenario: Business-as-Usual
System model: Allocation, cut-off by classification
Generated by: Roland Hischier
Published in: Hischier R. 2007
Database: ecoinvent
isCopyrightProtected: true
accessRestrictedTo: 1

## General comment
This dataset represents the production of 1 kg of white packaging glass from a mix of primary and secondary raw materials.
[This dataset was already contained in the ecoinvent database version 2. It was not individually updated during the transfer to ecoinvent version 3. Life Cycle Impact Assessment results may still have changed, as they are affected by changes in the supply chain, i.e. in other datasets. This dataset was generated following the ecoinvent quality guidelines for version 2. It may have been subject to central changes described in the ecoinvent version 3 change report (http://www.ecoinvent.org/database/ecoinvent-version-3/reports-of-changes/), and the results of the central updates were reviewed extensively. The changes added e.g. consistent water flows and other information throughout the database. The documentation of this dataset can be found in the ecoinvent reports of version 2, which are still available via the ecoinvent website. The change report linked above covers all central changes that were made during the conversion process.]
CO2 emissions have been recalculated from the carbon content in raw materials and fuels.
Material inputs are estimation based on literature sources and a Swiss production site. Energy and water consumption, emissions, and waste production are estimation based on literature sources. Infrastructure is an estimation based on average European packaging glass factories.

## Included activities start
From the reception of precursors silica sand, soda, unsorted glass cullets, limestone, dolomite, feldspar, and chemicals inorganics at the factory gate.

## Included activities end
This activity ends with the production of 1 kg of white packaging glass. The dataset includes material and energy inputs, water consumption, emissions to air and water, waste production, transport and infrastructure.

## Geography
average European situation, based on information from EU-IPPC BAT document about the glass industry

## Technology
Packaging glass is produced in a two stage moulding process with pressing and blowing techniques. The whole process is fully automatic and consists of five different stages:
1. Production of a molten glass piece (gob) with correct weight and temperature.
2. Forming of the primary shape in a first mould (blank mould) with compressed air pressure
3. Transfer to the final mould (finish mould)
4. Bringing the shaping process to an end by blowing the container with compressed air until the shape of the final mould
5. Post forming processes
The melting process is the central one. As the first glass forming material, sand, has a very high melting point. Soda as a fluxing agent is used to reduce the melting temperature. When heating soda, this is decomposed into sodium oxide Na2O, the actual fluxing agent, and into carbon dioxide that is released. Metal oxides in form of limestone (CaCO3 that decomposes to CaO), dolomite (-> Ca- and Mg-Oxides), feldspar are used as stabilizators and therefore to improve the hardness and chemical resistance of glass. For white glass decolouring agents are added.

## Parameters
- fraction, process water, to air: 0.111111 dimensionless; name fraction_PW_to_air; lognormal variance with pedigree 0.092025, pedigree (4,4,3,2,4)
  Literature value (Statistics Canada, 2007 & Shaffer, K.H., 2008, Consumptive water use in the Great Lakes Basin, USGS) (Vionnet, S., Quantis Water Database - Technical Report, 2012).

## Reference product
- packaging glass, white: 1 kg; name RP_amount_1; By-product classification allocatable product; CPC 37191: Bottles, jars, phials and other containers, of glass, of a kind used for the conveyance or packing of goods, e[…]; HS2017 701020: Glass; stoppers, lids and other closures
  production volume 1.28078e10 kg; name RP_PV_1
    Total production in 2000: 29 Mio t
    Proportion 60% of clear glass, estimated from data in http://www.caregroup.org.uk/glassrep.pdf. Total amount from www.feve.org
  property price 0.386081 EUR2005
    Calculated based on inputs: The price of the product has been calculated as a sum of the values of the material and energy inputs for this product. This value is therefore a rough estimation. It may underestimate the real price since there are additional expenses when producing any product. These expences can include for example labour costs, treatment of waste materials and profit for the producer. Please consider carefully whether this level of data quality is acceptable for your application.
  properties: carbon allocation 0 kg, carbon content 0, carbon content, fossil 0, carbon content, non-fossil 0, dry mass 1 kg, water content 0, water in wet mass 0 kg, wet mass 1 kg

## Inputs from technosphere
- EUR-flat pallet: 0.000787 unit; source European Commission 2000; lognormal variance with pedigree 0.0521, pedigree (1,4,5,3,1)
  EcoSpold01Location=RER
  Literature value: average european value from literature value
  Uncertainty: estimation from data of 1 European producer
  properties: carbon content, fossil 0.0311351, carbon content, non-fossil 0.58833, dry mass 18.3333 kg, heating value, net 335.11 MJ, water content 0.2, wet mass 22 kg
  note on carbon content, fossil: C content in components of the pallet (ecoinvent v2.2 report 7_part XVIII)
- chemical, inorganic: 0.022 kg; lognormal variance with pedigree 0.0581, pedigree (1,2,5,1,3)
  EcoSpold01Location=GLO
  Estimation: it is a first approximation of all auxiliaries. The material composition is based on a packaging glass production site in Switzerland own by a large European company.
  Uncertainty: average value from EU-IPPC report
  properties: carbon content, fossil 0.003, dry mass 1 kg, wet mass 1 kg
  note on carbon content, fossil: This dataset is an unweighted average of 20 inorganic substances (listed in Tab 88.1, ecoinvent v2.2 report 8, part II), being part of the top100 chemicals included in this database. The C-content has also been calculated as an unweighted average of the C content of the substances composing this dataset.
- dolomite: 0.0527 kg; source European Commission 2000; lognormal variance with pedigree 0.0581, pedigree (1,2,5,1,3)
  Estimation: the material composition is based on german and swiss production sites. The total amount for european production is from literature source.
  EcoSpold01Location=RER
  Uncertainty: average value from DE & CH datasets
  properties: carbon content, fossil 0.130435, dry mass 1 kg, heating value, net 3.95 MJ, wet mass 1 kg
- electricity, medium voltage: 0.000892021, 0.00133526, 0.000421822, 0.00785172, 0.00460837, 0.00546367, 0.000737742, 0.0124692, 0.00279899, 0.0198254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 kWh (38 suppliers, which the file names only by identifier); sum of these 0.244 kWh; source European Commission 2000; lognormal variance with pedigree 0.0581, pedigree (1,2,5,1,3)
  EcoSpold01Location=UCTE
  Literature value: average european value from literature source.
  Uncertainty: average value from EU-IPPC report
- feldspar: 0.0226 kg; source European Commission 2000; lognormal variance with pedigree 0.0581, pedigree (1,2,5,1,3)
  (same comment as for dolomite)
  properties: dry mass 1 kg, wet mass 1 kg
- glass cullet, sorted: 0.605 kg
  properties: dry mass 1 kg, wet mass 1 kg
- heavy fuel oil: 0.0433 kg; name heavy_fuel; source European Commission 2000; lognormal variance with pedigree 0.0581, pedigree (1,2,5,1,3)
  EcoSpold01Location=RER
  Estimation: reported total amount of energy required per glass melted from literature source. Average european mix of 50% fuel oil and 50% natural gas estimated based on literature source. Light fuel oil and heavy fuel oil at equal parts.
  Uncertainty: average value from EU-IPPC report
  property carbon content, fossil 0.849; name C_in_heavy_fuel
  properties: dry mass 1 kg, heating value, net 41.2 MJ, wet mass 1 kg
- light fuel oil: 0.0419 kg; name light_fuel; source European Commission 2000; lognormal variance with pedigree 0.0581, pedigree (1,2,5,1,3)
  Estimation: reported total amount of energy required per glass melted from literature source. Average european mix of 50% fuel oil and 50% natural gas estimated based on literature source. Light fuel oil and heavy fuel oil at equal parts.
  EcoSpold01Location=RER
  Uncertainty: average value from EU-IPPC report
  property carbon content, fossil 0.862; name C_in_light_fuel
  properties: dry mass 1 kg, heating value, net 42.6 MJ, wet mass 1 kg
- lime: 0.0415 kg; source European Commission 2000; lognormal variance with pedigree 0.0581, pedigree (1,2,5,1,3)
  EcoSpold01Location=CH
  Estimation: the material composition is based on german and swiss production sites. The total amount for european production is from literature source.
  Uncertainty: average value from DE & CH datasets
  properties: carbon content, fossil 0.120005, dry mass 1 kg, wet mass 1 kg
- municipal solid waste: -0.000199438, -1.23144e-5, -8.10849e-6, -2.18552e-5, -9.64471e-5, -6.25877e-5, -1.4557e-5, -5.64307e-5, -0.000744233, -0.000141769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 kg (34 suppliers, which the file names only by identifier); sum of these -0.0055 kg; source European Commission 2000; lognormal variance with pedigree 0.0181, pedigree (1,2,1,1,3)
  Literature value: average european value from literature source.
  EcoSpold01Location=CH
  Uncertainty: average value from EU-IPPC report
  production volume; = RP_PV_1 * (BP_amount_1 / RP_amount_1)
    Calculated from production volume of reference product using the relative outputs.
  properties: carbon content, fossil 0.171549, carbon content, non-fossil 0.261655, dry mass 0.771 kg, heating value, net 11.74 MJ, water content 0.297017, wet mass 1 kg
  note on carbon content, fossil: MSW composition in tab 4.1, ecoinvent v2.2 report 13_I. C content referred to 1 kg DM
  note on heating value, net: Value taken from the general comment of the treatment dataset.
- natural gas, high pressure: 0.00414475, 0.00252901, 0.017284, 0.00759661, 0.00528801, 0.0012289, 0.00144799, 0.00950992, 0.00117107, 0.000266863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 m3 (19 suppliers, which the file names only by identifier); sum of these 0.0915385 m3; source European Commission 2000; lognormal variance with pedigree 0.0581, pedigree (1,2,5,1,3)
  Estimation: reported total amount of energy required per glass melted from literature source. Average european mix of 50% fuel oil and 50% natural gas estimated based on literature source.
  EcoSpold01Location=RER
  Uncertainty: average value from EU-IPPC report
  properties: carbon content, fossil 0.602381, dry mass 0.84 kg, heating value, gross 40 MJ, heating value, net 36 MJ, wet mass 0.84 kg
  note on carbon content, fossil: An average C content of 0.506 kg C/ m3 has been assumed (this average has been calculated using data in Tab 3.5, ecoinvent v2.2 report 6_V
  note on heating value, net: Literature value, Source: Christoph Meili;Niels Jungbluth;Maresa Bussa (2021) Life cycle inventories of crude oil and natural gas extraction. ESU-services Ltd. commissioned by BAFU & VSG, Schaffhausen, Switzerland, http://esu-services.ch/data/public-lci-reports/
- packaging glass factory: 1.25e-10 unit; lognormal variance with pedigree 0.4921, pedigree (5,4,5,3,4)
  EcoSpold01Location=RER
  Estimation: infrastructure represents an average packaging glass factory in Europe.
  Uncertainty: own estimation
- polyethylene, high density, granulate: 0.0129 kg; lognormal variance with pedigree 0.0521, pedigree (1,4,5,3,1)
  EcoSpold01Location=RER
  Estimation: estimation based on a packaging glass production site in Switzerland own by a large European company.
  Uncertainty: estimation from data of 1 European producer
  properties: carbon content, fossil 0.857143, dry mass 1 kg, heating value, net 42.47 MJ, wet mass 1 kg
  note on carbon content, fossil: Polyethylene is formed out of a huge amount of ethylene monomers (C2H4) (ecoinvent v2.2 report 11_II). MW=28 g/mol
- refractory, fireclay, packed: 0.0143 kg; source European Commission 2000; lognormal variance with pedigree 0.0581, pedigree (1,2,5,1,3)
  EcoSpold01Location=DE
  Estimation: it includes all minor raw materials. The total amount for european production is from literature source.
  Uncertainty: average value from EU-IPPC report
  properties: dry mass 1 kg, wet mass 1 kg
- silica sand: 0.248 kg; source European Commission 2000; lognormal variance with pedigree 0.0581, pedigree (1,2,5,1,3)
  Estimation: the material composition is based on german and swiss production sites. The total amount for european production is from literature source.
  EcoSpold01Location=DE
  Uncertainty: average value from DE & CH datasets
  properties: dry mass 0.99 kg, water content 0.010101, wet mass 1 kg
- soda ash, light: 0.0725 kg; name soda; source European Commission 2000; lognormal variance with pedigree 0.0581, pedigree (1,2,5,1,3)
  EcoSpold01Location=RER
  Estimation: the material composition is based on german and swiss production sites. The total amount for european production is from literature source.
  Uncertainty: average value from DE & CH datasets
  properties: carbon content, fossil 0.0517241, dry mass 1 kg, heating value, net 3.43 MJ, wet mass 1 kg
- solid bleached and unbleached board carton: 0.0193 kg; source European Commission 2000; lognormal variance with pedigree 0.0521, pedigree (1,4,5,3,1)
  Estimation: distribution per weight to the different glass types (white, green, and brown) based on a packaging glass production site in Switzerland own by a large European company. The total amount for european production is from literature source.
  EcoSpold01Location=RER
  Uncertainty: estimation from data of 1 European producer
  properties: carbon content, fossil 0.0190874, carbon content, non-fossil 0.327779, dry mass 0.945 kg, heating value, net 9.8 MJ, water content 0.0582011, wet mass 1 kg
- wastewater from glass production: -0.00176 m3; name wastewater_output; source European Commission 2000; lognormal variance with pedigree 0.0181, pedigree (1,2,1,1,3)
  (same comment as for municipal solid waste)
  production volume; = RP_PV_1 * (wastewater_output / RP_amount_1)
    Calculated from production volume of reference product using the relative outputs.
  properties: carbon content, fossil 0.0455242, dry mass 1.09356 kg, water content 913.443, wet mass 1000 kg
  note on carbon content, fossil: COD= 0.115 kg/m3 (Tab A.18, ecoinvent v2.2 report 13_I). COD was converted to TOC, using conversion factors in Tab 4.10 (ecoinvent v2.2 report 13_IV). TOC was considered as Total Carbon.

## Inputs from nature
- Water, unspecified natural origin [natural resource, in water]: 0.00198 m3; name water_UNO_input; source European Commission 2000; lognormal variance with pedigree 0.0581, pedigree (1,2,5,1,3)
  Literature value: average european value from literature source.
  Uncertainty: average value from EU-IPPC report

## Emissions to nature
- Antimony ion [air, urban air close to ground]: 6.74e-8 kg; lognormal variance with pedigree 0.7021, pedigree (1,4,5,3,1)
  Estimation: from a glass packaging factory in Switzerland own by a large European company.
  Uncertainty: estimation from data of 1 European producer
- Arsenic ion [air, urban air close to ground]: 6.74e-8 kg; lognormal variance with pedigree 0.7021, pedigree (1,4,5,3,1)
  (same comment as for Antimony ion)
- Cadmium II [air, urban air close to ground]: 6.74e-8 kg; lognormal variance with pedigree 0.7021, pedigree (1,4,5,3,1)
  (same comment as for Antimony ion)
- Carbon dioxide, fossil [air, urban air close to ground]: 0.539333 kg; = (gas* C_in_gas+heavy_fuel* C_in_heavy_fuel+light_fuel* C_in_light_fuel)*44/12+soda*44/106+lime*44/100+dolomite*88/215; source European Commission 2000; lognormal variance with pedigree 0.0581, pedigree (1,2,5,1,3)
  Literature value: average european value from literature source. It includes a mix of 32% secondary and 68% primary abatment technology.
  Uncertainty: average value from EU-IPPC report
- Chromium III [air, urban air close to ground]: 6.74e-8 kg; lognormal variance with pedigree 0.7021, pedigree (1,4,5,3,1)
  (same comment as for Antimony ion)
- Cobalt II [air, urban air close to ground]: 6.74e-8 kg; lognormal variance with pedigree 0.7021, pedigree (1,4,5,3,1)
  (same comment as for Antimony ion)
- Copper ion [air, urban air close to ground]: 6.74e-8 kg; lognormal variance with pedigree 0.7021, pedigree (1,4,5,3,1)
  (same comment as for Antimony ion)
- Hydrochloric acid [air, urban air close to ground]: 4.97e-5 kg; source European Commission 2000; lognormal variance with pedigree 0.1081, pedigree (1,2,5,1,3)
  (same comment as for Carbon dioxide, fossil)
- Hydrogen fluoride [air, urban air close to ground]: 1.8e-5 kg; source European Commission 2000; lognormal variance with pedigree 0.1081, pedigree (1,2,5,1,3)
  (same comment as for Carbon dioxide, fossil)
- Lead II [air, urban air close to ground]: 7.72e-7 kg; lognormal variance with pedigree 0.7021, pedigree (1,4,5,3,1)
  (same comment as for Antimony ion)
- Manganese II [air, urban air close to ground]: 6.74e-8 kg; lognormal variance with pedigree 0.7021, pedigree (1,4,5,3,1)
  (same comment as for Antimony ion)
- Nickel II [air, urban air close to ground]: 6.74e-8 kg; lognormal variance with pedigree 0.7021, pedigree (1,4,5,3,1)
  (same comment as for Antimony ion)
- Nitrogen oxides [air, urban air close to ground]: 0.0021 kg; source European Commission 2000; lognormal variance with pedigree 0.1081, pedigree (1,2,5,1,3)
  (same comment as for Carbon dioxide, fossil)
- Particulate Matter, < 2.5 um [air, urban air close to ground]: 0.000252 kg; source Berdowski J. 2002; lognormal variance with pedigree 0.3681, pedigree (1,2,5,1,3)
  Calculated value: total amount based on literature value (EU Commission, 2000). Distribution of particulate mater was calculated according to the ratio for the paricle distribution of combustion processes present in the literature source assuming a mix of 32% secondary and 68% primary abatment technology.
  Uncertainty: total from EU-IPPC report, split up according to US-EPA
- Particulate Matter, > 10 um [air, urban air close to ground]: 1.6e-5 kg; source Berdowski J. 2002; lognormal variance with pedigree 0.1081, pedigree (1,2,5,1,3)
  (same comment as for Particulate Matter, < 2.5 um)
- Particulate Matter, > 2.5 um and < 10um [air, urban air close to ground]: 1.3e-5 kg; source Berdowski J. 2002; lognormal variance with pedigree 0.1881, pedigree (1,2,5,1,3)
  Calculated value: total amount based on literature value (EU comission 2000). Distribution of particulate mater was calculated according to the ratio for the paricle distribution of combustion processes present in the literature source assuming a mix of 32% secondary and 68% primary abatment technology.
  Uncertainty: total from EU-IPPC report, split up according to US-EPA
- Selenium IV [air, urban air close to ground]: 7.33e-6 kg; lognormal variance with pedigree 0.7021, pedigree (1,4,5,3,1)
  (same comment as for Antimony ion)
- Sulfur dioxide [air, urban air close to ground]: 0.00344 kg; source European Commission 2000; lognormal variance with pedigree 0.0581, pedigree (1,2,5,1,3)
  (same comment as for Carbon dioxide, fossil)
- Water [air, unspecified]: 0.00022 m3; name water_to_air_unspecified; = (water_UNO_input*fraction_PW_to_air); lognormal variance with pedigree 0.0807, pedigree (2,2,5,1,1)
  Calculated value based on literature values and expert opinion. See comments in the parametres' comment field.
  property fraction, origin: fresh water 0; name fraction_origin_fresh_water
  property fraction, origin: salt water 0; name fraction_origin_salt_water
  property fraction, origin: unspecified 1; name fraction_origin_unspecified

## Sampling procedure
Average values from the ranges indicated in EC IPPC-BAT document are used

## Extrapolations
Input material mix is approximated by the respective material mix for Germany and Switzerland.

## Review by Hans-Jörg Althaus 2003-08-20
passed

## Review by Roland Hischier 2011-11-29
Transfer of documentation done.

## Review by Emilia Moreno Ruiz 2013-07-22
restructuring of the "glass cullet, sorted" supply chain
