# transport, passenger train

Dataset: EcoSpold 2, unit process
Geography: BE
Time period: 2000-01-01 to 2023-12-31
Technology level: current
Classification: ISIC rev.4 ecoinvent: 4911:Passenger rail transport, interurban
Classification: EcoSpold01Categories: transport systems/train
Scenario: Business-as-Usual
System model: Allocation, cut-off by classification
Share of production covered: 1 %
Generated by: Michael Spielmann (obsolete)
Published in: Spielmann M. 2007
Database: ecoinvent
isCopyrightProtected: true
accessRestrictedTo: 1

## General comment
The dataset represents the entire transport life cycle of a passenger train in Belgium. Data of the energy use and operation emissions for the operation of average trains in Belgium (regional trains, S-Bahn, long distance-trains), the data has been determined top down by International Rail Statistics. Particulate emissions due to abrasion of rail tracks, wheels, brakes and overhead contact line is included according to Swiss situation. Emission of sulphur hexafluoride (SF6) occurring during conversion at traction substations are accounted for.

## Included activities start
The dataset starts with the production of a long-distance train.

## Included activities end
The dataset ends with the service of transporting 1 passenger over a distance of 1 km by a long-distance train. The dataset includes the production, the maintenance and the energy use and operation emissions of a long-distance train, the construction of a railway track. The inventory of the energy use and operation emissions includes the actual energy consumption (11000 t Diesel and 1121 GWh of electricity) due to traction of passenger trains.

## Geography
Data of energy use and operation emissions refers to average transport conditions

## Technology
Demand factors of various transport components required to fulfill the functional unit of one pkm. In order to account for the fact that the same rail tracks are used for both passenger and goods transportation are applied allocation factors. For the energy use and operation emissions data, all technologies are included, the train is operated with the country electricity mix.

## Time period
For the energy use and operation emissions data, all data is based on situation in the year 2000, except the specific energy consumption per pkm (year 2007)

## Reference product
- transport, passenger train: 1 person*km; By-product classification allocatable product; CPC 641: Local transport and sightseeing transportation services of passengers
  EcoSpold01Location=BE
  production volume 9.15e9 person*km
    9932 Mio. pkm in 2007
    UIC statistical synopsis 2005 http://www.uic.org/IMG/xls/synth2005-2.xls
  property price 0.0208844 EUR2005
    Calculated based on inputs: The price of the product has been calculated as a sum of the values of the material and energy inputs for this product. This value is therefore a rough estimation. It may underestimate the real price since there are additional expenses when producing any product. These expences can include for example labour costs, treatment of waste materials and profit for the producer. Please consider carefully whether this level of data quality is acceptable for your application.
  properties: carbon allocation 0 kg, carbon content 0

## Inputs from technosphere
- diesel: 0.0011075 kg; lognormal variance with pedigree 0.0413, pedigree (2,3,5,3,1)
  Energy use and operation emissions
  Uncertainty: International Rail study
  properties: carbon content, fossil 0.865, dry mass 1 kg, heating value, net 42.8 MJ, wet mass 1 kg
  note on carbon content, fossil: C-content of diesel is 86.5% (ecoinvent v2.2 report 6_IV, Tab 3.14)
- electricity, high voltage: 0.11287 kWh; lognormal variance with pedigree 0.0413, pedigree (2,3,5,3,1)
  Energy use and operation emissions
  Uncertainty: International Rail study
- maintenance, train, passenger, long distance: 4.0624e-10 unit; lognormal variance with pedigree 0.05, pedigree (1,1,5,1,1)
  Calculated value, required to fulfill the functional unit of one pkm.
- railway track: 0.00010354 m*year; lognormal variance with pedigree 0.05, pedigree (1,1,5,1,1)
  Calculated value, required to fulfill the functional unit of one pkm.
  EcoSpold01Location=CH
- train, passenger, long-distance: 4.0624e-10 unit; lognormal variance with pedigree 0.05, pedigree (1,1,5,1,1)
  (same comment as for railway track)

## Emissions to nature
- Ammonia [air, unspecified]: 2.2085e-8 kg; lognormal variance with pedigree 0.0993, pedigree (2,3,5,3,3)
  Energy use and operation emissions
  Uncertainty: International Rail study
- Benzene [air, unspecified]: 1.1075e-7 kg; lognormal variance with pedigree 0.1793, pedigree (2,3,5,3,3)
  Energy use and operation emissions
  Uncertainty: handbook emission factors for HGV
- Cadmium II [air, unspecified]: 1.1075e-11 kg; lognormal variance with pedigree 0.716025, pedigree (4,5,5,2,1)
  Energy use and operation emissions
  Uncertainty: expert estimate quoted from literature
- Carbon dioxide, fossil [air, unspecified]: 0.0034846 kg; lognormal variance with pedigree 0.0413, pedigree (2,3,5,3,1)
  Energy use and operation emissions
  Uncertainty: International Rail study
- Carbon monoxide, fossil [air, unspecified]: 1.7505e-5 kg; lognormal variance with pedigree 0.6913, pedigree (2,3,5,3,1)
  Energy use and operation emissions
  Uncertainty: International Rail study
- Chromium III [air, unspecified]: 5.5458e-11 kg; lognormal variance with pedigree 0.716025, pedigree (4,5,5,2,1)
  Energy use and operation emissions
  Uncertainty: expert estimate quoted from literature
- Copper ion [air, unspecified]: 1.8813e-9 kg; lognormal variance with pedigree 0.716025, pedigree (4,5,5,2,1)
  Energy use and operation emissions
  Uncertainty: expert estimate quoted from literature
- Dinitrogen monoxide [air, unspecified]: 1.1075e-7 kg; lognormal variance with pedigree 0.0993, pedigree (2,3,5,3,3)
  Energy use and operation emissions
  Uncertainty: International Rail study
- Lead II [air, unspecified]: 1.2188e-13 kg; lognormal variance with pedigree 0.716025, pedigree (4,5,5,2,1)
  Energy use and operation emissions
  Uncertainty: expert estimate quoted from literature
- Mercury II [air, unspecified]: 2.2085e-14 kg; lognormal variance with pedigree 0.716025, pedigree (4,5,5,2,1)
  Energy use and operation emissions
  Uncertainty: expert estimate quoted from literature
- Methane, fossil [air, unspecified]: 1.4396e-7 kg; lognormal variance with pedigree 0.0993, pedigree (2,3,5,3,3)
  Energy use and operation emissions
  Uncertainty: handbook emission factors for HGV
- NMVOC, non-methane volatile organic compounds [air, unspecified]: 5.6113e-6 kg; lognormal variance with pedigree 0.0993, pedigree (2,3,5,3,3)
  Energy use and operation emissions
  Uncertainty: handbook emission factors for HGV
- Nickel II [air, unspecified]: 7.7544e-11 kg; lognormal variance with pedigree 0.716025, pedigree (4,5,5,2,1)
  Energy use and operation emissions
  Uncertainty: expert estimate quoted from literature
- Nitrogen oxides [air, unspecified]: 6.0857e-5 kg; lognormal variance with pedigree 0.0813, pedigree (2,3,5,3,1)
  Energy use and operation emissions
  Uncertainty: International Rail study
- Particulate Matter, < 2.5 um [air, unspecified]: 1.4209e-6 kg; lognormal variance with pedigree 0.3527, pedigree (3,3,5,3,1)
  Energy use and operation emissions
  Uncertainty: own calculation base on PM figures of int. Rail study
- Particulate Matter, > 10 um [air, unspecified]: 1.1614e-5 kg; lognormal variance with pedigree 0.0827, pedigree (3,3,5,3,1)
  (same comment as for Particulate Matter, < 2.5 um)
- Particulate Matter, > 2.5 um and < 10um [air, unspecified]: 1.0608e-5 kg; lognormal variance with pedigree 0.1627, pedigree (3,3,5,3,1)
  (same comment as for Particulate Matter, < 2.5 um)
- Selenium IV [air, unspecified]: 1.1075e-11 kg; lognormal variance with pedigree 0.716025, pedigree (4,5,5,2,1)
  Energy use and operation emissions
  Uncertainty: expert estimate quoted from literature
- Sulfur dioxide [air, unspecified]: 6.6419e-7 kg; lognormal variance with pedigree 0.0413, pedigree (2,3,5,3,1)
  Energy use and operation emissions
  Uncertainty: European railway study
- Sulfur hexafluoride [air, unspecified]: 4.9662e-9 kg; lognormal variance with pedigree 0.108025, pedigree (3,5,5,2,3)
  Energy use and operation emissions
  Uncertainty: literature
- Toluene [air, unspecified]: 4.4334e-8 kg; lognormal variance with pedigree 0.1807, pedigree (3,3,5,3,3)
  Energy use and operation emissions
  Uncertainty: handbook emission factors for HGV
- Xylenes, unspecified [air, unspecified]: 4.4334e-8 kg; lognormal variance with pedigree 0.1807, pedigree (3,3,5,3,3)
  Energy use and operation emissions
  Uncertainty: handbook emission factors for HGV
- Zinc II [air, unspecified]: 1.1075e-9 kg; lognormal variance with pedigree 0.716025, pedigree (4,5,5,2,1)
  Energy use and operation emissions
  Uncertainty: expert estimate quoted from literature
- Iron ion [soil, unspecified]: 2.8132e-5 kg; lognormal variance with pedigree 0.46, pedigree (5,5,5,5,5)
  Energy use and operation emissions
  Uncertainty: own calculation based on literature

## Sampling procedure
International railway statistics

## Extrapolations
see Technology and Geography

## Review by Christian Bauer 2010-02-07
passed

## Review by Roland Hischier 2011-09-28
Transfer of documentation done.

## Review by Carl Vadenbo 2012-06-29
In preparation for the release of ecoinvent v3.0, the datasets 'operation, average train BE' and 'transport, average train BE' in ecoinvent v2.2 were merged into the dataset 'transport, passenger train, BE 2008'. The amounts of the exchanges were reviewed and were found to correspond to the disaggregated datasets. The field Included Activities End and the uncertainty information need to be revised before subsequent releases of the database. Despite this shortcoming, the new dataset was accepted for inclusion into the ecoinvent database on 2012.07.04.
