# treatment of used vegetable cooking oil, purification

Dataset: EcoSpold 2, unit process
Geography: FR
Time period: 2003-01-01 to 2023-12-31
Technology level: current
Classification: ISIC rev.4 ecoinvent: 3830:Materials recovery
Classification: EcoSpold01Categories: biomass/fuels
Synonyms: pure vegetable oil; vegetable oil; SVO; straight vegetable oil
Tags: ConvertedDataset
Scenario: Business-as-Usual
System model: Allocation, cut-off by classification
Share of production covered: 0 %
Generated by: Edgard Gnansounou
Published in: Jungbluth N. 2007
Database: ecoinvent
isCopyrightProtected: true
accessRestrictedTo: 1

## General comment
Treated vegetable oil consists of 93.7% triglycerides and 6.7% fatty acid methyl ester. Process refers to the acid-catalysed esterification of free fatty acids and includes water removal, glycerine washing and methanol recovery.
[This dataset was already contained in the ecoinvent database version 2. It was not individually updated during the transfer to ecoinvent version 3. Life Cycle Impact Assessment results may still have changed, as they are affected by changes in the supply chain, i.e. in other datasets. This dataset was generated following the ecoinvent quality guidelines for version 2. It may have been subject to central changes described in the ecoinvent version 3 change report (http://www.ecoinvent.org/database/ecoinvent-version-3/reports-of-changes/), and the results of the central updates were reviewed extensively. The changes added e.g. consistent water flows and other information throughout the database. The documentation of this dataset can be found in the ecoinvent reports of version 2, which are still available via the ecoinvent website. The change report linked above covers all central changes that were made during the conversion process.]

## Included activities end
This process includes the collection of waste vegetable oil and delivery to the treatment plant, treatment for impurities and water removal, conditioning and storage of the oil. Treatment of effluents is taken into account. Includes also the gross calorific value of the biomass and the carbon dioxide credit. System boundary is at the oil refining facility.

## Geography
Data is mostly from one literature source (US), adapted to vegetable oil treatment in FR.

## Technology
Acid-catalysed esterification of free-fatty acids.

## Time period
Data from 2003, existing technology

## Parameters
- fraction, process water, to air: 0.15 dimensionless; name fraction_PW_to_air; lognormal variance with pedigree 0.092025, pedigree (4,4,3,2,4)
  Literature value. In case when no industry/process specific data are available, default evaporation fraction value is used. This value is 15% and is based on literature (Statistics Canada, 2007 & Shaffer, K.H., 2008, Consumptive water use in the Great Lakes Basin, USGS & Shiklomanov, 2003, World Water Resources at the Beginning of the 21st Century) and has been approved by an expert.
- fraction, tap water, to air: 0.15 dimensionless; name fraction_TW_to_air; = fraction_PW_to_air; lognormal variance with pedigree 0.092025, pedigree (4,4,3,2,4)
  Calculated value. See comment in the other parametres present in this dataset. Tap water is considered to be always used as process water, thus process water fractions to air are applied to all tap water input flows to calculate the amount of water consumed in the processes.

## Reference product
- used vegetable cooking oil, purified: 1 kg; name BP_amount_1; By-product classification Recyclable; CPC 39120: Bran and other residues from the working of cereals or legumes; vegetable materials and vegetable waste, veget[…]; HS2017 230800: Vegetable materials and vegetable waste, vegetable residues and by-products; whether or not in the form of [...]
  EcoSpold01Location=FR
  production volume 6.94307e7 kg; name BP_PV_1
    Not known
    Estimate based on Swiss situation (5 times the amount in Switzerland)
    Calculated from the production volume of used vegetable cooking oil in proportion to the respective output amounts.
  property carbon content, fossil 0.003
    The refined waste vegetable oil consists of 6.5% (wt.) of FAME and 93.5% (wt.) of triglycerides. The overall percentage weight of fossil carbon in the oil is 0.3% (wt.), corresponding to a 4.1% of fossil carbon in the 6.5% of FAME. The remaining carbon in the oil is biogenic carbon. (ecoinvent v2.2 report 17, pg 475)
  property carbon content, non-fossil 0.747
    (same comment as for used vegetable cooking oil, purified)
  property heating value, net 38.4 MJ
    Values is approximated from HHV from "vegetable oil, crude". Source: Radovanovic,M.; Zivanovic,T.; Stojiljkovic,D.; Jovanovic,V.; Jerinic,N.; Knezevic,S. et.al. Utilization of sunflower husk as a fuel for industrial boilers - 20 years experience. Proc. 5th Eur. Conf. on Industrial Furnaces&Boilers 2000,vol.2,p.221-233.
    Available at: https://phyllis.nl/Biomass/View/2152
  property price 0.362 EUR2005
    Temporary price data. Calculated as 90% of purchasers price based on: Assumed equal to palm oil
  properties: carbon allocation 0.75 kg, carbon content 0.75, dry mass 1 kg, water content 0, water in wet mass 0 kg, wet mass 1 kg

## Inputs from technosphere
- electricity, medium voltage: 0.050804 kWh; lognormal variance with pedigree 0.136025, pedigree (4,5,5,2,4)
  Data from transesterification process, considered weak
  EcoSpold01Location=FR
  Uncertainty: Data from transesterification process, considered weak
- glycerine: 0.1056 kg; lognormal variance with pedigree 0.130025, pedigree (4,4,5,2,4)
  EcoSpold01Location=FR
  Model data from one literature source
  Uncertainty: Model data from one literature source
  properties: carbon content, non-fossil 0.391304, dry mass 1 kg, heating value, net 18 MJ, wet mass 1 kg
  note on heating value, net: Based on literature, Report 17: Jungbluth, N., Chudacoff, M., Dauriat, A., Dinkel, F., Doka, G., Faist Emmenegger, M., Gnansounou, E., Kljun, N., Schleiss, K., Spielmann, M., Stettler, C., Sutter, J. 2007: Life Cycle Inventories of Bioenergy. ecoinvent report No. 17, Swiss Centre for Life Cycle Inventories, Dübendorf, CH.
- heat, district or industrial, natural gas: 0.77304 MJ; lognormal variance with pedigree 0.136025, pedigree (4,5,5,2,4)
  Data from transesterification process, from process modelling
  EcoSpold01Location=RER
  Uncertainty: Data from transesterification process, from process modelling
  properties: heating value, net 1 MJ
- methanol: 0.0269 kg; lognormal variance with pedigree 0.130025, pedigree (4,4,5,2,4)
  EcoSpold01Location=CH
  Model data from one literature source
  Uncertainty: Model data from one literature source
  properties: carbon content, fossil 0.375, dry mass 1 kg, heating value, net 20 MJ, wet mass 1 kg
  note on heating value, net: Based on literature, page 533, Report 17: Jungbluth, N., Chudacoff, M., Dauriat, A., Dinkel, F., Doka, G., Faist Emmenegger, M., Gnansounou, E., Kljun, N., Schleiss, K., Spielmann, M., Stettler, C., Sutter, J. 2007: Life Cycle Inventories of Bioenergy. ecoinvent report No. 17, Swiss Centre for Life Cycle Inventories, Dübendorf, CH.
- sulfuric acid: 0.0021 kg; lognormal variance with pedigree 0.130025, pedigree (4,4,5,2,4)
  EcoSpold01Location=RER
  Model data from one literature source
  Uncertainty: Model data from one literature source
  properties: dry mass 1 kg, wet mass 1 kg
- tap water: 0.140282 kg; name tap_water_input; lognormal variance with pedigree 0.090625, pedigree (4,4,5,2,4)
  Estimated value. Amount of tap water on the input is equal to the amount of wastewater plus losses (water to air).
  properties: carbon content, fossil 0.00178991, dry mass 0.000337476 kg, water content 2962.17, wet mass 1 kg
  note on carbon content, fossil: Bicarbonate content is 2.93 mol/m3. CO2 content is 0.1 mol/m3 (ecoinvent v2.2 report 8, Tab 93.1).
- used vegetable cooking oil: 1.0082 kg; name RP_amount_1
  Calculated from the transport distances provided in the original dataset.
  production volume; name RP_PV_1; = ABS( RP_amount_1/ BP_amount_1* BP_PV_1)
    Calculated value based on knowledge of the amount of used vegetable cooking oil which is being recycled.
  properties: carbon content, non-fossil 0.75, dry mass 1 kg, heating value, net 38.4 MJ, wet mass 1 kg
  note on carbon content, non-fossil: C content in fat is estimated to be 75% in dry mass (ecoinvent v2.2 report, n 15a, pg 40)
  note on heating value, net: Values is approximated from HHV from "vegetable oil, crude". Source: Radovanovic,M.; Zivanovic,T.; Stojiljkovic,D.; Jovanovic,V.; Jerinic,N.; Knezevic,S. et.al. Utilization of sunflower husk as a fuel for industrial boilers - 20 years experience. Proc. 5th Eur. Conf. on Industrial Furnaces&Boilers 2000,vol.2,p.221-233. Available at: https://phyllis.nl/Biomass/View/2152
- vegetable oil esterification facility: 9.0909e-10 unit; lognormal variance with pedigree 0.366025, pedigree (4,5,5,2,1)
  Oil refining facility modelled as esterification plant
  EcoSpold01Location=CH
  Uncertainty: Oil refining facility modelled as esterification plant
- wastewater, average: -0.00011924 m3; name BP_amount_2; lognormal variance with pedigree 0.298025, pedigree (5,5,1,2,5)
  Adapted from weak data from one literature source
  EcoSpold01Location=CH
  Uncertainty: Adapted from weak data from one literature source
  production volume; = ABS( BP_amount_2/ RP_amount_1* RP_PV_1)
    Calculated from the production volume of used vegetable cooking oil in proportion to the respective output amounts.
  properties: carbon content, non-fossil 0.194039, dry mass 0.346837 kg, mass concentration, TOC 0.1091 kg/m3, mass concentration, calcium 0.039453 kg/m3, mass concentration, chlorine 0.030031 kg/m3, mass concentration, hydrogen 0.013365 kg/m3, mass concentration, nitrogen 0.031015 kg/m3, mass concentration, oxygen 0.069824 kg/m3, mass concentration, sodium 0.06456 kg/m3, mass concentration, sulfur 0.015602 kg/m3, water content 2882.2, wet mass 1000 kg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
  note on carbon content, non-fossil: 0.0673 kg TOC/m3 (Tab A.17, ecoinvent v2.2 report 13_I). TOC was considered as Total Carbon.

## Inputs from nature
- Carbon dioxide, in air [natural resource, in air]: 2.8435 kg; lognormal variance with pedigree 0.066, pedigree (1,5,5,1,3)
  Calculated from composition of waste cooking oil
  Uncertainty: Calculated from composition of waste cooking oil

## Emissions to nature
- Carbon dioxide, non-fossil [air, urban air close to ground]: 0.16659 kg; lognormal variance with pedigree 0.1786, pedigree (4,5,5,5,5)
  Calculation, to close carbon balance
  Uncertainty: Calculation, to close carbon balance
- Water [air, unspecified]: 2.10424e-5 m3; name water_to_air_unspecified; = (tap_water_input/1000)*fraction_TW_to_air; lognormal variance with pedigree 0.130025, pedigree (4,4,5,2,4)
  Calculated value based on literature values and expert opinion. See comments in the parametres' comment field.
  property fraction, origin: fresh water 1; name fraction_origin_fresh_water
  property fraction, origin: salt water 0; name fraction_origin_salt_water
  property fraction, origin: unspecified 0; name fraction_origin_unspecified
- Oils, non-fossil [soil, industrial]: 0.0005 kg; lognormal variance with pedigree 0.126, pedigree (4,5,5,5,3)
  Losses 0.05% according to product properties
  Uncertainty: Losses 0.05% according to product properties
- BOD5, Biological Oxygen Demand [water, surface water]: 0.0035 kg; lognormal variance with pedigree 0.126, pedigree (4,5,5,5,3)
  Calculation, according to emissions of oil to soil
  Uncertainty: Calculation, according to emissions of oil to soil
- COD, Chemical Oxygen Demand [water, surface water]: 0.0035 kg; lognormal variance with pedigree 0.126, pedigree (4,5,5,5,3)
  (same comment as for BOD5, Biological Oxygen Demand)
- DOC, Dissolved Organic Carbon [water, surface water]: 0.00043261 kg; lognormal variance with pedigree 0.126, pedigree (4,5,5,5,3)
  (same comment as for BOD5, Biological Oxygen Demand)
- TOC, Total Organic Carbon [water, surface water]: 0.00043261 kg; lognormal variance with pedigree 0.126, pedigree (4,5,5,5,3)
  (same comment as for BOD5, Biological Oxygen Demand)

## Sampling procedure
Data mostly from one literature source (US).

## Review by Niels Jungbluth 2006-10-17
Passed.
none
