# stone groundwood pulp production

Dataset: EcoSpold 2, unit process
Geography: RoW
Time period: 1993-01-01 to 2023-12-31
Technology level: current
Classification: ISIC rev.4 ecoinvent: 1701:Manufacture of pulp, paper and paperboard
Classification: EcoSpold01Categories: paper & cardboard/pulps
Tags: ConvertedDataset
Scenario: Business-as-Usual
System model: Allocation, cut-off by classification
Generated by: Roland Hischier
Published in: Hischier R. 2007
Database: ecoinvent
isCopyrightProtected: true
accessRestrictedTo: 1

## General comment
[This dataset was already contained in the ecoinvent database version 2. It was not individually updated during the transfer to ecoinvent version 3. Life Cycle Impact Assessment results may still have changed, as they are affected by changes in the supply chain, i.e. in other datasets. This dataset was generated following the ecoinvent quality guidelines for version 2. It may have been subject to central changes described in the ecoinvent version 3 change report (http://www.ecoinvent.org/database/ecoinvent-version-3/reports-of-changes/), and the results of the central updates were reviewed extensively. The changes added e.g. consistent water flows and other information throughout the database. The documentation of this dataset can be found in the ecoinvent reports of version 2, which are still available via the ecoinvent website. The change report linked above covers all central changes that were made during the conversion process.]

## Included activities end
This module includes the production of bleached stone ground wood pulp (SGW) - including transports to the pulp mill, wood handling, mechanical pulping and bleaching, drying process, energy production on-site and internal waste water treatment.

## Geography
Data from a Swiss and a German LCA study used as European average data

## Technology
Modern average technology.

## Parameters
- fraction, process water, to air: 0.15 dimensionless; name fraction_PW_to_air; lognormal variance with pedigree 0.092025, pedigree (4,4,3,2,4)

## Reference product
- stone groundwood pulp: 1 kg; By-product classification allocatable product; CPC 32113: Mechanical wood pulp; semi-chemical wood pulp; pulps of fibrous cellulosic material other than wood; HS2017 470100: Wood pulp; mechanical wood pulp
  EcoSpold01Location=RER
  production volume 2.67763 kg
    This is a placeholder value that does not reflect real-world production volumes. This dataset does not currently require a real-world production volume to work in the database framework, and no actual data were collected yet. This has no negative effect on the results of the ecoinvent database.
  property carbon content, non-fossil 0.494
    C content of dry mass is 0.494 kgC/kg dry wood (ecoinvent v2.2 report 6_IX & ecoinvent v2.2 report 9). No other C containing products in the formulation of the pulp.
  property heating value, net 13.23 MJ
    LHV is calculated based on the Carbon content of the product. More details can be found on the respective documentation.
  property price 0.286 EUR2005
    Export prices for the World+ according to: http://faostat.fao.org/site/626/DesktopDefault.aspx?PageID=626#ancor downloaded 5 May 2009; calculated as export value divided by export volume.
  properties: carbon allocation 0.4446 kg, carbon content 0.494, carbon content, fossil 0, dry mass 0.9 kg, water content 0.111111, water in wet mass 0.1 kg, wet mass 1 kg

## Inputs from technosphere
- EDTA, ethylenediaminetetraacetic acid: 0.0025 kg; lognormal variance with pedigree 0.0706, pedigree (2,5,5,5,1)
  EcoSpold01Location=RER
  Average value from range indicated in IPPC
  Uncertainty: average value from range indicated in IPPC
  properties: carbon content, fossil 0.410959, dry mass 1 kg, heating value, net 19.09 MJ, wet mass 1 kg
- electricity, medium voltage: 0.0565622, 1.12829, 0.379102, 0.0173213, 0.00346684, 0.000744408, 0.116513 kWh (7 suppliers, which the file names only by identifier); sum of these 1.702 kWh; lognormal variance with pedigree 0.0432, pedigree (2,3,5,5,1)
  EcoSpold01Location=NORDEL
  Average data from SE-EPA and 1 CH LCA study
  Uncertainty: average data from SE-EPA and 1 CH LCA study
- heat, district or industrial, other than natural gas: 2.43869, 0.0011298 MJ (2 suppliers, which the file names only by identifier); sum of these 2.43982 MJ; lognormal variance with pedigree 0.0432, pedigree (2,3,5,5,1)
  Average data from SE-EPA and 1 CH LCA study
  EcoSpold01Location=RER
  Uncertainty: average data from SE-EPA and 1 CH LCA study
  properties: heating value, net 1 MJ
- hydrogen peroxide, without water, in 50% solution state: 0.015 kg; lognormal variance with pedigree 0.0706, pedigree (2,5,5,5,1)
  Average value from range indicated in IPPC
  EcoSpold01Location=RER
  Uncertainty: average value from range indicated in IPPC
  properties: dry mass 1 kg, heating value, net 7.13 MJ, wet mass 1 kg
- municipal solid waste: -1.00222e-6, -1.19009e-7, -7.40685e-7, -0.000565452, -8.32781e-8, -2.67308e-8, -6.04189e-8, -2.51526e-6 kg (8 suppliers, which the file names only by identifier); sum of these -0.00057 kg; lognormal variance with pedigree 0.0032, pedigree (2,3,1,5,1)
  EcoSpold01Location=CH
  Average swedish data from SE-EPA
  Uncertainty: average swedish data from SE-EPA
  production volume
    Calculated from the production volume of stone groundwood pulp in proportion to the respective output amounts.
  properties: carbon content, fossil 0.171549, carbon content, non-fossil 0.261655, dry mass 0.771 kg, heating value, net 11.74 MJ, water content 0.297017, wet mass 1 kg
  note on carbon content, fossil: MSW composition in tab 4.1, ecoinvent v2.2 report 13_I. C content referred to 1 kg DM
  note on heating value, net: Value taken from the general comment of the treatment dataset.
- pulp factory: 5e-11 unit; lognormal variance with pedigree 0.448, pedigree (4,5,5,5,5)
  Own assumption
  EcoSpold01Location=RER
  Uncertainty: own assumption
- sawlog and veneer log, softwood, measured as solid wood under bark: 1.082e-5, 0.00226025 m3 (2 suppliers, which the file names only by identifier); sum of these 0.00227107 m3; lognormal variance with pedigree 0.0432, pedigree (2,3,5,5,1)
  Average data from 1 CH and 1 DE LCA study
  EcoSpold01Location=NORDEL
  Uncertainty: average data from 1 CH and 1 DE LCA study
  properties: carbon content, non-fossil 0.494, dry mass 387.2 kg, heating value, net 4483.78 MJ, water content 0.7, wet mass 658.24 kg
  note on carbon content, non-fossil: C content of dry mass is 0.494 kgC/kg dry wood (ecoinvent v2.2 report 9)
  note on heating value, net: Value based on the dataset "softwood forestry, mixed species, sustainable forest management"The property is based on a value of 11.58MJ/kg
- scrap steel: -2.59e-5 kg; lognormal variance with pedigree 0.0032, pedigree (2,3,1,5,1)
  Average swedish data from SE-EPA
  EcoSpold01Location=CH
  Uncertainty: average swedish data from SE-EPA
  production volume
    (same comment as for municipal solid waste)
  properties: dry mass 1 kg, wet mass 1 kg
- sodium silicate, spray powder, 80%: 0.02 kg; lognormal variance with pedigree 0.0706, pedigree (2,5,5,5,1)
  (same comment as for EDTA, ethylenediaminetetraacetic acid)
  properties: dry mass 1 kg, wet mass 1 kg
- waste graphical paper: -1.64269e-7, -1.43638e-8, -5.78784e-8, -5.93574e-7, -1.07573e-6, -7.1987e-5, -1.07139e-7 kg (7 suppliers, which the file names only by identifier); sum of these -7.4e-5 kg; lognormal variance with pedigree 0.0032, pedigree (2,3,1,5,1)
  (same comment as for municipal solid waste)
  production volume
    (same comment as for municipal solid waste)
  properties: carbon content, non-fossil 0.454955, dry mass 0.888 kg, heating value, net 14.12 MJ, water content 0.126126, wet mass 1 kg
- waste plastic, mixture: -6.17547e-8, -5.86419e-8, -0.000230456, -2.2377e-6, -1.49514e-7, -2.49482e-8, -1.13075e-8 kg (7 suppliers, which the file names only by identifier); sum of these -0.000233 kg; lognormal variance with pedigree 0.0032, pedigree (2,3,1,5,1)
  (same comment as for municipal solid waste)
  production volume
    (same comment as for municipal solid waste)
  properties: carbon content, fossil 0.747344, dry mass 0.847 kg, heating value, net 30.79 MJ, water content 0.180638, wet mass 1 kg
  note on carbon content, fossil: C content in 1 kg DM was calculated using data in Tab A.2, ecoinvent v2.2 report 13_I
- waste textile, soiled: -2.41e-5 kg; lognormal variance with pedigree 0.0032, pedigree (2,3,1,5,1)
  (same comment as for municipal solid waste)
  production volume
    (same comment as for municipal solid waste)
  properties: carbon content, non-fossil 0.570519, dry mass 0.75 kg, heating value, net 14.45 MJ, water content 0.333333, wet mass 1 kg
  note on carbon content, non-fossil: C content of 1 kg DM was calculated after data in Tab A.4, ecoinvent v2.2 report 13_I,
- waste wood, untreated: -5.40831e-7, -1.4078e-8, -1.04909e-5, -1.92556e-7, -8.17066e-8, -1.29171e-7, -1.5508e-6 kg (7 suppliers, which the file names only by identifier); sum of these -1.3e-5 kg; lognormal variance with pedigree 0.0032, pedigree (2,3,1,5,1)
  (same comment as for municipal solid waste)
  production volume
    (same comment as for municipal solid waste)
  properties: carbon content, non-fossil 0.48632, dry mass 0.8 kg, heating value, net 13.99 MJ, water content 0.25, wet mass 1 kg
  note on carbon content, non-fossil: Tab A.4, ecoinvent v2.2 report 13_I. C content has been referred to 1 kg DM,
- wood ash mixture, pure: -0.00225 kg; lognormal variance with pedigree 0.0032, pedigree (2,3,1,5,1)
  (same comment as for municipal solid waste)
  production volume
    (same comment as for municipal solid waste)
  properties: carbon content, non-fossil 0.012, dry mass 1 kg, wet mass 1 kg

## Inputs from nature
- Water, unspecified natural origin [natural resource, in water]: 0.023 m3; name water_UNO_input; lognormal variance with pedigree 0.0432, pedigree (2,3,5,5,1)
  Average swedish data from SE-EPA
  Uncertainty: average swedish data from SE-EPA

## Emissions to nature
- Nitrogen oxides [air, urban air close to ground]: 0.000155 kg; lognormal variance with pedigree 0.0832, pedigree (2,3,5,5,1)
  Average swedish data from SE-EPA
  Uncertainty: average swedish data from SE-EPA
- Water [air, unspecified]: 0.00345 m3; name water_to_air_unspecified; lognormal variance with pedigree 0.0827, pedigree (2,2,5,5,1)
  Calculated value based on literature values and expert opinion. See comments in the parametres' comment field.
  property fraction, origin: fresh water 0; name fraction_origin_fresh_water
  property fraction, origin: salt water 0; name fraction_origin_salt_water
  property fraction, origin: unspecified 1; name fraction_origin_unspecified
- BOD5, Biological Oxygen Demand [water, surface water]: 0.0091 kg; lognormal variance with pedigree 0.0832, pedigree (2,3,5,5,1)
  Average swedish data from SE-EPA
  Uncertainty: average swedish data from SE-EPA
- COD, Chemical Oxygen Demand [water, surface water]: 0.0253 kg; lognormal variance with pedigree 0.0832, pedigree (2,3,5,5,1)
  Average swedish data from SE-EPA
  Uncertainty: average swedish data from SE-EPA
- DOC, Dissolved Organic Carbon [water, surface water]: 0.00937037 kg; lognormal variance with pedigree 0.0832, pedigree (2,3,5,5,1)
  Calculated as equal to TOC.
  Uncertainty: average swedish data from SE-EPA
- Nitrogen [water, surface water]: 8e-5 kg; lognormal variance with pedigree 0.0832, pedigree (2,3,5,5,1)
  Average swedish data from SE-EPA
  Uncertainty: average swedish data from SE-EPA
- Phosphorus [water, surface water]: 1e-5 kg; lognormal variance with pedigree 0.0832, pedigree (2,3,5,5,1)
  Average swedish data from SE-EPA
  Uncertainty: average swedish data from SE-EPA
- Suspended solids, unspecified [water, surface water]: 0.00135 kg; lognormal variance with pedigree 0.0832, pedigree (2,3,5,5,1)
  Average swedish data from SE-EPA
  Uncertainty: average swedish data from SE-EPA
- TOC, Total Organic Carbon [water, surface water]: 0.00937037 kg; lognormal variance with pedigree 0.0832, pedigree (2,3,5,5,1)
  Calculated by default as TOC (gC) = COD/2.7 (COD measured in g O2). Should more correctly be calculated from the carbon content of the specified emissions to water.
  Uncertainty: average swedish data from SE-EPA
- Water [water, unspecified]: 0.01955 m3; name water_to_water_unspecified; lognormal variance with pedigree 0.0827, pedigree (2,2,5,5,1)
  (same comment as for Water)
  property carbon content, fossil 0; name C_content_fossil
  property carbon content, non-fossil 0; name C_content_non_fossil
  property dry mass 0 kg; name DM
  property fraction, origin: fresh water 0; name fraction_origin_fresh_water_Ww
  property fraction, origin: salt water 0; name fraction_origin_salt_water_Ww
  property fraction, origin: unspecified 1; name fraction_origin_unspecified_Ww
  property water in wet mass 1000 kg; name WWM
  property wet mass 1000 kg; name WM

## Extrapolations
This dataset has been copied from an original dataset covering the geography RER. The uncertainty has been adjusted accordingly.

## Review by Hans-Jörg Althaus 2003-08-29
Passed
