# aluminium production, primary, liquid, Söderberg

Dataset: EcoSpold 2, unit process
Geography: RoW
Time period: 2015-01-01 to 2023-12-31
Technology level: current
Classification: ISIC rev.4 ecoinvent: 2420:Manufacture of basic precious and other non-ferrous metals
Classification: EcoSpold01Categories: metals/extraction
Scenario: Business-as-Usual
System model: Allocation, cut-off by classification
Share of production covered: 1 %
Generated by: Linlin Wu
Published in: International Aluminium Insitute 2015
Database: ecoinvent
isCopyrightProtected: false
accessRestrictedTo: 1

## General comment
This dataset represents the production of 1kg of liquid primary aluminium. Primary aluminium is produced by the The Hall-Héroult process, developed in 1886, and the sole industrial method for the smelting of primary aluminium. It involves passing a large electric current through a molten mixture of cryolite, alumina and aluminium fluoride to obtain pure, liquid aluminium metal. Direct current (DC) is fed into a line of electrolytic cells connected in series (a “potline”). While these cells, or “pots” and potlines vary in size and configuration from one plant to another, the fundamental electrochemical process is identical. Each pot is a large carbon-lined metal container, forming the negative electrode (cathode) in the cell. The cell contains an electrolytic bath of molten cryolite (Na3AlF6), maintained at a temperature of around 960 – 980°C, in which alumina powder (Al2O3) is dissolved. Aluminium fluoride (AlF3) is added to the solution to maintain optimal chemistry and lower the electrolyte’s freezing point. Large carbon blocks are suspended in the solution and serve as the positive electrode (anode). The electrical current passes from the carbon anodes via the bath to the carbon cathode cell lining. The current then passes to the anode of the next pot in series. As the electrical current passes through the solution, the dissolved alumina is split into molten aluminium (Al) and oxygen (O2). The oxygen consumes the carbon in the anode blocks to form carbon dioxide. The electrolytic reaction can be expressed as:
2Al2O3 + 3C → 4Al + 3CO2
There are two main types of aluminium smelting technology: Søderberg and prebake. The principal difference between the two is the type of anode used. Søderberg technology uses a continuous anode which is delivered to the pot in the form of a paste, and which bakes in the cell itself.
[This dataset is meant to replace the following datasets:]

## Included activities start
Unit process starts with the unloading of process materials to their storage areas on site.

## Included activities end
Includes:
* Recovery, preparation and handling of process materials
* Manufacture of major process equipment and infrastructure
* Process control activities (metal, bath, heat)
* maintenance and repair of plant and equipment
* treatment of process air, liquids and solids
The output of this unit process is hot metal transported to an ingot casting facility.

## Geography
Data mostly from global surveys by IAI.

## Reference product
- aluminium, primary, liquid: 1 kg; name aluminiumPrimaryLiquidSöderbergAmount; By-product classification allocatable product; CPC 41431: Unwrought aluminium; HS2017 7601: Aluminium; unwrought; CAS 7429-90-5
  production volume 4.4641e7 kg; name aluminiumPrimaryLiquidSöderbProdVolume
    2015 IAI data.
  properties: carbon allocation 0 kg, carbon content 0, carbon content, fossil 0, carbon content, non-fossil 0, dry mass 1 kg, price 3.67 EUR2005, water content 0, water in wet mass 0 kg, wet mass 1 kg

## Inputs from technosphere
- aluminium electrolysis facility: 1.5385e-10 unit; source Classen M. 2008; lognormal variance with pedigree 0.5, pedigree (5,5,5,5,5)
  Rough guess
  EcoSpold01Location=RER
  Uncertainty: rough guess
- aluminium fluoride: 0.0207 kg; source International Aluminium Insitute 2015; lognormal variance with pedigree 0.0092, pedigree (1,3,4,1,1)
  EcoSpold01Location=RER
  properties: dry mass 1 kg, wet mass 1 kg
- aluminium oxide, metallurgical: 2.105 kg; source International Aluminium Insitute 2015; lognormal variance with pedigree 0.0092, pedigree (1,3,4,1,1)
  properties: dry mass 1 kg, wet mass 1 kg
- anode, paste, for aluminium electrolysis: 0.515 kg; source International Aluminium Insitute 2015; lognormal variance with pedigree 0.0086, pedigree (1,1,4,1,1)
  properties: carbon content, fossil 0.868686, dry mass 1 kg, wet mass 1 kg
- blasting: 0.000402 kg; source Classen M. 2008; lognormal variance with pedigree 0.0414, pedigree (2,2,5,3,1)
  Value taken from cathode production process
- cast iron: 0.000804 kg; source Classen M. 2008; lognormal variance with pedigree 0.0414, pedigree (2,2,5,3,1)
  Value taken from cathode production process
  properties: carbon content, fossil 0.04, dry mass 1 kg, wet mass 1 kg
  note on carbon content, fossil: Cast iron is made by remelting pig iron in small furnaces (e.g. cupola furnaces or electric arc furnaces) and poured into moulds to make castings. It usually contains 2% to 6% carbon (ecoinvent v2.2 report 10_partII). An average content of 4% was considered
- cathode, for aluminium electrolysis: 0.00734 kg; source International Aluminium Insitute 2015; lognormal variance with pedigree 0.0092, pedigree (1,3,4,1,1)
  properties: carbon content, fossil 0.163928, dry mass 1 kg, wet mass 1 kg
- coke: 0.040678, 0.086322 MJ (2 suppliers, which the file names only by identifier); sum of these 0.127 MJ; source International Aluminium Institute 2007; lognormal variance with pedigree 0.0414, pedigree (2,2,5,3,1)
  Total carbon value taken from IAI (2007), but split between coke and bitumen based on older European mix in ecoinvent v2 dataset
  Uncertainty: Total carbon value quality high, but split between coke and bitumen based on older European mix in ecoinvent v2 dataset
  properties: carbon content, fossil 0.869149, dry mass 0.0328671 kg, heating value, net 28.6 MJ, water content 0.0638298, wet mass 0.034965 kg
  note on carbon content, fossil: 81.7% C and 6% water in wet mass (ecoinvent v2.1 report 6_VI Table 7.1)
- cryolite: 0.0016 kg; source International Aluminium Institute 2007; lognormal variance with pedigree 0.0413, pedigree (2,2,5,1,1)
  EcoSpold01Location=RER
  properties: dry mass 1 kg, wet mass 1 kg
- electricity, medium voltage, aluminium industry: 2.02242, 11.6689, 1.30365, 0.790559, 0.671434, 0.494059 kWh (6 suppliers, which the file names only by identifier); sum of these 16.951 kWh; source International Aluminium Insitute 2015; lognormal variance with pedigree 0.0086, pedigree (1,1,4,1,1)
  EcoSpold01Location=GLO
  data collected in IAI energy survey. http://www.world-aluminium.org/statistics/
- filter dust from Al electrolysis: -0.0179991, -8.66265e-7 kg (2 suppliers, which the file names only by identifier); sum of these -0.018 kg; source International Aluminium Insitute 2015; lognormal variance with pedigree 0.0012, pedigree (1,3,1,1,1)
  Used as a weak proxy for treatment of scrubber sludges
  production volume; = aluminiumPrimaryLiquidSöderbProdVolume * scrubberSludgeAmount / aluminiumPrimaryLiquidSöderbergAmount
    Calculated from production volume of reference product using the relative outputs.
  properties: carbon content, fossil 0.11586, dry mass 1 kg, wet mass 1 kg
- inert waste: -0.01877 kg; name inertWasteAmount; source International Aluminium Insitute 2015; lognormal variance with pedigree 0.0012, pedigree (1,3,1,1,1)
  Used as a proxy for waste alumina
  production volume; = aluminiumPrimaryLiquidSöderbProdVolume*inertWasteAmount/aluminiumPrimaryLiquidSöderbergAmount
    Calculated from the production volume of primary aluminium and output of waste per reference flow.
  properties: dry mass 1 kg, wet mass 1 kg
- inert waste, for final disposal: -0.00184201, -1.1992e-5 kg (2 suppliers, which the file names only by identifier); sum of these -0.001854 kg; = refracto_refractoryWasteToRecyclingAmo_0 +refracto_refractoryWasteToLandfillAmou_0; source International Aluminium Insitute 2015
  EcoSpold01Location=CH
  Amount includes both non-SPL refractory waste sent to landfill and recycled refractory waste. Currently, no recycling process exists in ecoinvent for refractory material, and hence these are modelled as sent to landfill.
  production volume; = aluminiumPrimaryLiquidSöderbProdVolume*refractoryWasteAmount
    (same comment as for inert waste)
  properties: amount of refractory material sent to landfill 0.000927 kg, amount of refractory material sent to recycling 0.000927 kg, dry mass 0.995 kg, water content 0.00502513, wet mass 1 kg
- pitch: 1.47803e-5, 7.28548e-6, 2.78521e-6, 2.11002e-5, 0.00186405 kg (5 suppliers, which the file names only by identifier); sum of these 0.00191 kg; source International Aluminium Institute 2013; lognormal variance with pedigree 0.0414, pedigree (2,2,5,3,1)
  (same comment as for coke)
  properties: carbon content, fossil 0.83, dry mass 1 kg, heating value, net 28 MJ, wet mass 1 kg
- refractory spent pot liner from Al electrolysis: -0.0021601, -0.0243399 kg (2 suppliers, which the file names only by identifier); sum of these -0.0265 kg; source International Aluminium Insitute 2015; lognormal variance with pedigree 0.0012, pedigree (1,3,1,1,1)
  Amount includes recycled SPL and landfilled SPL
  EcoSpold01Location=CH
  production volume; = aluminiumPrimaryLiquidSöderbProdVolume*SPLAmount/aluminiumPrimaryLiquidSöderbergAmount
    (same comment as for inert waste)
  properties: dry mass 1 kg, wet mass 1 kg
- refractory, fireclay, packed: 0.003395 kg; source International Aluminium Insitute 2015; lognormal variance with pedigree 0.0092, pedigree (1,3,4,1,1)
  Reported as refractory material in IAI survey.
  properties: dry mass 1 kg, wet mass 1 kg
- reinforcing steel: 0.0049 kg; source International Aluminium Insitute 2015; lognormal variance with pedigree 0.0092, pedigree (1,3,4,1,1)
  properties: carbon content, fossil 0.004, dry mass 1 kg, wet mass 1 kg
- scrap steel: -0.00563659, -3.41315e-6 kg (2 suppliers, which the file names only by identifier); sum of these -0.00564 kg; source International Aluminium Insitute 2015; lognormal variance with pedigree 0.0012, pedigree (1,3,1,1,1)
  production volume; = aluminiumPrimaryLiquidSöderbProdVolume*wasteSteelAmount/aluminiumPrimaryLiquidSöderbergAmount
    (same comment as for inert waste)
  properties: dry mass 1 kg, wet mass 1 kg
- waste asphalt: -2.18492e-6, -0.0453978 kg (2 suppliers, which the file names only by identifier); sum of these -0.0454 kg; = wasteCarbonAmo_recycledSPLCarbonAmount_0 +wasteCarbo_landfilledWasteCarbonAmount_0; source International Aluminium Insitute 2015
  Proxy for treatment of waste carbon. Reported as "SPL carbon for external recycling" and "Waste carbon or mix" in IAI report. Currently, no recycling process exists in ecoinvent for waste carbon, and hence these are modelled as sent to landfill.
  production volume; = aluminiumPrimaryLiquidSöderbProdVolume*wasteCarbonAmount/aluminiumPrimaryLiquidSöderbergAmount
    (same comment as for inert waste)
  properties: carbon content, fossil 0.0440796, dry mass 0.999 kg, landfilled waste carbon 0.0253 kg, recycled spent pot liner carbon 0.0201 kg, water content 0.001001, wet mass 1 kg
  note on carbon content, fossil: The waste contains 94.7% inert material (see Tab A.5 for details) 5.3% bitumen (see Tab A.6 for details), ecoinvent v2.2 report 13_I

## Inputs from nature
- Water, unspecified natural origin [natural resource, in water]: 0.02796 m3; source International Aluminium Insitute 2015; lognormal variance with pedigree 0.0092, pedigree (1,3,4,1,1)

## Emissions to nature
- Benzo(a)pyrene [air, unspecified]: 3e-6 kg; name BaPAmount; source International Aluminium Insitute 2015; lognormal variance with pedigree 0.3081, pedigree (1,2,4,1,1)
- Carbon dioxide, fossil [air, unspecified]: 1.4965 kg; source Classen M. 2008; lognormal variance with pedigree 0.042, pedigree (1,1,5,5,1)
- Carbon monoxide, fossil [air, unspecified]: 0.091708 kg; source Classen M. 2008; lognormal variance with pedigree 0.692, pedigree (1,1,5,5,1)
- Hexafluoroethane [air, unspecified]: 7.87e-6 kg; source International Aluminium Insitute 2015; lognormal variance with pedigree 0.0486, pedigree (1,3,4,1,1)
  Data collected in IAI Anode effect survey. http://www.world-aluminium.org/statistics/
- Hydrogen fluoride [air, unspecified]: 0.0011 kg; source International Aluminium Insitute 2015; lognormal variance with pedigree 0.0486, pedigree (1,3,4,1,1)
  Reported as F in IAI survey, including both Particulate fluoride and gaseous fluoride
- Nitrogen oxides [air, unspecified]: 0.00039 kg; source International Aluminium Insitute 2015; lognormal variance with pedigree 0.0381, pedigree (1,2,4,1,1)
- PAH, polycyclic aromatic hydrocarbons [air, unspecified]: 0.000277 kg; = totalPAH-BaPAmount; source International Aluminium Insitute 2015; lognormal variance with pedigree 0.3081, pedigree (1,2,4,1,1)
  property total PAH emission to air 0.00028 kg; name totalPAH
- Particulate Matter, < 2.5 um [air, unspecified]: 0.0008856 kg; = PM_total_1* PM2_5; source International Aluminium Insitute 2015; lognormal variance with pedigree 0.008, pedigree (1,1,4,1,1)
  IAI 2015 survey total particulates, weighted by split found in ecoinvent 2.0 dataset
  Uncertainty: Uncertainty based on that of underlying parameters.
  property ratio of total particulates less than 2.5 microns 0.36; name PM2_5; = 1.44/4
  property total particulates 0.00246 kg; name PM_total_1
- Particulate Matter, > 10 um [air, unspecified]: 0.000492 kg; = PM_total_2 *PM_greater_10um; source International Aluminium Insitute 2015; lognormal variance with pedigree 0.008, pedigree (1,1,4,1,1)
  (same comment as for Particulate Matter, < 2.5 um)
  property ratio pf particulates greater than 10 microns 0.2; name PM_greater_10um; = (4-3.2)/4
  property total particulates 0.00246 kg; name PM_total_2
- Particulate Matter, > 2.5 um and < 10um [air, unspecified]: 0.0010824 kg; = PM_total_3 * PM_btw_2_5_and_10um; source International Aluminium Insitute 2015; lognormal variance with pedigree 0.008, pedigree (1,1,4,1,1)
  (same comment as for Particulate Matter, < 2.5 um)
  property ratio of particulates between 2.5 and 10 microns 0.44; name PM_btw_2_5_and_10um; = (3.2-1.44)/4
  property total particulates 0.00246 kg; name PM_total_3
- Sulfur dioxide [air, unspecified]: 0.00836 kg; source International Aluminium Insitute 2015; lognormal variance with pedigree 0.0087, pedigree (1,2,4,1,1)
- Tetrafluoromethane [air, unspecified]: 0.000149 kg; source International Aluminium Insitute 2015; lognormal variance with pedigree 0.0486, pedigree (1,3,4,1,1)
  Data collected in IAI Anode effect survey. http://www.world-aluminium.org/statistics/
- Water [air, unspecified]: 0.00071 m3; source International Aluminium Insitute 2015; lognormal variance with pedigree 0.2106, pedigree (5,5,5,5,5)
  IAI data reported as "Fresh Water Consumption"
- Fluoride [water, unspecified]: 0.00135 kg; source International Aluminium Insitute 2015; lognormal variance with pedigree 0.0486, pedigree (1,3,4,1,1)
- Oils, unspecified [water, unspecified]: 1.7e-5 kg; source International Aluminium Institute 2013; lognormal variance with pedigree 0.0486, pedigree (1,3,4,1,1)
  No reporting in 2015 IAI survey
- PAH, polycyclic aromatic hydrocarbons [water, unspecified]: 6.68e-6 kg; source International Aluminium Insitute 2015; lognormal variance with pedigree 0.0486, pedigree (1,3,4,1,1)
  Reported as PAH (6 Borneff components)
- Suspended solids, unspecified [water, unspecified]: 0.002 kg; source International Aluminium Insitute 2015; lognormal variance with pedigree 0.0486, pedigree (1,3,4,1,1)
- Water [water, surface water]: 0.06722 m3; source International Aluminium Insitute 2015; lognormal variance with pedigree 0.0092, pedigree (1,3,4,1,1)
  property carbon content, fossil 0; name C_content_fossil
  property carbon content, non-fossil 0; name C_content_non_fossil
  property dry mass 0 kg; name DM
  property water in wet mass 1000 kg; name WWM
  property wet mass 1000 kg; name WM

## Sampling procedure
Most flows are based on IAI 2015 survey data.
A number of flows not covered by the surveys were inherited from the ecoinvent 2.2 dataset.
Total percent representativeness is based on 2015 LCI data, using 2015 production volumes. Reported percentage is about 20% of global soderberg production. Energy data collected from IAI 2015 energy survey covers 100% of soderberg production.

## Extrapolations
Survey global in scope.

## Review by Louis Brimacombe 2018-06-07
I have accepted the data sets which are all identical probably reported like this because of confidentiality issues but somewhere there should be a comment on how the average was arrived at and a comment on the data ranges. For example, were all the regions included in weighting the averages of all exchanges, maybe a comment on how mising data was dealt with.
