# grass seed production, organic, for sowing

Dataset: EcoSpold 2, unit process
Geography: RoW
Time period: 1995-01-01 to 2023-12-31
Technology level: current
Classification: ISIC rev.4 ecoinvent: 0164:Seed processing for propagation
Classification: EcoSpold01Categories: agricultural means of production/seed
Tags: ConvertedDataset
Scenario: Business-as-Usual
System model: Allocation, cut-off by classification
Share of production covered: 0 %
Generated by: Fredy Dinkel
Published in: Jungbluth N. 2007
Database: ecoinvent
isCopyrightProtected: true
accessRestrictedTo: 1

## General comment
Refers to 1 kg of grass seed (rye grass) from intensive organic production with water content of 10% The dry matter content of dried grains is 0.9 kg/kg. The grains contain 1.55 kg CO2 and 17.87 MJ per kg DM seed.
[This dataset was already contained in the ecoinvent database version 2. It was not individually updated during the transfer to ecoinvent version 3. Life Cycle Impact Assessment results may still have changed, as they are affected by changes in the supply chain, i.e. in other datasets. This dataset was generated following the ecoinvent quality guidelines for version 2. It may have been subject to central changes described in the ecoinvent version 3 change report (http://www.ecoinvent.org/database/ecoinvent-version-3/reports-of-changes/), and the results of the central updates were reviewed extensively. The changes added e.g. consistent water flows and other information throughout the database. The documentation of this dataset can be found in the ecoinvent reports of version 2, which are still available via the ecoinvent website. The change report linked above covers all central changes that were made during the conversion process.]

## Included activities end
The inventories include the production of organic grass seed on a temporary meadow and its further processing and storage. Included steps are soil cultivation, fertilisation (cattle slurry and manure), harvest, transport, processing, drying and storage.

## Geography
Refers to a production in the Swiss plateau (lowlands <700m).

## Technology
Intensive organic production.

## Reference product
- grass seed, organic, for sowing: 1 kg; By-product classification allocatable product; CPC 01940: Beet seeds (excluding sugar beet seeds) and seeds of forage plants; HS2017 120999: Seeds; n.e.c. in heading 1209, of a kind used for sowing
  EcoSpold01Location=CH
  production volume 1.34317e7 kg
    Calculated from a yield of 13800 million kg and 0.00098765 kg seed / kg output
  property price 0.240643 EUR2005
    Calculated based on inputs: The price of the product has been calculated as a sum of the values of the material and energy inputs for this product. This value is therefore a rough estimation. It may underestimate the real price since there are additional expenses when producing any product. These expences can include for example labour costs, treatment of waste materials and profit for the producer. Please consider carefully whether this level of data quality is acceptable for your application.
  properties: carbon allocation 0.418141 kg, carbon content 0.464601, carbon content, fossil 0, carbon content, non-fossil 0.464601, dry mass 0.9 kg, water content 0.111111, water in wet mass 0.1 kg, wet mass 1 kg

## Inputs from technosphere
- building, multi-storey: 2e-5 m3; lognormal variance with pedigree 0.3607, pedigree (2,2,5,5,3)
  Storage building as for grass seed IP (Nemecek et al. 2003)
  EcoSpold01Location=RER
  Uncertainty: Storage building as for grass seed IP (Nemecek et al. 2003)
- combine harvesting: 0.0012755 ha; lognormal variance with pedigree 0.0427, pedigree (2,2,5,5,1)
  Harvest as for grass seed IP (Nemecek et al. 2003)
  EcoSpold01Location=CH
  Uncertainty: Harvest as for grass seed IP (Nemecek et al. 2003)
- drying of bread grain, seed and legumes: 0.286 l; lognormal variance with pedigree 0.0607, pedigree (2,2,5,5,3)
  Drying water content from 30% to 10% as for grass seed IP (Nemecek et al. 2003)
  EcoSpold01Location=CH
  Uncertainty: Drying water content from 30% to 10% as for grass seed IP (Nemecek et al. 2003)
- electricity, low voltage: 0.00220272, 9.83262e-5, 0.00154624, 0.0320943, 0.00316786, 1.9732e-5, 0.00727382, 0.0110496, 0.000547404 kWh (9 suppliers, which the file names only by identifier); sum of these 0.058 kWh; lognormal variance with pedigree 0.0607, pedigree (2,2,5,5,3)
  EcoSpold01Location=CH
  Electricity consumption as for seed processing in grass seed IP (Nemecek et al. 2003)
  Uncertainty: Electricity consumption as for seed processing in grass seed IP (Nemecek et al. 2003)
- liquid manure spreading, by vacuum tanker: 0.038265 m3; lognormal variance with pedigree 0.0607, pedigree (2,2,5,5,3)
  Amount N corresponding to the fertilization recommendations in Walter et al. (2004). Assumption 50% allocation to fodder grass (Total amount spread: 60 m3 slurry and 10 t manure).
  EcoSpold01Location=CH
  Uncertainty: Amount N corresponding to the fertilization recommendations in Walter et al. (2004). Assumption 50% allocation to fodder grass (Total amount spread: 60 m3 slurry and 10 t manure).
- solid manure loading and spreading, by hydraulic loader and spreader: 6.3776 kg; lognormal variance with pedigree 0.0607, pedigree (2,2,5,5,3)
  EcoSpold01Location=CH
  Amount N corresponding to the fertilization recommendations in Walter et al. (2004). Assumption 50% allocation to fodder grass (Total amount spread: 60 m3 slurry and 10 t manure).
  Uncertainty: Amount N corresponding to the fertilization recommendations in Walter et al. (2004). Assumption 50% allocation to fodder grass (Total amount spread: 60 m3 slurry and 10 t manure).
- sowing: 0.00063776 ha; lognormal variance with pedigree 0.0607, pedigree (2,2,5,5,3)
  EcoSpold01Location=CH
  Cultivation of soil as in Hersener et al. 1997, allocation to fodder grass 50%
  Uncertainty: Cultivation of soil as in Hersener et al. 1997, allocation to fodder grass 50%
- tillage, cultivating, chiselling: 0.00063776 ha; lognormal variance with pedigree 0.0607, pedigree (2,2,5,5,3)
  Cultivation of soil as in Hersener et al. 1997, allocation to fodder grass 50%
  EcoSpold01Location=CH
  Uncertainty: Cultivation of soil as in Hersener et al. 1997, allocation to fodder grass 50%
- tillage, harrowing, by rotary harrow: 0.00063776 ha; lognormal variance with pedigree 0.0607, pedigree (2,2,5,5,3)
  EcoSpold01Location=CH
  As for grass seed IP (Nemecek et al. 2003)
  Uncertainty: As for grass seed IP (Nemecek et al. 2003)
- tillage, ploughing: 0.00063776 ha; lognormal variance with pedigree 0.0427, pedigree (2,2,5,5,1)
  As for grass seed IP (Nemecek et al. 2004)
  EcoSpold01Location=CH
  Uncertainty: As for grass seed IP (Nemecek et al. 2004)
- tillage, rolling: 0.00063776 ha; lognormal variance with pedigree 0.0607, pedigree (2,2,5,5,3)
  (same comment as for tillage, cultivating, chiselling)
- transport, tractor and trailer, agricultural: 0.001 metric ton*km; lognormal variance with pedigree 0.0427, pedigree (2,2,5,5,1)
  EcoSpold01Location=CH
  Assumption transport to the farm about 1 km.
  Uncertainty: Assumption transport to the farm about 1 km.

## Inputs from nature
- Heat, waste [air, non-urban air or from high stacks]: 0.209 MJ; lognormal variance with pedigree 0.0426, pedigree (2,1,5,5,1)
  Heat waste as for grass seed IP at storehouse (Nemecke et al. 2003)
  Uncertainty: Heat waste as for grass seed IP at storehouse (Nemecke et al. 2003)
- Carbon dioxide, in air [natural resource, in air]: 1.395 kg; lognormal variance with pedigree 0.0426, pedigree (2,1,5,5,1)
  Calculation with value for rye grains of 1.55 kg CO2 / kg grain (Nemecek et al 2004). Water content of dried grains 10%
  Uncertainty: Calculation with value for rye grains of 1.55 kg CO2 / kg grain (Nemecek et al 2004). Water content of dried grains 10%
- Energy, gross calorific value, in biomass [natural resource, biotic]: 16.083 MJ; lognormal variance with pedigree 0.0418844, pedigree (2,1,5,3,1)
  Calculation with 17.87 MJ/kg DM for rye seed (Nemecek et al. 2004). Water content of dried grains is about 10%
- Occupation, construction site [natural resource, land]: 8e-6 m2*year; lognormal variance with pedigree 0.0826, pedigree (2,1,5,5,1)
  As for grass seed IP at storehouse (Nemecek et al. 2003)
  Uncertainty: As for grass seed IP at storehouse (Nemecek et al. 2003)
- Occupation, industrial area [natural resource, land]: 0.0002 m2*year; lognormal variance with pedigree 0.0826, pedigree (2,1,5,5,1)
  (same comment as for Occupation, construction site)
- Occupation, pasture, man made, intensive [natural resource, land]: 6.3776 m2*year; lognormal variance with pedigree 0.0827, pedigree (2,2,5,5,1)
  Calculation for the cultivation about one year (seed August, harvest next July) with two harvest of fodder grass and final harvest of seed as in Nemecek et al. (2003). Allocation to fodder grass assumed 50%
  Uncertainty: Calculation for the cultivation about one year (seed August, harvest next July) with two harvest of fodder grass and final harvest of seed as in Nemecek et al. (2003). Allocation to fodder grass assumed 50%
- Transformation, from annual crop, non-irrigated [natural resource, land]: 4.5281 m2; lognormal variance with pedigree 0.1801, pedigree (4,2,5,5,1)
  Share of transformation from arable and from pastures as in Nemecek et al. (2003). Allocation to fodder grass assumed 50%
  Uncertainty: Share of transformation from arable and from pastures as in Nemecek et al. (2003). Allocation to fodder grass assumed 50%
- Transformation, from pasture, man made, intensive [natural resource, land]: 1.8495 m2; lognormal variance with pedigree 0.1801, pedigree (4,2,5,5,1)
  (same comment as for Transformation, from annual crop, non-irrigated)
- Transformation, from unspecified [natural resource, land]: 4e-6 m2; lognormal variance with pedigree 0.1626, pedigree (2,1,5,5,1)
  (same comment as for Occupation, construction site)
- Transformation, to industrial area [natural resource, land]: 4e-6 m2; lognormal variance with pedigree 0.1626, pedigree (2,1,5,5,1)
  (same comment as for Occupation, construction site)
- Transformation, to pasture, man made, intensive [natural resource, land]: 6.3776 m2; lognormal variance with pedigree 0.1801, pedigree (4,2,5,5,1)
  Further use assumed as meadow or pasture as in Nemecek et al. (2003). Allocation to fodder grass assumed 50%
  Uncertainty: Further use assumed as meadow or pasture as in Nemecek et al. (2003). Allocation to fodder grass assumed 50%

## Emissions to nature
- Ammonia [air, non-urban air or from high stacks]: 0.021869 kg; lognormal variance with pedigree 0.1226, pedigree (2,1,5,5,4)
  Formula as in ecoinvent report No. 15, chapter 4.4 (Nemecek et al. 2004)
  Uncertainty: Formula as in ecoinvent report No. 15, chapter 4.4 (Nemecek et al. 2004)
- Dinitrogen monoxide [air, non-urban air or from high stacks]: 0.0024248 kg; lognormal variance with pedigree 0.1626, pedigree (2,1,5,5,4)
  (same comment as for Ammonia)
- Nitrogen oxides [air, non-urban air or from high stacks]: 0.00050921 kg; lognormal variance with pedigree 0.1626, pedigree (2,1,5,5,4)
  (same comment as for Ammonia)
- Cadmium II [soil, agricultural]: 3.9724e-7 kg; lognormal variance with pedigree 0.1106, pedigree (2,1,5,5,3)
  Calculation input - output bilance using data about metal content of rye grains and fertilizers summarized in Nemecek et al. (2004)
  Uncertainty: Calculation input - output bilance using data about metal content of rye grains and fertilizers summarized in Nemecek et al. (2004)
- Chromium III [soil, agricultural]: 8.8061e-6 kg; lognormal variance with pedigree 0.1106, pedigree (2,1,5,5,3)
  (same comment as for Cadmium II)
- Copper ion [soil, agricultural]: 6.7148e-5 kg; lognormal variance with pedigree 0.1106, pedigree (2,1,5,5,3)
  (same comment as for Cadmium II)
- Lead II [soil, agricultural]: 8.4495e-6 kg; lognormal variance with pedigree 0.1106, pedigree (2,1,5,5,3)
  (same comment as for Cadmium II)
- Mercury II [soil, agricultural]: 8.1163e-7 kg; lognormal variance with pedigree 0.1106, pedigree (2,1,5,5,3)
  Calculation input - output bilance using data about metal content of grass and fertilizers summarized in Nemecek et al. (2004)
  Uncertainty: Calculation input - output bilance using data about metal content of grass and fertilizers summarized in Nemecek et al. (2004)
- Nickel II [soil, agricultural]: 9.4502e-6 kg; lognormal variance with pedigree 0.1106, pedigree (2,1,5,5,3)
  (same comment as for Cadmium II)
- Zinc II [soil, agricultural]: 0.00028588 kg; lognormal variance with pedigree 0.1106, pedigree (2,1,5,5,3)
  (same comment as for Cadmium II)
- Nitrate [water, ground-]: 0.075465 kg; lognormal variance with pedigree 0.1627, pedigree (2,2,5,5,4)
  (same comment as for Ammonia)
- Phosphate [water, ground-]: 0.00010685 kg; lognormal variance with pedigree 0.1627, pedigree (2,2,5,5,4)
  (same comment as for Ammonia)
- Phosphate [water, surface water]: 0.00031633 kg; lognormal variance with pedigree 0.1627, pedigree (2,2,5,5,4)
  (same comment as for Ammonia)
- Phosphorus [water, surface water]: 0.00019694 kg; lognormal variance with pedigree 0.1627, pedigree (2,2,5,5,4)
  (same comment as for Ammonia)

## Sampling procedure
Data were compiled from statistics, fertilising recommendations, documents from extension services and expert knowledge.

## Extrapolations
This dataset has been copied from an original dataset covering the geography CH. The uncertainty has been adjusted accordingly.

## Review by Niels Jungbluth 2005-08-25
Passed.
