# photovoltaic laminate production, CIS

Dataset: EcoSpold 2, unit process
Geography: RoW
Time period: 1998-01-01 to 2023-12-31
Technology level: current
Classification: ISIC rev.4 ecoinvent: 2610:Manufacture of electronic components and boards
Classification: EcoSpold01Categories: photovoltaic/production of components
Synonyms: CIGS; thin film; copper indium selenide
Tags: ConvertedDataset
Scenario: Business-as-Usual
System model: Allocation, cut-off by classification
Share of production covered: 50 %
Generated by: Niels Jungbluth
Published in: Jungbluth, N. 2007
Database: ecoinvent
isCopyrightProtected: true
accessRestrictedTo: 1

## General comment
Production of photovoltaic thin film laminates by thermal vaporization in vacuum. The modules produced at Würth Solar have a size of 1.2m by 0.6m. The weight is 12.6kg. The efficiency is 10%. The rated nominal power is about 75-80Wp per module.
[This dataset was already contained in the ecoinvent database version 2. It was not individually updated during the transfer to ecoinvent version 3. Life Cycle Impact Assessment results may still have changed, as they are affected by changes in the supply chain, i.e. in other datasets. This dataset was generated following the ecoinvent quality guidelines for version 2. It may have been subject to central changes described in the ecoinvent version 3 change report (http://www.ecoinvent.org/database/ecoinvent-version-3/reports-of-changes/), and the results of the central updates were reviewed extensively. The changes added e.g. consistent water flows and other information throughout the database. The documentation of this dataset can be found in the ecoinvent reports of version 2, which are still available via the ecoinvent website. The change report linked above covers all central changes that were made during the conversion process.]

## Included activities end
Electricity use, materials, transport of materials, treatment of production wastes. Disposal after end of life. Process emissions not known (except Cd).

## Geography
Data for Würth Solar in Germany.

## Technology
Production technology of thin film CIS cells with thermal vaporization in vacuum.

## Time period
Data refer to 2007. Production in 2006 was ramped up.

## Parameters
- fraction, process water, to air: 0.15 dimensionless; name fraction_PW_to_air; lognormal variance with pedigree 0.092025, pedigree (4,4,3,2,4)
- fraction, tap water, to air: 0.01 dimensionless; name fraction_TW_to_air; lognormal variance with pedigree 0.092025, pedigree (4,4,3,2,4)

## Reference product
- photovoltaic laminate, CIS: 1 m2; By-product classification allocatable product; CPC 47150: Diodes, transistors and similar semi-conductor devices; photosensitive semi-conductor devices; light emitting […]; HS2017 854140: Electrical apparatus; photosensitive, including photovoltaic cells, whether or not assembled in modules or [...]
  EcoSpold01Location=DE
  production volume 17837.4 m2
    75-80 W/0.72 m2 (77.5 W considered) (from Tab 9.7, ecoinvent v2 report 6_XII). Total production worldwide of panels is 1500MW in 2005. Tab 12.6 (ecoinvent v2 report 6_XII) gives the share of the different types of photovoltaic cells, that was assumed as the share of the different panels. From information in ecoinvent v2 report 6_XII, laminate were treated as panels.
  property price 242 EUR2005
    The production volume of this product is small compared to other products supplied by the activities within the same ISIC 3 category. Therefore, an average price of products supplied by the activities in the same ISIC 3 code has been applied.This price is obtained as '_69 Radio, television and communication equipment, EU27' in the 'EU & DK Input Output Database' (available in SimaPro, 19.28 EUR2003 per kg DS). The price is assumed to be valid for both RER2005, world 2005. Weight of product according to Ecoinvent: approx 12.6 kg per m2.
  properties: carbon allocation 0 kg, carbon content 0

## Inputs from technosphere
- acetone, liquid: 0.011765 kg; lognormal variance with pedigree 0.044, pedigree (3,1,5,5,1)
  EcoSpold01Location=RER
  Cleaning agent, Ampenberg 1998
  Uncertainty: Cleaning agent, Ampenberg 1998
  properties: carbon content, fossil 0.62069, dry mass 1 kg, heating value, net 31.32 MJ, wet mass 1 kg
- ammonia, anhydrous, liquid: 0.00822278, 0.0159621, 0.17693, 0.00747893, 0.001673, 0.0614858, 0.00528544, 0.0162923 kg (8 suppliers, which the file names only by identifier); sum of these 0.29333 kg; lognormal variance with pedigree 0.042, pedigree (1,1,5,5,1)
  Dip coating for CdS, company information
  EcoSpold01Location=RER
  Uncertainty: dip coating for CdS, company information
  properties: dry mass 1 kg, wet mass 1 kg
- argon, liquid: 0.0071952 kg; lognormal variance with pedigree 0.042, pedigree (1,1,5,5,1)
  EcoSpold01Location=RER
  Protection gas, company information
  Uncertainty: protection gas, company information
  properties: dry mass 1 kg, wet mass 1 kg
- cadmium sulfide, semiconductor-grade: 0.034037 kg; lognormal variance with pedigree 0.0441, pedigree (3,2,5,5,1)
  EcoSpold01Location=US
  Company information and assumption for share of metals
  Uncertainty: company information and assumption for share of metals
  properties: dry mass 1 kg, wet mass 1 kg
- copper, cathode: 0.044956 kg; lognormal variance with pedigree 0.042, pedigree (1,1,5,5,1)
  EcoSpold01Location=RER
  Company information
  Uncertainty: company information
  properties: dry mass 1 kg, wet mass 1 kg
- electricity, medium voltage: 0.0467804, 0.0700253, 0.0221217, 0.411769, 0.241677, 0.286532, 3.4804, 0.00830078, 69.4261, 23.327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 kWh (47 suppliers, which the file names only by identifier); sum of these 122.38 kWh; lognormal variance with pedigree 0.042, pedigree (1,1,5,5,1)
  Company information, coating, air-conditioning, water purification, etc.
  EcoSpold01Location=DE
  Uncertainty: company information, coating, air-conditioning, water purification, etc.
- ethylvinylacetate, foil: 0.86806 kg; lognormal variance with pedigree 0.042, pedigree (1,1,5,5,1)
  Company information
  EcoSpold01Location=RER
  Uncertainty: company information
  properties: carbon content, fossil 0.79734, dry mass 1 kg, heating value, net 35.99 MJ, wet mass 1 kg
  note on carbon content, fossil: Ethylene vinyl acetate copolymer contains 20% of vinyl acetate (ecoinvent v2.2 report 11_II)
- gallium, semiconductor-grade: 0.01098 kg; lognormal variance with pedigree 0.0441, pedigree (3,2,5,5,1)
  EcoSpold01Location=RER
  Company information and assumption for share of metals
  Uncertainty: company information and assumption for share of metals
  properties: dry mass 1 kg, wet mass 1 kg
- indium: 0.0054898 kg; lognormal variance with pedigree 0.0441, pedigree (3,2,5,5,1)
  Company information and assumption for share of metals
  EcoSpold01Location=RER
  Uncertainty: company information and assumption for share of metals
  properties: dry mass 1 kg, wet mass 1 kg
- molybdenum: 0.01098 kg; lognormal variance with pedigree 0.0441, pedigree (3,2,5,5,1)
  (same comment as for gallium, semiconductor-grade)
  properties: dry mass 1 kg, wet mass 1 kg
- nitrogen, liquid: 2.7778 kg; lognormal variance with pedigree 0.042, pedigree (1,1,5,5,1)
  Protection gas, company information
  EcoSpold01Location=RER
  Uncertainty: protection gas, company information
  properties: dry mass 1 kg, wet mass 1 kg
- photovoltaic panel factory: 4e-6 unit; lognormal variance with pedigree 0.344, pedigree (1,4,5,5,1)
  Assumption
  EcoSpold01Location=GLO
  Uncertainty: Assumption
- selenium: 0.01098 kg; lognormal variance with pedigree 0.0441, pedigree (3,2,5,5,1)
  (same comment as for indium)
  properties: dry mass 1 kg, wet mass 1 kg
- solar glass, low-iron: 15.025 kg; lognormal variance with pedigree 0.042, pedigree (1,1,5,5,1)
  EcoSpold01Location=RER
  Company information
  Uncertainty: company information
  properties: dry mass 1 kg, wet mass 1 kg
- tap water: 0.00540911, 0.00824573, 0.0153861, 0.0414491, 0.00498936, 0.207925, 0.00370811, 2.37939 kg (8 suppliers, which the file names only by identifier); sum of these 2.6665 kg; lognormal variance with pedigree 0.042, pedigree (1,1,5,5,1)
  EcoSpold01Location=RER
  Company information
  Uncertainty: company information
  properties: carbon content, fossil 0.00178991, dry mass 0.000337476 kg, water content 2962.17, wet mass 1 kg
  note on carbon content, fossil: Bicarbonate content is 2.93 mol/m3. CO2 content is 0.1 mol/m3 (ecoinvent v2.2 report 8, Tab 93.1).
- tempering, flat glass: 15.025 kg; lognormal variance with pedigree 0.042, pedigree (1,1,5,5,1)
  EcoSpold01Location=RER
  Assumption
  Uncertainty: Assumption
- tin: 0.01098 kg; lognormal variance with pedigree 0.0441, pedigree (3,2,5,5,1)
  (same comment as for gallium, semiconductor-grade)
  properties: dry mass 1 kg, wet mass 1 kg
- urea: 0.135703, 0.0171626, 0.115881 kg (3 suppliers, which the file names only by identifier); sum of these 0.268747 kg; lognormal variance with pedigree 0.044, pedigree (3,1,5,5,1)
  EcoSpold01Location=RER
  The exchange has been updated from 'urea, as N' into 'urea' and therefore its amount has been scaled (multiplied) from 0.1254 kg by 2.1438 kg of 'urea' per kg of 'urea, as N'. Original comment of the exchange is: Dip coating for CdS, Ampenberg 1998
  Uncertainty: dip coating for CdS, Ampenberg 1998
  properties: carbon content, fossil 0.2, dry mass 1 kg, wet mass 1 kg
- waste plastic, mixture: -0.000625471, -0.000227891, -4.01802e-5, -2.37016e-5, -0.000157257, -1.41748e-5, -1.4637e-5, -3.79358e-5, -1.35588e-5, -1.63685e-5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 kg (42 suppliers, which the file names only by identifier); sum of these -0.86806 kg; lognormal variance with pedigree 0.002, pedigree (1,1,1,5,1)
  EcoSpold01Location=CH
  Calculation for plastic parts burned after recycling
  Uncertainty: Calculation for plastic parts burned after recycling
  production volume
    Calculated from the production volume of photovoltaic laminate, CIS in proportion to the respective output amounts.
  properties: carbon content, fossil 0.747344, dry mass 0.847 kg, heating value, net 30.79 MJ, water content 0.180638, wet mass 1 kg
  note on carbon content, fossil: C content in 1 kg DM was calculated using data in Tab A.2, ecoinvent v2.2 report 13_I
  note on heating value, net: Value taken from the general comment of the treatment dataset.
- waste, from silicon wafer production, inorganic: -0.0070055, -0.0274055 kg (2 suppliers, which the file names only by identifier); sum of these -0.034411 kg; lognormal variance with pedigree 0.022, pedigree (3,1,1,5,3)
  Company information, amount of deposited waste, own estimation for type
  EcoSpold01Location=CH
  Uncertainty: company information, amount of deposited waste, own estimation for type
  production volume
    (same comment as for waste plastic, mixture)
  properties: carbon content, fossil 0.0347572, dry mass 0.906 kg, water content 0.103753, wet mass 1 kg
- wastewater from glass production: -1.26673e-5, -0.00261943 m3 (2 suppliers, which the file names only by identifier); sum of these -0.0026321 m3; lognormal variance with pedigree 0.002, pedigree (1,1,1,5,1)
  Company information
  EcoSpold01Location=CH
  Uncertainty: company information
  production volume
    (same comment as for waste plastic, mixture)
  properties: carbon content, fossil 0.0455242, dry mass 1.09356 kg, water content 913.443, wet mass 1000 kg
  note on carbon content, fossil: COD= 0.115 kg/m3 (Tab A.18, ecoinvent v2.2 report 13_I). COD was converted to TOC, using conversion factors in Tab 4.10 (ecoinvent v2.2 report 13_IV). TOC was considered as Total Carbon.
- zinc: 0.012077 kg; lognormal variance with pedigree 0.0441, pedigree (3,2,5,5,1)
  (same comment as for indium)
  properties: dry mass 1 kg, wet mass 1 kg

## Emissions to nature
- Cadmium II [air, urban air close to ground]: 2.1e-8 kg; lognormal variance with pedigree 0.706, pedigree (3,4,5,5,1)
  Rough estimation
  Uncertainty: Rough estimation
- Water [air, unspecified]: 2.6665e-5 m3; name water_to_air_unspecified; lognormal variance with pedigree 0.0827, pedigree (2,2,5,5,1)
  Calculated value based on literature values and expert opinion. See comments in the parametres' comment field.
  property fraction, origin: fresh water 1; name fraction_origin_fresh_water
  property fraction, origin: salt water 0; name fraction_origin_salt_water
  property fraction, origin: unspecified 0; name fraction_origin_unspecified
- Water [water, unspecified]: 7.735e-6 m3; name water_to_water_unspecified; lognormal variance with pedigree 0.0827, pedigree (2,2,5,5,1)
  (same comment as for Water)
  property carbon content, fossil 0; name C_content_fossil
  property carbon content, non-fossil 0; name C_content_non_fossil
  property dry mass 0 kg; name DM
  property fraction, origin: fresh water 1; name fraction_origin_fresh_water_Ww
  property fraction, origin: salt water 0; name fraction_origin_salt_water_Ww
  property fraction, origin: unspecified 0; name fraction_origin_unspecified_Ww
  property water in wet mass 1000 kg; name WWM
  property wet mass 1000 kg; name WM

## Sampling procedure
Literature data based on producer information.

## Extrapolations
Data for coating materials derived from own assumptions. This dataset has been copied from an original dataset covering the geography DE. The uncertainty has been adjusted accordingly.

## Review by Roberto Dones 2007-08-23
Passed.
none
