# adhesive mortar production

Dataset: EcoSpold 2, unit process
Geography: CH
Time period: 2000-01-01 to 2023-12-31
Technology level: current
Classification: ISIC rev.4 ecoinvent: 2394:Manufacture of cement, lime and plaster
Classification: EcoSpold01Categories: mortar and plaster/production
Tags: ConvertedDataset
Scenario: Business-as-Usual
System model: Allocation, cut-off by classification
Generated by: Daniel Kellenberger (obsolete)
Published in: Kellenberger D. 2007
Database: ecoinvent
isCopyrightProtected: true
accessRestrictedTo: 1

## General comment
The raw materials for ready mix product are mixed. After mixing it is internally transported to the packing installation and packed. For the use 0.048 kg water has to be added per kg dry product (not included in this dataset). No direct process emissions are taken into account as they play a subordinate role compared to the emissions of the raw material production (e.g. drying of silica sand) and because no data is available. For inventorying the infrastructure, a yearly production amount of 150'000 tons is assumed. The lifespan of the machines is assumed to be 20 years.
[This dataset was already contained in the ecoinvent database version 2. It was not individually updated during the transfer to ecoinvent version 3. Life Cycle Impact Assessment results may still have changed, as they are affected by changes in the supply chain, i.e. in other datasets. This dataset was generated following the ecoinvent quality guidelines for version 2. It may have been subject to central changes described in the ecoinvent version 3 change report (http://www.ecoinvent.org/database/ecoinvent-version-3/reports-of-changes/), and the results of the central updates were reviewed extensively. The changes added e.g. consistent water flows and other information throughout the database. The documentation of this dataset can be found in the ecoinvent reports of version 2, which are still available via the ecoinvent website. The change report linked above covers all central changes that were made during the conversion process.]

## Included activities end
Includes the whole manufacturing process to produce anhydrite floor (raw material provision, raw material mixing, packing, and storage), transports to plant, and infrastructure. No requirements for administration are included. No additional buildings and land-use are taken into account as it is assumed that the mixing process takes place in an existing building of the sand/cement industry or on the construction site

## Geography
For the infrastructure RER- and for the silica sand DE-datasets are used as proxy

## Technology
Assumed average current technology. The raw materials are mixed in an assumed average ratio, transported to the packing installation and packed.

## Parameters
- fraction, process water, to air: 0.15 dimensionless; name fraction_PW_to_air; lognormal variance with pedigree 0.092025, pedigree (4,4,3,2,4)
  Literature value. In case when no industry/process specific data are available, default evaporation fraction value is used. This value is 15% and is based on literature (Statistics Canada, 2007 & Shaffer, K.H., 2008, Consumptive water use in the Great Lakes Basin, USGS & Shiklomanov, 2003, World Water Resources at the Beginning of the 21st Century) and has been approved by an expert.
- fraction, tap water, to air: 0.15 dimensionless; name fraction_TW_to_air; = fraction_PW_to_air; lognormal variance with pedigree 0.092025, pedigree (4,4,3,2,4)
  Calculated value. See comment in the other parametres present in this dataset. Tap water is considered to be always used as process water, thus process water fractions to air are applied to all tap water input flows to calculate the amount of water consumed in the processes.

## Reference product
- adhesive mortar: 1 kg; By-product classification allocatable product; CPC 37510: Non-refractory mortars and concretes; HS2017 382450: Mortars and concretes; non-refractory
  production volume 0.0336675 kg
    This is a placeholder value that does not reflect real-world production volumes. This dataset does not currently require a real-world production volume to work in the database framework, and no actual data were collected yet. This has no negative effect on the results of the ecoinvent database. The placeholder value of this activity was scaled according to the nominal GDP of 2005 (source: United Nations, http://data.un.org/Glossary.aspx?q=GDP+%28current+US%24%29, accessed 20130726) to reflect an appropriate share of the global production volume, which is also a placeholder value.
  property carbon content, fossil 0.236968
    Raw materials are listed in Tab 5.2, ecoinvent v2.2 report 7, part XVII: 0.473 kg limestone powder, 0.310 kg acrylate dispersion (and 0.106 kg cement). C content is calculated after C content of raw materials, then referred to 1 kg DM
  property carbon content, non-fossil 0
    Raw materials are listed in Tab 5.2, ecoinvent v2.2 report 7, part XVII. C content is calculated after C content of raw materials
  property heating value, net 6.73 MJ
    LHV is calculated based on the Carbon content of the product. More details can be found on the respective documentation.
  property price 0.198 EUR2005
    Calculated value based on data from United Nations Commodity Trade Statistics Database (comtrade.un.org). UN comtrade category: 382450 Non-refractory mortars a. Year 2005. Using exchange rate of 1EURO = 1.209 USD. Average of price of import into 5 main markets (EU, US, JP, IN and CN).
  properties: carbon allocation 0.22583 kg, carbon content 0.236968, dry mass 0.953 kg, water content 0.0493179, water in wet mass 0.047 kg, wet mass 1 kg

## Inputs from technosphere
- acrylic dispersion, with water, in 58% solution state: 0.31 kg; lognormal variance with pedigree 0.0981, pedigree (1,1,5,3,3)
  properties: carbon content, fossil 0.342442, dry mass 0.59 kg, heating value, net 16.66 MJ, water content 0.70041, wet mass 1 kg
  note on carbon content, fossil: The carbon content was calculated from the carbon content of the inputs.
- cement, Portland: 0.116 kg; lognormal variance with pedigree 0.0981, pedigree (1,1,5,3,3)
  properties: dry mass 1 kg, wet mass 1 kg
- chemical, inorganic: 0.007 kg; lognormal variance with pedigree 0.0981, pedigree (1,1,5,3,3)
  properties: carbon content, fossil 0.003, dry mass 1 kg, wet mass 1 kg
  note on carbon content, fossil: This dataset is an unweighted average of 20 inorganic substances (listed in Tab 88.1, ecoinvent v2.2 report 8, part II), being part of the top100 chemicals included in this database. The C-content has also been calculated as an unweighted average of the C content of the substances composing this dataset.
- chemical, organic: 0.02 kg; lognormal variance with pedigree 0.0981, pedigree (1,1,5,3,3)
  properties: carbon content, fossil 0.628, dry mass 1 kg, heating value, net 19.03 MJ, wet mass 1 kg
  note on carbon content, fossil: This dataset is an unweighted average of 20 organic substances (listed in Tab 88.1, ecoinvent v2.2 report 8, part II), being part of the top100 chemicals included in this database. The C-content has also been calculated as an unweighted average of the C content of the substances composing this dataset.
- conveyor belt: 3.3333e-8 m; lognormal variance with pedigree 0.69, pedigree (1,1,5,1,1)
  estimation
- electricity, medium voltage: 0.027778 kWh; lognormal variance with pedigree 0.69, pedigree (1,1,5,1,1)
  estimation
- epoxy resin, liquid: 0.015 kg; lognormal variance with pedigree 0.0981, pedigree (1,1,5,3,3)
  properties: carbon content, fossil 0.42325, dry mass 1 kg, heating value, net 12.82 MJ, wet mass 1 kg
- industrial machine, heavy, unspecified: 6.6667e-6 kg; lognormal variance with pedigree 0.69, pedigree (1,1,5,1,1)
  estimation
- lime: 0.473 kg; lognormal variance with pedigree 0.0981, pedigree (1,1,5,3,3)
  properties: carbon content, fossil 0.120005, dry mass 1 kg, wet mass 1 kg
- packing, cement: 1 kg; lognormal variance with pedigree 0.69, pedigree (1,1,5,1,1)
  estimation
  This exchange has an activity link directly to the producing activity because the product is primarily consumed in the same geographical area where it is produced.
- propylene glycol, liquid: 0.012 kg; lognormal variance with pedigree 0.0981, pedigree (1,1,5,3,3)
  properties: carbon content, fossil 0.473684, dry mass 1 kg, heating value, net 27.09 MJ, wet mass 1 kg
- tap water: 0.047 kg; name tap_water_input; lognormal variance with pedigree 0.0981, pedigree (1,1,5,3,3)
  properties: carbon content, fossil 0.00178991, dry mass 0.000337476 kg, water content 2962.17, wet mass 1 kg
  note on carbon content, fossil: Bicarbonate content is 2.93 mol/m3. CO2 content is 0.1 mol/m3 (ecoinvent v2.2 report 8, Tab 93.1).

## Emissions to nature
- Water [air, unspecified]: 7.05e-6 m3; name water_to_air_unspecified; = (tap_water_input/1000*fraction_TW_to_air); lognormal variance with pedigree 0.0807, pedigree (2,2,5,1,1)
  Calculated value based on literature values and expert opinion. See comments in the parametres' comment field.
  property fraction, origin: fresh water 1; name fraction_origin_fresh_water
  property fraction, origin: salt water 0; name fraction_origin_salt_water
  property fraction, origin: unspecified 0; name fraction_origin_unspecified
- Water [water, unspecified]: 3.995e-5 m3; name water_to_water_unspecified; = (tap_water_input/1000)*(1-fraction_TW_to_air); lognormal variance with pedigree 0.0807, pedigree (2,2,5,1,1)
  (same comment as for Water)
  property carbon content, fossil 0; name C_content_fossil
  property carbon content, non-fossil 0; name C_content_non_fossil
  property dry mass 0 kg; name DM
  property fraction, origin: fresh water 1; name fraction_origin_fresh_water_Ww
  property fraction, origin: salt water 0; name fraction_origin_salt_water_Ww
  property fraction, origin: unspecified 0; name fraction_origin_unspecified_Ww
  property water in wet mass 1000 kg; name WWM
  property wet mass 1000 kg; name WM

## Sampling procedure
estimation

## Review by Rolf Frischknecht 2007-09-13
passed
