# treatment of spent sawing slurry from Si-wafer cutting

Dataset: EcoSpold 2, unit process
Geography: RER
Time period: 2005-01-01 to 2023-12-31
Technology level: current
Classification: ISIC rev.4 ecoinvent: 3830:Materials recovery
Classification: EcoSpold01Categories: chemicals/inorganics
Tags: ConvertedDataset
Scenario: Business-as-Usual
System model: Allocation, cut-off by classification
Share of production covered: 10 %
Generated by: Mariska J. de Wild-Scholten
Published in: Jungbluth, N. 2009
Database: ecoinvent
isCopyrightProtected: true
accessRestrictedTo: 1

## General comment
This dataset represents the treatment of a spent sawing slurry from Si-wafer cutting from an ordinary transforming activity.
The specific weight of input slurry 1.75kg/l (wet mass).

## Included activities start
The activity starts with the slurry being available at the gate of the treatment facility.

## Included activities end
The activity ends with the slurry being treated and waste-specific emissions released to the environment. The output of silicon-iron mix is neglected in this inventory. Infrastructure is included.

## Geography
Data for European companies.

## Technology
Average technology.

## Time period
Time of publication and data investigation.

## Reference product
- spent sawing slurry from Si-wafer cutting: -1 l; name RP; By-product classification Waste; CPC 39920: Sewage sludge
  Spec. Weight of input 1.75kg/l
  production volume 9.19355e7 l; name RP_PV
    50% estimated European share of global production
  property carbon content, fossil 0.42
    Carbon content modified to reflect the input output balance. Based on ei2 report no 6_XII the density of spent sawing slurry from Si-wafer cutting is 1.75 kg/l.
  property heating value, net 8.12 MJ
    LHV is calculated based on the Carbon content of the product. More details can be found on the respective documentation.
  property price 0 EUR2005
    Waste products are assigned a price of zero as they are assumed to require further treatment.
  properties: carbon allocation 0.63417 kg, carbon content 0.42, carbon content, non-fossil 0, dry mass 1.50993 kg, water content 0.158996, water in wet mass 0.240072 kg, wet mass 1.75 kg

## Inputs from technosphere
- blast furnace sludge: -0.182705, -0.00728985 kg (2 suppliers, which the file names only by identifier); sum of these -0.189995 kg; lognormal variance with pedigree 0.122, pedigree (3,1,1,1,5)
  Final disposal, Si + Fe sludge
  EcoSpold01Location=CH
  Uncertainty: final disposal, Si + Fe sludge
  production volume; = BP_blast_furnace_sludge*RP_PV/abs(RP)
    Calculated from the production volume of spent sawing slurry from Si-wafer cutting in proportion to the respective output amounts.
  properties: carbon content, fossil 0.339168, dry mass 0.914 kg, water content 0.0940919, wet mass 1 kg
- electricity, medium voltage: 1.1 kWh; lognormal variance with pedigree 0.0407, pedigree (2,2,5,1,1)
  EcoSpold01Location=UCTE
  Company data
  Uncertainty: Company data
- silicone factory: 1.26e-11 unit; lognormal variance with pedigree 0.3481, pedigree (1,2,5,1,3)
  EcoSpold01Location=RER
  Estimation
  Uncertainty: Estimation
- spent antifreezer liquid: -0.1 kg; name BP_spent_antifreezer; lognormal variance with pedigree 0.122, pedigree (3,1,1,1,5)
  Treatment, polyethylene glycol
  EcoSpold01Location=CH
  Uncertainty: treatment, polyethylene glycol
  production volume; = BP_spent_antifreezer*RP_PV/abs(RP)
    (same comment as for blast furnace sludge)
  properties: carbon content, fossil 0.431328, dry mass 0.482 kg, heating value, net 0.56 MJ, water content 1.07469, wet mass 1 kg
  note on carbon content, fossil: Tab A.7, ecoinvent v2.2 report 13_I. C content has been calculated after data in the tables, and then referred to 1 kg DM
  note on heating value, net: Value taken from the general comment of the treatment dataset.
- waste, from silicon wafer production, inorganic: -0.00923413, -0.0507659 kg (2 suppliers, which the file names only by identifier); sum of these -0.06 kg; lognormal variance with pedigree 0.122, pedigree (3,1,1,1,5)
  Treatment, silicon carbide
  EcoSpold01Location=CH
  Uncertainty: treatment, silicon carbide
  production volume; = BP_waste_from_Si_wafer*RP_PV/abs(RP)
    (same comment as for blast furnace sludge)
  properties: carbon content, fossil 0.0347572, dry mass 0.906 kg, water content 0.103753, wet mass 1 kg

## Sampling procedure
Literature and internet. Average data from 3 companies. Values as reported in Table 4.8 in Jungbluth et al. (2009).

Reference:
Jungbluth N., Stucki M, and Frischknecht R. (2009) Photovoltaics. In Dones, R. (Ed.) et al., Sachbilanzen von Energiesystemen: Grundlagen für den ökologischen Vergleich von Energiesystemen und den Einbezug von Energiesystemen in Ökobilanzen für die Schweiz. ecoinvent report No. 6-XII, Swiss Centre for Life Cycle Inventories, Dübendorf, CH, 2009.

## Review by Roberto Dones 2007-08-23
Passed.
none
