# fish canning plant construction and maintenance

Dataset: EcoSpold 2, unit process
Geography: RoW
Time period: 2011-01-01 to 2023-12-31
Technology level: current
Classification: ISIC rev.4 ecoinvent: 4290:Construction of other civil engineering projects
Scenario: Business-as-Usual
System model: Allocation, cut-off by classification
Generated by: Angel Avadí
Published in: Avadí, A. 2018
Database: ecoinvent
isCopyrightProtected: true
accessRestrictedTo: 1

## General comment
The activity represents the construction and maintenance along its lifetime of a fish canning (including fish pre-processing) plant, expressed as the installed capacity required to process 1000 kg of raw material. The life cycle inventories were produced based on a sample of 1 Peruvian plant (processing capacity: 461 t/y), 1 Ecuadorian plant (61 000 t/y) and data from other industry representatives. This dataset may be adapted to other global production sites.
System boundaries of fish processing plants and relations between activities

## Included activities start
From construction of the plant, through maintenance.

## Included activities end
End of life treatment of the plant

## Geography
Based on Peruvian data

## Technology
Construction and maintenance activities of Peruvian and Ecuadorian fish canning plants, per t of processing capacity. Plants have a lifespan of 40 years.
Process diagram of large fish canning
Process diagram of small fish canning

## Time period
Production figures represent the period 2012-2014. Valid as of 2017.

## Parameters
- copper pipes: 1.65 kg; name copper_pipes; triangular min 0.69, mostLikely 1.65, max 13.74, pedigree (1,3,1,1,1)
  Copper pipes for construction/maintenance consumed per t of processed raw material
  Uncertainty: Data from 1 plant, assumptions for larger plants
- copper wire use: 0.07 kg; name copper_wire_use; triangular min 0.03, mostLikely 0.07, max 0.59, pedigree (1,3,1,1,1)
  Copper wire for construction/maintenance consumed per t of processed raw material
  Uncertainty: Data from 1 plant, assumptions for larger plants
- propane use in forklift: 0.02 kg; name propane_use; triangular min 0.01, mostLikely 0.02, max 0.2, pedigree (3,3,1,1,1)
  Fuel for liftforks
  Uncertainty: Data from 1 plant, assumptions for larger plants

## Reference product
- fish canning plant: 1 unit; name plant; source Angel Avadí 2014; By-product classification allocatable product; CPC 8812: Fish processing services
  One unit of plant represents the installed capacity required to process 1 t of raw material, including annual maintenance of the infrastructure, over the plant's lifetime.
  production volume 1.54e7 unit; name prod_vol; = 7700000*3
    It is assumed that 3 new plants are built per year, with processing capacity of at least 7 700 t raw material/year
  property capacity [kg] 7673 kg; name plant_capacity_kg
  property lifetime 40 year; name plant_lifetime
  property price 152.075 EUR2005
    Calculated based on inputs: The price of the product has been calculated as a sum of the values of the material and energy inputs for this product. This value is therefore a rough estimation. It may underestimate the real price since there are additional expenses when producing any product. These expences can include for example labour costs, treatment of waste materials and profit for the producer. Please consider carefully whether this level of data quality is acceptable for your application.
  properties: carbon allocation 0 kg, carbon content 0

## Inputs from technosphere
- air compressor, screw-type compressor, 300kW: 0.000521 unit; source Angel Avadí 2014; triangular min 6.67922e-5, mostLikely 0.000160363, max 0.00133584, pedigree (3,3,4,5,1)
  Air compression system 600 kW
  Uncertainty: Data from 1 plant, assumptions for larger plants
- building, hall, steel construction: 0.26 m2; source Angel Avadí 2014; triangular min 0.0337795, mostLikely 0.0798425, max 0.666378, pedigree (3,3,4,5,1)
  Plant building
  Uncertainty: Data from 1 plant, assumptions for larger plants
- chlorine, liquid: 0.00200031 kg; source Angel Avadí 2014; triangular min 0.00166693, mostLikely 0.00200031, max 0.0023337, pedigree (2,3,4,5,1)
  Cleaning agents
  Uncertainty: Data from 1 plant, assumptions for smaller plants
  properties: dry mass 1 kg, wet mass 1 kg
- chlorine, liquid: 0.00999969 kg; source Angel Avadí 2014; triangular min 0.00833307, mostLikely 0.00999969, max 0.0116663, pedigree (2,3,4,5,1)
  Cleaning agents
  Uncertainty: Data from 1 plant, assumptions for smaller plants
- chromium steel pipe: 1.65 kg; name chromium; source Angel Avadí 2014; triangular min 0.212407, mostLikely 0.507929, max 4.22966, pedigree (3,3,4,5,1)
  Steel pipes
  Uncertainty: Data from 1 plant, assumptions for larger plants
  properties: carbon content, fossil 0.0008, dry mass 1 kg, wet mass 1 kg
- copper scrap, sorted, pressed: -1.72 kg; name copper_s; = copper_wire_use+copper_pipes; source Angel Avadí 2014
  Waste copper at end of life
  production volume; = ABS(prod_vol*copper_s/plant)
    Calculated from production volume of reference product using the relative outputs.
  properties: dry mass 1 kg, price 2.84 EUR2005, wet mass 1 kg
- copper, cathode: 1.72 kg; = copper_wire_use+copper_pipes; source Angel Avadí 2014
  Copper wire and copper pipes for construction/maintenance consumed per t of processed raw material. Lifespan of plant: 40 years.
  properties: dry mass 1 kg, wet mass 1 kg
- drawing of pipe, steel: 1.65 kg; = copper_pipes; source Angel Avadí 2014
  Proxy for copper pipes drawing
- industrial furnace, 1MW, oil: 0.000782 unit; source Angel Avadí 2014; triangular min 0.000100098, mostLikely 0.000240852, max 0.00200505, pedigree (3,3,4,5,1)
  Industrial heat system 3000 kW
  Uncertainty: Data from 1 plant, assumptions for larger plants
- industrial furnace, natural gas: 0.000521 unit; source Angel Avadí 2014; triangular min 6.67922e-5, mostLikely 0.000160363, max 0.00133584, pedigree (3,3,4,5,1)
  Industrial heat system 2000 kW
  Uncertainty: Data from 1 plant, assumptions for larger plants
- lubricating oil: 0.0261 kg; source Angel Avadí 2014; triangular min 0.00321781, mostLikely 0.00804452, max 0.0670377, pedigree (3,3,4,5,1)
  Lubricating oil for machinery
  Uncertainty: Data from 1 plant, assumptions for larger plants
  properties: carbon content, fossil 0.75, dry mass 1 kg, heating value, net 40.2 MJ, wet mass 1 kg
  note on carbon content, fossil: Lubricating oil is produced from diesel. C-content/dry mass of fats and oils considered 75%, from: ecoinvent v2.2 report, n 15a, pg 40
  note on heating value, net: Literature value, Source: IPCC 2006, 2006 IPCC Guidelines for National Greenhouse Gas Inventories, Prepared by the National Greenhouse Gas Inventories Programme, Eggleston H.S., Buendia L., Miwa K., Ngara T. and Tanabe K. (eds). Published: IGES, Japan
- lubricating oil: 0.1239 kg; source Angel Avadí 2014; triangular min 0.0152753, mostLikely 0.0381884, max 0.318236, pedigree (3,3,4,5,1)
  (same comment as for lubricating oil)
- polymer foaming: 0.034 kg; source Angel Avadí 2014; triangular min 0.0316893, mostLikely 0.0336699, max 0.0366408, pedigree (2,3,4,5,1)
  Steel maintenance agents
  Uncertainty: Data from 1 plant, assumptions for smaller plants
- propane, burned in building machine: 0.884 MJ; = propane_use*44.2; source Avadí, A. 2018
  Propane burned in liftforks (propane use times calorific value of propane)
  properties: heating value, net 1 MJ
- scrap steel: -1.11596, -0.533362, -0.000675753 kg (3 suppliers, which the file names only by identifier); sum of these -1.65 kg; = chromium; source Angel Avadí 2014
  Representing waste chromium steel
  production volume; = ABS(prod_vol*chromium_s/plant)
    Calculated from production volume of reference product using the relative outputs.
  properties: dry mass 1 kg, wet mass 1 kg
- soap: 0.0013 kg; source Angel Avadí 2014; triangular min 0.0011, mostLikely 0.0013, max 0.0015, pedigree (2,3,4,5,1)
  Cleaning agents
  Uncertainty: Data from 1 plant, assumptions for smaller plants
  properties: carbon content, non-fossil 0.692237, dry mass 0.87 kg, heating value, net 17.93 MJ, water content 0.149425, wet mass 1 kg
- solvent, organic: 3.9 kg; name solvent; source Angel Avadí 2014; triangular min 3.56949, mostLikely 3.86695, max 4.26356, pedigree (2,3,4,5,1)
  Cleaning agents
  Uncertainty: Data from 1 plant, assumptions for smaller plants
  properties: carbon content, fossil 0.63072, dry mass 1 kg, heating value, net 19.11 MJ, wet mass 1 kg
- spent solvent mixture: -0.0255033, -1.08856, -2.78593 kg (3 suppliers, which the file names only by identifier); sum of these -3.9 kg; = solvent; source Avadí, A. 2018
  Spent solvent
  production volume; = prod_vol * (BP_amount_1 / plant)
    Calculated from production volume of reference product using the relative outputs.
  properties: carbon content, fossil 0.63072, dry mass 0.835 kg, heating value, net 21.7 MJ, water content 0.197605, wet mass 1 kg
  note on carbon content, fossil: Tab A.7, ecoinvent v2.2 report 13_I. C content has been calculated after data in the tables, and then referred to 1 kg DM
  note on heating value, net: Value taken from the general comment of the treatment dataset.
- tap water: 23.3962 kg; source Avadí, A. 2018; triangular min 20.3566, mostLikely 24.916, max 24.916, pedigree (3,3,5,3,3)
  Water for maintenance/cleansing
  Uncertainty: It is assumed that 60% of total water consumption is used during processing, and 40% for maintenance/cleaning (http://www.dfo-mpo.gc.ca/Library/273700.pdf)
  properties: carbon content, fossil 0.00178991, dry mass 0.000337476 kg, water content 2962.17, wet mass 1 kg
  note on carbon content, fossil: Bicarbonate content is 2.93 mol/m3. CO2 content is 0.1 mol/m3 (ecoinvent v2.2 report 8, Tab 93.1).
- tap water: 7.58685 kg; source Avadí, A. 2018; triangular min 6.60117, mostLikely 8.07968, max 8.07968, pedigree (3,3,5,3,3)
  (same comment as for tap water)
- tap water: 316.172 kg; source Avadí, A. 2018; triangular min 275.095, mostLikely 336.71, max 336.71, pedigree (3,3,5,3,3)
  (same comment as for tap water)
- tap water: 3618.11 kg; source Avadí, A. 2018; triangular min 3148.05, mostLikely 3853.14, max 3853.14, pedigree (3,3,5,3,3)
  (same comment as for tap water)
- tap water: 2701.73 kg; source Avadí, A. 2018; triangular min 2350.73, mostLikely 2877.24, max 2877.24, pedigree (3,3,5,3,3)
  (same comment as for tap water)
- waste mineral oil: -0.0010193, -0.107807, -0.0411737 kg (3 suppliers, which the file names only by identifier); sum of these -0.15 kg; = oil; source Avadí, A. 2018
  Waste lubricating oil
  production volume; = ABS(prod_vol*oil_s/plant)
    Calculated from production volume of reference product using the relative outputs.
  properties: carbon content, fossil 0.75, dry mass 1 kg, heating value, net 34.7 MJ, wet mass 1 kg
  note on carbon content, fossil: Tab A.6, ecoinvent v2.2 report 13_I. C content has been calculated after data in the tables, and then referred to 1 kg DM
- wastewater from vegetable oil refinery: -6.66701 m3; name BP_amount_2; = (water+soap+chlorine)/1000; source Avadí, A. 2018
  Proxy for wastewater from fish processing plant.
  production volume; = prod_vol * (BP_amount_2 / plant)
    Calculated from production volume of reference product using the relative outputs.
  properties: carbon content, fossil 0.00178991, carbon content, non-fossil 0.8, dry mass 0.871801 kg, water content 1146.05, wet mass 1000 kg
  note on carbon content, fossil: Estimated load for fish processing plant cleansing wastewater. The loading of fish processing wastewater is mainly organic (http://www.dfo-mpo.gc.ca/Library/273700.pdf)
- wire drawing, copper: 0.07 kg; = copper_wire_use; source Angel Avadí 2014
  Copper wire for construction/maintenance consumed per t of processed raw material. Lifespan of plant: 40 years.

## Sampling procedure
Data from two different sized-plants were extrapolated on the basis of built area and processing capacity, to represent any plant of the same type, regardless of size.

## Extrapolations
Extrapolation to GLO based on the fact that the current technology is rather common in the world.
