# transport, freight train, electricity

Dataset: EcoSpold 2, unit process
Geography: ZA
Time period: 2016-04-01 to 2023-03-31
Technology level: current
Classification: ISIC rev.4 ecoinvent: 4912:Freight rail transport
Classification: EcoSpold01Categories: transport systems/train
Scenario: Business-as-Usual
System model: Allocation, cut-off by classification
Share of production covered: 100 %
Generated by: Philippa Notten
Published in: Notten, P.J. 2018
Database: ecoinvent
isCopyrightProtected: true
accessRestrictedTo: 1

## General comment
This dataset represents the transport of one metric ton.km of freight in South Africa by an electric locomotive. The dataset represents the entire transport life cycle, including the production and maintenance of the locomotive, production and maintenance of the goods wagons, the transportation of goods and the construction, operation, maintenance and disposal of railway track. The scope of this dataset is the operation of the locomotive, which has inputs of locomotive and goods wagon, maintenance (goods wagon and locomotive) and railway track via linking to global datasets, i.e. the infrastructure and maintenance datasets are not South African-specific.
Electricity usage is calculated from total reported freight rail electricity usage (Transnet, 2017a) and total metric ton.kms transported using electric locomotives (81% of total tonne.kms). The total tonne.kms transported by electric locomotives is calculated using the electricity efficiency (Transnet, 2017a) and the total tonne.kms of rail freight for 2017. Total metric ton.kms for general freight is reported directly (Transnet, 2017b), while metric ton.kms for iron ore and coal exports are calculated from the total tonnages transported (Transnet, 2017b) and the average transport distances. Transport distance is averaged for 2009, 2010 and 2011 for iron ore exports, and modelled by linear regression of 2009, 2010, 2011 and 2016 data for coal exports (Transnet, 2016a; Transnet, 2011; Transnet, 2010). Diesel usage for electric locomotive shunting is calculated from total diesel consumption for freight transport (Transnet, 2017a), the percentage of diesel used for shunting (19%) (personal communication, Transnet, 2017) and the percentage of total metric ton.kms transported by electric locomotives (81%). These figures represent all rail freight movements in South Africa.
Emission of sulphur hexafluoride (SF6) is taken from the global dataset ("transport, freight train, electricity, GLO, 2004"). All other emissions to air are extrapolated on the basis of diesel consumption from the global dataset ("transport, freight train, diesel, GLO, 2004"). The global dataset is derived from data primarily of Swiss/European orgin, described in full in Spielmann et al. (2007).
Emissions of particulates, nitrogen oxides (NOx) and non-methane volatile organic compounds (NMVOC) from diesel consumed during shunting are calculated using emission factors from EcoTransIT (2016). South African locomotives are split into UIC I and UIC II emission classes based on the current locomotive fleet (Transnet, 2016b), with the assumption that only the new Class 43 diesel locomotives meet UIC II emission standards (TransportWorldAfrica, 2012). The partitioning of particulate emissions into size classes is according to Spielmann et al. (2007). Sulphur dioxide (SO2) emissions are calculated from the sulphur content in local diesel (500 ppm (SAPIA, 2015)) and the assumption that all sulphur is emitted as sulphur dioxide.
Locomotive production and maintenance are described in the individual global datasets. Locomotive demand per tonne.km is calculated from the number of electric freight locomotives (Transnet, 2016b) and the total tonne.kms of freight transported by electric locomotives (see above explanation on how this is calculated). A locomotive lifespan of 40 years is assumed (Spielmann et al., 2007). Goods wagon production and maintenance are described in the individual global datasets. Goods wagon demand per tonne.km is calculated from the number of goods wagons (Transnet, 2016b) and the total tonne.kms of freight moved annually by electric locomotives (calculated as described above). A goods wagon lifespan of 40 years is assumed (Spielmann et al., 2007). The construction, operation, maintenance and disposal of railway track is described in the global dataset. Railway track demand per tonne.km is calculated from the total length of two-way railway track (Transnet, 2016a), and the total tonne.kms of electric freight rail transport (calculated as described above).
References:
Transnet (2017a) Transnet Sustainability Report 2017;
Transnet (2017b) Transnet Integrated Report 2017; Transnet (2016a); Transnet Long Term Planning Framework 2016 - Freight Demand Plan; Transnet (2016b) Transnet Long Term Planning Framework - Rail Development Plan; Transnet (2011) Integrated Annual Report 2011; Transnet (2010) Integrated Annual Report 2010;
Spielmann, M., Bauer, C., Dones, R. & Tuchschmid, M. (2007) Transport Services Data v2.0, ecoinvent association, Zurich, Switzerland.; EcoTransIT (2016) Ecological Transport Information Tool for Worldwide Transports - Methodology and Data Update; TransportWorldAfrica (2012) GE Transportation & MIC deliver reliable locomotives with high local content on-time. Available at: http://www.transportworldafrica.co.za/2012/06/28/ge-transportation-mic-deliver-reliable-locomotives-with-high-local-content-on-time/ (22 May 2018).

## Included activities start
The scope of this dataset is the operation of the locomotive and wagon train, with inputs of locomotives, goods wagons and railway track (covering their production, maintenance and disposal). The transportation service starts with the demand for electricity and diesel (for shunting), and the construction of locomotive, goods wagons and track.

## Included activities end
The dataset ends with the service of transporting freight 1 metric ton.km. The dataset covers the operation of a electric locomotive, and includes the consumption of electricity and diesel (for shunting), and the associated emissions to air. The dataset calls global datasets on the production and maintenance of a locomotive and goods wagon, as well as the construction, operation, maintenance and disposal of railway track.

## Geography
Demand for electricity, diesel, locomotive, goods wagon and railway track from Indian rail transport statistics. Particulate, NOx, SOx and NMVOC emissions are calculated from EcoTransIT (2016) applying the emission factors most relevant to South African locomotives (44% non-regulated and 56% UIC II). Emission of sulphur hexafluoride (SF6) is taken from the global dataset. All other emissions to air extrapolated from global dataset based on diesel consumption.

## Technology
Data is representative of national freight rail data for the 2016/2017 financial year

## Reference product
- transport, freight train: 1 metric ton*km; By-product classification allocatable product; CPC 6512: Railway transport services of freight
  EcoSpold01Location=US
  production volume 1.2664e11 metric ton*km
    Electricity tonne.kms represent 81% of total South African rail freight. The total tonne.kms transported by electric locomotives was calculated using the fuel and electricity efficiency (Transnet, 2017a) and the total tonne.kms of rail freight for 2017. Total tonne.kms for general freight was reported directly (Transnet, 2017b), while tonne.kms for iron ore and coal export were calculated from the total tonnages transported (Transnet, 2017b) and the average transport distance. Transport distance was averaged for 2009, 2010 and 2011 for iron ore exports and modelled by linear regression of 2009, 2010, 2011 and 2016 data for coal exports (Transnet, 2016; Transnet, 2011; Transnet, 2010). References: Transnet (2017a) Transnet Sustainability Report 2017; Transnet (2017b) Transnet Integrated Report 2017; Transnet (2016); Transnet Long Term Planning Framework 2016 - Freight Demand Plan; Transnet (2011) Integrated Annual Report 2011; Transnet (2010) Integrated Annual Report 2010
  properties: carbon allocation 0 kg, carbon content 0, price 0.026 EUR2005

## Inputs from technosphere
- diesel: 0.000171152 kg; lognormal variance with pedigree 0.0426, pedigree (1,1,5,5,1)
  Diesel consumption for electric locomotive shunting is calculated from total diesel usage for freight rail, the percentage of diesel used for shunting (19%) (personal communication with Transnet) and the percentage of freight transport using electric locomotives (81% of total tonne.kms). The total tonne.kms transported by electric locomotives is calculated using the fuel and electricity efficiency (Transnet, 2017a) and the total tonne.kms of rail freight for 2017. Total tonne.kms for general freight is reported directly (Transnet, 2017b), while tonne.kms for iron ore and coal export are calculated from the total tonnages transported (Transnet, 2017b) and the average transport distance. Transport distance was averaged for 2009, 2010 and 2011 for iron ore exports and modelled by linear regression of 2009, 2010, 2011 and 2016 data for coal exports (Transnet, 2016; Transnet, 2011; Transnet, 2010). A diesel density of 0.8 kg/L is assumed (SAPIA, 2008). References: Transnet (2017a) Transnet Sustainability Report 2017; Transnet (2017b) Transnet Integrated Report 2017; Transnet (2016); Transnet Long Term Planning Framework 2016 - Freight Demand Plan; Transnet (2011) Integrated Annual Report 2011; Transnet (2010) Integrated Annual Report 2010; SAPIA (2008) Petrol and Diesel in South Africa and the impact on air quality.; Spielmann, M., Bauer, C., Dones, R. & Tuchschmid, M. (2007) Transport Services Data v2.0, ecoinvent association, Zurich, Switzerland.
  properties: carbon content, fossil 0.865, dry mass 1 kg, heating value, net 42.8 MJ, wet mass 1 kg
  note on carbon content, fossil: C-content of diesel is 86.5% (ecoinvent v2.2 report 6_IV, Tab 3.14)
- electricity, high voltage: 0.00924504 kWh; lognormal variance with pedigree 0.0032, pedigree (2,1,3,1,1)
  Electricity usage is calculated from total freight rail electricity usage (Transnet, 2017a) and total tonne.kms transported using electric locomotives (81% of total tonne.kms). The total tonne.kms transported by electric locomotives is calculated using the fuel and electricity efficiency (Transnet, 2017a) and the total tonne.kms of rail freight for 2017. Total tonne.kms for general freight was reported directly (Transnet, 2017b), while tonne.kms for iron ore and coal export were calculated from the total tonnages transported (Transnet, 2017b) and the average transport distance. Transport distance was averaged for 2009, 2010 and 2011 for iron ore exports and modelled by linear regression of 2009, 2010, 2011 and 2016 data for coal exports (Transnet, 2016a; Transnet, 2011; Transnet, 2010). A 50/50 split between medium and high voltage electricity is assumed, based roughly on the split of electric locomotives in the fleet (Transnet, 2016b). References: Transnet (2017a) Transnet Sustainability Report 2017; Transnet (2017b) Transnet Integrated Report 2017; Transnet (2016a); Transnet Long Term Planning Framework 2016 - Freight Demand Plan; Transnet (2016b) Transnet Long Term Planning Framework - Rail Development Plan; Transnet (2011) Integrated Annual Report 2011; Transnet (2010) Integrated Annual Report 2010
- electricity, medium voltage: 0.00924504 kWh; lognormal variance with pedigree 0.0032, pedigree (2,1,3,1,1)
  (same comment as for electricity, high voltage)
- goods wagon: 8.41908e-9 unit; lognormal variance with pedigree 0.3026, pedigree (2,1,3,1,1)
  Calculated value for the demand of a goods wagon to fulfil one tonne.km of freight rail transport. Calculation based on the number of goods wagons (Transnet, 2016a) and the total tonne.kms transported in the year. Total tonne.kms for general freight was reported directly (Transnet, 2017), while tonne.kms for iron ore and coal export were calculated from the total tonnages transported (Transnet, 2017) and the average transport distance. Transport distance was averaged for 2009, 2010 and 2011 for iron ore exports and modelled by linear regression of 2009, 2010, 2011 and 2016 data for coal exports (Transnet, 2016b; Transnet, 2011; Transnet, 2010). A goods wagon lifetime of 40 years was assumed (Spielmann et al., 2007). References: Transnet (2017) Transnet Integrated Report 2017; Transnet (2016a); Transnet Long Term Planning Framework 2016 - Rail Development Plan; Transnet (2016b); Transnet Long Term Planning Framework 2016 - Freight Demand Plan; Transnet (2011) Integrated Annual Report 2011; Transnet (2010) Integrated Annual Report 2010; Spielmann, M., Bauer, C., Dones, R. & Tuchschmid, M. (2007) Transport Services Data v2.0, ecoinvent association, Zurich, Switzerland.
  EcoSpold01Location=RER
- locomotive: 2.95798e-10 unit; lognormal variance with pedigree 0.3026, pedigree (2,1,3,1,1)
  EcoSpold01Location=RER
  Calculated value for the demand of an electric locomotive to fulfil one tonne.km of electric freight rail transport. Calculation based on the number of electric locomotives (Transnet, 2016a) and the total tonne.kms transported by electric locomotives in the year. The total tonne.kms transported by electric locomotives was calculated using the fuel and electricity efficiency (Transnet, 2017a) and the total tonne.kms of rail freight for 2017. Total tonne.kms for general freight was reported directly (Transnet, 2017b), while tonne.kms for iron ore and coal export were calculated from the total tonnages transported (Transnet, 2017b) and the average transport distance. Transport distance was averaged for 2009, 2010 and 2011 for iron ore exports and modelled by linear regression of 2009, 2010, 2011 and 2016 data for coal exports (Transnet, 2016b; Transnet, 2011; Transnet, 2010). A locomotive lifetime of 40 years was assumed (Spielmann et al., 2007). References: Transnet (2017a) Transnet Sustainability Report 2017; Transnet (2017b) Transnet Integrated Report 2017; Transnet (2016a); Transnet Long Term Planning Framework 2016 - Rail Development Plan; Transnet (2016b); Transnet Long Term Planning Framework 2016 - Freight Demand Plan; Transnet (2011) Integrated Annual Report 2011; Transnet (2010) Integrated Annual Report 2010; Spielmann, M., Bauer, C., Dones, R. & Tuchschmid, M. (2007) Transport Services Data v2.0, ecoinvent association, Zurich, Switzerland.
- maintenance, goods wagon: 8.41908e-9 unit; lognormal variance with pedigree 0.3026, pedigree (2,1,3,1,1)
  Calculated value for the demand of a goods wagon to fulfil one tonne.km of freight rail transport. Calculation based on the number of goods wagons (Transnet, 2016a) and the total tonne.kms transported in the year. Total tonne.kms for general freight was reported directly (Transnet, 2017), while tonne.kms for iron ore and coal export were calculated from the total tonnages transported (Transnet, 2017) and the average transport distance. Transport distance was averaged for 2009, 2010 and 2011 for iron ore exports and modelled by linear regression of 2009, 2010, 2011 and 2016 data for coal exports (Transnet, 2016b; Transnet, 2011; Transnet, 2010). A goods wagon lifetime of 40 years was assumed (Spielmann et al., 2007). References: Transnet (2017) Transnet Integrated Report 2017; Transnet (2016a); Transnet Long Term Planning Framework 2016 - Rail Development Plan; Transnet (2016b); Transnet Long Term Planning Framework 2016 - Freight Demand Plan; Transnet (2011) Integrated Annual Report 2011; Transnet (2010) Integrated Annual Report 2010; Spielmann, M., Bauer, C., Dones, R. & Tuchschmid, M. (2007) Transport Services Data v2.0, ecoinvent association, Zurich, Switzerland.
- maintenance, locomotive: 2.95798e-10 unit; lognormal variance with pedigree 0.3026, pedigree (2,1,3,1,1)
  Calculated value for the demand of an electric locomotive to fulfil one tonne.km of electric freight rail transport. Calculation based on the number of electric locomotives (Transnet, 2016a) and the total tonne.kms transported by electric locomotives in the year. The total tonne.kms transported by electric locomotives was calculated using the fuel and electricity efficiency (Transnet, 2017a) and the total tonne.kms of rail freight for 2017. Total tonne.kms for general freight was reported directly (Transnet, 2017b), while tonne.kms for iron ore and coal export were calculated from the total tonnages transported (Transnet, 2017b) and the average transport distance. Transport distance was averaged for 2009, 2010 and 2011 for iron ore exports and modelled by linear regression of 2009, 2010, 2011 and 2016 data for coal exports (Transnet, 2016b; Transnet, 2011; Transnet, 2010). A locomotive lifetime of 40 years was assumed (Spielmann et al., 2007). References: Transnet (2017a) Transnet Sustainability Report 2017; Transnet (2017b) Transnet Integrated Report 2017; Transnet (2016a); Transnet Long Term Planning Framework 2016 - Rail Development Plan; Transnet (2016b); Transnet Long Term Planning Framework 2016 - Freight Demand Plan; Transnet (2011) Integrated Annual Report 2011; Transnet (2010) Integrated Annual Report 2010; Spielmann, M., Bauer, C., Dones, R. & Tuchschmid, M. (2007) Transport Services Data v2.0, ecoinvent association, Zurich, Switzerland.
- railway track: 9.6793e-5 m*year; lognormal variance with pedigree 0.3026, pedigree (2,1,3,1,1)
  Calculated value for the demand of railway track to fulfil one tonne.km of electric freight rail transport. Calculation based on total two-way railway track length (Transnet, 2016b) and the total tonne.kms transported by electric locomotives in the year. The total tonne.kms transported by electric locomotives was calculated using the fuel and electricity efficiency (Transnet, 2017a) and the total tonne.kms of rail freight for 2017. Total tonne.kms for general freight was reported directly (Transnet, 2017b), while tonne.kms for iron ore and coal export were calculated from the total tonnages transported (Transnet, 2017b) and the average transport distance. Transport distance was averaged for 2009, 2010 and 2011 for iron ore exports and modelled by linear regression of 2009, 2010, 2011 and 2016 data for coal exports (Transnet, 2016b; Transnet, 2011; Transnet, 2010). References: Transnet (2017a) Transnet Sustainability Report 2017; Transnet (2017b) Transnet Integrated Report 2017; Transnet (2016a); Transnet Long Term Planning Framework 2016 - Rail Development Plan; Transnet (2016b); Transnet Long Term Planning Framework 2016 - Freight Demand Plan; Transnet (2011) Integrated Annual Report 2011; Transnet (2010) Integrated Annual Report 2010; Spielmann, M., Bauer, C., Dones, R. & Tuchschmid, M. (2007) Transport Services Data v2.0, ecoinvent association, Zurich, Switzerland.
  EcoSpold01Location=CH

## Emissions to nature
- Ammonia [air, unspecified]: 3.42189e-9 kg; lognormal variance with pedigree 0.0912, pedigree (2,3,5,5,3)
  Extrapolated from the global dataset (transport, freight train, diesel, GLO, 2004) using diesel consumption. The global dataset is derived from datasets described in full in Spielmann et al. (2007), with emissions in these datasets based on Swiss heavy goods vehicle emissions in urban traffic conditions. Reference: Spielmann, M., Bauer, C., Dones, R. & Tuchschmid, M. (2007) Transport Services Data v2.0, ecoinvent association, Zurich, Switzerland.
- Benzene [air, unspecified]: 1.71152e-8 kg; lognormal variance with pedigree 0.0912, pedigree (2,3,5,5,3)
  (same comment as for Ammonia)
- Cadmium II [air, unspecified]: 1.71246e-12 kg; lognormal variance with pedigree 0.708, pedigree (4,5,5,5,1)
  Extrapolated from the global dataset (transport, freight train, diesel, GLO, 2004) using diesel consumption. The global dataset is derived from datasets described in full in Spielmann et al. (2007), with heavy metal emissions in these datasets applying literature values from an EEA document, based on an expert panel review.
  Reference: Spielmann, M., Bauer, C., Dones, R. & Tuchschmid, M. (2007) Transport Services Data v2.0, ecoinvent association, Zurich, Switzerland.
- Carbon dioxide, fossil [air, unspecified]: 0.000538099 kg; lognormal variance with pedigree 0.0438, pedigree (2,3,5,5,1)
  Extrapolated from the global dataset (transport, freight train, diesel, GLO, 2004) using diesel consumption. The global dataset is derived from datasets described in full in Spielmann et al. (2007), with carbon dioxide emissions in these datasets calculated assuming that all carbon in the fuel is converted to carbon dioxide. The emission index is therefore 3,146 g/kg (Spielmann et al., 2007).
  Reference: Spielmann, M., Bauer, C., Dones, R. & Tuchschmid, M. (2007) Transport Services Data v2.0, ecoinvent association, Zurich, Switzerland.
- Carbon monoxide, fossil [air, unspecified]: 2.70867e-6 kg; lognormal variance with pedigree 0.6932, pedigree (2,3,5,5,1)
  Extrapolated from the global dataset (transport, freight train, diesel, GLO, 2004) using diesel consumption. The global dataset is derived from datasets described in full in Spielmann et al. (2007), with carbon monoxide emissions in these datasets based on a literature study on shunting specific emissions indices.
  Reference: Spielmann, M., Bauer, C., Dones, R. & Tuchschmid, M. (2007) Transport Services Data v2.0, ecoinvent association, Zurich, Switzerland.
- Chromium III [air, unspecified]: 8.54414e-12 kg; lognormal variance with pedigree 0.708, pedigree (4,5,5,5,1)
  (same comment as for Cadmium II)
- Copper ion [air, unspecified]: 2.90956e-10 kg; lognormal variance with pedigree 0.708, pedigree (4,5,5,5,1)
  (same comment as for Cadmium II)
- Dinitrogen monoxide [air, unspecified]: 1.71152e-8 kg; lognormal variance with pedigree 0.0912, pedigree (2,3,5,5,3)
  (same comment as for Ammonia)
- Lead II [air, unspecified]: 1.87244e-14 kg; lognormal variance with pedigree 0.708, pedigree (4,5,5,5,1)
  Extrapolated from the global dataset (transport, freight train, diesel, GLO, 2004) using diesel consumption. The global dataset is derived from datasets described in full in Spielmann et al. (2007), with lead emissions in these datasets are based on literature values from Jungbluth (Spielmann et al., 2007). Reference: Spielmann, M., Bauer, C., Dones, R. & Tuchschmid, M. (2007) Transport Services Data v2.0, ecoinvent association, Zurich, Switzerland.
- Mercury II [air, unspecified]: 3.42189e-15 kg; lognormal variance with pedigree 0.708, pedigree (4,5,5,5,1)
  Extrapolated from the global dataset (transport, freight train, diesel, GLO, 2004) using diesel consumption. The global dataset is derived from datasets described in full in Spielmann et al. (2007), with mercury emissions in these datasets are based on a literature value from Jungbluth (Spielmann et al., 2007). Reference: Spielmann, M., Bauer, C., Dones, R. & Tuchschmid, M. (2007) Transport Services Data v2.0, ecoinvent association, Zurich, Switzerland.
- Methane, fossil [air, unspecified]: 2.22386e-8 kg; lognormal variance with pedigree 0.0912, pedigree (2,3,5,5,3)
  (same comment as for Ammonia)
- NMVOC, non-methane volatile organic compounds [air, unspecified]: 3.41974e-7 kg; lognormal variance with pedigree 0.0912, pedigree (2,3,5,5,3)
  NMVOC emissions from diesel consumed during shunting are calculated from hydrocarbon emission factors for locomotives following UIC I and UIC II emissions standards available in EcoTransIT (2016) (g/kg diesel), corrected for methane emissions. It is assumed that 44% of South African locomotives meet non-regulated emission factors, while the remaining 56% meet UIC II emission standards (based on the tonne.kms transported by Class 43 diesel locomotives, as these are currently the only locomotives to meet UIC II emission standards in South Africa (TransportWorldAfrica, 2012). The tonne.kms transported by Class 43 versus other diesel locomotives is estimated from the number of Class 43 locomotives (Transnet (2016), the routes on which these locomotives operate (Creamer, 2012), the gross tonne.km performance of locomotives (Transnet, 2013; Transnet, 2017) and the ratio of gross to net tonn.kms (Transnet, 2017)). The breakdown of particulates into size fractions is based on the global dataset (transport, freight train, diesel, GLO, 2004), with the global dataset derived from datasets described in full in Spielmann et al. (2007). In these datasets the particulate size distribution is assumed to match that of diesel locomotives without particulate filters, as presented by EU-Norm IIIa (Spielmann et al., 2007). References: Spielmann, M., Bauer, C., Dones, R. & Tuchschmid, M. (2007) Transport Services Data v2.0, ecoinvent association, Zurich, Switzerland; EcoTransIT (2016) Ecological Transport Information Tool for Worldwide Transports - Methodology and Data Update; Transnet (2016) Long Term Planning Framework 2016 - Rail Development Plan; TransportWorldAfrica (2012) GE Transportation & MIC deliver reliable locomotives with high local content on-time. Available at: http://www.transportworldafrica.co.za/2012/06/28/ge-transportation-mic-deliver-reliable-locomotives-with-high-local-content-on-time/ (22 May 2018).; Creamer, T. (2012) Transnet boosts locomotive manufacturing capacity, confirms new order of 43 more GE units. Creamer Media's Engineering News. Available at: http://www.engineeringnews.co.za/article/transnet-boosts-loco-manufacturing-capacity-as-it-confirms-new-order-for-43-more-ge-units-2012-01-10/rep_id:4136.; Transnet (2013) Transnet Freight Rail Annual Integrated Report 2013. Transnet.; Transnet (2017) Transnet Freight Rail 2017. Transnet.
- Nickel II [air, unspecified]: 1.19489e-11 kg; lognormal variance with pedigree 0.708, pedigree (4,5,5,5,1)
  (same comment as for Cadmium II)
- Nitrogen oxides [air, unspecified]: 4.33221e-6 kg; lognormal variance with pedigree 0.0832, pedigree (2,3,5,5,1)
  Nitrogen oxide emissions from diesel consumed during shunting are calculated from NOx emission factors for locomotives following UIC I and UIC II emissions standards available in EcoTransIT (2016) (g/kg diesel). It is assumed that 44% of South African locomotives meet non-regulated emission factors, while the remaining 56% meet UIC II emission standards (based on the tonne.kms transported by Class 43 diesel locomotives, as these are currently the only locomotives to meet UIC II emission standards in South Africa (TransportWorldAfrica, 2012). The tonne.kms transported by Class 43 versus other diesel locomotives is estimated from the number of Class 43 locomotives (Transnet (2016), the routes on which these locomotives operate (Creamer, 2012), the gross tonne.km performance of locomotives (Transnet, 2013; Transnet, 2017) and the ratio of gross to net tonn.kms (Transnet, 2017)). The breakdown of particulates into size fractions is based on the global dataset (transport, freight train, diesel, GLO, 2004), with the global dataset derived from datasets described in full in Spielmann et al. (2007). In these datasets the particulate size distribution is assumed to match that of diesel locomotives without particulate filters, as presented by EU-Norm IIIa (Spielmann et al., 2007). References: Spielmann, M., Bauer, C., Dones, R. & Tuchschmid, M. (2007) Transport Services Data v2.0, ecoinvent association, Zurich, Switzerland; EcoTransIT (2016) Ecological Transport Information Tool for Worldwide Transports - Methodology and Data Update; Transnet (2016) Long Term Planning Framework 2016 - Rail Development Plan; TransportWorldAfrica (2012) GE Transportation & MIC deliver reliable locomotives with high local content on-time. Available at: http://www.transportworldafrica.co.za/2012/06/28/ge-transportation-mic-deliver-reliable-locomotives-with-high-local-content-on-time/ (22 May 2018).; Creamer, T. (2012) Transnet boosts locomotive manufacturing capacity, confirms new order of 43 more GE units. Creamer Media's Engineering News. Available at: http://www.engineeringnews.co.za/article/transnet-boosts-loco-manufacturing-capacity-as-it-confirms-new-order-for-43-more-ge-units-2012-01-10/rep_id:4136.; Transnet (2013) Transnet Freight Rail Annual Integrated Report 2013. Transnet.; Transnet (2017) Transnet Freight Rail 2017. Transnet.
- Particulate Matter, < 2.5 um [air, unspecified]: 6.46675e-8 kg; lognormal variance with pedigree 0.3446, pedigree (3,3,5,5,1)
  Particulate emissions are calculated from particulate emission factors for locomotives following non-regulated and UIC II emissions standards available in EcoTransIT (2016) (g/kg diesel). It is assumed that 44% of South African locomotives meet non-regulated emission factors, while the remaining 56% meet UIC II emission standards (based on the tonne.kms transported by Class 43 diesel locomotives, as these are currently the only locomotives to meet UIC II emission standards in South Africa (TransportWorldAfrica, 2012). The tonne.kms transported by Class 43 versus other diesel locomotives is estimated from the number of Class 43 locomotives (Transnet (2016), the routes on which these locomotives operate (Creamer, 2012), the gross tonne.km performance of locomotives (Transnet, 2013; Transnet, 2017) and the ratio of gross to net tonn.kms (Transnet, 2017)). The breakdown of particulates into size fractions is based on the global dataset (transport, freight train, diesel, GLO, 2004), with the global dataset derived from datasets described in full in Spielmann et al. (2007). In these datasets the particulate size distribution is assumed to match that of diesel locomotives without particulate filters, as presented by EU-Norm IIIa (Spielmann et al., 2007). References: Spielmann, M., Bauer, C., Dones, R. & Tuchschmid, M. (2007) Transport Services Data v2.0, ecoinvent association, Zurich, Switzerland; EcoTransIT (2016) Ecological Transport Information Tool for Worldwide Transports - Methodology and Data Update; Transnet (2016) Long Term Planning Framework 2016 - Rail Development Plan; TransportWorldAfrica (2012) GE Transportation & MIC deliver reliable locomotives with high local content on-time. Available at: http://www.transportworldafrica.co.za/2012/06/28/ge-transportation-mic-deliver-reliable-locomotives-with-high-local-content-on-time/ (22 May 2018).; Creamer, T. (2012) Transnet boosts locomotive manufacturing capacity, confirms new order of 43 more GE units. Creamer Media's Engineering News. Available at: http://www.engineeringnews.co.za/article/transnet-boosts-loco-manufacturing-capacity-as-it-confirms-new-order-for-43-more-ge-units-2012-01-10/rep_id:4136.; Transnet (2013) Transnet Freight Rail Annual Integrated Report 2013. Transnet.; Transnet (2017) Transnet Freight Rail 2017. Transnet.
- Particulate Matter, > 10 um [air, unspecified]: 1.17925e-5 kg; lognormal variance with pedigree 0.0846, pedigree (3,3,5,5,1)
  Particulate emissions from both abrasion and fuel combustion are considered. Particulate emissions from the abrasion of railway tracks, wheels, brakes and overhead lines (1.17E-5) are taken from Spielmann et al. (2007). Particulate emissions from diesel use are calculated from particulate emission factors for locomotives following non-regulated and UIC II emissions standards available in EcoTransIT (2016) (g/kg diesel). It is assumed that 44% of South African locomotives meet non-regulated emission factors, while the remaining 56% meet UIC II emission standards (based on the tonne.kms transported by Class 43 diesel locomotives, as these are currently the only locomotives to meet UIC II emission standards in South Africa (TransportWorldAfrica, 2012). The tonne.kms transported by Class 43 versus other diesel locomotives is estimated from the number of Class 43 locomotives (Transnet (2016), the routes on which these locomotives operate (Creamer, 2012), the gross tonne.km performance of locomotives (Transnet, 2013; Transnet, 2017) and the ratio of gross to net tonn.kms (Transnet, 2017)). The breakdown of particulates into size fractions is based on the global dataset (transport, freight train, diesel, GLO, 2004), with the global dataset derived from datasets described in full in Spielmann et al. (2007). In these datasets the particulate size distribution is assumed to match that of diesel locomotives without particulate filters, as presented by EU-Norm IIIa (Spielmann et al., 2007). References: Spielmann, M., Bauer, C., Dones, R. & Tuchschmid, M. (2007) Transport Services Data v2.0, ecoinvent association, Zurich, Switzerland; EcoTransIT (2016) Ecological Transport Information Tool for Worldwide Transports - Methodology and Data Update; Transnet (2016) Long Term Planning Framework 2016 - Rail Development Plan; TransportWorldAfrica (2012) GE Transportation & MIC deliver reliable locomotives with high local content on-time. Available at: http://www.transportworldafrica.co.za/2012/06/28/ge-transportation-mic-deliver-reliable-locomotives-with-high-local-content-on-time/ (22 May 2018).; Creamer, T. (2012) Transnet boosts locomotive manufacturing capacity, confirms new order of 43 more GE units. Creamer Media's Engineering News. Available at: http://www.engineeringnews.co.za/article/transnet-boosts-loco-manufacturing-capacity-as-it-confirms-new-order-for-43-more-ge-units-2012-01-10/rep_id:4136.; Transnet (2013) Transnet Freight Rail Annual Integrated Report 2013. Transnet.; Transnet (2017) Transnet Freight Rail 2017. Transnet.
- Particulate Matter, > 2.5 um and < 10um [air, unspecified]: 1.63721e-5 kg; lognormal variance with pedigree 0.1646, pedigree (3,3,5,5,1)
  Particulate emissions from both abrasion and fuel combustion are considered. Particulate emissions from the abrasion of railway tracks, wheels, brakes and overhead lines (1.63E-5) are taken from Spielmann et al. (2007). Particulate emissions from diesel use are calculated from particulate emission factors for locomotives following non-regulated and UIC II emissions standards available in EcoTransIT (2016) (g/kg diesel). It is assumed that 44% of South African locomotives meet non-regulated emission factors, while the remaining 56% meet UIC II emission standards (based on the tonne.kms transported by Class 43 diesel locomotives, as these are currently the only locomotives to meet UIC II emission standards in South Africa (TransportWorldAfrica, 2012). The tonne.kms transported by Class 43 versus other diesel locomotives is estimated from the number of Class 43 locomotives (Transnet (2016), the routes on which these locomotives operate (Creamer, 2012), the gross tonne.km performance of locomotives (Transnet, 2013; Transnet, 2017) and the ratio of gross to net tonn.kms (Transnet, 2017)). The breakdown of particulates into size fractions is based on the global dataset (transport, freight train, diesel, GLO, 2004), with the global dataset derived from datasets described in full in Spielmann et al. (2007). In these datasets the particulate size distribution is assumed to match that of diesel locomotives without particulate filters, as presented by EU-Norm IIIa (Spielmann et al., 2007). References: Spielmann, M., Bauer, C., Dones, R. & Tuchschmid, M. (2007) Transport Services Data v2.0, ecoinvent association, Zurich, Switzerland; EcoTransIT (2016) Ecological Transport Information Tool for Worldwide Transports - Methodology and Data Update; Transnet (2016) Long Term Planning Framework 2016 - Rail Development Plan; TransportWorldAfrica (2012) GE Transportation & MIC deliver reliable locomotives with high local content on-time. Available at: http://www.transportworldafrica.co.za/2012/06/28/ge-transportation-mic-deliver-reliable-locomotives-with-high-local-content-on-time/ (22 May 2018).; Creamer, T. (2012) Transnet boosts locomotive manufacturing capacity, confirms new order of 43 more GE units. Creamer Media's Engineering News. Available at: http://www.engineeringnews.co.za/article/transnet-boosts-loco-manufacturing-capacity-as-it-confirms-new-order-for-43-more-ge-units-2012-01-10/rep_id:4136.; Transnet (2013) Transnet Freight Rail Annual Integrated Report 2013. Transnet.; Transnet (2017) Transnet Freight Rail 2017. Transnet.
- Selenium IV [air, unspecified]: 1.71246e-12 kg; lognormal variance with pedigree 0.708, pedigree (4,5,5,5,1)
  (same comment as for Cadmium II)
- Sulfur dioxide [air, unspecified]: 1.71152e-7 kg; lognormal variance with pedigree 0.0438, pedigree (2,3,5,5,1)
  Sulphur dioxide emissions from diesel consumed during shunting are calculated from diesel usage and assuming that all sulphur in the fuel is converted to sulphur dioxide (Spielmann et al., 2007). South Africa currently uses diesel with a sulphur content of 500 ppm (SAPIA, 2015), resulting in an emission index of 10 g/kg.
  Reference: Spielmann, M., Bauer, C., Dones, R. & Tuchschmid, M. (2007) Transport Services Data v2.0, ecoinvent association, Zurich, Switzerland; SAPIA (2015) Cleaner Fuels II, Available at: http://www.sapia.org.za/key-issues/cleaner-fuels-ii (22 May 2018).
- Sulfur hexafluoride [air, unspecified]: 2.12529e-9 kg; lognormal variance with pedigree 0.1, pedigree (3,5,5,5,3)
  Sulphur hexafluoride (SF6) emissions are taken from the global dataset (transport, freight train, electricity, GLO, 2004). The global dataset is the weighted average of "transport, freight train, electricity, CH, 2000", "transport, freight train, electricity, CN, 2004" and "transport, freight train, electricity, Europe without Switzerland, 2000"./ SF6 emissions in these datasets are based on literature emissions per kWh (Spielmann et al., 2007). Reference: Spielmann, M., Bauer, C., Dones, R. & Tuchschmid, M. (2007) Transport Services Data v2.0, ecoinvent association, Zurich, Switzerland.
- Toluene [air, unspecified]: 6.83531e-9 kg; lognormal variance with pedigree 0.0926, pedigree (3,3,5,5,3)
  (same comment as for Ammonia)
- Xylenes, unspecified [air, unspecified]: 6.83531e-9 kg; lognormal variance with pedigree 0.0926, pedigree (3,3,5,5,3)
  (same comment as for Ammonia)
- Zinc II [air, unspecified]: 1.71246e-10 kg; lognormal variance with pedigree 0.708, pedigree (4,5,5,5,1)
  (same comment as for Cadmium II)
- Iron ion [soil, unspecified]: 9.63488e-7 kg; lognormal variance with pedigree 0.25, pedigree (5,5,5,5,5)
  Extrapolated from the global dataset (transport, freight train, diesel, GLO, 2004) using diesel consumption. The global dataset is derived from datasets described in full in Spielmann et al. (2007), with iron emissions to soil in these datasets based on annual iron load and the assumption that all non-airborne abrasion emissions are emitted as iron to soil. Reference: Spielmann, M., Bauer, C., Dones, R. & Tuchschmid, M. (2007) Transport Services Data v2.0, ecoinvent association, Zurich, Switzerland.

## Sampling procedure
Demand for electricity, diesel, locomotive, goods wagon and railway track from South African national rail transport statistics and representative of all rail freight movements in the reference year. Particulate, NOx, SOx and NMVOC emissions from EcoTransIT (2016) applying the emission factors most relevant to South African locomotives (non-regulated and UIC II).

## Extrapolations
Emission of sulphur hexafluoride (SF6) is taken from the global dataset. All other emissions to air (other than particulates, NOx, SOx and NMVOC) extrapolated from global dataset on the basis of diesel consumption.
