# concrete production, 25MPa, for building construction, with cement, CP-II-E

Dataset: EcoSpold 2, unit process
Geography: BR
Time period: 2015-10-25 to 2023-10-25
Technology level: current
Classification: EcoSpold01Categories: construction materials/concrete
Classification: ISIC rev.4 ecoinvent: 2395:Manufacture of articles of concrete, cement and plaster
Synonyms: ready-mix concrete; ready mixed concrete
Scenario: Business-as-Usual
System model: Allocation, cut-off by classification
Share of production covered: 3.33 %
Generated by: Fernanda Belizario Silva
Published in: Silva, F. B. 2017
Database: ecoinvent
isCopyrightProtected: false
accessRestrictedTo: 1

## General comment
This dataset represents the production of ready-mixed concrete in Brazil, with 25 MPa compressive strength at 28 days and a slump of 100mm, with "cement blast furnace slag 6-34%" (CP-II-E). Ingredients (for 1 m³): Cement 234 kg, Water 174 kg, Sand 472 kg, Artificial sand + gravel 1509 kg, Polifunctional admixture 1,82 kg.
The waste generated in production has been accounted for, and the amount of additional inputs was proportionately split up between concrete ingredients.
25 MPa concrete is intended for building structures in general, not exposed to freeze-thaw, including residential, commercial and industrial uses. Ready mix concrete production consists on mixing cement, aggregates, admixtures and water in a predefined proportion, using an automatic dosing central. The proportioned mix is discharged in the concrete delivery truck. In accordance with national standard NBR 7212, when necessary (e.g. great transport distance or road traffic), it is possible to partially mix concrete at the dosing central and store the remaining water in a reservoir within the truck for consistency adjustment at the construction site. In that case, such addition must happen immediately before final mixing and unloading of premix concrete, and a rigorous control system must be established to document the amount of water added at the dosing central and at the construction site, to preserve the water cement ratio predicted for the mix. The concrete mix (cement, SCM, aggregate, water, admixtures) is an average of 17 mix designs, provided by 17 concrete making plants located in the South, Southeast, Northeast and Center-west regions of Brazil.
The dataset represents the production of fresh concrete and includes the water to be added at the construction site for consistency adjustment. Exchange properties are declared for the fresh concrete. Concrete dry mass considers the amount of water that reacts with cement to form hydrates. As a consequence, this dataset is not water balanced according to ecoinvent guidelines.
Annual production volume of Ready-Mix concrete for Brazil estimated based on a report published by the Brazilian Association for Portland Cement (ABCP) in 2013 and cement consumption data for 2016, also by ABCP.
Distribution by ready-mix strength class:
- 25/30 MPa = 84%
- 35/40 MPa = 11%
The remaining 4% are associated to the strength class 20 MPa, not modelled here due to its inexpressive consumption.
Reference: "Panorama e Tendências Técnico-Mercadológicas do Setor de Concreto. São Paulo, ABCP, 2013".

## Included activities start
From reception of raw materials at the ready-mix plant gate.

## Included activities end
This activity ends before the delivery of concrete at the construction site.
The dataset includes the whole manufacturing processes to produce ready-mixed concrete, internal processes (material handling and mixing) and infrastructure. Water used for cleaning the truck and waste water were also accounted for.

## Geography
Brazilian data. For some exchanges GLO values have been used as proxy. Data quality indicators adjusted accordingly.

## Technology
Typical technology for average Brazilian production.

## Time period
Literature data are from 2015 and mix designs were provided in 2017

## Parameters
- losses: 0.038 dimensionless
  Literature value. Concrete losses (%) due to returned concrete from construction sites.

## Reference product
- concrete, 25MPa: 1 m3; name red; By-product classification allocatable product; CPC 37510: Non-refractory mortars and concretes; HS2017 6810: Cement, concrete or artificial stone; whether or not reinforced, articles thereof
  25 MPa concrete is intended for building structures in general, not expposed to freeze-thaw, including residential, commercial and industrial uses.
  production volume 3.80836e6 m3; name PV
    Production volume and proportion per strength class derived from a report published by the Brazilian Association for Portland cement in 2013. Production volumes adjusted to 2016 based on more recent data for cement consumption from ABCP. Proportion per type of cement derived from expert estimation on cement consumption in Brazil (see Brazilian cement datasets).
  property cement content 234 kg; name cement
  property gravel content 1509 kg; name gravel
  property price 185 EUR2005
    Estimated to be the same price as in case of concrete, normal (Data are not easily available. Therefore, an average price of products supplied by the activities in the same ISIC 3 code has been applied.This price is obtained as '_49 Concrete, asphalt and other mineral products, EU27 virgin, EU27' in the 'EU & DK Input Output Database' (available in SimaPro). The price is assumed to be valid for both RER2003, RER 2004, world 2003 and world 2004. Multiplied by density.).
  property sand content 472 kg; name sand
  property wet mass 2390 kg; name concrete_density
  properties: carbon allocation 0 kg, carbon content 0, carbon content, fossil 0, carbon content, non-fossil 0, dry mass 2271 kg, water content 0.0523998, water in wet mass 119 kg

## Inputs from technosphere
- cement, CP II-E: 242.892 kg; = cement*(1+losses); lognormal variance with pedigree 0.0042, pedigree (2,3,3,1,1)
  Calculated value, Weighted average from 17 concrete mix designs. Losses considered.
  Uncertainty: V
  properties: dry mass 1 kg, wet mass 1 kg
- chemical, organic: 1.88397 kg; = 1,815*(1+losses); lognormal variance with pedigree 0.0052, pedigree (2,3,3,1,1)
  Calculated value. Value for polyfunctional admixture. Weighted average from 17 concrete mix designs. Losses considered.
  Uncertainty: V
  properties: bulk density 1140 kg/m3, dry mass 1 kg, heating value, net 19.03 MJ, wet mass 1 kg
- concrete mixing factory: 4.57e-7 unit; source Kellenberger D. 2007; lognormal variance with pedigree 0.3706, pedigree (2,5,5,5,1)
  Literature value. From ecoinvent dataset "concrete production, 25 MPa, RNA only, GLO, 2006-2006" Access date 10.10.2017
  Uncertainty: B
- diesel, burned in building machine: 5.01 MJ; source Alessandra Castro 2015; lognormal variance with pedigree 0.0052, pedigree (2,4,3,1,1)
  Literature value. Diesel used in internal transportation equipment.
  Uncertainty: V
  property density 0.84 kg/l; name density_diesel
  property heating value, net 1 MJ; name NHV_diesel
- electricity, medium voltage: 2.99 kWh; lognormal variance with pedigree 0.2372, pedigree (2,3,3,1,1)
  Calculated value, Weighted average amount from 29 concrete plants.
  Uncertainty: V
- gravel, crushed: 1566.34 kg; = gravel*(1+losses); lognormal variance with pedigree 0.0172, pedigree (2,3,3,1,1)
  Calculated value = amount of artificial sand (crushed gravel is used as a proxy in this case) + amount of gravel, Weighted average from 17 concrete mix designs. Losses considered.
  Uncertainty: V
  properties: dry mass 1 kg, wet mass 1 kg
- lubricating oil: 0.0499 kg; name lub_oil; lognormal variance with pedigree 0.2992, pedigree (2,3,3,1,1)
  Calculated value. Weighted average amount from 34 concrete plants,
  Uncertainty: V
  properties: dry mass 1 kg, heating value, net 40.2 MJ, wet mass 1 kg
  note on heating value, net: Literature value, Source: IPCC 2006, 2006 IPCC Guidelines for National Greenhouse Gas Inventories, Prepared by the National Greenhouse Gas Inventories Programme, Eggleston H.S., Buendia L., Miwa K., Ngara T. and Tanabe K. (eds). Published: IGES, Japan
- sand: 489.936 kg; = sand*(1+losses); lognormal variance with pedigree 0.0822, pedigree (2,3,3,1,1)
  (same comment as for cement, CP II-E)
  properties: dry mass 1 kg, wet mass 1 kg
- scrap steel: -0.0238 kg; name scrap_steel; = steel; lognormal variance with pedigree 0.0208, pedigree (2,5,2,5,1)
  Literature value. From ecoinvent dataset "concrete production, 25 MPa, RNA only, GLO, 2006-2006l". Access date: 10.10.2017.
  Uncertainty: B
  production volume; = PV * (scrap_steel / red)
    Calculated from production volume of reference product using the relative outputs.
  properties: dry mass 1 kg, wet mass 1 kg
- steel, low-alloyed, hot rolled: 0.0238 kg; name steel; source Kellenberger D. 2007; lognormal variance with pedigree 0.0606, pedigree (2,5,5,5,1)
  (same comment as for scrap steel)
  properties: dry mass 1 kg, wet mass 1 kg
- synthetic rubber: 0.0345 kg; name rub; lognormal variance with pedigree 0.7232, pedigree (2,3,3,1,1)
  Calculated value. Weighted average amount from 34 concrete plants
  Uncertainty: V
  properties: dry mass 1 kg, heating value, net 26.42 MJ, wet mass 1 kg
- tap water: 180.612 kg; = 174*(1+losses); lognormal variance with pedigree 0.0042, pedigree (2,3,3,1,1)
  Calculated value. Water for concrete mix. Includes water from aggregates. Weighted average from 17 concrete mix designs. Losses considered.
  Uncertainty: V
  properties: wet mass 1 kg
- waste concrete: -90.82 kg; name was_concrete; = concrete_density*losses; source Alessandra Castro 2015; lognormal variance with pedigree 0.0032, pedigree (2,4,1,1,1)
  Literature value.
  Uncertainty: V
  production volume; = PV * (was_concrete / red)
    Calculated from production volume of reference product using the relative outputs.
  property carbon content, fossil 0; name was_concrete_C_content_fossil
  properties: dry mass 0.9499 kg, water content 0.0527424, wet mass 1 kg
- waste mineral oil: -0.0499 kg; name waste_mineral_oil; = lub_oil; lognormal variance with pedigree 0.2972, pedigree (2,3,1,1,1)
  Calculated value.
  Uncertainty: V
  production volume; = PV * (waste_mineral_oil / red)
    Calculated from production volume of reference product using the relative outputs.
  properties: carbon content, fossil 0.864444, dry mass 0.9 kg, heating value, net 34.7 MJ, water content 0.111111, wet mass 1 kg
  note on carbon content, fossil: Tab A.6, ecoinvent v2.2 report 13_I. C content has been calculated after data in the tables, and then referred to 1 kg DM
  note on heating value, net: Value taken from the general comment of the treatment dataset.
- waste rubber, unspecified: -0.0345 kg; name waste_rubber; = rub; lognormal variance with pedigree 0.7212, pedigree (2,3,1,1,1)
  Calculated value.
  Uncertainty: V
  production volume; = PV * (waste_rubber / red)
    Calculated from production volume of reference product using the relative outputs.
  properties: carbon content, fossil 0.853, dry mass 1 kg, heating value, net 27.19 MJ, wet mass 1 kg
- wastewater from concrete production: -0.161 m3; name wastewater_from_concrete; = was_water; lognormal variance with pedigree 0.3682, pedigree (2,3,1,1,1)
  Calculated value. Based on weighted average amount from 26 concrete plants, referring to water used for washing the concrete trucks and the internal circulation area in the ready-mix facility.
  Uncertainty: V
  production volume; = PV * (wastewater_from_concrete / red)
    Calculated from production volume of reference product using the relative outputs.
  property dry mass 0.44914 kg; name was_water_DM
  properties: carbon content, fossil 0.027074, water content 2225.48, wet mass 1000 kg

## Inputs from nature
- Water, unspecified natural origin [natural resource, in water]: 0.161 m3; name was_water; lognormal variance with pedigree 0.3702, pedigree (2,3,3,1,1)
  Calculated value. Weighted average amount from 26 concrete plants. Water used for washing the concrete trucks and the internal circulation area in the ready-mix facility.
  Uncertainty: V

## Sampling procedure
Data on concrete mixes are a weighted average of 17 concrete ready mix facilities, of 2 different companies. For other flows, the weighted average was calculated from several different concrete plants (26 for process water, 34 for rubber parts and lubricating oil, 29 for electricity), belonging to one of the 7 concrete making companies that provided data. Basic uncertainty was calculated from the coefficient of variation of the sample.
Diesel consumption and waste generation values were taken from a published paper. For other materials used for maintenance (steel parts) and infrastructure, data were extrapolated from the dataset "concrete production, 25 MPa, RNA only, GLO, 2006-2009" (accessed 10.10.2017).
No conversion to the geometric mean of the lognormal distribution was done, for consistency reasons with other ecoinvent datasets.

Representativeness is of 3,33% based on the number of companies that provided concrete mix data (2) divided by the total number of ready-mix concrete production companies in Brazil (60), which is the number of respondant companies in the national survey carried out by ABCP in 2013.

## Extrapolations
Data from a relatively small sample concentrated mostly in the Southeastern region of Brazil, with some facilities spread out in the South, Northeast and Center-west regions, are used to represent the Brazilian concrete production. Some flows have been kept as in the dataset "concrete production, 25 MPa, RNA only, GLO, 2006-2006", but uncertainties were adjusted accordingly.
