# plastic flake production, consumer electronics, for recycling, by grinding/shredding, informal sector

Dataset: EcoSpold 2, unit process
Geography: IN
Time period: 2017-01-01 to 2023-12-31
Technology level: old
Classification: ISIC rev.4 ecoinvent: 3830:Materials recovery
Scenario: Business-as-Usual
System model: Allocation, cut-off by classification
Share of production covered: 1 %
Generated by: Prasad Gangane
Published in: Gangane, P. 2017
Database: ecoinvent
isCopyrightProtected: true
accessRestrictedTo: 1

## General comment
New Delhi informal plastic recycling market is South Asia's largest recycling hub. The raw material is collected from all parts of the country. The informal sector works on its large collection network of ragpickers and kabbadiwalas present throughout the country. It is known to be one of the most efficient collection channels due to its reach to every household in the country and efficient sorting techniques. Once the received plastics are segregated, cleaned and sorted, the plastics are grinded into smaller flakes. The grinding phase generally comprises of shredders that reduce bulk plastics into smaller flakes. Electricity is obtained from the grid. Certain units that do not have a connection to the grid use generator sets with diesel as fuel in it. Data collection questionnaire was circulated amongst the recyclers and on-site visits were carried out. Information provided was verified and actual readings were taken related to electrical energy consumption the informal sector.

## Included activities start
This dataset include activities that occur once the material is sorted and is received for grinding or shredding.

## Included activities end
This dataset includes activities until the received sorted waste plastics is ground or shredded into smaller plastic flakes.

## Geography
The geography included for the informal sector mainly includes the recycling hub at New Delhi. However, since country's majority of the recycling happens in this hub, the data set can be considered complete.

## Technology
The informal sector uses equipment that it has been utilizing for several years. The equipment are generally assembled ones and do not refer to any particular supplier. Hence it can be considered as an old technology.

## Time period
The recycling sector has been following this method for several years. There is no anticipated change in the next few years in their method of working. However, with the new e-waste rules in the country, certain changes are expected to occur over a period of time, however, may not be earlier than 2022.

## Reference product
- plastic flake, consumer electronics, for recycling: 1 kg; name RP_amount_1; By-product classification Recyclable; CPC 39270: Waste, parings and scrap of plastics; HS2017 391590: Plastics n.e.c. in heading no. 3915; waste, parings and scrap
  plastic flakes produced from the grinding operations.
  production volume 2.9857e8 kg; name RP_PV_1
    Plastic output from grinding. Annual production volume is estimated based on the report on Plastic Scrap Trading in India, 2016 by Daniel Kross an intern at EMPA
  property price 0.6 EUR2005
    Temporary from https://www.alibaba.com/showroom/pet-flakes-price.html
  properties: carbon allocation 0.83022 kg, carbon content 0.83022, carbon content, fossil 0.83022, concentration, cadmium 1.05e-7 kg/kg, concentration, chromium 9.1e-7 kg/kg, concentration, copper 6.2e-7 kg/kg, concentration, lead 5.66e-7 kg/kg, concentration, nickel 1.225e-6 kg/kg, concentration, zinc 6.517e-5 kg/kg, dry mass 1 kg, heating value, net 34.78 MJ, total polycyclic aromatic hydrocarbon content 0.0010858, wet mass 1 kg

## Inputs from technosphere
- carbon black: 4.85517e-5 kg; lognormal variance with pedigree 0.131225, pedigree (2,5,3,2,2)
  Carbon black is used for producing black colored pallets
  properties: carbon content, fossil 0.85, dry mass 1 kg, heating value, net 25.76 MJ, wet mass 1 kg
- diesel, burned in diesel-electric generating set, 18.5kW: 0.159237 MJ; lognormal variance with pedigree 0.011825, pedigree (2,5,3,2,2)
  DG set is used for generating electricity
- electricity, low voltage: 0.0158489 kWh; lognormal variance with pedigree 0.011825, pedigree (2,5,3,2,2)
  Electricity consumed during the grinding operations and used for other auxiliary applciation
- waste plastic, consumer electronics: -0.0264237 kg; name BP_amount_1; lognormal variance with pedigree 0.049225, pedigree (2,5,1,2,2)
  Plastic waste is sent for recycling to other units or brick kilns
  production volume; = RP_PV_1 * (BP_amount_1 / RP_amount_1)
    Calculated from production volume of reference product using the relative outputs.
  properties: carbon content, fossil 0.83022, concentration, cadmium 1.05e-7 kg/kg, concentration, chromium 9.1e-7 kg/kg, concentration, copper 6.2e-7 kg/kg, concentration, lead 6.2e-7 kg/kg, concentration, nickel 1.225e-6 kg/kg, concentration, zinc 6.517e-5 kg/kg, dry mass 0.847 kg, heating value, net 34.78 MJ, total polycyclic aromatic hydrocarbon content 0.0010858, water content 0.18064, wet mass 1 kg
  note on heating value, net: Assumed equal to "waste plastic, consumer electronics, sorted".
- waste plastic, consumer electronics, sorted: 1.02642 kg
  This exchange represents the cleaned and sorted material used by formal and informal plastic recycling sectors in India. These recyclers are engaged into recycling of different plastic types from e-waste/WEEE, mainly Polycarbonate (PC), High Impact Polystyrene (HIPS), Acrylonitrile Butadiene Styrene (ABS), Poly Propylene (PP) etc
  properties: cadmium content 1.05e-7, carbon content, fossil 0.83022, chromium content 9.1e-7, copper content 6.2e-7, dry mass 1 kg, heating value, net 34.78 MJ, lead content 5.66e-7, nickel content 1.225e-6, polycyclic aromatic hydrocarbon content, total 0.0010858, wet mass 1 kg, zinc content 1.225e-6
  note on polycyclic aromatic hydrocarbon content, total: content of total polycyclic aromatic hydrocarbon content on a dry mass basis

## Emissions to nature
- Particulate Matter, > 10 um [air, urban air close to ground]: 3.1e-6 kg; lognormal variance with pedigree 0.050625, pedigree (1,5,3,2,2)
  Particulate Matter emission based on the actual measurement by SGS Pvt Ltd
- Particulate Matter, > 2.5 um and < 10um [air, urban air close to ground]: 8.32e-7 kg; lognormal variance with pedigree 0.050625, pedigree (1,5,3,2,2)
  Particulate Matter emission based on the actual measurement by SGS Pvt Ltd

## Sampling procedure
An initial data collection questionnaire was circulated amongst the recyclers. On-site visits were carried out and data were collected from 15 different recyclers in the informal recycling sector. Information provided was verified. For those facilities in the informal sector that did not have documented electricity bills, electrical consumption readings were taken for major energy consuming equipment. These recyclers were engaged into recycling of plastics mainly Polycarbonate (PC), High Impact Polystyrene (HIPS), Acrylonitrile Butadiene Styrene (ABS), Poly Propylene (PP) etc. Data collected from different recyclers were compiled in the excel sheets and analysed All the data were aggregated to per 1000 kgs of production of plastic flakes.
