# thermal spraying, high velocity oxyfuel, tungsten carbide-cobalt, on carbon steel substrate

Dataset: EcoSpold 2, unit process
Geography: GLO
Time period: 2022-01-01 to 2023-12-31
Technology level: modern
Classification: ISIC rev.4 ecoinvent: 2592:Treatment and coating of metals; machining
Synonyms: WC-CO; HVOF
Scenario: Business-as-Usual
System model: Allocation, cut-off by classification
Generated by: Edwin Rua
Database: ecoinvent
isCopyrightProtected: true
accessRestrictedTo: 1

## General comment
This activity provides the service of thermal spray coating via High Velocity OxyFuel (HVOF) and it represent the coating of 1 square meter of substrate (carbon steel) with a coating thickness of 250 micrometre. The HVOF is a process for the deposition of micron-sized powders. It consists of spraying a ceramic or metallic feedstock powder onto a substrate to build up a coating. This dataset considers a tungsten carbide-cobalt powder to be used. It is a thermal spray process which uses the product of the combustion of hydrogen and oxygen to melt and accelerate the feedstock powders to produce a metal coating on a carbon steel subststrate, This mixture is ignited at controlled temperatures and pressures resulting in a flame with supersonic speed. The coating operation is performed using a robotic arm on which the spray gun is mounted. This dataset represent a GLO average because it is a well-established technique in the industry
More in detail, the HVOF spraying works by mixing the fuel (hydrogen) and the oxidizing agent (oxygen), which are fed into a combustion chamber and ignited. The resultant gas has an extremely high temperature (around 3000°C) and is ejected through a nozzle at supersonic speeds. The high temperature of the combustion gases is sufficient to soften the powder particles before their impact with the substrate surface forming the coating.
The HVOF is commonly used to have a hard and low porosity coating to products. It is used in a variety of products like: shafts, drilling tools, gas turbines, rams, and many more. Commonly, the main industries using HVOF are oil and gas, aerospace, mining, or chemical.
References:
2022 Flame Spray Technologies B.V. HVOF THERMAL SPRAY COATING PROCESS, https://onx.la/ec5e6
Sobolev, V. V., Guilemany, J. M., Nutting, J., & Joshi, S. (2004). High velocity oxy-fuel spraying: theory, structure-property relationships and applications (p. 397). London: Maney.

## Included activities start
The activity is a service and it starts with the sandblasted carbon steel workpiece entering the high velocity oxy fuel spraying cabin. The activity refers to the coating of 1 square metre of substrate for a thickness of 250 micrometre.The carbon steel substrate is not included in the activity exchanges.

## Included activities end
The activity is a service and it ends with the coated workpiece.

## Geography
The data are based on estimations and do not have a specific geographical origin. They are assumed to be representative of this geography.

## Technology
The high velocity oxy fuel process (HVOF) performed on a prepared specimen. The preparation consists in an abrasive blasting, with the aim to remove the rust, dirt, or external particles from the surface and leave the surface with the correct final roughness. The abrasive basting process is not considered in this dataset, if the workpiece is treated with abrasive blasting it has to be accounted with proper dataset. An injector allows solid particles to be carried through a flame which melts the particles. The particles are carried by the combustion gasses towards the substrate. When the melted particles are in contact with the substrate, they solidify again.
More in detail, the HVOF spraying works by mixing fuel and oxygen, which are fed into a combustion chamber and ignited. The resultant gas has an extremely high temperature (around 3000°C) and is ejected through a nozzle at supersonic speeds.
Starting feedstock powders are injected directly into the combustion zone by the nitrogen carrier gas. Gas flow rates and powder feed rates are controlled automatically. Due to the high velocity reached (about 1800 m/s), A metallic or ceramic powder can be deposited onto a substrate (for this dataset, the powder used is a tungsten carbide-cobalt powder). The very high kinetic energy of these particles allows them to bond with the substrate and to form a very dense coating, typically below 1%. The final characteristics of the process are Porosity 0,1- 2,0%. Flame temperature 3000°C, Part velocity 425- 800m/s.
The HVOF equipment used for the data collection is TYPE DJCE SULZER METCO, Voltage 230v, Frequency 50 Hz, 4.0 Amps, Model 999 DJCE-H. Diamond Jet Gun Model 2600DJM with hydrogen as fuel, is moved by an arm robot ABB Robotics TYPE IRB1500/S3 M92/93. Power 1.5 KVA. Voltage 3x380, Frequency 50-60 Hz.
Sobolev, V. V., Guilemany, J. M., Nutting, J., & Joshi, S. (2004). High velocity oxy-fuel spraying: theory, structure-property relationships and applications (p. 397). London: Maney.

## Time period
Data are considered representative of current production practices. The data collection was performed in 2022.
The tooling expected life is of 25 years.

## Parameters
- deposition efficiency: 0.55 kg/kg; name deposition_efficiency
  Deposition efficiency, considered as mass deposited / total mass used. Value calculated from the pilot plant.

## Reference product
- thermal spraying, high velocity oxyfuel, tungsten carbide-cobalt, on carbon steel substrate: 1 m2; name RP; By-product classification allocatable product; CPC 88731: Metal treatment and coating services
  Thickness of the coating: 250 micrometre.
  production volume 4 m2; name pv_hvof
    This is a placeholder value that does not reflect real-world production volumes. This dataset does not currently require a real-world production volume to work in the database framework, and no actual data were collected yet. This has no negative effect on the results of the ecoinvent database.
  property price 501.69 EUR2005
    Price calculated based on direct measure in 2022 of the consumption of the University of Barcelona plant and on costs of the inputs. Price shall be reconsidered depending on application, e.g. different region, full scale application, etc.
    The price was converted to EUR based on the annual exchange rates published by the European Central Bank (https://sdw.ecb.europa.eu/quickview.do?SERIES_KEY=120.EXR.A.USD.EUR.SP00.A, last accessed on 2022-02-15) and adjusted for inflation relative to 2005 using the producer price index (PPI) of the euro area, published by eurostat (https://appsso.eurostat.ec.europa.eu/nui/show.do?dataset=sts_inpp_a&lang=en, last accessed on 2022-05-04).
  properties: carbon allocation 0 kg, carbon content 0

## Inputs from technosphere
- compressed air, 800 kPa gauge: 7.39613, 18.1759 m3 (2 suppliers, which the file names only by identifier); sum of these 25.572 m3; lognormal variance with pedigree 0.002825, pedigree (1,4,2,2,1)
  Compressed air is used to operate the gun
  Uncertainty: Variance value taken from Tab 10.3 of "Overview and methodology. Data quality guideline for the ecoinvent database version 3" Ecoinvent Report 1(v3), Weidema B P, Bauer C, Hischier R, Mutel C, Nemecek T, Reinhard J, Vadenbo C O, Wernet G. (2013).
- electricity, medium voltage: 4.17 kWh; lognormal variance with pedigree 0.002825, pedigree (1,4,2,2,1)
  Measured consumption of the robotic arms, spray gun, and ancillary equipment. Electricity is assumed to be in medium voltage for industrial scale use.
  Uncertainty: Variance value taken from Tab 10.3 of "Overview and methodology. Data quality guideline for the ecoinvent database version 3" Ecoinvent Report 1(v3), Weidema B P, Bauer C, Hischier R, Mutel C, Nemecek T, Reinhard J, Vadenbo C O, Wernet G. (2013).
- hazardous waste, for underground deposit: -0.049507, -0.768593 kg (2 suppliers, which the file names only by identifier); sum of these -0.8181 kg; = tungsten_carbide_powder*(1-deposition_efficiency); lognormal variance with pedigree 0.002625, pedigree (1,4,1,2,1)
  Amount calculated from deposition efficiency. It represents the material that is not deposited. The exchange is a proxy of tungsten carbide.
  Uncertainty: Variance value taken from Tab 10.3 of "Overview and methodology. Data quality guideline for the ecoinvent database version 3" Ecoinvent Report 1(v3), Weidema B P, Bauer C, Hischier R, Mutel C, Nemecek T, Reinhard J, Vadenbo C O, Wernet G. (2013).
  production volume; name PV_hw; = hw*pv_hvof/abs(RP)
    Production volume calculated based on the production volume of the reference product.
  properties: carbon content, fossil 0.554667, dry mass 1 kg, wet mass 1 kg
  note on carbon content, fossil: Tab A.6, ecoinvent v2.2 report 13_I, average hazardous waste composition was used, and referred to 0% water mass. No waste-specific emission are currently inventoried for underground deposits. Accordingly, no waste composition must be specified. For generic, average waste to underground deposit deposition in a 200 liter steel drum without cement solidification is assumed (ecoinvent v2.2 report 13_I).
- hydrogen, gaseous, medium pressure, merchant: 0.387797, 1.85281, 1.16339 kg (3 suppliers, which the file names only by identifier); sum of these 3.404 kg; lognormal variance with pedigree 0.002825, pedigree (1,4,2,2,1)
  Used as a fuel in the spray gun
  Uncertainty: Variance value taken from Tab 10.3 of "Overview and methodology. Data quality guideline for the ecoinvent database version 3" Ecoinvent Report 1(v3), Weidema B P, Bauer C, Hischier R, Mutel C, Nemecek T, Reinhard J, Vadenbo C O, Wernet G. (2013).
  properties: dry mass 1 kg, heating value, net 120.21 MJ, wet mass 1 kg
- oxygen, liquid: 4.83823, 17.6328 kg (2 suppliers, which the file names only by identifier); sum of these 22.471 kg; lognormal variance with pedigree 0.002825, pedigree (1,4,2,2,1)
  Used as oxidizer in the spray gun
  Uncertainty: Variance value taken from Tab 10.3 of "Overview and methodology. Data quality guideline for the ecoinvent database version 3" Ecoinvent Report 1(v3), Weidema B P, Bauer C, Hischier R, Mutel C, Nemecek T, Reinhard J, Vadenbo C O, Wernet G. (2013).
  properties: dry mass 1 kg, wet mass 1 kg
- tungsten carbide powder: 1.818 kg; name tungsten_carbide_powder; lognormal variance with pedigree 0.002825, pedigree (1,4,2,2,1)
  The deposition has an efficiency of 55%, and it is referred to a thickness of 250 micrometre.
  Uncertainty: Variance value taken from Tab 10.3 of "Overview and methodology. Data quality guideline for the ecoinvent database version 3" Ecoinvent Report 1(v3), Weidema B P, Bauer C, Hischier R, Mutel C, Nemecek T, Reinhard J, Vadenbo C O, Wernet G. (2013).
  properties: carbon content, fossil 0.061, dry mass 1 kg, wet mass 1 kg

## Emissions to nature
- Hydrogen [air, urban air close to ground]: 0.572926 kg; = hydrogen_gas+oxygen_gas-(water_gas*10^(3)); lognormal variance with pedigree 0.002825, pedigree (1,4,2,2,1)
  This exchange represent the abundant hydrogen that is not consumed in the combustion with oxygen. It is simply released to the environment.
  Uncertainty: Variance value taken from Tab 10.3 of "Overview and methodology. Data quality guideline for the ecoinvent database version 3" Ecoinvent Report 1(v3), Weidema B P, Bauer C, Hischier R, Mutel C, Nemecek T, Reinhard J, Vadenbo C O, Wernet G. (2013).
- Water [air, urban air close to ground]: 0.0253021 m3; name water_gas; = (oxygen_gas/15.999)*(15.999+(1.00784*2))*10^(-3); lognormal variance with pedigree 0.002825, pedigree (1,4,2,2,1)
  The amount of water is given from the molecular balance of the oxygen and hydrogen coming in the reaction. The input amounts are not stoichiometrically correct, the mixture is hydrogen abundant.
  Uncertainty: Variance value taken from Tab 10.3 of "Overview and methodology. Data quality guideline for the ecoinvent database version 3" Ecoinvent Report 1(v3), Weidema B P, Bauer C, Hischier R, Mutel C, Nemecek T, Reinhard J, Vadenbo C O, Wernet G. (2013).

## Sampling procedure
The sampling of the data was performed with direct measure coating a speciment of 20 square centimetre of dimension, applying a total thickness of 250 micrometre. The results were scaled for the development of the dataset.

## Extrapolations
The value of the datasets are linearly extrapolated from the measurement performed on site
