# concrete production, 30MPa, for building construction, for interior use, with cement ZN/D, with 30% RC-M aggregates

Dataset: EcoSpold 2, unit process
Geography: CH
Time period: 2020-01-01 to 2023-12-31
Technology level: modern
Classification: EcoSpold01Categories: construction materials/concrete
Classification: ISIC rev.4 ecoinvent: 2395:Manufacture of articles of concrete, cement and plaster
Synonyms: Hochbaubeton; ready-mixed concrete; Transportbeton; béton de bâtiment
Scenario: Business-as-Usual
System model: Allocation, cut-off by classification
Generated by: Frank Werner
Published in: Werner, F. 2014
Database: ecoinvent
isCopyrightProtected: true
accessRestrictedTo: 1

## General comment
This dataset contains the production of concrete for use in building construction (strength class C 25/30) with cement Susteno (technical abbreviation according to SIA 2049: ZN/D) by Holcim Switzerland and 30% recycled aggregates from mixed demolition waste (RC-M). In its application this concrete contains reinforcement steel or other metals and is exposed to air and humidity as well as to frost-dew cycles.
Density: 2290 kg/m3, content of cement: 320 kg/m3
Exposition class according to SN EN 206: XC1, XC2, XC3 (after successful pre-testing)
Examples for this exposition class are e.g. reinforced builing elements for interior use; construction elements that are permanently submerged under water such as foundations; concrete in an outdoor environment protected from rain such as open halls or wet spaces.

## Included activities start
The activity starts with the ingredients for the concrete at the factory gate.

## Included activities end
Includes the whole manufacturing processes to produce ready-mixed concrete, internal processes (transport, etc.) and infrastructure. No administration is included.

## Geography
For some exchanges RER-modules have been used as proxy

## Technology
New development of a resource saving, low carbon concrete by Holcim-Lafarge Switzerland.
The cement Susteno is made of processed mixed granulate from demolition projects as a major additive. The cement Susteno reduces the clinker content of the cement and contributes to a closed material cycle. The use of recycled aggregates reduces the need for landfilling and saves primary gravel and sand resources.

## Parameters
- fraction, process water, to air: 0.15 dimensionless; name fraction_PW_to_air; lognormal variance with pedigree 0.092025, pedigree (4,4,3,2,4)
  Literature value. In case when no industry/process specific data are available, default evaporation fraction value is used. This value is 15% and is based on literature (Statistics Canada, 2007 & Shaffer, K.H., 2008, Consumptive water use in the Great Lakes Basin, USGS & Shiklomanov, 2003, World Water Resources at the Beginning of the 21st Century) and has been approved by an expert.
- fraction, tap water, to air: 0.15 dimensionless; name fraction_TW_to_air; = fraction_PW_to_air; lognormal variance with pedigree 0.092025, pedigree (4,4,3,2,4)
  Calculated value. See comment in the other parametres present in this dataset. Tap water is considered to be always used as process water, thus process water fractions to air are applied to all tap water input flows to calculate the amount of water consumed in the processes.
- fraction, water, completely softened, to air: 0.15 dimensionless; name fraction_WCS_to_air; = fraction_PW_to_air; lognormal variance with pedigree 0.092025, pedigree (4,4,3,2,4)
  Calculated value. See comment in the other parametres present in this dataset. Water, completely softened is considered to be always used as process water, thus process water fractions to air are applied to all water, completely softened input flows to calculate the amount of water consumed in the processes.

## Reference product
- waste mixed aggregates, from demolition: -1 kg; name m_waste_mixed_aggregates; = -(235+288); source Werner F. 2014; By-product classification Waste; CPC 39990: Other wastes n.e.c.
  mixed demolition waste, i.e. concrete, bricks, etc.
  production volume 523 kg; name PV_waste_mixed_aggregates; = p_concrete*abs(m_waste_mixed_aggregates)
    Calculated from production volume of reference product using the relative outputs.
  property price 0 EUR2005
    Waste products are assigned a price of zero as they are assumed to require further treatment.
  properties: carbon allocation 0 kg, carbon content 0, dry mass 1 kg, water content 0, water in wet mass 0 kg, wet mass 1 kg

## Sampling procedure
Composition according to standard requirements; further inputs and outpust from sampling in concrete mixing plants by Bösch, M., Haupt, M., Hellweg, S., Hirzel, R., Vadenbo, C., Gschösser, F. und Wallbaum, H. (2011): Erarbeitung von Ökobilanz-Sachbilanzdaten zur Zement- und Betonherstellung in der Schweiz; Schlussbericht vom 15. Dezember 2011. cemsuisse (Hrsg.), Bern.

## Extrapolations
See geography
