# butene, mixed to generic market for generic C4 hydrocarbons

Dataset: EcoSpold 2, unit process
Geography: RoW
Time period: 2019-01-01 to 2023-12-31
Technology level: current
Classification: ISIC rev.4 ecoinvent: 1920:Manufacture of refined petroleum products
Scenario: Business-as-Usual
System model: Allocation, cut-off by classification
Generated by: Daria Dellenbach
Database: ecoinvent
isCopyrightProtected: true
accessRestrictedTo: 1

## General comment
This is a linking activity which links the product of butene, mixed to the generic market for generic C4 hydrocarbons,

## Included activities start
The activity starts with the reception of raw materials at the factory gate.

## Included activities end
The activity ends with the production of generic C4 hydrocarbons for the generic market.

## Reference product
- generic C4 hydrocarbons: 1 kg; By-product classification allocatable product; CPC 34: Basic chemicals; HS2017 2901: Acyclic hydrocarbons
  production volume 2.15643e9 kg; = 23700399942.6846*0.1
    Production volume from producing activity. It is assumed that 10% of this product reaches the generic market.
  property carbon content, fossil 0.847291
    Fossil carbon content on a dry matter basis. Arithmetic average carbon content, non-fossil of butane, butene and butadiene.
  property heating value, net 44.296 MJ
    Measure of the thermal energy produced during the combustion of a product. Expressed in MJ per unit of product. Arithmetic average heating value, netl of butane, butene and butadiene.
  property price 0.631823 EUR2005
    Arithmetic average of prices of butane, butadiene and butene.
  properties: carbon allocation 0.847291 kg, carbon content 0.847291, carbon content, non-fossil 0, dry mass 1 kg, water content 0, water in wet mass 0 kg, wet mass 1 kg

## Inputs from technosphere
- butene, mixed: 1 kg; lognormal variance with pedigree 0.2106, pedigree (5,5,5,5,5)
  properties: carbon content, fossil 0.857143, dry mass 1 kg, heating value, net 45.3 MJ, wet mass 1 kg
  note on heating value, net: Indicative value. Reference: Fuels - Higher and Lower Calorific Values, available at: https://www.engineeringtoolbox.com/fuels-higher-calorific-values-d_169.html
