# water pump operation, diesel

Dataset: EcoSpold 2, unit process
Geography: RoW
Time period: 2014-01-01 to 2023-12-31
Technology level: current
Classification: ISIC rev.4 ecoinvent: 0161:Support activities for crop production
Classification: EcoSpold01Categories: construction processes/machinery
Synonyms: diesel burning
Scenario: Business-as-Usual
System model: Allocation, cut-off by classification
Generated by: David FitzGerald
Database: ecoinvent
isCopyrightProtected: true
accessRestrictedTo: 1

## General comment
This dataset represents the operation of a water pump that is powered by a diesel engine. The reference product is 1 MJ of diesel burned in the engine. Based on a net calorific value of 42.8 MJ/kg, about 0.0234 kg of diesel is burned. The amount of energy that is actually delivered to the water varies depending on the operating conditions and pump characteristics.
The inventory (with the exception of the input of the pump) has been extrapolated from the dataset "machine operation, diesel, >= 18.64 kW and < 74.57 kW, steady-state, GLO" based on the net calorific value of diesel (42.8 MJ/kg). That dataset "represents the operation of construction/industrial/light commercial machines" and is based mainly on the U.S. EPA NONROAD2008 model for off-road machines. The nominal power of the water pump is 22 kW, which is within the power category modelled in that dataset. For more details on how each exchange amount was modelled, please refer to the documentation of the original dataset.

## Included activities start
The activity starts with the input of diesel into the engine of the water pump.

## Included activities end
The activity ends with the burning of diesel. The inventory contains the air emissions resulting from the burning of diesel in the engine of the water pump, as well as the waste oil from the used lubricating oil. The pump itself is taken into account through the input of "water pump, 22kW".

## Geography
In the original dataset, the fuel flow and most emission flows are extrapolated from US conditions, while some emission flows are extrapolated from European and Swiss conditions.

## Technology
This dataset is assumed to represent the average current technology for machines included in the power category described in the original dataset.

## Time period
The time period is based on the time period of the original dataset on which this one is based.

## Parameters
- efficiency: 0.42 dimensionless; name pump_efficiency; = 0.7*0.6
  Overall efficiency of the pump: the efficiency of the pump shaft is 70%, while the efficiency of the drive or motor is assumed to be 60% for a diesel engine.

## Reference product
- water pump operation, diesel: 1 MJ; name RP_amount; By-product classification allocatable product; CPC 83327: Engineering services for water, sewerage and drainage projects
  The reference product amount refers to the energy that is consumed by the pump in the form of diesel, which has a net calorific value of 42.8 MJ/kg.
  The actual amount of energy that is transferred to the water depends on many variables such as pump and drive efficiency, age of the pump, operating conditions, etc.
  production volume 1.98609e11 MJ; name RP_PV; = 0.111312575864*2138112000000 + 0.375212575864*427622400000 + 0.300312575864*106905600000
    Calculated based on the total amount of diesel energy used in the three global irrigation datasets: "irrigation, surface", "irrigation, sprinkler" and "irrigation, drip".
    This is a rough approximation, as it assumes that this type of pump is used exclusively for irrigation purposes, and that all irrigation systems use this type of pump.
  property price 0.0122581 EUR2005
    Calculated based on inputs: The price of the product has been calculated as a sum of the values of the material and energy inputs for this product. This value is therefore a rough estimation. It may underestimate the real price since there are additional expenses when producing any product. These expences can include for example labour costs, treatment of waste materials and profit for the producer. Please consider carefully whether this level of data quality is acceptable for your application.
  properties: carbon allocation 0 kg, carbon content 0

## Inputs from technosphere
- diesel: 0.0233645 kg; lognormal variance with pedigree 0.1726, pedigree (3,5,5,5,5)
  EcoSpold01Location=RER
  Amount of diesel required to provide 1 MJ of energy to the pump. It is based on the net calorific value of diesel, which is 42.8 MJ/kg.
  Uncertainty: Calculated variable. Uncertainty should be determined from propagation of uncertainty factors of underlying variables, however no uncertainty could be generated for the terms of the power function. Uncertainty of actual relation between variables not accounted at this time, although this could be included in a future update.
  property carbon content, fossil 0.865; name diesel_C
  property fuel consumption tier T0-T1-T2-T3B-T4-T4A-T4N for hp < 100 0.185069 kg/hp*h; name T0123B44AN_diesel_100hp
  property sulfur content 1.5e-5; name diesel_S_content
  properties: dry mass 1 kg, heating value, net 42.8 MJ, wet mass 1 kg
  note on carbon content, fossil: C-content of diesel is 86.5% (ecoinvent v2.2 report 6_IV, Tab 3.14)
  note on sulfur content: sulfur content on a dry matter basis. Basic parameter used to define the diesel fuel sulfur content (the default value is the ultra-low sulfur nonroad diesel sulfur content, effective June 2010 in the United States of America), could be changed to create a new instance of the dataset to reflect a specific situation/machine.
- lubricating oil: 0.000514019 kg; name lubricating_oil; lognormal variance with pedigree 0.1726, pedigree (3,5,5,5,5)
  Extrapolated value based on the dataset "machine operation, diesel, >= 18.64 kW and < 74.57 kW, steady-state, GLO" (accessed on the 2017-11-15).
  EcoSpold01Location=RER
  Uncertainty: Calculated variable. Uncertainty should be determined from propagation of uncertainty factors of underlying variables, however no uncertainty could be generated for the terms of the power function. Uncertainty of actual relation between variables not accounted at this time, although this could be included in a future update.
  property consumption ratio 0.022; name oil_ratio
  properties: carbon content, fossil 0.75, dry mass 1 kg, heating value, net 40.2 MJ, wet mass 1 kg
  note on carbon content, fossil: Lubricating oil is produced from diesel. C-content/dry mass of fats and oils considered 75%, from: ecoinvent v2.2 report, n 15a, pg 40
  note on consumption ratio: Calculated value. The consumption value has been taken directly from the ecoinvent v3.0 dataset "diesel, burned in building machine, GLO 2001" and divided by the diesel fuel consumption indicated in the same dataset (0,0234 kg) to obtain the consumption ratio per kg of diesel fuel.
  note on heating value, net: Literature value, Source: IPCC 2006, 2006 IPCC Guidelines for National Greenhouse Gas Inventories, Prepared by the National Greenhouse Gas Inventories Programme, Eggleston H.S., Buendia L., Miwa K., Ngara T. and Tanabe K. (eds). Published: IGES, Japan
- waste mineral oil: -0.000514019 kg; name waste_oil; = lubricating_oil; lognormal variance with pedigree 0.1726, pedigree (3,5,5,5,5)
  EcoSpold01Location=CH
  Extrapolated value based on the dataset "machine operation, diesel, >= 18.64 kW and < 74.57 kW, steady-state, GLO" (accessed on the 2017-11-15).
  Uncertainty: Calculated variable. Uncertainty should be determined from propagation of uncertainty factors of underlying variables, however no uncertainty could be generated for the terms of the power function. Uncertainty of actual relation between variables not accounted at this time, although this could be included in a future update.
  production volume; = RP_PV*waste_oil/RP_amount
    Calculated from the production volume of the reference product based on the output amounts.
  properties: carbon content, fossil 0.864444, dry mass 0.9 kg, heating value, net 34.7 MJ, water content 0.111111, wet mass 1 kg
  note on carbon content, fossil: Tab A.6, ecoinvent v2.2 report 13_I. C content has been calculated after data in the tables, and then referred to 1 kg DM
  note on heating value, net: Value taken from the general comment of the treatment dataset.
- water pump, 22kW: 5.86638e-6 unit; = 1 / ((9.8 * (15.9018*0.8 + 53.6018*0.16 + 42.9018*0.04) * 1000 * pump_lifetime_capacity)/(1000000 * pump_efficiency)); lognormal variance with pedigree 0.2106, pedigree (5,5,5,5,5)
  Calculated value. The pump is assumed to have a lifetime of 10 years, with a lifetime capacity of roughly 317000 m3 of pumped water (see exchange property comment for more details). This corresponds to a total energy consumption of about 170000 MJ (considering an energy content of 42.8 MJ per kg of diesel) based on the assumptions that the total head supplied to the pumped water is about 23 m, and that the pump shaft efficiency is 70% and the diesel motor efficiency is 60%.
  The total head is calculated by weighting the total head supplied in the global (GLO) irrigation datasets according to their production volumes (in m3). The production volume shares and total heads for the three irrigation datasets are the following:
  1. irrigation, surface: share = 80%, total head = 15.9018
  2. irrigation, sprinkler: share = 16%, total head = 53.6018
  3. irrigation, drip: share = 4%, total head ) = 42.9018
  The total head is calculated based on the elevation head (which depends on the shares of water obtained from surface water and groundwater) and the dynamic pressure head (which depends on the irrigation technique). The details of the calculation of the total head are provided in the three irrigation datasets.
  This is a rough estimation, and is based on the very simplified assumption that all irrigation systems use the same type of water pump.
  property lifetime 10 year; name lifetime
  property lifetime capacity in m3 317442 m3; name pump_lifetime_capacity; = 2.67264E+12 / (252579046.13 * 10000) * 3 * 10000 * lifetime
  note on lifetime capacity in m3: The lifetime capacity is calculated based on the lifetime of the pump and the amount of water supplied per year to a field of 3 hectares. The amount of water supplied per year was calculated by dividing the amount of water used for irrigation globally by the global irrigated area. The amount of water used for irrigation globally is equal to 2.67E+12 m3 and corresponds to the World irrigation water withdrawal given in Table 5 of Frenken & Gillet (2012). The global irrigated area is equal to 2.53E+8 ha and corresponds to the area actually irrigated published in the Global Map of Irrigation Areas (Siebert et al. 2013). The average area supplied by one pump unit (3 ha) is taken from Nemecek & Gillet (2007). The lifetime capacity is highly uncertain as it is directly related to the lifetime of the pump, which depends on many different factors. References: Frenken, K. & Gillet, V. (2012) Irrigation water requirement and water withdrawal by country, FAO AQUASTAT Reports. Siebert, S., Henrich, V., Frenken, K., Burke, J. (2013) Update of the Digital Global Map of Irrigation Areas to Version 5, FAO 2013. Excel file last accessed on 2018-03-12: http://www.fao.org/nr/water/aquastat/irrigationmap/index20.stm Nemecek T. & Kägi T. (2007) Life Cycle Inventories of Swiss and European Agricultural Production Systems. Final report ecoinvent V2.0 No. 15a. Agroscope Reckenholz-Taenikon Research Station ART, Swiss Centre for Life Cycle Inventories, Zurich and Dübendorf, CH, retrieved from: www.ecoinvent.ch.

## Inputs from nature
- Oxygen [natural resource, in air]: 0.0541223 kg; lognormal variance with pedigree 0.212, pedigree (3,5,5,5,5)
  Extrapolated value based on the dataset "machine operation, diesel, >= 18.64 kW and < 74.57 kW, steady-state, GLO" (accessed on the 2017-11-15).
  Uncertainty: Calculated variable. Uncertainty should be determined from propagation of uncertainty factors of underlying variables, however no uncertainty could be generated for the terms of the power function. Uncertainty of actual relation between variables not accounted at this time, although this could be included in a future update.

## Emissions to nature
- 2,2,4-Trimethylpentane [air, unspecified]: 2.59361e-8 kg; lognormal variance with pedigree 0.212, pedigree (3,5,5,5,5)
  (same comment as for Oxygen)
  property carbon content, fossil 0.841179; name trimethylpentane_C
  property emission ratio 0.000719235 kg/kg; name trimethylpentane_ratio
- Acenaphthene [air, unspecified]: 2.41747e-9 kg; lognormal variance with pedigree 0.472, pedigree (3,5,5,5,5)
  (same comment as for Oxygen)
  property carbon content, fossil 0.934641; name acenaphthene_C
  property emission ratio 0.0001 kg/kg; name acenaphthene_ratio
- Acenaphthylene [air, unspecified]: 2.03068e-9 kg; lognormal variance with pedigree 0.472, pedigree (3,5,5,5,5)
  (same comment as for Oxygen)
  property carbon content, fossil 0.947021; name acenaphthylene_C
  property emission ratio 8.4e-5 kg/kg; name acenaphthylene_ratio
- Acetaldehyde [air, unspecified]: 1.9141e-6 kg; lognormal variance with pedigree 0.212, pedigree (3,5,5,5,5)
  (same comment as for Oxygen)
  property carbon content, fossil 0.545296; name acetaldehyde_C
  property emission ratio 0.05308 kg/kg; name acetaldehyde_ratio
  property oxygen content 0.363179; name acetaldehyde_O
- Acrolein [air, unspecified]: 1.09323e-7 kg; lognormal variance with pedigree 0.212, pedigree (3,5,5,5,5)
  (same comment as for Oxygen)
  property carbon content, fossil 0.642716; name acrolein_C
  property emission ratio 0.00303165 kg/kg; name acrolein_ratio
  property oxygen content 0.285372; name acrolein_O
- Ammonia [air, unspecified]: 6.06801e-7 kg; lognormal variance with pedigree 0.212, pedigree (3,5,5,5,5)
  (same comment as for Oxygen)
  property emission ratio 2.59711e-5 kg/kg; name ammonia_ratio
- Anthracene [air, unspecified]: 1.03951e-11 kg; lognormal variance with pedigree 0.472, pedigree (3,5,5,5,5)
  (same comment as for Oxygen)
  property carbon content, fossil 0.94345; name anthracene_C
  property emission ratio 4.3e-7 kg/kg; name anthracene_ratio
- Benz(a)anthracene [air, unspecified]: 1.7164e-11 kg; lognormal variance with pedigree 0.472, pedigree (3,5,5,5,5)
  (same comment as for Oxygen)
  property carbon content, fossil 0.947021; name benzAanthracene_C
  property emission ratio 7.1e-7 kg/kg; name benzAanthracene_ratio
- Benzene [air, unspecified]: 7.33618e-7 kg; lognormal variance with pedigree 0.212, pedigree (3,5,5,5,5)
  (same comment as for Oxygen)
  property carbon content, fossil 0.922582; name benzene_C
  property emission ratio 0.020344 kg/kg; name benzene_ratio
- Benzo(a)pyrene [air, unspecified]: 8.46115e-12 kg; lognormal variance with pedigree 0.472, pedigree (3,5,5,5,5)
  (same comment as for Oxygen)
  property carbon content, fossil 0.952065; name benzoApyrene_C
  property emission ratio 3.5e-7 kg/kg; name benzoApyrene_ratio
- Benzo(b)fluoranthene [air, unspecified]: 1.18456e-11 kg; lognormal variance with pedigree 0.472, pedigree (3,5,5,5,5)
  (same comment as for Oxygen)
  property carbon content, fossil 0.952065; name benzoBfluoranthene_C
  property emission ratio 4.9e-7 kg/kg; name benzoBfluoranthene_ratio
- Benzo(ghi)perylene [air, unspecified]: 4.59319e-12 kg; lognormal variance with pedigree 0.472, pedigree (3,5,5,5,5)
  (same comment as for Oxygen)
  property carbon content, fossil 0.956232; name benzoGHIperylene_C
  property emission ratio 1.9e-7 kg/kg; name benzoGHIperylene_ratio
- Benzo(k)fluoranthene [air, unspecified]: 8.46115e-12 kg; lognormal variance with pedigree 0.472, pedigree (3,5,5,5,5)
  (same comment as for Oxygen)
  property carbon content, fossil 0.952065; name benzoKfluoranthene_C
  property emission ratio 3.5e-7 kg/kg; name benzoKfluoranthene_ratio
- Butadiene [air, unspecified]: 6.71305e-8 kg; lognormal variance with pedigree 0.212, pedigree (3,5,5,5,5)
  (same comment as for Oxygen)
  property carbon content, fossil 0.8882; name butadiene_C
  property emission ratio 0.0018616 kg/kg; name butadiene_ratio
- Cadmium II [air, unspecified]: 2.33645e-10 kg; lognormal variance with pedigree 0.822, pedigree (3,5,5,5,5)
  (same comment as for Oxygen)
  property emission ratio 1e-8 kg/kg; name cadmium_ratio
- Carbon dioxide, fossil [air, unspecified]: 0.0739121 kg; lognormal variance with pedigree 0.1726, pedigree (3,5,5,5,5)
  (same comment as for Oxygen)
  property carbon content, fossil 0.272921; name CO2_C
  property oxygen content 0.727079; name CO2_O; = 1-CO2_C
- Carbon monoxide, fossil [air, unspecified]: 0.000170197 kg; lognormal variance with pedigree 0.822, pedigree (3,5,5,5,5)
  (same comment as for Oxygen)
  property carbon content, fossil 0.428811; name CO_C
  property carbon monoxide emissions tier T0 for hp < 100 0.00349 kg/hp*h; name T0_co_100hp
  property carbon monoxide emissions tier T0 for hp < 50 0.005 kg/hp*h; name T0_co_50hp
  property carbon monoxide emissions tier T1-T2-T3B-T4A for hp <100 0.00237 kg/hp*h; name T123B4A_co_100hp
  property carbon monoxide emissions tier T1-T2-T4A for hp < 50 0.00153 kg/hp*h; name T124A_co_50hp
  property carbon monoxide emissions tier T4 for hp < 50 0.00015 kg/hp*h; name T4_co_50hp
  property carbon monoxide emissions tier T4-T4N for hp < 100 0.00024 kg/hp*h; name T44N_co_100hp
  property oxygen content 0.571189; name CO_O; = 1-CO_C
- Chromium III [air, unspecified]: 2.75498e-12 kg; lognormal variance with pedigree 0.822, pedigree (3,5,5,5,5)
  (same comment as for Oxygen)
  property emission ratio 1.17913e-10 kg/kg; name chromium_ratio
- Chromium VI [air, unspecified]: 1.41923e-12 kg; lognormal variance with pedigree 0.822, pedigree (3,5,5,5,5)
  (same comment as for Oxygen)
  property emission ratio 6.07431e-11 kg/kg; name chromiumVI_ratio
- Chrysene [air, unspecified]: 4.59319e-11 kg; lognormal variance with pedigree 0.472, pedigree (3,5,5,5,5)
  (same comment as for Oxygen)
  property carbon content, fossil 0.947021; name chrysene_C
  property emission ratio 1.9e-6 kg/kg; name chrysene_ratio
- Copper ion [air, unspecified]: 3.97196e-8 kg; lognormal variance with pedigree 0.822, pedigree (3,5,5,5,5)
  (same comment as for Oxygen)
  property emission ratio 1.7e-6 kg/kg; name copper_ratio
- Dibenz(a,h)anthracene [air, unspecified]: 7.01066e-14 kg; lognormal variance with pedigree 0.472, pedigree (3,5,5,5,5)
  (same comment as for Oxygen)
  property carbon content, fossil 0.949307; name dibenzAHanthracene_C
  property emission ratio 2.9e-9 kg/kg; name dibenzAHanthracene_ratio
- Dinitrogen monoxide [air, unspecified]: 2.80374e-6 kg; lognormal variance with pedigree 0.212, pedigree (3,5,5,5,5)
  (same comment as for Oxygen)
  property emission ratio 0.00012 kg/kg; name N2O_ratio
  property oxygen content 0.363506; name N2O_O
- Dioxins, measured as 2,3,7,8-tetrachlorodibenzo-p-dioxin [air, unspecified]: 1.40232e-14 kg; lognormal variance with pedigree 0.212, pedigree (3,5,5,5,5)
  (same comment as for Oxygen)
  property carbon content, fossil 0.447652; name dioxins_C
  property emission ratio 6.00192e-13 kg/kg; name dioxins_ratio
  property oxygen content 0.0993808; name dioxins_O
- Ethane [air, unspecified]: 3.42456e-8 kg; lognormal variance with pedigree 0.212, pedigree (3,5,5,5,5)
  (same comment as for Oxygen)
  property carbon content, fossil 0.798885; name ethane_C
  property emission ratio 0.001 kg/kg; name ethane_ratio
- Ethyl benzene [air, unspecified]: 1.11792e-7 kg; lognormal variance with pedigree 0.212, pedigree (3,5,5,5,5)
  (same comment as for Oxygen)
  property carbon content, fossil 0.905065; name ethylbenzene_C
  property emission ratio 0.0031001 kg/kg; name ethylbenzene_ratio
- Fluoranthene [air, unspecified]: 4.1097e-10 kg; lognormal variance with pedigree 0.472, pedigree (3,5,5,5,5)
  (same comment as for Oxygen)
  property carbon content, fossil 0.950167; name fluoranthene_C
  property emission ratio 1.7e-5 kg/kg; name fluoranthene_ratio
- Fluorene [air, unspecified]: 2.41747e-9 kg; lognormal variance with pedigree 0.472, pedigree (3,5,5,5,5)
  (same comment as for Oxygen)
  property carbon content, fossil 0.939364; name fluorene_C
  property emission ratio 0.0001 kg/kg; name fluorene_ratio
- Formaldehyde [air, unspecified]: 4.26075e-6 kg; lognormal variance with pedigree 0.212, pedigree (3,5,5,5,5)
  (same comment as for Oxygen)
  property carbon content, fossil 0.400023; name formaldehyde_C
  property emission ratio 0.118155 kg/kg; name formaldehyde_ratio
  property oxygen content 0.532842; name formaldehyde_O
- Hexane [air, unspecified]: 5.73833e-8 kg; lognormal variance with pedigree 0.212, pedigree (3,5,5,5,5)
  (same comment as for Oxygen)
  property carbon content, fossil 0.836259; name hexane_C
  property emission ratio 0.0015913 kg/kg; name hexane_ratio
- Indeno(1,2,3-cd)pyrene [air, unspecified]: 1.9098e-12 kg; lognormal variance with pedigree 0.472, pedigree (3,5,5,5,5)
  (same comment as for Oxygen)
  property carbon content, fossil 0.956232; name indeno123CDpyrene_C
  property emission ratio 7.9e-8 kg/kg; name indeno123CDpyrene_ratio
- Manganese II [air, unspecified]: 1.90622e-10 kg; lognormal variance with pedigree 0.822, pedigree (3,5,5,5,5)
  (same comment as for Oxygen)
  property emission ratio 8.15864e-9 kg/kg; name manganese_ratio
- Methane, fossil [air, unspecified]: 5.4793e-7 kg; lognormal variance with pedigree 0.212, pedigree (3,5,5,5,5)
  (same comment as for Oxygen)
  property carbon content, fossil 0.748694; name methane_C
  property emission ratio 0.016 kg/kg; name methane_ratio
- NMVOC, non-methane volatile organic compounds [air, unspecified]: 2.74124e-5 kg; lognormal variance with pedigree 0.212, pedigree (3,5,5,5,5)
  (same comment as for Oxygen)
  property carbon content, fossil 0.854049; name NMVOC_C
- Naphthalene [air, unspecified]: 1.11204e-8 kg; lognormal variance with pedigree 0.472, pedigree (3,5,5,5,5)
  (same comment as for Oxygen)
  property carbon content, fossil 0.937091; name naphthalene_C
  property emission ratio 0.00046 kg/kg; name naphthalene_ratio
- Nickel II [air, unspecified]: 2.83152e-10 kg; lognormal variance with pedigree 0.822, pedigree (3,5,5,5,5)
  (same comment as for Oxygen)
  property emission ratio 1.21189e-8 kg/kg; name nickel_ratio
- Nitrogen oxides [air, unspecified]: 0.000403658 kg; lognormal variance with pedigree 0.212, pedigree (3,5,5,5,5)
  (same comment as for Oxygen)
  property nitrogen oxides emissions tier T0 for hp < 100 0.0069 kg/hp*h; name T0_nox_100hp
  property nitrogen oxides emissions tier T1 for hp < 100 0.0056 kg/hp*h; name T1_nox_100hp
  property nitrogen oxides emissions tier T1-T2-T4A for hp <50 0.00473 kg/hp*h; name T124A_nox_50hp
  property nitrogen oxides emissions tier T2 for hp < 100 0.0047 kg/hp*h; name T2_nox_100hp
  property nitrogen oxides emissions tier T3B-T4-T4A for hp < 100 0.003 kg/hp*h; name T3B44A_nox_100hp
  property nitrogen oxides emissions tier T4N for hp < 100 0.00028 kg/hp*h; name T4N_nox_100hp
  property oxygen content 0.695533; name NOx_O
- Particulate Matter, < 2.5 um [air, unspecified]: 2.34495e-5 kg; lognormal variance with pedigree 0.472, pedigree (3,5,5,5,5)
  (same comment as for Oxygen)
  property carbon content, fossil 0.922582; name PM_C
  property emission ratio 0.97 kg/kg; name PM25_ratio
- Particulate Matter, > 10 um [air, unspecified]: 1.54145e-6 kg; lognormal variance with pedigree 0.212, pedigree (3,5,5,5,5)
  (same comment as for Oxygen)
  property emission ratio 0.0637628 kg/kg; name PM10p_ratio
- Particulate Matter, > 2.5 um and < 10um [air, unspecified]: 7.25241e-7 kg; lognormal variance with pedigree 0.292, pedigree (3,5,5,5,5)
  (same comment as for Oxygen)
- Phenanthrene [air, unspecified]: 6.28542e-9 kg; lognormal variance with pedigree 0.472, pedigree (3,5,5,5,5)
  (same comment as for Oxygen)
  property carbon content, fossil 0.94345; name phenanthrene_C
  property emission ratio 0.00026 kg/kg; name phenanthrene_ratio
- Propanal [air, unspecified]: 4.25516e-7 kg; lognormal variance with pedigree 0.212, pedigree (3,5,5,5,5)
  (same comment as for Oxygen)
  property carbon content, fossil 0.620409; name propanal_C
  property emission ratio 0.0118 kg/kg; name propanal_ratio
  property oxygen content 0.275468; name propanal_O
- Pyrene [air, unspecified]: 7.01066e-11 kg; lognormal variance with pedigree 0.472, pedigree (3,5,5,5,5)
  (same comment as for Oxygen)
  property carbon content, fossil 0.950167; name pyrene_C
  property emission ratio 2.9e-6 kg/kg; name pyrene_ratio
- Selenium IV [air, unspecified]: 2.33645e-10 kg; lognormal variance with pedigree 0.212, pedigree (3,5,5,5,5)
  (same comment as for Oxygen)
  property emission ratio 1e-8 kg/kg; name selenium_ratio
- Styrene [air, unspecified]: 2.14373e-8 kg; lognormal variance with pedigree 0.212, pedigree (3,5,5,5,5)
  (same comment as for Oxygen)
  property carbon content, fossil 0.922582; name styrene_C
  property emission ratio 0.00059448 kg/kg; name styrene_ratio
- Sulfur dioxide [air, unspecified]: 6.84487e-7 kg; lognormal variance with pedigree 0.1726, pedigree (3,5,5,5,5)
  (same comment as for Oxygen)
  property fraction of diesel sulfur converted to direct PM (hydrated sulfuric acid) 0.978; name sulfur_to_direct_PM
  property oxygen content 0.499477; name SO2_O
- Toluene [air, unspecified]: 5.3972e-7 kg; lognormal variance with pedigree 0.212, pedigree (3,5,5,5,5)
  (same comment as for Oxygen)
  property carbon content, fossil 0.91249; name toluene_C
  property emission ratio 0.014967 kg/kg; name toluene_ratio
- Xylenes, unspecified [air, unspecified]: 3.81594e-7 kg; lognormal variance with pedigree 0.212, pedigree (3,5,5,5,5)
  (same comment as for Oxygen)
  property carbon content, fossil 0.905065; name xylene_C
  property emission ratio 0.010582 kg/kg; name xylene_ratio
- Zinc II [air, unspecified]: 2.33645e-8 kg; lognormal variance with pedigree 0.822, pedigree (3,5,5,5,5)
  (same comment as for Oxygen)
  property emission ratio 1e-6 kg/kg; name zinc_ratio

## Sampling procedure
The inventory was extrapolated from the dataset "machine operation, diesel, >= 18.64 kW and < 74.57 kW, steady-state" covering the global (GLO) geography. All flows were scaled such that their amounts correspond to 1 MJ of diesel burned in the pump engine. Therefore all flows in the original dataset were divided by the amount of diesel multiplied by the net calorific value of diesel (5.055 kg * 42.8 MJ/kg)
In the original dataset, most data are from the U.S. EPA NONROAD2008 and NMIM models. Some data from the LCA study Oekoinventare von Energiesystemen 1996 and emissions from the Swiss "Offroad" database.

## Extrapolations
In the original dataset, the fuel flow and most emission flows are extrapolated from US conditions, while some emission flows are extrapolated from European and Swiss conditions. They are assumed to be representative of the global situation.
The uncertainty values have been adjusted to represent the fact that it is uncertain how well this inventory represents the emissions that occur in a typical 22 kW diesel-powered water pump used for irrigation.
