# gravel production, crushed

Dataset: EcoSpold 2, unit process
Geography: RoW
Time period: 1997-01-01 to 2023-12-31
Technology level: current
Classification: EcoSpold01Categories: construction materials/additives
Classification: ISIC rev.4 ecoinvent: 0810:Quarrying of stone, sand and clay
Tags: ConvertedDataset
Scenario: Business-as-Usual
System model: Allocation, cut-off by classification
Share of production covered: 100 %
Generated by: Tina Künniger
Published in: Kellenberger D. 2004
Database: ecoinvent
isCopyrightProtected: true
accessRestrictedTo: 1

## General comment
From the total amount (100%) of mined gravel round, crushed and sand, about 15% is crushed gravel. Dust emission size shares (for particulates >PM10, 2.5<PM<10, and <PM2.5) are assumed equal to "mining limestone" process.
[This dataset was already contained in the ecoinvent database version 2. It was not individually updated during the transfer to ecoinvent version 3. Life Cycle Impact Assessment results may still have changed, as they are affected by changes in the supply chain, i.e. in other datasets. This dataset was generated following the ecoinvent quality guidelines for version 2. It may have been subject to central changes described in the ecoinvent version 3 change report (http://www.ecoinvent.org/database/ecoinvent-version-3/reports-of-changes/), and the results of the central updates were reviewed extensively. The changes added e.g. consistent water flows and other information throughout the database. The documentation of this dataset can be found in the ecoinvent reports of version 2, which are still available via the ecoinvent website. The change report linked above covers all central changes that were made during the conversion process.]

## Included activities end
includes the whole manufacturing process, internal processes (transport, etc.) and infrastructure. No administration is included. Dust emission (particulates >PM10, >PM2.5 <PM10 and <PM2.5) share according to "mining limestone" process. Recultivation is taken into account.

## Geography
For some exchanges RER-modules have been used as proxy

## Technology
typical technology for Swiss production

## Parameters
- fraction, process water, to air: 0.272727 dimensionless; lognormal variance with pedigree 0.092025, pedigree (4,4,3,2,4)
- fraction, tap water, to air: 0.272727 dimensionless; lognormal variance with pedigree 0.092025, pedigree (4,4,3,2,4)

## Reference product
- gravel, crushed: 1 kg; name ref; By-product classification allocatable product; CPC 15320: Pebbles, gravel, broken or crushed stone, macadam; granules, chippings and powder of stone; HS2017 251710: Pebbles, gravel, broken or crushed stone; of a kind commonly used for concrete aggregates, for road metalli[...]
  EcoSpold01Location=CH
  production volume 3.68483e12 kg; name ref_PV; = 50*0.65*0.15*1E12
    Estimated value. Information regarding production volume and mining technology for sand and aggregates is very scarce (Peduzzia, et al. 2014). It is estimated that around 50 billion tonnes of sand and gravel are mined each year (WWF, 2018).
    According to the WWF (2018), the demand of sand and aggregated in general has and is increasing, the demand comes in particular from developing countries, for example, “China consumed more sand between 2011-2013 than the US did in the whole of the 20th Century.”. This has contributed to the, today’s significant, illegal sand market. Most of illegal sand comes from rivers and coastal areas (WWF 2018; The Third Pole, 2017). Lai et al. (2014) report the estimated amount of sand mined from the biggest sand mine in the world, the Poyang Lake, China. The estimate is of 448 billion kg of sand (De Leeuw 2010). As a frame of reference, the country of Brazil as whole mines 266 billion kg of sand per year.
    The demand of sand has also increased in the US in the past 15 years as the it was found that sand could be used in fracking in order to increase yield (Edwards, 2015). Sand is also used by cities to enlarge their territory “517 million metric tons of sand in the past 20 years” (Edwards, 2015) citing UNEP (2014).
    Of the estimated 50 billion tonnes of sand and gravel, it is assumed that 35% is sand, following ecoinvent v2 report 7. This results in 17.5 billion tonnes. Double check with Tweedie (2018), which reports a world consumption of sand between 15 and 20 billion tonnes, and Peduzzia, P. et al. (2014). The production of gravel is therefore set to 50*0.65 billion tonnes. Of which 85% is considered to be gravel, round and 15% is considered to be crushed (see general comment of the activity “gravel production, gravel, CH” in date 12th October 2018).
    No information was found regarding the technologies used for sand mining. The WWF (2018) refers to Europe as the region where no sand is mined from rivers. On the other hand we know that 70% of sand mined in Brazil comes from rivers (see the dataset “sand quarry operation, extraction from river bed, BR, in date 12th October 2012). Some report quarry as the most prominent mining technology (n.d. 2017), others highlight how the growing illegal market source sand from rivers and coastal areas. ecoinvent does not report data regarding illegal mining. It is therefore estimated that 70% of sand is produced via quarry.
    References:
    UNEP, 2014. Sand, Rarer Than One Thinks. In: Bruce Edwards, 2015. The Insatiable Demand for Sand. FINANCE & DEVELOPMENT, December 2015, Vol. 52, No. 4. Retrieved from: https://www.imf.org/external/pubs/ft/fandd/2015/12/edwards.htm, accessed 12th October 2018
    Edwards, B. 2015. The Insatiable Demand for Sand. FINANCE & DEVELOPMENT, December 2015, Vol. 52, No. 4. Retrieved from: https://www.imf.org/external/pubs/ft/fandd/2015/12/edwards.htm, accessed 12th October 2018
    De Leeuw, et al. 2010. Strategic assessment of the magnitude and impacts of sand mining in Poyang Lake, China. Reg. Environ. Change 10, 95-102. In: Lai et al. 2014. Sand mining and increasing Poyang Lake’s discharge ability: A reassessment of causes for lake decline in China. Journal of Hydrology. Retrieved from: <https://www.researchgate.net/publication/277575909_Sand_mining_and_increasing_Poyang_Lake's_discharge_ability_A_reassessment_of_causes_for_lake_decline_in_China>, accessed 12th October 2018
    Lai et al. 2014. Sand mining and increasing Poyang Lake’s discharge ability: A reassessment of causes for lake decline in China. Journal of Hydrology. Retrieved from: <https://www.researchgate.net/publication/277575909_Sand_mining_and_increasing_Poyang_Lake's_discharge_ability_A_reassessment_of_causes_for_lake_decline_in_China>, accessed 12th October 2018
    n.d. 2017. What Is Sand Mining? Environmental Technology. Retrieved from: <https://www.envirotech-online.com/news/water-wastewater/9/breaking-news/what-is-sand-mining/42070>, accessed 12th October 2018.
    Peduzzia, P. et al. 2014. Sand, rarer than one thinks. UNEP. Retrieved from: <https://na.unep.net/geas/archive/pdfs/GEAS_Mar2014_Sand_Mining.pdf>, accessed 12th October 2018
    The Third Pole, 2017. Sandmining is destroying Asia’s rivers. Retrieved from: <https://www.thethirdpole.net/en/2017/05/05/sandmining-is-destroying-asias-rivers/>, accessed 12th October 2018
    Tweedie, N. 2018. Is the world running out of sand? The truth behind stolen beaches and dredged islands. The Guardian. Retrieved from: <https://www.theguardian.com/global/2018/jul/01/riddle-of-the-sands-the-truth-behind-stolen-beaches-and-dredged-islands>, accessed 12th October 2018
    Vince Beiser, 2017. Sand mining: the global environmental crisis you’ve probably never heard of. The Guardian. Retrieved from: <https://www.theguardian.com/cities/2017/feb/27/sand-mining-global-environmental-crisis-never-heard>, accessed 12th October 2018
    WWF, 2018. Uncovering sand mining’s impacts on the world’s rivers. Retrieved from: <https://wwf.panda.org/our_work/water/?333451/Uncovering-sand-minings-impacts-on-the-worlds-rivers>, accessed 12th October 2018
  property price 0.00828715 EUR2005
    Price, average unit value, dollars per metric ton in 2022 of crushed stone (gravel, crushed) of 14 USD/metric ton. The price is the annual average free-on-board plant prices, usually at the first point of sale or captive use, as reported by crushed stone producing companies. Prices do not include transportation from the plant or yard to the consumer, although they do include all costs of mining, processing, in-plant transportation, overhead, and profit. Value retrieved from USGS, Mineral Commodity Summaries 2023, accessed on 20230918: https://pubs.usgs.gov/periodicals/mcs2023/mcs2023-stone-crushed.pdf from https://www.usgs.gov/centers/national-minerals-information-center/crushed-stone-statistics-and-information
    The price was converted to EUR based on the annual exchange rates published by the European Central Bank (https://sdw.ecb.europa.eu/quickview.do?SERIES_KEY=120.EXR.A.USD.EUR.SP00.A, last accessed on 2023-06-01) and adjusted for inflation relative to 2005 using the producer price index (PPI) of the euro area, published by eurostat (https://ec.europa.eu/eurostat/databrowser/view/STS_INPP_A__custom_6416181/default/table?lang=en, last accessed on 2023-06-01).
  properties: carbon allocation 0 kg, carbon content 0, carbon content, fossil 0, carbon content, non-fossil 0, dry mass 1 kg, water content 0, water in wet mass 0 kg, wet mass 1 kg

## Inputs from technosphere
- building, hall, steel construction: 2.85e-6 m2; lognormal variance with pedigree 0.372, pedigree (3,5,5,5,1)
  EcoSpold01Location=CH
- conveyor belt: 9.51e-8 m; lognormal variance with pedigree 0.424, pedigree (5,4,5,5,1)
  EcoSpold01Location=RER
- diesel, burned in building machine: 0.0143 MJ; lognormal variance with pedigree 0.0532, pedigree (2,3,5,5,1)
  EcoSpold01Location=GLO
  properties: heating value, net 1 MJ
- electricity, medium voltage: 6.71347e-6, 8.56084e-6, 2.9954e-7, 7.61416e-7, 6.98004e-6, 6.63872e-5, 8.6994e-5, 9.2127e-5, 3.53887e-6, 4.69249e-5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 kWh (70 suppliers, which the file names only by identifier); sum of these 0.00906 kWh; lognormal variance with pedigree 0.0532, pedigree (2,3,5,5,1)
  EcoSpold01Location=CH
- gravel/sand quarry infrastructure: 4.75e-11 unit; lognormal variance with pedigree 0.3526, pedigree (1,3,5,5,1)
  EcoSpold01Location=CH
- heat, central or small-scale, other than natural gas: 6.65255e-5, 0.00484347 MJ (2 suppliers, which the file names only by identifier); sum of these 0.00491 MJ; lognormal variance with pedigree 0.0532, pedigree (2,3,5,5,1)
  EcoSpold01Location=CH
  properties: heating value, net 1 MJ
- industrial machine, heavy, unspecified: 9.51e-5 kg; lognormal variance with pedigree 0.372, pedigree (3,5,5,5,1)
  EcoSpold01Location=RER
- lubricating oil: 2.5e-6 kg; lognormal variance with pedigree 0.0532, pedigree (2,3,5,5,1)
  EcoSpold01Location=RER
  properties: carbon content, fossil 0.75, dry mass 1 kg, heating value, net 40.2 MJ, wet mass 1 kg
  note on carbon content, fossil: Lubricating oil is produced from diesel. C-content/dry mass of fats and oils considered 75%, from: ecoinvent v2.2 report, n 15a, pg 40
  note on heating value, net: Literature value, Source: IPCC 2006, 2006 IPCC Guidelines for National Greenhouse Gas Inventories, Prepared by the National Greenhouse Gas Inventories Programme, Eggleston H.S., Buendia L., Miwa K., Ngara T. and Tanabe K. (eds). Published: IGES, Japan
- municipal solid waste: -3.60765e-9, -2.72188e-9, -2.03543e-6, -6.8569e-8, -2.99772e-10, -9.62216e-11, -2.17487e-10, -9.05406e-9 kg (8 suppliers, which the file names only by identifier); sum of these -2.12e-6 kg; lognormal variance with pedigree 0.0032, pedigree (2,3,1,5,1)
  EcoSpold01Location=CH
  production volume; = ref_PV*MSW/ref
    Calculated based on the reference exchange production volume and the relative amounts of exchanges
  properties: carbon content, fossil 0.171549, carbon content, non-fossil 0.261655, dry mass 0.771 kg, heating value, net 11.74 MJ, water content 0.297017, wet mass 1 kg
  note on carbon content, fossil: MSW composition in tab 4.1, ecoinvent v2.2 report 13_I. C content referred to 1 kg DM
  note on heating value, net: Value taken from the general comment of the treatment dataset.
- recultivation, limestone mine: 1.27e-6 m2; lognormal variance with pedigree 0.1746, pedigree (3,3,5,5,1)
  EcoSpold01Location=CH
- scrap steel: -3.45075e-5, -1.64925e-5 kg (2 suppliers, which the file names only by identifier); sum of these -5.1e-5 kg; = steel_input
  Estimation. Same amount as the input.
  production volume; = ref_PV * (BP_amount_2 / ref)
    Calculated from production volume of reference product using the relative outputs.
  properties: dry mass 1 kg, wet mass 1 kg
- steel, low-alloyed, hot rolled: 5.1e-5 kg; name steel_input; lognormal variance with pedigree 0.0532, pedigree (2,3,5,5,1)
  EcoSpold01Location=RER
  properties: carbon content, fossil 0.005, dry mass 1 kg, wet mass 1 kg
  note on carbon content, fossil: Low alloyed steel composition given in Tab. 3.2 ecoinvent v2.2 report 10_partII. Steel assumed to have a C content of 0.5%
- synthetic rubber: 4e-6 kg; name rubber_input; lognormal variance with pedigree 0.0532, pedigree (2,3,5,5,1)
  EcoSpold01Location=RER
  properties: carbon content, fossil 0.871949, dry mass 1 kg, heating value, net 26.42 MJ, wet mass 1 kg
  note on carbon content, fossil: EPDM (Ethylene-propene-diene terpolymer) rubber is a terpolymer of ethylene, propene, and a diene with the residual unsaturated portion of the diene in the side chain (ecoinvent v2.2 report 7-part XX & Ullmann). Chemical formula (deduced from Evidences of Solvent-Induced Miscibility in Polychloroprene-co-Ethylene-Propene Diene Terpolymer Blends, Dubey et al., Journal of Applied Polymer Science, 2009, 111:1884–1891): C20H35
- tap water: 1.57818e-5, 2.4058e-5, 4.48911e-5, 0.00694219, 0.00517308 kg (5 suppliers, which the file names only by identifier); sum of these 0.0122 kg; source Künniger T. 2001; lognormal variance with pedigree 0.0532, pedigree (2,3,5,5,1)
  Literature value.
  EcoSpold01Location=RER
  properties: carbon content, fossil 0.00178991, dry mass 0.000337476 kg, water content 2962.17, wet mass 1 kg
  note on carbon content, fossil: Bicarbonate content is 2.93 mol/m3. CO2 content is 0.1 mol/m3 (ecoinvent v2.2 report 8, Tab 93.1).
- waste mineral oil: -1.80908e-6, -6.90923e-7 kg (2 suppliers, which the file names only by identifier); sum of these -2.5e-6 kg; lognormal variance with pedigree 0.0032, pedigree (2,3,1,5,1)
  EcoSpold01Location=CH
  production volume; = ref_PV*wasteMineralOil/ref
    (same comment as for municipal solid waste)
  properties: carbon content, fossil 0.864444, dry mass 0.9 kg, heating value, net 34.7 MJ, water content 0.111111, wet mass 1 kg
  note on carbon content, fossil: Tab A.6, ecoinvent v2.2 report 13_I. C content has been calculated after data in the tables, and then referred to 1 kg DM
- waste rubber, unspecified: -2.45457e-6, -1.54543e-6 kg (2 suppliers, which the file names only by identifier); sum of these -4e-6 kg; = rubber_input
  Estimation. Same amount as the input.
  production volume; = ref_PV * (BP_amount_1 / ref)
    Calculated from production volume of reference product using the relative outputs.
  properties: carbon content, fossil 0.853, dry mass 1 kg, heating value, net 27.19 MJ, wet mass 1 kg

## Inputs from nature
- Gravel [natural resource, in ground]: 1.04 kg; lognormal variance with pedigree 0.0532, pedigree (2,3,5,5,1)
- Occupation, lake, artificial [natural resource, land]: 6.27e-5 m2*year; lognormal variance with pedigree 0.1732, pedigree (2,3,5,5,1)
- Occupation, mineral extraction site [natural resource, land]: 0.000288 m2*year; lognormal variance with pedigree 0.0932, pedigree (2,3,5,5,1)
- Transformation, from unspecified [natural resource, land]: 3.51e-5 m2; lognormal variance with pedigree 0.1732, pedigree (2,3,5,5,1)
- Transformation, to lake, artificial [natural resource, land]: 6.27e-6 m2; lognormal variance with pedigree 0.1732, pedigree (2,3,5,5,1)
- Transformation, to mineral extraction site [natural resource, land]: 2.88e-5 m2; lognormal variance with pedigree 0.1732, pedigree (2,3,5,5,1)
- Water, unspecified natural origin [natural resource, in water]: 0.00111195 m3; source Byers, W. 2003; lognormal variance with pedigree 0.0546, pedigree (3,3,5,5,1)
  Literature value. The water used in the process is considered.
  Calculated based on literature, (Vionnet, S., Quantis Water Database - Technical Report, 2012). Water use during wet screening, sand screw and gravity classifier. 10% of water added to be used for dust control. The process boundaries are set by the boundaries of gravel/send processing plant. The process ends when the finished, sorted gravel of defined particles' sizes leaves the plant. It is assumed that 10% of water added for dust control on the site.

## Emissions to nature
- Particulate Matter, < 2.5 um [air, non-urban air or from high stacks]: 4e-10 kg; lognormal variance with pedigree 0.4232, pedigree (2,3,5,5,4)
- Particulate Matter, > 10 um [air, non-urban air or from high stacks]: 5.6e-9 kg; lognormal variance with pedigree 0.1632, pedigree (2,3,5,5,4)
- Particulate Matter, > 2.5 um and < 10um [air, non-urban air or from high stacks]: 2e-9 kg; lognormal variance with pedigree 0.2432, pedigree (2,3,5,5,4)
- Water [air, unspecified]: 0.000306585 m3; lognormal variance with pedigree 0.0827, pedigree (2,2,5,5,1)
  Calculated value based on literature values and expert opinion. See comments in the parametres' comment field.
- Water [water, unspecified]: 0.00081756 m3; lognormal variance with pedigree 0.0827, pedigree (2,2,5,5,1)
  (same comment as for Water)
  property carbon content, fossil 0; name C_content_fossil
  property carbon content, non-fossil 0; name C_content_non_fossil
  property dry mass 0 kg; name DM
  property water in wet mass 1000 kg; name WWM
  property wet mass 1000 kg; name WM

## Sampling procedure
Measurement data of four Swiss plants

## Extrapolations
See geography This dataset has been copied from an original dataset covering the geography CH. The uncertainty has been adjusted accordingly.

## Review by Roberto Dones 2010-02-07
passed

## Review by Emilia Moreno Ruiz 2015-09-17
broken formula fixed
