# hake, capture by trawler and landing whole, fresh

Dataset: EcoSpold 2, unit process
Time period: 2011-01-01 to 2023-12-31
Technology level: current
Classification: ISIC rev.4 ecoinvent: 0311:Marine fishing
Scenario: Business-as-Usual
System model: Allocation, cut-off by classification
Generated by: Ian Vázquez-Rowe
Published in: Avadí, A. 2018
Database: ecoinvent
isCopyrightProtected: true
accessRestrictedTo: 1

## General comment
This activity represents capture and landing of Cape hake (Merluccius capensis) by trawlers in the Southeast Atlantic, more specifically, in the EEZ of Namibia (FAO Areas 47, 48, 49 and 50). The vessels modelled in this dataset are industrial vessels with a beam of 50 m. The gear is bottom trawling. All the three modelled vessels are from Spain, but operating permanently in Namibian waters.
System boundaries and relation between activities

## Included activities start
From the vessel use (including landing) and maintenance phases, including all upstream activities

## Included activities end
Port operations and post-landing processing activities are beyond the system boundary.

## Allocation
The system is unallocated between hake landings and the by-catch

## Geography
Cape hake (Merluccius capensis) captured and landed off the coast of Namibia in FAO Areas 47, 48, 49 and 50.

## Technology
Bottom trawling, fish conservation with cooling chambers.

## Time period
Data corresponds to the landings by four vessels in 2011.

## Parameters
- annual landings per vessel: 1.68496e6 kg; name landings_vessel_year; triangular min 518296, mostLikely 1.68496e6, max 4.53279e6, pedigree (1,4,1,1,1)
  Amount of landings per vessel per year
  Uncertainty: Based on 4 datapoints XXXXXX
- average_weight_ trawler: 665000 kg; name WeightTrawler; triangular min 594000, mostLikely 665000, max 756000, pedigree (4,2,3,2,2)
  Average weight of trawler in a given fishery.
- lifetime: 60 year; lognormal variance with pedigree 0.310725, pedigree (4,2,3,2,2)
  Lifetime for vessels with dimensions above 45 meters (beam)
- marine fuel use efficiency: 370 kg; name FUE; triangular min 72, mostLikely 120, max 168, pedigree (2,4,1,1,1)
  Amount of marine fuel consumed per landed unit of fish. Kilograms per tonne of landed fish.
  Uncertainty: Based on 32 datapoints from 9 vessels in 2006-2010. Expressed in kg/t.
- net calorific value: 42.7 MJ/kg; name net_cal_value; triangular min 41.4, mostLikely 42.7, max 43.3, pedigree (3,5,3,5,5)
  Net calorific value of marine diesel oil (MDO)
  Uncertainty: Most likely value from Wild (2005) Determination of energy cost of electrical energy on board sea-going vessels: "The net calorific value of marine diesel oil (MDO) and marine gas oil (MGO) is 42,700 kJ/kg". Uncertainty data from 2006 IPCC Guidelines for National Greenhouse Gas Inventories, Vol 1, Table 1.2 Default net calorific values (NCVs) and lower and upper limits of the 95 percent confidence intervals (data for Gas/Diesel Oil).

## Reference product
- demersal fish, fresh: 1 kg; name bycatch; source Ian Vázquez-Rowe 2014; By-product classification allocatable product; CPC 04241: Wild fish of Gadiformes, live, fresh or chilled; HS2017 030259: Fish; fresh or chilled, n.e.c. in item no. 0302.5, excluding fillets, fish meat of 0304, and edible fish of[...]
  Atlantinc ocean demersal biomass removed from ocean in Namibian waters.
  production volume 576840 kg; = ABS(prod_vol*bycatch/landed)
    6% of hake landings
  property ash content 0.015 kg; name hakebc_ash
    Ash content of fish is between 1-2% of the edible portion, http://www.fao.org/wairdocs/tan/x5916e/x5916e01.htm
  property carbon content, non-fossil 0.466681; name bycatch_C_content_non_fossil; = (1-hakebc_protein-bycatch_fat_content-hakebc_ash)*0.444+hakebc_protein*0.535+bycatch_fat_content*0.774
    Calculated from C_content = polysaccharids*0.444+protein*0.535+lipids*0.774 and polysaccharids = 1-(protein+lipids+ash)
  property dry mass 0.56397 kg; name bycatch_DM
  property energy content 3.914 MJ; name bycatch_energy_content
    Average of 15 demersal fish species, http://www.fao.org/wairdocs/tan/x5916e/x5916e01.htm
  property fat content 0.039; name bycatch_fat_content
    Average of 15 demersal fish species, http://www.fao.org/wairdocs/tan/x5916e/x5916e01.htm
  property price 0.539258 EUR2005
    Calculated value based on data from United Nations Commodity Trade Statistics Database (comtrade.un.org). UN comtrade category: 30242 Fish; fresh or chilled, anchovies (Engraulis spp.), excluding fillets, livers, roes, and other fish meat of heading 0304. Year 2014. Using exchange rate of 1EURO = 1.209 USD. Average of price of import into 3 main markets (EU, US and CN).
  property protein content 0.181; name hakebc_protein
    Average of 15 demersal fish species, http://www.fao.org/wairdocs/tan/x5916e/x5916e01.htm
  property water content 0.77316; name bycatch_water_content
  property water in wet mass 0.43603 kg; name bycatch_WWM
  property wet mass 1 kg; name bycatch_WM
  properties: allocation factor 0.0524098, carbon allocation 0.263194 kg, carbon content 0.466681, true value 64.7109

## Inputs from technosphere
All rows: source Ian Vázquez-Rowe 2014
- antifouling paint emissions: -5.86989e-5 kg; name antif; lognormal variance with pedigree 0.044, pedigree (3,1,3,1,1)
  Mass of solids from antifouling paint emitted to ocean.
  Uncertainty: Data based on reports by the area of maintenance of the fishing companies
  production volume; = ABS(prod_vol*antif/landed)
    Calculated from production volume of reference product using the relative outputs.
  property dry mass 1 kg; name antif_DM
  property water content 0; name antif_water_content
  property water in wet mass 0 kg; name antif_WWM
  property wet mass 1 kg; name antif_WM
- diesel, burned in fishing vessel: 7.72821 MJ; = FUE*net_cal_value*1.12; lognormal variance with pedigree 0.0426, pedigree (3,1,5,1,1)
  Combustion of diesel in marine engines. Average diesel use and combustion used for all energy needs onboard
  Uncertainty: Data based on reports by skippers
- lubricating oil: 0.000391326 kg; name oil; lognormal variance with pedigree 0.082, pedigree (3,1,5,1,1)
  Lubricating oil for vessel engines.
  Uncertainty: Data based on reports by the area of maintenance of the fishing companies
  properties: carbon content, fossil 0.75, dry mass 1 kg, heating value, net 40.2 MJ, wet mass 1 kg
  note on carbon content, fossil: Lubricating oil is produced from diesel. C-content/dry mass of fats and oils considered 75%, from: ecoinvent v2.2 report, n 15a, pg 40
  note on heating value, net: Literature value, Source: IPCC 2006, 2006 IPCC Guidelines for National Greenhouse Gas Inventories, Prepared by the National Greenhouse Gas Inventories Programme, Eggleston H.S., Buendia L., Miwa K., Ngara T. and Tanabe K. (eds). Published: IGES, Japan
- trawler maintenance, steel: 0.00643516 kg; = (WeightTrawler/(landings_vessel_year*lifetime)*1120); lognormal variance with pedigree 0.342, pedigree (3,1,5,1,1)
  Maintenance of a trawler, per 1000 kg of light ship weight (LSW) over 35 years lifetime. Regressions based on mainly primary data were created to relate the weight of each inventory item to a trawler's LSW. The list of inventory items (granularity) contribute >95% of environmental impacts, as described in the reference publication.
  Uncertainty: Data based on reports by skippers
- trawler, steel: 0.00643516 kg; = (WeightTrawler/(landings_vessel_year*lifetime)*1120); lognormal variance with pedigree 0.342, pedigree (3,1,5,1,1)
  Construction of a trawler, per 1000 kg of light ship weight (LSW). Regressions based on mainly primary data were created to relate the weight of each inventory item to a trawler's LSW. The list of inventory items (granularity) contribute >95% of environmental impacts, as described in the reference publication.
  Uncertainty: Data based on reports by skippers
  property lifetime 30 year; name lifetime
  properties: lifetime capacity [h] 48000 hour
- waste mineral oil: -0.000391326 kg; name woil; = oil; lognormal variance with pedigree 0.044, pedigree (3,1,3,1,1)
  Waste oil landed in port.
  Uncertainty: Data based on reports by the fishing companies
  production volume; = ABS(prod_vol*woil/landed)
    Production volume for waste mineral oil in hake-landng vessels is based on GDP, considering the high variability in efficiency of vessels.
  properties: carbon content, fossil 0.864444, dry mass 0.9 kg, heating value, net 34.7 MJ, water content 0.111111, wet mass 1 kg
  note on carbon content, fossil: Tab A.6, ecoinvent v2.2 report 13_I. C content has been calculated after data in the tables, and then referred to 1 kg DM
  note on heating value, net: Value taken from the general comment of the treatment dataset.

## Inputs from nature
- Fish, demersal, in ocean [natural resource, biotic]: 0.543315 kg; = landed+bycatch+discards; source Ian Vázquez-Rowe 2014; lognormal variance with pedigree 0.0426, pedigree (3,1,5,1,1)
  Namibian hake (TL = 4.4 ± 0.6) and bycatch biomass removed from ocean.
  Uncertainty: Data based on reports by skippers
  property ash content 0.015 kg; name fishd_ash
  property fat content 0.039; name fishd_fat
  property protein content 0.181; name fishd_protein

## Emissions to nature
- Chlorodifluoromethane [air, non-urban air or from high stacks]: 0.000166314 kg; source Ian Vázquez-Rowe 2014; lognormal variance with pedigree 0.082, pedigree (3,1,5,1,1)
  Amount of cooling agents emiited to air.
  Uncertainty: Data based on reports by the fishing companies
- Discarded fish, demersal, to ocean [water, ocean]: 0.0541568 kg; name discards; source Ian Vázquez-Rowe 2014; lognormal variance with pedigree 0.0426, pedigree (3,1,5,1,1)
  Fish caught and discarded to ocean.
  Uncertainty: Data based on reports by skippers
  property ash content 0.015 kg; name discardsd_ash
  property carbon content, non-fossil 0.466681; name discards_C_content_non_fossil; = (1-discardsd_protein-discards_fat_content-discardsd_ash)*0.444+discardsd_protein*0.535+discards_fat_content*0.774
  property dry mass 0.56397 kg; name discards_DM
  property energy content 3.914 MJ; name discards_energy_content
  property fat content 0.039; name discards_fat_content
  property protein content 0.181; name discardsd_protein
  property water content 0.77316; name discards_water_content
  property water in wet mass 0.43603 kg; name discards_WWM
  property wet mass 1 kg; name discards_WM

## Sampling procedure
4 vessels in 2011. No feasible data on the size of the fleet.

## Extrapolations
The use of these data is probably also valid for other industrial hake fisheries along the southern African coast.
