# urea production

Dataset: EcoSpold 2, unit process
Geography: CN
Time period: 2011-01-01 to 2023-12-31
Technology level: current
Classification: ISIC rev.4 ecoinvent: 2012:Manufacture of fertilizers and nitrogen compounds
Synonyms: Carbamide
Scenario: Business-as-Usual
System model: Allocation, cut-off by classification
Generated by: Anna Kounina
Database: ecoinvent
isCopyrightProtected: true
accessRestrictedTo: 1

## General comment
This dataset represents the production of 1 kg of urea, with 46% N. Urea (formula CO(NH2)2) is a an organic chemical compound naturally found in the urine of mammals that serves an important role in the metabolism of nitrogen-containing compounds. It is a colorless, odorless solid, highly soluble in water, and practically non-toxic. When dissolved in water, it is neither acidic nor alkaline. Over 90% of the world industrial production of urea is for its use as nitrogen (N) fertiliser. It is also used as raw material for the manufacturing of resins, explosives, and various medical and laboratory applications.
Urea is produced from synthetic ammonia and carbon dioxide under high pressure (known as the Bosch–Meiser urea process). As large quantities of carbon dioxide are produced during the ammonia manufacturing process, urea production units are most often combined with an ammonia plant. All the carbon dioxide used in the process is therefore recovered from the ammonia synthesis. The amount of CO2 recovered from the ammonia synthesis and used in urea production, will be inevitably and completely released back to the atmosphere after application of urea to the soil.
The process generates ammonium carbamate, which is then dehydrated with heat to form urea and water:
2NH3 + CO2 → NH2COONH4 → CO(NH2)2 + H2O
The main data sources for this dataset are Fertilizers Europe (2014, 2016). Additional data sources are listed as follows.
References:
Fertilizers Europe (2000): Best Available Techniques for Pollution Prevention and Control in the European Fertilizer Industry. Booklet No. 1 of 8: Production of Ammonia. Fertilizers Europe, Brussels.
Kongshaug G. (1998): Energy Consumption and Greenhouse Gas Emissions in Fertilizer Production. IFA 20th July 1998
Davies J., Haglund C. (1999): Life Cycle Inventory of Fertiliser Production. SIK-Report No 654 1999. Chalmers University of Technology, Sweden.
Fertilizers Europe (2014): Average Emissions Year 2011. Fertilizers Europe Environmental report (internal).
Fertilizers Europe (2000): Best Available Techniques for Pollution Prevention and Control in the European Fertilizer Industry. Booklet No. 5 of 8: Production of urea and urea ammonium nitrate. Fertilizers Europe, Brussels.
Fertilizers Europe (2016): Carbon Footprint Calculator for Fertilizer Production. Specification. Version 2.1
Fertilizers Europe (2016): Average Emissions Year 2014. Fertilizers Europe Environmental report (internal). Used for updated energy and GHG emission in Carbon Footprint Calculator

## Included activities start
The activity includes all the raw and processed materials necessary to produce this product. Liquid ammonia, carbon dioxide, steam and electricity are included. Direct emissions of ammonia, carbon dioxide and particulate matter to air as well as ammonium ion and nitrogen to water are included.

## Included activities end
The activity ends with the final product being ready for transportation at the production site.

## Geography
The dataset is representative of urea production in China, adapted from data collected in European fertiliser plants.

## Technology
This datasets corresponds to the technology used in Chinese fertiliser plants. The production of urea involves the combination of ammonia with carbon dioxide, using heat and electricity.

## Time period
Primary data were collected on fertiliser production for the year 2011. These data were based on annual average data for the year 2011.

## Reference product
- urea: 1 kg; name RP; By-product classification allocatable product; CPC 34611: Urea; HS2017 310210: Fertilizers, mineral or chemical; nitrogenous, urea, whether or not in aqueous solution; CAS 57-13-6
  production volume 6.63478e10 kg; name PVRP
    Kg/y, International Fertilizers Association (2014).
  property carbon content, fossil 0.199995
    Carbon content, fossil is calculated based on the chemical formula of the substance.
  property hydrogen content 0.0671317
    Hydrogen content (on a dry matter basis) of urea is calculated from the molecular formula of the substance (CH4N2O).
  property nitrogen content 0.466462
    Nitrogen content (on a dry matter basis) of urea is calculated from the molecular formula of the substance (CH4N2O).
  property oxygen content 0.266412
    Oxygen content (on a dry matter basis) of urea is calculated from the molecular formula of the substance (CH4N2O).
  property price 0.457 EUR2005
    Calculated value based on data from United Nations Commodity Trade Statistics Database (comtrade.un.org). UN comtrade category: 310210 Urea, including aqueous solution in packs > 10kg. Year 2005. Using exchange rate of 1EURO = 1.209 USD. Average of price of import into 5 main markets (EU, US, JP, IN and CN).
  properties: carbon allocation 0.199995 kg, carbon content 0.199995, carbon content, non-fossil 0, dry mass 1 kg, water content 0, water in wet mass 0 kg, wet mass 1 kg

## Inputs from technosphere
- ammonia, anhydrous, liquid: 0.567 kg; lognormal variance with pedigree 0.0446, pedigree (3,4,5,1,1)
  Calculation, based on Fertilizer Europe (2016).
  properties: dry mass 1 kg, hydrogen content 0.177547, nitrogen content 0.822453, wet mass 1 kg
  note on hydrogen content: Hydrogen content (on a dry matter basis) of ammonia, anhydrous, liquid is calculated from the molecular formula of the substance (H3N).
  note on nitrogen content: Nitrogen content (on a dry matter basis) of ammonia, anhydrous, liquid is calculated from the molecular formula of the substance (H3N).
- carbon dioxide, in chemical industry: 0.77112 kg; name CO2_1; lognormal variance with pedigree 0.0446, pedigree (3,4,5,1,1)
  Calculation, based on Fertilizer Europe (2016).
  properties: carbon content, fossil 0.272912, dry mass 1 kg, heating value, net 8.27 MJ, oxygen content 0.727088, wet mass 1 kg
  note on carbon content, fossil: Carbon content (on a dry matter basis) of carbon dioxide, in chemical industry is calculated from the molecular formula of the substance (CO2).
  note on oxygen content: Oxygen content (on a dry matter basis) of carbon dioxide, in chemical industry is calculated from the molecular formula of the substance (CO2).
- chemical factory, organics: 4.002e-10 unit; lognormal variance with pedigree 0.344, pedigree (3,4,5,1,1)
  Estimation, based on various data sources (Althaus et al. 2007).
- electricity, low voltage: 0.0555556 kWh; lognormal variance with pedigree 0.0446, pedigree (3,4,5,1,1)
  Data from Fertilizer Europe (2014).
- steam, in chemical industry: 1.41818 kg; lognormal variance with pedigree 0.0446, pedigree (3,4,5,1,1)
  Calculation, based on Fertilizer Europe (2016).
  properties: dry mass 1 kg, wet mass 1 kg

## Inputs from nature
- Water, cooling, unspecified natural origin [natural resource, in water]: 0.1311 m3; lognormal variance with pedigree 0.0446, pedigree (3,4,5,1,1)
  Estimation, based on various data sources (Althaus et al. 2007).
- Water, unspecified natural origin [natural resource, in ground]: 0.00023 m3; lognormal variance with pedigree 0.0446, pedigree (3,4,5,1,1)
  Estimation, based on various data sources (Althaus et al. 2007).

## Emissions to nature
- Ammonia [air, urban air close to ground]: 0.00052 kg; lognormal variance with pedigree 0.084, pedigree (3,4,5,1,1)
  Data from Fertilizer Europe (2014).
- Carbon dioxide, fossil [air, urban air close to ground]: -0.73312 kg; name CO2_e; = -CO2_1+0.038; normal variance with pedigree 0.0006, pedigree (3,4,5,5,1)
  CO2 that is sourced from ammonia production is credited here with a negative emission. The flow aggregates the credit of CO2 with a 0.038 kg of emissions.
- Particulate Matter, > 2.5 um and < 10um [air, urban air close to ground]: 0.00031 kg; lognormal variance with pedigree 0.164, pedigree (3,4,5,1,1)
  Data from Fertilizer Europe (2014).
- Water [air, unspecified]: 0.0524084 m3; = 0.00156+0.0508484; lognormal variance with pedigree 0.084, pedigree (3,4,5,1,1)
  Data from Fertilizer Europe (2014).
- Ammonium [water, surface water]: 0.00016744 kg; lognormal variance with pedigree 0.084, pedigree (3,4,5,1,1)
  Estimation, based on various data sources (Althaus et al. 2007).
- Nitrogen [water, surface water]: 0.00043 kg; lognormal variance with pedigree 0.084, pedigree (3,4,5,1,1)
  Data from Fertilizer Europe (2014).
- Water [water, unspecified]: 0.0804816 m3; lognormal variance with pedigree 0.084, pedigree (3,4,5,1,1)
  Estimation, based on various data sources (Althaus et al. 2007).

## Extrapolations
The data were extrapolated from respective data for the geography of Europe, i.e. production of ammonia and nitric acid are adapted to reflect production in China.
