# oat grain production

Dataset: EcoSpold 2, unit process
Geography: AU-QLD
Time period: 2011-01-01 to 2023-01-01
Technology level: current
Classification: ISIC rev.4 ecoinvent: 0111:Growing of cereals (except rice), leguminous crops and oil seeds
Scenario: Business-as-Usual
System model: Allocation, cut-off by classification
Generated by: Timothy Grant
Database: ecoinvent
isCopyrightProtected: true
accessRestrictedTo: 1

## General comment
This inventory represents the production of 1 kg of oat in AUS-QNS region, It has been developed with support from the Australian Commonwealth Government through the National Landcare Programme Innovation Grant and the Grains Research and Development Corporation (GRDC). The inventory was developed by CSIRO, the Department of Primary Industries NSW and Lifecycles. More detail on inventory development can be found in the Methodology for Developing Life Cycle Inventory' documents located at http://auslci.com.au/index.php/AusAgLCI. ;

## Included activities start
The inventory includes the processes for growing oats without irrigation on arable land in Queensland, Australia. Inputs of fertilisers, pesticides as well as the transports to the farm are considered. The direct and indirect emissions on the field from nitrogen application and stubble retention are included. Stubble/straw removed from the field is included in the nitrogen balance but allocation to straw product has been ignored as the fraction of stubble removed on average is low 4%,- and the economic value is generally low. The nitrogen balance also includes leaching of N in different parts of the state based on the ratio of evapouration/ precipitation ratio which results in 30% Nitrogen leaching in 1.4% of the state of QLD. All tractor operations, fuel supply and machine infrastructure is included. The direct emissions on the field are also included. Inventory refers to the production of 1 kg of grain. Source inventory refers to 1 ha of crop over 1 year, with an average yield value of 520 kg (dry matter content = 449.8 kg), from the end of the previous crop to the point of harvesting of the next crop.

## Included activities end
The system boundary ends at the field gate with all further processes such as transport, storage, packaging are excluded.

## Geography
This inventory refers to an average production in Queensland, Australia.

## Technology
This dataset represents the current agricultural process from the soil tillage to the harvest of the crop

## Time period
Averge data collected for 2011-2016.

## Reference product
- oat grain: 1 kg; By-product classification allocatable product; CPC 01172: Oats, other; HS2017 100490: Cereals; oats, other than seed
  This inventory has been developed with support from the Australian Commonwealth Government through the National Landcare Programme Innovation Grant and the Grains Research and Development Corporation (GRDC). The inventory was developed by CSIRO, the Department of Primary Industries NSW and Lifecycles. More detail on inventory development can be found in the Methodology for Developing Life Cycle Inventory' documents located at http://auslci.com.au/index.php/AusAgLCI. ;
  production volume 6.09762e7 kg
    Australian Bureau of Statistics 2021-22, Agricultural Commodities, Australia, ABS, viewed 17 July 2023, <https://www.abs.gov.au/statistics/industry/agriculture/agricultural-commodities-australia/2021-22>.
  property price 0.169689 EUR2005
    The price was calculated based on data on gross value (AUD) [1] divided by the production quantity [2] of oat grain for the years 2017-2021 for the Queensland region in Australia from the Australian Bureau of Statistics (ABS). Data was available per financial year, so that the first year of the financial year was assumed to be the year analysed. References: [1] Value of Agricultural Commodities Produced, Australia; accessed on 24.08.23, available at: https://www.abs.gov.au/statistics/industry/agriculture/value-agricultural-commodities-produced-australia [2] Agricultural Commodities, Australia; accessed on 24.08.2023, available at: https://www.abs.gov.au/statistics/industry/agriculture/agricultural-commodities-australia
    The prices were converted to EUR based on the annual exchange rates published by the European Central Bank (https://sdw.ecb.europa.eu/quickview.do?SERIES_KEY=120.EXR.A.AUD.EUR.SP00.A, last accessed on 2023-06-01) and adjusted for inflation relative to 2005 using the producer price index (PPI) of the euro area, published by eurostat (https://ec.europa.eu/eurostat/databrowser/view/STS_INPP_A__custom_6416181/default/table?lang=en, last accessed on 2023-06-01).
  properties: carbon allocation 0.425234 kg, carbon content 0.4916, carbon content, fossil 0, carbon content, non-fossil 0.4916, dry mass 0.865 kg, energy content 0 MJ, water content 0.156069, water in wet mass 0.135 kg, wet mass 1 kg

## Inputs from technosphere
- application of plant protection product, by field sprayer: 0.00961538 ha; lognormal variance with pedigree 0.0038, pedigree (2,3,3,1,1)
  nb of times ha is processed x surface |) divided by kg yield per ha
  properties: dry mass 1 kg, wet mass 1 kg
- combine harvesting: 0.00192308 ha; lognormal variance with pedigree 0.0046, pedigree (1,4,3,1,1)
  nb of times ha is processed x surface |) divided by kg yield per ha
  properties: dry mass 1 kg, wet mass 1 kg
- fertilising, by broadcaster: 0.00192308 ha; lognormal variance with pedigree 0.0038, pedigree (2,3,3,1,1)
  nb of times ha is processed x surface |) divided by kg yield per ha
  properties: dry mass 1 kg, wet mass 1 kg
- glyphosate: 0.00362692 kg; lognormal variance with pedigree 0.0052, pedigree (3,3,3,1,1)
  8.58E-04 units --- Mass glyphosate |plus| 1.38E-03 units --- Mass glyphosate |plus| 1.38E-03 units --- Mass glyphosate |) divided by kg yield per ha
  properties: carbon content, fossil 0.214286, dry mass 1 kg, wet mass 1 kg
- monoammonium phosphate: 0.0788462 kg; lognormal variance with pedigree 0.0126, pedigree (3,1,3,1,3)
  mass monoammonium phosphate |) divided by kg yield per ha
  properties: dry mass 1 kg, nitrogen content 0.084, phosphorus content 0.226939, wet mass 1 kg
- pesticide, unspecified: 0.00824788 kg; lognormal variance with pedigree 0.0052, pedigree (3,3,3,1,1)
  1.80E-03 units --- mass 2,4-D |plus| 8.65E-05 units --- mass clopyralid |plus| 3.62E-03 units --- sum of mass 2,4-D |plus| 7.69E-04 units --- mass paraquat |plus| 1.92E-04 units --- mass fluroxypyr |plus| 1.53E-03 units --- mass MCPA |plus| 5.77E-06 units --- mass metsulfuron-methyl |plus| 2.40E-04 units --- mass tebuconazole |) divided by kg yield per ha
  properties: carbon content, fossil 0.486978, dry mass 1 kg, wet mass 1 kg
- planting with starter fertiliser, by no till planter: 0.00192308 ha; lognormal variance with pedigree 0.0046, pedigree (1,4,3,1,1)
  nb of times ha is processed x surface |) divided by kg yield per ha
  properties: dry mass 1 kg, wet mass 1 kg
- tillage, cultivating, chiselling: 0.000730769 ha; lognormal variance with pedigree 0.0046, pedigree (3,1,3,1,1)
  Surface x number of times ha is processed |) divided by kg yield per ha
  properties: dry mass 1 kg, wet mass 1 kg
- transport, tractor and trailer, agricultural: 0.005 metric ton*km; lognormal variance with pedigree 0.124, pedigree (3,1,3,1,1)
  grain collection yield x 0.005 metric ton*km |) divided by kg yield per ha
- urea: 0.0326923 kg; lognormal variance with pedigree 0.0126, pedigree (3,1,3,1,3)
  mass urea |) divided by kg yield per ha
  properties: carbon content, fossil 0.2, dry mass 1 kg, wet mass 1 kg

## Inputs from nature
- Carbon dioxide, in air [natural resource, in air]: 3.42308 kg; lognormal variance with pedigree 0.0412, pedigree (1,3,5,1,1)
  atmospheric CO2 absorbed by the plant yield * drymatter content of crop * carbon content of crop + plant residue x dry matter content of residue x carbon content of residue all multiplied by carbon to carbon dioxide conversion factor |) divided by kg yield per ha
- Occupation, annual crop, non-irrigated [natural resource, land]: 19.2308 m2*year; lognormal variance with pedigree 0.0047, pedigree (2,2,3,1,1)
  Actual land used for the cropping |) divided by kg yield per ha
- Occupation, cropland fallow (non-use) [natural resource, land]: 3.84615 m2*year; lognormal variance with pedigree 0.006, pedigree (3,1,3,1,1)
  Crop fallow as a part of crop rotation allocated across all crops in the rotation |) divided by kg yield per ha

## Emissions to nature
- 2,4-D [air, non-urban air or from high stacks]: 5.39808e-5 kg; lognormal variance with pedigree 0.044, pedigree (1,4,3,1,1)
  1.80E-05 units --- mass of active ingredient 2,4-D applied x fraction released in air - Primary partitioning from PESTLCI |plus| 3.60E-05 units --- mass of active ingredient 2,4-D applied x fraction released in air - Primary partitioning from PESTLCI |) divided by kg yield per ha
- Ammonia [air, non-urban air or from high stacks]: 0.00278846 kg; lognormal variance with pedigree 0.012, pedigree (1,4,3,1,1)
  Direct emissions from fertilizers. Nitrogen applied per ha x fraction of nitrogen volatilized x N to NH4 coversion factor divided by kg yield per ha
- Antimony ion [air, non-urban air or from high stacks]: 1.49615e-8 kg; lognormal variance with pedigree 0.654, pedigree (1,4,3,1,1)
  7.48E-09 units --- emissions from burning residues = yield x quantity of plant residue x fraction of residues remaining at time of burning x dry matter content x burning efficiency x fraction burnt* emission factor from NPI workbook/1000. (pg 13 Environment Australia, Aggregated Emmissions from Prescribed burning and Wildfires.1999) |plus| 7.48E-09 units --- emissions from burning residues = yield x quantity of plant residue x fraction of residues remaining at time of burning x dry matter content x burning efficiency x fraction burnt* emission factor from NPI workbook/1000. (pg 13 Environment Australia, Aggregated Emmissions from Prescribed burning and Wildfires.1999) |) divided by kg yield per ha
- Arsenic ion [air, non-urban air or from high stacks]: 9.76923e-10 kg; lognormal variance with pedigree 0.654, pedigree (1,4,3,1,1)
  4.88E-10 units --- emissions from burning residues = yield x quantity of plant residue x fraction of residues remaining at time of burning x dry matter content x burning efficiency x fraction burnt* emission factor from NPI workbook/1000. (pg 13 Environment Australia, Aggregated Emmissions from Prescribed burning and Wildfires.1999) |plus| 4.88E-10 units --- emissions from burning residues = yield x quantity of plant residue x fraction of residues remaining at time of burning x dry matter content x burning efficiency x fraction burnt* emission factor from NPI workbook/1000. (pg 13 Environment Australia, Aggregated Emmissions from Prescribed burning and Wildfires.1999) |) divided by kg yield per ha
- Butadiene [air, non-urban air or from high stacks]: 1.76538e-6 kg; lognormal variance with pedigree 0.044, pedigree (1,4,3,1,1)
  8.83E-07 units --- emissions from burning residues = yield x quantity of plant residue x fraction of residues remaining at time of burning x dry matter content x burning efficiency x fraction burnt* emission factor from NPI workbook/1000. (pg 13 Environment Australia, Aggregated Emmissions from Prescribed burning and Wildfires.1999) |plus| 8.83E-07 units --- emissions from burning residues = yield x quantity of plant residue x fraction of residues remaining at time of burning x dry matter content x burning efficiency x fraction burnt* emission factor from NPI workbook/1000. (pg 13 Environment Australia, Aggregated Emmissions from Prescribed burning and Wildfires.1999) |) divided by kg yield per ha
- Cadmium II [air, non-urban air or from high stacks]: 2.01154e-8 kg; lognormal variance with pedigree 0.654, pedigree (1,4,3,1,1)
  1.01E-08 units --- emissions from burning residues = yield x quantity of plant residue x fraction of residues remaining at time of burning x dry matter content x burning efficiency x fraction burnt* emission factor from NPI workbook/1000. (pg 13 Environment Australia, Aggregated Emmissions from Prescribed burning and Wildfires.1999) |plus| 1.01E-08 units --- emissions from burning residues = yield x quantity of plant residue x fraction of residues remaining at time of burning x dry matter content x burning efficiency x fraction burnt* emission factor from NPI workbook/1000. (pg 13 Environment Australia, Aggregated Emmissions from Prescribed burning and Wildfires.1999) |) divided by kg yield per ha
- Carbon dioxide, fossil [air, non-urban air or from high stacks]: 0.024 kg; lognormal variance with pedigree 0.0046, pedigree (1,4,3,1,1)
  2.40E-02 kg --- emissions from urea application. Carbon applied with urea x conversion factor divided by kg yield per ha
- Carbon dioxide, from soil or biomass stock [air, non-urban air or from high stacks]: 1.38273 kg; lognormal variance with pedigree 0.004, pedigree (1,4,3,1,1)
  2.40E-02 units --- emissions from urea application - reported as biogenic due to the ecoinvent background process used. Carbon applied with urea x conversion factor |plus| 0.00E+00 units --- emissions from burning residues = yield x quantity of plant residue x fraction of residues remaining at time of burning x dry matter content x burning efficiency x carbon content x CH4 emission factor x conversion factor |plus| 1.38E+00 units --- emissions from burning residues - Residue which is not removed, and not burnt is assumed to degrade to biogenic carbon dioxide. |) divided by kg yield per ha
- Carbon dioxide, non-fossil [air, non-urban air or from high stacks]: 0.000197308 kg; lognormal variance with pedigree 0.0046, pedigree (1,4,3,1,1)
  9.87E-05 units --- emissions from burning residues = yield x quantity of plant residue x fraction of residues remaining at time of burning x dry matter content x burning efficiency x fraction burnt* emission factor from NPI workbook/1000. (pg 13 Environment Australia, Aggregated Emmissions from Prescribed burning and Wildfires.1999) |plus| 9.87E-05 units --- emissions from burning residues = yield x quantity of plant residue x fraction of residues remaining at time of burning x dry matter content x burning efficiency x fraction burnt* emission factor from NPI workbook/1000. (pg 13 Environment Australia, Aggregated Emmissions from Prescribed burning and Wildfires.1999) |) divided by kg yield per ha
- Carbon monoxide, from soil or biomass stock [air, non-urban air or from high stacks]: 0.000717308 kg; lognormal variance with pedigree 0.654, pedigree (1,4,3,1,1)
  emissions from burning residues = yield x quantity of plant residue x fraction of residues remaining at time of burning x dry matter content x burning efficiency x carbon content x CO emission factor x conversion factor |) divided by kg yield per ha
- Carbon monoxide, non-fossil [air, non-urban air or from high stacks]: 0.00134231 kg; lognormal variance with pedigree 0.654, pedigree (1,4,3,1,1)
  6.71E-04 units --- emissions from burning residues = yield x quantity of plant residue x fraction of residues remaining at time of burning x dry matter content x burning efficiency x fraction burnt* emission factor from NPI workbook/1000. (pg 13 Environment Australia, Aggregated Emmissions from Prescribed burning and Wildfires.1999) |plus| 6.71E-04 units --- emissions from burning residues = yield x quantity of plant residue x fraction of residues remaining at time of burning x dry matter content x burning efficiency x fraction burnt* emission factor from NPI workbook/1000. (pg 13 Environment Australia, Aggregated Emmissions from Prescribed burning and Wildfires.1999) |) divided by kg yield per ha
- Chromium VI [air, non-urban air or from high stacks]: 1.01154e-8 kg; lognormal variance with pedigree 0.654, pedigree (1,4,3,1,1)
  5.06E-09 units --- emissions from burning residues = yield x quantity of plant residue x fraction of residues remaining at time of burning x dry matter content x burning efficiency x fraction burnt* emission factor from NPI workbook/1000. (pg 13 Environment Australia, Aggregated Emmissions from Prescribed burning and Wildfires.1999) |plus| 5.06E-09 units --- emissions from burning residues = yield x quantity of plant residue x fraction of residues remaining at time of burning x dry matter content x burning efficiency x fraction burnt* emission factor from NPI workbook/1000. (pg 13 Environment Australia, Aggregated Emmissions from Prescribed burning and Wildfires.1999) |) divided by kg yield per ha
- Clopyralid [air, non-urban air or from high stacks]: 8.65385e-7 kg; lognormal variance with pedigree 0.044, pedigree (1,4,3,1,1)
  mass of active ingredient clopyralid applied x fraction released in air - Primary partitioning from PESTLCI |) divided by kg yield per ha
- Cobalt II [air, non-urban air or from high stacks]: 3.58846e-9 kg; lognormal variance with pedigree 0.654, pedigree (1,4,3,1,1)
  1.79E-09 units --- emissions from burning residues = yield x quantity of plant residue x fraction of residues remaining at time of burning x dry matter content x burning efficiency x fraction burnt* emission factor from NPI workbook/1000. (pg 13 Environment Australia, Aggregated Emmissions from Prescribed burning and Wildfires.1999) |plus| 1.79E-09 units --- emissions from burning residues = yield x quantity of plant residue x fraction of residues remaining at time of burning x dry matter content x burning efficiency x fraction burnt* emission factor from NPI workbook/1000. (pg 13 Environment Australia, Aggregated Emmissions from Prescribed burning and Wildfires.1999) |) divided by kg yield per ha
- Copper ion [air, non-urban air or from high stacks]: 7.15385e-9 kg; lognormal variance with pedigree 0.654, pedigree (1,4,3,1,1)
  3.58E-09 units --- emissions from burning residues = yield x quantity of plant residue x fraction of residues remaining at time of burning x dry matter content x burning efficiency x fraction burnt* emission factor from NPI workbook/1000. (pg 13 Environment Australia, Aggregated Emmissions from Prescribed burning and Wildfires.1999) |plus| 3.58E-09 units --- emissions from burning residues = yield x quantity of plant residue x fraction of residues remaining at time of burning x dry matter content x burning efficiency x fraction burnt* emission factor from NPI workbook/1000. (pg 13 Environment Australia, Aggregated Emmissions from Prescribed burning and Wildfires.1999) |) divided by kg yield per ha
- Dinitrogen monoxide [air, non-urban air or from high stacks]: 0.000339206 kg; lognormal variance with pedigree 0.034, pedigree (1,4,3,1,1)
  6.50E-05 units --- Emissions from Mineralisation of N is loss of soil organic matter |plus| 7.73E-05 units --- Direct emissions from fertilizers - Nitrous oxide emissions Nitrogen applied x emission factor x conversion factor |plus| 7.73E-06 units --- Indirect emissions from fertilizers - Nitrous oxide emissions Nitrogen applied x fraction of nitrogen volatilized x emission factor x conversion factor |plus| 9.04E-06 units --- Fertilizers leaching - Nitrous oxide emissions Nitrogen applied x fraction of nitrogen available for leaching x fraction of nitrogen leaching x emission factor x conversion factor |plus| 1.79E-04 units --- emissions from residues above ground nitrogen yield x quantity of plant residue x dry matter content x carbon content x nitrogen content x (1-fraction of residues burnt - fraction of residues removed) x emission factor x conversion factor |plus| 7.06E-07 units --- emissions from burning residues = yield x quantity of plant residue x fraction of residues remaining at time of burning x dry matter content x burning efficiency x nitrogen content above ground x N2O emission factor x conversion factor |) divided by kg yield per ha
- Fluroxypyr [air, non-urban air or from high stacks]: 1.92115e-6 kg; lognormal variance with pedigree 0.044, pedigree (1,4,3,1,1)
  mass of active ingredient fluroxypyr applied x fraction released in air - Primary partitioning from PESTLCI |) divided by kg yield per ha
- Lead II [air, non-urban air or from high stacks]: 1.66154e-8 kg; lognormal variance with pedigree 0.654, pedigree (1,4,3,1,1)
  8.31E-09 units --- emissions from burning residues = yield x quantity of plant residue x fraction of residues remaining at time of burning x dry matter content x burning efficiency x fraction burnt* emission factor from NPI workbook/1000. (pg 13 Environment Australia, Aggregated Emmissions from Prescribed burning and Wildfires.1999) |plus| 8.31E-09 units --- emissions from burning residues = yield x quantity of plant residue x fraction of residues remaining at time of burning x dry matter content x burning efficiency x fraction burnt* emission factor from NPI workbook/1000. (pg 13 Environment Australia, Aggregated Emmissions from Prescribed burning and Wildfires.1999) |) divided by kg yield per ha
- MCPA [air, non-urban air or from high stacks]: 1.53462e-5 kg; lognormal variance with pedigree 0.044, pedigree (1,4,3,1,1)
  mass of active ingredient MCPA applied x fraction released in air - Primary partitioning from PESTLCI |) divided by kg yield per ha
- Manganese II [air, non-urban air or from high stacks]: 4.11538e-8 kg; lognormal variance with pedigree 0.654, pedigree (1,4,3,1,1)
  2.06E-08 units --- emissions from burning residues = yield x quantity of plant residue x fraction of residues remaining at time of burning x dry matter content x burning efficiency x fraction burnt* emission factor from NPI workbook/1000. (pg 13 Environment Australia, Aggregated Emmissions from Prescribed burning and Wildfires.1999) |plus| 2.06E-08 units --- emissions from burning residues = yield x quantity of plant residue x fraction of residues remaining at time of burning x dry matter content x burning efficiency x fraction burnt* emission factor from NPI workbook/1000. (pg 13 Environment Australia, Aggregated Emmissions from Prescribed burning and Wildfires.1999) |) divided by kg yield per ha
- Mercury II [air, non-urban air or from high stacks]: 4.23077e-9 kg; lognormal variance with pedigree 0.654, pedigree (1,4,3,1,1)
  2.12E-09 units --- emissions from burning residues = yield x quantity of plant residue x fraction of residues remaining at time of burning x dry matter content x burning efficiency x fraction burnt* emission factor from NPI workbook/1000. (pg 13 Environment Australia, Aggregated Emmissions from Prescribed burning and Wildfires.1999) |plus| 2.12E-09 units --- emissions from burning residues = yield x quantity of plant residue x fraction of residues remaining at time of burning x dry matter content x burning efficiency x fraction burnt* emission factor from NPI workbook/1000. (pg 13 Environment Australia, Aggregated Emmissions from Prescribed burning and Wildfires.1999) |) divided by kg yield per ha
- Methane, from soil or biomass stock [air, non-urban air or from high stacks]: 1.84038e-5 kg; lognormal variance with pedigree 0.012, pedigree (1,4,3,1,1)
  emissions from burning residues = yield x quantity of plant residue x fraction of residues remaining at time of burning x dry matter content x burning efficiency x carbon content x CH4 emission factor x conversion factor |) divided by kg yield per ha
- Metsulfuron-methyl [air, unspecified]: 5.76923e-8 kg; lognormal variance with pedigree 0.044, pedigree (1,4,3,1,1)
  mass of active ingredient metsulfuron-methyl applied x fraction released in air - Primary partitioning from PESTLCI |) divided by kg yield per ha
- NMVOC, non-methane volatile organic compounds [air, non-urban air or from high stacks]: 4.19231e-5 kg; lognormal variance with pedigree 5.004, pedigree (1,4,3,1,1)
  emissions from burning residues = yield x quantity of plant residue x fraction of residues remaining at time of burning x dry matter content x burning efficiency x carbon content x NMVOC emission factor x conversion factor |) divided by kg yield per ha
- Nickel II [air, non-urban air or from high stacks]: 5.84615e-9 kg; lognormal variance with pedigree 0.654, pedigree (1,4,3,1,1)
  2.92E-09 units --- emissions from burning residues = yield x quantity of plant residue x fraction of residues remaining at time of burning x dry matter content x burning efficiency x fraction burnt* emission factor from NPI workbook/1000. (pg 13 Environment Australia, Aggregated Emmissions from Prescribed burning and Wildfires.1999) |plus| 2.92E-09 units --- emissions from burning residues = yield x quantity of plant residue x fraction of residues remaining at time of burning x dry matter content x burning efficiency x fraction burnt* emission factor from NPI workbook/1000. (pg 13 Environment Australia, Aggregated Emmissions from Prescribed burning and Wildfires.1999) |) divided by kg yield per ha
- Nitrogen [air, non-urban air or from high stacks]: 0.0226538 kg; lognormal variance with pedigree 0.044, pedigree (1,4,3,1,1)
  Amount calculated from APSIM https://www.apsim.info/ runs for full rotation in region and divided by kg yield per ha.
- Nitrogen oxides [air, non-urban air or from high stacks]: 8.42308e-5 kg; lognormal variance with pedigree 0.034, pedigree (1,4,3,1,1)
  4.08E-05 units --- emissions from burning residues = yield x quantity of plant residue x fraction of residues remaining at time of burning x dry matter content x burning efficiency x nitrogen content above ground x NOx emission factor x conversion factor |plus| 2.17E-05 units --- emissions from burning residues = yield x quantity of plant residue x fraction of residues remaining at time of burning x dry matter content x burning efficiency x fraction burnt* emission factor from NPI workbook/1000. (pg 13 Environment Australia, Aggregated Emmissions from Prescribed burning and Wildfires.1999) |plus| 2.17E-05 units --- emissions from burning residues = yield x quantity of plant residue x fraction of residues remaining at time of burning x dry matter content x burning efficiency x fraction burnt* emission factor from NPI workbook/1000. (pg 13 Environment Australia, Aggregated Emmissions from Prescribed burning and Wildfires.1999) |) divided by kg yield per ha
- Paraquat [air, non-urban air or from high stacks]: 7.69231e-6 kg; lognormal variance with pedigree 0.044, pedigree (1,4,3,1,1)
  mass of active ingredient paraquat applied x fraction released in air - Primary partitioning from PESTLCI |) divided by kg yield per ha
- Particulate Matter, > 2.5 um and < 10um [air, non-urban air or from high stacks]: 0.000325385 kg; lognormal variance with pedigree 0.304, pedigree (1,4,3,1,1)
  1.63E-04 units --- emissions from burning residues = yield x quantity of plant residue x fraction of residues remaining at time of burning x dry matter content x burning efficiency x fraction burnt* emission factor from NPI workbook/1000. (pg 13 Environment Australia, Aggregated Emmissions from Prescribed burning and Wildfires.1999) |plus| 1.63E-04 units --- emissions from burning residues = yield x quantity of plant residue x fraction of residues remaining at time of burning x dry matter content x burning efficiency x fraction burnt* emission factor from NPI workbook/1000. (pg 13 Environment Australia, Aggregated Emmissions from Prescribed burning and Wildfires.1999) |) divided by kg yield per ha
- Selenium IV [air, non-urban air or from high stacks]: 1.62692e-9 kg; lognormal variance with pedigree 0.654, pedigree (1,4,3,1,1)
  8.13E-10 units --- emissions from burning residues = yield x quantity of plant residue x fraction of residues remaining at time of burning x dry matter content x burning efficiency x fraction burnt* emission factor from NPI workbook/1000. (pg 13 Environment Australia, Aggregated Emmissions from Prescribed burning and Wildfires.1999) |plus| 8.13E-10 units --- emissions from burning residues = yield x quantity of plant residue x fraction of residues remaining at time of burning x dry matter content x burning efficiency x fraction burnt* emission factor from NPI workbook/1000. (pg 13 Environment Australia, Aggregated Emmissions from Prescribed burning and Wildfires.1999) |) divided by kg yield per ha
- Tebuconazole [air, non-urban air or from high stacks]: 2.40385e-6 kg; lognormal variance with pedigree 0.044, pedigree (1,4,3,1,1)
  mass of active ingredient tebuconazole applied x fraction released in air - Primary partitioning from PESTLCI |) divided by kg yield per ha
- Zinc II [air, non-urban air or from high stacks]: 2.74231e-8 kg; lognormal variance with pedigree 0.654, pedigree (1,4,3,1,1)
  1.37E-08 units --- emissions from burning residues = yield x quantity of plant residue x fraction of residues remaining at time of burning x dry matter content x burning efficiency x fraction burnt* emission factor from NPI workbook/1000. (pg 13 Environment Australia, Aggregated Emmissions from Prescribed burning and Wildfires.1999) |plus| 1.37E-08 units --- emissions from burning residues = yield x quantity of plant residue x fraction of residues remaining at time of burning x dry matter content x burning efficiency x fraction burnt* emission factor from NPI workbook/1000. (pg 13 Environment Australia, Aggregated Emmissions from Prescribed burning and Wildfires.1999) |) divided by kg yield per ha
- 2,4-D [soil, agricultural]: 0.00535212 kg; lognormal variance with pedigree 0.037, pedigree (1,4,3,1,1)
  1.66E-03 units --- mass of active ingredient 2,4-D applied x fraction released off field and redeposited to other agricultural land and fraction reaching soil - Primary partitioning from PestLCI |plus| 1.21E-04 units --- mass of active ingredient 2,4-D applied x fraction released off field and redeposited to natural land - Primary partitioning from PestLCI |plus| 3.33E-03 units --- mass of active ingredient 2,4-D applied x fraction released off field and redeposited to other agricultural land and fraction reaching soil - Primary partitioning from PestLCI |plus| 2.42E-04 units --- mass of active ingredient 2,4-D applied x fraction released off field and redeposited to natural land - Primary partitioning from PestLCI |) divided by kg yield per ha
- Cadmium II [soil, agricultural]: 3.40385e-7 kg; lognormal variance with pedigree 0.044, pedigree (1,4,3,1,1)
  mass of metal Cadmium contained in fertilizer x fraction released in soil |) divided by kg yield per ha
- Clopyralid [soil, agricultural]: 8.55769e-5 kg; lognormal variance with pedigree 0.037, pedigree (1,4,3,1,1)
  7.98E-05 units --- mass of active ingredient clopyralid applied x fraction released off field and redeposited to other agricultural land and fraction reaching soil - Primary partitioning from PestLCI |plus| 5.77E-06 units --- mass of active ingredient clopyralid applied x fraction released off field and redeposited to natural land - Primary partitioning from PestLCI |) divided by kg yield per ha
- Fluroxypyr [soil, agricultural]: 0.000190038 kg; lognormal variance with pedigree 0.037, pedigree (1,4,3,1,1)
  1.77E-04 units --- mass of active ingredient fluroxypyr applied x fraction released off field and redeposited to other agricultural land and fraction reaching soil - Primary partitioning from PestLCI |plus| 1.29E-05 units --- mass of active ingredient fluroxypyr applied x fraction released off field and redeposited to natural land - Primary partitioning from PestLCI |) divided by kg yield per ha
- Glyphosate [soil, agricultural]: 0.00362692 kg; lognormal variance with pedigree 0.0376, pedigree (3,3,3,1,1)
  (same comment as for glyphosate)
- Lead II [soil, agricultural]: 2.44231e-7 kg; lognormal variance with pedigree 0.044, pedigree (1,4,3,1,1)
  mass of metal Lead contained in fertilizer x fraction released in soil |) divided by kg yield per ha
- MCPA [soil, agricultural]: 0.00151673 kg; lognormal variance with pedigree 0.037, pedigree (1,4,3,1,1)
  1.41E-03 units --- mass of active ingredient MCPA applied x fraction released off field and redeposited to other agricultural land and fraction reaching soil - Primary partitioning from PestLCI |plus| 1.03E-04 units --- mass of active ingredient MCPA applied x fraction released off field and redeposited to natural land - Primary partitioning from PestLCI |) divided by kg yield per ha
- Mercury II [soil, agricultural]: 8.15385e-10 kg; lognormal variance with pedigree 0.044, pedigree (1,4,3,1,1)
  mass of metal Mercury contained in fertilizer x fraction released in soil |) divided by kg yield per ha
- Metsulfuron-methyl [soil, agricultural]: 5.71154e-6 kg; lognormal variance with pedigree 0.037, pedigree (1,4,3,1,1)
  5.33E-06 units --- mass of active ingredient metsulfuron-methyl applied x fraction released off field and redeposited to other agricultural land and fraction reaching soil - Primary partitioning from PestLCI |plus| 3.85E-07 units --- mass of active ingredient metsulfuron-methyl applied x fraction released off field and redeposited to natural land - Primary partitioning from PestLCI |) divided by kg yield per ha
- Paraquat [soil, agricultural]: 0.000761346 kg; lognormal variance with pedigree 0.037, pedigree (1,4,3,1,1)
  7.10E-04 units --- mass of active ingredient paraquat applied x fraction released off field and redeposited to other agricultural land and fraction reaching soil - Primary partitioning from PestLCI |plus| 5.17E-05 units --- mass of active ingredient paraquat applied x fraction released off field and redeposited to natural land - Primary partitioning from PestLCI |) divided by kg yield per ha
- Tebuconazole [soil, agricultural]: 0.000237154 kg; lognormal variance with pedigree 0.037, pedigree (1,4,3,1,1)
  2.21E-04 units --- mass of active ingredient tebuconazole applied x fraction released off field and redeposited to other agricultural land and fraction reaching soil - Primary partitioning from PestLCI |plus| 1.60E-05 units --- mass of active ingredient tebuconazole applied x fraction released off field and redeposited to natural land - Primary partitioning from PestLCI |) divided by kg yield per ha
- 2,4-D [water, surface water]: 6.73077e-6 kg; lognormal variance with pedigree 0.044, pedigree (1,4,3,1,1)
  2.25E-06 units --- mass of active ingredient 2,4-D applied x fraction released off field and redeposited to freshwater - Primary partitioning from PestLCI |plus| 0.00E+00 units --- mass of active ingredient 2,4-D applied x fraction released off field and redeposited to freshwater - Primary partitioning from PestLCI |plus| 4.48E-06 units --- mass of active ingredient 2,4-D applied x fraction released off field and redeposited to freshwater - Primary partitioning from PestLCI |plus| 0.00E+00 units --- mass of active ingredient 2,4-D applied x fraction released off field and redeposited to freshwater - Primary partitioning from PestLCI |) divided by kg yield per ha
- Clopyralid [water, surface water]: 1.06731e-7 kg; lognormal variance with pedigree 0.044, pedigree (1,4,3,1,1)
  1.07E-07 units --- mass of active ingredient clopyralid applied x fraction released off field and redeposited to freshwater - Primary partitioning from PestLCI |plus| 0.00E+00 units --- mass of active ingredient clopyralid applied x fraction released off field and redeposited to freshwater - Primary partitioning from PestLCI |) divided by kg yield per ha
- Fluroxypyr [water, surface water]: 2.38462e-7 kg; lognormal variance with pedigree 0.044, pedigree (1,4,3,1,1)
  2.38E-07 units --- mass of active ingredient fluroxypyr applied x fraction released off field and redeposited to freshwater - Primary partitioning from PestLCI |plus| 0.00E+00 units --- mass of active ingredient fluroxypyr applied x fraction released off field and redeposited to freshwater - Primary partitioning from PestLCI |) divided by kg yield per ha
- MCPA [water, surface water]: 1.90962e-6 kg; lognormal variance with pedigree 0.044, pedigree (1,4,3,1,1)
  1.91E-06 units --- mass of active ingredient MCPA applied x fraction released off field and redeposited to freshwater - Primary partitioning from PestLCI |plus| 0.00E+00 units --- mass of active ingredient MCPA applied x fraction released off field and redeposited to freshwater - Primary partitioning from PestLCI |) divided by kg yield per ha
- Metsulfuron-methyl [water, surface water]: 7.11538e-9 kg; lognormal variance with pedigree 0.044, pedigree (1,4,3,1,1)
  7.12E-09 units --- mass of active ingredient metsulfuron-methyl applied x fraction released off field and redeposited to freshwater - Primary partitioning from PestLCI |plus| 0.00E+00 units --- mass of active ingredient metsulfuron-methyl applied x fraction released off field and redeposited to freshwater - Primary partitioning from PestLCI |) divided by kg yield per ha
- Nitrate [water, ground-]: 0.00336538 kg; lognormal variance with pedigree 0.044, pedigree (1,4,3,1,1)
  Fertilizers leaching - Nitrous oxide emissions Nitrogen applied x fraction of nitrogen available for leaching x fraction of nitrogen leaching from NIR x (1-nitrogen reemitted to air) x conversion factor divided by kg yield per ha
- Paraquat [water, surface water]: 9.57692e-7 kg; lognormal variance with pedigree 0.044, pedigree (1,4,3,1,1)
  9.58E-07 units --- mass of active ingredient paraquat applied x fraction released off field and redeposited to freshwater - Primary partitioning from PestLCI |plus| 0.00E+00 units --- mass of active ingredient paraquat applied x fraction released off field and redeposited to freshwater - Primary partitioning from PestLCI |) divided by kg yield per ha
- Phosphate [water, ground-]: 5.5e-5 kg; lognormal variance with pedigree 0.044, pedigree (1,4,3,1,1)
  5.50E-05 kg - Phosphorus leaching to ground water 0.07kg P per ha.a as phosphate PO4 - Ecoinvent report on agriculture divided by kg yield per ha
- Phosphate [water, surface water]: 4.81e-5 kg; lognormal variance with pedigree 0.044, pedigree (1,4,3,1,1)
  4.81E-05 kg - P run-off to surface waters ecoinvent report on agriculture divided by kg yield per ha
- Phosphorus [water, surface water]: 1.78077e-5 kg; lognormal variance with pedigree 0.044, pedigree (1,4,3,1,1)
  P emissions through erosion by water to surface waters ecoinvent report on agriculture |) divided by kg yield per ha
- Tebuconazole [water, surface water]: 2.96154e-7 kg; lognormal variance with pedigree 0.044, pedigree (1,4,3,1,1)
  2.96E-07 units --- mass of active ingredient tebuconazole applied x fraction released off field and redeposited to freshwater - Primary partitioning from PestLCI |plus| 0.00E+00 units --- mass of active ingredient tebuconazole applied x fraction released off field and redeposited to freshwater - Primary partitioning from PestLCI |) divided by kg yield per ha

## Sampling procedure
Face-to-face interviews with regional experts
