# heat production, anthracite, at stove 5-15kW

Dataset: EcoSpold 2, unit process
Geography: Europe without Switzerland
Time period: 1988-01-01 to 2023-12-31
Technology level: current
Classification: EcoSpold01Categories: hard coal/heating systems
Classification: ISIC rev.4 ecoinvent: 3530:Steam and air conditioning supply
Tags: ConvertedDataset
Scenario: Business-as-Usual
System model: Allocation, cut-off by classification
Generated by: Christian Bauer
Published in: Röder, A. 2004
Database: ecoinvent
isCopyrightProtected: true
accessRestrictedTo: 1

## General comment
This dataset represents the production of heat from a 5-15 kW coal stove filled with 1 MJ of anthracite coal. As there is no module for anthracite coal, the hard coal supply mix is used. The lifetime of the coal stove is 30 years, which corresponds to 1600 fully load hours per year. The heating value is 32.4 MJ/kg and the efficiency factor is 70%.
This dataset represents the production of heat from a 5-15 kW coal stove filled with 1 MJ of anthracite coal. As there is no module for anthracite coal, the hard coal supply mix is used. The lifetime of the coal stove is 30 years, which corresponds to 1600 fully load hours per year. The heating value is 32.4 MJ/kg and the efficiency factor is 70%.

## Included activities start
From reception of anthracite coal (hard coal supply mix).

## Included activities end
This activity ends with produced heat at the coal stove filled with 1 MJ of anthracite coal (hard coal supply mix).. The dataset includes transport and all emissions to air as well as the ash disposal. The dataset doesn’t include emissions to water as it is assumed that the coal is stored in a covered storage area.

## Technology
Average technology installed in early 1990s. The efficiency factor of a coal stove is between 50% and 70%. Since the coal stove is installed in the room to be heated, losses occur especially through the large amounts of flue gas and through incomplete combustion. An efficiency factor of 70% is assumed. Since neither ventilators nor air supply pumps are required for hot water circulation, no auxiliary energy is needed.
Reference:
Braun H., Angrüner B., Ecker P., Gschaider R., Sorger A., Wurst F., Ellinger R. (1991) Emissionen bei der Verbennung. Wien.
DGMK-Arbeitskreis (1992) Ansatzpunkte und Potentiale zur Minderung des Treibhauseffektes aus Sicht der fossilen Energieträger. Hamburg.
Fritsche U., Rausch L., Simon K.-H. (1989) Umweltwirkungsanalyse von Energiesystemen: Gesamt-Emissions-Modell Integrierter Systeme (GEMIS). Darmstadt/Kassel, Deutschland.
Jensch W. (1988) Vergleich von Energiesystemen unterschiedlicher Zentralisierung. IfE-Schriftenreihe Heft 22, München.
Menke C., Leithner R. (1990) Auswirkung der Energieversorgung auf die Luftqualität in der Region Braunschweig. In: BWK, Band 42, Nr.7/8, s.446-456.

## Parameters
- scaling factor: 1.43 dimensionless; name scaling_factor

## Reference product
- heat, central or small-scale, other than natural gas: 1 MJ; = 0.699300699300699 * scaling_factor; By-product classification allocatable product; CPC 17300: Steam and hot water
  EcoSpold01Location=RER
  Amount was scaled to 1.
  production volume 7.59447e11 MJ; name heat_apv
    Assumption. This production volume does not represent a realistic value, but reflects the share of heat from coal sources on the market for heat, central or small-scale, other than natural gas according to http://www.iea.org/statistics/statisticssearch/report/?country=EU28&product=electricityandheat&year=2012.
    See talk pages for further discussion.
    //Original comment //:
    IEA coal and Peat statistics for 2007 (http://www.iea.org/stats/coaldata.asp?COUNTRY_CODE=29), residential, commercial and agriculture. All bituminous coal in kg converted to MJ heat out by multiplying with 0.67 (conversion efficiency on a gross heating value basis) and dividing by 0.0294 (kg/MJ gross heating value).
  property price 0.0106 EUR2005
    Average European district heat price from Ecoheatcool and Euroheat 2005-2006, Ecoheat Work package 1: The European heat market. Final report. 10.6 EUR/GJ i s the price of district heat. http://www.solarthermalworld.org/files/Ecoheatcool%20WP1%20Web.pdf?download
  properties: Corresponding fuel use 1.43 MJ, carbon allocation 0 kg, carbon content 0, heating value, net 1 MJ

## Inputs from technosphere
- coal stove, 5-15kW: 8.2797e-7 unit; = 5.79E-07 * scaling_factor; lognormal variance with pedigree 0.3513, pedigree (2,3,5,3,1)
  Amount was scaled to the amount of reference product.
  EcoSpold01Location=RER
  Uncertainty: infrastructure
- hard coal: 0.02464, 0.019547 kg (2 suppliers, which the file names only by identifier); sum of these 0.044187 kg; = 0.0309 * scaling_factor; source Ruhrkohle 1987; lognormal variance with pedigree 0.0582, pedigree (4,2,5,3,1)
  Estimation. As there is no module for anthracite, the hard coal supply mix is assumed. The caloric value is 32.4 MJ/kg, the bulk density is 700-780 kg/m3, the water content is 4% and the ash content is 5%. Further values are 83% of carbonate, 1.2% of nitrogen, 0.95% of sulfur, 0.06% of chlorine, 0.005% of flour.
  Further references:
  Fritsche U., Matthes F.C. (1992) Analyse von Datenbasen zu klimarelevanten Emissionen in der Bundesrepublik Deutschland. Berlin/Darmstadt/Kassel.
  Hausen H. (Hrsg.) (1972) Thermodynamische Eigenschaften von Gemischen, Verbrennung, Wärmeübertragung. IV. Band Technik, 4. Teil, 6. Auflage, Berlin.
  Ratajczak E.-A. (1987) Emissionsmengen an kohlegefeuerten Hausbrandfeuerstätten, insbesondere im Hinblick auf gesundheitsgefährdende Abgasbestandteile. Band 1-3, Im Auftrag des UBA Berlin, Essen.
  Amount was scaled to the amount of reference product.
  EcoSpold01Location=UCTE
  Uncertainty: fuel input
  properties: carbon content, fossil 0.845, dry mass 0.94 kg, heating value, net 32.4 MJ, water content 0.0638298, wet mass 1 kg
  note on carbon content, fossil: C content 75-94% (specified in Tab 1.1, report 6, part VI). A mean content of 0.845 kg C/ kg dry hard coal was considered
  note on heating value, net: As there is no module for anthracite coal, the hard coal supply mix is used. The anthracite heating value is 32.4 MJ/kg
- hard coal ash: -7.49928e-6, -1.18376e-5, -1.66563e-5, -1.17174e-5, -2.48555e-6, -1.74493e-5, -0.000102666, -0.000792318, -6.95487e-5, -0.00147404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 kg (12 suppliers, which the file names only by identifier); sum of these -0.002574 kg; = 0.0018 * scaling_factor; source Ruhrkohle 1987; lognormal variance with pedigree 0.0703, pedigree (5,1,2,3,1)
  EcoSpold01Location=PL
  Estimation. It is assumed that 100% of the ash is disposed. The ash content is 5%. The density of dry ash is 400 to 650 kg/m3.
  Amount was scaled to the amount of reference product.
  Uncertainty: assumption: no reuse
  production volume; = heat_apv*hard_coal_ash
    Calculated from the production volume of anthracite, burned in stove 5-15kW in proportion to the respective output amounts.
  properties: dry mass 1 kg, wet mass 1 kg

## Emissions to nature
- Acetylene [air, urban air close to ground]: 1.43e-6 kg; = 1E-06 * scaling_factor; lognormal variance with pedigree 0.0913, pedigree (2,3,5,3,1)
  Modeled, based on “heat production, coal, emissions to air” - pdf-document on the dedicated talk page of ecoinvent (www.ecoinvent.org/documentation). The emission data are taken from the literature reporting measurements performed at the end of the 1980s in Germany and are based on the composition of the coal.
  Amount was scaled to the amount of reference product.
  Uncertainty: total NMVOC and profile estimate
- Aluminium III [air, urban air close to ground]: 1.5301e-5 kg; = 1.07E-05 * scaling_factor; lognormal variance with pedigree 0.7261, pedigree (4,5,5,3,1)
  Modeled, based on “heat production, coal, emissions to air” - pdf-document on the dedicated talk page of ecoinvent (www.ecoinvent.org/documentation). Emissions of trace elements were calculated using the ash content in the coal and average transfer coefficients for coal power plants with ash retention of 98 %.
  Amount was scaled to the amount of reference product.
  Uncertainty: from trace element balance; see report for details
- Antimony ion [air, urban air close to ground]: 2.574e-9 kg; = 1.8E-09 * scaling_factor; lognormal variance with pedigree 0.7261, pedigree (4,5,5,3,1)
  (same comment as for Aluminium III)
- Arsenic ion [air, urban air close to ground]: 3.6608e-8 kg; = 2.56E-08 * scaling_factor; lognormal variance with pedigree 0.7261, pedigree (4,5,5,3,1)
  (same comment as for Aluminium III)
- Barium II [air, urban air close to ground]: 1.287e-7 kg; = 9E-08 * scaling_factor; lognormal variance with pedigree 0.7261, pedigree (4,5,5,3,1)
  (same comment as for Aluminium III)
- Benzene [air, urban air close to ground]: 1.43e-6 kg; = 1E-06 * scaling_factor; lognormal variance with pedigree 0.0913, pedigree (2,3,5,3,1)
  (same comment as for Acetylene)
- Benzo(a)pyrene [air, urban air close to ground]: 1.43e-10 kg; = 1E-10 * scaling_factor; lognormal variance with pedigree 0.0913, pedigree (2,3,5,3,1)
  (same comment as for Acetylene)
- Beryllium II [air, urban air close to ground]: 1.8018e-9 kg; = 1.26E-09 * scaling_factor; lognormal variance with pedigree 0.7261, pedigree (4,5,5,3,1)
  (same comment as for Aluminium III)
- Boron [air, urban air close to ground]: 3.575e-7 kg; = 2.5E-07 * scaling_factor; lognormal variance with pedigree 0.7261, pedigree (4,5,5,3,1)
  (same comment as for Aluminium III)
- Bromine [air, urban air close to ground]: 1.35564e-8 kg; = 9.48E-09 * scaling_factor; lognormal variance with pedigree 0.7261, pedigree (4,5,5,3,1)
  (same comment as for Aluminium III)
- Cadmium II [air, urban air close to ground]: 2.2594e-9 kg; = 1.58E-09 * scaling_factor; lognormal variance with pedigree 0.7261, pedigree (4,5,5,3,1)
  (same comment as for Aluminium III)
- Calcium II [air, urban air close to ground]: 1.8018e-6 kg; = 1.26E-06 * scaling_factor; lognormal variance with pedigree 0.7261, pedigree (4,5,5,3,1)
  (same comment as for Aluminium III)
- Carbon dioxide, fossil [air, urban air close to ground]: 0.1144 kg; = 0.08 * scaling_factor; lognormal variance with pedigree 0.0408, pedigree (2,2,5,3,1)
  Modeled, based on “heat production, coal, emissions to air” - pdf-document on the dedicated talk page of ecoinvent (www.ecoinvent.org/documentation). The emission data are taken from the literature reporting measurements performed at the end of the 1980s in Germany and are based on the composition of the coal.
  Amount was scaled to the amount of reference product.
  Uncertainty: from carbon balance
- Carbon monoxide, fossil [air, urban air close to ground]: 0.01144 kg; = 0.008 * scaling_factor; lognormal variance with pedigree 0.6913, pedigree (2,3,5,3,1)
  Modeled, based on “heat production, coal, emissions to air” - pdf-document on the dedicated talk page of ecoinvent (www.ecoinvent.org/documentation). The emission data are taken from the literature reporting measurements performed at the end of the 1980s in Germany and are based on the composition of the coal.
  Amount was scaled to the amount of reference product.
  Uncertainty: typical value
- Chromium III [air, urban air close to ground]: 1.27413e-8 kg; = 8.91E-09 * scaling_factor; lognormal variance with pedigree 0.7261, pedigree (4,5,5,3,1)
  (same comment as for Aluminium III)
- Chromium VI [air, urban air close to ground]: 1.287e-10 kg; = 9E-11 * scaling_factor; lognormal variance with pedigree 0.52, pedigree (1,1,5,1,1)
  Modeled, based on “heat production, coal, emissions to air” - pdf-document on the dedicated talk page of ecoinvent (www.ecoinvent.org/documentation). The emission data are taken from the literature reporting measurements performed at the end of the 1980s in Germany and are based on the composition of the coal.
  Amount was scaled to the amount of reference product.
- Cobalt II [air, urban air close to ground]: 6.435e-9 kg; = 4.5E-09 * scaling_factor; lognormal variance with pedigree 0.7261, pedigree (4,5,5,3,1)
  (same comment as for Aluminium III)
- Copper ion [air, urban air close to ground]: 2.2165e-8 kg; = 1.55E-08 * scaling_factor; lognormal variance with pedigree 0.7261, pedigree (4,5,5,3,1)
  (same comment as for Aluminium III)
- Dinitrogen monoxide [air, urban air close to ground]: 2.145e-6 kg; = 1.5E-06 * scaling_factor; lognormal variance with pedigree 0.0913, pedigree (2,3,5,3,1)
  (same comment as for Carbon monoxide, fossil)
- Dioxins, measured as 2,3,7,8-tetrachlorodibenzo-p-dioxin [air, urban air close to ground]: 1.43e-13 kg; = 1E-13 * scaling_factor; lognormal variance with pedigree 0.3513, pedigree (2,3,5,3,1)
  (same comment as for Chromium VI)
- Ethane [air, urban air close to ground]: 4.29e-6 kg; = 3E-06 * scaling_factor; lognormal variance with pedigree 0.0913, pedigree (2,3,5,3,1)
  (same comment as for Acetylene)
- Ethylene [air, urban air close to ground]: 8.58e-6 kg; = 6E-06 * scaling_factor; lognormal variance with pedigree 0.0913, pedigree (2,3,5,3,1)
  (same comment as for Acetylene)
- Formaldehyde [air, urban air close to ground]: 1.43e-7 kg; = 1E-07 * scaling_factor; lognormal variance with pedigree 0.0913, pedigree (2,3,5,3,1)
  (same comment as for Acetylene)
- Hydrocarbons, aliphatic, alkanes, unspecified [air, urban air close to ground]: 1.43e-6 kg; = 1E-06 * scaling_factor; lognormal variance with pedigree 0.0913, pedigree (2,3,5,3,1)
  (same comment as for Acetylene)
- Hydrocarbons, aliphatic, unsaturated [air, urban air close to ground]: 1.43e-6 kg; = 1E-06 * scaling_factor; lognormal variance with pedigree 0.0913, pedigree (2,3,5,3,1)
  (same comment as for Acetylene)
- Hydrochloric acid [air, urban air close to ground]: 1.4586e-5 kg; = 1.02E-05 * scaling_factor; lognormal variance with pedigree 0.1161, pedigree (4,5,5,3,1)
  (same comment as for Aluminium III)
- Hydrogen fluoride [air, urban air close to ground]: 1.13113e-6 kg; = 7.91E-07 * scaling_factor; lognormal variance with pedigree 0.1161, pedigree (4,5,5,3,1)
  (same comment as for Aluminium III)
- Hydrogen sulfide [air, urban air close to ground]: 2.86e-6 kg; = 2E-06 * scaling_factor; lognormal variance with pedigree 0.0913, pedigree (2,3,5,3,1)
  (same comment as for Carbon monoxide, fossil)
- Iodine [air, urban air close to ground]: 1.6302e-8 kg; = 1.14E-08 * scaling_factor; lognormal variance with pedigree 0.7261, pedigree (4,5,5,3,1)
  (same comment as for Aluminium III)
- Iron ion [air, urban air close to ground]: 6.3206e-6 kg; = 4.42E-06 * scaling_factor; lognormal variance with pedigree 0.7261, pedigree (4,5,5,3,1)
  (same comment as for Aluminium III)
- Lead II [air, urban air close to ground]: 1.5444e-7 kg; = 1.08E-07 * scaling_factor; lognormal variance with pedigree 0.7261, pedigree (4,5,5,3,1)
  (same comment as for Aluminium III)
- Lead-210 [air, urban air close to ground]: 6.6495e-5 kBq; = 4.65E-05 * scaling_factor; lognormal variance with pedigree 0.7261, pedigree (4,5,5,3,1)
  Modeled, based on “heat production, coal, emissions to air” - pdf-document on the dedicated talk page of ecoinvent (www.ecoinvent.org/documentation). From radioactivity of the elements.
  Amount was scaled to the amount of reference product.
  Uncertainty: from radioactivity of the elements; see report for details
- Magnesium [air, urban air close to ground]: 5.4197e-6 kg; = 3.79E-06 * scaling_factor; lognormal variance with pedigree 0.7261, pedigree (4,5,5,3,1)
  (same comment as for Aluminium III)
- Manganese II [air, urban air close to ground]: 4.5045e-8 kg; = 3.15E-08 * scaling_factor; lognormal variance with pedigree 0.7261, pedigree (4,5,5,3,1)
  (same comment as for Aluminium III)
- Mercury II [air, urban air close to ground]: 2.145e-9 kg; = 1.5E-09 * scaling_factor; lognormal variance with pedigree 0.7261, pedigree (4,5,5,3,1)
  (same comment as for Aluminium III)
- Methane, fossil [air, urban air close to ground]: 0.0002574 kg; = 0.00018 * scaling_factor; lognormal variance with pedigree 0.0913, pedigree (2,3,5,3,1)
  (same comment as for Carbon monoxide, fossil)
- Molybdenum VI [air, urban air close to ground]: 3.861e-9 kg; = 2.7E-09 * scaling_factor; lognormal variance with pedigree 0.7261, pedigree (4,5,5,3,1)
  (same comment as for Aluminium III)
- NMVOC, non-methane volatile organic compounds [air, urban air close to ground]: 4.9335e-6 kg; = 3.45E-06 * scaling_factor; lognormal variance with pedigree 0.0913, pedigree (2,3,5,3,1)
  (same comment as for Acetylene)
- Nickel II [air, urban air close to ground]: 4.2471e-8 kg; = 2.97E-08 * scaling_factor; lognormal variance with pedigree 0.7261, pedigree (4,5,5,3,1)
  (same comment as for Aluminium III)
- Nitrogen oxides [air, urban air close to ground]: 7.15e-5 kg; = 5E-05 * scaling_factor; lognormal variance with pedigree 0.0913, pedigree (2,3,5,3,1)
  (same comment as for Carbon monoxide, fossil)
- Particulate Matter, < 2.5 um [air, urban air close to ground]: 7.15e-6 kg; = 5E-06 * scaling_factor; lognormal variance with pedigree 0.3761, pedigree (4,5,5,3,1)
  Modeled, based on “heat production, coal, emissions to air” - pdf-document on the dedicated talk page of ecoinvent (http://www.ecoinvent.org/documentation). The size distribution of particles has been estimated on the basis of recent information from U.S. Environmental Protection Agency (EPA).
  Amount was scaled to the amount of reference product.
  Uncertainty: total PM and profile estimates
- Particulate Matter, > 10 um [air, urban air close to ground]: 5.005e-5 kg; = 3.5E-05 * scaling_factor; lognormal variance with pedigree 0.1161, pedigree (4,5,5,3,1)
  (same comment as for Particulate Matter, < 2.5 um)
- Particulate Matter, > 2.5 um and < 10um [air, urban air close to ground]: 1.43e-5 kg; = 1E-05 * scaling_factor; lognormal variance with pedigree 0.1961, pedigree (4,5,5,3,1)
  (same comment as for Particulate Matter, < 2.5 um)
- Phenol [air, urban air close to ground]: 7.15e-8 kg; = 5E-08 * scaling_factor; lognormal variance with pedigree 0.0913, pedigree (2,3,5,3,1)
  (same comment as for Acetylene)
- Phosphorus [air, urban air close to ground]: 9.0376e-8 kg; = 6.32E-08 * scaling_factor; lognormal variance with pedigree 0.7261, pedigree (4,5,5,3,1)
  (same comment as for Aluminium III)
- Polonium-210 [air, urban air close to ground]: 0.00012155 kBq; = 8.5E-05 * scaling_factor; lognormal variance with pedigree 0.7261, pedigree (4,5,5,3,1)
  (same comment as for Lead-210)
- Potassium I [air, urban air close to ground]: 1.8018e-6 kg; = 1.26E-06 * scaling_factor; lognormal variance with pedigree 0.7261, pedigree (4,5,5,3,1)
  (same comment as for Aluminium III)
- Potassium-40 [air, urban air close to ground]: 1.9305e-5 kBq; = 1.35E-05 * scaling_factor; lognormal variance with pedigree 0.7261, pedigree (4,5,5,3,1)
  (same comment as for Lead-210)
- Propane [air, urban air close to ground]: 2.86e-6 kg; = 2E-06 * scaling_factor; lognormal variance with pedigree 0.0913, pedigree (2,3,5,3,1)
  (same comment as for Acetylene)
- Propylene [air, urban air close to ground]: 1.43e-6 kg; = 1E-06 * scaling_factor; lognormal variance with pedigree 0.0913, pedigree (2,3,5,3,1)
  (same comment as for Acetylene)
- Radium-226 [air, urban air close to ground]: 1.716e-5 kBq; = 1.2E-05 * scaling_factor; lognormal variance with pedigree 0.7261, pedigree (4,5,5,3,1)
  (same comment as for Lead-210)
- Radium-228 [air, urban air close to ground]: 9.295e-5 kBq; = 6.5E-05 * scaling_factor; lognormal variance with pedigree 0.7261, pedigree (4,5,5,3,1)
  (same comment as for Lead-210)
- Radon-220 [air, urban air close to ground]: 1.43e-6 kBq; = 1E-06 * scaling_factor; lognormal variance with pedigree 0.7261, pedigree (4,5,5,3,1)
  (same comment as for Lead-210)
- Radon-222 [air, urban air close to ground]: 1.43e-6 kBq; = 1E-06 * scaling_factor; lognormal variance with pedigree 0.7261, pedigree (4,5,5,3,1)
  (same comment as for Lead-210)
- Scandium [air, urban air close to ground]: 1.8018e-9 kg; = 1.26E-09 * scaling_factor; lognormal variance with pedigree 0.7261, pedigree (4,5,5,3,1)
  (same comment as for Aluminium III)
- Selenium IV [air, urban air close to ground]: 8.3941e-9 kg; = 5.87E-09 * scaling_factor; lognormal variance with pedigree 0.7261, pedigree (4,5,5,3,1)
  (same comment as for Aluminium III)
- Silicon [air, urban air close to ground]: 2.2594e-5 kg; = 1.58E-05 * scaling_factor; lognormal variance with pedigree 0.7261, pedigree (4,5,5,3,1)
  (same comment as for Aluminium III)
- Sodium I [air, urban air close to ground]: 9.0376e-7 kg; = 6.32E-07 * scaling_factor; lognormal variance with pedigree 0.7261, pedigree (4,5,5,3,1)
  (same comment as for Aluminium III)
- Strontium II [air, urban air close to ground]: 1.9305e-7 kg; = 1.35E-07 * scaling_factor; lognormal variance with pedigree 0.7261, pedigree (4,5,5,3,1)
  (same comment as for Aluminium III)
- Sulfur dioxide [air, urban air close to ground]: 0.0005005 kg; = 0.00035 * scaling_factor; lognormal variance with pedigree 0.0761, pedigree (4,5,5,3,1)
  Modeled, based on “heat production, coal, emissions to air” - pdf-document on the dedicated talk page of ecoinvent (www.ecoinvent.org/documentation). The emission data are taken from the literature reporting measurements performed at the end of the 1980s in Germany and are based on the composition of the coal.
  Amount was scaled to the amount of reference product.
  Uncertainty: from S-balance
- Thallium I [air, urban air close to ground]: 2.2594e-9 kg; = 1.58E-09 * scaling_factor; lognormal variance with pedigree 0.7261, pedigree (4,5,5,3,1)
  (same comment as for Aluminium III)
- Thorium [air, urban air close to ground]: 2.0592e-9 kg; = 1.44E-09 * scaling_factor; lognormal variance with pedigree 0.7261, pedigree (4,5,5,3,1)
  (same comment as for Aluminium III)
- Thorium-228 [air, urban air close to ground]: 7.865e-6 kBq; = 5.5E-06 * scaling_factor; lognormal variance with pedigree 0.7261, pedigree (4,5,5,3,1)
  (same comment as for Lead-210)
- Thorium-232 [air, urban air close to ground]: 5.005e-6 kBq; = 3.5E-06 * scaling_factor; lognormal variance with pedigree 0.7261, pedigree (4,5,5,3,1)
  (same comment as for Lead-210)
- Tin ion [air, urban air close to ground]: 9.0376e-10 kg; = 6.32E-10 * scaling_factor; lognormal variance with pedigree 0.7261, pedigree (4,5,5,3,1)
  (same comment as for Aluminium III)
- Titanium ion [air, urban air close to ground]: 5.4197e-7 kg; = 3.79E-07 * scaling_factor; lognormal variance with pedigree 0.7261, pedigree (4,5,5,3,1)
  (same comment as for Aluminium III)
- Toluene [air, urban air close to ground]: 2.86e-7 kg; = 2E-07 * scaling_factor; lognormal variance with pedigree 0.0913, pedigree (2,3,5,3,1)
  (same comment as for Acetylene)
- Uranium [air, urban air close to ground]: 2.574e-9 kg; = 1.8E-09 * scaling_factor; lognormal variance with pedigree 0.7261, pedigree (4,5,5,3,1)
  (same comment as for Aluminium III)
- Uranium-238 [air, urban air close to ground]: 1.43e-5 kBq; = 1E-05 * scaling_factor; lognormal variance with pedigree 0.7261, pedigree (4,5,5,3,1)
  (same comment as for Lead-210)
- Vanadium V [air, urban air close to ground]: 5.148e-8 kg; = 3.6E-08 * scaling_factor; lognormal variance with pedigree 0.7261, pedigree (4,5,5,3,1)
  (same comment as for Aluminium III)
- Xylenes, unspecified [air, urban air close to ground]: 2.86e-7 kg; = 2E-07 * scaling_factor; lognormal variance with pedigree 0.0913, pedigree (2,3,5,3,1)
  (same comment as for Acetylene)
- Zinc II [air, urban air close to ground]: 2.2594e-7 kg; = 1.58E-07 * scaling_factor; lognormal variance with pedigree 0.7261, pedigree (4,5,5,3,1)
  (same comment as for Aluminium III)

## Sampling procedure
Based on literature data.

## Review by Hans-Jörg Althaus 2005-07-19
passed

## Review by Roland Hischier 2011-09-23
Tansfer of documentation done.
