# pesticide production, unspecified

Dataset: EcoSpold 2, unit process
Geography: RER
Time period: 2000-01-01 to 2023-12-31
Technology level: current
Classification: ISIC rev.4 ecoinvent: 2021:Manufacture of pesticides and other agrochemical products
Classification: EcoSpold01Categories: agricultural means of production/pesticides
Tags: ConvertedDataset
Scenario: Business-as-Usual
System model: Allocation, cut-off by classification
Share of production covered: 100 %
Generated by: Jürgen Sutter
Published in: Nemecek, T. 2007
Database: ecoinvent
isCopyrightProtected: true
accessRestrictedTo: 1

## General comment
This dataset represents the production of pesticides (1 kg of active ingredient). Raw materials are modelled with a stoichiometric calculation. Energy consumption is modelled with data from a similar process. The emissions are estimated. Infrastructure is included with a default value.
[This dataset was already contained in the ecoinvent database version 2. It was not individually updated during the transfer to ecoinvent version 3. Life Cycle Impact Assessment results may still have changed, as they are affected by changes in the supply chain, i.e. in other datasets. This dataset was generated following the ecoinvent quality guidelines for version 2. It may have been subject to central changes described in the ecoinvent version 3 change report (http://www.ecoinvent.org/database/ecoinvent-version-3/reports-of-changes/), and the results of the central updates were reviewed extensively. The changes added e.g. consistent water flows and other information throughout the database. The documentation of this dataset can be found in the ecoinvent reports of version 2, which are still available via the ecoinvent website. The change report linked above covers all central changes that were made during the conversion process.]

## Included activities start
From reception of precursors (acetaldehyde, acetic acid, acetic anhydride, acetone, acetonitrile, acetylene, acrylonitrile, aluminium hydroxide, adipic acid, aluminium, ammonia, ammonium carbonate, ammonium chloride, ammonium thiocyanate, aniline, benzene, benzyl chloride, bromine, butadiene, 2-butanol, butene, butyrolactone, calcium carbide, carbon dioxide, carbon disulfide, carbon monoxide, carbon tetrachloride, chlorine, cumene, dichloromethane, dimethylamine, dimethyl sulfate, ethanol, ethyl acetate, ethylene, ethylene diamine, ethylene dichloride, ethylene oxide, formaldehyde, formic acid, hydrochloric acid, hydrogen, hydrogen cyanide, hydrogen fluoride, hydrogen peroxide, hydrogen sulfide, iodine, isopropanol, liquefied petroleum gas, lithium, maleic anhydride, manganese concentrate, methane, methanol, methyl acetate, methylamine, monochlorobenzene, naphtha, natural gas, nitric acid, nitrobenzene, nitrogen, o-dichlorobenzene, oxygen, p-dichlorobenzene, 1-pentanol, phenol, phosgene, phosphoric acid, phosphorous chloride, phosphorus, phthalic anhydride, potassium hydroxide, propanal, 1-propanol, propylene, propylene glycol, silicon, sodium chloride, sodium cyanide, sodium hydroxide, sodium hypochlorite, sodium methoxide, sodium tetrahydroborate, sulfur, sulfur dioxide, sulfur trioxide, sulfuric acid, toluene, trichloromethane, trimethylamine, urea, water decarbonised, "water, salt, sole", xylene, and zinc) at the factory gate.

## Included activities end
This activity ends with pesticides at the factory gate. The dataset includes the input materials, energy uses, infrastructure and emissions. The dataset doesn't include emulsives, additives etc.

## Geography
The inventory is modelled for Europe.

## Technology
The dataset was calculated from the arithmetic mean of all inputs and outputs of all 78 pesticides.

## Time period
Time of publications

## Parameters
- fraction, cooling water, cooling pond system, to air: 0.032 dimensionless; name fraction_CW_CP_to_air; lognormal variance with pedigree 0.0413, pedigree (2,3,1,3,1)
  Calculated based on literature value (Scown, C.D., 2011, Water Footprint of U.S. Transportation Fuels and supplying information of the article) (Vionnet, S., Quantis Water Database - Technical Report, 2012).
- fraction, cooling water, once-through system, to air: 0.004 dimensionless; name fraction_CW_OT_to_air; lognormal variance with pedigree 0.0413, pedigree (2,3,1,3,1)
  (same comment as for fraction, cooling water, cooling pond system, to air)
- fraction, cooling water, recirculating system, to air: 0.771 dimensionless; name fraction_CW_R_to_air; lognormal variance with pedigree 0.0413, pedigree (2,3,1,3,1)
  (same comment as for fraction, cooling water, cooling pond system, to air)
- fraction, cooling water, to air: 0.3875 dimensionless; name fraction_CW_to_air; = (0.5*fraction_CW_OT_to_air)+(0.5*fraction_CW_R_to_air); lognormal variance with pedigree 0.092025, pedigree (4,4,3,2,4)
  Calculated value based on literature value (see comments of the other parametres present in this dataset) and expert opinion. In the case when no industry/literature data are available about the type of cooling or directly fraction, cooling water, to air specific for the process a default assumption is applied. It is assumed that the once-through cooling system is used in 50% of all cases and recirculating system is used in another 50% of all cases.
- fraction, process water, to air: 0.205 dimensionless; name fraction_PW_to_air; lognormal variance with pedigree 0.092025, pedigree (4,4,3,2,4)
  Literature value (Statistics Canada, 2007 & Shaffer, K.H., 2008, Consumptive water use in the Great Lakes Basin, USGS) (Vionnet, S., Quantis Water Database - Technical Report, 2012).
- fraction, water, decarbonised, to air: 0.3875 dimensionless; name fraction_WDC_to_air; = fraction_CW_to_air; lognormal variance with pedigree 0.092025, pedigree (4,4,3,2,4)
  Calculated value. See comments in the other parametres present in this dataset. Decarbonised water is considered to be always used as cooling water, thus cooling water fractions to air are applied to all carbonised water input flows to calculate the amount of water consumed in the processes.

## Reference product
- pesticide, unspecified: 1 kg; By-product classification allocatable product; CPC 3466: Insecticides, fungicides, herbicides and disinfectants; HS2017 290339: Fluorinated, brominated or iodinated derivatives of acyclic hydrocarbons; other than ethylene dibromide (IS[...]
  This dataset includes fungicides, herbicides, insecticides and growtth regulators, which can have different modes of action.
  EcoSpold01Location=RER
  production volume 2.19478e8 kg
    Unknown
    The addition of the consumption volumes in the US in 2002 (from USGS, 2002 Pesticide use Maps) of the pesticides 1,3-D, abamectin, amitraz, benzyladenine, bromacil, buprofezin, butenoic acid, chloropicrin, chlorthal (DCPA), clethodim, clomazone, copper, cryolite, cyclanilide, dicloran (DCNA), dicofol, dimethipin , dodine, DSMA, emamectin, endosulfan, endothal, ethofumesate, fenbutatin oxide, flumetralin, flumic-lorac, flumioxazin, gibberelic acid, hexythiazox, isoxaflutole, kaolin, maleic hydrazide, mepiquat chloride, mesotrione, metaldehyde, methoxyfenozide, methyl bromide, MSMA, oil, oxytetracycline, prohexadione, propargite, pyridaben, quinclorac, quintozene (PCNB), sethoxydim, sodium chlorate, spinosad, streptomycin, sulfur, sulfuric acid, tebufenozide, terbacil, tralkoxydim, tribufos, triphenyltin (fentin), vinclozolin has been used to estimate the production volumes of unspecified pesticide in the Europe. For that, it has been extrapolated to a Global production mix using the ha of Arable land and Permanent crops of US versus the ha of Arable land and Permanent crops in the Europe in 2002 (299/179 million ha; FAOSTAT).
  property carbon content, fossil 0.486978
    Mean of C content in all pesticides whose formula has been documented in Sutter 2010
  property price 6.75642 EUR2005
    Calculated value based on data from United Nations Commodity Trade Statistics Database (comtrade.un.org). UN comtrade category: 3808 Insecticides, rodenticides, fungicides, herbicides, anti-sprouting products, plant growth regulators, disinfectants and the like, put up in forms or packings for retail sale or as preparations or articles. Average of years 2015-2019. Average of price of import into 5 main markets (EU, US, JP, CN and BR, based on OEC, https://oec.world/en/profile/hs/pesticides). Last accessed 2022-08-16.
    The prices were converted to EUR based on the annual exchange rates published by the European Central Bank (https://sdw.ecb.europa.eu/quickview.do?SERIES_KEY=120.EXR.A.USD.EUR.SP00.A, last accessed on 2022-02-15) and adjusted for inflation relative to 2005 using the producer price index (PPI) of the euro area, published by eurostat (https://appsso.eurostat.ec.europa.eu/nui/show.do?dataset=sts_inpp_a&lang=en, last accessed on 2022-05-04).
  properties: carbon allocation 0.486978 kg, carbon content 0.486978, carbon content, non-fossil 0, dry mass 1 kg, water content 0, water in wet mass 0 kg, wet mass 1 kg
## Inputs from technosphere
- 1-pentanol: 0.0041689 kg; source Unger T A 1996; lognormal variance with pedigree 0.076, pedigree (4,5,5,1,1)
  EcoSpold01Location=RER
  Stoichiometric calculation, assuming an efficiency of 95% per reaction step.
  Uncertainty: Stoechiometric calculation
  properties: carbon content, fossil 0.681818, dry mass 1 kg, heating value, net 37.14 MJ, wet mass 1 kg
- 1-propanol: 0.0048341 kg; source Unger T A 1996; lognormal variance with pedigree 0.076, pedigree (4,5,5,1,1)
  Stoichiometric calculation, assuming an efficiency of 95% per reaction step.
  EcoSpold01Location=RER
  Uncertainty: Stoechiometric calculation
  properties: carbon content, fossil 0.6, dry mass 1 kg, heating value, net 34.3 MJ, wet mass 1 kg
- 2-butanol: 0.0074363 kg; source Unger T A 1996; lognormal variance with pedigree 0.076, pedigree (4,5,5,1,1)
  (same comment as for 1-propanol)
  properties: carbon content, fossil 0.648649, dry mass 1 kg, heating value, net 35.99 MJ, wet mass 1 kg
- acetaldehyde: 0.068135 kg; source Unger T A 1996; lognormal variance with pedigree 0.076, pedigree (4,5,5,1,1)
  EcoSpold01Location=RER
  Stoichiometric calculation, assuming an efficiency of 95% per reaction step.
  Further references:
  Chahal et al. 2006. Surinder P. Chahal and John N. Starr: Lactic Acid. In: Ullmann's Encyclopedia of Industrial Chemistry, Seventh Edition, 2009 Electronic Release (ed. Fiedler E., Grossmann G., Kersebohm D., Weiss G. and Witte C.). 7 th Electronic Release Edition. Wiley InterScience, New York, Article Online Posting Date: January 15, 2006. Online-Version under: DOI: 10.1002/14356007.a15_097.pub2
  Eckert et al. 2006. Marc Eckert, Gerald Fleischmann, Reinhard Jira, Hermann M. Bolt, Klaus Golka: Acetaldehyde. In: Ullmann's Encyclopedia of Industrial Chemistry, Seventh Edition, 2009 Electronic Release (ed. Fiedler E., Grossmann G., Kersebohm D., Weiss G. and Witte C.). 7 th Electronic Release Edition. Wiley InterScience, New York, Article Online Posting Date: December 15, 2006. Online-Version under: DOI: 10.1002/14356007.a01_031.pub2
  Shimizu et al. 2000. Shinkichi Shimizu, Nanao Watanabe, Toshiaki Kataoka, Takayuki Shoji, Nobuyuki Abe, Sinji Morishita, Hisao Ichimura: Pyridine and Pyridine Derivatives. In: Ullmann's Encyclopedia of Industrial Chemistry, Seventh Edition, 2009 Electronic Release (ed. Fiedler E., Grossmann G., Kersebohm D., Weiss G. and Witte C.). 7 th Electronic Release Edition. Wiley InterScience, New York, Article Online Posting Date: June 15, 2000. Online-Version under: DOI: 10.1002/14356007.a22_399
  Uncertainty: Stoechiometric calculation
  properties: carbon content, fossil 0.545296, dry mass 1 kg, heating value, net 27.53 MJ, wet mass 1 kg
- acetic acid, without water, in 98% solution state: 0.062718 kg; source Unger T A 1996; lognormal variance with pedigree 0.076, pedigree (4,5,5,1,1)
  (same comment as for 1-pentanol)
  properties: carbon content, fossil 0.400016, dry mass 1 kg, heating value, net 14.6 MJ, wet mass 1 kg
  note on heating value, net: Based on literature, page 10, Althaus H.-J., Chudacoff M., Hischier R., Jungbluth N., Osses M. and Primas A. (2007) Life Cycle Inventories of Chemicals. Final report ecoinvent data v2.0 No. 8. EMPA, Swiss Centre for Life Cycle Inventories, Dübendorf, CH, Online-Version under: www.ecoinvent.org.
- acetic anhydride: 0.0095945 kg; source Unger T A 1996; lognormal variance with pedigree 0.076, pedigree (4,5,5,1,1)
  Stoichiometric calculation, assuming an efficiency of 95% per reaction step.
  Further references:
  Cheung et al. 2000. Hosea Cheung, Robin S. Tanke, G. Paul Torrence: Acetic Acid. In: Ullmann's Encyclopedia of Industrial Chemistry, Seventh Edition, 2009 Electronic Release (ed. Fiedler E., Grossmann G., Kersebohm D., Weiss G. and Witte C.). 7 th Electronic Release Edition. Wiley InterScience, New York, Article Online Posting Date: June 15, 2000. Online-Version under: DOI: 10.1002/14356007.a01_045
  Samel et al. 2000. Ulf-Rainer Samel, Walter Kohler, Armin Otto Gamer, Ullrich Keuser: Propionic Acid and Derivatives. In: Ullmann's Encyclopedia of Industrial Chemistry, Seventh Edition, 2009 Electronic Release (ed. Fiedler E., Grossmann G., Kersebohm D., Weiss G. and Witte C.). 7 th Electronic Release Edition. Wiley InterScience, New York, Article Online Posting Date: June 15, 2000. Online-Version under: DOI: 10.1002/14356007.a22_223
  Shimizu et al. 2000. Shinkichi Shimizu, Nanao Watanabe, Toshiaki Kataoka, Takayuki Shoji, Nobuyuki Abe, Sinji Morishita, Hisao Ichimura: Pyridine and Pyridine Derivatives. In: Ullmann's Encyclopedia of Industrial Chemistry, Seventh Edition, 2009 Electronic Release (ed. Fiedler E., Grossmann G., Kersebohm D., Weiss G. and Witte C.). 7 th Electronic Release Edition. Wiley InterScience, New York, Article Online Posting Date: June 15, 2000. Online-Version under: DOI: 10.1002/14356007.a22_399
  Strittmatter et al. 2007. Harald Strittmatter, Stefan Hildbrand, Peter Pollak: Malonic Acid and Derivatives. In: Ullmann's Encyclopedia of Industrial Chemistry, Seventh Edition, 2009 Electronic Release (ed. Fiedler E., Grossmann G., Kersebohm D., Weiss G. and Witte C.). 7 th Electronic Release Edition. Wiley InterScience, New York, Article Online Posting Date: April 15, 2007. Online-Version under: DOI: 10.1002/1435 6007.a16_063.pub2
  EcoSpold01Location=RER
  Uncertainty: Stoechiometric calculation
  properties: carbon content, fossil 0.470588, dry mass 1 kg, heating value, net 21.38 MJ, wet mass 1 kg
- acetone, liquid: 0.008714 kg; source Unger T A 1996; lognormal variance with pedigree 0.076, pedigree (4,5,5,1,1)
  EcoSpold01Location=RER
  Stoichiometric calculation, assuming an efficiency of 95% per reaction step.
  Further references:
  Bauer 2000. William Bauer Jr.: Methacrylic Acid and Derivatives. In: Ullmann's Encyclopedia of Industrial Chemistry, Seventh Edition, 2009 Electronic Release (ed. Fiedler E., Grossmann G., Kersebohm D., Weiss G. and Witte C.). 7 th Electronic Release Edition. Wiley InterScience, New York, Article Online Posting Date: June 15, 2000. Online-Version under: DOI: 10.1002/14356007.a16_441
  Eller et al. 2000. Karsten Eller, Erhard Henkes, Roland Rossbacher, Hartmut Höke: Amines, Aliphatic. In: Ullmann's Encyclopedia of Industrial Chemistry, Seventh Edition, 2009 Electronic Release (ed. Fiedler E., Grossmann G., Kersebohm D., Weiss G. and Witte C.). 7 th Electronic Release Edition. Wiley InterScience, New York, Article Online Posting Date: June 15, 2000. Online-Version under: DOI: 10.1002/14356007.a02_001
  Kim et al. 2003. Kim S., Overcash M.: Energy in chemical manufacturing processes: gate-to-gate information for life cycle assessment. In: Journal of Chemical Technology & Biotechnology vol. 78, no. 9: 995-1005(11). 2003
  Uncertainty: Stoechiometric calculation
  properties: carbon content, fossil 0.62069, dry mass 1 kg, heating value, net 31.32 MJ, wet mass 1 kg
- acetonitrile: 0.013979 kg; source Unger T A 1996; lognormal variance with pedigree 0.076, pedigree (4,5,5,1,1)
  (same comment as for 1-propanol)
  properties: carbon content, fossil 0.585366, dry mass 1 kg, heating value, net 26.59 MJ, wet mass 1 kg
- acetylene: 0.0019005 kg; source Unger T A 1996; lognormal variance with pedigree 0.076, pedigree (4,5,5,1,1)
  Stoichiometric calculation, assuming an efficiency of 95% per reaction step.
  EcoSpold01Location=CH
  Uncertainty: Stoechiometric calculation
  properties: carbon content, fossil 0.923077, dry mass 1 kg, heating value, net 51.2 MJ, wet mass 1 kg
  note on carbon content, fossil: C2H2. ecoinvent v2.2 report n 8. Produced from partial oxidation of natural gas
  note on heating value, net: Based on literature, page 25 (Value may refer to HHV), Althaus H.-J., Chudacoff M., Hischier R., Jungbluth N., Osses M. and Primas A. (2007) Life Cycle Inventories of Chemicals. Final report ecoinvent data v2.0 No. 8. EMPA, Swiss Centre for Life Cycle Inventories, Dübendorf, CH, Online-Version under: www.ecoinvent.org.
- acrylonitrile: 0.0025804 kg; source Unger T A 1996; lognormal variance with pedigree 0.076, pedigree (4,5,5,1,1)
  (same comment as for 1-pentanol)
  properties: carbon content, fossil 0.679245, dry mass 1 kg, heating value, net 27.43 MJ, wet mass 1 kg
- adipic acid: 0.0060427 kg; source Unger T A 1996; lognormal variance with pedigree 0.076, pedigree (4,5,5,1,1)
  (same comment as for 1-propanol)
  properties: carbon content, fossil 0.493151, dry mass 1 kg, heating value, net 23.23 MJ, wet mass 1 kg
- aluminium hydroxide: 0.0018312 kg; source Unger T A 1996; lognormal variance with pedigree 0.076, pedigree (4,5,5,1,1)
  (same comment as for 1-propanol)
  properties: dry mass 1 kg, wet mass 1 kg
- aluminium, cast alloy: 0.000377216 kg; source Unger T A 1996; lognormal variance with pedigree 0.076, pedigree (4,5,5,1,1)
  (same comment as for 1-propanol)
  properties: dry mass 1 kg, wet mass 1 kg
- aluminium, wrought alloy: 0.000801584 kg; source Unger T A 1996; lognormal variance with pedigree 0.076, pedigree (4,5,5,1,1)
  (same comment as for 1-propanol)
  properties: dry mass 1 kg, wet mass 1 kg
- ammonia, anhydrous, liquid: 0.1056 kg; source Unger T A 1996; lognormal variance with pedigree 0.076, pedigree (4,5,5,1,1)
  Stoichiometric calculation, assuming an efficiency of 95% per reaction step.
  Further references:
  Arntz et al. 2007. Dietrich Arntz, Achim Fischer, Mathias Höpp, Sylvia Jacobi, Jörg Sauer, Takashi Ohara, Takahisa Sato, Noboru Shimizu, Helmut Schwind: Acrolein and Methacrolein. In: Ullmann's Encyclopedia of Industrial Chemistry, Seventh Edition, 2009 Electronic Release (ed. Fiedler E., Grossmann G., Kersebohm D., Weiss G. and Witte C.). 7 th Electronic Release Edition. Wiley InterScience, New York, Article Online Posting Date: April 15, 2007. Online-Version under: DOI: 10.1002/14356007.a01_149.pub2
  Bipp et al. 2000. Hansjörg Bipp and Heinz Kieczka: Formamides. In: Ullmann's Encyclopedia of Industrial Chemistry, Seventh Edition, 2009 Electronic Release (ed. Fiedler E., Grossmann G., Kersebohm D., Weiss G. and Witte C.). 7 th Electronic Release Edition. Wiley InterScience, New York, Article Online Posting Date: June 15, 2000. Online-Version under: DOI: 10.1002/14356007.a12_001
  Eckert et al. 2006. Marc Eckert, Gerald Fleischmann, Reinhard Jira, Hermann M. Bolt, Klaus Golka: Acetaldehyde. In: Ullmann's Encyclopedia of Industrial Chemistry, Seventh Edition, 2009 Electronic Release (ed. Fiedler E., Grossmann G., Kersebohm D., Weiss G. and Witte C.). 7 th Electronic Release Edition. Wiley InterScience, New York, Article Online Posting Date: December 15, 2006. Online-Version under: DOI: 10.1002/14356007.a01_031.pub2
  Eller et al. 2000. Karsten Eller, Erhard Henkes, Roland Rossbacher, Hartmut Höke: Amines, Aliphatic. In: Ullmann's Encyclopedia of Industrial Chemistry, Seventh Edition, 2009 Electronic Release (ed. Fiedler E., Grossmann G., Kersebohm D., Weiss G. and Witte C.). 7 th Electronic Release Edition. Wiley InterScience, New York, Article Online Posting Date: June 15, 2000. Online-Version under: DOI: 10.1002/14356007.a02_001
  Bauer 2000. William Bauer Jr.: Methacrylic Acid and Derivatives. In: Ullmann's Encyclopedia of Industrial Chemistry, Seventh Edition, 2009 Electronic Release (ed. Fiedler E., Grossmann G., Kersebohm D., Weiss G. and Witte C.). 7 th Electronic Release Edition. Wiley InterScience, New York, Article Online Posting Date: June 15, 2000. Online-Version under: DOI: 10.1002/14356007.a16_441
  Frauenkron et al. 2001. Matthias Frauenkron, Johann-Peter Melder, Günther Ruider, Roland Rossbacher, Hartmut Höke: Ethanolamines and Propanolamines. In: Ullmann's Encyclopedia of Industrial Chemistry, Seventh Edition, 2009 Electronic Release (ed. Fiedler E., Grossmann G., Kersebohm D., Weiss G. and Witte C.). 7 th Electronic Release Edition. Wiley InterScience, New York, Article Online Posting Date: September 15, 2001. Online-Version under: DOI: 10.1002/14356007.a10_001
  Güthner et al. 2006. Thomas Güthner and Bernd Mertschenk: Cyanamides. In: Ullmann's Encyclopedia of Industrial Chemistry, Seventh Edition, 2009 Electronic Release (ed. Fiedler E., Grossmann G., Kersebohm D., Weiss G. and Witte C.). 7 th Electronic Release Edition. Wiley InterScience, New York, Article Online Posting Date: July 15, 2006. Online-Version under: DOI: 10.1002/14356007.a08_139.pub2
  Kim et al. 2003. Kim S., Overcash M.: Energy in chemical manufacturing processes: gate-to-gate information for life cycle assessment. In: Journal of Chemical Technology & Biotechnology vol. 78, no. 9: 995-1005(11). 2003
  Klemm et al. 2000. Alfred Klemm, Gabriele Hartmann, Ludwig Lange: Sodium and Sodium Alloys. In: Ullmann's Encyclopedia of Industrial Chemistry, Seventh Edition, 2009 Electronic Release (ed. Fiedler E., Grossmann G., Kersebohm D., Weiss G. and Witte C.). 7 th Electronic Release Edition. Wiley InterScience, New York, Article Online Posting Date: June 15, 2000. Online-Version under: DOI: 10.1002/14356007.a24_277
  Lange et al. 2000. Ludwig Lange and Wolfgang Triebel: Sulfides, Polysulfides, and Sulfanes. In: Ullmann's Encyclopedia of Industrial Chemistry, Seventh Edition, 2009 Electronic Release (ed. Fiedler E., Grossmann G., Kersebohm D., Weiss G. and Wit
  EcoSpold01Location=RER
  Uncertainty: Stoechiometric calculation
  properties: dry mass 1 kg, wet mass 1 kg
- ammonium carbonate: 0.015245 kg; source Laue W. 2009; lognormal variance with pedigree 0.076, pedigree (4,5,5,1,1)
  Stoichiometric calculation, assuming an efficiency of 95% per reaction step.
  Further references:
  Ritz et al. 2000. Josef Ritz, Hugo Fuchs, Howard G. Perryman: Hydroxylamine. In: Ullmann's Encyclopedia of Industrial Chemistry, Seventh Edition, 2009 Electronic Release (ed. Fiedler E., Grossmann G., Kersebohm D., Weiss G. and Witte C.). 7 th Electronic Release Edition. Wiley InterScience, New York, Article Online Posting Date: June 15, 2000. Online-Version under: DOI: 10.1002/14356007.a13_527
  Thiemann et al. 2000. Michael Thiemann, Erich Scheibler, Karl Wilhelm Wiegand: Nitric Acid, Nitrous Acid, and Nitrogen Oxides. In: Ullmann's Encyclopedia of Industrial Chemistry, Seventh Edition, 2009 Electronic Release (ed. Fiedler E., Grossmann G., Kersebohm D., Weiss G. and Witte C.). 7 th Electronic Release Edition. Wiley InterScience, New York, Article Online Posting Date: June 15, 2000. Online-Version under: DOI: 10.1002/14356007.a17_293
  EcoSpold01Location=RER
  Uncertainty: Stoechiometric calculation
  properties: carbon content, fossil 0.125, dry mass 1 kg, heating value, net 13.88 MJ, wet mass 1 kg
- ammonium chloride: 0.0085851 kg; source Unger T A 1996; lognormal variance with pedigree 0.076, pedigree (4,5,5,1,1)
  Stoichiometric calculation, assuming an efficiency of 95% per reaction step.
  Further references:
  Güthner et al. 2006. Thomas Güthner and Bernd Mertschenk: Cyanamides. In: Ullmann's Encyclopedia of Industrial Chemistry, Seventh Edition, 2009 Electronic Release (ed. Fiedler E., Grossmann G., Kersebohm D., Weiss G. and Witte C.). 7 th Electronic Release Edition. Wiley InterScience, New York, Article Online Posting Date: July 15, 2006. Online-Version under: DOI: 10.1002/14356007.a08_139.pub2
  Güthner et al. 2006. Thomas Güthner, Bernd Mertschenk, Bernd Schulz: Guanidine and Derivatives. In: Ullmann's Encyclopedia of Industrial Chemistry, Seventh Edition, 2009 Electronic Release (ed. Fiedler E., Grossmann G., Kersebohm D., Weiss G. and Witte C.). 7 th Electronic Release Edition. Wiley InterScience, New York, Article Online Posting Date: July 15, 2006. Online-Version under: DOI: 10.1002/14356007.a12_545.pub2
  EcoSpold01Location=GLO
  Uncertainty: Stoechiometric calculation
  properties: dry mass 1 kg, wet mass 1 kg
- ammonium thiocyanate: 0.0047958 kg; source Unger T A 1996; lognormal variance with pedigree 0.076, pedigree (4,5,5,1,1)
  EcoSpold01Location=GLO
  Stoichiometric calculation, assuming an efficiency of 95% per reaction step.
  Uncertainty: Stoechiometric calculation
  properties: carbon content, fossil 0.157895, dry mass 1 kg, heating value, net 11.15 MJ, wet mass 1 kg
- aniline: 0.032751 kg; source Unger T A 1996; lognormal variance with pedigree 0.076, pedigree (4,5,5,1,1)
  EcoSpold01Location=RER
  Stoichiometric calculation, assuming an efficiency of 95% per reaction step.
  Further references:
  Finley 2006. K. Thomas Finley: Benzoquinone. In: Ullmann's Encyclopedia of Industrial Chemistry, Seventh Edition, 2009 Electronic Release (ed. Fiedler E., Grossmann G., Kersebohm D., Weiss G. and Witte C.). 7 th Electronic Release Edition. Wiley InterScience, New York, Article Online Posting Date: April 15, 2006. Online-Version under: DOI: 10.1002/14356007.a03_571.pub2
  Uncertainty: Stoechiometric calculation
  properties: carbon content, fossil 0.774194, dry mass 1 kg, heating value, net 32.56 MJ, wet mass 1 kg
- benzene: 0.0084214 kg; source Unger T A 1996; lognormal variance with pedigree 0.076, pedigree (4,5,5,1,1)
  (same comment as for 1-pentanol)
  properties: carbon content, fossil 0.923077, dry mass 1 kg, heating value, net 42.5 MJ, wet mass 1 kg
- benzyl chloride: 0.014092 kg; source Unger T A 1996; lognormal variance with pedigree 0.076, pedigree (4,5,5,1,1)
  EcoSpold01Location=RER
  Stoichiometric calculation, assuming an efficiency of 95% per reaction step.
  Further references:
  Lange et al. 2000. Ludwig Lange and Wolfgang Triebel: Sulfides, Polysulfides, and Sulfanes. In: Ullmann's Encyclopedia of Industrial Chemistry, Seventh Edition, 2009 Electronic Release (ed. Fiedler E., Grossmann G., Kersebohm D., Weiss G. and Witte C.). 7 th Electronic Release Edition. Wiley InterScience, New York, Article Online Posting Date: June 15, 2000. Online-Version under: DOI: 10.1002/14356007.a25_443
  Uncertainty: Stoechiometric calculation
  properties: carbon content, fossil 0.666667, dry mass 1 kg, heating value, net 26.83 MJ, wet mass 1 kg
- butadiene: 0.0026868 kg; source Unger T A 1996; lognormal variance with pedigree 0.076, pedigree (4,5,5,1,1)
  (same comment as for 1-pentanol)
  properties: carbon content, fossil 0.857143, dry mass 1 kg, heating value, net 40.35 MJ, wet mass 1 kg
- butene, mixed: 0.019933 kg; source Unger T A 1996; lognormal variance with pedigree 0.076, pedigree (4,5,5,1,1)
  EcoSpold01Location=RER
  Stoichiometric calculation, assuming an efficiency of 95% per reaction step.
  Further references:
  Eller et al. 2000. Karsten Eller, Erhard Henkes, Roland Rossbacher, Hartmut Höke: Amines, Aliphatic. In: Ullmann's Encyclopedia of Industrial Chemistry, Seventh Edition, 2009 Electronic Release (ed. Fiedler E., Grossmann G., Kersebohm D., Weiss G. and Witte C.). 7 th Electronic Release Edition. Wiley InterScience, New York, Article Online Posting Date: June 15, 2000. Online-Version under: DOI: 10.1002/14356007.a02_001
  Maki et al. 2000. Takao Maki and Kazuo Takeda: Benzoic Acid and Derivatives. In: Ullmann's Encyclopedia of Industrial Chemistry, Seventh Edition, 2009 Electronic Release (ed. Fiedler E., Grossmann G., Kersebohm D., Weiss G. and Witte C.). 7 th Electronic Release Edition. Wiley InterScience, New York, Article Online Posting Date: June 15, 2000. Online-Version under: DOI: 10.1002/14356007.a03_555
  Uncertainty: Stoechiometric calculation
  properties: carbon content, fossil 0.857143, dry mass 1 kg, heating value, net 45.3 MJ, wet mass 1 kg
  note on carbon content, fossil: With mixed butenes, the four isomers 1-butene, cis-2-butene, trans-2-butene and isobutene are summed up. They are unsaturated olefinic hydrocarbons with the formula C4H8 (ecoinvent v2.2 report 11_II). MW=56
  note on heating value, net: Indicative value. Reference: Fuels - Higher and Lower Calorific Values, available at: https://www.engineeringtoolbox.com/fuels-higher-calorific-values-d_169.html
- butyrolactone: 0.0059557 kg; source Unger T A 1996; lognormal variance with pedigree 0.076, pedigree (4,5,5,1,1)
  Stoichiometric calculation, assuming an efficiency of 95% per reaction step.
  Further references:
  Fliege 2000. Helmut Fiege: Cresols and Xylenols. In: Ullmann's Encyclopedia of Industrial Chemistry, Seventh Edition, 2009 Electronic Release (ed. Fiedler E., Grossmann G., Kersebohm D., Weiss G. and Witte C.). 7 th Electronic Release Edition. Wiley InterScience, New York, Article Online Posting Date: June 15, 2000. Online-Version under: DOI: 10.1002/14356007.a08_025
  EcoSpold01Location=GLO
  Uncertainty: Stoechiometric calculation
  properties: carbon content, fossil 0.55814, dry mass 1 kg, heating value, net 25.35 MJ, wet mass 1 kg
- calcium carbide, technical grade: 0.019211 kg; source Unger T A 1996; lognormal variance with pedigree 0.076, pedigree (4,5,5,1,1)
  Stoichiometric calculation, assuming an efficiency of 95% per reaction step.
  Further references:
  Güthner et al. 2006. Thomas Güthner and Bernd Mertschenk: Cyanamides. In: Ullmann's Encyclopedia of Industrial Chemistry, Seventh Edition, 2009 Electronic Release (ed. Fiedler E., Grossmann G., Kersebohm D., Weiss G. and Witte C.). 7 th Electronic Release Edition. Wiley InterScience, New York, Article Online Posting Date: July 15, 2006. Online-Version under: DOI: 10.1002/14356007.a08_139.pub2
  Güthner et al. 2006. Thomas Güthner, Bernd Mertschenk, Bernd Schulz: Guanidine and Derivatives. In: Ullmann's Encyclopedia of Industrial Chemistry, Seventh Edition, 2009 Electronic Release (ed. Fiedler E., Grossmann G., Kersebohm D., Weiss G. and Witte C.). 7 th Electronic Release Edition. Wiley InterScience, New York, Article Online Posting Date: July 15, 2006. Online-Version under: DOI: 10.1002/14356007.a12_545.pub2
  EcoSpold01Location=RER
  Uncertainty: Stoechiometric calculation
  properties: carbon content, fossil 0.375, dry mass 1 kg, heating value, net 11.36 MJ, wet mass 1 kg
- carbon dioxide, liquid: 0.015227 kg; source Unger T A 1996; lognormal variance with pedigree 0.076, pedigree (4,5,5,1,1)
  (same comment as for calcium carbide, technical grade)
  properties: carbon content, fossil 0.272727, dry mass 1 kg, heating value, net 8.27 MJ, wet mass 1 kg
- carbon disulfide: 0.030927 kg; source Unger T A 1996; lognormal variance with pedigree 0.076, pedigree (4,5,5,1,1)
  Stoichiometric calculation, assuming an efficiency of 95% per reaction step.
  EcoSpold01Location=GLO
  Uncertainty: Stoechiometric calculation
  properties: carbon content, fossil 0.157895, dry mass 1 kg, heating value, net 32.72 MJ, wet mass 1 kg
- carbon monoxide: 0.041066 kg; source Unger T A 1996; lognormal variance with pedigree 0.076, pedigree (4,5,5,1,1)
  Stoichiometric calculation, assuming an efficiency of 95% per reaction step.
  Further references:
  Bipp et al. 2000. Hansjörg Bipp and Heinz Kieczka: Formamides. In: Ullmann's Encyclopedia of Industrial Chemistry, Seventh Edition, 2009 Electronic Release (ed. Fiedler E., Grossmann G., Kersebohm D., Weiss G. and Witte C.). 7 th Electronic Release Edition. Wiley InterScience, New York, Article Online Posting Date: June 15, 2000. Online-Version under: DOI: 10.1002/14356007.a12_001
  Cornils et al. 2000. Boy Cornils, Richard W. Fischer, Christian Kohlpaintner: Butanals. In: Ullmann's Encyclopedia of Industrial Chemistry, Seventh Edition, 2009 Electronic Release (ed. Fiedler E., Grossmann G., Kersebohm D., Weiss G. and Witte C.). 7 th Electronic Release Edition. Wiley InterScience, New York, Article Online Posting Date: September 15, 2000. Online-Version under: DOI: 10.1002/14356007.a04_447
  Kim et al. 2003. Kim S., Overcash M.: Energy in chemical manufacturing processes: gate-to-gate information for life cycle assessment. In: Journal of Chemical Technology & Biotechnology vol. 78, no. 9: 995-1005(11). 2003
  Samel et al. 2000. Ulf-Rainer Samel, Walter Kohler, Armin Otto Gamer, Ullrich Keuser: Propionic Acid and Derivatives. In: Ullmann's Encyclopedia of Industrial Chemistry, Seventh Edition, 2009 Electronic Release (ed. Fiedler E., Grossmann G., Kersebohm D., Weiss G. and Witte C.). 7 th Electronic Release Edition. Wiley InterScience, New York, Article Online Posting Date: June 15, 2000. Online-Version under: DOI: 10.1002/14356007.a22_223
  Schirrmann et al. 2001. Jean-Pierre Schirmann and Paul Bourdauducq: Hydrazine. In: Ullmann's Encyclopedia of Industrial Chemistry, Seventh Edition, 2009 Electronic Release (ed. Fiedler E., Grossmann G., Kersebohm D., Weiss G. and Witte C.). 7 th Electronic Release Edition. Wiley InterScience, New York, Article Online Posting Date: June 15, 2001. Online-Version under: DOI: 10.1002/14356007.a13_177
  EcoSpold01Location=RER
  Uncertainty: Stoechiometric calculation
  properties: carbon content, fossil 0.428571, dry mass 1 kg, heating value, net 12.99 MJ, wet mass 1 kg
  note on carbon content, fossil: CO. It is assumed that CO is produced from partial combustion of heavy heating oil.
- carbon tetrachloride: 0.0091342 kg; source Unger T A 1996; lognormal variance with pedigree 0.076, pedigree (4,5,5,1,1)
  (same comment as for 1-pentanol)
  properties: carbon content, fossil 0.0789474, dry mass 1 kg, heating value, net 2.37 MJ, wet mass 1 kg
- chemical factory, organics: 2.2228e-9 unit; lognormal variance with pedigree 0.448, pedigree (4,5,5,5,5)
  Estimation, based on a production capacity of 50,000 t per year and a plant life time of 50 years, therefore an amount of 4X10-10 units per kg of produced chemical is aded to the unit process of the respective chemical. The amount is accounted for each production step. This might be an overestimation in some multistep syntheses.
  EcoSpold01Location=RER
  Uncertainty: Estimation
- chlorine, liquid: 0.67658 kg; source Unger T A 1996; lognormal variance with pedigree 0.076, pedigree (4,5,5,1,1)
  Stoichiometric calculation, assuming an efficiency of 95% per reaction step.
  Fuether references:
  Arntz et al. 2007. Dietrich Arntz, Achim Fischer, Mathias Höpp, Sylvia Jacobi, Jörg Sauer, Takashi Ohara, Takahisa Sato, Noboru Shimizu, Helmut Schwind: Acrolein and Methacrolein. In: Ullmann's Encyclopedia of Industrial Chemistry, Seventh Edition, 2009 Electronic Release (ed. Fiedler E., Grossmann G., Kersebohm D., Weiss G. and Witte C.). 7 th Electronic Release Edition. Wiley InterScience, New York, Article Online Posting Date: April 15, 2007. Online-Version under: DOI: 10.1002/14356007.a01_149.pub2
  Booth 2000. Gerald Booth: Nitro Compounds, Aromatic. In: Ullmann's Encyclopedia of Industrial Chemistry, Seventh Edition, 2009 Electronic Release (ed. Fiedler E., Grossmann G., Kersebohm D., Weiss G. and Witte C.). 7 th Electronic Release Edition. Wiley InterScience, New York, Article Online Posting Date: June 15, 2000. Online-Version under: DOI: 10.1002/14356007.a17_411
  Eckert et al. 2006. Marc Eckert, Gerald Fleischmann, Reinhard Jira, Hermann M. Bolt, Klaus Golka: Acetaldehyde. In: Ullmann's Encyclopedia of Industrial Chemistry, Seventh Edition, 2009 Electronic Release (ed. Fiedler E., Grossmann G., Kersebohm D., Weiss G. and Witte C.). 7 th Electronic Release Edition. Wiley InterScience, New York, Article Online Posting Date: December 15, 2006. Online-Version under: DOI: 10.1002/14356007.a01_031.pub2
  Fliege 2000. Helmut Fiege: Cresols and Xylenols. In: Ullmann's Encyclopedia of Industrial Chemistry, Seventh Edition, 2009 Electronic Release (ed. Fiedler E., Grossmann G., Kersebohm D., Weiss G. and Witte C.). 7 th Electronic Release Edition. Wiley InterScience, New York, Article Online Posting Date: June 15, 2000. Online-Version under: DOI: 10.1002/14356007.a08_025
  Kim et al. 2003. Kim S., Overcash M.: Energy in chemical
  manufacturing processes: gate-to-gate information for life cycle assessment. In: Journal of Chemical Technology & Biotechnology vol. 78, no. 9: 995-1005(11). 2003
  Samel et al. 2000. Ulf-Rainer Samel, Walter Kohler, Armin Otto Gamer, Ullrich Keuser: Propionic Acid and Derivatives. In: Ullmann's Encyclopedia of Industrial Chemistry, Seventh Edition, 2009 Electronic Release (ed. Fiedler E., Grossmann G., Kersebohm D., Weiss G. and Witte C.). 7 th Electronic Release Edition. Wiley InterScience, New York, Article Online Posting Date: June 15, 2000. Online-Version under: DOI: 10.1002/14356007.a22_223
  Shimizu et al. 2000. Shinkichi Shimizu, Nanao Watanabe, Toshiaki Kataoka, Takayuki Shoji, Nobuyuki Abe, Sinji Morishita, Hisao Ichimura: Pyridine and Pyridine Derivatives. In: Ullmann's Encyclopedia of Industrial Chemistry, Seventh Edition, 2009 Electronic Release (ed. Fiedler E., Grossmann G., Kersebohm D., Weiss G. and Witte C.). 7 th Electronic Release Edition. Wiley InterScience, New York, Article Online Posting Date: June 15, 2000. Online-Version under: DOI: 10.1002/14356007.a22_399
  Strittmatter et al. 2007. Harald Strittmatter, Stefan Hildbrand, Peter Pollak: Malonic Acid and Derivatives. In: Ullmann's Encyclopedia of Industrial Chemistry, Seventh Edition, 2009 Electronic Release (ed. Fiedler E., Grossmann G., Kersebohm D., Weiss G. and Witte C.). 7 th Electronic Release Edition. Wiley InterScience, New York, Article Online Posting Date: April 15, 2007. Online-Version under: DOI: 10.1002/1435 6007.a16_063.pub2
  EcoSpold01Location=RER
  Uncertainty: Stoechiometric calculation
  properties: dry mass 1 kg, wet mass 1 kg
- chloroform: 0.021827 kg; source Unger T A 1996; lognormal variance with pedigree 0.076, pedigree (4,5,5,1,1)
  (same comment as for 1-propanol)
  properties: carbon content, fossil 0.101695, dry mass 1 kg, heating value, net 4.06 MJ, wet mass 1 kg
- cumene: 0.019515 kg; source Unger T A 1996; lognormal variance with pedigree 0.076, pedigree (4,5,5,1,1)
  (same comment as for 1-propanol)
  properties: carbon content, fossil 0.9, dry mass 1 kg, heating value, net 39.35 MJ, wet mass 1 kg
- dichloromethane: 0.018819 kg; source Unger T A 1996; lognormal variance with pedigree 0.076, pedigree (4,5,5,1,1)
  (same comment as for 1-pentanol)
  properties: carbon content, fossil 0.142857, dry mass 1 kg, heating value, net 7.14 MJ, wet mass 1 kg
- dimethyl sulfate: 0.017905 kg; source Unger T A 1996; lognormal variance with pedigree 0.076, pedigree (4,5,5,1,1)
  Stoichiometric calculation, assuming an efficiency of 95% per reaction step.
  Further references:
  Kim et al. 2003. Kim S., Overcash M.: Energy in chemical manufacturing processes: gate-to-gate information for life cycle assessment. In: Journal of Chemical Technology & Biotechnology vol. 78, no. 9: 995-1005(11). 2003
  EcoSpold01Location=RER
  Uncertainty: Stoechiometric calculation
  properties: carbon content, fossil 0.190476, dry mass 1 kg, heating value, net 11.54 MJ, wet mass 1 kg
- dimethylamine: 0.022501 kg; source Unger T A 1996; lognormal variance with pedigree 0.076, pedigree (4,5,5,1,1)
  (same comment as for calcium carbide, technical grade)
  properties: carbon content, fossil 0.533333, dry mass 1 kg, heating value, net 13.47 MJ, wet mass 1 kg
- electricity, medium voltage: 1.92723 kWh; source Gendorf 2000; lognormal variance with pedigree 0.076, pedigree (4,5,5,1,1)
  Estimation, assuming a default value, originated from calculation of avarage consumption of electricity and heat per kg of product (3.2 MJ kg-1), and a resulting amount of electricity of 0,333 kW for every reaction step per kg reaction product, considering that the demand is made up of a mix that inlcudes 38% electricity. Additionally, reaction steps are approximated with energy consumption data, assuming that inventory flows can be estimated using process data for basic operation steps, available for specific organic chemicals.
  EcoSpold01Location=UCTE
  Uncertainty: Estimation
- ethanol, without water, in 99.7% solution state, from ethylene: 0.054746 kg; source Unger T A 1996; lognormal variance with pedigree 0.076, pedigree (4,5,5,1,1)
  Stoichiometric calculation, assuming an efficiency of 95% per reaction step.
  Further references:
  Kim et al. 2003. Kim S., Overcash M.: Energy in chemical manufacturing processes: gate-to-gate information for life cycle assessment. In: Journal of Chemical Technology & Biotechnology vol. 78, no. 9: 995-1005(11). 2003
  Finley 2006. K. Thomas Finley: Benzoquinone. In: Ullmann's Encyclopedia of Industrial Chemistry, Seventh Edition, 2009 Electronic Release (ed. Fiedler E., Grossmann G., Kersebohm D., Weiss G. and Witte C.). 7 th Electronic Release Edition. Wiley InterScience, New York, Article Online Posting Date: April 15, 2006. Online-Version under: DOI: 10.1002/14356007.a03_571.pub2
  EcoSpold01Location=RER
  Uncertainty: Stoechiometric calculation
  properties: carbon content, fossil 0.521739, dry mass 1 kg, heating value, net 28.1 MJ, wet mass 1 kg
  note on heating value, net: Based on literature, page 275, Report 17: Jungbluth, N., Chudacoff, M., Dauriat, A., Dinkel, F., Doka, G., Faist Emmenegger, M., Gnansounou, E., Kljun, N., Schleiss, K., Spielmann, M., Stettler, C., Sutter, J. 2007: Life Cycle Inventories of Bioenergy. ecoinvent report No. 17, Swiss Centre for Life Cycle Inventories, Dübendorf, CH.
- ethyl acetate: 0.0097771 kg; source Unger T A 1996; lognormal variance with pedigree 0.076, pedigree (4,5,5,1,1)
  (same comment as for 1-pentanol)
  properties: carbon content, fossil 0.545455, dry mass 1 kg, heating value, net 31.32 MJ, wet mass 1 kg
- ethylene: 0.02501 kg; source Unger T A 1996; lognormal variance with pedigree 0.076, pedigree (4,5,5,1,1)
  Stoichiometric calculation, assuming an efficiency of 95% per reaction step.
  Further references:
  Samel et al. 2000. Ulf-Rainer Samel, Walter Kohler, Armin Otto Gamer, Ullrich Keuser: Propionic Acid and Derivatives. In: Ullmann's Encyclopedia of Industrial Chemistry, Seventh Edition, 2009 Electronic Release (ed. Fiedler E., Grossmann G., Kersebohm D., Weiss G. and Witte C.). 7 th Electronic Release Edition. Wiley InterScience, New York, Article Online Posting Date: June 15, 2000. Online-Version under: DOI: 10.1002/14356007.a22_223
  EcoSpold01Location=RER
  Uncertainty: Stoechiometric calculation
  properties: carbon content, fossil 0.857143, dry mass 1 kg, heating value, net 43.22 MJ, wet mass 1 kg
- ethylene diamine: 0.016517 kg; source Unger T A 1996; lognormal variance with pedigree 0.076, pedigree (4,5,5,1,1)
  (same comment as for ethylene)
  properties: carbon content, fossil 0.5, dry mass 1 kg, heating value, net 28.24 MJ, wet mass 1 kg
- ethylene dichloride: 0.0086455 kg; source Unger T A 1996; lognormal variance with pedigree 0.076, pedigree (4,5,5,1,1)
  (same comment as for 1-propanol)
  properties: carbon content, fossil 0.244898, dry mass 1 kg, heating value, net 12.25 MJ, wet mass 1 kg
- ethylene oxide: 0.016067 kg; source Unger T A 1996; lognormal variance with pedigree 0.076, pedigree (4,5,5,1,1)
  (same comment as for 1-pentanol)
  properties: carbon content, fossil 0.545455, dry mass 1 kg, heating value, net 27.53 MJ, wet mass 1 kg
- formaldehyde: 0.05593 kg; source Unger T A 1996; lognormal variance with pedigree 0.076, pedigree (4,5,5,1,1)
  EcoSpold01Location=RER
  Stoichiometric calculation, assuming an efficiency of 95% per reaction step.
  Further references:
  Shimizu et al. 2000. Shinkichi Shimizu, Nanao Watanabe, Toshiaki Kataoka, Takayuki Shoji, Nobuyuki Abe, Sinji Morishita, Hisao Ichimura: Pyridine and Pyridine Derivatives. In: Ullmann's Encyclopedia of Industrial Chemistry, Seventh Edition, 2009 Electronic Release (ed. Fiedler E., Grossmann G., Kersebohm D., Weiss G. and Witte C.). 7 th Electronic Release Edition. Wiley InterScience, New York, Article Online Posting Date: June 15, 2000. Online-Version under: DOI: 10.1002/14356007.a22_399
  Uncertainty: Stoechiometric calculation
  properties: carbon content, fossil 0.4, dry mass 1 kg, heating value, net 20.19 MJ, wet mass 1 kg
- formic acid: 0.0022134 kg; source Unger T A 1996; lognormal variance with pedigree 0.076, pedigree (4,5,5,1,1)
  Stoichiometric calculation, assuming an efficiency of 95% per reaction step.
  Further references:
  Frauenkron et al. 2001. Matthias Frauenkron, Johann-Peter Melder, Günther Ruider, Roland Rossbacher, Hartmut Höke: Ethanolamines and Propanolamines. In: Ullmann's Encyclopedia of Industrial Chemistry, Seventh Edition, 2009 Electronic Release (ed. Fiedler E., Grossmann G., Kersebohm D., Weiss G. and Witte C.). 7 th Electronic Release Edition. Wiley InterScience, New York, Article Online Posting Date: September 15, 2001. Online-Version under: DOI: 10.1002/14356007.a10_001
  EcoSpold01Location=RER
  Uncertainty: Stoechiometric calculation
  properties: carbon content, fossil 0.4, dry mass 1 kg, heating value, net 13.17 MJ, wet mass 1 kg
- heat, district or industrial, natural gas: 15.504 MJ; source Gendorf 2000; lognormal variance with pedigree 0.076, pedigree (4,5,5,1,1)
  Estimation, assuming a default value, originated from calculation of avarage consumption of electricity and heat per kg of product (3.2 MJ kg-1), and a resulting amount of heat of 2 MJ for every reaction step per kg reaction product, considering that the demand is made up of a mix that includes 50% natural gas. Additionally, reaction steps are approximated with energy consumption data, assuming that inventory flows can be estimated using process data for basic operation steps, available for specific organic chemicals.
  Uncertainty: Estimation
  properties: heating value, net 1 MJ
- heat, district or industrial, other than natural gas: 8.65368 MJ; source Gendorf 2000; lognormal variance with pedigree 0.076, pedigree (4,5,5,1,1)
  Estimation, assuming a default value, originated from calculation of avarage consumption of electricity and heat per kg of product (3.2 MJ kg-1), and a resulting amount of heat of 2 MJ for every reaction step per kg reaction product, considering that the demand is made up of a mix that inlcudes 12% steam from external energy sources. Additionally, reaction steps are approximated with energy consumption data, assuming that inventory flows can be estimated using process data for basic operation steps, available for specific organic chemicals.
  Uncertainty: Estimation
  properties: heating value, net 1 MJ
- hydrochloric acid, without water, in 30% solution state: 0.10959 kg; source Unger T A 1996; lognormal variance with pedigree 0.076, pedigree (4,5,5,1,1)
  Stoichiometric calculation, assuming an efficiency of 100%.
  Further references:
  Chahal et al. 2006. Surinder P. Chahal and John N. Starr: Lactic Acid. In: Ullmann's Encyclopedia of Industrial Chemistry, Seventh Edition, 2009 Electronic Release (ed. Fiedler E., Grossmann G., Kersebohm D., Weiss G. and Witte C.). 7 th Electronic Release Edition. Wiley InterScience, New York, Article Online Posting Date: January 15, 2006. Online-Version under: DOI: 10.1002/14356007.a15_097.pub2
  Cheung et al. 2000. Hosea Cheung, Robin S. Tanke, G. Paul Torrence: Acetic Acid. In: Ullmann's Encyclopedia of Industrial Chemistry, Seventh Edition, 2009 Electronic Release (ed. Fiedler E., Grossmann G., Kersebohm D., Weiss G. and Witte C.). 7 th Electronic Release Edition. Wiley InterScience, New York, Article Online Posting Date: June 15, 2000. Online-Version under: DOI: 10.1002/14356007.a01_045
  Güthner et al. 2006. Thomas Güthner and Bernd Mertschenk: Cyanamides. In: Ullmann's Encyclopedia of Industrial Chemistry, Seventh Edition, 2009 Electronic Release (ed. Fiedler E., Grossmann G., Kersebohm D., Weiss G. and Witte C.). 7 th Electronic Release Edition. Wiley InterScience, New York, Article Online Posting Date: July 15, 2006. Online-Version under: DOI: 10.1002/14356007.a08_139.pub2
  Kim et al. 2003. Kim S., Overcash M.: Energy in chemical manufacturing processes: gate-to-gate information for life cycle assessment. In: Journal of Chemical Technology & Biotechnology vol. 78, no. 9: 995-1005(11). 2003
  Samel et al. 2000. Ulf-Rainer Samel, Walter Kohler, Armin Otto Gamer, Ullrich Keuser: Propionic Acid and Derivatives. In: Ullmann's Encyclopedia of Industrial Chemistry, Seventh Edition, 2009 Electronic Release (ed. Fiedler E., Grossmann G., Kersebohm D., Weiss G. and Witte C.). 7 th Electronic Release Edition. Wiley InterScience, New York, Article Online Posting Date: June 15, 2000. Online-Version under: DOI: 10.1002/14356007.a22_223
  Strittmatter et al. 2007. Harald Strittmatter, Stefan Hildbrand, Peter Pollak: Malonic Acid and Derivatives. In: Ullmann's Encyclopedia of Industrial Chemistry, Seventh Edition, 2009 Electronic Release (ed. Fiedler E., Grossmann G., Kersebohm D., Weiss G. and Witte C.). 7 th Electronic Release Edition. Wiley InterScience, New York, Article Online Posting Date: April 15, 2007. Online-Version under: DOI: 10.1002/1435 6007.a16_063.pub2
  EcoSpold01Location=RER
  Uncertainty: Stoechiometric calculation
  properties: dry mass 1 kg, heating value, net 3.32 MJ, wet mass 1 kg
- hydrogen cyanide: 0.034541 kg; source Unger T A 1996; lognormal variance with pedigree 0.076, pedigree (4,5,5,1,1)
  EcoSpold01Location=RER
  Stoichiometric calculation, assuming an efficiency of 95% per reaction step.
  Further references:
  Bauer 2000. William Bauer Jr.: Methacrylic Acid and Derivatives. In: Ullmann's Encyclopedia of Industrial Chemistry, Seventh Edition, 2009 Electronic Release (ed. Fiedler E., Grossmann G., Kersebohm D., Weiss G. and Witte C.). 7 th Electronic Release Edition. Wiley InterScience, New York, Article Online Posting Date: June 15, 2000. Online-Version under: DOI: 10.1002/14356007.a16_441
  Chahal et al. 2006. Surinder P. Chahal and John N. Starr: Lactic Acid. In: Ullmann's Encyclopedia of Industrial Chemistry, Seventh Edition, 2009 Electronic Release (ed. Fiedler E., Grossmann G., Kersebohm D., Weiss G. and Witte C.). 7 th Electronic Release Edition. Wiley InterScience, New York, Article Online Posting Date: January 15, 2006. Online-Version under: DOI: 10.1002/14356007.a15_097.pub2
  Eller et al. 2000. Karsten Eller, Erhard Henkes, Roland Rossbacher, Hartmut Höke: Amines, Aliphatic. In: Ullmann's Encyclopedia of Industrial Chemistry, Seventh Edition, 2009 Electronic Release (ed. Fiedler E., Grossmann G., Kersebohm D., Weiss G. and Witte C.). 7 th Electronic Release Edition. Wiley InterScience, New York, Article Online Posting Date: June 15, 2000. Online-Version under: DOI: 10.1002/14356007.a02_001
  Strittmatter et al. 2007. Harald Strittmatter, Stefan Hildbrand, Peter Pollak: Malonic Acid and Derivatives. In: Ullmann's Encyclopedia of Industrial Chemistry, Seventh Edition, 2009 Electronic Release (ed. Fiedler E., Grossmann G., Kersebohm D., Weiss G. and Witte C.). 7 th Electronic Release Edition. Wiley InterScience, New York, Article Online Posting Date: April 15, 2007. Online-Version under: DOI: 10.1002/1435 6007.a16_063.pub2
  Uncertainty: Stoechiometric calculation
  properties: carbon content, fossil 0.444444, dry mass 1 kg, heating value, net 17.95 MJ, wet mass 1 kg
- hydrogen fluoride: 0.021302 kg; source Unger T A 1996; lognormal variance with pedigree 0.076, pedigree (4,5,5,1,1)
  EcoSpold01Location=GLO
  Stoichiometric calculation, assuming an efficiency of 95% per reaction step.
  Further references:
  Booth 2000. Gerald Booth: Nitro Compounds, Aromatic. In: Ullmann's Encyclopedia of Industrial Chemistry, Seventh Edition, 2009 Electronic Release (ed. Fiedler E., Grossmann G., Kersebohm D., Weiss G. and Witte C.). 7 th Electronic Release Edition. Wiley InterScience, New York, Article Online Posting Date: June 15, 2000. Online-Version under: DOI: 10.1002/14356007.a17_411
  Kim et al. 2003. Kim S., Overcash M.: Energy in chemical manufacturing processes: gate-to-gate information for life cycle assessment. In: Journal of Chemical Technology & Biotechnology vol. 78, no. 9: 995-1005(11). 2003
  Shimizu et al. 2000. Shinkichi Shimizu, Nanao Watanabe, Toshiaki Kataoka, Takayuki Shoji, Nobuyuki Abe, Sinji Morishita, Hisao Ichimura: Pyridine and Pyridine Derivatives. In: Ullmann's Encyclopedia of Industrial Chemistry, Seventh Edition, 2009 Electronic Release (ed. Fiedler E., Grossmann G., Kersebohm D., Weiss G. and Witte C.). 7 th Electronic Release Edition. Wiley InterScience, New York, Article Online Posting Date: June 15, 2000. Online-Version under: DOI: 10.1002/14356007.a22_399
  Uncertainty: Stoechiometric calculation
  properties: dry mass 1 kg, heating value, net 6.06 MJ, wet mass 1 kg
- hydrogen peroxide, without water, in 50% solution state: 0.0028925 kg; source Unger T A 1996; lognormal variance with pedigree 0.076, pedigree (4,5,5,1,1)
  (same comment as for 1-propanol)
  properties: dry mass 1 kg, heating value, net 7.13 MJ, wet mass 1 kg
- hydrogen sulfide: 0.0092901 kg; source Unger T A 1996; lognormal variance with pedigree 0.076, pedigree (4,5,5,1,1)
  EcoSpold01Location=RER
  Stoichiometric calculation, assuming an efficiency of 95% per reaction step.
  Further references:
  Arntz et al. 2007. Dietrich Arntz, Achim Fischer, Mathias Höpp, Sylvia Jacobi, Jörg Sauer, Takashi Ohara, Takahisa Sato, Noboru Shimizu, Helmut Schwind: Acrolein and Methacrolein. In: Ullmann's Encyclopedia of Industrial Chemistry, Seventh Edition, 2009 Electronic Release (ed. Fiedler E., Grossmann G., Kersebohm D., Weiss G. and Witte C.). 7 th Electronic Release Edition. Wiley InterScience, New York, Article Online Posting Date: April 15, 2007. Online-Version under: DOI: 10.1002/14356007.a01_149.pub2
  Lange et al. 2000. Ludwig Lange and Wolfgang Triebel: Sulfides, Polysulfides, and Sulfanes. In: Ullmann's Encyclopedia of Industrial Chemistry, Seventh Edition, 2009 Electronic Release (ed. Fiedler E., Grossmann G., Kersebohm D., Weiss G. and Witte C.). 7 th Electronic Release Edition. Wiley InterScience, New York, Article Online Posting Date: June 15, 2000. Online-Version under: DOI: 10.1002/14356007.a25_443
  Shimizu et al. 2000. Shinkichi Shimizu, Nanao Watanabe, Toshiaki Kataoka, Takayuki Shoji, Nobuyuki Abe, Sinji Morishita, Hisao Ichimura: Pyridine and Pyridine Derivatives. In: Ullmann's Encyclopedia of Industrial Chemistry, Seventh Edition, 2009 Electronic Release (ed. Fiedler E., Grossmann G., Kersebohm D., Weiss G. and Witte C.). 7 th Electronic Release Edition. Wiley InterScience, New York, Article Online Posting Date: June 15, 2000. Online-Version under: DOI: 10.1002/14356007.a22_399
  Uncertainty: Stoechiometric calculation
  properties: dry mass 1 kg, heating value, net 7.11 MJ, wet mass 1 kg
- hydrogen, gaseous, medium pressure, merchant: 0.00699 kg; source Unger T A 1996; lognormal variance with pedigree 0.076, pedigree (4,5,5,1,1)
  Stoichiometric calculation, assuming an efficiency of 95% per reaction step.
  Further references:
  Booth 2000. Gerald Booth: Nitro Compounds, Aromatic. In: Ullmann's Encyclopedia of Industrial Chemistry, Seventh Edition, 2009 Electronic Release (ed. Fiedler E., Grossmann G., Kersebohm D., Weiss G. and Witte C.). 7 th Electronic Release Edition. Wiley InterScience, New York, Article Online Posting Date: June 15, 2000. Online-Version under: DOI: 10.1002/14356007.a17_411
  Cornils et al. 2000. Boy Cornils, Richard W. Fischer, Christian Kohlpaintner: Butanals. In: Ullmann's Encyclopedia of Industrial Chemistry, Seventh Edition, 2009 Electronic Release (ed. Fiedler E., Grossmann G., Kersebohm D., Weiss G. and Witte C.). 7 th Electronic Release Edition. Wiley InterScience, New York, Article Online Posting Date: September 15, 2000. Online-Version under: DOI: 10.1002/14356007.a04_447
  Eller et al. 2000. Karsten Eller, Erhard Henkes, Roland Rossbacher, Hartmut Höke: Amines, Aliphatic. In: Ullmann's Encyclopedia of Industrial Chemistry, Seventh Edition, 2009 Electronic Release (ed. Fiedler E., Grossmann G., Kersebohm D., Weiss G. and Witte C.). 7 th Electronic Release Edition. Wiley InterScience, New York, Article Online Posting Date: June 15, 2000. Online-Version under: DOI: 10.1002/14356007.a02_001
  Kim et al. 2003. Kim S., Overcash M.: Energy in chemical manufacturing processes: gate-to-gate information for life cycle assessment. In: Journal of Chemical Technology & Biotechnology vol. 78, no. 9: 995-1005(11). 2003
  Lange et al. 2000. Ludwig Lange and Wolfgang Triebel: Sulfides, Polysulfides, and Sulfanes. In: Ullmann's Encyclopedia of Industrial Chemistry, Seventh Edition, 2009 Electronic Release (ed. Fiedler E., Grossmann G., Kersebohm D., Weiss G. and Witte C.). 7 th Electronic Release Edition. Wiley InterScience, New York, Article Online Posting Date: June 15, 2000. Online-Version under: DOI: 10.1002/14356007.a25_443
  Lindner et al. 2000. Otto Lindner and Lars Rodefeld: Benzenesulfonic Acids and Their Derivatives. In: Ullmann's Encyclopedia of Industrial Chemistry, Seventh Edition, 2009 Electronic Release (ed. Fiedler E., Grossmann G., Kersebohm D., Weiss G. and Witte C.). 7 th Electronic Release Edition. Wiley InterScience, New York, Article Online Posting Date: September 15, 2000. Online-Version under: DOI: 10.1002/14356007.a03_507
  Maki et al. 2000. Takao Maki and Kazuo Takeda: Benzoic Acid and Derivatives. In: Ullmann's Encyclopedia of Industrial Chemistry, Seventh Edition, 2009 Electronic Release (ed. Fiedler E., Grossmann G., Kersebohm D., Weiss G. and Witte C.). 7 th Electronic Release Edition. Wiley InterScience, New York, Article Online Posting Date: June 15, 2000. Online-Version under: DOI: 10.1002/14356007.a03_555
  EcoSpold01Location=RER
  Uncertainty: Stoechiometric calculation
  properties: dry mass 1 kg, heating value, net 120.21 MJ, wet mass 1 kg
- inert waste, for final disposal: -0.11941 kg; lognormal variance with pedigree 0.036, pedigree (4,5,1,1,1)
  EcoSpold01Location=CH
  Stoechiometric calculation
  Uncertainty: Stoechiometric calculation
  production volume
    Calculated from the production volume of pesticide, unspecified in proportion to the respective output amounts.
  properties: dry mass 0.995 kg, water content 0.00502513, wet mass 1 kg
- isopropanol: 0.0085577 kg; source Eller K. 2009; lognormal variance with pedigree 0.076, pedigree (4,5,5,1,1)
  Stoichiometric calculation, assuming an efficiency of 95% per reaction step.
  Further references:
  Frauenkron et al. 2001. Matthias Frauenkron, Johann-Peter Melder, Günther Ruider, Roland Rossbacher, Hartmut Höke: Ethanolamines and Propanolamines. In: Ullmann's Encyclopedia of Industrial Chemistry, Seventh Edition, 2009 Electronic Release (ed. Fiedler E., Grossmann G., Kersebohm D., Weiss G. and Witte C.). 7 th Electronic Release Edition. Wiley InterScience, New York, Article Online Posting Date: September 15, 2001. Online-Version under: DOI: 10.1002/14356007.a10_001
  Kim et al. 2003. Kim S., Overcash M.: Energy in chemical manufacturing processes: gate-to-gate information for life cycle assessment. In: Journal of Chemical Technology & Biotechnology vol. 78, no. 9: 995-1005(11). 2003
  EcoSpold01Location=RER
  Uncertainty: Stoechiometric calculation
  properties: carbon content, fossil 0.6, dry mass 1 kg, heating value, net 34.3 MJ, wet mass 1 kg
- liquefied petroleum gas: 0.00263042, 1.33778e-5 kg (2 suppliers, which the file names only by identifier); sum of these 0.0026438 kg; source Unger T A 1996; lognormal variance with pedigree 0.076, pedigree (4,5,5,1,1)
  EcoSpold01Location=CH
  Stoichiometric calculation, assuming an efficiency of 95% per reaction step.
  Uncertainty: Stoechiometric calculation
  properties: carbon content, fossil 0.821863, dry mass 1 kg, heating value, net 45.5 MJ, wet mass 1 kg
- lithium: 0.00068208 kg; source Unger T A 1996; lognormal variance with pedigree 0.076, pedigree (4,5,5,1,1)
  (same comment as for ammonium thiocyanate)
  properties: dry mass 1 kg, wet mass 1 kg
- maleic anhydride: 0.004876 kg; source Unger T A 1996; lognormal variance with pedigree 0.076, pedigree (4,5,5,1,1)
  (same comment as for 1-pentanol)
  properties: carbon content, fossil 0.489955, dry mass 1 kg, heating value, net 17.32 MJ, wet mass 1 kg
- manganese concentrate: 0.0098592 kg; source Unger T A 1996; lognormal variance with pedigree 0.076, pedigree (4,5,5,1,1)
  Stoichiometric calculation, assuming an efficiency of 95% per reaction step.
  Further references:
  Finley 2006. K. Thomas Finley: Benzoquinone. In: Ullmann's Encyclopedia of Industrial Chemistry, Seventh Edition, 2009 Electronic Release (ed. Fiedler E., Grossmann G., Kersebohm D., Weiss G. and Witte C.). 7 th Electronic Release Edition. Wiley InterScience, New York, Article Online Posting Date: April 15, 2006. Online-Version under: DOI: 10.1002/14356007.a03_571.pub2
  EcoSpold01Location=GLO
  Uncertainty: Stoechiometric calculation
  properties: dry mass 1 kg, wet mass 1 kg
- methanol: 0.062185 kg; source Unger T A 1996; lognormal variance with pedigree 0.076, pedigree (4,5,5,1,1)
  EcoSpold01Location=GLO
  Stoichiometric calculation, assuming an efficiency of 95% per reaction step.
  Further references:
  Arntz et al. 2007. Dietrich Arntz, Achim Fischer, Mathias Höpp, Sylvia Jacobi, Jörg Sauer, Takashi Ohara, Takahisa Sato, Noboru Shimizu, Helmut Schwind: Acrolein and Methacrolein. In: Ullmann's Encyclopedia of Industrial Chemistry, Seventh Edition, 2009 Electronic Release (ed. Fiedler E., Grossmann G., Kersebohm D., Weiss G. and Witte C.). 7 th Electronic Release Edition. Wiley InterScience, New York, Article Online Posting Date: April 15, 2007. Online-Version under: DOI: 10.1002/14356007.a01_149.pub2
  Chahal et al. 2006. Surinder P. Chahal and John N. Starr: Lactic Acid. In: Ullmann's Encyclopedia of Industrial Chemistry, Seventh Edition, 2009 Electronic Release (ed. Fiedler E., Grossmann G., Kersebohm D., Weiss G. and Witte C.). 7 th Electronic Release Edition. Wiley InterScience, New York, Article Online Posting Date: January 15, 2006. Online-Version under: DOI: 10.1002/14356007.a15_097.pub2
  Eller et al. 2000. Karsten Eller, Erhard Henkes, Roland Rossbacher, Hartmut Höke: Amines, Aliphatic. In: Ullmann's Encyclopedia of Industrial Chemistry, Seventh Edition, 2009 Electronic Release (ed. Fiedler E., Grossmann G., Kersebohm D., Weiss G. and Witte C.). 7 th Electronic Release Edition. Wiley InterScience, New York, Article Online Posting Date: June 15, 2000. Online-Version under: DOI: 10.1002/14356007.a02_001
  Fliege 2000. Helmut Fiege: Cresols and Xylenols. In: Ullmann's Encyclopedia of Industrial Chemistry, Seventh Edition, 2009 Electronic Release (ed. Fiedler E., Grossmann G., Kersebohm D., Weiss G. and Witte C.). 7 th Electronic Release Edition. Wiley InterScience, New York, Article Online Posting Date: June 15, 2000. Online-Version under: DOI: 10.1002/14356007.a08_025
  Kim et al. 2003. Kim S., Overcash M.: Energy in chemical manufacturing processes: gate-to-gate information for life cycle assessment. In: Journal of Chemical Technology & Biotechnology vol. 78, no. 9: 995-1005(11). 2003
  Lange et al. 2000. Ludwig Lange and Wolfgang Triebel: Sulfides, Polysulfides, and Sulfanes. In: Ullmann's Encyclopedia of Industrial Chemistry, Seventh Edition, 2009 Electronic Release (ed. Fiedler E., Grossmann G., Kersebohm D., Weiss G. and Witte C.). 7 th Electronic Release Edition. Wiley InterScience, New York, Article Online Posting Date: June 15, 2000. Online-Version under: DOI: 10.1002/14356007.a25_443
  Lyday 2000. Phyllis A. Lyday: Iodine and Iodine Compounds. In: Ullmann's Encyclopedia of Industrial Chemistry, Seventh Edition, 2009 Electronic Release (ed. Fiedler E., Grossmann G., Kersebohm D., Weiss G. and Witte C.). 7 th Electronic Release Edition. Wiley InterScience, New York, Article Online Posting Date: June 15, 2000. Online-Version under: DOI: 10.1002/14356007.a14_381
  Shimizu et al. 2000. Shinkichi Shimizu, Nanao Watanabe, Toshiaki Kataoka, Takayuki Shoji, Nobuyuki Abe, Sinji Morishita, Hisao Ichimura: Pyridine and Pyridine Derivatives. In: Ullmann's Encyclopedia of Industrial Chemistry, Seventh Edition, 2009 Electronic Release (ed. Fiedler E., Grossmann G., Kersebohm D., Weiss G. and Witte C.). 7 th Electronic Release Edition. Wiley InterScience, New York, Article Online Posting Date: June 15, 2000. Online-Version under: DOI: 10.1002/14356007.a22_399
  Strittmatter et al. 2007. Harald Strittmatter, Stefan Hildbrand, Peter Pollak: Malonic Acid and Derivatives. In: Ullmann's Encyclopedia of Industrial Chemistry, Seventh Edition, 2009 Electronic Release (ed. Fiedler E., Grossmann G., Kersebohm D., Weiss G. and Witte C.). 7 th Electronic Release Edition. Wiley InterScience, New York, Article Online Posting Date: April 15, 2007. Online-Version under: DOI: 10.1002/1435 6007.a16_063.pub2
  Uncertainty: Stoechiometric calculation
  properties: carbon content, fossil 0.375, dry mass 1 kg, heating value, net 20 MJ, wet mass 1 kg
  note on heating value, net: Based on literature, page 533, Report 17: Jungbluth, N., Chudacoff, M., Dauriat, A., Dinkel, F., Doka, G., Faist Emmenegger, M., Gnansounou, E., Kljun, N., Schleiss, K., Spielmann, M., Stettler, C., Sutter, J. 2007: Life Cycle Inventories of Bioenergy. ecoinvent report No. 17, Swiss Centre for Life Cycle Inventories, Dübendorf, CH.
- methyl acetate: 0.0024727 kg; source Unger T A 1996; lognormal variance with pedigree 0.076, pedigree (4,5,5,1,1)
  Stoichiometric calculation, assuming an efficiency of 95% per reaction step.
  Further references:
  Schirrmann et al. 2001. Jean-Pierre Schirmann and Paul Bourdauducq: Hydrazine. In: Ullmann's Encyclopedia of Industrial Chemistry, Seventh Edition, 2009 Electronic Release (ed. Fiedler E., Grossmann G., Kersebohm D., Weiss G. and Witte C.). 7 th Electronic Release Edition. Wiley InterScience, New York, Article Online Posting Date: June 15, 2001. Online-Version under: DOI: 10.1002/14356007.a13_177
  EcoSpold01Location=RER
  Uncertainty: Stoechiometric calculation
  properties: carbon content, fossil 0.486486, dry mass 1 kg, heating value, net 24.55 MJ, wet mass 1 kg
- methylamine: 0.0012893 kg; source Unger T A 1996; lognormal variance with pedigree 0.076, pedigree (4,5,5,1,1)
  (same comment as for 1-propanol)
  properties: carbon content, fossil 0.386735, dry mass 1 kg, heating value, net 31.23 MJ, wet mass 1 kg
- monochlorobenzene: 0.014055 kg; source Unger T A 1996; lognormal variance with pedigree 0.076, pedigree (4,5,5,1,1)
  (same comment as for 1-pentanol)
  properties: carbon content, fossil 0.642857, dry mass 1 kg, heating value, net 24.78 MJ, wet mass 1 kg
- naphtha: 0.025874 kg; source Unger T A 1996; lognormal variance with pedigree 0.076, pedigree (4,5,5,1,1)
  EcoSpold01Location=RER
  Stoichiometric calculation, assuming an efficiency of 95% per reaction step.
  Further references:
  Samel et al. 2000. Ulf-Rainer Samel, Walter Kohler, Armin Otto Gamer, Ullrich Keuser: Propionic Acid and Derivatives. In: Ullmann's Encyclopedia of Industrial Chemistry, Seventh Edition, 2009 Electronic Release (ed. Fiedler E., Grossmann G., Kersebohm D., Weiss G. and Witte C.). 7 th Electronic Release Edition. Wiley InterScience, New York, Article Online Posting Date: June 15, 2000. Online-Version under: DOI: 10.1002/14356007.a22_223
  Uncertainty: Stoechiometric calculation
  properties: carbon content, fossil 0.919743, dry mass 1 kg, heating value, net 45 MJ, wet mass 1 kg
  note on carbon content, fossil: C-content was calculated using data from Tab 3.20, ecoinvent v2.2 report 6_IV CO2 emmissions and High heating value.
- natural gas, high pressure: 3.10511e-5, 0.00445337 m3 (2 suppliers, which the file names only by identifier); sum of these 0.00448442 m3; source Unger T A 1996; lognormal variance with pedigree 0.076, pedigree (4,5,5,1,1)
  (same comment as for acetylene)
  properties: carbon content, fossil 0.602381, dry mass 0.84 kg, heating value, net 36 MJ, wet mass 0.84 kg
  note on carbon content, fossil: An average C content of 0.506 kg C/ m3 has been assumed (this average has been calculated using data in Tab 3.5, ecoinvent v2.2 report 6_V
  note on heating value, net: Literature value, Source: Christoph Meili;Niels Jungbluth;Maresa Bussa (2021) Life cycle inventories of crude oil and natural gas extraction. ESU-services Ltd. commissioned by BAFU & VSG, Schaffhausen, Switzerland, http://esu-services.ch/data/public-lci-reports/
- nitric acid, without water, in 50% solution state: 0.12746 kg; source Unger T A 1996; lognormal variance with pedigree 0.076, pedigree (4,5,5,1,1)
  EcoSpold01Location=RER
  Stoichiometric calculation, assuming an efficiency of 95% per reaction step.
  Further references:
  Booth 2000. Gerald Booth: Nitro Compounds, Aromatic. In: Ullmann's Encyclopedia of Industrial Chemistry, Seventh Edition, 2009 Electronic Release (ed. Fiedler E., Grossmann G., Kersebohm D., Weiss G. and Witte C.). 7 th Electronic Release Edition. Wiley InterScience, New York, Article Online Posting Date: June 15, 2000. Online-Version under: DOI: 10.1002/14356007.a17_411
  Eckert et al. 2006. Marc Eckert, Gerald Fleischmann, Reinhard Jira, Hermann M. Bolt, Klaus Golka: Acetaldehyde. In: Ullmann's Encyclopedia of Industrial Chemistry, Seventh Edition, 2009 Electronic Release (ed. Fiedler E., Grossmann G., Kersebohm D., Weiss G. and Witte C.). 7 th Electronic Release Edition. Wiley InterScience, New York, Article Online Posting Date: December 15, 2006. Online-Version under: DOI: 10.1002/14356007.a01_031.pub2
  Kim et al. 2003. Kim S., Overcash M.: Energy in chemical manufacturing processes: gate-to-gate information for life cycle assessment. In: Journal of Chemical Technology & Biotechnology vol. 78, no. 9: 995-1005(11). 2003
  Laue et al. 2000. Wolfgang Laue, Michael Thiemann, Erich Scheibler, Karl Wilhelm Wiegand: Nitrates and Nitrites. In: Ullmann's Encyclopedia of Industrial Chemistry, Seventh Edition, 2009 Electronic Release (ed. Fiedler E., Grossmann G., Kersebohm D., Weiss G. and Witte C.). 7 th Electronic Release Edition. Wiley InterScience, New York, Article Online Posting Date: June 15, 2000. Online-Version under: DOI: 10.1002/14356007.a17_265
  Shimizu et al. 2000. Shinkichi Shimizu, Nanao Watanabe, Toshiaki Kataoka, Takayuki Shoji, Nobuyuki Abe, Sinji Morishita, Hisao Ichimura: Pyridine and Pyridine Derivatives. In: Ullmann's Encyclopedia of Industrial Chemistry, Seventh Edition, 2009 Electronic Release (ed. Fiedler E., Grossmann G., Kersebohm D., Weiss G. and Witte C.). 7 th Electronic Release Edition. Wiley InterScience, New York, Article Online Posting Date: June 15, 2000. Online-Version under: DOI: 10.1002/14356007.a22_399
  Thiemann et al. 2000. Michael Thiemann, Erich Scheibler, Karl Wilhelm Wiegand: Nitric Acid, Nitrous Acid, and Nitrogen Oxides. In: Ullmann's Encyclopedia of Industrial Chemistry, Seventh Edition, 2009 Electronic Release (ed. Fiedler E., Grossmann G., Kersebohm D., Weiss G. and Witte C.). 7 th Electronic Release Edition. Wiley InterScience, New York, Article Online Posting Date: June 15, 2000. Online-Version under: DOI: 10.1002/14356007.a17_293
  Uncertainty: Stoechiometric calculation
  properties: dry mass 1 kg, wet mass 1 kg
- nitrobenzene: 0.014678 kg; source Unger T A 1996; lognormal variance with pedigree 0.076, pedigree (4,5,5,1,1)
  EcoSpold01Location=RER
  Stoichiometric calculation, assuming an efficiency of 95% per reaction step.
  Further references:
  Lindner et al. 2000. Otto Lindner and Lars Rodefeld: Benzenesulfonic Acids and Their Derivatives. In: Ullmann's Encyclopedia of Industrial Chemistry, Seventh Edition, 2009 Electronic Release (ed. Fiedler E., Grossmann G., Kersebohm D., Weiss G. and Witte C.). 7 th Electronic Release Edition. Wiley InterScience, New York, Article Online Posting Date: September 15, 2000. Online-Version under: DOI: 10.1002/14356007.a03_507
  Uncertainty: Stoechiometric calculation
  properties: carbon content, fossil 0.606061, dry mass 1 kg, heating value, net 22.66 MJ, wet mass 1 kg
- nitrogen, liquid: 0.0084047 kg; source Unger T A 1996; lognormal variance with pedigree 0.076, pedigree (4,5,5,1,1)
  (same comment as for calcium carbide, technical grade)
  properties: dry mass 1 kg, wet mass 1 kg
- o-dichlorobenzene: 0.035466 kg; source Unger T A 1996; lognormal variance with pedigree 0.076, pedigree (4,5,5,1,1)
  (same comment as for 1-pentanol)
  properties: carbon content, fossil 0.493151, dry mass 1 kg, heating value, net 18.15 MJ, wet mass 1 kg
- oxygen, liquid: 0.065462 kg; source Unger T A 1996; lognormal variance with pedigree 0.076, pedigree (4,5,5,1,1)
  EcoSpold01Location=RER
  Stoichiometric calculation, assuming an efficiency of 100% per reaction step.
  Further references:
  Arntz et al. 2007. Dietrich Arntz, Achim Fischer, Mathias Höpp, Sylvia Jacobi, Jörg Sauer, Takashi Ohara, Takahisa Sato, Noboru Shimizu, Helmut Schwind: Acrolein and Methacrolein. In: Ullmann's Encyclopedia of Industrial Chemistry, Seventh Edition, 2009 Electronic Release (ed. Fiedler E., Grossmann G., Kersebohm D., Weiss G. and Witte C.). 7 th Electronic Release Edition. Wiley InterScience, New York, Article Online Posting Date: April 15, 2007. Online-Version under: DOI: 10.1002/14356007.a01_149.pub2
  Eller et al. 2000. Karsten Eller, Erhard Henkes, Roland Rossbacher, Hartmut Höke: Amines, Aliphatic. In: Ullmann's Encyclopedia of Industrial Chemistry, Seventh Edition, 2009 Electronic Release (ed. Fiedler E., Grossmann G., Kersebohm D., Weiss G. and Witte C.). 7 th Electronic Release Edition. Wiley InterScience, New York, Article Online Posting Date: June 15, 2000. Online-Version under: DOI: 10.1002/14356007.a02_001
  Güthner et al. 2006. Thomas Güthner and Bernd Mertschenk: Cyanamides. In: Ullmann's Encyclopedia of Industrial Chemistry, Seventh Edition, 2009 Electronic Release (ed. Fiedler E., Grossmann G., Kersebohm D., Weiss G. and Witte C.). 7 th Electronic Release Edition. Wiley InterScience, New York, Article Online Posting Date: July 15, 2006. Online-Version under: DOI: 10.1002/14356007.a08_139.pub2
  Güthner et al. 2006. Thomas Güthner, Bernd Mertschenk, Bernd Schulz: Guanidine and Derivatives. In: Ullmann's Encyclopedia of Industrial Chemistry, Seventh Edition, 2009 Electronic Release (ed. Fiedler E., Grossmann G., Kersebohm D., Weiss G. and Witte C.). 7 th Electronic Release Edition. Wiley InterScience, New York, Article Online Posting Date: July 15, 2006. Online-Version under: DOI: 10.1002/14356007.a12_545.pub2
  Kim et al. 2003. Kim S., Overcash M.: Energy in chemical manufacturing processes: gate-to-gate information for life cycle assessment. In: Journal of Chemical Technology & Biotechnology vol. 78, no. 9: 995-1005(11). 2003
  Laue et al. 2000. Wolfgang Laue, Michael Thiemann, Erich Scheibler, Karl Wilhelm Wiegand: Nitrates and Nitrites. In: Ullmann's Encyclopedia of Industrial Chemistry, Seventh Edition, 2009 Electronic Release (ed. Fiedler E., Grossmann G., Kersebohm D., Weiss G. and Witte C.). 7 th Electronic Release Edition. Wiley InterScience, New York, Article Online Posting Date: June 15, 2000. Online-Version under: DOI: 10.1002/14356007.a17_265
  Maki et al. 2000. Takao Maki and Kazuo Takeda: Benzoic Acid and Derivatives. In: Ullmann's Encyclopedia of Industrial Chemistry, Seventh Edition, 2009 Electronic Release (ed. Fiedler E., Grossmann G., Kersebohm D., Weiss G. and Witte C.). 7 th Electronic Release Edition. Wiley InterScience, New York, Article Online Posting Date: June 15, 2000. Online-Version under: DOI: 10.1002/14356007.a03_555
  Ritz et al. 2000. Josef Ritz, Hugo Fuchs, Howard G. Perryman: Hydroxylamine. In: Ullmann's Encyclopedia of Industrial Chemistry, Seventh Edition, 2009 Electronic Release (ed. Fiedler E., Grossmann G., Kersebohm D., Weiss G. and Witte C.). 7 th Electronic Release Edition. Wiley InterScience, New York, Article Online Posting Date: June 15, 2000. Online-Version under: DOI: 10.1002/14356007.a13_527
  Shimizu et al. 2000. Shinkichi Shimizu, Nanao Watanabe, Toshiaki Kataoka, Takayuki Shoji, Nobuyuki Abe, Sinji Morishita, Hisao Ichimura: Pyridine and Pyridine Derivatives. In: Ullmann's Encyclopedia of Industrial Chemistry, Seventh Edition, 2009 Electronic Release (ed. Fiedler E., Grossmann G., Kersebohm D., Weiss G. and Witte C.). 7 th Electronic Release Edition. Wiley InterScience, New York, Article Online Posting Date: June 15, 2000. Online-Version under: DOI: 10.1002/14356007.a22_399
  Thiemann et al. 2000. Michael Thiemann, Erich Scheibler,
  Karl Wilhelm Wiegand: Nitric Acid, Nitrous Acid, and Nitrogen Oxides. In: Ullmann's Encyclopedia of Industrial Chemistry, Seventh Edition, 200
  Uncertainty: Stoechiometric calculation
  properties: dry mass 1 kg, wet mass 1 kg
- p-dichlorobenzene: 0.020172 kg; source Unger T A 1996; lognormal variance with pedigree 0.076, pedigree (4,5,5,1,1)
  Stoichiometric calculation, assuming an efficiency of 95% per reaction step.
  Further references:
  Booth 2000. Gerald Booth: Nitro Compounds, Aromatic. In: Ullmann's Encyclopedia of Industrial Chemistry, Seventh Edition, 2009 Electronic Release (ed. Fiedler E., Grossmann G., Kersebohm D., Weiss G. and Witte C.). 7 th Electronic Release Edition. Wiley InterScience, New York, Article Online Posting Date: June 15, 2000. Online-Version under: DOI: 10.1002/14356007.a17_411
  Kim et al. 2003. Kim S., Overcash M.: Energy in chemical manufacturing processes: gate-to-gate information for life cycle assessment. In: Journal of Chemical Technology & Biotechnology vol. 78, no. 9: 995-1005(11). 2003
  EcoSpold01Location=RER
  Uncertainty: Stoechiometric calculation
  properties: carbon content, fossil 0.493151, dry mass 1 kg, heating value, net 18.15 MJ, wet mass 1 kg
- phenol: 0.087693 kg; source Unger T A 1996; lognormal variance with pedigree 0.076, pedigree (4,5,5,1,1)
  Stoichiometric calculation, assuming an efficiency of 95% per reaction step.
  Further references:
  Fliege 2000. Helmut Fiege: Cresols and Xylenols. In: Ullmann's Encyclopedia of Industrial Chemistry, Seventh Edition, 2009 Electronic Release (ed. Fiedler E., Grossmann G., Kersebohm D., Weiss G. and Witte C.). 7 th Electronic Release Edition. Wiley InterScience, New York, Article Online Posting Date: June 15, 2000. Online-Version under: DOI: 10.1002/14356007.a08_025
  EcoSpold01Location=RER
  Uncertainty: Stoechiometric calculation
  properties: carbon content, fossil 0.765957, dry mass 1 kg, heating value, net 30.93 MJ, wet mass 1 kg
- phosgene, liquid: 0.11224 kg; source Unger T A 1996; lognormal variance with pedigree 0.076, pedigree (4,5,5,1,1)
  EcoSpold01Location=RER
  Stoichiometric calculation, assuming an efficiency of 95% per reaction step.
  Further references:
  Kim et al. 2003. Kim S., Overcash M.: Energy in chemical manufacturing processes: gate-to-gate information for life cycle assessment. In: Journal of Chemical Technology & Biotechnology vol. 78, no. 9: 995-1005(11). 2003
  Güthner et al. 2006. Thomas Güthner and Bernd Mertschenk: Cyanamides. In: Ullmann's Encyclopedia of Industrial Chemistry, Seventh Edition, 2009 Electronic Release (ed. Fiedler E., Grossmann G., Kersebohm D., Weiss G. and Witte C.). 7 th Electronic Release Edition. Wiley InterScience, New York, Article Online Posting Date: July 15, 2006. Online-Version under: DOI: 10.1002/14356007.a08_139.pub2
  Güthner et al. 2006. Thomas Güthner, Bernd Mertschenk, Bernd Schulz: Guanidine and Derivatives. In: Ullmann's Encyclopedia of Industrial Chemistry, Seventh Edition, 2009 Electronic Release (ed. Fiedler E., Grossmann G., Kersebohm D., Weiss G. and Witte C.). 7 th Electronic Release Edition. Wiley InterScience, New York, Article Online Posting Date: July 15, 2006. Online-Version under: DOI: 10.1002/14356007.a12_545.pub2
  Uncertainty: Stoechiometric calculation
  properties: carbon content, fossil 0.122449, dry mass 1 kg, heating value, net 3.68 MJ, wet mass 1 kg
- phosphoric acid, industrial grade, without water, in 85% solution state: 0.002694 kg; source Unger T A 1996; lognormal variance with pedigree 0.076, pedigree (4,5,5,1,1)
  (same comment as for 1-propanol)
  properties: dry mass 1 kg, wet mass 1 kg
- phosphorous chloride: 0.030984 kg; source Unger T A 1996; lognormal variance with pedigree 0.076, pedigree (4,5,5,1,1)
  (same comment as for 1-pentanol)
  properties: dry mass 1 kg, wet mass 1 kg
- phosphorus, white, liquid: 0.010294 kg; source Unger T A 1996; lognormal variance with pedigree 0.076, pedigree (4,5,5,1,1)
  EcoSpold01Location=RER
  Stoichiometric calculation, assuming an efficiency of 95% per reaction step.
  Further references:
  Lyday 2000. Phyllis A. Lyday: Iodine and Iodine Compounds. In: Ullmann's Encyclopedia of Industrial Chemistry, Seventh Edition, 2009 Electronic Release (ed. Fiedler E., Grossmann G., Kersebohm D., Weiss G. and Witte C.). 7 th Electronic Release Edition. Wiley InterScience, New York, Article Online Posting Date: June 15, 2000. Online-Version under: DOI: 10.1002/14356007.a14_381
  Uncertainty: Stoechiometric calculation
  properties: dry mass 1 kg, wet mass 1 kg
- phthalic anhydride: 0.0070905 kg; source Unger T A 1996; lognormal variance with pedigree 0.076, pedigree (4,5,5,1,1)
  (same comment as for 1-pentanol)
  properties: carbon content, fossil 0.648649, dry mass 1 kg, heating value, net 22.93 MJ, wet mass 1 kg
- potassium hydroxide: 0.0091331 kg; source Unger T A 1996; lognormal variance with pedigree 0.076, pedigree (4,5,5,1,1)
  (same comment as for 1-pentanol)
  properties: dry mass 0.856 kg, water content 0.168224, wet mass 1 kg
- propanal: 0.013128 kg; source Unger T A 1996; lognormal variance with pedigree 0.076, pedigree (4,5,5,1,1)
  EcoSpold01Location=RER
  Stoichiometric calculation, assuming an efficiency of 95% per reaction step.
  Further references:
  Eller et al. 2000. Karsten Eller, Erhard Henkes, Roland Rossbacher, Hartmut Höke: Amines, Aliphatic. In: Ullmann's Encyclopedia of Industrial Chemistry, Seventh Edition, 2009 Electronic Release (ed. Fiedler E., Grossmann G., Kersebohm D., Weiss G. and Witte C.). 7 th Electronic Release Edition. Wiley InterScience, New York, Article Online Posting Date: June 15, 2000. Online-Version under: DOI: 10.1002/14356007.a02_001
  Kim et al. 2003. Kim S., Overcash M.: Energy in chemical manufacturing processes: gate-to-gate information for life cycle assessment. In: Journal of Chemical Technology & Biotechnology vol. 78, no. 9: 995-1005(11). 2003
  Lange et al. 2000. Ludwig Lange and Wolfgang Triebel: Sulfides, Polysulfides, and Sulfanes. In: Ullmann's Encyclopedia of Industrial Chemistry, Seventh Edition, 2009 Electronic Release (ed. Fiedler E., Grossmann G., Kersebohm D., Weiss G. and Witte C.). 7 th Electronic Release Edition. Wiley InterScience, New York, Article Online Posting Date: June 15, 2000. Online-Version under: DOI: 10.1002/14356007.a25_443
  Maki et al. 2000. Takao Maki and Kazuo Takeda: Benzoic Acid and Derivatives. In: Ullmann's Encyclopedia of Industrial Chemistry, Seventh Edition, 2009 Electronic Release (ed. Fiedler E., Grossmann G., Kersebohm D., Weiss G. and Witte C.). 7 th Electronic Release Edition. Wiley InterScience, New York, Article Online Posting Date: June 15, 2000. Online-Version under: DOI: 10.1002/14356007.a03_555
  Uncertainty: Stoechiometric calculation
  properties: carbon content, fossil 0.62069, dry mass 1 kg, heating value, net 31.32 MJ, wet mass 1 kg
- propylene: 0.010841 kg; source Unger T A 1996; lognormal variance with pedigree 0.076, pedigree (4,5,5,1,1)
  Stoichiometric calculation, assuming an efficiency of 95% per reaction step.
  Further references:
  Cornils et al. 2000. Boy Cornils, Richard W. Fischer, Christian Kohlpaintner: Butanals. In: Ullmann's Encyclopedia of Industrial Chemistry, Seventh Edition, 2009 Electronic Release (ed. Fiedler E., Grossmann G., Kersebohm D., Weiss G. and Witte C.). 7 th Electronic Release Edition. Wiley InterScience, New York, Article Online Posting Date: September 15, 2000. Online-Version under: DOI: 10.1002/14356007.a04_447
  Kim et al. 2003. Kim S., Overcash M.: Energy in chemical manufacturing processes: gate-to-gate information for life cycle assessment. In: Journal of Chemical Technology & Biotechnology vol. 78, no. 9: 995-1005(11). 2003
  EcoSpold01Location=RER
  Uncertainty: Stoechiometric calculation
  properties: carbon content, fossil 0.857143, dry mass 1 kg, heating value, net 43.22 MJ, wet mass 1 kg
- propylene glycol, liquid: 0.0027359 kg; source Unger T A 1996; lognormal variance with pedigree 0.076, pedigree (4,5,5,1,1)
  (same comment as for 1-propanol)
  properties: carbon content, fossil 0.473684, dry mass 1 kg, heating value, net 27.09 MJ, wet mass 1 kg
- propylene oxide, liquid: 0.0066787 kg; source Unger T A 1996; lognormal variance with pedigree 0.076, pedigree (4,5,5,1,1)
  EcoSpold01Location=RER
  Stoichiometric calculation, assuming an efficiency of 95% per reaction step.
  Further references:
  Kim et al. 2003. Kim S., Overcash M.: Energy in chemical manufacturing processes: gate-to-gate information for life cycle assessment. In: Journal of Chemical Technology & Biotechnology vol. 78, no. 9: 995-1005(11). 2003
  Eller et al. 2000. Karsten Eller, Erhard Henkes, Roland Rossbacher, Hartmut Höke: Amines, Aliphatic. In: Ullmann's Encyclopedia of Industrial Chemistry, Seventh Edition, 2009 Electronic Release (ed. Fiedler E., Grossmann G., Kersebohm D., Weiss G. and Witte C.). 7 th Electronic Release Edition. Wiley InterScience, New York, Article Online Posting Date: June 15, 2000. Online-Version under: DOI: 10.1002/14356007.a02_001
  Frauenkron et al. 2001. Matthias Frauenkron, Johann-Peter Melder, Günther Ruider, Roland Rossbacher, Hartmut Höke: Ethanolamines and Propanolamines. In: Ullmann's Encyclopedia of Industrial Chemistry, Seventh Edition, 2009 Electronic Release (ed. Fiedler E., Grossmann G., Kersebohm D., Weiss G. and Witte C.). 7 th Electronic Release Edition. Wiley InterScience, New York, Article Online Posting Date: September 15, 2001. Online-Version under: DOI: 10.1002/14356007.a10_001
  Uncertainty: Stoechiometric calculation
  properties: carbon content, fossil 0.62069, dry mass 1 kg, heating value, net 31.32 MJ, wet mass 1 kg
- silicon, metallurgical grade: 0.00078926 kg; source Unger T A 1996; lognormal variance with pedigree 0.076, pedigree (4,5,5,1,1)
  EcoSpold01Location=NO
  Stoichiometric calculation, assuming an efficiency of 95% per reaction step.
  Uncertainty: Stoechiometric calculation
  properties: dry mass 1 kg, wet mass 1 kg
- soda ash, dense: 0.010669 kg; source Klemm A. 2009; lognormal variance with pedigree 0.076, pedigree (4,5,5,1,1)
  Stoichiometric calculation, assuming an efficiency of 95% per reaction step.
  Further references:
  Kim et al. 2003. Kim S., Overcash M.: Energy in chemical manufacturing processes: gate-to-gate information for life cycle assessment. In: Journal of Chemical Technology & Biotechnology vol. 78, no. 9: 995-1005(11). 2003
  EcoSpold01Location=GLO
  Uncertainty: Stoechiometric calculation
  properties: carbon content, fossil 0.113208, dry mass 1 kg, heating value, net 3.43 MJ, wet mass 1 kg
- sodium chloride, powder: 0.0054376 kg; source Unger T A 1996; lognormal variance with pedigree 0.076, pedigree (4,5,5,1,1)
  EcoSpold01Location=RER
  Stoichiometric calculation, assuming an efficiency of 95% per reaction step.
  Further references:
  Kim et al. 2003. Kim S., Overcash M.: Energy in chemical manufacturing processes: gate-to-gate information for life cycle assessment. In: Journal of Chemical Technology & Biotechnology vol. 78, no. 9: 995-1005(11). 2003
  Klemm et al. 2000. Alfred Klemm, Gabriele Hartmann, Ludwig Lange: Sodium and Sodium Alloys. In: Ullmann's Encyclopedia of Industrial Chemistry, Seventh Edition, 2009 Electronic Release (ed. Fiedler E., Grossmann G., Kersebohm D., Weiss G. and Witte C.). 7 th Electronic Release Edition. Wiley InterScience, New York, Article Online Posting Date: June 15, 2000. Online-Version under: DOI: 10.1002/14356007.a24_277
  Uncertainty: Stoechiometric calculation
  properties: dry mass 1 kg, wet mass 1 kg
- sodium cyanide: 0.032483 kg; source Unger T A 1996; lognormal variance with pedigree 0.076, pedigree (4,5,5,1,1)
  Stoichiometric calculation, assuming an efficiency of 95% per reaction step.
  Further references:
  Shimizu et al. 2000. Shinkichi Shimizu, Nanao Watanabe, Toshiaki Kataoka, Takayuki Shoji, Nobuyuki Abe, Sinji Morishita, Hisao Ichimura: Pyridine and Pyridine Derivatives. In: Ullmann's Encyclopedia of Industrial Chemistry, Seventh Edition, 2009 Electronic Release (ed. Fiedler E., Grossmann G., Kersebohm D., Weiss G. and Witte C.). 7 th Electronic Release Edition. Wiley InterScience, New York, Article Online Posting Date: June 15, 2000. Online-Version under: DOI: 10.1002/14356007.a22_399
  EcoSpold01Location=RER
  Uncertainty: Stoechiometric calculation
  properties: carbon content, fossil 0.244898, dry mass 1 kg, heating value, net 7.43 MJ, wet mass 1 kg
- sodium hydroxide, without water, in 50% solution state: 0.81892 kg; source Unger T A 1996; lognormal variance with pedigree 0.076, pedigree (4,5,5,1,1)
  Stoichiometric calculation, assuming an efficiency of 100%.
  Further references:
  Bipp et al. 2000. Hansjörg Bipp and Heinz Kieczka: Formamides. In: Ullmann's Encyclopedia of Industrial Chemistry, Seventh Edition, 2009 Electronic Release (ed. Fiedler E., Grossmann G., Kersebohm D., Weiss G. and Witte C.). 7 th Electronic Release Edition. Wiley InterScience, New York, Article Online Posting Date: June 15, 2000. Online-Version under: DOI: 10.1002/14356007.a12_001
  Eller et al. 2000. Karsten Eller, Erhard Henkes, Roland Rossbacher, Hartmut Höke: Amines, Aliphatic. In: Ullmann's Encyclopedia of Industrial Chemistry, Seventh Edition, 2009 Electronic Release (ed. Fiedler E., Grossmann G., Kersebohm D., Weiss G. and Witte C.). 7 th Electronic Release Edition. Wiley InterScience, New York, Article Online Posting Date: June 15, 2000. Online-Version under: DOI: 10.1002/14356007.a02_001
  Fliege 2000. Helmut Fiege: Cresols and Xylenols. In: Ullmann's Encyclopedia of Industrial Chemistry, Seventh Edition, 2009 Electronic Release (ed. Fiedler E., Grossmann G., Kersebohm D., Weiss G. and Witte C.). 7 th Electronic Release Edition. Wiley InterScience, New York, Article Online Posting Date: June 15, 2000. Online-Version under: DOI: 10.1002/14356007.a08_025
  Kim et al. 2003. Kim S., Overcash M.: Energy in chemical manufacturing processes: gate-to-gate information for life cycle assessment. In: Journal of Chemical Technology & Biotechnology vol. 78, no. 9: 995-1005(11). 2003
  Lange et al. 2000. Ludwig Lange and Wolfgang Triebel: Sulfides, Polysulfides, and Sulfanes. In: Ullmann's Encyclopedia of Industrial Chemistry, Seventh Edition, 2009 Electronic Release (ed. Fiedler E., Grossmann G., Kersebohm D., Weiss G. and Witte C.). 7 th Electronic Release Edition. Wiley InterScience, New York, Article Online Posting Date: June 15, 2000. Online-Version under: DOI: 10.1002/14356007.a25_443
  Laue et al. 2000. Wolfgang Laue, Michael Thiemann, Erich Scheibler, Karl Wilhelm Wiegand: Nitrates and Nitrites. In: Ullmann's Encyclopedia of Industrial Chemistry, Seventh Edition, 2009 Electronic Release (ed. Fiedler E., Grossmann G., Kersebohm D., Weiss G. and Witte C.). 7 th Electronic Release Edition. Wiley InterScience, New York, Article Online Posting Date: June 15, 2000. Online-Version under: DOI: 10.1002/14356007.a17_265
  Lindner et al. 2000. Otto Lindner and Lars Rodefeld: Benzenesulfonic Acids and Their Derivatives. In: Ullmann's Encyclopedia of Industrial Chemistry, Seventh Edition, 2009 Electronic Release (ed. Fiedler E., Grossmann G., Kersebohm D., Weiss G. and Witte C.). 7 th Electronic Release Edition. Wiley InterScience, New York, Article Online Posting Date: September 15, 2000. Online-Version under: DOI: 10.1002/14356007.a03_507
  Ritz et al. 2000. Josef Ritz, Hugo Fuchs, Howard G. Perryman: Hydroxylamine. In: Ullmann's Encyclopedia of Industrial Chemistry, Seventh Edition, 2009 Electronic Release (ed. Fiedler E., Grossmann G., Kersebohm D., Weiss G. and Witte C.). 7 th Electronic Release Edition. Wiley InterScience, New York, Article Online Posting Date: June 15, 2000. Online-Version under: DOI: 10.1002/14356007.a13_527
  Samel et al. 2000. Ulf-Rainer Samel, Walter Kohler, Armin Otto Gamer, Ullrich Keuser: Propionic Acid and Derivatives. In: Ullmann's Encyclopedia of Industrial Chemistry, Seventh Edition, 2009 Electronic Release (ed. Fiedler E., Grossmann G., Kersebohm D., Weiss G. and Witte C.). 7 th Electronic Release Edition. Wiley InterScience, New York, Article Online Posting Date: June 15, 2000. Online-Version under: DOI: 10.1002/14356007.a22_223
  Schirrmann et al. 2001. Jean-Pierre Schirmann and Paul Bourdauducq: Hydrazine. In: Ullmann's Encyclopedia of Industrial Chemistry, Seventh Edition, 2009 Electronic Release (ed. Fiedler E., Grossmann G., Kersebohm D., Weiss G. and Witte C.). 7 th Electronic Release Edition. Wiley InterScience, New York, Article Online Posting Date: June 15, 2001. Online-Version under: DOI: 10.1002/14356007.a13_177
  Sh
  EcoSpold01Location=RER
  Uncertainty: Stoechiometric calculation
  properties: dry mass 1 kg, heating value, net 3.03 MJ, wet mass 1 kg
- sodium hypochlorite, without water, in 15% solution state: 0.039512 kg; source Unger T A 1996; lognormal variance with pedigree 0.076, pedigree (4,5,5,1,1)
  EcoSpold01Location=RER
  Stoichiometric calculation, assuming an efficiency of 95% per reaction step.
  Further references:
  Schirrmann et al. 2001. Jean-Pierre Schirmann and Paul Bourdauducq: Hydrazine. In: Ullmann's Encyclopedia of Industrial Chemistry, Seventh Edition, 2009 Electronic Release (ed. Fiedler E., Grossmann G., Kersebohm D., Weiss G. and Witte C.). 7 th Electronic Release Edition. Wiley InterScience, New York, Article Online Posting Date: June 15, 2001. Online-Version under: DOI: 10.1002/14356007.a13_177
  Uncertainty: Stoechiometric calculation
  properties: dry mass 1 kg, wet mass 1 kg
- sodium methoxide: 0.0019092 kg; source Unger T A 1996; lognormal variance with pedigree 0.076, pedigree (4,5,5,1,1)
  (same comment as for ammonium thiocyanate)
  properties: carbon content, fossil 0.222222, dry mass 1 kg, heating value, net 13.47 MJ, wet mass 1 kg
- sodium tetrahydridoborate: 0.0018437 kg; source Unger T A 1996; lognormal variance with pedigree 0.076, pedigree (4,5,5,1,1)
  (same comment as for ammonium thiocyanate)
  properties: dry mass 1 kg, heating value, net 12.81 MJ, wet mass 1 kg
- sulfur: 0.035975 kg; source Unger T A 1996; lognormal variance with pedigree 0.076, pedigree (4,5,5,1,1)
  EcoSpold01Location=RER
  Stoichiometric calculation, assuming an efficiency of 95% per reaction step.
  Further references:
  Kim et al. 2003. Kim S., Overcash M.: Energy in chemical manufacturing processes: gate-to-gate information for life cycle assessment. In: Journal of Chemical Technology & Biotechnology vol. 78, no. 9: 995-1005(11). 2003
  Uncertainty: Stoechiometric calculation
  properties: dry mass 1 kg, wet mass 1 kg
- sulfur dioxide, liquid: 0.072619 kg; source Unger T A 1996; lognormal variance with pedigree 0.076, pedigree (4,5,5,1,1)
  Stoichiometric calculation, assuming an efficiency of 95% per reaction step.
  Further references:
  Kim et al. 2003. Kim S., Overcash M.: Energy in chemical manufacturing processes: gate-to-gate information for life cycle assessment. In: Journal of Chemical Technology & Biotechnology vol. 78, no. 9: 995-1005(11). 2003
  Laue et al. 2000. Wolfgang Laue, Michael Thiemann, Erich Scheibler, Karl Wilhelm Wiegand: Nitrates and Nitrites. In: Ullmann's Encyclopedia of Industrial Chemistry, Seventh Edition, 2009 Electronic Release (ed. Fiedler E., Grossmann G., Kersebohm D., Weiss G. and Witte C.). 7 th Electronic Release Edition. Wiley InterScience, New York, Article Online Posting Date: June 15, 2000. Online-Version under: DOI: 10.1002/14356007.a17_265
  Ritz et al. 2000. Josef Ritz, Hugo Fuchs, Howard G. Perryman: Hydroxylamine. In: Ullmann's Encyclopedia of Industrial Chemistry, Seventh Edition, 2009 Electronic Release (ed. Fiedler E., Grossmann G., Kersebohm D., Weiss G. and Witte C.). 7 th Electronic Release Edition. Wiley InterScience, New York, Article Online Posting Date: June 15, 2000. Online-Version under: DOI: 10.1002/14356007.a13_527
  Thiemann et al. 2000. Michael Thiemann, Erich Scheibler, Karl Wilhelm Wiegand: Nitric Acid, Nitrous Acid, and Nitrogen Oxides. In: Ullmann's Encyclopedia of Industrial Chemistry, Seventh Edition, 2009 Electronic Release (ed. Fiedler E., Grossmann G., Kersebohm D., Weiss G. and Witte C.). 7 th Electronic Release Edition. Wiley InterScience, New York, Article Online Posting Date: June 15, 2000. Online-Version under: DOI: 10.1002/14356007.a17_293
  EcoSpold01Location=RER
  Uncertainty: Stoechiometric calculation
  properties: dry mass 1 kg, wet mass 1 kg
- sulfur trioxide: 0.037426 kg; source Unger T A 1996; lognormal variance with pedigree 0.076, pedigree (4,5,5,1,1)
  EcoSpold01Location=RER
  Stoichiometric calculation, assuming an efficiency of 95% per reaction step.
  Further references:
  Güthner et al. 2006. Thomas Güthner and Bernd Mertschenk: Cyanamides. In: Ullmann's Encyclopedia of Industrial Chemistry, Seventh Edition, 2009 Electronic Release (ed. Fiedler E., Grossmann G., Kersebohm D., Weiss G. and Witte C.). 7 th Electronic Release Edition. Wiley InterScience, New York, Article Online Posting Date: July 15, 2006. Online-Version under: DOI: 10.1002/14356007.a08_139.pub2
  Uncertainty: Stoechiometric calculation
  properties: dry mass 1 kg, wet mass 1 kg
- sulfuric acid: 0.087759 kg; source Unger T A 1996; lognormal variance with pedigree 0.076, pedigree (4,5,5,1,1)
  Stoichiometric calculation, assuming an efficiency of 95% per reaction step.
  Further references:
  Bauer 2000. William Bauer Jr.: Methacrylic Acid and Derivatives. In: Ullmann's Encyclopedia of Industrial Chemistry, Seventh Edition, 2009 Electronic Release (ed. Fiedler E., Grossmann G., Kersebohm D., Weiss G. and Witte C.). 7 th Electronic Release Edition. Wiley InterScience, New York, Article Online Posting Date: June 15, 2000. Online-Version under: DOI: 10.1002/14356007.a16_441
  Eller et al. 2000. Karsten Eller, Erhard Henkes, Roland Rossbacher, Hartmut Höke: Amines, Aliphatic. In: Ullmann's Encyclopedia of Industrial Chemistry, Seventh Edition, 2009 Electronic Release (ed. Fiedler E., Grossmann G., Kersebohm D., Weiss G. and Witte C.). 7 th Electronic Release Edition. Wiley InterScience, New York, Article Online Posting Date: June 15, 2000. Online-Version under: DOI: 10.1002/14356007.a02_001
  Güthner et al. 2006. Thomas Güthner and Bernd Mertschenk: Cyanamides. In: Ullmann's Encyclopedia of Industrial Chemistry, Seventh Edition, 2009 Electronic Release (ed. Fiedler E., Grossmann G., Kersebohm D., Weiss G. and Witte C.). 7 th Electronic Release Edition. Wiley InterScience, New York, Article Online Posting Date: July 15, 2006. Online-Version under: DOI: 10.1002/14356007.a08_139.pub2
  Güthner et al. 2006. Thomas Güthner, Bernd Mertschenk, Bernd Schulz: Guanidine and Derivatives. In: Ullmann's Encyclopedia of Industrial Chemistry, Seventh Edition, 2009 Electronic Release (ed. Fiedler E., Grossmann G., Kersebohm D., Weiss G. and Witte C.). 7 th Electronic Release Edition. Wiley InterScience, New York, Article Online Posting Date: July 15, 2006. Online-Version under: DOI: 10.1002/14356007.a12_545.pub2
  Lindner et al. 2000. Otto Lindner and Lars Rodefeld: Benzenesulfonic Acids and Their Derivatives. In: Ullmann's Encyclopedia of Industrial Chemistry, Seventh Edition, 2009 Electronic Release (ed. Fiedler E., Grossmann G., Kersebohm D., Weiss G. and Witte C.). 7 th Electronic Release Edition. Wiley InterScience, New York, Article Online Posting Date: September 15, 2000. Online-Version under: DOI:
  10.1002/14356007.a03_507
  Finley 2006. K. Thomas Finley: Benzoquinone. In: Ullmann's Encyclopedia of Industrial Chemistry, Seventh Edition, 2009 Electronic Release (ed. Fiedler E., Grossmann G., Kersebohm D., Weiss G. and Witte C.). 7 th Electronic Release Edition. Wiley InterScience, New York, Article Online Posting Date: April 15, 2006. Online-Version under: DOI: 10.1002/14356007.a03_571.pub2
  Samel et al. 2000. Ulf-Rainer Samel, Walter Kohler, Armin Otto Gamer, Ullrich Keuser: Propionic Acid and Derivatives. In: Ullmann's Encyclopedia of Industrial Chemistry, Seventh Edition, 2009 Electronic Release (ed. Fiedler E., Grossmann G., Kersebohm D., Weiss G. and Witte C.). 7 th Electronic Release Edition. Wiley InterScience, New York, Article Online Posting Date: June 15, 2000. Online-Version under: DOI: 10.1002/14356007.a22_223
  Shimizu et al. 2000. Shinkichi Shimizu, Nanao Watanabe, Toshiaki Kataoka, Takayuki Shoji, Nobuyuki Abe, Sinji Morishita, Hisao Ichimura: Pyridine and Pyridine Derivatives. In: Ullmann's Encyclopedia of Industrial Chemistry, Seventh Edition, 2009 Electronic Release (ed. Fiedler E., Grossmann G., Kersebohm D., Weiss G. and Witte C.). 7 th Electronic Release Edition. Wiley InterScience, New York, Article Online Posting Date: June 15, 2000. Online-Version under: DOI: 10.1002/14356007.a22_399
  EcoSpold01Location=RER
  Uncertainty: Stoechiometric calculation
  properties: dry mass 1 kg, wet mass 1 kg
- toluene, liquid: 0.1079 kg; source Unger T A 1996; lognormal variance with pedigree 0.076, pedigree (4,5,5,1,1)
  EcoSpold01Location=RER
  Stoichiometric calculation, assuming an efficiency of 95% per reaction step.
  Further references:
  Kim et al. 2003. Kim S., Overcash M.: Energy in chemical manufacturing processes: gate-to-gate information for life cycle assessment. In: Journal of Chemical Technology & Biotechnology vol. 78, no. 9: 995-1005(11). 2003
  Maki et al. 2000. Takao Maki and Kazuo Takeda: Benzoic Acid and Derivatives. In: Ullmann's Encyclopedia of Industrial Chemistry, Seventh Edition, 2009 Electronic Release (ed. Fiedler E., Grossmann G., Kersebohm D., Weiss G. and Witte C.). 7 th Electronic Release Edition. Wiley InterScience, New York, Article Online Posting Date: June 15, 2000. Online-Version under: DOI: 10.1002/14356007.a03_555
  Uncertainty: Stoechiometric calculation
  properties: carbon content, fossil 0.913043, dry mass 1 kg, heating value, net 38.17 MJ, wet mass 1 kg
- trimethylamine: 0.0052049 kg; source Unger T A 1996; lognormal variance with pedigree 0.076, pedigree (4,5,5,1,1)
  (same comment as for 1-pentanol)
  properties: carbon content, fossil 0.610169, dry mass 1 kg, heating value, net 36.92 MJ, wet mass 1 kg
- urea: 0.0161563 kg; source Unger T A 1996; lognormal variance with pedigree 0.076, pedigree (4,5,5,1,1)
  EcoSpold01Location=RER
  The exchange has been updated from 'urea, as N' into 'urea' and therefore its amount has been scaled (multiplied) from 0.0075 kg by 2.1438 kg of 'urea' per kg of 'urea, as N'. Original comment of the exchange is: Stoichiometric calculation, assuming an efficiency of 95% per reaction step.
  Uncertainty: Stoechiometric calculation
  properties: carbon content, fossil 0.2, dry mass 1 kg, wet mass 1 kg
- water, decarbonised: 2.64127e-5, 0.0275738, 0.00152224, 0.0415968, 0.00838571 kg (5 suppliers, which the file names only by identifier); sum of these 0.079105 kg; source Unger T A 1996; lognormal variance with pedigree 0.076, pedigree (4,5,5,1,1)
  Stoichiometric calculation, assuming an efficiency of 100%.
  Further references:
  Arntz et al. 2007. Dietrich Arntz, Achim Fischer, Mathias Höpp, Sylvia Jacobi, Jörg Sauer, Takashi Ohara, Takahisa Sato, Noboru Shimizu, Helmut Schwind: Acrolein and Methacrolein. In: Ullmann's Encyclopedia of Industrial Chemistry, Seventh Edition, 2009 Electronic Release (ed. Fiedler E., Grossmann G., Kersebohm D., Weiss G. and Witte C.). 7 th Electronic Release Edition. Wiley InterScience, New York, Article Online Posting Date: April 15, 2007. Online-Version under: DOI: 10.1002/14356007.a01_149.pub2
  Bauer 2000. William Bauer Jr.: Methacrylic Acid and Derivatives. In: Ullmann's Encyclopedia of Industrial Chemistry, Seventh Edition, 2009 Electronic Release (ed. Fiedler E., Grossmann G., Kersebohm D., Weiss G. and Witte C.). 7 th Electronic Release Edition. Wiley InterScience, New York, Article Online Posting Date: June 15, 2000. Online-Version under: DOI: 10.1002/14356007.a16_441
  Chahal et al. 2006. Surinder P. Chahal and John N. Starr: Lactic Acid. In: Ullmann's Encyclopedia of Industrial Chemistry, Seventh Edition, 2009 Electronic Release (ed. Fiedler E., Grossmann G., Kersebohm D., Weiss G. and Witte C.). 7 th Electronic Release Edition. Wiley InterScience, New York, Article Online Posting Date: January 15, 2006. Online-Version under: DOI: 10.1002/14356007.a15_097.pub2
  Eller et al. 2000. Karsten Eller, Erhard Henkes, Roland Rossbacher, Hartmut Höke: Amines, Aliphatic. In: Ullmann's Encyclopedia of Industrial Chemistry, Seventh Edition, 2009 Electronic Release (ed. Fiedler E., Grossmann G., Kersebohm D., Weiss G. and Witte C.). 7 th Electronic Release Edition. Wiley InterScience, New York, Article Online Posting Date: June 15, 2000. Online-Version under: DOI: 10.1002/14356007.a02_001
  Güthner et al. 2006. Thomas Güthner and Bernd Mertschenk: Cyanamides. In: Ullmann's Encyclopedia of Industrial Chemistry, Seventh Edition, 2009 Electronic Release (ed. Fiedler E., Grossmann G., Kersebohm D., Weiss G. and Witte C.). 7 th Electronic Release Edition. Wiley InterScience, New York, Article Online Posting Date: July 15, 2006. Online-Version under: DOI: 10.1002/14356007.a08_139.pub2
  Güthner et al. 2006. Thomas Güthner, Bernd Mertschenk, Bernd Schulz: Guanidine and Derivatives. In: Ullmann's Encyclopedia of Industrial Chemistry, Seventh Edition, 2009 Electronic Release (ed. Fiedler E., Grossmann G., Kersebohm D., Weiss G. and Witte C.). 7 th Electronic Release Edition. Wiley InterScience, New York, Article Online Posting Date: July 15, 2006. Online-Version under: DOI: 10.1002/14356007.a12_545.pub2
  Laue et al. 2000. Wolfgang Laue, Michael Thiemann, Erich Scheibler, Karl Wilhelm Wiegand: Nitrates and Nitrites. In: Ullmann's Encyclopedia of Industrial Chemistry, Seventh Edition, 2009 Electronic Release (ed. Fiedler E., Grossmann G., Kersebohm D., Weiss G. and Witte C.). 7 th Electronic Release Edition. Wiley InterScience, New York, Article Online Posting Date: June 15, 2000. Online-Version under: DOI: 10.1002/14356007.a17_265
  Ritz et al. 2000. Josef Ritz, Hugo Fuchs, Howard G. Perryman: Hydroxylamine. In: Ullmann's Encyclopedia of Industrial Chemistry, Seventh Edition, 2009 Electronic Release (ed. Fiedler E., Grossmann G., Kersebohm D., Weiss G. and Witte C.). 7 th Electronic Release Edition. Wiley InterScience, New York, Article Online Posting Date: June 15, 2000. Online-Version under: DOI: 10.1002/14356007.a13_527
  Samel et al. 2000. Ulf-Rainer Samel, Walter Kohler, Armin Otto Gamer, Ullrich Keuser: Propionic Acid and Derivatives. In: Ullmann's Encyclopedia of Industrial Chemistry, Seventh Edition, 2009 Electronic Release (ed. Fiedler E., Grossmann G., Kersebohm D., Weiss G. and Witte C.). 7 th Electronic Release Edition. Wiley InterScience, New York, Article Online Posting Date: June 15, 2000. Online-Version under: DOI: 10.1002/14356007.a22_223
  Shimizu et al. 2000. Shinkichi Shimizu, Nanao Watanabe, Toshiaki Kataoka, Takayuki Shoji, Nobuyuki Abe, S
  EcoSpold01Location=RER
  Uncertainty: Stoechiometric calculation
  properties: wet mass 1 kg
- xylene, mixed: 0.038034 kg; source Unger T A 1996; lognormal variance with pedigree 0.076, pedigree (4,5,5,1,1)
  (same comment as for 1-propanol)
  properties: carbon content, fossil 0.905061, dry mass 1 kg, heating value, net 38.84 MJ, wet mass 1 kg
- zinc: 0.0017549 kg; source Unger T A 1996; lognormal variance with pedigree 0.076, pedigree (4,5,5,1,1)
  (same comment as for dimethyl sulfate)
  properties: dry mass 1 kg, wet mass 1 kg
## Inputs from nature
- Bromine [natural resource, in water]: 0.19351 kg; name bromine_input; source Unger T A 1996; lognormal variance with pedigree 0.076, pedigree (4,5,5,1,1)
  0.23% Br in water; Stoichiometric calculation, assuming an efficiency of 95% per reaction step.
  Further references:
  Samel et al. 2000. Ulf-Rainer Samel, Walter Kohler, Armin Otto Gamer, Ullrich Keuser: Propionic Acid and Derivatives. In: Ullmann's Encyclopedia of Industrial Chemistry, Seventh Edition, 2009 Electronic Release (ed. Fiedler E., Grossmann G., Kersebohm D., Weiss G. and Witte C.). 7 th Electronic Release Edition. Wiley InterScience, New York, Article Online Posting Date: June 15, 2000. Online-Version under: DOI: 10.1002/14356007.a22_223
  Uncertainty: Stoechiometric calculation
- Iodine [natural resource, in water]: 0.036874 kg; name iodine_input; source Unger T A 1996; lognormal variance with pedigree 0.076, pedigree (4,5,5,1,1)
  0.03% I; Stoichiometric calculation, assuming an efficiency of 95% per reaction step.
  Further references:
  Lyday 2000. Phyllis A. Lyday: Iodine and Iodine Compounds. In: Ullmann's Encyclopedia of Industrial Chemistry, Seventh Edition, 2009 Electronic Release (ed. Fiedler E., Grossmann G., Kersebohm D., Weiss G. and Witte C.). 7 th Electronic Release Edition. Wiley InterScience, New York, Article Online Posting Date: June 15, 2000. Online-Version under: DOI: 10.1002/14356007.a14_381
  Uncertainty: Stoechiometric calculation
- Water, cooling, unspecified natural origin [natural resource, in water]: 0.13257 m3; name water_cooling_UNO_input; source Gendorf 2000; lognormal variance with pedigree 0.076, pedigree (4,5,5,1,1)
  Estimation (24 kg cooling water per kg produced chemical per step).
  Uncertainty: Estimation
- Water, salt, sole [natural resource, in water]: 0.207048 m3; name water_salt_sole_input; = ((bromine_input/0.0023)+(iodine_input/0.0003))/1000; lognormal variance with pedigree 0.076, pedigree (4,5,5,1,1)
  There are intermediates containing bromine and iodine in this process and this input is used as an input in the bromine and iodine production.
  The concentration of bromine in water, salt, sole is 0.23% = 0.0023kg/kg. Cross-referenced: 0.25% (Ullmann's encyclopedia), 0.4% (USGS). The concentration of iodine in water, salt, sole is 0.03% = 0.0003kg/kg. Cross-referenced: 0.015% - 0.12% (Ullmann's encyclopedia).
  There are intermediates containing bromine and iodine in this process and this input is used as an input in the bromine and iodine production.
  The concentration of bromine in water, salt, sole is 0.23% = 0.0023kg/kg. Cross-referenced: 0.25% (Ullmann's encyclopedia), 0.4% (USGS). The concentration of iodine in water, salt, sole is 0.03% = 0.0003kg/kg. Cross-referenced: 0.015% - 0.12% (Ullmann's encyclopedia).
  Uncertainty: Stoechiometric calculation

## Emissions to nature
- 1-Pentanol [air, urban air close to ground]: 8.3378e-6 kg; lognormal variance with pedigree 0.188, pedigree (4,5,5,5,5)
  Estimation, based on the assumption that 0.2% of volatile input materials is emitted to air occurring from the purge vent, the destillation vent and fugitive emission sources.
  Uncertainty: Estimation
- 1-Pentene [air, urban air close to ground]: 6.3007e-6 kg; lognormal variance with pedigree 0.188, pedigree (4,5,5,5,5)
  (same comment as for 1-Pentanol)
- 2,4-Dichlorophenol [air, urban air close to ground]: 2.2602e-5 kg; lognormal variance with pedigree 0.188, pedigree (4,5,5,5,5)
  (same comment as for 1-Pentanol)
- 2-Aminopropanol [air, urban air close to ground]: 8.8115e-6 kg; lognormal variance with pedigree 0.188, pedigree (4,5,5,5,5)
  (same comment as for 1-Pentanol)
- 2-Nitrobenzoic acid [air, urban air close to ground]: 2.1358e-5 kg; lognormal variance with pedigree 0.188, pedigree (4,5,5,5,5)
  (same comment as for 1-Pentanol)
- Acetaldehyde [air, urban air close to ground]: 0.00013627 kg; lognormal variance with pedigree 0.188, pedigree (4,5,5,5,5)
  (same comment as for 1-Pentanol)
- Acetic acid [air, urban air close to ground]: 0.00010249 kg; lognormal variance with pedigree 0.188, pedigree (4,5,5,5,5)
  (same comment as for 1-Pentanol)
- Acetone [air, urban air close to ground]: 1.7151e-5 kg; lognormal variance with pedigree 0.188, pedigree (4,5,5,5,5)
  (same comment as for 1-Pentanol)
- Acetylene [air, urban air close to ground]: 1.2924e-5 kg; lognormal variance with pedigree 0.188, pedigree (4,5,5,5,5)
  (same comment as for 1-Pentanol)
- Ammonia [air, urban air close to ground]: 0.00024858 kg; lognormal variance with pedigree 0.218, pedigree (4,5,5,5,5)
  (same comment as for 1-Pentanol)
- Aniline [air, urban air close to ground]: 5.4994e-5 kg; lognormal variance with pedigree 0.188, pedigree (4,5,5,5,5)
  (same comment as for 1-Pentanol)
- Anthranilic acid [air, urban air close to ground]: 1.6645e-5 kg; lognormal variance with pedigree 0.188, pedigree (4,5,5,5,5)
  (same comment as for 1-Pentanol)
- Benzene [air, urban air close to ground]: 1.6843e-5 kg; lognormal variance with pedigree 0.188, pedigree (4,5,5,5,5)
  (same comment as for 1-Pentanol)
- Butadiene [air, urban air close to ground]: 5.3736e-6 kg; lognormal variance with pedigree 0.188, pedigree (4,5,5,5,5)
  (same comment as for 1-Pentanol)
- Butanol [air, urban air close to ground]: 1.4872e-5 kg; lognormal variance with pedigree 0.188, pedigree (4,5,5,5,5)
  (same comment as for 1-Pentanol)
- Butene [air, urban air close to ground]: 5.353e-6 kg; lognormal variance with pedigree 0.188, pedigree (4,5,5,5,5)
  (same comment as for 1-Pentanol)
- Carbon dioxide, fossil [air, urban air close to ground]: 0.49288 kg; lognormal variance with pedigree 0.1786, pedigree (4,5,5,5,5)
  Estimation, based on the assumption that 0.2% of volatile input materials is emitted to air occurring from the purge vent, the destillation vent and fugitive emission sources. Remaining gases like CH4 or CO are oxidated to CO2. The carbon contained in the removed carbon compounds from wastewater treatment was accounted as CO2 emissions to air (assuming a removal efficiency of 90%).
  Uncertainty: Estimation
- Carbon disulfide [air, urban air close to ground]: 1.7279e-5 kg; lognormal variance with pedigree 0.188, pedigree (4,5,5,5,5)
  (same comment as for 1-Pentanol)
- Carbon monoxide, fossil [air, urban air close to ground]: 8.2133e-5 kg; lognormal variance with pedigree 0.798, pedigree (4,5,5,5,5)
  (same comment as for 1-Pentanol)
- Chloramine [air, urban air close to ground]: 5.174e-5 kg; lognormal variance with pedigree 0.188, pedigree (4,5,5,5,5)
  (same comment as for 1-Pentanol)
- Chlorine [air, urban air close to ground]: 0.0054021 kg; lognormal variance with pedigree 0.188, pedigree (4,5,5,5,5)
  (same comment as for 1-Pentanol)
- Chloroacetic acid [air, urban air close to ground]: 0.00010406 kg; lognormal variance with pedigree 0.188, pedigree (4,5,5,5,5)
  (same comment as for 1-Pentanol)
- Chloroform [air, urban air close to ground]: 1.0304e-5 kg; lognormal variance with pedigree 0.188, pedigree (4,5,5,5,5)
  (same comment as for 1-Pentanol)
- Chlorosulfonic acid [air, urban air close to ground]: 1.0157e-5 kg; lognormal variance with pedigree 0.188, pedigree (4,5,5,5,5)
  (same comment as for 1-Pentanol)
- Cyanoacetic acid [air, urban air close to ground]: 8.318e-6 kg; lognormal variance with pedigree 0.188, pedigree (4,5,5,5,5)
  (same comment as for 1-Pentanol)
- Dichloromethane [air, urban air close to ground]: 3.7638e-5 kg; lognormal variance with pedigree 0.188, pedigree (4,5,5,5,5)
  (same comment as for 1-Pentanol)
- Diethylamine [air, urban air close to ground]: 2.6214e-5 kg; lognormal variance with pedigree 0.188, pedigree (4,5,5,5,5)
  (same comment as for 1-Pentanol)
- Dimethyl malonate [air, urban air close to ground]: 1.0431e-5 kg; lognormal variance with pedigree 0.188, pedigree (4,5,5,5,5)
  (same comment as for 1-Pentanol)
- Dipropyl amine [air, urban air close to ground]: 1.1733e-5 kg; lognormal variance with pedigree 0.188, pedigree (4,5,5,5,5)
  (same comment as for 1-Pentanol)
- Ethanol [air, urban air close to ground]: 0.00012001 kg; lognormal variance with pedigree 0.188, pedigree (4,5,5,5,5)
  (same comment as for 1-Pentanol)
- Ethyl acetate [air, urban air close to ground]: 1.9554e-5 kg; lognormal variance with pedigree 0.188, pedigree (4,5,5,5,5)
  (same comment as for 1-Pentanol)
- Ethylamine [air, urban air close to ground]: 3.1579e-5 kg; lognormal variance with pedigree 0.188, pedigree (4,5,5,5,5)
  (same comment as for 1-Pentanol)
- Ethylene [air, urban air close to ground]: 5.002e-5 kg; lognormal variance with pedigree 0.188, pedigree (4,5,5,5,5)
  (same comment as for 1-Pentanol)
- Ethylene diamine [air, urban air close to ground]: 6.8208e-6 kg; lognormal variance with pedigree 0.188, pedigree (4,5,5,5,5)
  (same comment as for 1-Pentanol)
- Ethylene dichloride [air, urban air close to ground]: 1.7291e-5 kg; lognormal variance with pedigree 0.188, pedigree (4,5,5,5,5)
  (same comment as for 1-Pentanol)
- Ethylene oxide [air, urban air close to ground]: 3.6014e-6 kg; lognormal variance with pedigree 0.188, pedigree (4,5,5,5,5)
  (same comment as for 1-Pentanol)
- Formaldehyde [air, urban air close to ground]: 0.00011518 kg; lognormal variance with pedigree 0.188, pedigree (4,5,5,5,5)
  (same comment as for 1-Pentanol)
- Formamide [air, urban air close to ground]: 1.5249e-5 kg; lognormal variance with pedigree 0.188, pedigree (4,5,5,5,5)
  (same comment as for 1-Pentanol)
- Formic acid [air, urban air close to ground]: 4.4267e-6 kg; lognormal variance with pedigree 0.188, pedigree (4,5,5,5,5)
  (same comment as for 1-Pentanol)
- Hydrochloric acid [air, urban air close to ground]: 1.9691e-5 kg; lognormal variance with pedigree 0.188, pedigree (4,5,5,5,5)
  (same comment as for 1-Pentanol)
- Hydrogen [air, urban air close to ground]: 0.0004674 kg; lognormal variance with pedigree 0.188, pedigree (4,5,5,5,5)
  (same comment as for 1-Pentanol)
- Hydrogen sulfide [air, urban air close to ground]: 1.6342e-5 kg; lognormal variance with pedigree 0.188, pedigree (4,5,5,5,5)
  (same comment as for 1-Pentanol)
- Isobutanol [air, urban air close to ground]: 2.7008e-5 kg; lognormal variance with pedigree 0.188, pedigree (4,5,5,5,5)
  (same comment as for 1-Pentanol)
- Isopropanol [air, urban air close to ground]: 1.7115e-5 kg; lognormal variance with pedigree 0.188, pedigree (4,5,5,5,5)
  (same comment as for 1-Pentanol)
- Isopropylamine [air, urban air close to ground]: 1.5147e-5 kg; lognormal variance with pedigree 0.188, pedigree (4,5,5,5,5)
  (same comment as for 1-Pentanol)
- Lactic acid [air, urban air close to ground]: 9.1913e-6 kg; lognormal variance with pedigree 0.188, pedigree (4,5,5,5,5)
  (same comment as for 1-Pentanol)
- Methane, fossil [air, urban air close to ground]: 7.1929e-5 kg; lognormal variance with pedigree 0.188, pedigree (4,5,5,5,5)
  (same comment as for 1-Pentanol)
- Methanesulfonic acid [air, urban air close to ground]: 8.4056e-6 kg; lognormal variance with pedigree 0.188, pedigree (4,5,5,5,5)
  (same comment as for 1-Pentanol)
- Methanol [air, urban air close to ground]: 0.00011534 kg; lognormal variance with pedigree 0.188, pedigree (4,5,5,5,5)
  (same comment as for 1-Pentanol)
- Methyl acetate [air, urban air close to ground]: 4.9454e-6 kg; lognormal variance with pedigree 0.188, pedigree (4,5,5,5,5)
  (same comment as for 1-Pentanol)
- Methyl lactate [air, urban air close to ground]: 1.009e-5 kg; lognormal variance with pedigree 0.188, pedigree (4,5,5,5,5)
  (same comment as for 1-Pentanol)
- Methylamine [air, urban air close to ground]: 6.5258e-6 kg; lognormal variance with pedigree 0.188, pedigree (4,5,5,5,5)
  (same comment as for 1-Pentanol)
- Nitrogen oxides [air, urban air close to ground]: 0.0065548 kg; lognormal variance with pedigree 0.188, pedigree (4,5,5,5,5)
  (same comment as for 1-Pentanol)
- Phenol [air, urban air close to ground]: 0.0001773 kg; lognormal variance with pedigree 0.188, pedigree (4,5,5,5,5)
  (same comment as for 1-Pentanol)
- Propanal [air, urban air close to ground]: 2.6255e-5 kg; lognormal variance with pedigree 0.188, pedigree (4,5,5,5,5)
  (same comment as for 1-Pentanol)
- Propane [air, urban air close to ground]: 3.2851e-5 kg; lognormal variance with pedigree 0.188, pedigree (4,5,5,5,5)
  (same comment as for 1-Pentanol)
- Propanol [air, urban air close to ground]: 9.6683e-6 kg; lognormal variance with pedigree 0.188, pedigree (4,5,5,5,5)
  (same comment as for 1-Pentanol)
- Propionic acid [air, urban air close to ground]: 4.1984e-5 kg; lognormal variance with pedigree 0.188, pedigree (4,5,5,5,5)
  (same comment as for 1-Pentanol)
- Propyl amine [air, urban air close to ground]: 4.8291e-6 kg; lognormal variance with pedigree 0.188, pedigree (4,5,5,5,5)
  (same comment as for 1-Pentanol)
- Propylene [air, urban air close to ground]: 2.1682e-5 kg; lognormal variance with pedigree 0.188, pedigree (4,5,5,5,5)
  (same comment as for 1-Pentanol)
- Propylene oxide [air, urban air close to ground]: 1.3357e-5 kg; lognormal variance with pedigree 0.188, pedigree (4,5,5,5,5)
  (same comment as for 1-Pentanol)
- Sulfur dioxide [air, urban air close to ground]: 0.03604 kg; lognormal variance with pedigree 0.1786, pedigree (4,5,5,5,5)
  (same comment as for 1-Pentanol)
- Sulfur trioxide [air, urban air close to ground]: 0.000498 kg; lognormal variance with pedigree 0.188, pedigree (4,5,5,5,5)
  (same comment as for 1-Pentanol)
- Toluene [air, urban air close to ground]: 0.00034027 kg; lognormal variance with pedigree 0.188, pedigree (4,5,5,5,5)
  (same comment as for 1-Pentanol)
- Trimethylamine [air, urban air close to ground]: 1.041e-5 kg; lognormal variance with pedigree 0.188, pedigree (4,5,5,5,5)
  (same comment as for 1-Pentanol)
- Water [air, unspecified]: 0.0938464 m3; name water_to_air_unspecified; = (water_decarbonised_input/1000*fraction_WDC_to_air)+(water_cooling_UNO_input*fraction_CW_to_air)+(water_salt_sole_input*fraction_PW_to_air); lognormal variance with pedigree 0.0807, pedigree (2,2,5,1,1)
  Calculated value based on literature values and expert opinion. See comments in the parametres' comment field.
  property fraction, origin: fresh water 0.000326631; name fraction_origin_fresh_water
  property fraction, origin: salt water 0.45228; name fraction_origin_salt_water
  property fraction, origin: unspecified 0.547393; name fraction_origin_unspecified
- m-Xylene [air, urban air close to ground]: 1.2324e-5 kg; lognormal variance with pedigree 0.188, pedigree (4,5,5,5,5)
  (same comment as for 1-Pentanol)
- o-Chlorotoluene [air, urban air close to ground]: 4.6641e-5 kg; lognormal variance with pedigree 0.188, pedigree (4,5,5,5,5)
  (same comment as for 1-Pentanol)
- o-Dichlorobenzene [air, urban air close to ground]: 6.5908e-5 kg; lognormal variance with pedigree 0.188, pedigree (4,5,5,5,5)
  (same comment as for 1-Pentanol)
- o-Nitrotoluene [air, urban air close to ground]: 1.8443e-5 kg; lognormal variance with pedigree 0.188, pedigree (4,5,5,5,5)
  (same comment as for 1-Pentanol)
- t-Butyl amine [air, urban air close to ground]: 1.4583e-5 kg; lognormal variance with pedigree 0.188, pedigree (4,5,5,5,5)
  (same comment as for 1-Pentanol)
- 1-Pentanol [water, surface water]: 2.0011e-5 kg; lognormal variance with pedigree 0.448, pedigree (4,5,5,5,5)
  Estimation, assuming that the remaining amount of unreacted input materials leave the production process with the wastewater, wich is further treated in an internal wastewater plant.
  Uncertainty: Estimation
- 1-Pentene [water, surface water]: 1.5122e-5 kg; lognormal variance with pedigree 0.448, pedigree (4,5,5,5,5)
  (same comment as for 1-Pentanol)
- 2-Aminopropanol [water, surface water]: 2.1148e-5 kg; lognormal variance with pedigree 0.448, pedigree (4,5,5,5,5)
  Estimation, assuming that the remaining amount of unreacted input materials leave the production process with the wastewater, wich is further treated in an internal wastewater plant. For the nitrogen containing compounds within the wastewater a removal efficiency of 50% was assumed. The nitrogen emitted to air (N2) is neglected.
  Uncertainty: Estimation
- Acetaldehyde [water, surface water]: 0.00094336 kg; lognormal variance with pedigree 0.448, pedigree (4,5,5,5,5)
  (same comment as for 1-Pentanol)
- Acetic acid [water, surface water]: 0.00087028 kg; lognormal variance with pedigree 0.448, pedigree (4,5,5,5,5)
  (same comment as for 1-Pentanol)
- Acetone [water, surface water]: 4.88e-5 kg; lognormal variance with pedigree 0.448, pedigree (4,5,5,5,5)
  (same comment as for 1-Pentanol)
- Acetonitrile [water, surface water]: 6.9652e-6 kg; lognormal variance with pedigree 0.448, pedigree (4,5,5,5,5)
  (same comment as for 2-Aminopropanol)
- Acetyl chloride [water, surface water]: 1.572e-5 kg; lognormal variance with pedigree 0.448, pedigree (4,5,5,5,5)
  (same comment as for 1-Pentanol)
- Aluminium III [water, surface water]: 6.1804e-5 kg; lognormal variance with pedigree 0.798, pedigree (4,5,5,5,5)
  (same comment as for 1-Pentanol)
- Ammonium [water, surface water]: 0.0091823 kg; lognormal variance with pedigree 0.188, pedigree (4,5,5,5,5)
  (same comment as for 2-Aminopropanol)
- Aniline [water, surface water]: 0.00013199 kg; lognormal variance with pedigree 0.448, pedigree (4,5,5,5,5)
  (same comment as for 2-Aminopropanol)
- Benzene [water, surface water]: 4.0422e-5 kg; lognormal variance with pedigree 0.448, pedigree (4,5,5,5,5)
  (same comment as for 1-Pentanol)
- Borate [water, surface water]: 0.0027195 kg; lognormal variance with pedigree 0.448, pedigree (4,5,5,5,5)
  (same comment as for 1-Pentanol)
- Boron [water, surface water]: 2.3974e-5 kg; lognormal variance with pedigree 0.798, pedigree (4,5,5,5,5)
  (same comment as for 1-Pentanol)
- Bromide [water, surface water]: 0.16889 kg; lognormal variance with pedigree 0.798, pedigree (4,5,5,5,5)
  (same comment as for 1-Pentanol)
- Butanol [water, surface water]: 3.5694e-5 kg; lognormal variance with pedigree 0.448, pedigree (4,5,5,5,5)
  (same comment as for 1-Pentanol)
- Butene [water, surface water]: 1.2847e-5 kg; lognormal variance with pedigree 0.448, pedigree (4,5,5,5,5)
  (same comment as for 1-Pentanol)
- Calcium II [water, surface water]: 0.011237 kg; lognormal variance with pedigree 0.448, pedigree (4,5,5,5,5)
  (same comment as for 1-Pentanol)
- Carbon disulfide [water, surface water]: 4.147e-5 kg; lognormal variance with pedigree 0.448, pedigree (4,5,5,5,5)
  (same comment as for 1-Pentanol)
- Carbonate [water, surface water]: 0.01811 kg; lognormal variance with pedigree 0.448, pedigree (4,5,5,5,5)
  (same comment as for 1-Pentanol)
- Chloramine [water, surface water]: 0.0004617 kg; lognormal variance with pedigree 0.448, pedigree (4,5,5,5,5)
  (same comment as for 2-Aminopropanol)
- Chloride [water, surface water]: 0.68736 kg; lognormal variance with pedigree 0.448, pedigree (4,5,5,5,5)
  (same comment as for 1-Pentanol)
- Chloroacetic acid [water, surface water]: 0.0028044 kg; lognormal variance with pedigree 0.448, pedigree (4,5,5,5,5)
  (same comment as for 1-Pentanol)
- Chloroacetyl chloride [water, surface water]: 2.8204e-5 kg; lognormal variance with pedigree 0.448, pedigree (4,5,5,5,5)
  (same comment as for 1-Pentanol)
- Chloroform [water, surface water]: 2.4729e-5 kg; lognormal variance with pedigree 0.448, pedigree (4,5,5,5,5)
  (same comment as for 1-Pentanol)
- Chlorosulfonic acid [water, surface water]: 2.5328e-5 kg; lognormal variance with pedigree 0.448, pedigree (4,5,5,5,5)
  (same comment as for 1-Pentanol)
- Dichloromethane [water, surface water]: 6.4744e-5 kg; lognormal variance with pedigree 0.448, pedigree (4,5,5,5,5)
  (same comment as for 1-Pentanol)
- Diethylamine [water, surface water]: 6.2914e-5 kg; lognormal variance with pedigree 0.448, pedigree (4,5,5,5,5)
  (same comment as for 2-Aminopropanol)
- Dimethylamine [water, surface water]: 0.00029493 kg; lognormal variance with pedigree 0.448, pedigree (4,5,5,5,5)
  (same comment as for 2-Aminopropanol)
- Dipropyl amine [water, surface water]: 2.816e-5 kg; lognormal variance with pedigree 0.448, pedigree (4,5,5,5,5)
  (same comment as for 2-Aminopropanol)
- Ethanol [water, surface water]: 0.0022332 kg; lognormal variance with pedigree 0.448, pedigree (4,5,5,5,5)
  (same comment as for 1-Pentanol)
- Ethyl acetate [water, surface water]: 4.693e-5 kg; lognormal variance with pedigree 0.448, pedigree (4,5,5,5,5)
  (same comment as for 1-Pentanol)
- Ethylamine [water, surface water]: 7.579e-5 kg; lognormal variance with pedigree 0.448, pedigree (4,5,5,5,5)
  (same comment as for 2-Aminopropanol)
- Ethylene [water, surface water]: 0.0001021 kg; lognormal variance with pedigree 0.448, pedigree (4,5,5,5,5)
  (same comment as for 1-Pentanol)
- Ethylene diamine [water, surface water]: 1.637e-5 kg; lognormal variance with pedigree 0.448, pedigree (4,5,5,5,5)
  (same comment as for 2-Aminopropanol)
- Ethylene dichloride [water, surface water]: 4.1498e-5 kg; lognormal variance with pedigree 0.448, pedigree (4,5,5,5,5)
  (same comment as for 1-Pentanol)
- Ethylene oxide [water, surface water]: 8.6433e-6 kg; lognormal variance with pedigree 0.448, pedigree (4,5,5,5,5)
  (same comment as for 1-Pentanol)
- Fluoride [water, surface water]: 0.0029001 kg; lognormal variance with pedigree 0.188, pedigree (4,5,5,5,5)
  (same comment as for 1-Pentanol)
- Formaldehyde [water, surface water]: 0.00041623 kg; lognormal variance with pedigree 0.448, pedigree (4,5,5,5,5)
  (same comment as for 1-Pentanol)
- Formamide [water, surface water]: 3.6598e-5 kg; lognormal variance with pedigree 0.448, pedigree (4,5,5,5,5)
  (same comment as for 2-Aminopropanol)
- Formate [water, surface water]: 0.0044947 kg; lognormal variance with pedigree 0.448, pedigree (4,5,5,5,5)
  (same comment as for 1-Pentanol)
- Formic acid [water, surface water]: 1.0624e-5 kg; lognormal variance with pedigree 0.448, pedigree (4,5,5,5,5)
  (same comment as for 1-Pentanol)
- Iodide [water, surface water]: 0.018936 kg; lognormal variance with pedigree 0.798, pedigree (4,5,5,5,5)
  (same comment as for 1-Pentanol)
- Isobutanol [water, surface water]: 6.4818e-5 kg; lognormal variance with pedigree 0.448, pedigree (4,5,5,5,5)
  (same comment as for 1-Pentanol)
- Isopropanol [water, surface water]: 8.3865e-5 kg; lognormal variance with pedigree 0.448, pedigree (4,5,5,5,5)
  (same comment as for 1-Pentanol)
- Isopropylamine [water, surface water]: 3.6353e-5 kg; lognormal variance with pedigree 0.448, pedigree (4,5,5,5,5)
  (same comment as for 2-Aminopropanol)
- Lactic acid [water, surface water]: 2.2059e-5 kg; lognormal variance with pedigree 0.448, pedigree (4,5,5,5,5)
  (same comment as for 1-Pentanol)
- Lithium I [water, surface water]: 0.00067884 kg; lognormal variance with pedigree 0.798, pedigree (4,5,5,5,5)
  (same comment as for 1-Pentanol)
- Manganese II [water, surface water]: 0.00014849 kg; lognormal variance with pedigree 0.798, pedigree (4,5,5,5,5)
  (same comment as for 1-Pentanol)
- Methanol [water, surface water]: 0.00094956 kg; lognormal variance with pedigree 0.448, pedigree (4,5,5,5,5)
  (same comment as for 1-Pentanol)
- Methyl acetate [water, surface water]: 1.1869e-5 kg; lognormal variance with pedigree 0.448, pedigree (4,5,5,5,5)
  (same comment as for 1-Pentanol)
- Methylamine [water, surface water]: 1.5662e-5 kg; lognormal variance with pedigree 0.448, pedigree (4,5,5,5,5)
  (same comment as for 2-Aminopropanol)
- Monochlorobenzene [water, surface water]: 6.8077e-5 kg; lognormal variance with pedigree 0.448, pedigree (4,5,5,5,5)
  (same comment as for 1-Pentanol)
- Nitrate [water, surface water]: 0.0077193 kg; lognormal variance with pedigree 0.188, pedigree (4,5,5,5,5)
  (same comment as for 2-Aminopropanol)
- Phenol [water, surface water]: 0.00036206 kg; lognormal variance with pedigree 0.448, pedigree (4,5,5,5,5)
  (same comment as for 1-Pentanol)
- Phosphate [water, surface water]: 0.0045233 kg; lognormal variance with pedigree 0.188, pedigree (4,5,5,5,5)
  (same comment as for 1-Pentanol)
- Phosphorus [water, surface water]: 0.00061333 kg; lognormal variance with pedigree 0.188, pedigree (4,5,5,5,5)
  (same comment as for 1-Pentanol)
- Potassium I [water, surface water]: 0.004217 kg; lognormal variance with pedigree 0.798, pedigree (4,5,5,5,5)
  (same comment as for 1-Pentanol)
- Propanal [water, surface water]: 2.8968e-5 kg; lognormal variance with pedigree 0.448, pedigree (4,5,5,5,5)
  (same comment as for 1-Pentanol)
- Propanol [water, surface water]: 3.6845e-5 kg; lognormal variance with pedigree 0.448, pedigree (4,5,5,5,5)
  (same comment as for 1-Pentanol)
- Propionic acid [water, surface water]: 0.00010076 kg; lognormal variance with pedigree 0.448, pedigree (4,5,5,5,5)
  (same comment as for 1-Pentanol)
- Propyl amine [water, surface water]: 1.159e-5 kg; lognormal variance with pedigree 0.448, pedigree (4,5,5,5,5)
  (same comment as for 1-Pentanol)
- Propylene [water, surface water]: 5.2038e-5 kg; lognormal variance with pedigree 0.448, pedigree (4,5,5,5,5)
  (same comment as for 1-Pentanol)
- Propylene oxide [water, surface water]: 3.2058e-5 kg; lognormal variance with pedigree 0.448, pedigree (4,5,5,5,5)
  (same comment as for 1-Pentanol)
- Silicon [water, surface water]: 0.00012636 kg; lognormal variance with pedigree 0.798, pedigree (4,5,5,5,5)
  (same comment as for 1-Pentanol)
- Sodium I [water, surface water]: 0.46711 kg; lognormal variance with pedigree 0.798, pedigree (4,5,5,5,5)
  (same comment as for 1-Pentanol)
- Sulfate [water, surface water]: 0.059365 kg; lognormal variance with pedigree 0.188, pedigree (4,5,5,5,5)
  (same comment as for 1-Pentanol)
- Sulfide [water, surface water]: 0.010732 kg; lognormal variance with pedigree 0.188, pedigree (4,5,5,5,5)
  (same comment as for 1-Pentanol)
- Sulfur [water, surface water]: 0.00059237 kg; lognormal variance with pedigree 0.188, pedigree (4,5,5,5,5)
  (same comment as for 1-Pentanol)
- Toluene [water, surface water]: 0.00033032 kg; lognormal variance with pedigree 0.448, pedigree (4,5,5,5,5)
  (same comment as for 1-Pentanol)
- Trimethylamine [water, surface water]: 2.4984e-5 kg; lognormal variance with pedigree 0.448, pedigree (4,5,5,5,5)
  (same comment as for 2-Aminopropanol)
- Urea [water, surface water]: 4.6493e-5 kg; lognormal variance with pedigree 0.448, pedigree (4,5,5,5,5)
  (same comment as for 2-Aminopropanol)
- Water [water, unspecified]: 0.245851 m3; name water_to_water_unspecified; = (water_decarbonised_input/1000)*(1-fraction_WDC_to_air)+water_cooling_UNO_input*(1-fraction_CW_to_air)+water_salt_sole_input*(1-fraction_PW_to_air); lognormal variance with pedigree 0.0807, pedigree (2,2,5,1,1)
  (same comment as for Water)
  property carbon content, fossil 0; name C_content_fossil
  property carbon content, non-fossil 0; name C_content_non_fossil
  property dry mass 0 kg; name DM
  property fraction, origin: fresh water 0.000197078; name fraction_origin_fresh_water_Ww
  property fraction, origin: salt water 0.669525; name fraction_origin_salt_water_Ww
  property fraction, origin: unspecified 0.330278; name fraction_origin_unspecified_Ww
  property water in wet mass 1000 kg; name WWM
  property wet mass 1000 kg; name WM
- Zinc II [water, surface water]: 0.00016287 kg; lognormal variance with pedigree 0.798, pedigree (4,5,5,5,5)
  (same comment as for 1-Pentanol)
- m-Xylene [water, surface water]: 2.9577e-5 kg; lognormal variance with pedigree 0.448, pedigree (4,5,5,5,5)
  (same comment as for 1-Pentanol)
- o-Chlorotoluene [water, surface water]: 7.035e-5 kg; lognormal variance with pedigree 0.448, pedigree (4,5,5,5,5)
  (same comment as for 1-Pentanol)
- o-Dichlorobenzene [water, surface water]: 9.0713e-5 kg; lognormal variance with pedigree 0.448, pedigree (4,5,5,5,5)
  (same comment as for 1-Pentanol)
- t-Butyl amine [water, surface water]: 3.4999e-5 kg; lognormal variance with pedigree 0.448, pedigree (4,5,5,5,5)
  (same comment as for 2-Aminopropanol)

## Sampling procedure
Literature data

## Review by Thomas Nemecek 2010-03-27
automatic validation in Excel
none

## Review by Roland Hischier 2011-10-05
Transfer of documentation done.
