# wheat seed production, for sowing

Dataset: EcoSpold 2, unit process
Geography: GLO
Time period: 1999-01-01 to 2023-12-31
Technology level: current
Classification: EcoSpold01Categories: agricultural means of production/seed
Classification: ISIC rev.4 ecoinvent: 0164:Seed processing for propagation
Synonyms: Triticum aestivum L.
Scenario: Business-as-Usual
System model: Allocation, cut-off by classification
Share of production covered: 66 %
Generated by: Thomas Nemecek
Published in: Nemecek, T. 2007
Database: ecoinvent
isCopyrightProtected: true
accessRestrictedTo: 1

## General comment
Refers to 1 kg of wheat seed (fresh weight), with a maximum water content of 15%
[This dataset was already contained in the ecoinvent database version 2. It was not individually updated during the transfer to ecoinvent version 3. Life Cycle Impact Assessment results may still have changed, as they are affected by changes in the supply chain, i.e. in other datasets. This dataset was generated following the ecoinvent quality guidelines for version 2. It may have been subject to central changes described in the ecoinvent version 3 change report (http://www.ecoinvent.org/database/ecoinvent-version-3/reports-of-changes/), and the results of the central updates were reviewed extensively. The changes added e.g. consistent water flows and other information throughout the database. The documentation of this dataset can be found in the ecoinvent reports of version 2, which are still available via the ecoinvent website. The change report linked above covers all central changes that were made during the conversion process.]

## Included activities start
The activity starts after harvest.

## Included activities end
The seed is processed in the processing centre, treated (pre-cleaning, cleaning, eventually drying, chemical dressing (for integrated production) and bag filling), stored and afterwards transported to the regional storage centre. No data on wastewater production were available.

## Technology
Refers to average seed processing

## Time period
Date of the major data sources.

## Reference product
- wheat seed, for sowing: 1 kg; name wheat_seed_sowing; By-product classification allocatable product; CPC 01111: Wheat, seed; HS2017 100191: Cereals; wheat and meslin, other than durum wheat, seed
  production volume 3.17528e10 kg
    FAOSTAT 2011: "wheat", average of the years 1999-2002. http://faostat.fao.org/. The original value was split into conventional/integrated seed (98%) and organic seed (2%), where 2% organic production is an extrapolation from Europe to the world (http://www.fao.org/docrep/004/y3557e/y3557e09.htm).
  property carbon content, fossil 0; name REF_PRODUCT_C_content_fossil
    fossil carbon content on a dry matter basis
  property carbon content, non-fossil 0.447696; name REF_PRODUCT_C_content_non_fossil
    biogene carbon content on a dry matter basis; Composition data obtained from Wheat, soft red winter, in (http://www.nal.usda.gov/fnic/foodcomp/search/). First, composition data were refered to 1 kg dry mass. Then, C-contents were calculated considering a C-content/dry mass of 44% in carbohydrates (including fibres), 53% in proteins and 75% in fats. All data from ecoinvent report, n 15a, pg 40, except C-content in protein, that comes from Determination of protein concentration by total organic carbon analysis, Rouwenhorst et al., 1991, J Biochem and Biophys Methods, 22:119-128.
  property dry mass 0.85 kg; name REF_PRODUCT_DM
  property energy content 15.3935 MJ; name REF_PRODUCT_energy_content
    as gross calorific value (when relevant)
  property price 0.225619 EUR2005
    Calculated based on inputs: The price of the product has been calculated as a sum of the values of the material and energy inputs for this product. This value is therefore a rough estimation. It may underestimate the real price since there are additional expenses when producing any product. These expences can include for example labour costs, treatment of waste materials and profit for the producer. Please consider carefully whether this level of data quality is acceptable for your application.
  property water content 0.176471; name REF_PRODUCT_water_content; = (1-REF_PRODUCT_DM)/REF_PRODUCT_DM
  property water in wet mass 0.15 kg; name REF_PRODUCT_WWM; = 1-REF_PRODUCT_DM
  property wet mass 1 kg; name REF_PRODUCT_WM
  properties: carbon allocation 0.380541 kg, carbon content 0.447696

## Inputs from technosphere
- building, multi-storey: 2e-5 m3; lognormal variance with pedigree 0.4126, pedigree (5,3,5,5,1)
  EcoSpold01Location=RER
  See "01_crop production - seed production & processing_v1.0.pdf" - pdf-document on the dedicated talk page of ecoinvent (www.ecoinvent.org/documentation)
- diphenylether-compound: 0.0001 kg; lognormal variance with pedigree 0.0527, pedigree (2,2,5,5,1)
  EcoSpold01Location=CH
  See "01_crop production - seed production & processing_v1.0.pdf" - pdf-document on the dedicated talk page of ecoinvent (www.ecoinvent.org/documentation)
  properties: carbon content, fossil 0.560061, dry mass 1 kg, wet mass 1 kg
  note on carbon content, fossil: C content of diphenylether-compounds was calculated after the C content of thepesticides aclonifen and diflufenican classified as diphenylether-compound in Tab 2.25 of Sutter 2010
- electricity, low voltage: 0.024 kWh; lognormal variance with pedigree 0.0532, pedigree (2,3,5,5,1)
  (same comment as for diphenylether-compound)
- packaging, for pesticides: 0.0002 kg; lognormal variance with pedigree 0.0912, pedigree (4,3,5,5,4)
  Total amount of active substance/s of pesticides needed for the production of wheat seed, for sowing is calculated to be circa 1.00E-04 kg. Pesticide/s used in this dataset is/are: 'diphenylether-compound'. The total amount of active substance/s is doubled in order to account for the packaging of the dilluted product of pesticide/s that is/are applied. Therefore, 2.00E-04 kg of packaging for pesticides is justified with this exchange.
  properties: carbon content, fossil 0.85714, dry mass 1 kg, heating value, net 25.97 MJ, price 0.0642 EUR2005, wet mass 1 kg
- wheat grain: 0.943895, 0.0508117, 0.00529312 kg (3 suppliers, which the file names only by identifier); sum of these 1 kg; lognormal variance with pedigree 0.042, pedigree (1,1,5,5,1)
  See "01_crop production - seed production & processing_v1.0.pdf" - pdf-document on the dedicated talk page of ecoinvent (www.ecoinvent.org/documentation)
  properties: carbon content, non-fossil 0.464601, dry mass 0.85 kg, water content 0.176471, wet mass 1 kg
  note on carbon content, non-fossil: Composition data obtained from Wheat, soft red winter, in (http://www.nal.usda.gov/fnic/foodcomp/search/). First, composition data were refered to 1 kg dry mass. Then, C-contents were calculated considering a C-content/dry mass of 46% in carbohydrates (including fibres), 53% in proteins and 75% in fats. All data from "Evolutionary and Biochemical Aspects", A.D. Kay and T. Vrede (in Global Ecology, 2010, Elsevier B.V., S.E. Jørgensen Ed.).

## Inputs from nature
- Occupation, construction site [natural resource, land]: 8e-6 m2*year; lognormal variance with pedigree 0.1626, pedigree (5,3,5,5,1)
  (same comment as for wheat grain)
- Occupation, industrial area [natural resource, land]: 0.0002 m2*year; lognormal variance with pedigree 0.1626, pedigree (5,3,5,5,1)
  (same comment as for wheat grain)
- Transformation, from unspecified [natural resource, land]: 4e-6 m2; lognormal variance with pedigree 0.2226, pedigree (5,3,5,5,1)
  (same comment as for wheat grain)
- Transformation, to industrial area [natural resource, land]: 4e-6 m2; lognormal variance with pedigree 0.2226, pedigree (5,3,5,5,1)
  (same comment as for wheat grain)

## Sampling procedure
Data based on a literature, expert information and enquiry of seed processing plants.

## Extrapolations
Production of imported seed is approximated by seed produced in Switzerland. This dataset has been copied from an original dataset covering the geography CH. The uncertainty has been adjusted accordingly.
