# electricity production, coal, aluminium industry

Dataset: EcoSpold 2, unit process
Geography: UN-OCEANIA
Time period: 2015-01-01 to 2023-12-31
Technology level: current
Classification: EcoSpold01Categories: hard coal/power plants
Classification: ISIC rev.4 ecoinvent: 3510:Electric power generation, transmission and distribution
Tags: electricity, primary aluminium industry; re-labelling activity
Scenario: Business-as-Usual
System model: Allocation, cut-off by classification
Generated by: Pascal Lesage
Database: ecoinvent
isCopyrightProtected: true
accessRestrictedTo: 1

## General comment
This is a dataset used to create an aluminium industry specific electricity market for 'aluminium production Area 7' (Oceania). The production volume represents the total amount of electricity from coal used in 'aluminium production Area 7' (Oceania) for aluminium production (electrolysis and ingot casting).
Electricity markets specific to the aluminium-industry are needed in an LCI database because primary aluminium production is very energy intensive, and hence the location of production plants is often determined by access to large amounts of cheap electricity, which often results in an electricity mix that is different from the general grid mix of the countries where the production plants are located.
It is assumed that the production of electricity in general and in aluminium industry specific power plants is identical. Details on actual electricity generation with each technology can be found in the corresponding datasets.
The share of electricity produced using lignite and hard coal is calculated using both (1) estimates of the share of coal electricity coming from Australia and New Zealand; and (2) ecoinvent v3.2 country-specific split of coal power plants between hard coal and lignite. The share of coal electricity in each country was calculated by distributing the total coal electricity used in aluminium production in the region as reported by the International Aluminium Institute (IAI). The distribution is weighted by country-specific aluminium production volumes (source: IAI personal communication) and general grid mix in the respective countries (source: International Energy Agency). ecoinvent v3.2 country-specific split of coal types used in coal power plants for Australia. For New Zealand, whose electricity production is not modelled in ecoinvent v3.2, coal-based electricity is assumed to be 78% hard coal, 22% lignite (based on 'rest of world' data, i.e. on data representing all regions not covered in ecoinvent v3.2).
Calculations are detailed in the report 'Calculating grid mixes for the aluminium industry in ecoinvent v3', available on the ecoinvent website.

## Included activities start
Re-labelling dataset, not representing a real transformation activity. Conceptually, the activity can be said to start with the production of electricity.

## Included activities end
Re-labelling dataset, not representing a real transformation activity. Conceptually, the activity can be said to end with a given amount of high voltage electricity labelled as specifically used for the production of electricity.

## Geography
Aluminium producing Oceania countries (AU, NZ)

## Time period
Production volume updated with 2015 data from IAI

## Reference product
- electricity, high voltage, aluminium industry: 1 kWh; = hard_AU +hard_RoW+lig_AU+ lig_RoW; By-product classification allocatable product; CPC 17100: Electrical energy; HS2017 271600: Electrical energy
  Expressed as sum of contributing technologies (inputs) to allow uncertainty analysis: each technology share is uncertain, and in a Monte Carlo analysis will always be normalized by the sum contribution of each technology
  production volume 2.19e10 kWh
    The production volume, which is ultimately used to determine the share of coal-based electricity in the downstream market for aluminium industry specific high voltage electricity, is calculated by multiplying the following data:
    (1) public estimates of the electricity mix used to produce aluminium in the 'aluminium production area 7' (Oceania), provided by the International Aluminium Institute (IAI), see http://www.world-aluminium.org/statistics/. These estimates are based on the subset of aluminium producers that provide information to the IAI.
    (2) primary aluminium production volumes of each aluminium producing country in Area 7, also provided by IAI.
    (3) global average electricity requirements, per tonne primary aluminium, for both Söderberg and prebake electrolysis technologies, as well as the Area 7-specific proportion of aluminium produced by each technology.
    (4) electricity compensating line and transformation losses from production to consumption as medium voltage electricity. Losses estimated using country-level ecoinvent v3 data for AU and estimated based on rest of world data for NZ.
    (5) electricity consumed in ingot casting.
  property price 0.0977 EUR2005
    Calculated in temporary price data. 94% of the average price (to account for a 6% loss in transformation and transmission) for electricity for industrial consumersin 2005 (excluded taxes). From IEA.
  properties: carbon allocation 0 kg, carbon content 0

## Inputs from technosphere
- electricity, high voltage: 0.0194187 kWh; name hard_RoW; lognormal variance with pedigree 0.0252, pedigree (4,5,4,1,2)
  Calculated amount (see general comments). Activity link to GLO due to the electricity production of some aluminium producing countries not being modeled in ecoinvent, see general comments.
- electricity, high voltage: 0.0056105 kWh; name lig_RoW; lognormal variance with pedigree 0.0252, pedigree (4,5,4,1,2)
  (same comment as for electricity, high voltage)
- electricity, high voltage: 0.788111 kWh; name lig_AU; lognormal variance with pedigree 0.0113, pedigree (3,2,4,1,2)
  Calculated amount (see general comments).
- electricity, high voltage: 0.18686 kWh; name hard_AU; lognormal variance with pedigree 0.0113, pedigree (3,2,4,1,2)
  Calculated amount (see general comments).

## Sampling procedure
International Aluminium Institute (IAI) data used for total electricity used in the production of aluminium that is from coal power plants. ecoinvent data used to split coal-based electricity production to the respective fuels (lignite, hard coal). The cited 100% representativeness is for IAI data (data based on 100% of regional aluminium production). The percent representativeness of data used to split coal based electricity production to different fuels (national grid proxy) is 97%, since that proportion of coal electricity for aluminium production is found in Australia.

## Extrapolations
For the split of coal-based electricity production to the respective fuels (lignite, hard coal), shares of different types of coal power plants in the countries, when available, were used as a proxy for the split relevant for the aluminium industry, else 'Rest-of-world' split (33% lignite, 67% hard coal) was used, see general comments.
