# tap water production, underground water with disinfection

Dataset: EcoSpold 2, unit process
Geography: CA-QC
Time period: 2012-01-01 to 2023-12-31
Technology level: current
Classification: ISIC rev.4 ecoinvent: 3600:Water collection, treatment and supply
Classification: EcoSpold01Categories: water supply/production
Synonyms: potable water
Scenario: Business-as-Usual
System model: Allocation, cut-off by classification
Share of production covered: 2 %
Generated by: Marylène Dussault
Database: ecoinvent
isCopyrightProtected: true
accessRestrictedTo: 1

## General comment
This dataset represents production of 1 kg of tap water under pressure at facility gate, ready for distribution in network. This dataset is approximating the inventory for underground water pumping and disinfection using chlorine using data from two facilities of different technology in Quebec. Chlorine consumption is estimated using data from the artificial recharged wells dataset and energy inputs are estimated using data from underground water without treatment dataset.

## Included activities start
From the intake pumping of raw surface water into the water treatment plant.

## Included activities end
This dataset ends with the production of tap water, at facility gate, under pressure. It includes energy for intake pumping, lighting and heating of the building as well as the energy of the pump pressurizing water to the beginning of the network. Infrastructure for the facility is estimated. It excludes energy for pumping stations and water losses within the network which is included in the tap water market. Emissions to the environment occurring during the treatment and during the distribution were not considered as they are assumed negligible. Main substance in water that would be released in the environment are assumed to be considered in wastewater processes.

## Time period
Time of publication.

## Reference product
- tap water: 1 kg; name tapwater; By-product classification allocatable product; CPC 18000: Natural water; CAS 7732-18-5
  production volume 1.62841e10 kg; name PV_tapwater
    Calculated value. Estimated value based on extrapolated from literature data on share of surface water vs underground water and share of disinfection treatment to tap water production from groundwater in Quebec.
  property price 0.000397 EUR2005
    Converted from EU price by using Purchasing Power Parities (0.8458 in 2003 and 0.8426 in 2004)
  properties: carbon allocation 6.08566e-7 kg, carbon content 0.0017899, carbon content, fossil 0.0017899, carbon content, non-fossil 0, dry mass 0.00034 kg, water content 2940.18, water in wet mass 0.99966 kg, wet mass 1 kg

## Inputs from technosphere
- chlorine, liquid: 1.40443e-6 kg; lognormal variance with pedigree 0.0186, pedigree (4,4,4,1,1)
  Estimated value. Based on chlorine consumption for disinfection from the artificial recharged wells dataset.
  properties: dry mass 1 kg, wet mass 1 kg
- diesel, burned in building machine: 1.49144e-5 MJ; = diesel_use*density_diesel*NHV*43.2; lognormal variance with pedigree 0.008, pedigree (1,1,4,1,1)
  Calculated value.
  Uncertainty: Calculated variable. Uncertainty will be determined from propagation of uncertainty factors of underlying variables.
  property density 0.84 kg/l; name density_diesel
  property fuel input in physical units, L 4.11e-7 l; name diesel_use
  property heating value, net 1 MJ; name NHV
  note on fuel input in physical units, L: Estimated value. Represents diesel volume consumed in a year for routine runs of emergency generators. Value is based on diesel consumption from the underground water without treatment dataset.
  note on heating value, net: Literature. net (lower) heating (calorific) value for diesel in MJ/kg
- electricity, medium voltage: 0.000399 kWh; lognormal variance with pedigree 0.0186, pedigree (4,4,4,1,1)
  EcoSpold01Location=UCTE
  Estimated value. Represents electricity consumption for pumping underground water and pressurizing tap water at facility gate. Value is based on energy consumption from the underground without treatment dataset.
- pump station: 2.0568e-11 unit; lognormal variance with pedigree 0.0506, pedigree (5,4,4,1,1)
  Approximated process. Used to represent facility pumping both intake and at facility gate. Value taken directly from ecoinvent V2.2 tap water, at user module.

## Inputs from nature
- Water, well, in ground [natural resource, in water]: 0.001 m3; name waterIn_1
  Measured value. Data provider reported that no loss occurs thoughout water treatment.

## Sampling procedure
This dataset is an approximation based on data collected from selected plants chosen either for their technological specificities or their production representativeness. A survey campaign was conducted in summer 2013 with 2012 as a reference year. All technologies combined, 16 distinct tap water production plants participated.

## Extrapolations
Extrapolation using operation data from different technologies to represents underground water with disinfection tap water production tn the region. This technology is assumed to represents 9.2% of all tap water volume produced in Quebec.
