# polyethylene pipe production, DN 200, SDR 41

Dataset: EcoSpold 2, unit process
Geography: RoW
Time period: 2003-01-01 to 2023-12-31
Technology level: current
Classification: EcoSpold01Categories: ventilation/production of components
Classification: ISIC rev.4 ecoinvent: 2819:Manufacture of other general-purpose machinery
Tags: ConvertedDataset
Scenario: Business-as-Usual
System model: Allocation, cut-off by classification
Generated by: Alex Primas
Published in: Hässig, W. 2007
Database: ecoinvent
isCopyrightProtected: true
accessRestrictedTo: 1

## General comment
Production of a typical component used for a ventilation system in a multi family house. The house considered in the investigation includes 6 flats with 130 m2 floor area each and a ventilation rate of 120 m3/h.
[This dataset was already contained in the ecoinvent database version 2. It was not individually updated during the transfer to ecoinvent version 3. Life Cycle Impact Assessment results may still have changed, as they are affected by changes in the supply chain, i.e. in other datasets. This dataset was generated following the ecoinvent quality guidelines for version 2. It may have been subject to central changes described in the ecoinvent version 3 change report (http://www.ecoinvent.org/database/ecoinvent-version-3/reports-of-changes/), and the results of the central updates were reviewed extensively. The changes added e.g. consistent water flows and other information throughout the database. The documentation of this dataset can be found in the ecoinvent reports of version 2, which are still available via the ecoinvent website. The change report linked above covers all central changes that were made during the conversion process.]

## Included activities end
Materials used for the production. Estimation of electricity use for the different production steps. Energy use for heating of the production building. Transport of raw materials to the plant. Estimation for the Infrastructure of the Production site included.

## Geography
Data for production in Germany used.

## Technology
Extruded polyethylene tube with 5mm wall thickness. Weight 3 kg/m

## Time period
Materials investigated in 2003

## Reference product
- polyethylene pipe, DN 200, SDR 41: 1 m; By-product classification allocatable product; CPC 36320: Tubes, pipes and hoses, and fittings therefor, of plastics; HS2017 3917: Tubes, pipes and hoses and fittings thereof (for example, joints, elbows, flanges), of plastics
  EcoSpold01Location=RER
  production volume 2.67763 m
    This is a placeholder value that does not reflect real-world production volumes. This dataset does not currently require a real-world production volume to work in the database framework, and no actual data were collected yet. This has no negative effect on the results of the ecoinvent database.
  property price 7.63 EUR2005
    Average 2005 prices for EU27, USA, China, Japan and India from Import/Export data (US$ and tonnes) in UN Commodity Trade Statistics Database; Commodity: Tube, pipe or hose, rigid, of polyethylene. Unit in EUR/kg is converted to EUR/m based on dataset for pipe production in Ecoinvent database.
  properties: carbon allocation 2.57143 kg, carbon content 0.857143, carbon content, fossil 0.857143, carbon content, non-fossil 0, dry mass 3 kg, heating value, net 127.41 MJ, water content 0, water in wet mass 0 kg, wet mass 3 kg

## Inputs from technosphere
- electricity, medium voltage: 0.0109668, 0.218764, 0.0735039, 0.00335842, 0.000672184, 0.000144333, 0.0225907 kWh (7 suppliers, which the file names only by identifier); sum of these 0.33 kWh; lognormal variance with pedigree 0.11, pedigree (3,5,5,5,3)
  EcoSpold01Location=UCTE
  Data estimated from related processes
  Uncertainty: Data estimated from related processes
- extrusion, plastic pipes: 3.15 kg; lognormal variance with pedigree 0.0546, pedigree (2,4,5,5,1)
  EcoSpold01Location=RER
  Questionnaire
  Uncertainty: Questionnaire
- heat, district or industrial, natural gas: 0.0668097, 4.06569 MJ (2 suppliers, which the file names only by identifier); sum of these 4.1325 MJ; lognormal variance with pedigree 0.078, pedigree (4,5,5,5,1)
  Data estimated from related companies
  EcoSpold01Location=RER
  Uncertainty: Data estimated from related companies
  properties: heating value, net 1 MJ
- heat, district or industrial, other than natural gas: 4.13059, 0.00191362 MJ (2 suppliers, which the file names only by identifier); sum of these 4.1325 MJ; lognormal variance with pedigree 0.072, pedigree (1,1,5,5,1)
  4,5,1,1,1,5; Data estimated from related companies
  EcoSpold01Location=RER
  properties: heating value, net 1 MJ
- plastic processing factory: 2.22e-9 unit; lognormal variance with pedigree 0.396, pedigree (4,5,5,5,3)
  Calculated with data of a similar company
  EcoSpold01Location=RER
  Uncertainty: Calculated with data of a similar company
- polyethylene, high density, granulate: 3.15 kg; lognormal variance with pedigree 0.0546, pedigree (2,4,5,5,1)
  EcoSpold01Location=RER
  Questionnaire
  Uncertainty: Questionnaire
  properties: carbon content, fossil 0.857143, dry mass 1 kg, heating value, net 42.47 MJ, wet mass 1 kg
  note on carbon content, fossil: Polyethylene is formed out of a huge amount of ethylene monomers (C2H4) (ecoinvent v2.2 report 11_II). MW=28 g/mol
- waste polyethylene: -9.52548e-6, -2.42863e-5, -1.00311e-5, -1.83673e-6, -0.149587, -4.05245e-6, -0.00036348 kg (7 suppliers, which the file names only by identifier); sum of these -0.15 kg; lognormal variance with pedigree 0.032, pedigree (4,4,1,5,1)
  Estimations on precentage material disposed
  EcoSpold01Location=CH
  Uncertainty: Estimations on precentage material disposed
  production volume
    Calculated from the production volume of earth tube heat exchanger, polyethylene, DN 200 in proportion to the respective output amounts.
  properties: carbon content, fossil 0.825301, dry mass 0.996 kg, heating value, net 42.47 MJ, water content 0.00401606, wet mass 1 kg
  note on carbon content, fossil: C content in 1 kg DM was calculated using data in Tab A.1, ecoinvent v2.2 report 13_I
  note on heating value, net: Value taken from the general comment of the treatment dataset.

## Sampling procedure
Questionnaire and technical information of producer. Data of one common product used.

## Extrapolations
none This dataset has been copied from an original dataset covering the geography RER. The uncertainty has been adjusted accordingly.

## Review by Rolf Frischknecht 2007-08-16
passed
none
