# solar glass production, low-iron

Dataset: EcoSpold 2, unit process
Geography: RER
Time period: 2000-01-01 to 2023-12-31
Technology level: current
Classification: EcoSpold01Categories: glass/construction
Classification: ISIC rev.4 ecoinvent: 2310:Manufacture of glass and glass products
Tags: ConvertedDataset
Scenario: Business-as-Usual
System model: Allocation, cut-off by classification
Generated by: Niels Jungbluth
Published in: Kellenberger D. 2007
Database: ecoinvent
isCopyrightProtected: true
accessRestrictedTo: 1

## General comment
Assumption with inventory data for normal glass. This glass differes from normal glass mainly due to the type of raw materials, which is considered with a higher transport distance. Additional transports for importing it to Europe are included in the inventory.
[This dataset was already contained in the ecoinvent database version 2. It was not individually updated during the transfer to ecoinvent version 3. Life Cycle Impact Assessment results may still have changed, as they are affected by changes in the supply chain, i.e. in other datasets. This dataset was generated following the ecoinvent quality guidelines for version 2. It may have been subject to central changes described in the ecoinvent version 3 change report (http://www.ecoinvent.org/database/ecoinvent-version-3/reports-of-changes/), and the results of the central updates were reviewed extensively. The changes added e.g. consistent water flows and other information throughout the database. The documentation of this dataset can be found in the ecoinvent reports of version 2, which are still available via the ecoinvent website. The change report linked above covers all central changes that were made during the conversion process.]

## Included activities end
Gate to gate inventory for the process including transport to RER

## Geography
One production plant in US. No information for RER.

## Technology
Estimation of low-iron glass production with technology used for normal flat glass.

## Time period
Date of estimation.

## Reference product
- solar glass, low-iron: 1 kg; By-product classification allocatable product; CPC 37114: Glass in sheets, bent, edge-worked, engraved, drilled, enamelled or otherwise worked, but not framed, etc.; HS2017 7005: Glass; float glass and surface ground or polished glass, in sheets, whether or not having an absorbent, refle[...]
  EcoSpold01Location=RER
  production volume 1.32237 kg
    This is a placeholder value that does not reflect real-world production volumes. This dataset does not currently require a real-world production volume to work in the database framework, and no actual data were collected yet. This has no negative effect on the results of the ecoinvent database. The placeholder value of this activity was scaled according to the nominal GDP of 2005 (source: United Nations, http://data.un.org/Glossary.aspx?q=GDP+%28current+US%24%29, accessed 20130726) to reflect an appropriate share of the global production volume, which is also a placeholder value.
  property price 3.16 EUR2005
    Calculated based on inputs: The price of the product has been calculated as a sum of the values of the material and energy inputs for this product. This value is therefore a rough estimation. It may underestimate the real price since there are additional expenses when producing any product. These expences can include for example labour costs, treatment of waste materials and profit for the producer. Please consider carefully whether this level of data quality is acceptable for your application.
  properties: carbon allocation 0 kg, carbon content 0, carbon content, fossil 0, carbon content, non-fossil 0, dry mass 1 kg, water content 0, water in wet mass 0 kg, wet mass 1 kg

## Inputs from technosphere
- flat glass, uncoated: 1 kg; lognormal variance with pedigree 0.122, pedigree (3,5,5,5,4)
  Assumption for a comparable product
  EcoSpold01Location=RER
  Uncertainty: Assumption for a comparable product
  properties: dry mass 1 kg, wet mass 1 kg

## Sampling procedure
Assumption

## Extrapolations
Assessment with European electricity mix.

## Review by Daniel Kellenberger (obsolete) 2003-07-01
passed
