# purse seiner construction, wood

Dataset: EcoSpold 2, unit process
Geography: RoW
Time period: 2010-01-01 to 2023-12-31
Technology level: current
Classification: ISIC rev.4 ecoinvent: 0311:Marine fishing
Scenario: Business-as-Usual
System model: Allocation, cut-off by classification
Generated by: Angel Avadí
Published in: Avadí, A. 2018
Database: ecoinvent
isCopyrightProtected: true
accessRestrictedTo: 1

## General comment
This dataset represents the construction of wooden purse seiners, per 1000 kg of light ship weight, based on data from Peru, corresponding to 10 vessels for which data was avilable with different levels of detail. Specific data for specific inventory items may be based on sub-samples for which detailed data was available. Vessel dimensions, landings and fuel use were available for roughly 689 purse seiners
System boundaries and relation between activities

## Included activities start
Construction of vessels, including provision of all materials and work

## Included activities end
Batteries are excluded, as they do not exist in the database

## Geography
Data from Peru, extrapolated to global (GLO)

## Technology
Peru features various shipyards and relevant ship-building and ship-retrofitting expertise.

## Reference product
- purse seiner, wood: 1 kg; name LSW; = structure+copper+nylon+poly+lead+engine*1000+motors*1000+paint+(wood*640)+zinc+anchor+cotton+epoxy+bronze; source Pierre Fréon 2014; By-product classification allocatable product; CPC 49315: Fishing vessels; factory ships and other vessels for processing or preserving fishery products; HS2017 890200: Fishing vessels, factory ships and other vessels; for processing or preserving fishery products
  Construction of a wooden purse seiner, per 1000 kg of light ship weight (LSW). Regressions based on mainly primary data were created to relate the weight of each inventory item to a purse seiner's LSW. The list of inventory items (granularity) contribute >95% of environmental impacts, as described in the reference publication.
  production volume 0.912835 kg; name prod_vol
    Unquantifiable
  property lifetime 30 year; name LSW_lifetime
  property lifetime capacity [h] 48000 hour; name LSW_lifetime_capacity_PMH; = 8*200*LSW_lifetime
    8 h/d times 200 d/y times lifetime
  property price 0.493527 EUR2005
    Calculated based on inputs: The price of the product has been calculated as a sum of the values of the material and energy inputs for this product. This value is therefore a rough estimation. It may underestimate the real price since there are additional expenses when producing any product. These expences can include for example labour costs, treatment of waste materials and profit for the producer. Please consider carefully whether this level of data quality is acceptable for your application.
  properties: carbon allocation 0 kg, carbon content 0

## Inputs from technosphere
All rows: source Pierre Fréon 2014
- alkyd paint, white, without solvent, in 60% solution state: 0.00115609 kg; triangular min 0.00077859, mostLikely 0.000990932, max 0.00169874, pedigree (3,3,2,5,1)
  Paint and antifouling paint
  Uncertainty: Based on data from 10 vessels, including dimensions/LSW from >600 vessels
  properties: carbon content, fossil 0.140367, carbon content, non-fossil 0.199629, dry mass 1 kg, heating value, net 10.3 MJ, wet mass 1 kg
  note on carbon content, fossil: C content was calculated as an addition of C content in the raw materials.
- alkyd paint, white, without solvent, in 60% solution state: 0.000243534 kg; triangular min 0.000164013, mostLikely 0.000208744, max 0.000357846, pedigree (3,3,2,5,1)
  (same comment as for alkyd paint, white, without solvent, in 60% solution state)
- bronze: 0.000199946 kg; triangular min 0.000171382, mostLikely 0.000171382, max 0.000257073, pedigree (3,3,2,5,1)
  Fishing net construction
  Uncertainty: Based on data from 10 vessels
  properties: dry mass 1 kg, wet mass 1 kg
- cast iron: 0.000799784 kg; name anchor; triangular min 0.000671819, mostLikely 0.000767793, max 0.000959741, pedigree (3,3,2,5,1)
  Anchor
  Uncertainty: Based on data from 10 vessels
  properties: carbon content, fossil 0.04, dry mass 1 kg, wet mass 1 kg
  note on carbon content, fossil: Cast iron is made by remelting pig iron in small furnaces (e.g. cupola furnaces or electric arc furnaces) and poured into moulds to make castings. It usually contains 2% to 6% carbon (ecoinvent v2.2 report 10_partII). An average content of 4% was considered
- copper, cathode: 0.00199946 kg; = copper
  Copper wire for electric circuit construction, 50% recycled
  properties: dry mass 1 kg, wet mass 1 kg
- epoxy resin insulator, SiO2: 0.000199946 kg; name epoxy; triangular min 8.56911e-5, mostLikely 0.000171382, max 0.000342765, pedigree (3,3,2,5,1)
  Caulking
  Uncertainty: Based on data from 10 vessels, including dimensions/LSW from >600 vessels
  properties: carbon content, fossil 0.1693, dry mass 1 kg, heating value, net 5.13 MJ, wet mass 1 kg
- fibre, cotton: 0.000599838 kg; name cotton; triangular min 0.00040898, mostLikely 0.000490777, max 0.000899757, pedigree (3,3,2,5,1)
  (same comment as for epoxy resin insulator, SiO2)
  properties: carbon content, non-fossil 0.46, dry mass 0.94 kg, heating value, net 12.95 MJ, water content 0.0638298, wet mass 1 kg
- lead: 0.00319914 kg; triangular min 0.00248209, mostLikely 0.00264756, max 0.00446776, pedigree (2,3,2,5,1)
  Fishing net construction
  Uncertainty: Based on data from 10 vessels
  properties: dry mass 1 kg, wet mass 1 kg
- marine electric motor: 4.69873e-7 unit; name motors; = engine*0.1
  Electric motors and pumps
  property lifetime 10 year; name motors_lifetime
  property lifetime capacity [h] 20000 hour; name motors_lifetime_capacity_PMH
- marine engine: 4.69873e-6 unit; name engine; triangular min 2.43038e-6, mostLikely 3.80759e-6, max 7.85822e-6, pedigree (2,3,2,5,1)
  Marine diesel engine
  Uncertainty: Based on data from 10 vessels, including engines from >600 vessels
  property lifetime 15 year; name engine_lifetime
  property lifetime capacity [h] 8000 hour; name engine_lifetime_capacity_PMH
- metal working, average for steel product manufacturing: 0.11007 kg; = structure+zinc+anchor
  Steel hull + transmission construction, structural elements
- nylon 6-6: 0.0107076 kg; triangular min 0.0082649, mostLikely 0.00881589, max 0.0150421, pedigree (2,3,2,5,1)
  Fishing net construction
  Uncertainty: Based on data from 10 vessels
  properties: carbon content, fossil 0.637168, dry mass 1 kg, heating value, net 30.9 MJ, wet mass 1 kg
  note on heating value, net: Assumed equal to Nylon-66. Reference: Walters, R. N., Hackett, S. M. and Lyon, R. E. (2000) ‘Heats of combustion of high temperature polymers’, Fire and Materials, 24(5), pp. 245–252. doi: 10.1002/1099-1018(200009/10)24:5<245::AID-FAM744>3.0.CO;2-7.
- nylon 6-6: 0.00528805 kg; triangular min 0.00408169, mostLikely 0.0043538, max 0.00742867, pedigree (2,3,2,5,1)
  Fishing net construction
  Uncertainty: Based on data from 10 vessels
- polyethylene, low density, granulate: 0.000599838 kg; name poly; triangular min 0.000490777, mostLikely 0.000490777, max 0.000817961, pedigree (2,3,2,5,1)
  Fishing net construction
  Uncertainty: Based on data from 10 vessels
  properties: carbon content, fossil 0.857143, dry mass 1 kg, heating value, net 42.47 MJ, wet mass 1 kg
- sawnwood, board, hardwood, dried (u=20%), planed: 0.00126114 m3; triangular min 0.00115085, mostLikely 0.00128991, max 0.00134266, pedigree (3,3,2,5,1)
  Hull
  Uncertainty: Based on data from 10 vessels, including dimensions/LSW from >600 vessels. Density of wood: 640 kg/m3, ecoinvent dataset information (UPR): planing, board, hardwood, u=20%, GLO
  properties: carbon content, non-fossil 0.494, dry mass 563.2 kg, heating value, net 8524.3 MJ, water content 0.2, wet mass 675.84 kg
- sawnwood, board, hardwood, dried (u=20%), planed: 8.3182e-5 m3; triangular min 7.59076e-5, mostLikely 8.50797e-5, max 8.85588e-5, pedigree (3,3,2,5,1)
  (same comment as for sawnwood, board, hardwood, dried (u=20%), planed)
- sawnwood, board, hardwood, dried (u=20%), planed: 3.14941e-7 m3; triangular min 2.87399e-7, mostLikely 3.22126e-7, max 3.35298e-7, pedigree (3,3,2,5,1)
  (same comment as for sawnwood, board, hardwood, dried (u=20%), planed)
- steel, low-alloyed: 0.108971 kg; name structure; triangular min 0.0848541, mostLikely 0.097359, max 0.144699, pedigree (3,3,2,5,1)
  Structural elements, keel lining, bolts, rigging
  Uncertainty: Based on data from 10 vessels, including dimensions/LSW from >600 vessels
  properties: carbon content, fossil 0.005, dry mass 1 kg, wet mass 1 kg
- used purse seiner, wood: -1 kg; name EOL; = LSW
  EOL of a wooden purse seiner, per 1000 kg of light ship weight (LSW), at the end of its lifetime. Regressions based on mainly primary data were created to relate the weight of each inventory item to a purse seiner's LSW. The list of inventory items (granularity) contribute >95% of environmental impacts, as described in the reference publication. Includes engines and motors
  production volume; = ABS(prod_vol*EOL/LSW)
    Calculated from production volume of reference product using the relative outputs.
  property carbon content, fossil 0.0115594; name EOL_C_content_fossil; = 0.005*12.4%+0.63717*1.6%+0.14037*0.14%+0.85714*0.06%+0.1693*0.02%
  property carbon content, non-fossil 0.403659; name EOL_C_content_non_fossil; = 0.494*81.6%+0.19963*0.14%+0.46*0.06%
  property dry mass 0.856384 kg; name EOL_DM; = 1-EOL_WWM
  property water content 0.1677; name EOL_water_content; = EOL_WWM/EOL_DM
  property water in wet mass 0.143616 kg; name EOL_WWM; = 112.64/640*81.6%
  property wet mass 1 kg; name EOL_WM
  note on carbon content, fossil: Calculated from the fossil carbon content of the structural and gear materials, multiplied by their relative proportions
  note on carbon content, non-fossil: Calculated from the fossil carbon content of the wooden hull and paint materials, multiplied by their relative proportions
- wire drawing, copper: 0.00199946 kg; name copper; triangular min 0.00121589, mostLikely 0.00162118, max 0.00316131, pedigree (2,3,3,5,2)
  Manufacture of copper wire
  Uncertainty: Based on 8 different estimations based on reports, shipyard work orders, invoices, etc.
- zinc: 0.000299919 kg; triangular min 0.00014996, mostLikely 0.000224939, max 0.000524858, pedigree (3,3,2,5,1)
  Zinc pieces
  Uncertainty: Based on data from 10 vessels, including dimensions/LSW from >600 vessels
  properties: dry mass 1 kg, wet mass 1 kg
