# pipeline construction, liquid manure

Dataset: EcoSpold 2, unit process
Geography: RoW
Time period: 2009-01-01 to 2023-12-31
Technology level: current
Classification: ISIC rev.4 ecoinvent: 4290:Construction of other civil engineering projects
Scenario: Business-as-Usual
System model: Allocation, cut-off by classification
Generated by: Martina Alig
Published in: Dauriat A. 2011
Database: ecoinvent
isCopyrightProtected: true
accessRestrictedTo: 1

## General comment
This dataset corresponds to the production and installation of 1 km pipework made of steel coated by plastic (polyethylene and polyurethane) for belowground liquid manure transportation.

## Included activities start
From reception of the raw materials at the factory gate

## Included activities end
This infrastructure process includes the production of the pipes, the transport of the different parts from the factory to the place of installation, the excavation for the installation, and the decommissioning of the pipeline service. Infrastructure of the factory is not included. No land use was included, as those pipelines are mainly situated in industrial or agricultural areas and direct land use is of importance only during the construction process. Lifespan of the pipelines is 30 years.

## Technology
The pipeworks for liquid manure were modeled, consisting of 20% DN200 and 80% DN100 steel pipelines coated by plastic (polyethylene and polyurethane). Data for construction were based on Frischknecht et al. (1996): Ökoinventare von Energiesystemen: Grundlagen für den ökologischen Vergleich von Energiesystemen und den Einbezug von Energiesystemen in Ökobilanzen für die Schweiz.

## Reference product
- pipeline, liquid manure: 1 km*year; name pipeline_RP; By-product classification allocatable product; CPC 53290: Other civil engineering works
  production volume 353.422 km*year; name pipeline_RP_PV; = 1/0.008417*3
    Calculated production volume (PV) based on knowledge of the regional production volumes. The PV of the global activity has been extrapolated using the nominal GDP of 2005 (source: United Nations, http://data.un.org/Glossary.aspx?q=GDP+%28current+US%24%29, accessed 20130726 and 20130312).
  property capacity [l/hour] 70000 l/hour; name capacity_l_per_hour
    capacity in litres per hour. Refers to maximum capacity, real capacitiy depends on share of solid manure and can go down to 20'000 l/hour.
  property lifetime 30 year; name lifetime
  property price 2167 EUR2005
    Average 2005 prices for EU27, USA, China, Japan and India from Import/Export data (US$ and tonnes) in UN Commodity Trade Statistics Database; Commodity: tubes, pipes and fittings, of iron or steel. The prices are given in EUR/kg and have been recalculated for 1 km of pipe based on steel inputs in the dataset for pipe construction in ecoivent database. Polyethylene (0.7 EUR/kg) and polyurethane (2.07 EUR/kg) used for coating have been accounted for separately by multiplying the prices by input amounts based on the dataset of pipe construction. The costs of machinery (the pipe is built below ground) is accounted for with diesel consumption. Diesel price is 0.37 EUR/kg. The excavation, skid-steer loader consumes 0,13 kg diesel for each m3 of excavation (based on ecoinvent dataset for excavation, skid-steer loader). The costs of transport are calculated for freight train with the input of freight train transport in the dataset and the price per ton*km of freight train trainsport already calculated in ecoinvent. For transport, freight, lorry, EUR4, the price of EUR3 class has been used as an approximation since EUR4 is not available.
  properties: carbon allocation 0 kg, carbon content 0

## Inputs from technosphere
- drawing of pipe, steel: 1067 kg; lognormal variance with pedigree 0.076, pedigree (4,5,5,1,1)
  Uncertainty: Data estimated from related companies
  property carbon content, fossil 0; name C_content_fossil
  property carbon content, non-fossil 0; name C_content_non_fossil
  property dry mass 0 kg; name DM
  property water in wet mass 0 kg; name WWM
  property wet mass 0 kg; name WM
- electricity, medium voltage: 0.307269, 6.12933, 2.05944, 0.0940964, 0.0188333, 0.00404393, 0.427992, 0.632948, 1.32605 kWh (9 suppliers, which the file names only by identifier); sum of these 11 kWh; lognormal variance with pedigree 0.108, pedigree (3,5,5,1,3)
  Electricity use was approximated with data from the the dataset "polyethylene pipe production, DN200".
  Uncertainty: Data estimated from related processes
- excavation, skid-steer loader: 38 m3; source Frischknecht R. 1996; lognormal variance with pedigree 0.0512, pedigree (2,5,5,5,1)
  Amount was modeled corresponding to Frischknecht et al (1996); Tab. E.3. For the pipelines a mixture of 20% DN 200-pipelines and 80% DN 100 plastic pipelines were used.
- extrusion, plastic pipes: 353 kg; lognormal variance with pedigree 0.076, pedigree (4,5,5,1,1)
  Uncertainty: Data estimated from related companies
- heat, district or industrial, natural gas: 1.63349, 99.4056, 36.7109 MJ (3 suppliers, which the file names only by identifier); sum of these 137.75 MJ; lognormal variance with pedigree 0.076, pedigree (4,5,5,1,1)
  Use of heat was approximated with data from the the dataset "polyethylene pipe production, DN200".
  Uncertainty: Data estimated from related companies
  properties: heating value, net 1 MJ
- heat, district or industrial, other than natural gas: 134.271, 0.0622053, 3.41678 MJ (3 suppliers, which the file names only by identifier); sum of these 137.75 MJ; lognormal variance with pedigree 0.076, pedigree (4,5,5,1,1)
  (same comment as for heat, district or industrial, natural gas)
  properties: heating value, net 1 MJ
- inert waste, for final disposal: -4133.3 kg; name BP_amount_4; source Frischknecht R. 1996; lognormal variance with pedigree 0.0112, pedigree (2,5,1,5,1)
  Excavation waste
  production volume; = BP_amount_4/ pipeline_RP* pipeline_RP_PV
    Calculated from production volume of reference product using the relative outputs.
  properties: dry mass 0.995 kg, water content 0.00502513, wet mass 1 kg
- polyethylene, high density, granulate: 301 kg; name polyethylene; source Frischknecht R. 1996; lognormal variance with pedigree 0.0512, pedigree (2,5,5,5,1)
  (same comment as for excavation, skid-steer loader)
  properties: carbon content, fossil 0.857143, dry mass 1 kg, heating value, net 42.47 MJ, wet mass 1 kg
  note on carbon content, fossil: Polyethylene is formed out of a huge amount of ethylene monomers (C2H4) (ecoinvent v2.2 report 11_II). MW=28 g/mol
- polyurethane, flexible foam: 70 kg; name polyurethane; source Frischknecht R. 1996; lognormal variance with pedigree 0.0512, pedigree (2,5,5,5,1)
  (same comment as for excavation, skid-steer loader)
  properties: carbon content, fossil 0.633827, dry mass 1 kg, heating value, net 30.67 MJ, wet mass 1 kg
  note on carbon content, fossil: Polyurethanes (PUR) is the collective name for an extensive group of polymers with very different compositions and correspondingly varied property profiles, though their molecule chain contains all a urethane group (-NH-CO-O-). All PURs are built on a common principle : they are produced by the diisocyanate polyaddition process, that links polyols and (di)isocyanates. In this dataset, an example of typical polyurethane mixture is described (Ullmann, Polyurethanes, Dieterich et al. & ecoinvent v2 report 11_II). C content was calculated as an addition of C contents in its components.
- scrap steel: -577.358, -275.942 kg (2 suppliers, which the file names only by identifier); sum of these -853.3 kg; source Frischknecht R. 1996; lognormal variance with pedigree 0.0112, pedigree (2,5,1,5,1)
  Corresponds to 80% of the steel used (see Frischknecht et al., 1996; Tab. E.4.). The remaining 20% stay in the ground.
  production volume; = BP_amount_5/ pipeline_RP* pipeline_RP_PV
    Calculated from production volume of reference product using the relative outputs.
  properties: dry mass 1 kg, lifetime 30 year, wet mass 1 kg
- scrap steel: -213.3 kg; name BP_amount_2; source Frischknecht R. 1996; lognormal variance with pedigree 0.0112, pedigree (2,5,1,5,1)
  Corresponds to 20% of the steel from the pipe remaining in soil.
  production volume; = BP_amount_2/ pipeline_RP* pipeline_RP_PV
    Calculated from production volume of reference product using the relative outputs.
  properties: dry mass 1 kg, wet mass 1 kg
- steel, unalloyed: 1067 kg; name steel; source Frischknecht R. 1996; lognormal variance with pedigree 0.0512, pedigree (2,5,5,5,1)
  (same comment as for excavation, skid-steer loader)
  properties: carbon content, fossil 0.0025, dry mass 1 kg, wet mass 1 kg
  note on carbon content, fossil: Unalloyed steels or carbon steels are those in which the level of an individual element in no case reaches or exceeds the limiting concentration given in Tab. 3.1 ecoinvent v2.2 report 10_partII. Assumed to have a C content of 0.25%
- transport, freight train: 193.033, 48.9599, 39.4945, 176.715, 12.3977, 243.799 metric ton*km (6 suppliers, which the file names only by identifier); sum of these 714.4 metric ton*km; = (600*steel+200*polyethylene+200*polyurethane)/1000; source Dauriat A. 2011; lognormal variance with pedigree 0.0512, pedigree (2,5,5,5,1)
  A standard transportation distance per train of 600 km for the steel and 200 km for the plastics were assumed for the transport from the factory to the farm gate.
- transport, freight, lorry 16-32 metric ton, EURO4: 71.9 metric ton*km; = (50*(steel+polyethylene+polyurethane))/1000; source Dauriat A. 2011; lognormal variance with pedigree 0.0512, pedigree (2,5,5,5,1)
  A standard transportation distance of 50 km per lorry for all materials was assumed for the transport from the factory to the farm gate.
- waste polyethylene: -0.0154438, -0.0393758, -0.0162636, -0.00297793, -242.528, -0.502125, -0.00657032, -0.589316 kg (8 suppliers, which the file names only by identifier); sum of these -243.7 kg; source Frischknecht R. 1996; lognormal variance with pedigree 0.0112, pedigree (2,5,1,5,1)
  Corresponds to 80% of the polyethylene used (see Frischknecht et al., 1996; Tab. E.4.). The remaining 20% stay in the ground.
  production volume; = BP_amount_6/ pipeline_RP* pipeline_RP_PV
    Calculated from production volume of reference product using the relative outputs.
  properties: carbon content, fossil 0.825301, dry mass 0.996 kg, heating value, net 42.47 MJ, lifetime 30 year, water content 0.00401606, wet mass 1 kg
  note on carbon content, fossil: C content in 1 kg DM was calculated using data in Tab A.1, ecoinvent v2.2 report 13_I
  note on heating value, net: Value taken from the general comment of the treatment dataset.
- waste polyethylene: -57.3 kg; name BP_amount_3; source Frischknecht R. 1996; lognormal variance with pedigree 0.0112, pedigree (2,5,1,5,1)
  Corresponds to 20% of the polyethylene from the pipe remaining in soil.
  production volume; = BP_amount_3/ pipeline_RP* pipeline_RP_PV
    Calculated from production volume of reference product using the relative outputs.
  properties: carbon content, fossil 0.825301, dry mass 0.996 kg, heating value, net 42.47 MJ, water content 0.00401606, wet mass 1 kg
- waste polyurethane: -0.507246, -0.0338922, -0.00565531, -42.2912, -0.0132931, -0.432197, -0.00256321, -0.0139987 kg (8 suppliers, which the file names only by identifier); sum of these -43.3 kg; source Frischknecht R. 1996; lognormal variance with pedigree 0.0112, pedigree (2,5,1,5,1)
  Corresponds to 60% of the polyurethane used (see Frischknecht et al., 1996; Tab. E.4.). The remaining 40% stay in the ground.
  production volume; = BP_amount_7/ pipeline_RP* pipeline_RP_PV
    Calculated from production volume of reference product using the relative outputs.
  properties: carbon content, fossil 0.641283, dry mass 0.998 kg, heating value, net 30.67 MJ, lifetime 30 year, water content 0.00200401, wet mass 1 kg
  note on carbon content, fossil: C content was calculated for 1 kg DM, using data in Tab A.2, ecoinvent v2.2 report 13_I.
- waste polyurethane: -26.7 kg; name BP_amount_1; source Frischknecht R. 1996; lognormal variance with pedigree 0.0112, pedigree (2,5,1,5,1)
  Corresponds to 40% of the polyurethane from the pipe remaining in soil.
  production volume; = BP_amount_1/ pipeline_RP* pipeline_RP_PV
    Calculated from production volume of reference product using the relative outputs.
  properties: carbon content, fossil 0.641283, dry mass 0.998 kg, heating value, net 30.67 MJ, water content 0.00200401, wet mass 1 kg

## Sampling procedure
The pipeworks for liquid manure were modeled, consisting of 20% DN200 and 80% DN100 steel pipelines coated by plastic (polyethylene and polyurethane). Data for construction were based on Frischknecht et al (1996): Ökoinventare von Energiesystemen: Grundlagen für den ökologischen Vergleich von Energiesystemen und den Einbezug von Energiesystemen in Ökobilanzen für die Schweiz.

## Extrapolations
Data refer to Swiss production. Only uncertainty values have been changed from local to global dataset: completeness and geographical index were set from 1 to 5.

## Review by Sirje Vares 2012-02-20
Passed. The dataset would have more understandable and practical to use if it had been splitted into two separate processes: pipe construction and pipeline construction. But as far the processes and materials are presented in the technology description chapter this is OK.

## Review by Bo Weidema 2012-02-20
Passed. Documentation adequate, inputs relevant, mass balance correct, and correct handling of capacity utilisation. The dataset combines the production of the pipes and the underground installation of the pipeline, which appears an unnecessary aggregation.
