# cooling energy production, at -160 °C, propylene-ethylene-methane compression refrigeration system 1 MW

Dataset: EcoSpold 2, unit process
Geography: GLO
Time period: 2017-01-01 to 2023-12-31
Technology level: current
Classification: ISIC rev.4 ecoinvent: 3530:Steam and air conditioning supply
Synonyms: Compression refrigeration; Refrigeration; Refrigeration cycle
Scenario: Business-as-Usual
System model: Allocation, cut-off by classification
Generated by: Iasonas Ioannou
Published in: Luyben, William L. 2019
Database: ecoinvent
isCopyrightProtected: false
accessRestrictedTo: 1

## General comment
This dataset represents the service of removing heat, equal to 1 MJ, from hot process streams at temperatures above, and close to, -160 °C. The removal of energy is achieved through a three-stage compression refrigeration system, using propylene, ethylene, and methane as refrigerants.
Compression refrigeration systems are widely used in domestic and commercial applications, where a refrigerant is circulated in a closed system. In general, compression refrigeration systems consist of evaporation, compression, and expansion stages of a working fluid. Several alternatives refrigeration cycles exist to produce cooling energy at low temperatures. Notably, the critical temperature of the used refrigerant and the typical cooling water condenser temperature of 45°C define how many stages should be included in the refrigeration cycle. For example, single-stage systems are usually limited to the range of –45 to –60°C, where the typical operating range for propylene is 4 to –46°C, for ethylene –59 to –115°C (as an additional stage), and for methane -129 to -184°C. In addition to the technical performance considerations, the refrigerant selection involves economic, environmental, safety, and social aspects. Besides, annual leakages during operation or end-of-life decommissioning are a major concern.
In this dataset, the working fluid(s) is considered to be fully recovered during the decommissioning of the system. Besides, recovering of the working fluid is the common practice in regions where legislation has been introduced. The recovered fluid(s) could be either directly repurposed on-site, in the recovered form, or delivered back to a supplier or recycling centre for cleaning (if necessary). Notably, the recovery and return of refrigerants with low contamination is incentivised from various government and suppliers.
References:
Richard Turton. Richard C. Bailie. Wallace B. Whiting. Joseph A. Shaeiwitz. "Analysis, Synthesis, and Design of Chemical Processes." Fourth Edition.
IPCC/TEAP Special Report. "Safeguard of the ozone layer and the global climate system" (2005)

## Included activities start
The service starts when the raw materials and energy enter the process.

## Included activities end
The service ends with the removal of 1 MJ of energy from hot process steams. Materials entering the process are included as well as energy uses and emissions. Emissions include leakage of refrigerant during operation, while at decommissioning the refrigerant is considered to be fully recovered and reused by the end-user or supplier. The infrastructure, commissioning, and end-of-life are not included.

## Geography
The data are based on estimations and do not have a specific geographical origin. They are assumed to be representative of this geography.

## Technology
This activity represents a closed compression refrigeration system for cooling at temperatures below ambient. Heat is removed from a process stream, attaining temperatures below ambient, by circulating a working fluid (refrigerant) through a typical compression system. The absorption of heat, from a process stream, is attained through the evaporation of a liquid refrigerant, at a low temperature, in a heat exchanger. Subsequently, the vapour stream is compressed to a pressure high enough to allow for condensation. The temperature increases as well because of the compression step attaining a superheated vapour state. Subsequently, the refrigerant, as a saturated vapour, passes through a condenser to become a saturated liquid. The refrigerant is then fed into an expansion valve where its pressure is reduced. Due to the adiabatic flash, the temperature of the refrigerant is drastically reduced leading to its partial vaporization. Finally, the liquid-vapour mixture enters the evaporator and completes the cycle.
This activity represents the production of 1 MJ of cooling energy for process source temperatures at –160°C, based on a compression refrigeration system with a capacity of 1 MW. The cooling energy is produced via a three-stage compression refrigeration system with propylene, ethylene, and methane as refrigerants. Input data to formulate this activity originate from Luyben, W. L (2019), Eunomia (2014), and IPCC/TEAP (2005).
References:
Luyben, William L. "Refrigerant selection for different cryogenic temperatures." Computers & Chemical Engineering 126 (2019): 241-248.
Eunomia report for the Department of Energy and Climate Change (DECC). "Impacts of Leakage from Refrigerants in Heat Pumps." (2014)
IPCC/TEAP Special Report. "Safeguard of the ozone layer and the global climate system" (2005)

## Parameters
- fraction, cooling water, cooling pond system, to air: 0.032 dimensionless; name fraction_CW_CP_to_air; lognormal variance with pedigree 0.1613, pedigree (2,3,1,3,5)
  Calculated based on literature value (Scown, C.D., 2011, Water Footprint of U.S. Transportation Fuels and supplying information of the article) (Vionnet, S., Quantis Water Database - Technical Report, 2012).
- fraction, cooling water, once-through system, to air: 0.004 dimensionless; name fraction_CW_OT_to_air; lognormal variance with pedigree 0.1613, pedigree (2,3,1,3,5)
  (same comment as for fraction, cooling water, cooling pond system, to air)
- fraction, cooling water, recirculating system, to air: 0.771 dimensionless; name fraction_CW_R_to_air; lognormal variance with pedigree 0.1613, pedigree (2,3,1,3,5)
  (same comment as for fraction, cooling water, cooling pond system, to air)
- fraction, cooling water, to air: 0.3875 dimensionless; name fraction_CW_to_air; = (0.5*fraction_CW_OT_to_air)+(0.5*fraction_CW_R_to_air); lognormal variance with pedigree 0.172025, pedigree (4,4,3,2,5)
  Calculated value based on literature value (see comments of the other parametres present in this dataset) and expert opinion. In the case when no industry/literature data are available about the type of cooling or directly fraction, cooling water, to air specific for the process a default assumption is applied. It is assumed that the once-through cooling system is used in 50% of all cases and recirculating system is used in another 50% of all cases.

## Reference product
- cooling energy, at -160 °C: 1 MJ; By-product classification allocatable product; CPC 69220: Distribution of steam, hot water and air-conditioning supply through mains (on own account)
  production volume 3.0168e7 MJ; = 1.0 * 8380 *3600
    Estimated value. This is a placeholder value that reflects the production volume from a single compression refrigeration unit with a capacity of 1 MW that operates for 8380 h withing a year. Hence, it might not reflect real-world production volumes. Nonetheless, this has no negative effect on the results of the ecoinvent database.
  property price 0.0993323 EUR2005
    Estimated value. This price is calculated based on a specific design of a compression refrigeration processes by Luyben, W. L (2017). The compression refrigeration processes allows investiating detailed operating conditions and calculating economic costs (capital investment and energy cost). This refrigeration price depends on the cryogenic temperature level and represents the energy removed from the cryogenic process with 1 MW capacity. Exchange rates of 0.8865 EURO2017/USD2017 and 0.83 EURO2005/EURO2017 were used.
    References:
    Luyben, William L. "Estimating refrigeration costs at cryogenic temperatures." Computers & Chemical Engineering 103 (2017): 144-150.
  properties: carbon allocation 0 kg, carbon content 0

## Inputs from technosphere
- electricity, medium voltage: 2.70528 kWh; lognormal variance with pedigree 0.0028, pedigree (1,1,2,5,1)
  Electricity needs for compression, obtained from Luyben, William L. "Refrigerant selection for different cryogenic temperatures." Computers & Chemical Engineering 126 (2019): 241-248.
- ethylene: 3.17438e-6, 1.01076e-7, 3.47245e-5 kg (3 suppliers, which the file names only by identifier); sum of these 3.8e-5 kg; lognormal variance with pedigree 0.0034, pedigree (2,1,2,5,1)
  Make-up working fluid, based on the amount needed due to leakages (see comment on the equivalent flow to air).
  properties: carbon content, fossil 0.857143, dry mass 1 kg, heating value, net 43.22 MJ, wet mass 1 kg
- natural gas, high pressure: 1.93197e-5 m3; = 1.42E-05/NG_Density; lognormal variance with pedigree 0.0034, pedigree (2,1,2,5,1)
  Make-up working fluid, based on the amount needed due to leakages (see comment on the equivalent flow to air).
  Proxy exchange for methane. Regarding the density of natural gas, standard conditions were assumed.
  property dry mass 0.735 kg; name NG_Density
  properties: carbon content, fossil 0.741, heating value, gross 40 MJ, heating value, net 36 MJ, wet mass 0.735 kg
  note on heating value, gross: At standard conditions; based on Meili et al. (2022) section 5.2
- propylene: 1.18077e-5, 1.26822e-6, 0.000135924 kg (3 suppliers, which the file names only by identifier); sum of these 0.000149 kg; lognormal variance with pedigree 0.0034, pedigree (2,1,2,5,1)
  (same comment as for ethylene)
  properties: carbon content, fossil 0.857143, dry mass 1 kg, heating value, net 43.22 MJ, wet mass 1 kg

## Inputs from nature
- Water, cooling, unspecified natural origin [natural resource, in water]: 0.25381 m3; name water_cooling_UNO_input_2; lognormal variance with pedigree 0.0028, pedigree (1,1,2,5,1)
  Total amount of cooling water circulating in the cooling system. Calculated based on a 2-stage propylene-ethylene refrigeration cycle, the temperature of which increases from 32 to 43°C.
  References:
  Luyben, William L. "Refrigerant selection for different cryogenic temperatures." Computers & Chemical Engineering 126 (2019): 241-248.

## Emissions to nature
- Ethylene [air, urban air close to ground]: 3.8e-5 kg; lognormal variance with pedigree 0.0034, pedigree (2,1,2,5,1)
  Leakage of working fluid assuming 3.77% (annual equivalent leakage rate as per the provided literature). Eunomia (2014) report an annual equivalent leakage rate for heat pumps of 3.77% (1.81−7.63% at the low and high scenario) which are calculated as the product of the leakage frequency and the leakage rate if such a leak occurs. While the IPCC/TEAP (2005) reports that industrial refrigeration systems show an annual average leakage rate of 7−10%; with smallest leakage rates are observed in ammonia systems because of the pungent smell. What is also assumed is 8380 h of operation per yea, to consider maintenance, to adjust the annual leak to an hourly leak.
  References:
  Eunomia report for the Department of Energy and Climate Change (DECC). "Impacts of Leakage from Refrigerants in Heat Pumps." (2014)
  IPCC/TEAP Special Report. "Safeguard of the ozone layer and the global climate system" (2005)
- Methane, fossil [air, unspecified]: 1.42e-5 kg; lognormal variance with pedigree 0.0034, pedigree (2,1,2,5,1)
  Leakage of working fluid assuming 3.77% (annual equivalent leakage rate as per the provided literature). Eunomia (2014) report an annual equivalent leakage rates for heat pumps of 3.77% (1.81−7.63% at the low and high scenario) which are calculated as the product of the leakage frequency and the leakage rate if such a leak occurs. While the IPCC/TEAP (2005) reports that industrial refrigeraiton systems show an annual average leakage rates of 7−10%; with mallest leakage rates are observed in ammonia systems because of the pungent smell. What is also assumed is 8380 h of operation per yea, to consider maintenance, to adjust the annual leak to an hourly leak.
  References:
  Eunomia report for the Department of Energy and Climate Change (DECC). "Impacts of Leakage from Refrigerants in Heat Pumps." (2014)
  IPCC/TEAP Special Report. "Safeguard of the ozone layer and the global climate system" (2005)
- Propylene [air, urban air close to ground]: 0.000149 kg; lognormal variance with pedigree 0.0034, pedigree (2,1,2,5,1)
  (same comment as for Ethylene)
- Water [air, unspecified]: 0.0983514 m3; = (water_cooling_UNO_input_2*fraction_CW_to_air); lognormal variance with pedigree 0.0035, pedigree (2,2,2,5,1)
  Calculated as a fraction of the input of water. For more details, refer to the mathematical relation and the parameters.
- Water [water, unspecified]: 0.155459 m3; = water_cooling_UNO_input_2*(1-fraction_CW_to_air); lognormal variance with pedigree 0.0429, pedigree (2,2,2,5,1)
  (same comment as for Water)

## Sampling procedure
This activity is based on a 3-stage propylene, ethylene, and methane cycle to cool process streams at -160°C with a capacity of 1 MW. Methane as a working fluid is at -160°C. The compression refrigeration system recirculates 119616 kg/h of propylene, 30436 kg/h of ethylene, and 11360 kg/h of methane. It requires 9739 kW for compression, and 11.68 MW for cooling water (the temperature of which increases from 32 to 43°C) to provide 1 MW of cooling.
References:
Luyben, William L. "Refrigerant selection for different cryogenic temperatures." Computers & Chemical Engineering 126 (2019): 241-248.
