# battery separator production

Dataset: EcoSpold 2, unit process
Geography: RoW
Time period: 2017-01-31 to 2025-12-31
Technology level: current
Classification: EcoSpold01Categories: electronics/component
Classification: ISIC rev.4 ecoinvent: 2720:Manufacture of batteries and accumulators
Scenario: Business-as-Usual
System model: Allocation, cut-off by classification
Generated by: Eleonora Crenna
Published in: Yin, R.. 2019
Database: ecoinvent
isCopyrightProtected: true
accessRestrictedTo: 1

## General comment
This dataset represents the production of 1 kg separator, i.e. a polyethylene porous membrane of circa 15-25 µm thickness between a cathode and an anode, for a Li-ion battery. This dataset relies on data from the environmental performance assessment report of a company in China (see Yin et al., 2019), thus it is considered to be representative of this geographical region. Separators can be produced via either wet or dry process. Approximately 80% of the global market of separators use the wet process. In general, the wet process has more advantages, for instance it is a more versatile method which can be used in a wide range of polymers and processing conditions and it can be operated as a continuous process (Deimede et al., 2015).
References:
Yin, R., Hu, S., & Yang, Y. (2019). Life cycle inventories of the commonly used materials for lithium-ion batteries in China. Journal of Cleaner Production, 227, 960-971.
Deimede, V., & Elmasides, C. (2015). Separators for lithium‐ion batteries: a review on the production processes and recent developments. Energy technology, 3(5), 453-468.

## Included activities start
The activity starts when the raw materials enter the process at the factory via lorry.

## Included activities end
The activity ends with the production at factory gate of 1kg polyethylene separator via wet process.

## Geography
This dataset relies on data from a Chinese company, therefore it is considered representative of the geography China.

## Technology
The separator separates anode from cathode in a battery cell, still allowing an exchange of lithium ions through micropores. In case of too high process temperature of the battery, the separator melts, thus closes the micopores, and interrupts the lithium ions exchange. In this way the chemical process is stopped and the cell is prevented from overheating or burning.
The wet process via which separators are produced involves several steps: (1) mixing of a polyolefin resin e.g. polyethylene with plasticizers or low-molecular-weight substances, such as paraffin oil or wax, (2) melting of the mixture, (3) extruding the mixture into a gel-like film, (4) stretching of the film, and finally (5) extracting the plasticizer with volatile solvents to form micropores. (Deimede et al., 2015).
Reference:
Deimede, V., & Elmasides, C. (2015). Separators for lithium‐ion batteries: a review on the production processes and recent developments. Energy technology, 3(5), 453-468.

## Time period
The time period is from 2017 (year of the publication of data in the environmental performance assessment report) to 2025 (assuming that polyethylene separators produced via wet process are still in use in the near future)

## Reference product
- battery separator: 1 kg; name RefProd; By-product classification allocatable product; CPC 46410: Primary cells and primary batteries; HS2017 850690: Cells and batteries; primary, parts thereof
  EcoSpold01Location=CN
  production volume 4.16e6 kg; name RP_PV
    Global separator production accounts for 2500 Mm2. https://www.starlitepower.com/news/detail/92.html). A standard polyolefin separator has 0.46 g/cm3 density and 15 micron thickness (BatPac - Argonne National Laboratory, 2019)
  property carbon content, fossil 0.603377
    C content calculated as the addition of the C contents in the final product components
  property price 1.56234 EUR2005
    Calculated based on inputs: The price of the product has been calculated as a sum of the values of the material and energy inputs for this product. This value is therefore a rough estimation. It may underestimate the real price since there are additional expenses when producing any product. These expences can include for example labour costs, treatment of waste materials and profit for the producer. Please consider carefully whether this level of data quality is acceptable for your application.
  properties: carbon allocation 0.603377 kg, carbon content 0.603377, carbon content, non-fossil 0, dry mass 1 kg, water content 0, water in wet mass 0 kg, wet mass 1 kg

## Inputs from technosphere
- chemical factory, organics: 4e-10 unit; lognormal variance with pedigree 0.528, pedigree (4,5,5,5,5)
  Calculated based on literature data published by the industry. For this activity, no information was readily available concerning infrastructure and land-use. Therefore, the infrastructure is estimated based on data from two chemical factories, the BASF site of Ludwigshafen and the chemical factory in Gendorf (which are both located in Germany), which produce a wide range of chemical substances. Based on this data, the following assumptions are made: the built area amounts to about 4.2 ha, the plant has an average output of 50'000 t/a and a lifespan of fifty years. The estimated infrastructure amount is therefore 4.00 E-10 units per kg of produced chemical.
  References:
  Althaus H.-J., Chudacoff M., Hischier R., Jungbluth N., Osses M. and Primas A. (2007) Life Cycle Inventories of Chemicals. ecoinvent report No. 8, v2.0. EMPA Dübendorf, Swiss Centre for Life Cycle Inventories, Dübendorf, CH.
  Gendorf (2000) Umwelterklärung 2000, Werk Gendorf. Werk Gendorf, Burgkirchen.om ecoinvent)
  EcoSpold01Location=RER
- dichloromethane: 0.00671102, 0.013589 kg (2 suppliers, which the file names only by identifier); sum of these 0.0203 kg; source Yin, R. 2019; lognormal variance with pedigree 0.0106, pedigree (4,4,1,1,1)
  Literature. Table S27 in Yin et al. (2019)
  properties: carbon content, fossil 0.142857, dry mass 1 kg, heating value, net 7.14 MJ, wet mass 1 kg
- electricity, medium voltage: 0.0471143, 0.00419042, 0.36536, 0.478768, 0.507018, 0.25825, 0.0356682, 0.225753, 0.00952962, 1.52574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 kWh (47 suppliers, which the file names only by identifier); sum of these 36.2 kWh; source Yin, R. 2019; lognormal variance with pedigree 0.0106, pedigree (4,4,1,1,1)
  Literature. Table S27 in Yin et al. (2019)
  EcoSpold01Location=CN
- extrusion, plastic film: 1.09 kg; = polyethylene; lognormal variance with pedigree 0.0106, pedigree (4,4,1,1,1)
  Literature. Table S27 in Yin et al. (2019). This exchange, coupled with 'polyethylene, high density, granulate', is used as a proxy for 'polyethylene'.
- heat, district or industrial, natural gas: 40.703 MJ; name natural_gas; = 1.01 * 40.3; source Yin, R. 2019; lognormal variance with pedigree 0.0106, pedigree (4,4,1,1,1)
  Literature. Table S27 in Yin et al. (2019). Original value is 1.01 m3 natural gas. Gross calorific value: 40.3 MJ/m3 (Weidema et al., 2013. Overview and methodology- data quality guideline for the ecoinvent database version 3)
  EcoSpold01Location=RER
  properties: heating value, net 1 MJ
- paraffin: 0.00293 kg; source Yin, R. 2019; lognormal variance with pedigree 0.0106, pedigree (4,4,1,1,1)
  Literature. Table S27 in Yin et al. (2019). Paraffin is used as proxy for 'parafin wax'.
  properties: carbon content, fossil 0.847059, dry mass 1 kg, heating value, net 41.5 MJ, wet mass 1 kg
  note on heating value, net: Indicative value. Reference: Fuels - Higher and Lower Calorific Values, available at: https://www.engineeringtoolbox.com/fuels-higher-calorific-values-d_169.html
- polyethylene, high density, granulate: 1.09 kg; name polyethylene; source Yin, R. 2019; lognormal variance with pedigree 0.0106, pedigree (4,4,1,1,1)
  Literature. Table S27 in Yin et al. (2019). This exchange, coupled with extrusion plastic film, is used as a proxy for 'polyethylene'.
  properties: carbon content, fossil 0.857143, dry mass 1 kg, heating value, net 42.47 MJ, wet mass 1 kg
  note on carbon content, fossil: Polyethylene is formed out of a huge amount of ethylene monomers (C2H4) (ecoinvent v2.2 report 11_II). MW=28 g/mol

## Emissions to nature
- Dichloromethane [air, unspecified]: 0.0203 kg; lognormal variance with pedigree 0.13, pedigree (4,4,1,1,1)
  Literature. Table S27 in Yin et al. (2019). Proxy for 'dichloromethane'.
- NMVOC, non-methane volatile organic compounds [air, unspecified]: 0.00038 kg; source Yin, R. 2019; lognormal variance with pedigree 0.05, pedigree (4,4,1,1,1)
  Literature. Table S27 in Yin et al. (2019)
- Nitrogen oxides [air, unspecified]: 0.00196 kg; source Yin, R. 2019; lognormal variance with pedigree 0.05, pedigree (4,4,1,1,1)
  Literature. Table S27 in Yin et al. (2019)
- Particulate Matter, > 2.5 um and < 10um [air, unspecified]: 0.000261 kg; source Yin, R. 2019; lognormal variance with pedigree 0.13, pedigree (4,4,1,1,1)
  Literature. Table S27 in Yin et al. (2019)
- Sulfur dioxide [air, unspecified]: 0.000417 kg; source Yin, R. 2019; lognormal variance with pedigree 0.0106, pedigree (4,4,1,1,1)
  Literature. Table S27 in Yin et al. (2019)

## Sampling procedure
The data about the production process of the separator are retrieved from the literature (Yin et al., 2019 - Table S27, section 2.2.3.1 in the supplementary material).

Reference:
Yin, R., Hu, S., & Yang, Y. (2019). Life cycle inventories of the commonly used materials for lithium-ion batteries in China. Journal of Cleaner Production, 227, 960-971.

## Extrapolations
See comments to exchanges.
