# hay production

Dataset: EcoSpold 2, unit process
Geography: CA-QC
Time period: 2010-01-01 to 2023-12-31
Technology level: current
Classification: ISIC rev.4 ecoinvent: 0119:Growing of other non-perennial crops
Synonyms: Thimothy/alfalfa hay; Thimothy/red clover hay
Scenario: Business-as-Usual
System model: Allocation, cut-off by classification
Share of production covered: 75 %
Generated by: Dominique Maxime
Database: ecoinvent
isCopyrightProtected: true
accessRestrictedTo: 1

## General comment
This dataset represents the production of 1 kg dry matter of hay in the region of Québec. The 2010-2012 average yield is 6650 kg/ha (wet mass) at a moisture content at storage of 11%, i.e. 5918 kg dm/ha. The production considered is an average of intensive production of thimothy/red clover (70%) and thimothy/alfalfa (30%) hay in large and small bales. The crop rotation is 5 years.

## Included activities start
This activity starts with soil cultivation after the harvest of the previous crop.

## Included activities end
This activity ends after harvest and storage of hay bales at the farm gate.
The dataset includes the inputs of seeds, mineral and organic fertilisers, pesticides and all machine operations and corresponding machine infrastructure and sheds. Machine operations are: soil cultivation, transport of seeds, fertilisers and pesticides to the field (15 km), sowing, fertilisation, weed control, pest and pathogen control, haying, baling, loading, transport to farm and discharge at the roughage store. Direct field emissions are also included. No irrigation is involved for hay production in Québec. Use of car, van, or pick-up for servicing people (e.g. from farm to field) is excluded from the activities.

## Geography
The inventory is modelled for the region of Québec (Canada).

## Time period
Time of publications

## Parameters
- fraction, process water to water, to surface water: 0.2 dimensionless; name fraction_PWtoW_to_surface_water; lognormal variance with pedigree 0.0892, pedigree (4,3,1,4,4)
  For agricultural crop dataset, distinction is made between irrigation water and process water. Process water is the water that comes with manure or pesticide application. A fraction of the process water input evaporates to the air and the remaining is considered emitted to surface water and ground water.
  This value is a proxy, taken from ecoinvent v3.0 dataset 'potato production, US 2006'. 'Literature value (Döll, 2011) cross referenced with expert opinion.' as cited in original dataset.
- fraction, process water, to air: 0.6165 dimensionless; name fraction_PW_to_air; lognormal variance with pedigree 0.0413, pedigree (2,2,1,4,1)
  For agricultural crop dataset, distinction is made between irrigation water and process water. Process water is the water that comes with manure or pesticide application. A fraction of the process water input evaporates to the air and the remaining is considered emitted to surface water and ground water.
  By default, the same value as for irrigation is assumed: this is a Canada-wide value taken from database (Vionnet, S., Quantis Water Database - Technical report, 2012). Note that it might be lower in Quebec due to the more humid climate in Western Canada than in Eastern Canada.
- water content at harvest: 0.2 kg/kg; name harvest_wc; lognormal variance with pedigree 0.01, pedigree (1,1,1,1,1)
  Hay water content at harvest (wet mass basis). See supporting documentation '01 crop production - Québec.pdf' available on ecoinvent reports web page (https://ecoquery.ecoinvent.org/File/Reports).
- yield, agriculture: 6.65 metric ton/ha; name yield_agriculture; lognormal variance with pedigree 0.0081, pedigree (1,2,1,1,1)
  Amount (metric ton wet mass) of harvested and dried material (from 'harvest_wc' down to 'REF_PRODUCT_WWM') per hectare of cultivated land. See supporting documentation '01 crop production - Québec.pdf' available on ecoinvent reports web page (https://ecoquery.ecoinvent.org/File/Reports).

## Reference product
- hay: 1 kg; name REF_PRODUCT; By-product classification allocatable product; CPC 01919: Forage products, n.e.c.; HS2017 0604: Foliage, branches and other parts of plants, without flowers or flower buds, and grasses, mosses and lichens;[...]
  mix of hay grass like thimothy and leguminous like alfalfa and clover cultivated for dry hay
  production volume 2.24015e9 kg
    Kg dry matter. No disaggregated statistics are available to get separate production volume for dry hay and hay silage in Quebec. Hence, it is assumed that 50% of the total forage area harvested in Quebec (757000 ha, 2010-2011 average) is dedicated to dry hay, with a yield of 6650 kg/ha of dry hay at 89% dry matter (MAPAQ 2012 (http://www.mapaq.gouv.qc.ca/SiteCollectionDocuments/Tables%20filieres/fourrageres/secteurplantesfourageres.pdf); Beauregard, 2013).
  property carbon content, fossil 0; name REF_PRODUCT_C_content_fossil
    fossil carbon content on a dry matter basis
  property carbon content, non-fossil 0.4801; name REF_PRODUCT_C_content_non_fossil
    biogene carbon content on a dry matter basis. Composition data obtained from Feedipedia (http://www.feedipedia.org). First, composition data were refered to 1 kg dry mass. Then, C-contents were calculated considering a C-content/dry mass of 46% in carbohydrates (including fibres), 53% in proteins and 75% in fats. All data from 'Evolutionary and Biochemical Aspects', A.D. Kay and T. Vrede (in Global Ecology, 2010, Elsevier B.V., S.E. Jørgensen Ed.).
  property dry mass 1 kg; name REF_PRODUCT_DM; = REF_PRODUCT_WM - REF_PRODUCT_WWM
  property energy content 19 MJ; name REF_PRODUCT_energy_content
    Gross energy content on a dry matter basis. Average of Alfalfa and red clover hay. Source: Feedipedia (http://www.feedipedia.org)
  property price 0.0718138 EUR2005
    Calculated based on inputs: The price of the product has been calculated as a sum of the values of the material and energy inputs for this product. This value is therefore a rough estimation. It may underestimate the real price since there are additional expenses when producing any product. These expences can include for example labour costs, treatment of waste materials and profit for the producer. Please consider carefully whether this level of data quality is acceptable for your application.
  property water content 0.123596; name REF_PRODUCT_water_content; = REF_PRODUCT_WWM / REF_PRODUCT_DM
  property water in wet mass 0.123596 kg; name REF_PRODUCT_WWM; = REF_PRODUCT_WM*0.11
  property wet mass 1.1236 kg; name REF_PRODUCT_WM; = 1/0.89
  properties: carbon allocation 0.4801 kg, carbon content 0.4801

## Inputs from technosphere
- ammonia, anhydrous, liquid: 0.000188257 kg; lognormal variance with pedigree 0.0099, pedigree (2,2,4,1,2)
  Amount is determined from the mineral nutrient used for the crop and from the overall mineral fertilizers sales, by type of fertilizer, in Québec for agriculture (APNC, 2010). See details for disaggregation in supporting documentation '01 crop production - Québec.pdf' available on ecoinvent reports web page (https://ecoquery.ecoinvent.org/File/Reports).
  properties: dry mass 1 kg, wet mass 1 kg
- ammonium nitrate: 0.00268333 kg; lognormal variance with pedigree 0.0099, pedigree (2,2,4,1,2)
  The exchange has been updated from 'ammonium nitrate, as N' into 'ammonium nitrate' and therefore its amount has been scaled (multiplied) from 0.0009 kg by 2.8573 kg of 'ammonium nitrate' per kg of 'ammonium nitrate, as N'. Original comment of the exchange is: Amount is determined from the mineral nutrient used for the crop and from the overall mineral fertilizers sales, by type of fertilizer, in Québec for agriculture (APNC, 2010). See details for disaggregation in supporting documentation '01 crop production - Québec.pdf' available on ecoinvent reports web page (https://ecoquery.ecoinvent.org/File/Reports).
  properties: dry mass 1 kg, wet mass 1 kg
- ammonium sulfate: 0.000131131 kg; lognormal variance with pedigree 0.0099, pedigree (2,2,4,1,2)
  (same comment as for ammonia, anhydrous, liquid)
  properties: dry mass 1 kg, wet mass 1 kg
- application of plant protection product, by field sprayer: 1.59e-5 ha; lognormal variance with pedigree 0.0099, pedigree (2,2,4,1,2)
  Once, in the establishment year; 47% of cropand area receives plant protection products in average. See supporting documentation '01 crop production - Québec.pdf' available on ecoinvent reports web page (https://ecoquery.ecoinvent.org/File/Reports).
- bale loading: 0.0154 unit; lognormal variance with pedigree 0.0099, pedigree (2,2,4,1,2)
  bales discharge and storage in roughage store
- baling: 0.0039812 unit; lognormal variance with pedigree 0.0099, pedigree (2,2,4,1,2)
  Note this is an average for large round bales and small square bales. In terms of bale units, the resulting figure is representative of a number of large round bales.
- borax, anhydrous, powder: 0.00017218 kg; lognormal variance with pedigree 0.0099, pedigree (2,2,4,1,2)
  For boron (B) micro-nutrient supply. 1,53 kg/ha of borate at 14.3% in boron ; borax anhydrous is at 21,47% boron
  properties: dry mass 1 kg, wet mass 1 kg
- clover seed, Swiss integrated production, for sowing: 0.00053906 kg; name SEED; lognormal variance with pedigree 0.0099, pedigree (2,2,4,1,2)
  Proxy for 1,0186E-04 kg alfalfa seeds, 2,3655E-04 kg thimothy seeds and 2,0065E-04 kg red clover seeds. See supporting documentation '01 crop production - Quebec.pdf' available on ecoinvent reports web page (https://ecoquery.ecoinvent.org/File/Reports).
  property carbon content, non-fossil 0.469421; name SEED_C_content_non_fossil
  properties: dry mass 0.9 kg, water content 0.111111, wet mass 1 kg
- fertilising, by broadcaster: 0.000168962 ha; lognormal variance with pedigree 0.0099, pedigree (2,2,4,1,2)
  See supporting documentation '01 crop production - Québec.pdf' available on ecoinvent reports web page (https://ecoquery.ecoinvent.org/File/Reports).
- glyphosate: 4.393e-6 kg; lognormal variance with pedigree 0.0414, pedigree (1,2,5,3,2)
  (same comment as for fertilising, by broadcaster)
  properties: carbon content, fossil 0.214286, dry mass 1 kg, wet mass 1 kg
- haying, by rotary tedder: 0.00073779 ha; lognormal variance with pedigree 0.0099, pedigree (2,2,4,1,2)
  this includes two operations modelled with the same machinery: raking and tedding. However, specific diesel consumption of the two machinery is accounted for.
- inorganic nitrogen fertiliser, as N: 0.00211939 kg; lognormal variance with pedigree 0.0099, pedigree (2,2,4,1,2)
  Amount is determined from beaureagrd (2013) and from the overall mineral fertilizers sales, by type of fertilizer, in Québec for agriculture (APNC, 2010). See details for disaggregation in supporting documentation '01 crop production - Québec.pdf' available on ecoinvent reports web page (https://ecoquery.ecoinvent.org/File/Reports).
  properties: dry mass 1 kg, wet mass 1 kg
- inorganic phosphorus fertiliser, as P2O5: 0.00366647 kg; lognormal variance with pedigree 0.0099, pedigree (2,2,4,1,2)
  Amount is determined from the mineral nutrient used for the crop (Beauregard, 2013) and from the overall mineral fertilizers sales, by type of fertilizer, in Québec for agriculture (APNC, 2010). See details for disaggregation in supporting documentation '01 crop production - Québec.pdf' available on ecoinvent reports web page (https://ecoquery.ecoinvent.org/File/Reports).
  Mono- and di-ammonium phosphate (MAP and DAP), as P2O5. The concommitant supply of nitrogen by DAP is accounted for in total N requirements. See supporting documentation '01 crop production - Québec.pdf' available on ecoinvent reports web page (https://ecoquery.ecoinvent.org/File/Reports).
  properties: dry mass 1 kg, wet mass 1 kg
- lime: 0.0325251 kg; name LIME_CaCO3; source Beauregard, G. 2013; lognormal variance with pedigree 0.0099, pedigree (2,2,4,1,2)
  as CaCO3. Beauregard (2013).
  properties: carbon content, fossil 0.120005, dry mass 1 kg, wet mass 1 kg
- liquid manure spreading, by vacuum tanker: 0.000275349 m3; lognormal variance with pedigree 0.0099, pedigree (2,2,4,1,2)
  Calculated from liquid manure input rate and crop yield.
- manure, liquid, cattle: 0.12282 kg; name MANURE_LIQUID_CATTLE; lognormal variance with pedigree 0.0099, pedigree (2,2,4,1,2)
  Amount of 0.12282 kg of manure, liquid, cattle is needed when producing 1kg of hay.
  Amount is determined from the organic nutrient actually used for the crop and from data about organic fertilizer production, by type, in Québec (MAPAQ, 2013). See details for disaggregation in supporting documentation '01 crop production - Québec.pdf' available on ecoinvent reports web page (https://ecoquery.ecoinvent.org/File/Reports).
  property water in wet mass 0.925 kg; name MANURE_LIQUID_CATTLE_WWM
  properties: carbon content, non-fossil 0.68, dry mass 0.075 kg, nitrogen content 0.03681, water content 12.333, wet mass 1 kg
  note on nitrogen content: Total N content on a dry matter basis. Weighted average of beef cattle liquid manure (0.0425 kg N/kg dm) and dairy cattle liquid manure (0.03611 kg N/kg dm) considering that N supply in central and peripherical agricultural regions is for 89% from dairy and 11% from beef cattle (MAPAQ, 2013). N content from Parent and Gagné (2013).
- manure, liquid, swine: 0.15253 kg; name MANURE_LIQUID_SWINE; lognormal variance with pedigree 0.0099, pedigree (2,2,4,1,2)
  Amount of 0.15253 kg of manure, liquid, swine is needed when producing 1kg of hay.
  Amount is determined from the organic nutrient actually used for the crop (CECPA, 2011) and from data about organic fertilizer production, by type, in Québec (MAPAQ, 2013). See details for disaggregation in supporting documentation '01 crop production - Québec.pdf' available on ecoinvent reports web page (https://ecoquery.ecoinvent.org/File/Reports).
  property water in wet mass 0.95 kg; name MANURE_LIQUID_SWINE_WWM
  properties: carbon content, non-fossil 0.64, dry mass 0.05 kg, nitrogen content 0.1, water content 19, wet mass 1 kg
- manure, solid, cattle: 0.03644 kg; name MANURE_SOLID_CATTLE; lognormal variance with pedigree 0.0099, pedigree (2,2,4,1,2)
  Amount of 0.03644 kg of manure, solid, cattle is needed when producing 1kg of hay.
  Amount is determined from the organic nutrient actually used for the crop (CECPA, 2011) and from data about organic fertilizer production, by type, in Québec (MAPAQ, 2013). See details for disaggregation in supporting documentation '01 crop production - Québec.pdf' available on ecoinvent reports web page (https://ecoquery.ecoinvent.org/File/Reports).
  property water in wet mass 0.78 kg; name MANURE_SOLID_CATTLE_WWM
  properties: carbon content, non-fossil 0.441, dry mass 0.22 kg, nitrogen content 0.02734, water content 3.5454, wet mass 1 kg
  note on nitrogen content: Total N content on a dry matter basis. Weighted average of beef cattle solid manure (0.02639 kg N/kg dm) and dairy cattle solid manure (0.02789 kg N/kg dm) considering that N supply in central and peripherical agricultural regions is about 63% from dairy and 37% from beef cattle (MAPAQ, 2013). N content from Parent and Gagné (2013).
- operation, dried roughage store, cold-air dried, conventional: 1 kg; = REF_PRODUCT; lognormal variance with pedigree 0.008, pedigree (1,1,4,1,1)
  Calculated from amount of reference flow (same amount and unit)
- packaging, for fertilisers: 0.116618 kg; lognormal variance with pedigree 0.0592, pedigree (4,3,4,5,4)
  Total amount of active substance/s of fertilisers needed for the production of 'hay' is calculated to be circa 5.83E-02 kg. Fertiliser/s used in this dataset is/are: 'ammonia, liquid', 'ammonium nitrate, as N', 'ammonium sulfate, as N', 'lime', 'nitrogen fertiliser, as N', 'phosphate fertiliser, as P2O5', 'potassium chloride, as K2O', 'potassium sulfate, as K2O', 'urea, as N'. The total amount of active substance/s is doubled in order to account for the packaging of the dilluted product of fertiliser/s that is/are applied. Therefore, 1.17E-01 kg of packaging for fertilisers is justified with this exchange.
  properties: carbon content, fossil 0.825301, dry mass 1 kg, heating value, net 25.01 MJ, price 0.0642 EUR2005, wet mass 1 kg
  note on carbon content, fossil: Considering a chemical formula (C2H4)n for polyethylene, carbon content-fossil is calculated to be 0.856286 kg of Carbon per kg of dry mass.
- packaging, for pesticides: 0.000355512 kg; lognormal variance with pedigree 0.0592, pedigree (4,3,4,5,4)
  Total amount of active substance/s of pesticides needed for the production of hay is calculated to be circa 1.78E-04 kg. Pesticide/s used in this dataset is/are: 'borax, anhydrous, powder', 'glyphosate', 'pesticide, unspecified', 'phenoxy-compound'. The total amount of active substance/s is doubled in order to account for the packaging of the dilluted product of pesticide/s that is/are applied. Therefore, 3.56E-04 kg of packaging for pesticides is justified with this exchange.
  properties: carbon content, fossil 0.85714, dry mass 1 kg, heating value, net 25.97 MJ, price 0.0642 EUR2005, wet mass 1 kg
- pesticide, unspecified: 1.6896e-7 kg; lognormal variance with pedigree 0.0414, pedigree (1,2,5,3,2)
  herbicide, unspecified (4% of total pesticides input). Emitted fractions of these pesticides are not accounted for, i.e. all input is modelled as emitted to soil. See supporting documentation '01 crop production - Québec.pdf' available on ecoinvent reports web page (https://ecoquery.ecoinvent.org/File/Reports).
  properties: carbon content, fossil 0.486978, dry mass 1 kg, wet mass 1 kg
  note on carbon content, fossil: Mean of C content in all pesticides whose formula has been documented in Sutter 2010
- phenoxy-compound: 1.0138e-6 kg; lognormal variance with pedigree 0.0414, pedigree (1,2,5,3,2)
  3,3792E-07 kg 2,4-D ester and 6,7585E-07 kg 2,4-DB. See supporting documentation '01 crop production - Quebec.pdf' available on ecoinvent reports web page (https://ecoquery.ecoinvent.org/File/Reports).
  properties: carbon content, fossil 0.532559, dry mass 1 kg, wet mass 1 kg
- potassium chloride: 0.0241053 kg; lognormal variance with pedigree 0.0099, pedigree (2,2,4,1,2)
  The exchange has been updated from 'potassium chloride, as K2O' into 'potassium chloride' and therefore its amount has been scaled (multiplied) from 0.0152 kg by 1.5829 kg of 'potassium chloride' per kg of 'potassium chloride, as K2O'. Original comment of the exchange is: Amount is determined from the mineral nutrient used for the crop and from the overall mineral fertilizers sales, by type of fertilizer, in Québec for agriculture (APNC, 2010). See details for disaggregation in supporting documentation '01 crop production - Québec.pdf' available on ecoinvent reports web page (https://ecoquery.ecoinvent.org/File/Reports).
  The potash domestic market in Canada is supplied almost exclusively by domestic production and Quebec resellers of potassium chloride have a preferential trade agreement for supplying fertilizer from Canadian producers. Hence, potassium chloride used in quebec does not rely on the global market and a direct link to Canadian potassium chloride is used. Sources: 1) personnal communication with Gilles Lavoie from the Quebec Professional Association in Crop Nutrition and the Coop Fédérée Inc. (2013); 2) Temple Scott Associates inc. (2013). Fertilizer report for the Canadian Fertilizer Industry. April 5, 2013, 10 p. http://www.cfi.ca/_documents/Fertilizer%20Industry%20Report-%20FINAL.pdf
  properties: dry mass 1 kg, wet mass 1 kg
- potassium sulfate: 0.00267861 kg; lognormal variance with pedigree 0.0099, pedigree (2,2,4,1,2)
  The exchange has been updated from 'potassium sulfate, as K2O' into 'potassium sulfate' and therefore its amount has been scaled (multiplied) from 0.0014 kg by 1.85 kg of 'potassium sulfate' per kg of 'potassium sulfate, as K2O'.
  properties: dry mass 1 kg, wet mass 1 kg
- poultry manure, fresh: 0.011133 kg; lognormal variance with pedigree 0.0099, pedigree (2,2,4,1,2)
  Amount of 0.011133 kg of poultry manure, fresh is needed when producing 1kg of hay.
  Amount is determined from the organic nutrient used for the crop (Beauregard, 2013) and from data about organic fertilizer production, by type, in Québec (MAPAQ, 2013). See details for disaggregation in supporting documentation '01 crop production - Québec.pdf' available on ecoinvent reports web page (https://ecoquery.ecoinvent.org/File/Reports).
  properties: carbon content, non-fossil 0.33389, dry mass 0.38 kg, nitrogen content 0.04044, water content 1.63158, wet mass 1 kg
- solid manure loading and spreading, by hydraulic loader and spreader: 0.0475746 kg; lognormal variance with pedigree 0.0099, pedigree (2,2,4,1,2)
  Calculated from solid manure input rate and crop yield.
- sowing: 3.5893e-5 ha; lognormal variance with pedigree 0.0099, pedigree (2,2,4,1,2)
  (same comment as for fertilising, by broadcaster)
- swath, by rotary windrower: 0.00038988 ha; lognormal variance with pedigree 0.0099, pedigree (2,2,4,1,2)
  2 or 3 cuts a year depending on the crop; 2.3 in the weighted average
- tillage, ploughing: 3.3135e-5 ha; lognormal variance with pedigree 0.0099, pedigree (2,2,4,1,2)
  (same comment as for fertilising, by broadcaster)
- tillage, rotary cultivator: 4.931e-5 ha; lognormal variance with pedigree 0.0099, pedigree (2,2,4,1,2)
  2 passes, once. See supporting documentation '01 crop production - Quebec.pdf' available on ecoinvent reports web page (https://ecoquery.ecoinvent.org/File/Reports).
- transport, tractor and trailer, agricultural: 0.021259 metric ton*km; lognormal variance with pedigree 0.1293, pedigree (2,2,4,1,2)
  transport of bales from field to farm for storage, and transport of inputs from farm to field (assuming 15 km). See supporting documentation '01 crop production - Québec.pdf' available on ecoinvent reports web page (https://ecoquery.ecoinvent.org/File/Reports).
- urea: 0.00442218 kg; name UREA_N; lognormal variance with pedigree 0.0099, pedigree (2,2,4,1,2)
  The exchange has been updated from 'urea, as N' into 'urea' and therefore its amount has been scaled (multiplied) from 0.0021 kg by 2.1438 kg of 'urea' per kg of 'urea, as N'. Original comment of the exchange is: Amount is determined from the mineral nutrient used for the crop and from the overall mineral fertilizers sales, by type of fertilizer, in Québec for agriculture (APNC, 2010). See details for disaggregation in supporting documentation '01 crop production - Québec.pdf' available on ecoinvent reports web page (https://ecoquery.ecoinvent.org/File/Reports).
  properties: carbon content, fossil 0.2, dry mass 1 kg, wet mass 1 kg

## Inputs from nature
- Carbon dioxide, in air [natural resource, in air]: 1.75944 kg; = 44/12 * (REF_PRODUCT_C_content_non_fossil * REF_PRODUCT * REF_PRODUCT_DM - SEED_C_content_non_fossil * SEED * REF_PRODUCT_DM); lognormal variance with pedigree 0.008, pedigree (1,1,4,1,1)
  Calculated value, see chapter 'CO2 binding' in '01 crop production-direct field emissions natural resources v1.2.pdf' available on ecoinvent reports web page (https://ecoquery.ecoinvent.org/File/Reports). The 44/12 ratio is the stoichiometric mass ratio of carbon dioxide to carbon.
- Energy, gross calorific value, in biomass [natural resource, biotic]: 17.9 MJ; lognormal variance with pedigree 0.1313, pedigree (3,3,4,3,5)
  Estimated to be the same as in case of other hay production activities.
- Occupation, pasture, man made, intensive [natural resource, land]: 1.6333 m2*year; = OCCUP_period * (1 / (yield_agriculture / REF_PRODUCT_WM* UnitConversion(1, 'metric ton', 'kg'))) * UnitConversion(1, 'ha', 'm2'); lognormal variance with pedigree 0.008, pedigree (1,1,4,1,1)
  Calculated value. See Exchange Properties and Parameters.
  property occupation period 0.96667 year; name OCCUP_period
- Transformation, from pasture, man made, intensive [natural resource, land]: 1.68962 m2; = (1 / (yield_agriculture / REF_PRODUCT_WM* UnitConversion(1, 'metric ton', 'kg'))) * UnitConversion(1, 'ha', 'm2'); lognormal variance with pedigree 0.008, pedigree (1,1,4,1,1)
  Calculated value. See Parameters.
- Transformation, to pasture, man made, intensive [natural resource, land]: 1.68962 m2; = (1 / (yield_agriculture / REF_PRODUCT_WM* UnitConversion(1, 'metric ton', 'kg')))*UnitConversion(1, 'ha', 'm2'); lognormal variance with pedigree 0.008, pedigree (1,1,4,1,1)
  Calculated value. See Parameters.

## Emissions to nature
- 2,4-DB [air, non-urban air or from high stacks]: 6.0319e-8 kg; lognormal variance with pedigree 0.0813, pedigree (2,2,5,1,2)
  2,822E-08 kg 2,4-D ester + 3,2103E-08 kg kg 2,4-DB. Modelled with PestLCI 2.0 (Dijkman et al. 2012). See supporting documentation '01 crop production - Québec.pdf' available on ecoinvent reports web page (https://ecoquery.ecoinvent.org/File/Reports).
- Ammonia [air, non-urban air or from high stacks]: 0.00116266 kg; lognormal variance with pedigree 0.0173, pedigree (2,2,4,1,2)
  NH3 from mineral fertilisers are calculated with the emission factors published in the EMEP guidelines from the European Environment Agency (EEA, 2013). NH3 from manure are calculated according to the caracteristics of every manure, and to Quebec figures for period and method of maqnure application, and delay before incorporation of manure into the soil (Parent et Gagné, 2010; 2013). See supporting documentation '01 crop production - Québec.pdf' available on ecoinvent reports web page (https://ecoquery.ecoinvent.org/File/Reports).
- Carbon dioxide, fossil [air, non-urban air or from high stacks]: 0.0175517 kg; = UREA_N*0.466461632733939*1.571 +LIME_CaCO3*0.44; lognormal variance with pedigree 0.008, pedigree (1,1,4,1,1)
  Carbon dioxide emissions from limestone and urea application calculated from C content (IPCC, 2006). Emission factors are EF=1.57 kg CO2/kg N for urea, and EF=0.44 kg CO2/kg CaCO3 for limestone. See supporting documentation '01 crop production - Quebec.pdf' available on ecoinvent reports web page (https://ecoquery.ecoinvent.org/File/Reports).
- Dinitrogen monoxide [air, non-urban air or from high stacks]: 0.000711335 kg; name N2O; source Rochette, P. 2008; lognormal variance with pedigree 0.0393, pedigree (2,2,4,1,2)
  Direct and indirect N2O emissions from all sources of N input (fertilizers, above- and below-ground crop residues). Modelled with Québec conditions using the Tier 2 approach (IPCC 2006; Rochette et al. 2008; Little et al. 2008, 2013). See supporting documentation '01 crop production - Quebec.pdf' available on ecoinvent reports web page (https://ecoquery.ecoinvent.org/File/Reports).
- Glyphosate [air, non-urban air or from high stacks]: 1.8011e-8 kg; source Dijkman, T.J. 2012; lognormal variance with pedigree 0.0813, pedigree (2,2,5,1,2)
  Modelled with PestLCI 2.0 (Dijkman et al. 2012). See supporting documentation '01 crop production - Québec.pdf' available on ecoinvent reports web page (https://ecoquery.ecoinvent.org/File/Reports).
- Nitrogen oxides [air, non-urban air or from high stacks]: 0.000230286 kg; lognormal variance with pedigree 0.0173, pedigree (2,2,4,1,2)
  Calculated with an emission factor (EF=0.012 kg NO-N/kg N ) from total N application less NH3-N lost through volatilization. Conversion from NO-N to NO2 with factor=46/14. See supporting documentation '01 crop production - Quebec.pdf' available on ecoinvent reports web page (https://ecoquery.ecoinvent.org/File/Reports).
  property emission ratio 0.21 kg/kg; name NOx_to_N2O
- Water [air, non-urban air or from high stacks]: 0.000176896 m3; = ((MANURE_LIQUID_CATTLE* MANURE_LIQUID_CATTLE_WWM) + (MANURE_LIQUID_SWINE* MANURE_LIQUID_SWINE_WWM) + (MANURE_SOLID_CATTLE* MANURE_SOLID_CATTLE_WWM))* fraction_PW_to_air* UnitConversion(1, 'l', 'm3')
  Calculated value; See Parameters. Water emitted from: irrigated water (if any), process water.
- Water [air, unspecified]: 0.000126404 m3; = (1/(1-harvest_wc) - REF_PRODUCT_WM) / 1000; lognormal variance with pedigree 0.008, pedigree (1,1,4,1,1)
  Calculated from average moisture content of hay at harvest (see Exchange Properties and Parameters)
- 2,4-DB [soil, agricultural]: 9.2868e-7 kg; lognormal variance with pedigree 0.0743, pedigree (2,2,5,1,2)
  3,0156E-07 kg 2,4-D ester + 6,2712E-07 kg kg 2,4-DB. Modelled with PestLCI 2.0 (Dijkman et al. 2012). See supporting documentation '01 crop production - Québec.pdf' available on ecoinvent reports web page (https://ecoquery.ecoinvent.org/File/Reports).
- Cadmium II [soil, agricultural]: -2.2942e-7 kg
  Calculated value. See supporting documentation '01 crop production - Québec.pdf' available on ecoinvent reports web page (https://ecoquery.ecoinvent.org/File/Reports).
- Chromium III [soil, agricultural]: -3.8802e-6 kg
  (same comment as for Cadmium II)
- Copper ion [soil, agricultural]: -1.2733e-5 kg
  (same comment as for Cadmium II)
- Glyphosate [soil, agricultural]: 4.2735e-6 kg; lognormal variance with pedigree 0.0743, pedigree (2,2,5,1,2)
  (same comment as for Glyphosate)
- Lead II [soil, agricultural]: -3.0473e-6 kg
  (same comment as for Cadmium II)
- Nickel II [soil, agricultural]: -1.357e-5 kg
  (same comment as for Cadmium II)
- Pesticides, unspecified [soil, agricultural]: 1.6896e-7 kg; lognormal variance with pedigree 0.0743, pedigree (2,2,5,1,2)
  Because of lack of information on the active ingredient of the herbicide input, it is assumed entirely emitted to the soil
- Zinc II [soil, agricultural]: -5.0292e-5 kg
  (same comment as for Cadmium II)
- 2,4-DB [water, ground-]: 2.4668e-8 kg; lognormal variance with pedigree 0.0813, pedigree (2,2,5,1,2)
  8,1102E-09 kg 2,4-D ester + 1,6558E-08 kg 2,4-DB. Modelled with PestLCI 2.0 (Dijkman et al. 2012). See supporting documentation '01 crop production - Québec.pdf' available on ecoinvent reports web page (https://ecoquery.ecoinvent.org/File/Reports).
- 2,4-DB [water, surface water]: 1.0171e-10 kg; lognormal variance with pedigree 0.0813, pedigree (2,2,5,1,2)
  3,3792E-11 kg 2,4-D ester + 6,7923E-11 kg 2,4-DB. Modelled with PestLCI 2.0 (Dijkman et al. 2012). See supporting documentation '01 crop production - Québec.pdf' available on ecoinvent reports web page (https://ecoquery.ecoinvent.org/File/Reports).
- Cadmium II [water, surface water]: 2.3194e-7 kg; lognormal variance with pedigree 0.0887, pedigree (5,2,4,1,2)
  (same comment as for Cadmium II)
- Chromium III [water, surface water]: 1.0971e-5 kg; lognormal variance with pedigree 0.0887, pedigree (5,2,4,1,2)
  (same comment as for Cadmium II)
- Copper ion [water, surface water]: 7.7662e-6 kg; lognormal variance with pedigree 0.0887, pedigree (5,2,4,1,2)
  (same comment as for Cadmium II)
- Glyphosate [water, ground-]: 1.0104e-7 kg; source Dijkman, T.J. 2012; lognormal variance with pedigree 0.0813, pedigree (2,2,5,1,2)
  (same comment as for Glyphosate)
- Glyphosate [water, surface water]: 4.415e-10 kg; source Dijkman, T.J. 2012; lognormal variance with pedigree 0.0813, pedigree (2,2,5,1,2)
  (same comment as for Glyphosate)
- Lead II [water, surface water]: 3.1229e-6 kg; lognormal variance with pedigree 0.0887, pedigree (5,2,4,1,2)
  (same comment as for Cadmium II)
- Nickel II [water, surface water]: 1.3329e-5 kg; lognormal variance with pedigree 0.0887, pedigree (5,2,4,1,2)
  (same comment as for Cadmium II)
- Nitrate [water, ground-]: 0.0567609 kg; lognormal variance with pedigree 0.0493, pedigree (2,2,4,1,2)
  Modelled with the 'SQCB-NO3 model' described in '01 crop production-direct field emissions natural resources v1.2.pdf' available on ecoinvent reports web page (https://ecoquery.ecoinvent.org/File/Reports). Québec average conditions are considered for the SQCB-NO3 model input parameters (see supporting documentation '01 crop production - Québec.pdf' available on ecoinvent reports web page (https://ecoquery.ecoinvent.org/File/Reports)).
- Phosphate [water, surface water]: 0.00013502 kg; source Michaud, A.R. 2008; lognormal variance with pedigree 0.0493, pedigree (2,2,4,1,2)
  Modelled with Québec conditions with the 'ODEP model' (Michaud et al., 2008). See supporting documentation '01 crop production - Quebec.pdf' available on ecoinvent reports web page (https://ecoquery.ecoinvent.org/File/Reports).
  property carbon content, fossil 0; name C_content_fossil
  property carbon content, non-fossil 0; name C_content_non_fossil
  property dry mass 1 kg; name DM
  property water content 0; name water_content
  property water in wet mass 0 kg; name WWM
  property wet mass 1 kg; name WM
- Phosphorus [water, surface water]: 2.4479e-5 kg; source Michaud, A.R. 2008; lognormal variance with pedigree 0.0493, pedigree (2,2,4,1,2)
  (same comment as for Phosphate)
- Water [water, ground-]: 8.80317e-5 m3; = ((MANURE_LIQUID_CATTLE* MANURE_LIQUID_CATTLE_WWM) + (MANURE_LIQUID_SWINE* MANURE_LIQUID_SWINE_WWM) + (MANURE_SOLID_CATTLE* MANURE_SOLID_CATTLE_WWM))* (1-fraction_PW_to_air)*(1- fraction_PWtoW_to_surface_water)* UnitConversion(1, 'l', 'm3')
  (same comment as for Water)
- Water [water, surface water]: 2.20079e-5 m3; = ((MANURE_LIQUID_CATTLE* MANURE_LIQUID_CATTLE_WWM) + (MANURE_LIQUID_SWINE* MANURE_LIQUID_SWINE_WWM) + (MANURE_SOLID_CATTLE* MANURE_SOLID_CATTLE_WWM))* (1-fraction_PW_to_air)*fraction_PWtoW_to_surface_water* UnitConversion(1, 'l', 'm3')
  (same comment as for Water)
- Zinc II [water, surface water]: 4.4306e-5 kg; lognormal variance with pedigree 0.0887, pedigree (5,2,4,1,2)
  (same comment as for Cadmium II)

## Sampling procedure
Literature and statistics data, opinions of experts in the field of agricultural production and agroeconomists.

## Extrapolations
Transports are modelled with standard distances. Machine usage is modelled with Québec diesel consumptions and field works (Beauregard, 2013) and Swiss machines. Mineral fertilizer types are extrapolated from overall mineral fertilizers sales in Québec (APNC 2011). Organic fertilizer types are extrapolated from animal manure supply data, per region in Québec, communicated by the Ministry of Agriculture (MAPAQ). Data about agricultural management practices are from BPR (2008. Suivi 2007 du Portrait agroenvironnemental des fermes du Que´bec). Emissions are calculated with standard methods according to ecoinvent documentation (Nemecek and Schnetzer, 2011. '01 crop production-direct field emissions natural resources' v1.2, August 2011, available at https://ecoquery.ecoinvent.org/File/Reports) and the World Food LCA Database guidelines (Nemecek et al. 2014, available at http://www.quantis-intl.com/microsites/wfldb/), except for : 1) pesticides emitted fractions (modelled using PestLCI 2.0, a global model, considering Québec average conditions for model input parameters, and considering that the degradation/uptake fraction calculated by PestLCI is actually emitted to soil - see the supporting documentation '01 crop production - Québec.pdf' for rationale), 2) phosphorus and phosphate emissions (modelled using ODEP, a Québec model, considering geospatialized weighted average conditions for soil, hydrology, and agricultural management practices), and 3) ammonia emissions from organic fertilizers which are calculated according to Québec conditions and agricultural management practices (coefficients are taken from Parent et Gagné (2010 and 2013 update). Furthermore, an IPCC Tier 2 approach is used for N2O emissions using regional and ecodistrict-based emission factors (Rochette et al., 2008). Due to lack of comprehensive data on pesticides use for Québec, data from a 2008 survey in the neighbouring province of Ontario are used (OMAFRA, 2008). Uncertainty in terms of the variance of the logtransformed data is the default value as provided by the Data Quality Guidelines for ecoinvent v3 (available at http://www.ecoinvent.org/support/documents-and-files/). Details on modelling and calculations are reported in the supporting documentation '01 crop production - Québec.pdf' available on ecoinvent reports web page (https://ecoquery.ecoinvent.org/File/Reports).

## Review by Emilia Moreno Ruiz 2015-10-13
activity links to CA-QC machinery added
