# trout feed production, commercial

Dataset: EcoSpold 2, unit process
Geography: RLA
Time period: 2012-01-01 to 2023-12-31
Technology level: current
Classification: ISIC rev.4 ecoinvent: 1080:Manufacture of prepared animal feeds
Scenario: Business-as-Usual
System model: Allocation, cut-off by classification
Generated by: Angel Avadí
Published in: Angel Avadí 2015
Database: ecoinvent
isCopyrightProtected: true
accessRestrictedTo: 1

## General comment
Data from the Anchoveta Supply Chain project. Composition data from trout feed used in Peru and Chile. Energy use data from Pelletier et al. (2009)

## Geography
Trout feed formulation common in Peru and Chile

## Technology
Common feed formulation for salmonids

## Reference product
- trout feed, 42% protein: 1 kg; By-product classification allocatable product; CPC 2331: Preparations used in animal feeding; HS2017 230990: Dog or cat food; (not put up for retail sale), used in animal feeding
  Trout feed, 42% protein
  production volume 8.86368e7 kg; = 63312000*1.4
    63 312 t per year produced in RLA (2012-2014), multiplied by the average FCR (1.4)
  property price 1.62383 EUR2005
    Calculated value based on data from United Nations Commodity Trade Statistics Database (comtrade.un.org). UN comtrade category: 230990 Dog or cat food; (not put up for retail sale), used in animal feeding. Year 2016. Using exchange rate of 1EURO = 1.209 USD. Average of price of import into 4 main markets (EU, US and IN).
  properties: carbon allocation 0 kg, carbon content 0

## Inputs from technosphere
All rows: lognormal variance with pedigree 0.041925, pedigree (2,2,5,2,2)
- electricity, medium voltage: 0.07825 kWh; = 281.7/3.6
  Electricity use
- fish oil, from anchovy: 0.06 kg
  Fish oil from the coproduction of fishmeal and fish oil. The ratio between the two co-products cannot be modified.
- fishmeal, 65-67% protein: 0.2 kg
  Fishmeal from the coproduction of fishmeal and fish oil. The ratio between the two co-products cannot be modified.
- heat, district or industrial, natural gas: 0.6272 MJ
  Heat from LPG burned in industrial boiler
  properties: heating value, net 1 MJ
- heat, district or industrial, other than natural gas: 0.2098 MJ
  Heat from heavy fuel oil burned in industrial boiler
  properties: corresponding fuel use, propane, furnace >100kW 1.05263 MJ, heating value, net 1 MJ
  note on corresponding fuel use, propane, furnace >100kW: Lower heating value of the fuel input related to the heat/electricity output, taken directly from ecoinvent v3.0 dataset "heat production, natural gas, at industrial furnace >100kW, GLO 2000".
- maize grain, feed: 0.1 kg; = 50+50
  Maize and maize gluten meal
  properties: carbon content, non-fossil 0.46957, dry mass 0.86 kg, water content 0.162791, wet mass 1 kg
- meat and bone meal: 0.2 kg; name meat_and_bone_meal; = 50+150
  Blood and meat meal from poultry
  property carbon content, fossil 0; name meat_and_bone_meal_C_content_fossil
  property carbon content, non-fossil 0.521; name meat_and_bone_mea_C_content_non_fossil_0
  property dry mass 0.96 kg; name meat_and_bone_meal_DM
  property heating value, net 21.45 MJ; name meat_and_bone_meal_Net_Heat_Value
  property water content 0.0416667; name meat_and_bone_meal_water_content
  property water in wet mass 0.04 kg; name meat_and_bone_meal_WWM
  property wet mass 1 kg; name meat_and_bone_meal_WM
  note on carbon content, non-fossil: Boesch & Hellweg 2010, 2010, Boesch, M.E., Hellweg, S., Identifying Improvement Potentials in Cement Production with Life Cycle Assessment, Environmental Science & Technology, 44, 23, 9143-9149, 1 - Article, Supporting information is available via http://pubs.acs.org
- oil mill: 8.63334e-10 unit; = (1/13/50)*1000/1782000
  Aquafeed plant with processing capacity of 1782 t/y (oil mill: 63 t/day, 50 y)
  properties: lifetime capacity [kg] 1.1e9 kg
- protein feed, 100% crude: 0.007 kg
  Aminoacids by-products
  properties: carbon content, non-fossil 0.53, dry mass 1 kg, wet mass 1 kg
- quicklime, milled, loose: 0.008 kg
  Calcium carbonate
  properties: dry mass 0.99 kg, water content 0.010101, wet mass 1 kg
- rice, non-basmati: 0.1 kg
  properties: carbon content, non-fossil 0.46412, dry mass 0.87 kg, water content 0.149425, wet mass 1 kg
- sodium chloride, powder: 0.005 kg
  Vitamin+mineral mix
  properties: dry mass 1 kg, wet mass 1 kg
- soybean meal: 0.2 kg
  properties: carbon content, non-fossil 0.475627, dry mass 0.89 kg, water content 0.123596, wet mass 1 kg
- vegetable oil, refined: 0.02 kg; = 10+10
  palm oil (10) + soya bean oil (10)
  properties: carbon content, non-fossil 0.768, dry mass 1 kg, heating value, net 38.4 MJ, wet mass 1 kg
  note on heating value, net: Values is approximated from HHV from "vegetable oil, crude". Source: Radovanovic,M.; Zivanovic,T.; Stojiljkovic,D.; Jovanovic,V.; Jerinic,N.; Knezevic,S. et.al. Utilization of sunflower husk as a fuel for industrial boilers - 20 years experience. Proc. 5th Eur. Conf. on Industrial Furnaces&Boilers 2000,vol.2,p.221-233. Available at: https://phyllis.nl/Biomass/View/2152
- wheat grain, feed: 0.1 kg
  properties: carbon content, non-fossil 0.4646, dry mass 0.85 kg, water content 0.17647, wet mass 1 kg

## Extrapolations
Feed compositions and energy expenditures from various feeds used in Peru and Chile were asumed to represent trout feed used in all trout-producing South American countries
