# yarn production, cotton, ring spinning, for weaving

Dataset: EcoSpold 2, unit process
Geography: GLO
Time period: 2016-01-01 to 2023-12-31
Technology level: current
Classification: ISIC rev.4 ecoinvent: 1311:Preparation and spinning of textile fibres
Scenario: Business-as-Usual
System model: Allocation, cut-off by classification
Generated by: Mireille Faist Emmenegger
Published in: Cotton Inc 2017
Database: ecoinvent
isCopyrightProtected: true
accessRestrictedTo: 1

## General comment
The activity begins with the opening of cotton bales and ends with the yarn for woven fabric. It includes electricity use, heat use and the cotton fibres. No lubricating oil needed as the dataset is specific for cotton, which contains natural materials providing lubrication in spinning.
Data collected from mostly vertically integrated mills on a global level.
Because there were
not enough mills to maintain confidentiality for
rotor or air-jet spinning, data for all spinning
methods were rolled together into a production
weighted average for a global average
spinning process for woven fabrics.

## Included activities start
The activity starts from opening of bales.

## Included activities end
The activity ends with spinning and winding after which yarn for woven fabric is conditioned for packaging.

## Geography
The data are based on primary data collected by Cotton Inc.

## Technology
Data set represents average technology.
Once the yarn is received in packaged form, it is placed in creel to feed the knitting zone into the feeder. Upon setting the specific yarn as per the fabric requirement, machine is set as per specific design requirement and the machine processes yarn into loops culminating into production of fabric.

## Reference product
- yarn, cotton: 1 kg; By-product classification allocatable product; CPC 26360: Cotton yarn (other than sewing thread), containing 85% or more by weight of cotton; HS2017 520710: Cotton yarn; (not sewing thread), containing 85% or more by weight of cotton, put up for retail sale
  production volume 7.5e9 kg; name PVol; = 15E+9 *0.5
    The overall global yarn production (all technologies) is about 15 E+9 kg (The Fibre Year report 2017). It is assumed that about 50% is used for weaving.
  property heating value, net 12.95 MJ
    LHV is calculated based on the Carbon content of the product. More details can be found on the respective documentation.
  property price 2.265 EUR2005
    Estimated value. Various souces report a value around 3 USD per kg of cotton yarn (YarnsandFibers.com, 2018. Pakistan textile exports hit by rise in prices, retrieved from: http://www.yarnsandfibers.com/news/news-tags/cotton-yarn-prices, accessed 1Feb2018; Alibaba.com, 2018. Retrieved from: https://www.alibaba.com/showroom/100%2525-cotton-yarn-price.html, accessed 1Feb2018). The price was checked also against the values reported from the Indian Ministry of Textile, Price Data for textile, Prices (Month End) for 2018 (retrieved from: http://texmin.nic.in/sites/default/files/monthend_jan2018_1.pdf, accessed 6March 2018).
  properties: carbon allocation 0.4324 kg, carbon content 0.46, carbon content, fossil 0, carbon content, non-fossil 0.46, dry mass 0.94 kg, water content 0.0638298, water in wet mass 0.06 kg, wet mass 1 kg

## Inputs from technosphere
- building, hall: 3e-5 m2; lognormal variance with pedigree 0.3512, pedigree (4,3,3,4,4)
  Proxy based on data for knitting.
- building, hall, steel construction: 1e-5 m2; lognormal variance with pedigree 0.0572, pedigree (4,3,3,4,4)
  Proxy based on data for knitting.
- electricity, low voltage: 2.34 kWh; lognormal variance with pedigree 0.0033, pedigree (1,3,3,3,1)
  sum of electricity used for spinning machines. Electricity consumption for utilities are not included in this dataset
- fibre, cotton: 1.175 kg; lognormal variance with pedigree 0.0033, pedigree (1,3,3,3,1)
  properties: carbon content, non-fossil 0.46, dry mass 0.94 kg, heating value, net 12.95 MJ, water content 0.0638298, wet mass 1 kg
- heat, district or industrial, natural gas: 3.8275 MJ; lognormal variance with pedigree 0.0039, pedigree (2,3,3,3,1)
  Value from industrial partner [Cotton Inc.]
  properties: heating value, net 1 MJ
- waste textile, soiled: -0.000246883, -0.000153117 kg (2 suppliers, which the file names only by identifier); sum of these -0.0004 kg
  waste fibres
  production volume; = PVol*waste
    Calculated based on production volume and waste fibre share.
  properties: carbon content, non-fossil 0.570519, dry mass 0.75 kg, heating value, net 14.45 MJ, water content 0.333333, wet mass 1 kg
  note on heating value, net: Value taken from the general comment of the treatment dataset.
- waste yarn and waste textile: -0.106428, -0.0681718 kg (2 suppliers, which the file names only by identifier); sum of these -0.1746 kg; lognormal variance with pedigree 0.0019, pedigree (2,3,1,3,1)
  Short fibres which are partly sold.
  production volume; = PVol*WY
    Calculated based on production volume and waste fibre share.
  properties: carbon content, non-fossil 0.44455, dry mass 0.97917 kg, heating value, net 13.14 MJ, water content 0.0212731, wet mass 1 kg

## Extrapolations
Extrapolated from data from mostly vertically integrated mills.
