# polyethylene terephthalate production, granulate, amorphous

Dataset: EcoSpold 2, unit process
Geography: RER
Time period: 1999-01-01 to 2023-12-31
Technology level: current
Classification: ISIC rev.4 ecoinvent: 2013:Manufacture of plastics and synthetic rubber in primary forms
Classification: EcoSpold01Categories: plastics/polymers
Synonyms: PET
Tags: ConvertedDataset
Scenario: Business-as-Usual
System model: Allocation, cut-off by classification
Generated by: Roland Hischier
Published in: Hischier R. 2007
Database: ecoinvent
isCopyrightProtected: true
accessRestrictedTo: 1

## General comment
Data are based on the average unit process from the Eco-profiles of the European plastics industry
[This dataset was already contained in the ecoinvent database version 2. It was not individually updated during the transfer to ecoinvent version 3. Life Cycle Impact Assessment results may still have changed, as they are affected by changes in the supply chain, i.e. in other datasets. This dataset was generated following the ecoinvent quality guidelines for version 2. It may have been subject to central changes described in the ecoinvent version 3 change report (http://www.ecoinvent.org/database/ecoinvent-version-3/reports-of-changes/), and the results of the central updates were reviewed extensively. The changes added e.g. consistent water flows and other information throughout the database. The documentation of this dataset can be found in the ecoinvent reports of version 2, which are still available via the ecoinvent website. The change report linked above covers all central changes that were made during the conversion process.]

## Included activities end
Average data for the production of amorphous PET out of ethylene glycol and PTA. The data include material and energy input, waste as well as air and water emissions. Missing sum parameters to water (DOC, TOC), transport and infrastructure are estimated.

## Geography
Data from several European production sites

## Technology
PET production out of PTA and ethylene gylcol

## Time period
date of publication

## Parameters
- fraction, cooling water, cooling pond system, to air: 0.032 dimensionless; name fraction_CW_CP_to_air; lognormal variance with pedigree 0.0413, pedigree (2,3,1,3,1)
  Calculated based on literature value (Scown, C.D., 2011, Water Footprint of U.S. Transportation Fuels and supplying information of the article) (Vionnet, S., Quantis Water Database - Technical Report, 2012).
- fraction, cooling water, once-through system, to air: 0.004 dimensionless; name fraction_CW_OT_to_air; lognormal variance with pedigree 0.0413, pedigree (2,3,1,3,1)
  (same comment as for fraction, cooling water, cooling pond system, to air)
- fraction, cooling water, recirculating system, to air: 0.771 dimensionless; name fraction_CW_R_to_air; lognormal variance with pedigree 0.0413, pedigree (2,3,1,3,1)
  (same comment as for fraction, cooling water, cooling pond system, to air)
- fraction, cooling water, to air: 0.3875 dimensionless; name fraction_CW_to_air; = (0.5*fraction_CW_OT_to_air)+(0.5*fraction_CW_R_to_air); lognormal variance with pedigree 0.092025, pedigree (4,4,3,2,4)
  Calculated value based on literature value (see comments of the other parametres present in this dataset) and expert opinion. In the case when no industry/literature data are available about the type of cooling or directly fraction, cooling water, to air specific for the process a default assumption is applied. It is assumed that the once-through cooling system is used in 50% of all cases and recirculating system is used in another 50% of all cases.
- fraction, process water, to air: 0.205 dimensionless; name fraction_PW_to_air; lognormal variance with pedigree 0.092025, pedigree (4,4,3,2,4)
  Literature value (Statistics Canada, 2007 & Shaffer, K.H., 2008, Consumptive water use in the Great Lakes Basin, USGS) (Vionnet, S., Quantis Water Database - Technical Report, 2012).

## Reference product
- polyethylene terephthalate, granulate, amorphous: 1 kg; By-product classification allocatable product; CPC 34710: Polymers of ethylene, in primary forms; HS2017 3907: Polyacetals, other polyethers and epoxide resins, in primary forms; polycarbonates, alkyd resins, polyallyl e[...]; CAS 25038-59-9
  EcoSpold01Location=RER
  production volume 1.32237 kg
    This is a placeholder value that does not reflect real-world production volumes. This dataset does not currently require a real-world production volume to work in the database framework, and no actual data were collected yet. This has no negative effect on the results of the ecoinvent database. The placeholder value of this activity was scaled according to the nominal GDP of 2005 (source: United Nations, http://data.un.org/Glossary.aspx?q=GDP+%28current+US%24%29, accessed 20130726) to reflect an appropriate share of the global production volume, which is also a placeholder value.
  property carbon content, fossil 0.625
    Polymer of the ethylen terephtalate monomer (C10H8O4)n (ecoinvent v2.2 report 11_II), MW=192 g/mol
  properties: carbon allocation 0.625 kg, carbon content 0.625, carbon content, non-fossil 0, dry mass 1 kg, heating value, net 22.95 MJ, price 1.29 EUR2005, water content 0, water in wet mass 0 kg, wet mass 1 kg

## Inputs from technosphere
- average incineration residue: -0.0004 kg; lognormal variance with pedigree 0.0112, pedigree (2,3,1,1,1)
  EcoSpold01Location=CH
  European average value, based on industrial survey
  Uncertainty: european average value, based on industrial survey
  production volume
    Calculated from the production volume of polyethylene terephthalate, granulate, amorphous in proportion to the respective output amounts.
  properties: carbon content, fossil 0.0325466, carbon content, non-fossil 0.0511208, dry mass 1 kg, wet mass 1 kg
  note on carbon content, fossil: Tab A.1, ecoinvent v2.2 report 13_I. It is considered that 61.1% of the C has a biogenic origin
- chemical factory, organics: 4e-10 unit; lognormal variance with pedigree 0.448, pedigree (4,5,5,5,5)
  Estimation
  EcoSpold01Location=RER
  Uncertainty: estimation
- electricity, medium voltage: 0.194 kWh; lognormal variance with pedigree 0.0512, pedigree (2,3,5,1,1)
  European average value, based on industrial survey
  EcoSpold01Location=UCTE
  Uncertainty: european average value, based on industrial survey
- ethylene glycol: 0.334 kg; lognormal variance with pedigree 0.0512, pedigree (2,3,5,1,1)
  EcoSpold01Location=RER
  European average value, based on industrial survey
  Uncertainty: european average value, based on industrial survey
  properties: carbon content, fossil 0.387097, dry mass 1 kg, heating value, net 23.44 MJ, wet mass 1 kg
- hazardous waste, for underground deposit: -9e-5 kg; lognormal variance with pedigree 0.0112, pedigree (2,3,1,1,1)
  EcoSpold01Location=DE
  European average value, based on industrial survey
  Uncertainty: european average value, based on industrial survey
  production volume
    (same comment as for average incineration residue)
  properties: carbon content, fossil 0.554667, dry mass 1 kg, wet mass 1 kg
  note on carbon content, fossil: Tab A.6, ecoinvent v2.2 report 13_I, average hazardous waste composition was used, and referred to 0% water mass. No waste-specific emission are currently inventoried for underground deposits. Accordingly, no waste composition must be specified. For generic, average waste to underground deposit deposition in a 200 liter steel drum without cement solidification is assumed (ecoinvent v2.2 report 13_I).
- heat, district or industrial, natural gas: 0.665 MJ; lognormal variance with pedigree 0.1312, pedigree (2,3,5,1,4)
  Amount industrial survey - distribution according to cumulated data
  EcoSpold01Location=RER
  Uncertainty: amount industrial survey - distribution according to cumulated data
  properties: heating value, net 1 MJ
- heat, district or industrial, other than natural gas: 0.965 MJ; lognormal variance with pedigree 0.1312, pedigree (2,3,5,1,4)
  EcoSpold01Location=RER
  Amount industrial survey - distribution according to cumulated data
  Uncertainty: amount industrial survey - distribution according to cumulated data
  properties: heating value, net 1 MJ
- municipal solid waste: -0.00088 kg; lognormal variance with pedigree 0.0112, pedigree (2,3,1,1,1)
  European average value, based on industrial survey
  EcoSpold01Location=CH
  Uncertainty: european average value, based on industrial survey
  production volume
    (same comment as for average incineration residue)
  properties: carbon content, fossil 0.171549, carbon content, non-fossil 0.261655, dry mass 0.771 kg, heating value, net 11.74 MJ, water content 0.297017, wet mass 1 kg
  note on carbon content, fossil: MSW composition in tab 4.1, ecoinvent v2.2 report 13_I. C content referred to 1 kg DM
  note on heating value, net: Value taken from the general comment of the treatment dataset.
- nitrogen, liquid: 0.0298 kg; lognormal variance with pedigree 0.0512, pedigree (2,3,5,1,1)
  European average value, based on industrial survey
  EcoSpold01Location=RER
  Uncertainty: european average value, based on industrial survey
  properties: dry mass 1 kg, wet mass 1 kg
- purified terephthalic acid: 0.875 kg; lognormal variance with pedigree 0.0512, pedigree (2,3,5,1,1)
  (same comment as for nitrogen, liquid)
  properties: carbon content, fossil 0.578313, dry mass 1 kg, heating value, net 21.9 MJ, wet mass 1 kg
- steam, in chemical industry: 0.94 kg; lognormal variance with pedigree 0.0512, pedigree (2,3,5,1,1)
  (same comment as for ethylene glycol)
  properties: wet mass 1 kg
- waste plastic, mixture: -0.00231 kg; lognormal variance with pedigree 0.0112, pedigree (2,3,1,1,1)
  (same comment as for average incineration residue)
  production volume
    (same comment as for average incineration residue)
  properties: carbon content, fossil 0.747344, dry mass 0.847 kg, heating value, net 30.79 MJ, water content 0.180638, wet mass 1 kg
  note on carbon content, fossil: C content in 1 kg DM was calculated using data in Tab A.2, ecoinvent v2.2 report 13_I

## Inputs from nature
- Water, cooling, unspecified natural origin [natural resource, in water]: 0.0064 m3; name water_cooling_UNO_input; lognormal variance with pedigree 0.0512, pedigree (2,3,5,1,1)
  European average value, based on industrial survey
  Uncertainty: european average value, based on industrial survey
- Water, unspecified natural origin [natural resource, in water]: 0.000163 m3; name water_UNO_input; lognormal variance with pedigree 0.0512, pedigree (2,3,5,1,1)
  (same comment as for Water, cooling, unspecified natural origin)

## Emissions to nature
- NMVOC, non-methane volatile organic compounds [air, urban air close to ground]: 9e-5 kg; lognormal variance with pedigree 0.1812, pedigree (2,3,5,1,1)
  (same comment as for Water, cooling, unspecified natural origin)
- Particulate Matter, < 2.5 um [air, urban air close to ground]: 2.5e-7 kg; lognormal variance with pedigree 0.3612, pedigree (2,3,5,1,1)
  (same comment as for Water, cooling, unspecified natural origin)
- Particulate Matter, > 10 um [air, urban air close to ground]: 3.2e-7 kg; lognormal variance with pedigree 0.1012, pedigree (2,3,5,1,1)
  (same comment as for Water, cooling, unspecified natural origin)
- Particulate Matter, > 2.5 um and < 10um [air, urban air close to ground]: 4.3e-7 kg; lognormal variance with pedigree 0.1812, pedigree (2,3,5,1,1)
  (same comment as for Water, cooling, unspecified natural origin)
- Water [air, unspecified]: 0.00251342 m3; name water_to_air_unspecified; = (water_cooling_UNO_input*fraction_CW_to_air)+(water_UNO_input*fraction_PW_to_air); lognormal variance with pedigree 0.0807, pedigree (2,2,5,1,1)
  Calculated value based on literature values and expert opinion. See comments in the parametres' comment field.
  property fraction, origin: fresh water 0; name fraction_origin_fresh_water
  property fraction, origin: salt water 0; name fraction_origin_salt_water
  property fraction, origin: unspecified 1; name fraction_origin_unspecified
- BOD5, Biological Oxygen Demand [water, surface water]: 0.00016 kg; lognormal variance with pedigree 0.1012, pedigree (2,3,5,1,1)
  (same comment as for Water, cooling, unspecified natural origin)
- COD, Chemical Oxygen Demand [water, surface water]: 0.00102 kg; lognormal variance with pedigree 0.1012, pedigree (2,3,5,1,1)
  (same comment as for Water, cooling, unspecified natural origin)
- DOC, Dissolved Organic Carbon [water, surface water]: 0.000262 kg; lognormal variance with pedigree 0.23, pedigree (5,5,5,5,4)
  Estimated, based on rules in Frischknecht 2003
  Uncertainty: estimated, based on rules in Frischknecht 2003
- Hydrocarbons, unspecified [water, surface water]: 0.000499 kg; lognormal variance with pedigree 0.3612, pedigree (2,3,5,1,1)
  (same comment as for Water, cooling, unspecified natural origin)
- Suspended solids, unspecified [water, surface water]: 1e-6 kg; lognormal variance with pedigree 0.1012, pedigree (2,3,5,1,1)
  (same comment as for Water, cooling, unspecified natural origin)
- TOC, Total Organic Carbon [water, surface water]: 0.000262 kg; lognormal variance with pedigree 0.23, pedigree (5,5,5,5,4)
  (same comment as for DOC, Dissolved Organic Carbon)
- Water [water, unspecified]: 0.00404958 m3; name water_to_water_unspecified; = water_cooling_UNO_input*(1-fraction_CW_to_air)+water_UNO_input*(1-fraction_PW_to_air); lognormal variance with pedigree 0.0807, pedigree (2,2,5,1,1)
  (same comment as for Water)
  property carbon content, fossil 0; name C_content_fossil
  property carbon content, non-fossil 0; name C_content_non_fossil
  property dry mass 0 kg; name DM
  property fraction, origin: fresh water 0; name fraction_origin_fresh_water_Ww
  property fraction, origin: salt water 0; name fraction_origin_salt_water_Ww
  property fraction, origin: unspecified 1; name fraction_origin_unspecified_Ww
  property water in wet mass 1000 kg; name WWM
  property wet mass 1000 kg; name WM

## Sampling procedure
company data

## Extrapolations
no extrapolation

## Review by Mischa Classen 2003-06-10
passed
