# thermal spraying, atmospheric plasma spray, tungsten carbide-cobalt, on carbon steel substrate

Dataset: EcoSpold 2, unit process
Geography: GLO
Time period: 2022-01-01 to 2023-12-31
Technology level: modern
Classification: ISIC rev.4 ecoinvent: 2592:Treatment and coating of metals; machining
Synonyms: APS, WC-CO
Scenario: Business-as-Usual
System model: Allocation, cut-off by classification
Generated by: Edwin Rua
Database: ecoinvent
isCopyrightProtected: true
accessRestrictedTo: 1

## General comment
This activity provides the service of thermal spray coating via Atmospheric Plasma Spray(APS) and it represent the coating of 1 square metre of substrate (carbon steel) with a coating thickness of 450 micrometre. Atmospheric plasma spray is a process for the deposition of micron-sized powders. It consists of spraying a ceramic or metallic feedstock powder onto a substrate to build up a coating. This dataset considers a tungsten carbide-cobalt powder to be used. This dataset represent a GLO average because it is a well-established technique in the industry
The process is based on the formation of plasma, from the dissociation and ionization of the gas by a high-power electric arc (about 80kW) between a cathode and an anode. The gas velocity generated is high, in the order of 1000 m/s, and since the exit of the torch, the gas tends to return to its normal energy state (lowest energy) again, forming an associated highly exothermic reaction. The feedstock gets in contact with the plasma and the feedstock is carried towards the surface to coat. The high temperature of the plasma melts the feedstock which will solidify again when in contact with the substrate.
The dataset is based on direct measures of a pilot plant in the University of Barcelona. It is composed of a robotic arm which operates the spraying gun, the spray gun, the feeder, a compressor, and gas tanks. The dataset includes the energy use of the robotic arm but it does not include the production and the general maintenance of the tooling, of the machine, and of the ancillary equipment.
References:
Moya, S., Dolores, M., & Segovia López, E. F. (2012). Desarrollo y caracterización de recubrimientos cerámicos nanoestructurados obtenidos mediante proyección por plasma atmosférico (Doctoral dissertation, Universitat Politécnica de Valéncia).
TEANDM, APS – Atmospheric Plasma Spraying, http://www.teandm.pt/aps_T_eng.htm (last access: December 2022)

## Included activities start
The activity is a service and it starts with the sandblasted carbon steel workpiece entering the atmospheric plasma spray cabin. The activity refers to the coating of 1 square metre of substrate for a thickness of 450 micrometre. The carbon steel substrate is not included in the activity exchanges.

## Included activities end
The activity is a service and it ends with the coated workpiece.

## Geography
The data are based on estimations and do not have a specific geographical origin. They are assumed to be representative of this geography.

## Technology
The atmospheric plasma spray process (APS) is performed on a prepared specimen. The preparation consists in an abrasive blasting, with the aim to remove the rust, dirt, or external particles from the surface and leave the surface with the correct final roughness. The abrasive blasting process is not considered in this dataset, if the workpiece is treated with abrasive blasting it has to be accounted with proper dataset. An injector allows solid particles to be introduced into the plasma jet through the carrier gas. Particles of average size between 10 and 100 µm are accelerated and melted in the plasma jet before impacting on the substrate surface at a distance of 100 to 120 mm from the plasma exit. Thus, the coating is formed by stacking melted particles, which have a lamellar structure known as "splats", solidified on the substrate.
In particular, APS is a coating technique whereby a powdered material is melted in a hydrogen and argon combustion process and then propelled toward the substrate at high speed. The high-impact energy of the particles produces a dense and resistant coating layer. Plasma in contact with powder particles in the heating region reaches temperatures between 6000°C and 15,000°C. A gas mixture of hydrogen and argon is overheated by an electric arc to produce plasma. Simultaneously, the powder is introduced radially using an inert carrier gas and is accelerated toward the substrate by the plasma stream. Therefore, refrigeration is required to keep the substrate between 95°C and 205°C. Since the refrigeration is a closed loop of water, the use of water is considered to be negligible, meanwhile, the electricity consumption is taken into consideration. The deposition efficiency is considered to be of 95% The powder that it's not deposited, is collected in a filter and then disposed.
In this study, the Atmospheric plasma spray process is performed using A-3000S PLASMA-TECHNIK AG CH-5610, 220 VAC and closed loop powder feed unit Sulzer Metco Type 9MPE-DJ.
References:
Moya, S., Dolores, M., & Segovia López, E. F. (2012). Desarrollo y caracterización de recubrimientos cerámicos nanoestructurados obtenidos mediante proyección por plasma atmosférico (Doctoral dissertation, Universitat Politécnica de Valéncia).
TEANDM, APS – Atmospheric Plasma Spraying, http://www.teandm.pt/aps_T_eng.htm (last access: December 2022)

## Time period
Data were taken from a pilot-scale plant. The data collection was performed in 2022.

## Parameters
- deposition efficiency: 0.95 kg/kg; name deposition_efficiency
  Deposition efficiency, considered as mass deposited / total mass used. Value calculated from the pilot plant.

## Reference product
- thermal spraying, atmospheric plasma spray, tungsten carbide-cobalt, on carbon steel substrate: 1 m2; name RP; By-product classification allocatable product; CPC 88731: Metal treatment and coating services
  The exchange is referred to 450 micrometre thickness.
  production volume 4 m2; name pv_aps
    This is a placeholder value that does not reflect real-world production volumes. This dataset does not currently require a real-world production volume to work in the database framework, and no actual data were collected yet. This has no negative effect on the results of the ecoinvent database.
  property price 264.54 EUR2005
    Price calculated based on direct measure in 2022 of the consumption of the University of Barcelona plant and on costs of the inputs. Price shall be reconsidered depending on application, e.g. different region, full scale application, etc.
    The price was converted to EUR based on the annual exchange rates published by the European Central Bank (https://sdw.ecb.europa.eu/quickview.do?SERIES_KEY=120.EXR.A.USD.EUR.SP00.A, last accessed on 2022-02-15) and adjusted for inflation relative to 2005 using the producer price index (PPI) of the euro area, published by eurostat (https://appsso.eurostat.ec.europa.eu/nui/show.do?dataset=sts_inpp_a&lang=en, last accessed on 2022-05-04).
  properties: carbon allocation 0 kg, carbon content 0

## Inputs from technosphere
- argon, liquid: 6.44165, 30.5793 kg (2 suppliers, which the file names only by identifier); sum of these 37.021 kg; lognormal variance with pedigree 0.002825, pedigree (1,4,2,2,1)
  Gas used by the spray gun
  Uncertainty: Variance value taken from Tab 10.3 of "Overview and methodology. Data quality guideline for the ecoinvent database version 3" Ecoinvent Report 1(v3), Weidema B P, Bauer C, Hischier R, Mutel C, Nemecek T, Reinhard J, Vadenbo C O, Wernet G. (2013).
  properties: dry mass 1 kg, wet mass 1 kg
- electricity, medium voltage: 56.27 kWh; lognormal variance with pedigree 0.002825, pedigree (1,4,2,2,1)
  Measured consumption of the robotic arms, spray gun, and ancillary equipment. Electricity is assumed to be in medium voltage for industrial scale use.
  Uncertainty: Variance value taken from Tab 10.3 of "Overview and methodology. Data quality guideline for the ecoinvent database version 3" Ecoinvent Report 1(v3), Weidema B P, Bauer C, Hischier R, Mutel C, Nemecek T, Reinhard J, Vadenbo C O, Wernet G. (2013).
- hazardous waste, for underground deposit: -0.00573285, -0.0890021 kg (2 suppliers, which the file names only by identifier); sum of these -0.094735 kg; = tungsten_carbide_powder*(1- deposition_efficiency); lognormal variance with pedigree 0.002625, pedigree (1,4,1,2,1)
  Dispersed powder. The deposition efficiency is 95%. Calculated value. The exchange is a proxy of tungsten carbide.
  Uncertainty: Variance value taken from Tab 10.3 of "Overview and methodology. Data quality guideline for the ecoinvent database version 3" Ecoinvent Report 1(v3), Weidema B P, Bauer C, Hischier R, Mutel C, Nemecek T, Reinhard J, Vadenbo C O, Wernet G. (2013).
  production volume; = hw*pv_aps/abs(RP)
    Production volume calculated based on the production volume of the reference product.
  properties: carbon content, fossil 0.554667, dry mass 1 kg, wet mass 1 kg
  note on carbon content, fossil: Tab A.6, ecoinvent v2.2 report 13_I, average hazardous waste composition was used, and referred to 0% water mass. No waste-specific emission are currently inventoried for underground deposits. Accordingly, no waste composition must be specified. For generic, average waste to underground deposit deposition in a 200 liter steel drum without cement solidification is assumed (ecoinvent v2.2 report 13_I).
- hydrogen, gaseous, medium pressure, merchant: 0.00603797, 0.0288481, 0.0181139 kg (3 suppliers, which the file names only by identifier); sum of these 0.053 kg; lognormal variance with pedigree 0.002825, pedigree (1,4,2,2,1)
  Carrier gas.
  Uncertainty: Variance value taken from Tab 10.3 of "Overview and methodology. Data quality guideline for the ecoinvent database version 3" Ecoinvent Report 1(v3), Weidema B P, Bauer C, Hischier R, Mutel C, Nemecek T, Reinhard J, Vadenbo C O, Wernet G. (2013).
  properties: dry mass 1 kg, heating value, net 120.21 MJ, wet mass 1 kg
- tungsten carbide powder: 1.8947 kg; name tungsten_carbide_powder; lognormal variance with pedigree 0.002825, pedigree (1,4,2,2,1)
  The deposition has an efficiency of 95%, and it is referred to a thickness of 450 micrometre.
  Uncertainty: Variance value taken from Tab 10.3 of "Overview and methodology. Data quality guideline for the ecoinvent database version 3" Ecoinvent Report 1(v3), Weidema B P, Bauer C, Hischier R, Mutel C, Nemecek T, Reinhard J, Vadenbo C O, Wernet G. (2013).
  properties: carbon content, fossil 0.061, dry mass 1 kg, wet mass 1 kg

## Emissions to nature
- Argon [air, unspecified]: 37.021 kg; = argon_gas; lognormal variance with pedigree 0.002825, pedigree (1,4,2,2,1)
  This exchange is used as proxy for the emission of argon gas. The amount is set equal to the input.
  Uncertainty: Variance value taken from Tab 10.3 of "Overview and methodology. Data quality guideline for the ecoinvent database version 3" Ecoinvent Report 1(v3), Weidema B P, Bauer C, Hischier R, Mutel C, Nemecek T, Reinhard J, Vadenbo C O, Wernet G. (2013).
- Hydrogen [air, urban air close to ground]: 0.053 kg; = hydrogen_gas; lognormal variance with pedigree 0.002825, pedigree (1,4,2,2,1)
  Emissions of the hydrogen carrier gas
  Uncertainty: Variance value taken from Tab 10.3 of "Overview and methodology. Data quality guideline for the ecoinvent database version 3" Ecoinvent Report 1(v3), Weidema B P, Bauer C, Hischier R, Mutel C, Nemecek T, Reinhard J, Vadenbo C O, Wernet G. (2013).

## Sampling procedure
The sampling of the data was performed with direct measure coating a speciment of 10 square centimetre of dimension, applying a total thickness of 450 micrometre. The results were scaled for the development of the dataset.

## Extrapolations
The value of the datasets are linearly extrapolated from the measurement performed on site
