# sand-lime brick production

Dataset: EcoSpold 2, unit process
Geography: RoW
Time period: 1993-01-01 to 2023-12-31
Technology level: current
Classification: ISIC rev.4 ecoinvent: 2395:Manufacture of articles of concrete, cement and plaster
Classification: EcoSpold01Categories: construction materials/bricks
Tags: ConvertedDataset
Scenario: Business-as-Usual
System model: Allocation, cut-off by classification
Generated by: Daniel Kellenberger (obsolete)
Published in: Kellenberger D. 2004
Database: ecoinvent
isCopyrightProtected: true
accessRestrictedTo: 1

## General comment
The air emissions are not measured . However, air emissions should all stem from combustion processes, which are accounted for via the modules for energy requirements. No exact information on the composition of the wastewater is available. Thus a proxy is inventoried. The total yearly production amount of a German company is assumed to be 120'000 tons (based on the yearly production volume). The lifespan of the plant is assumed to be 50 years.

## Included activities end
includes the whole manufacturing process to produce sand-lime bricks (raw material provision, raw material mixing, forming by pressing, hardening by autoclave, packing, and storage), transports to plant, and infrastructure. No material/energy requirement for administration are included.

## Geography
The amount of raw materials, the fuel type and the energy consumption as well as the amount of waste are based on an average of 74 German companies. The transportation distances are based on an average of four Swiss companies. For some exchanges, RER-modules have been used as proxy

## Technology
The raw materials are mixed with appropriate proportions. In a reaction vessel the quicklime is hydrated to hydrated lime. Pressing the raw moulded blanks give them a certain form. In an autoclave the blanks are hardened with saturated steam at a pressure of 12 to 16 bar and a temperature of 160 to 200°C during 4 to 8 hours.

## Parameters
- fraction, process water, to air: 0.15 dimensionless; name fraction_PW_to_air; lognormal variance with pedigree 0.092025, pedigree (4,4,3,2,4)
- fraction, tap water, to air: 0.15 dimensionless; name fraction_TW_to_air; lognormal variance with pedigree 0.092025, pedigree (4,4,3,2,4)

## Reference product
- sand-lime brick: 1 kg; By-product classification allocatable product; CPC 37540: Tiles, flagstones, bricks and similar articles, of cement, concrete or artificial stone; HS2017 681011: Cement, concrete or artificial stone; building blocks or bricks, whether or not reinforced
  EcoSpold01Location=DE
  production volume 3.75794 kg
    This is a placeholder value that does not reflect real-world production volumes. This dataset does not currently require a real-world production volume to work in the database framework, and no actual data were collected yet. This has no negative effect on the results of the ecoinvent database.
  property carbon content, fossil 0.067
    0.067kg CO2 absorbed/kg brick, pg 10, ecoinvent v2.2 report 7, part X
  property carbon content, non-fossil 0
    0.067kg CO2 absorbed/kg brick, pg 10, ecoinvent v2.2 report 7, part X
  properties: carbon allocation 0.067 kg, carbon content 0.067, dry mass 1 kg, heating value, net 0 MJ, price 1.77 EUR2005, water content 0, water in wet mass 0 kg, wet mass 1 kg

## Inputs from technosphere
- clay pit infrastructure: 1.67e-10 unit; lognormal variance with pedigree 0.51
  EcoSpold01Location=CH
  (5,5,1,1,4,5);
- electricity, medium voltage: 3.67729e-6, 5.50452e-6, 1.73893e-6, 3.23682e-5, 1.89977e-5, 2.25236e-5, 0.000273586, 6.52504e-7, 0.00545742, 0.00183368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 kWh (47 suppliers, which the file names only by identifier); sum of these 0.00962 kWh; lognormal variance with pedigree 0.0606
  EcoSpold01Location=CH
  (1,3,2,3,3,2);
- heat, district or industrial, natural gas: 0.00239197, 0.145563, 4.49834e-5 MJ (3 suppliers, which the file names only by identifier); sum of these 0.148 MJ; lognormal variance with pedigree 0.0606
  (1,3,2,3,3,2);
  EcoSpold01Location=RER
  properties: heating value, net 1 MJ
- heat, district or industrial, other than natural gas: 0.221675, 0.000102698, 2.25723e-5 MJ (3 suppliers, which the file names only by identifier); sum of these 0.2218 MJ; lognormal variance with pedigree 0.0606
  (1,3,2,3,3,2);
  EcoSpold01Location=CH
  properties: heating value, net 1 MJ
- lime, packed: 0.000418702, 0.0328813 kg (2 suppliers, which the file names only by identifier); sum of these 0.0333 kg; lognormal variance with pedigree 0.0606
  EcoSpold01Location=CH
  (1,3,2,3,3,2);
  properties: carbon content, fossil 0.117492, dry mass 0.998 kg, water content 0.00200401, wet mass 1 kg
  note on carbon content, fossil: Table 3.1, ecoinvent v2.2 report 7, part VII, pg 3. MW CaCO3=100, MW MgCO3=84
- municipal solid waste: -1.29065e-7, -7.96916e-9, -5.24736e-9, -2.13069e-7, -2.53011e-8, -1.41435e-8, -1.60756e-7, -6.24151e-8, -1.57467e-7, -4.05032e-8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 kg (44 suppliers, which the file names only by identifier); sum of these -0.000125 kg; lognormal variance with pedigree 0.0208
  EcoSpold01Location=CH
  (1,3,2,3,3,2);
  production volume
    Calculated from the production volume of sand-lime brick in proportion to the respective output amounts.
  properties: carbon content, fossil 0.171549, carbon content, non-fossil 0.261655, dry mass 0.771 kg, heating value, net 11.74 MJ, water content 0.297017, wet mass 1 kg
  note on carbon content, fossil: MSW composition in tab 4.1, ecoinvent v2.2 report 13_I. C content referred to 1 kg DM
  note on heating value, net: Value taken from the general comment of the treatment dataset.
- packing, clay product: 1 kg; lognormal variance with pedigree 0.21
  (5,5,1,1,4,5);
  EcoSpold01Location=CH
- quicklime, milled, packed: 0.0855 kg; lognormal variance with pedigree 0.0606
  EcoSpold01Location=CH
  (1,3,2,3,3,2);
  properties: dry mass 0.99 kg, water content 0.010101, wet mass 1 kg
- sand: 0.0143434, 0.000171737, 0.93341, 7.44644e-5 kg (4 suppliers, which the file names only by identifier); sum of these 0.948 kg; lognormal variance with pedigree 0.0606
  (1,3,2,3,3,2);
  EcoSpold01Location=CH
  properties: dry mass 1 kg, wet mass 1 kg
- tap water: 0.000456422, 0.000695777, 0.00129828, 0.00349748, 0.000421003, 0.0175447, 0.000312891, 0.200773 kg (8 suppliers, which the file names only by identifier); sum of these 0.225 kg; source Cordes R. 1996; lognormal variance with pedigree 0.0606, pedigree (1,3,5,5,3)
  Literature value.
  EcoSpold01Location=RER
  properties: carbon content, fossil 0.00178991, dry mass 0.000337476 kg, water content 2962.17, wet mass 1 kg
  note on carbon content, fossil: Bicarbonate content is 2.93 mol/m3. CO2 content is 0.1 mol/m3 (ecoinvent v2.2 report 8, Tab 93.1).
- wastewater from concrete production: -4.0089e-7, -8.28991e-5 m3 (2 suppliers, which the file names only by identifier); sum of these -8.33e-5 m3; lognormal variance with pedigree 0.0608
  EcoSpold01Location=CH
  (1,3,2,3,3,2);
  production volume
    (same comment as for municipal solid waste)
  properties: carbon content, fossil 0.027074, dry mass 0.449139 kg, water content 2225.48, wet mass 1000 kg
  note on carbon content, fossil: TOC =0.01216 kg/m3 (Tab A.20, ecoinvent v2.2 report 13_I). TOC was considered as Total Carbon.

## Emissions to nature
- Water [air, unspecified]: 3.375e-5 m3; name water_to_air_unspecified; lognormal variance with pedigree 0.0827, pedigree (2,2,5,5,1)
  Calculated value based on literature values and expert opinion. See comments in the parametres' comment field.
  property fraction, origin: fresh water 1; name fraction_origin_fresh_water
  property fraction, origin: salt water 0; name fraction_origin_salt_water
  property fraction, origin: unspecified 0; name fraction_origin_unspecified
- Water [water, unspecified]: 0.00010795 m3; name water_to_water_unspecified; lognormal variance with pedigree 0.0827, pedigree (2,2,5,5,1)
  (same comment as for Water)
  property carbon content, fossil 0; name C_content_fossil
  property carbon content, non-fossil 0; name C_content_non_fossil
  property dry mass 0 kg; name DM
  property fraction, origin: fresh water 1; name fraction_origin_fresh_water_Ww
  property fraction, origin: salt water 0; name fraction_origin_salt_water_Ww
  property fraction, origin: unspecified 0; name fraction_origin_unspecified_Ww
  property water in wet mass 1000 kg; name WWM
  property wet mass 1000 kg; name WM

## Sampling procedure
Literature

## Extrapolations
See geography This dataset has been copied from an original dataset covering the geography DE. The uncertainty has been adjusted accordingly.

## Review by Roberto Dones 2005-07-19
passed

## Review by Emilia Moreno Ruiz 2015-11-12
CO2 intake removed, as occur during brick lifetime, not during its production (correction by Frank Werner)
