# tin production

Dataset: EcoSpold 2, unit process
Geography: RoW
Time period: 2010-01-01 to 2023-12-31
Technology level: current
Classification: ISIC rev.4 ecoinvent: 2432:Casting of non-ferrous metals
Scenario: Business-as-Usual
System model: Allocation, cut-off by classification
Generated by: Katherine Matos
Database: ecoinvent
isCopyrightProtected: true
accessRestrictedTo: 1

## General comment
This dataset describes the operation of a tin smelter and refinery plant. The data is from a plant located in Peru, and is assumed to be representative of the global situation, The plant has a process capacity of 240 tons concentrate/day and produces around 40,000 tons of refined tin per year (99.95% Sn). The metallurgical installation consists of a plant where the smelting and reduction processes are carried out in a furnace designed with Ausmelt technology (named Ausmelt furnace).
The Ausmelt furnace is fed with a metered mixture of tin oxide concentrates, coal, fuel, iron ore, limestone and process recirculating material (slag and drosses). The process uses natural gas which facilitates the retreatment of older, higher grade slags. The mixture of fuel, combustion air and coal are introduced into the furnace, obtaining at the end of each batch raw metallic tin of 99.95% Sn and slag. The combustion gases pass through a cooling system and continue flowing to a system of bag filters for the capture of solid particles that are then returned to the process.
The process is fed with underground fresh water, 34% of the water is evaporated during the process, 61% is used for the cooling system and 5% is used for irrigation (feed stock and gardens).
The slag is placed on a temporary stockpile located on the plant, and finally is transported to San Rafael mine (located in Puno province) to be used for the underground mining activities as a paste-fill material.

## Included activities start
The process begins with the storage and preparation of the raw materials that are fed to the AUSMELT furnace.

## Included activities end
The process ends with the final production and storage of tin ingots (99.95% Sn) inside the refinery installations. The transportation to the final destination of the tin and slag are not included in the modeled system.

## Geography
The data refers to a process that takes place in the province of Ica located in the south coast of Peru. It is assumed to be representative of the global situation.

## Technology
The technology used by the Ausmelt Furnace, for the smelting of tin concentrates, is based on the patent developed by the Commonwealth Scientific and Industrial Research Organization of Australia CSIRO.

## Time period
Information of the last 6 years has been reviewed. During this period there are no significant changes in technology.

## Reference product
- tin: 1 kg; name Tin_ingot; source Peruvian Ministry of Energy and Mines  2016; By-product classification allocatable product; CPC 41443: Tin, unwrought; HS2017 8001: Tin; unwrought; CAS 7440-31-5
  Refined tin ingot 99.5% Sn, Calculations based on the production reported by the Peruvian Ministry of Energy and mines (2016)
  production volume 2.9499e8 kg; name Tin_Ingot_PV; = 312790*1000
    Calculated based on the total amount of tin mined reported in literature.
    312790 metric tons of tin were mined in 2017 worldwide (USGS 2019). It is assumed that all the tin that is mined is refined.
    Reference:
    USGS (2019) Tin. U.S. Geological Survey, Mineral Commodity Summaries, February 2019, https://minerals.usgs.gov/minerals/pubs/commodity/tin/mcs-2019-tin.pdf (last accessed on 2019-04-24).
  property price 10.1 EUR2005
    Average prices, contained tin, Platts Metal Week Composite, NY, cents per pound, according to http://minerals.usgs.gov/minerals/pubs/commodity/tin/myb1-2006-tin.xls table 1, downloaded 20 April 2009. 1 pound = 0.45359237.
  property tin content 0.9995; name Tin_ingot_Sn_content
    tin content on a dry matter basis
  properties: carbon allocation 0 kg, carbon content 0, carbon content, fossil 0, carbon content, non-fossil 0, dry mass 1 kg, water content 0, water in wet mass 0 kg, wet mass 1 kg

## Inputs from technosphere
- aluminium oxide, non-metallurgical: 0.000992047, 0.000167953 kg (2 suppliers, which the file names only by identifier); sum of these 0.00116 kg; source MINSUR SA 2017; lognormal variance with pedigree 0.0696, pedigree (3,3,5,5,1)
  Estimated value based on the mass balance of plant and fed stock values reported on the Technical Minery Report
  properties: dry mass 1 kg, wet mass 1 kg
- diesel: 9.29927e-7, 0.000385499, 3.95251e-6, 3.90398e-5, 1.93436e-5, 8.12354e-5 kg (6 suppliers, which the file names only by identifier); sum of these 0.00053 kg; source Engie 2016; lognormal variance with pedigree 0.0696, pedigree (3,3,5,5,1)
  Calculated value based on extrapolation from consumption report on 2013
  properties: carbon content, fossil 0.865, dry mass 1 kg, heating value, net 42.8 MJ, wet mass 1 kg
  note on carbon content, fossil: C-content of diesel is 86.5% (ecoinvent v2.2 report 6_IV, Tab 3.14)
- electricity, medium voltage: 0.000593923, 2.64995e-5, 0.000617506, 0.000313074, 0.000383365, 0.000221859, 0.024526, 0.489239, 5.50178e-5, 0.164383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 kWh (31 suppliers, which the file names only by identifier); sum of these 0.87637 kWh; source Engie 2016; lognormal variance with pedigree 0.0696, pedigree (3,3,5,5,1)
  Reported value from electric company
- hard coal: 0.0106531, 0.0082944, 0.0753948, 0.0177064, 0.0108713, 0.0158826, 0.0234943, 0.00462313, 0.00657996 kg (9 suppliers, which the file names only by identifier); sum of these 0.1735 kg; source MINSUR SA 2017; lognormal variance with pedigree 0.0696, pedigree (3,3,5,5,1)
  (same comment as for aluminium oxide, non-metallurgical)
  properties: carbon content, fossil 0.845, dry mass 0.94 kg, heating value, net 27.91 MJ, water content 0.0638298, wet mass 1 kg
  note on carbon content, fossil: C content 75-94% (specified in Tab 1.1, report 6, part VI). A mean content of 0.845 kg C/ kg dry hard coal was considered
  note on heating value, net: Based on the Characterization factor of Hard coal in the CED method
- lime, packed: 0.0323981, 0.000824855, 0.0647771 kg (3 suppliers, which the file names only by identifier); sum of these 0.098 kg; source MINSUR SA 2017; lognormal variance with pedigree 0.0696, pedigree (3,3,5,5,1)
  (same comment as for aluminium oxide, non-metallurgical)
  properties: carbon content, fossil 0.117492, dry mass 0.998 kg, water content 0.00200401, wet mass 1 kg
- metal working factory: 1.27881e-10 unit; = 1/Tin_Ingot_PV/25; source MINSUR SA 2017; lognormal variance with pedigree 0.5946, pedigree (3,3,5,5,1)
  Estimation: based on the water balance of plant, presented on the Technical Minery Report
- natural gas, high pressure: 0.00164623, 0.00277698, 0.00605744, 0.00202717, 0.000473741, 0.00281961, 0.00270563, 0.00711452, 0.000241146, 0.00274668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 m3 (39 suppliers, which the file names only by identifier); sum of these 0.28006 m3; source Engie 2016; lognormal variance with pedigree 0.0696, pedigree (3,3,5,5,1)
  Calculated value based on extrapolation from consumption report on 2013
  properties: carbon content, fossil 0.602381, dry mass 0.84 kg, heating value, gross 40 MJ, heating value, net 36 MJ, wet mass 0.84 kg
  note on carbon content, fossil: An average C content of 0.506 kg C/ m3 has been assumed (this average has been calculated using data in Tab 3.5, ecoinvent v2.2 report 6_V
  note on heating value, net: Literature value, Source: Christoph Meili;Niels Jungbluth;Maresa Bussa (2021) Life cycle inventories of crude oil and natural gas extraction. ESU-services Ltd. commissioned by BAFU & VSG, Schaffhausen, Switzerland, http://esu-services.ch/data/public-lci-reports/
- residual wood, dry: 0.000887902, 0.000112098 m3 (2 suppliers, which the file names only by identifier); sum of these 0.001 m3; source MINSUR SA 2017; lognormal variance with pedigree 0.0696, pedigree (3,3,5,5,1)
  (same comment as for aluminium oxide, non-metallurgical)
  properties: carbon content, non-fossil 0.494, dry mass 550 kg, heating value, net 8030.06 MJ, water content 0.15, wet mass 632.5 kg
- silica sand: 0.2 kg; source MINSUR SA 2017; lognormal variance with pedigree 0.0696, pedigree (3,3,5,5,1)
  Estimated value based on the water balance of plant, presented on the Technical Minery Report
  properties: dry mass 0.99 kg, water content 0.010101, wet mass 1 kg
- sodium hydroxide, without water, in 50% solution state: 0.000117429, 0.00120257 kg (2 suppliers, which the file names only by identifier); sum of these 0.00132 kg; source MINSUR SA 2017; lognormal variance with pedigree 0.0696, pedigree (3,3,5,5,1)
  (same comment as for aluminium oxide, non-metallurgical)
  properties: dry mass 1 kg, heating value, net 3.03 MJ, wet mass 1 kg
- sulfur: 1e-5 kg; source MINSUR SA 2017; lognormal variance with pedigree 0.0696, pedigree (3,3,5,5,1)
  (same comment as for aluminium oxide, non-metallurgical)
  properties: dry mass 1 kg, wet mass 1 kg
- tin concentrate: 2.067 kg; name Tin_Concentrate; source MINSUR SA 2017; lognormal variance with pedigree 0.0696, pedigree (3,3,5,5,1)
  Estimation: based on the water balance of plant, presented on the Technical Minery Report
  properties: dry mass 1 kg, tin content 0.61, wet mass 1 kg
- tin slag: -0.97 kg; name ByP_1; source Peruvian Ministry of Energy and Mines  2016; lognormal variance with pedigree 0.0047, pedigree (3,2,1,5,1)
  Estimated value, based on the production rate and the final product composition (99.95% Sn). The slag is used as an underground fill-paste material.
  production volume; = Tin_Ingot_PV * (ByP_1 / Tin_ingot)
    Calculated from production volume of reference product using the relative outputs.
  property water content 0; name ByP_1_water_content
  property water in wet mass 0 kg; name ByP_1_WWM
  properties: aluminium content 0.069861, barium content 0.00042, calcium content 0.0403086, dry mass 1 kg, iron content 0.06085, oxygen content 0.406582, phosphorus content 0.0296368, silicon content 0.185572, sodium content 0.0210381, tin content 0.0322948, titanium content 0.0409951, wet mass 1 kg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

## Inputs from nature
- Water, well, in ground [natural resource, in water]: 0.0087861 m3; source MINSUR SA 2017; lognormal variance with pedigree 0.0696, pedigree (3,3,5,5,1)
  (same comment as for silica sand)

## Emissions to nature
- Arsenic ion [air, non-urban air or from high stacks]: 9.89449e-10 kg; source EEA 2013; lognormal variance with pedigree 0.8446, pedigree (3,3,5,5,1)
  Calculated Value, based on the diesel and natural gas consumption and EEA Manufacturing industries and construction (combustion)
- Benzo(a)pyrene [air, non-urban air or from high stacks]: 7.12403e-16 kg; source EEA 2013; lognormal variance with pedigree 0.2446, pedigree (3,3,5,5,1)
  (same comment as for Arsenic ion)
- Benzo(b)fluoranthene [air, unspecified]: 2.8694e-15 kg; source EEA 2013; lognormal variance with pedigree 0.2446, pedigree (3,3,5,5,1)
  (same comment as for Arsenic ion)
- Cadmium II [air, non-urban air or from high stacks]: 8.90504e-12 kg; source EEA 2013; lognormal variance with pedigree 0.8446, pedigree (3,3,5,5,1)
  (same comment as for Arsenic ion)
- Carbon dioxide, fossil [air, non-urban air or from high stacks]: 1.06158 kg; source EEA 2013; lognormal variance with pedigree 0.0696, pedigree (3,3,5,5,1)
  (same comment as for Arsenic ion)
- Carbon dioxide, non-fossil [air, non-urban air or from high stacks]: 0.995543 kg; lognormal variance with pedigree 0.1227, pedigree (5,2,5,5,4)
  Calculated Value, based on the carbon balance.
- Carbon monoxide, fossil [air, non-urban air or from high stacks]: 0.000381921 kg; source EEA 2013; lognormal variance with pedigree 0.8446, pedigree (3,3,5,5,1)
  (same comment as for Arsenic ion)
- Chromium III [air, non-urban air or from high stacks]: 1.28628e-10 kg; source EEA 2013; lognormal variance with pedigree 0.8446, pedigree (3,3,5,5,1)
  (same comment as for Arsenic ion)
- Copper ion [air, non-urban air or from high stacks]: 2.57257e-11 kg; source EEA 2013; lognormal variance with pedigree 0.8446, pedigree (3,3,5,5,1)
  (same comment as for Arsenic ion)
- Lead II [air, non-urban air or from high stacks]: 1.08839e-10 kg; source EEA 2013; lognormal variance with pedigree 0.8446, pedigree (3,3,5,5,1)
  Calculated Value, based on the diesel and natural gas consumption and EEA Manufacturing industries and construction (combustion).
- Mercury II [air, non-urban air or from high stacks]: 5.34303e-9 kg; source EEA 2013; lognormal variance with pedigree 0.8446, pedigree (3,3,5,5,1)
  (same comment as for Arsenic ion)
- Methane, fossil [air, non-urban air or from high stacks]: 0.000612155 kg; source EEA 2013; lognormal variance with pedigree 0.2446, pedigree (3,3,5,5,1)
  (same comment as for Arsenic ion)
- NMVOC, non-methane volatile organic compounds [air, non-urban air or from high stacks]: 0.000302903 kg; source EEA 2013; lognormal variance with pedigree 0.2446, pedigree (3,3,5,5,1)
  (same comment as for Arsenic ion)
- Nickel II [air, non-urban air or from high stacks]: 1.28628e-10 kg; source EEA 2013; lognormal variance with pedigree 0.8446, pedigree (3,3,5,5,1)
  (same comment as for Arsenic ion)
- Nitrogen oxides [air, non-urban air or from high stacks]: 0.000974557 kg; source EEA 2013; lognormal variance with pedigree 0.2446, pedigree (3,3,5,5,1)
  (same comment as for Arsenic ion)
- Particulate Matter, < 2.5 um [air, non-urban air or from high stacks]: 6.85528e-6 kg; source EEA 2013; lognormal variance with pedigree 0.5946, pedigree (3,3,5,5,1)
  (same comment as for Arsenic ion)
- Particulate Matter, > 2.5 um and < 10um [air, non-urban air or from high stacks]: 6.85528e-6 kg; source EEA 2013; lognormal variance with pedigree 0.3946, pedigree (3,3,5,5,1)
  (same comment as for Arsenic ion)
- Selenium IV [air, non-urban air or from high stacks]: 5.73881e-10 kg; source EEA 2013; lognormal variance with pedigree 0.8446, pedigree (3,3,5,5,1)
  (same comment as for Arsenic ion)
- Sulfur dioxide [air, non-urban air or from high stacks]: 0.0190456 kg; source EEA 2013; lognormal variance with pedigree 0.0696, pedigree (3,3,5,5,1)
  (same comment as for Arsenic ion)
- Sulfur oxides [air, unspecified]: 8.82369e-6 kg; source EEA 2013; lognormal variance with pedigree 0.0696, pedigree (3,3,5,5,1)
  (same comment as for Arsenic ion)
- Water [air, non-urban air or from high stacks]: 0.009 m3; source MINSUR SA 2017; lognormal variance with pedigree 0.2446, pedigree (3,3,5,5,1)
  Estimated value based on the water balance of plant reported at the Technical Minery Report (INSIDEO, 2016)
- Zinc II [air, non-urban air or from high stacks]: 7.22298e-9 kg; source EEA 2013; lognormal variance with pedigree 0.8446, pedigree (3,3,5,5,1)
  (same comment as for Arsenic ion)

## Sampling procedure
The data were collected from the available information of a refinery company in Peru that holds 100% of the refined tin production according to the Peruvian Ministry of Mine production statistics (2016).

## Extrapolations
The data is from a dataset covering the geography of Peru (PE). The uncertainty has been adjusted accordingly.
