# lubricating oil production

Dataset: EcoSpold 2, unit process
Geography: RER
Time period: 2000-01-01 to 2023-12-31
Technology level: current
Classification: ISIC rev.4 ecoinvent: 1920:Manufacture of refined petroleum products
Scenario: Business-as-Usual
System model: Allocation, cut-off by classification
Generated by: Roland Hischier
Published in: Althaus H.-J. 2007
Database: ecoinvent
isCopyrightProtected: true
accessRestrictedTo: 1

## General comment
This dataset represents the production of 1 kg of liquid lubricating oil, including additives.
The most important function of lubricants is the reduction of friction and wear. Apart from important applications in internal combustion engines, vehicle and industrial gearboxes, compressors, turbines, or hydraulic systems, there are a vast number of other applications which mostly require specifically tailored lubricants. In terms of quantity, mineral oil components continue to be the most important ingredients of lubricants. Petrochemical components and, increasingly, derivatives of natural, harvestable raw materials from the oleo-chemical industry are finding increasing acceptance because of their environmental compatibility and some technical advantages.
This dataset is based on literature and industrial data. The additives included in the lubricating oil are based on Raimondi et al. (2012). The energy consumption is approximated based on data from a large chemical factory (Gendorf 2016).
References:
Mang, T., Noll, S. and Bartels, T. 2011. Lubricants, 1. Fundamentals of Lubricants and Lubrication. Ullmann's Encyclopedia of Industrial Chemistry.
Andrea Raimondi, Giorgia Girotti, Gian Andrea Blengini and Debora Fino (2012) LCA of petroleum-based lubricants: state of art and inclusion of additives. Int J Life Cycle Assess (2012) 17:987–996.
Gendorf (2016) Umwelterklärung 2015, Werk Gendorf Industriepark, www.gendorf.de.

## Included activities start
From the reception of diesel at the factory gate.

## Included activities end
This activity ends with 1 kg of lubricating oil at the factory gate. The dataset includes the input materials, energy uses, infrastructure and emissions.

## Geography
The data used has no specific geographical origin as it is based on literature and estimations. The energy consumption is based on data from a large chemical factory located in Germany. These are assumed to be valid for this geography.

## Technology
A huge variety of different compositions are known under the name “lubricants” – actually, 5’000 to 10’000 different formulations are used to satisfy about 90% of the different lubricants applications. In terms of quantity, mineral oil components continue to be the most important ingredients. But more and more, derivatives of natural, harvestable raw materials from the oleo-chemical sector are finding their acceptance within the used substances.
In 1999 around 37 Mt of lubricants have been consumed – thereof more than half in the automotive sector (56%), and another 29% as industrial lubricants. This amount is produced by around 1700 producers worldwide. Thereof, about 200 are vertically-integrated petroleum companies where lubricants are only a minor part of their profit. Nevertheless, less than 2% of all lubricant manufacturers are producing more than 60% of the total production volume. In case of the remaining 1500 companies, lubricants are their core business.
In terms of the volume, base oils are the most important parts of lubricants. The rest is composed of additives. For this dataset, the additives are based on data published in Raimondi et al. (2012).
The image above represents the typical yields of the different cuts from a conventional lubricating oil refining process
To achieve base oils, a variety of different steps have to be done starting with the crude oil that is extracted until the right components are isolated. Different steps therefore are for example refining, distillation, de-asphalting, traditional refining process, solvent dewaxing or finishing. Additional steps that are often used are as well hydrogenation and hydrocracking operations.
Based on the fact that a multitude of different processes are possible for the production of lubricants, the following choices are done for this dataset – with the aim to create a typical dataset for petrochemical lubricants – called “lubricants”:
- Hydrocracking as basic technology for the extraction of the lubricant oils due to the fact that according to Bartels et al. (2003) more than 50% of the new manufacturing plants work with this principle.
- Distillation and dewaxing as subsequent process steps to achieve high-quality base lubricant oils
- Diesel as input due to the fact that these hydrocracker need low-sulphur oils.
References:
Bartels T., Bock W., Braun J., Busch C., Dresel W., Freiler C., Harperscheid M., Heckler R.-P., Hörner D., Kubicki F., Lingg G., Losch A., Luther R., Mang T., Noll S. and Omeis J. (2003) Lubricants and Lubrication. In: Ullmann's Encyclopedia of Industrial Chemistry, Sixth Edition, 2003 Electronic Release (ed. Häussinger P., Leitgeb P. and Schmücker B.), 6 th Electronic Release Edition. Wiley InterScience, New York, Online-Version under: http://www.mrw.interscience.wiley.com/ueic/ull_search_fs.html.
Andrea Raimondi, Giorgia Girotti, Gian Andrea Blengini and Debora Fino (2012) LCA of petroleum-based lubricants: state of art and inclusion of additives. Int J Life Cycle Assess (2012) 17:987–996.

## Time period
Date of published literature. The energy consumption is based on data published by the Gendorf factory that were collected between 2011 and 2015. The time period has been adjusted accordingly. For more details, see the comments of the exchanges.

## Reference product
- lubricating oil: 1 kg; name RP; By-product classification allocatable product; CPC 33380: Lubricants
  A common function of lubricants is their capability of reducing friction and wear.
  production volume 7.2036e9 kg; name RP_PV
    Estimated value. The European production volume is extrapolated from the global production volume based on reports from Cefic (European Chemical Industry Council), and the American Chemistry Council.
    According to Cefic (2016) the global sales of chemicals in the year 2015 was 3 534 billion euros. The reported share of sales per region are: EU28 14.7%; Other Europe (Switzerland, Norway, Turkey, Russia and Ukraine) 2.7%; NAFTA (US, Canada and Mexico) 16.5%; Latin America 3.8%; China 39.9%; Japan 3.9%; Republic of Korea 3.2%; India 2.2%; Rest of Asia 11.9%; Rest of the World 1.3%. Cefic also reports the US total sales, which amount to 518.7 billion euros out of the global 3 534 billion euros (14.7%). The same share is reported by the American Chemistry Council (2016), according to which the USA sales account for 15% of global sales for the year 2016.
    According to The Freedonia Group the world market of lubricating oil weihgts circa 41.4 million tonnes. Since no data were found for the European production this value was scaled accordingly.
    Reference(s):
    Cefic 2016. Facts and figures 2016 of the European chemical industry. Accessible at: http://www.cefic.org/Facts-and-Figures/Chemicals-Industry-Profile/
    American Chemistry Council 2016. Outlook: U.S. Chemical Industry Continues to Outpace Industrial Output; Accounts for More Than One-Half of Construction Spending by Manufacturing Sector. Accessible at: https://www.americanchemistry.com/Media/PressReleasesTranscripts/ACC-news-releases/US-Chemical-Industry-Continues-to-Outpace-Industrial-Output.html
    The Freedonia Group. 2016. World demand for lubricants is projected to rise 2.0 percent annually to 45.4 million metric tonnes. Retrieved from https://www.freedoniagroup.com/industry-study/world-lubricants-3364.htm on 15 of June 2017.
  property carbon content, fossil 0.75
    Lubricating oil is produced from diesel. C-content/dry mass of fats and oils considered 75%, from: ecoinvent v2.2 report, n 15a, pg 40
  property heating value, net 40.2 MJ
    Literature value, Source: IPCC 2006, 2006 IPCC Guidelines for National Greenhouse Gas Inventories, Prepared by the National Greenhouse Gas Inventories Programme, Eggleston H.S., Buendia L., Miwa K., Ngara T. and Tanabe K. (eds). Published: IGES, Japan
  property price 2.92 EUR2005
    Calculated value based on data from United Nations Commodity Trade Statistics Database (comtrade.un.org). UN comtrade category: 340319 Lubricating oil etc containing <70% petroleum oil nes. Year 2005. Using exchange rate of 1EURO = 1.209 USD. Average of price of import into 5 main markets (EU, US, JP, IN and CN).
  properties: carbon allocation 0.75 kg, carbon content 0.75, carbon content, non-fossil 0, dry mass 1 kg, water content 0, water in wet mass 0 kg, wet mass 1 kg

## Inputs from technosphere
- alkylbenzene sulfonate, linear, petrochemical: 0.0204082 kg; lognormal variance with pedigree 0.1786, pedigree (4,5,5,5,5)
  Literature value based on Table 3 in Raimondi et al. (2012), assuming a 98% yield. Alkylbenzene sulfonate is used here as a proxy for alkylbenzenesulfonic acid, which serves as a detergent in lubricating oils.
  Reference:
  Andrea Raimondi, Giorgia Girotti, Gian Andrea Blengini and Debora Fino (2012) LCA of petroleum-based lubricants: state of art and inclusion of additives. Int J Life Cycle Assess (2012) 17:987–996.
  properties: carbon content, fossil 0.407018, dry mass 1 kg, heating value, net 28.88 MJ, wet mass 1 kg
  note on carbon content, fossil: European LAS is a mixture of differ-ent homologues (C10-C13 alkyl chains) including all positional isomers with the exception of 1-alkyl substituted ones. The typical homologue distribution is 15%, 30%, 30% and 25% for C10, C11, C12 and C13 with an average alkyl chain of C11.6 and an average molecular weight of 342 as the sodium salt (ecoinvent v2.2 report 12)
- chemical factory, organics: 4e-10 unit; lognormal variance with pedigree 0.3434, pedigree (2,4,2,4,4)
  Calculated based on literature data published by the industry. For this activity, no information was readily available concerning infrastructure and land-use. Therefore, the infrastructure is estimated based on data from two chemical factories, the BASF site of Ludwigshafen and the chemical factory in Gendorf (which are both located in Germany), which produce a wide range of chemical substances. Based on this data, the following assumptions are made: the built area amounts to about 4.2 ha, the plant has an average output of 50'000 t/a and a lifespan of fifty years. The estimated infrastructure amount is therefore 4.00 E-10 units per kg of produced chemical.
  References:
  Althaus H.-J., Chudacoff M., Hischier R., Jungbluth N., Osses M. and Primas A. (2007) Life Cycle Inventories of Chemicals. ecoinvent report No. 8, v2.0. EMPA Dübendorf, Swiss Centre for Life Cycle Inventories, Dübendorf, CH.
  Gendorf (2000) Umwelterklärung 2000, Werk Gendorf. Werk Gendorf, Burgkirchen.
- diesel: 0.816327 kg; lognormal variance with pedigree 0.1786, pedigree (4,5,5,5,5)
  Estimated value based on the assumption that 80% of the lubricating oil consists of diesel, and that the process yield is 98%.
  properties: carbon content, fossil 0.865, dry mass 1 kg, heating value, net 42.8 MJ, wet mass 1 kg
  note on carbon content, fossil: C-content of diesel is 86.5% (ecoinvent v2.2 report 6_IV, Tab 3.14)
- electricity, medium voltage: 0.399063 kWh; lognormal variance with pedigree 0.044, pedigree (2,4,2,4,4)
  Calculated based on literature data published by the GENDORF Chemical Park. The factory produced an average of 2462760 tonnes of chemical substances (including intermediates) per year in the years 2015-2019. The average consumption of electricity in the years 2015-2019 was 982796751 kWh per year. This equals 0.39906 kWh/kg chemical produced.
  References:
  Chemiepark GENDORF, Umwelterklärung 2016, https://www.gendorf.de/Nachbarn/Umweltschutz/Industrie%20und%20Nachhaltigkeit
  Chemiepark GENDORF, Umwelterklärung 2017, https://www.gendorf.de/Nachbarn/Umweltschutz/Industrie%20und%20Nachhaltigkeit
  Chemiepark GENDORF, Umwelterklärung 2020, https://www.gendorf.de/Nachbarn/Umweltschutz/Industrie%20und%20Nachhaltigkeit
- heat, district or industrial, natural gas: 1.88647 MJ; lognormal variance with pedigree 0.044, pedigree (2,4,2,4,4)
  Calculated based on literature data published by the GENDORF Chemical Park. The factory produced an average of 2462760 tonnes of chemical substances (including intermediates) per year in the years 2015-2019. The average consumption of natural gas in the years 2015-2019 was 4645920000 MJ per year. This equals 1.8865 MJ/kg chemical produced.
  References:
  Chemiepark GENDORF, Umwelterklärung 2016, https://www.gendorf.de/Nachbarn/Umweltschutz/Industrie%20und%20Nachhaltigkeit
  Chemiepark GENDORF, Umwelterklärung 2017, https://www.gendorf.de/Nachbarn/Umweltschutz/Industrie%20und%20Nachhaltigkeit
  Chemiepark GENDORF, Umwelterklärung 2020, https://www.gendorf.de/Nachbarn/Umweltschutz/Industrie%20und%20Nachhaltigkeit
  properties: heating value, net 1 MJ
- heat, from steam, in chemical industry: 0.20781 MJ; lognormal variance with pedigree 0.044, pedigree (2,4,2,4,4)
  Calculated based on literature data published by the GENDORF Chemical Park. The factory produced an average of 2462760 tonnes of chemical substances (including intermediates) per year in the years 2015-2019. The average consumption of steam (internal and external sources) in the years 2015-2019 was 511785800 MJ per year. This equals 0.2078 MJ/kg chemical produced.
  References:
  Chemiepark GENDORF, Umwelterklärung 2016, https://www.gendorf.de/Nachbarn/Umweltschutz/Industrie%20und%20Nachhaltigkeit
  Chemiepark GENDORF, Umwelterklärung 2017, https://www.gendorf.de/Nachbarn/Umweltschutz/Industrie%20und%20Nachhaltigkeit
  Chemiepark GENDORF, Umwelterklärung 2020, https://www.gendorf.de/Nachbarn/Umweltschutz/Industrie%20und%20Nachhaltigkeit
  properties: heating value, net 1 MJ
- hydrogen sulfide: 0.00357143 kg; lognormal variance with pedigree 0.1786, pedigree (4,5,5,5,5)
  Literature value based on Table 3 in Raimondi et al. (2012), assuming a 98% yield. Hydrogen sulfide is used for the synthesis of zinc dialkyldithiophosphates, which can serve as antioxidant and antiwear in lubricating oils.
  Reference:
  Andrea Raimondi, Giorgia Girotti, Gian Andrea Blengini and Debora Fino (2012) LCA of petroleum-based lubricants: state of art and inclusion of additives. Int J Life Cycle Assess (2012) 17:987–996.
  properties: dry mass 1 kg, heating value, net 7.11 MJ, wet mass 1 kg
- isobutanol: 0.0147959 kg; lognormal variance with pedigree 0.1786, pedigree (4,5,5,5,5)
  Literature value based on Table 3 in Raimondi et al. (2012), assuming a 98% yield. Isobutanol is used for the synthesis of zinc dialkyldithiophosphates, which can serve as antioxidant and antiwear in lubricating oils.
  Reference:
  Andrea Raimondi, Giorgia Girotti, Gian Andrea Blengini and Debora Fino (2012) LCA of petroleum-based lubricants: state of art and inclusion of additives. Int J Life Cycle Assess (2012) 17:987–996.
  properties: carbon content, fossil 0.648649, dry mass 1 kg, heating value, net 35.99 MJ, wet mass 1 kg
- n-olefins: 0.0918367 kg; lognormal variance with pedigree 0.1786, pedigree (4,5,5,5,5)
  Literature value based on Table 3 in Raimondi et al. (2012), assuming a 98% yield. n-olefins are used here as a proxy for olefin co-polymers, which serve as viscosity modifiers in lubricating oils.
  Reference:
  Andrea Raimondi, Giorgia Girotti, Gian Andrea Blengini and Debora Fino (2012) LCA of petroleum-based lubricants: state of art and inclusion of additives. Int J Life Cycle Assess (2012) 17:987–996.
  properties: carbon content, fossil 0.876404, dry mass 1 kg, heating value, net 45 MJ, wet mass 1 kg
- phenol: 0.00510204 kg; lognormal variance with pedigree 0.1786, pedigree (4,5,5,5,5)
  Literature value based on Table 3 in Raimondi et al. (2012), assuming a 98% yield. Phenol is used here as proxy for phenolic antioxidants that are used in lubricating oils.
  Reference:
  Andrea Raimondi, Giorgia Girotti, Gian Andrea Blengini and Debora Fino (2012) LCA of petroleum-based lubricants: state of art and inclusion of additives. Int J Life Cycle Assess (2012) 17:987–996.
  properties: carbon content, fossil 0.765957, dry mass 1 kg, heating value, net 30.93 MJ, wet mass 1 kg
- phosphorous chloride: 0.00357143 kg; lognormal variance with pedigree 0.1786, pedigree (4,5,5,5,5)
  Literature value based on Table 3 in Raimondi et al. (2012), assuming a 98% yield. Phosphorus chloride is used for the synthesis of zinc dialkyldithiophosphates, which can serve as antioxidant and antiwear in lubricating oils.
  Reference:
  Andrea Raimondi, Giorgia Girotti, Gian Andrea Blengini and Debora Fino (2012) LCA of petroleum-based lubricants: state of art and inclusion of additives. Int J Life Cycle Assess (2012) 17:987–996.
  properties: dry mass 1 kg, wet mass 1 kg
- synthetic rubber: 0.0612245 kg; lognormal variance with pedigree 0.1786, pedigree (4,5,5,5,5)
  Literature value based on Table 3 in Raimondi et al. (2012), assuming a 98% yield. Synthetic rubber is used here as a proxy for polyisobutenyl succinimide, which serves as a dispersant in lubricating oils.
  Reference:
  Andrea Raimondi, Giorgia Girotti, Gian Andrea Blengini and Debora Fino (2012) LCA of petroleum-based lubricants: state of art and inclusion of additives. Int J Life Cycle Assess (2012) 17:987–996.
  properties: carbon content, fossil 0.871949, dry mass 1 kg, heating value, net 26.42 MJ, wet mass 1 kg
  note on carbon content, fossil: EPDM (Ethylene-propene-diene terpolymer) rubber is a terpolymer of ethylene, propene, and a diene with the residual unsaturated portion of the diene in the side chain (ecoinvent v2.2 report 7-part XX & Ullmann). Chemical formula (deduced from Evidences of Solvent-Induced Miscibility in Polychloroprene-co-Ethylene-Propene Diene Terpolymer Blends, Dubey et al., Journal of Applied Polymer Science, 2009, 111:1884–1891): C20H35
- wastewater, average: -5.58244e-8, -2.2213e-6 m3 (2 suppliers, which the file names only by identifier); sum of these -2.27712e-6 m3; lognormal variance with pedigree 0.0438, pedigree (2,4,1,4,4)
  Calculated based on literature data published by the GENDORF Chemical Park. The factory produced an average of 2462760 tonnes of chemical substances (including intermediates) per year in the years 2015-2019. The average ouput of wastewater going to an external wastewater treatment plant in the years 2015-2019 was 5608 m3 per year. This equals 0.000002277 m3/kg chemical produced.
  References:
  Chemiepark GENDORF, Umwelterklärung 2016, https://www.gendorf.de/Nachbarn/Umweltschutz/Industrie%20und%20Nachhaltigkeit
  Chemiepark GENDORF, Umwelterklärung 2017, https://www.gendorf.de/Nachbarn/Umweltschutz/Industrie%20und%20Nachhaltigkeit
  Chemiepark GENDORF, Umwelterklärung 2020, https://www.gendorf.de/Nachbarn/Umweltschutz/Industrie%20und%20Nachhaltigkeit
  properties: carbon content, non-fossil 0.194039, dry mass 0.346837 kg, mass concentration, TOC 0.1091 kg/m3, mass concentration, calcium 0.039453 kg/m3, mass concentration, chlorine 0.030031 kg/m3, mass concentration, hydrogen 0.013365 kg/m3, mass concentration, nitrogen 0.031015 kg/m3, mass concentration, oxygen 0.069824 kg/m3, mass concentration, sodium 0.06456 kg/m3, mass concentration, sulfur 0.015602 kg/m3, water content 2882.2, wet mass 1000 kg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
  note on carbon content, non-fossil: 0.0673 kg TOC/m3 (Tab A.17, ecoinvent v2.2 report 13_I). TOC was considered as Total Carbon.
- zinc oxide: 0.00357143 kg; lognormal variance with pedigree 0.1786, pedigree (4,5,5,5,5)
  Literature value based on Table 3 in Raimondi et al. (2012), assuming a 98% yield. Zinc oxide is used for the synthesis of zinc dialkyldithiophosphates, which can serve as antioxidant and antiwear in lubricating oils.
  Reference:
  Andrea Raimondi, Giorgia Girotti, Gian Andrea Blengini and Debora Fino (2012) LCA of petroleum-based lubricants: state of art and inclusion of additives. Int J Life Cycle Assess (2012) 17:987–996.
  properties: dry mass 1 kg, wet mass 1 kg

## Inputs from nature
- Water, cooling, unspecified natural origin [natural resource, in water]: 0.014707 m3; lognormal variance with pedigree 0.044, pedigree (2,4,2,4,4)
  Calculated based on literature data published by the GENDORF Chemical Park. The factory produced an average of 2462760 tonnes of chemical substances (including intermediates) per year in the years 2015-2019. The average amount of cooling water released in the years 2015-2019 was 34408800 t per year. It was assumed that 5% of the cooling water was emitted to air during its use, therefore, to calculate the input of cooling water, the output value reported by GENDORF was scaled up by the factor 1/0.95. This equals 0.014707 m3/kg chemical produced.
  References:
  Chemiepark GENDORF, Umwelterklärung 2016, https://www.gendorf.de/Nachbarn/Umweltschutz/Industrie%20und%20Nachhaltigkeit
  Chemiepark GENDORF, Umwelterklärung 2017, https://www.gendorf.de/Nachbarn/Umweltschutz/Industrie%20und%20Nachhaltigkeit
  Chemiepark GENDORF, Umwelterklärung 2020, https://www.gendorf.de/Nachbarn/Umweltschutz/Industrie%20und%20Nachhaltigkeit
- Water, river [natural resource, in water]: 0.000965426 m3; lognormal variance with pedigree 0.044, pedigree (2,4,2,4,4)
  Calculated based on literature data published by the GENDORF Chemical Park. The factory produced an average of 2462760 tonnes of chemical substances (including intermediates) per year in the years 2015-2019. The average consumption of river water in the years 2015-2019 was 22000820 t per year. However, since the cooling water is modelled as an input, the amount of river water was adjusted to avoid double counting. 55% of the input amount of cooling water was deducted from the amount of river water, as that is the share of river water versus well water. This equals 0.00096543 m3/kg chemical produced.
  References:
  Chemiepark GENDORF, Umwelterklärung 2016, https://www.gendorf.de/Nachbarn/Umweltschutz/Industrie%20und%20Nachhaltigkeit
  Chemiepark GENDORF, Umwelterklärung 2017, https://www.gendorf.de/Nachbarn/Umweltschutz/Industrie%20und%20Nachhaltigkeit
  Chemiepark GENDORF, Umwelterklärung 2020, https://www.gendorf.de/Nachbarn/Umweltschutz/Industrie%20und%20Nachhaltigkeit
- Water, well, in ground [natural resource, in water]: 0.000816522 m3; lognormal variance with pedigree 0.044, pedigree (2,4,2,4,4)
  Calculated based on literature data published by the GENDORF Chemical Park. The factory produced an average of 2462760 tonnes of chemical substances (including intermediates) per year in the years 2015-2019. The average consumption of well water in the years 2015-2019 was 18607480 t per year. However, since the cooling water is modelled as an input, the amount of well water was adjusted to avoid double counting. 45% of the input amount of cooling water was deducted from the amount of well water, as that is the share of well water versus river water. This equals 0.00081652 m3/kg chemical produced.
  References:
  Chemiepark GENDORF, Umwelterklärung 2016, https://www.gendorf.de/Nachbarn/Umweltschutz/Industrie%20und%20Nachhaltigkeit
  Chemiepark GENDORF, Umwelterklärung 2017, https://www.gendorf.de/Nachbarn/Umweltschutz/Industrie%20und%20Nachhaltigkeit
  Chemiepark GENDORF, Umwelterklärung 2020, https://www.gendorf.de/Nachbarn/Umweltschutz/Industrie%20und%20Nachhaltigkeit

## Emissions to nature
- NMVOC, non-methane volatile organic compounds [air, urban air close to ground]: 0.0204082 kg; lognormal variance with pedigree 0.33, pedigree (5,5,5,5,5)
  Estimation. The excess raw materials are assumed to be emitted to air.
  Uncertainty: e
- Water [air, unspecified]: 0.00147008 m3; lognormal variance with pedigree 0.0834, pedigree (2,4,2,4,4)
  Calculated based on literature data published by the GENDORF Chemical Park. The factory produced an average of 2462760 tonnes of chemical substances (including intermediates) per year in the years 2015-2019. To determine the emissions of water to air, the difference of all water inputs (from river, well, tap water and cooling) and outputs (wastewater, emissions to water) was calculated. The average ouput of water to air in the years 2015-2019 was 3620444 m3 per year. This equals 0.00147 m3/kg chemical produced. For more information on the other water exchanges please consult the respective exchange comment.
  References:
  Chemiepark GENDORF, Umwelterklärung 2016, https://www.gendorf.de/Nachbarn/Umweltschutz/Industrie%20und%20Nachhaltigkeit
  Chemiepark GENDORF, Umwelterklärung 2017, https://www.gendorf.de/Nachbarn/Umweltschutz/Industrie%20und%20Nachhaltigkeit
  Chemiepark GENDORF, Umwelterklärung 2020, https://www.gendorf.de/Nachbarn/Umweltschutz/Industrie%20und%20Nachhaltigkeit
- Water [water, unspecified]: 0.0150391 m3; lognormal variance with pedigree 0.0834, pedigree (2,4,2,4,4)
  Calculated based on literature data published by the GENDORF Chemical Park. The factory produced an average of 2462760 tonnes of chemical substances (including intermediates) per year in the years 2015-2019. The amount of water released back to the environment consists of the sum of the amount of process water treated in the internal WWTP that is then released back to the environment and the amount of cooling water released back to the environment. The average ouput of the internal WWTP in the years 2015-2019 was 2628800 m3 and that of cooling water released back to the environment was 34408800 m3. This gives a yearly average of 37037600 m3 emissions of water to water. This equals 0.01504 m3/kg chemical produced.
  References:
  Chemiepark GENDORF, Umwelterklärung 2016, https://www.gendorf.de/Nachbarn/Umweltschutz/Industrie%20und%20Nachhaltigkeit
  Chemiepark GENDORF, Umwelterklärung 2017, https://www.gendorf.de/Nachbarn/Umweltschutz/Industrie%20und%20Nachhaltigkeit
  Chemiepark GENDORF, Umwelterklärung 2020, https://www.gendorf.de/Nachbarn/Umweltschutz/Industrie%20und%20Nachhaltigkeit

## Sampling procedure
Data based on literature and estimations. The energy consumption is based on data from a large chemical factory located in Germany. The process emissions are based on estimations only.

## Review by Emilia Moreno Ruiz 2017-08-11
This dataset was additionally reviewed in a separate review process by Eric Johnson of Atlantic Consulting as well as Emilia Moreno Ruiz and Gregor Wernet of ecoinvent.
