# fuel cell production, stack solid oxide, 125kW electrical, future

Dataset: EcoSpold 2, unit process
Geography: CH
Time period: 2000-01-01 to 2023-12-31
Technology level: current
Classification: ISIC rev.4 ecoinvent: 2790:Manufacture of other electrical equipment
Classification: EcoSpold01Categories: natural gas/cogeneration
Synonyms: Festoxid Brennstoffzelle; oxidkeramische Hochtemperaturbrennstoffzelle; solid oxide fuel cell; Festkeramik Brennstoffzelle
Tags: ConvertedDataset
Scenario: Business-as-Usual
System model: Allocation, cut-off by classification
Generated by: Alex Primas
Published in: Primas A. 2007
Database: ecoinvent
isCopyrightProtected: true
accessRestrictedTo: 1

## General comment
The module reflects a solid oxide fuel cell (SOFC) stack with 125 kW electrical output. Inventory based on information from literature and one manufacturer. Life time operation of stack is 48'000h (6 years).
[This dataset was already contained in the ecoinvent database version 2. It was not individually updated during the transfer to ecoinvent version 3. Life Cycle Impact Assessment results may still have changed, as they are affected by changes in the supply chain, i.e. in other datasets. This dataset was generated following the ecoinvent quality guidelines for version 2. It may have been subject to central changes described in the ecoinvent version 3 change report (http://www.ecoinvent.org/database/ecoinvent-version-3/reports-of-changes/), and the results of the central updates were reviewed extensively. The changes added e.g. consistent water flows and other information throughout the database. The documentation of this dataset can be found in the ecoinvent reports of version 2, which are still available via the ecoinvent website. The change report linked above covers all central changes that were made during the conversion process.]

## Included activities end
The module includes the most important materials used for production. Also included is the transport of these materials and the energy needed for production.

## Geography
Process applicable in central European conditions.

## Technology
Solid oxide fuel cell (SOFC) with unpressurised tubular stack design for central cogeneration use. Performance, stack lifetime and catalyst use according to expected future values for a serial product. Operation with connection to low pressure gas network. Electrical efficiency 47%, total efficiency 80%.

## Parameters
- fraction, process water, to air: 0.15 dimensionless; name fraction_PW_to_air; lognormal variance with pedigree 0.092025, pedigree (4,4,3,2,4)
  Literature value. In case when no industry/process specific data are available, default evaporation fraction value is used. This value is 15% and is based on literature (Statistics Canada, 2007 & Shaffer, K.H., 2008, Consumptive water use in the Great Lakes Basin, USGS & Shiklomanov, 2003, World Water Resources at the Beginning of the 21st Century) and has been approved by an expert.
- fraction, water, deionised, to air: 0.15 dimensionless; name fraction_WDI_to_air; = fraction_PW_to_air; lognormal variance with pedigree 0.092025, pedigree (4,4,3,2,4)
  Calculated value. See comment in the other parametres present in this dataset. Deionised water is considered to be always used as process water, thus process water fractions to air are applied to all deionised water input flows to calculate the amount of water consumed in the processes.

## Reference product
- fuel cell, stack solid oxide, 125kW electrical, future: 1 unit; By-product classification allocatable product; CPC 46410: Primary cells and primary batteries; HS2017 8506: Cells and batteries; primary
  production volume 0.0673351 unit
    This is a placeholder value that does not reflect real-world production volumes. This dataset does not currently require a real-world production volume to work in the database framework, and no actual data were collected yet. This has no negative effect on the results of the ecoinvent database.
  property price 7125.17 EUR2005
    Calculated based on inputs: The price of the product has been calculated as a sum of the values of the material and energy inputs for this product. This value is therefore a rough estimation. It may underestimate the real price since there are additional expenses when producing any product. These expences can include for example labour costs, treatment of waste materials and profit for the producer. Please consider carefully whether this level of data quality is acceptable for your application.
  properties: carbon allocation 0 kg, carbon content 0

## Inputs from technosphere
- 1-butanol: 0.9 kg; lognormal variance with pedigree 0.280025, pedigree (4,4,5,2,5)
  Proxy for dibutylpthalat, data from 100kWel plant design
  Proxy for dibutylpthalat, data from 100kWel plant design
  properties: carbon content, fossil 0.648649, dry mass 1 kg, heating value, net 35.99 MJ, wet mass 1 kg
- building, hall, steel construction: 0.0244 m2; lognormal variance with pedigree 0.442, pedigree (4,4,5,5,4)
  Rough estimation based on company data of similar branch
  This exchange has an activity link directly to the producing activity because the product is primarily consumed in the same geographical area where it is produced.
- building, multi-storey: 0.146 m3; lognormal variance with pedigree 0.442, pedigree (4,4,5,5,4)
  Rough estimation based on company data of similar branch
  Rough estimation based on company data of similar branch
- chlorine, liquid: 85 kg; lognormal variance with pedigree 0.280025, pedigree (4,4,5,2,5)
  Estimation for process of powder carbochlorination
  Estimation for process of powder carbochlorination
  properties: dry mass 1 kg, wet mass 1 kg
- chromium: 1.3 kg; lognormal variance with pedigree 0.134025, pedigree (3,4,5,2,4)
  Proxy for chromium oxide, data from 100kWel plant design adapted
  Proxy for chromium oxide, data from 100kWel plant design adapted
  properties: dry mass 1 kg, wet mass 1 kg
- diethylene glycol: 1.58 kg; lognormal variance with pedigree 0.280025, pedigree (4,4,5,2,5)
  Proxy for polyethylene-glycol, data from 100kWel plant design
  Proxy for polyethylene-glycol, data from 100kWel plant design
  properties: carbon content, fossil 0.45283, dry mass 1 kg, heating value, net 25.14 MJ, wet mass 1 kg
- electricity, medium voltage: 9540 kWh; lognormal variance with pedigree 0.070625, pedigree (2,4,5,2,3)
  Data from 100kWel plant design adapted
  Data from 100kWel plant design adapted
- ethanol, without water, in 99.7% solution state, from ethylene: 23.4 kg; lognormal variance with pedigree 0.072025, pedigree (3,4,5,2,3)
  Data from 100kWel plant design adapted
  Data from 100kWel plant design adapted
  properties: carbon content, fossil 0.521739, dry mass 1 kg, heating value, net 28.1 MJ, wet mass 1 kg
  note on heating value, net: Based on literature, page 275, Report 17: Jungbluth, N., Chudacoff, M., Dauriat, A., Dinkel, F., Doka, G., Faist Emmenegger, M., Gnansounou, E., Kljun, N., Schleiss, K., Spielmann, M., Stettler, C., Sutter, J. 2007: Life Cycle Inventories of Bioenergy. ecoinvent report No. 17, Swiss Centre for Life Cycle Inventories, Dübendorf, CH.
- heat, district or industrial, natural gas: 30751.5 MJ; lognormal variance with pedigree 0.280025, pedigree (4,4,5,2,5)
  Estimation for process of powder mixing
  Estimation for process of powder mixing
  properties: heating value, net 1 MJ
- inert waste, for final disposal: -702.45 kg; lognormal variance with pedigree 0.100225, pedigree (4,4,2,2,4)
  Approximation for disposal of ceramic parts
  Approximation for disposal of ceramic parts
  production volume
    Calculated from the production volume of fuel cell, stack solid oxide, 125kWe, future in proportion to the respective output amounts.
  properties: dry mass 0.995 kg, water content 0.00502513, wet mass 1 kg
- lanthanum oxide: 373 kg; lognormal variance with pedigree 0.070625, pedigree (2,4,5,2,3)
  Data from 100kWel plant design adapted
  Data from 100kWel plant design adapted
  properties: dry mass 1 kg, wet mass 1 kg
- manganese: 127 kg; lognormal variance with pedigree 0.134025, pedigree (3,4,5,2,4)
  Proxy for mangan oxide, data from 100kWel plant design adapted
  Proxy for mangan oxide, data from 100kWel plant design adapted
  properties: dry mass 1 kg, wet mass 1 kg
- nickel, class 1: 7.68 kg; lognormal variance with pedigree 0.134025, pedigree (3,4,5,2,4)
  Proxy for nickel oxide, data from 100kWel plant design adapted
  Proxy for nickel oxide, data from 100kWel plant design adapted
  properties: dry mass 1 kg, wet mass 1 kg
- nitric acid, without water, in 50% solution state: 712 kg; lognormal variance with pedigree 0.134025, pedigree (3,4,5,2,4)
  Estimation for process of powder mixing
  Estimation for process of powder mixing
  properties: dry mass 1 kg, wet mass 1 kg
- petroleum coke: 14 kg; lognormal variance with pedigree 0.280025, pedigree (4,4,5,2,5)
  (same comment as for chlorine, liquid)
  properties: carbon content, fossil 0.885, dry mass 1 kg, heating value, net 35 MJ, wet mass 1 kg
- phthalic anhydride: 0.9 kg; lognormal variance with pedigree 0.280025, pedigree (4,4,5,2,5)
  (same comment as for 1-butanol)
  properties: carbon content, fossil 0.648649, dry mass 1 kg, heating value, net 22.93 MJ, wet mass 1 kg
- urea: 750.33 kg; lognormal variance with pedigree 0.078025, pedigree (4,4,5,2,3)
  The exchange has been updated from 'urea, as N' into 'urea' and therefore its amount has been scaled (multiplied) from 350 kg by 2.1438 kg of 'urea' per kg of 'urea, as N'. Original comment of the exchange is: Estimation for SCR in spray drier for NOx reduction
  Estimation for SCR in spray drier for NOx reduction
  properties: carbon content, fossil 0.2, dry mass 1 kg, wet mass 1 kg
- vinyl acetate: 5.23 kg; lognormal variance with pedigree 0.280025, pedigree (4,4,5,2,5)
  Proxy for PVB, data from 100kWel plant design adapted
  Proxy for PVB, data from 100kWel plant design adapted
  properties: carbon content, fossil 0.55814, dry mass 1 kg, heating value, net 25.35 MJ, wet mass 1 kg
  note on carbon content, fossil: Vinyl acetate (CH3CO2CH=CH2) (ecoinvent v2.2 report 11_II), C4H6O2. MW=86 g/mol
- water, deionised: 123 kg; name water_deionised_input; lognormal variance with pedigree 0.070625, pedigree (2,4,5,2,3)
  Data from 100kWel plant design adapted
  Data from 100kWel plant design adapted
  properties: wet mass 1 kg
- zirconium oxide: 84.8 kg; lognormal variance with pedigree 0.070625, pedigree (2,4,5,2,3)
  Data from 100kWel plant design adapted
  Data from 100kWel plant design adapted
  properties: dry mass 1 kg, wet mass 1 kg

## Inputs from nature
- Occupation, industrial area [natural resource, land]: 4.38 m2*year; lognormal variance with pedigree 0.182, pedigree (4,4,5,5,4)
  Rough estimation based on company data of similar branch
- Transformation, from unspecified [natural resource, land]: 0.0876 m2; lognormal variance with pedigree 0.262, pedigree (4,4,5,5,4)
  Rough estimation based on company data of similar branch
- Transformation, to industrial area [natural resource, land]: 0.0876 m2; lognormal variance with pedigree 0.262, pedigree (4,4,5,5,4)
  Rough estimation based on company data of similar branch

## Emissions to nature
- Ammonia [air, urban air close to ground]: 4 kg; lognormal variance with pedigree 0.150025, pedigree (4,4,5,2,4)
  Estimation based on input and emission treatment
- Diethylene glycol [air, urban air close to ground]: 0.45 kg; lognormal variance with pedigree 0.320025, pedigree (4,4,5,2,5)
  Rough estimation based on material input
- Ethanol [air, urban air close to ground]: 7 kg; lognormal variance with pedigree 0.118025, pedigree (4,4,5,2,3)
  Rough estimation based on material input
- NMVOC, non-methane volatile organic compounds [air, urban air close to ground]: 1.6 kg; lognormal variance with pedigree 0.320025, pedigree (4,4,5,2,5)
  Rough estimation based on material input
- Nitrogen oxides [air, urban air close to ground]: 26 kg; lognormal variance with pedigree 0.180025, pedigree (4,4,5,2,4)
  Estimation based on input and emission treatment
- Water [air, unspecified]: 0.01845 m3; name water_to_air_unspecified; = (water_deionised_input/1000*fraction_WDI_to_air); lognormal variance with pedigree 0.0807, pedigree (2,2,5,1,1)
  Calculated value based on literature values and expert opinion. See comments in the parametres' comment field.
  property fraction, origin: fresh water 1; name fraction_origin_fresh_water
  property fraction, origin: salt water 0; name fraction_origin_salt_water
  property fraction, origin: unspecified 0; name fraction_origin_unspecified
- Chloride [water, surface water]: 85 kg; lognormal variance with pedigree 0.580025, pedigree (4,4,5,2,5)
  Rough estimation based on material input
- Water [water, unspecified]: 0.10455 m3; name water_to_water_unspecified; = (water_deionised_input/1000)*(1-fraction_WDI_to_air); lognormal variance with pedigree 0.0807, pedigree (2,2,5,1,1)
  (same comment as for Water)
  property carbon content, fossil 0; name C_content_fossil
  property carbon content, non-fossil 0; name C_content_non_fossil
  property dry mass 0 kg; name DM
  property fraction, origin: fresh water 1; name fraction_origin_fresh_water_Ww
  property fraction, origin: salt water 0; name fraction_origin_salt_water_Ww
  property fraction, origin: unspecified 0; name fraction_origin_unspecified_Ww
  property water in wet mass 1000 kg; name WWM
  property wet mass 1000 kg; name WM

## Sampling procedure
Literature data and manufacturer information

## Review by Rolf Frischknecht 2010-03-21
passed
none
