# natural gas production, liquefied

Dataset: EcoSpold 2, unit process
Geography: AE
Time period: 2021-01-01 to 2023-12-31
Technology level: current
Classification: ISIC rev.4 ecoinvent: 3520:Manufacture of gas; distribution of gaseous fuels through mains
Scenario: Business-as-Usual
System model: Allocation, cut-off by classification
Share of production covered: 100 %
Generated by: Maresa Bussa
Published in: Bussa, M. 2023
Database: ecoinvent
isCopyrightProtected: true
accessRestrictedTo: 1

## General comment
This dataset describes the production of 1 m3 of ‘natural gas, liquefied’ (LNG) in United Arab Emirates, and it includes the processes and services needed to run the liquefaction process of natural gas. The reference flow refers to 1 standard cubic meter of natural gas in the gaseous state.
In a liquefaction plant, the natural gas is cooled to -161 °C to reach its liquid state and the CO2 is separated. The volume of natural gas in liquid state decreases to 1/600 of the volume in gaseous state. On average 8.6 % of the natural gas input is consumed to run the liquefaction process (Pospíšil et al. 2019 in Bussa et al. 2023). The separated CO2 is usually emitted into air and not pumped back into the gas reservoir. The resulting CO2-emissions are based on the natural gas composition. The leakage rate of 0.05 %, based on Schori et al. 2012, is used to calculate the emissions of other natural gas components.
Reference(s):
M. Bussa, N. Jungbluth, C. Meili (2023) Life cycle inventories for long-distance transport and distribution of natural gas. ESU-services Ltd. Schaffhausen, Switzerland. Available from: http://esu-services.ch/data/public-lci-reports/
Pospíšil J., Charvát P., Arsenyeva O., Klimeš L., Špiláček M. and Klemeš J. J. (2019) Energy demand of liquefaction and regasification of natural gas and the potential of LNG for operative thermal energy storage. In: Renewable and Sustainable Energy Reviews, 99, pp. 1-15, 10.1016/j.rser.2018.09.027.

## Included activities start
The activity starts with the gaseous natural gas delivered to the liquefaction plant.

## Included activities end
The activity ends with the liquified natural gas ready to be shipped. It includes the energy requirements, emissions and losses, and infrastructure for the liquefaction process. The liquefied gas is, usually, stored in a tank for 0.5-1.5 days prior shipping. Since an estimate of 9000 cycle per tank are considered, the overall balance of the tank construction and maintenance is negligible.

## Geography
United Arab Emirates

## Technology
During compression, the CO2 present in the natural gas mix is separated and, in general, released to the atmosphere. The practice of pump-back in the original reservoir is not common. An average value of 0.05% of leakage is taken into account (Schori et al. 2012).

## Time period
Data on energy use for the liquefaction stems of a review of common technologies from 2019. Data on leakages stem from 1990.

## Reference product
- natural gas, liquefied: 1 m3; By-product classification allocatable product; CPC 12020: Natural gas, liquefied or in the gaseous state; HS2017 271111: Petroleum gases and other gaseous hydrocarbons; liquefied, natural gas; CAS 8006-14-2
  Output
  production volume 8.75149e9 m3
    Annual production volume (expressed in m3 at standard conditions, i.e., in gaseous form) based on total LNG exports in 2021, from bp Statistical Review of World Energy June 2022.
  property carbon content, fossil 0.741
    Set equal to that of 'natural gas, high pressure' (based on composition in Bussa et al. (2021), tab. 3.1).
  property heating value, gross 40 MJ
    Set equal to that of 'natural gas, high pressure' (at standard conditions; based on Meili et al. 2022, section 5.2)
  property heating value, net 36 MJ
    (same comment as for natural gas, liquefied)
  property price 0.23326 EUR2005
    Calculated value based on data from the United Nations Commodity Trade Statistics Database (http://data.un.org/Data.aspx?q=natural+gas&d=ComTrade&f=_l1Code%3a28%3bcmdCode%3a271111; accessed 12 October 2023). UN comtrade category: 271111 Natural gas, liquified. An average for 2019-2021 was used and adjusted for inflation to the year 2005. The average price of imports and exports into the five main markets (EU, US, JP, IN and CN) was determined. Density of natural gas of 0.735 kg/m³ for unit conversion was used.
  properties: carbon allocation 0.544635 kg, carbon content 0.741, carbon content, non-fossil 0, dry mass 0.735 kg, water content 0, water in wet mass 0 kg, wet mass 0.735 kg

## Inputs from technosphere
- natural gas processing plant: 7.89e-13 unit; lognormal variance with pedigree 0.0512951, pedigree (5,3,3,3,3)
  Estimate for Europe, as described in Bussa et al. 2023
- natural gas, burned in gas turbine: 3.105 MJ; lognormal variance with pedigree 0.0169951, pedigree (4,2,2,3,3)
  Qualified estimates from different gas companies, as described in Bussa et al. 2023
- natural gas, high pressure: 0.56028, 0.44022 m3 (2 suppliers, which the file names only by identifier); sum of these 1.0005 m3; lognormal variance with pedigree 0.00869512, pedigree (4,2,1,1,1)
  Input of natural gas linked directly to domestic supply, with the shares of offshore and onshore production according to Meili et al. (2023) section 4.1.
  properties: carbon content, fossil 0.741, dry mass 0.735 kg, heating value, gross 40 MJ, heating value, net 36 MJ, wet mass 0.735 kg
  note on heating value, gross: At standard conditions; based on Meili et al. (2022) section 5.2

## Emissions to nature
- Butane [air, non-urban air or from high stacks]: 3.17602e-6 kg; lognormal variance with pedigree 0.0503005, pedigree (2,3,4,1,1)
  Calculated based on leakage and average gas composition, as described in Bussa et al. 2023
- Carbon dioxide, fossil [air, non-urban air or from high stacks]: 0.0229297 kg; lognormal variance with pedigree 0.656773, pedigree (2,3,4,1,1)
  Calculated based on leakage and average gas composition, as described in Bussa et al. 2023
- Ethane [air, non-urban air or from high stacks]: 2.74518e-5 kg; lognormal variance with pedigree 0.0503005, pedigree (2,3,4,1,1)
  Calculated based on leakage and average gas composition, as described in Bussa et al. 2023
- Mercury II [air, non-urban air or from high stacks]: 5e-12 kg; lognormal variance with pedigree 0.0503005, pedigree (2,3,4,1,1)
  Calculated based on leakage and average gas composition, as described in Bussa et al. 2023
- Methane, fossil [air, non-urban air or from high stacks]: 0.000331433 kg; lognormal variance with pedigree 0.0503005, pedigree (2,3,4,1,1)
  Calculated based on leakage and average gas composition, as described in Bussa et al. 2023
- NMVOC, non-methane volatile organic compounds [air, non-urban air or from high stacks]: 2.2869e-7 kg; lognormal variance with pedigree 0.00979512, pedigree (2,3,4,1,1)
  Calculated based on leakage and average gas composition, as described in Bussa et al. 2023
- Propane [air, non-urban air or from high stacks]: 6.17625e-6 kg; lognormal variance with pedigree 0.0503005, pedigree (2,3,4,1,1)
  Calculated based on leakage and average gas composition, as described in Bussa et al. 2023

## Sampling procedure
Literature. Global data for energy requirements combined and natural gas characteristics.

## Extrapolations
A default inventory, established based on literature, is assumed representative for all geographies.
