# beverage carton production, 1 L, for juice (ambient)

Dataset: EcoSpold 2, unit process
Geography: RER
Time period: 2017-01-01 to 2023-12-31
Technology level: current
Classification: EcoSpold01Categories: paper & cardboard/cardboard & corrugated board
Classification: ISIC rev.4 ecoinvent: 1702:Manufacture of corrugated paper and paperboard and of containers of paper a
Scenario: Business-as-Usual
System model: Allocation, cut-off by classification
Generated by: Mirjam Busch
Database: ecoinvent
isCopyrightProtected: true
accessRestrictedTo: 1

## General comment
This activity represents the production of sleeve and closure/neck of one beverage carton for juice stored in ambient temperature. The beverage carton's volume is 1 L and its mass is 34.35 g. A standard 1 L carton has an area of 0.07889 m². The dataset describes only the actual production of the sleeve and closure of beverage carton for juice packaging. Sleeve and closure/neck production take place on different production sites.
Beverage cartons are made of LPB (liquid packaging board) which is coated with plastic resins and often laminated for product protection and extended shelf life. In the modelled beverage carton there are two parts, carton body and plastic closure and neck. The body is made of LPB, LDPE (light density polyethylene) and aluminium. The closure and neck are made of HDPE (high density polyethylene), PP (polypropylene) and LDPE. The energy inputs to the process are modeled via the services injection moulding, beverage carton converting and sheet rolling, aluminium.
The scrap rate of the production process of the carton body is 5.33 %. Hence, the inputs contributing to carton body have been divided by (1-0.0533). The processing of materials used in closure and neck is modelled by injection moulding, which takes into account the losses of these inputs.
The filling process (including forming and sealing of the filled beverage cartons) as well as packaging of filled beverage cartons for distribution to retailers is not modelled in the dataset. However, the following data can be used to model the secondary and tertiary packaging needed to retail the juice cartons: The beverage cartons are transported on pallets. The pallet specification is: 12 packs per tray, 16 trays per layer and 4 layers per pallet. Thus, the pallet can be used to transport 12 x 16 x 4 = 768 empty juice cartons at a time. The cardboard tray as secondary packaging has a mass of 0.115 kg. In tertiary packaging of the pallet, 0.170 kg of shrink foil and 0.475 kg of slip sheet is used. A pallet has a mass of 25 kg. When all the packaging materials are considered, the pallet with empty juice cartons has a total mass of 59.3 kg.
The dataset is based on an LCA study on beverage cartons in the European market conducted by the data provider IFEU (Institut für Energie- und Umweltforschung). The data for the study was provided by the members of ACE (The Alliance for Beverage Cartons and the Environment). The data in this inventory represent an average production of a beverage carton for juice packaging and the dataset itself has a broad application. Hence, it does not represent a specific or particular beverage packaging. If you are conducting life cycle assessment of specific beverage carton (packaging) it is advised to collect more specific data about detailed material composition of the product in question since this information can vary greatly between beverage cartons.

## Included activities start
This activity starts at the gate of the facility for sleeve and closure/neck production with the reception of raw materials.

## Included activities end
The activity ends with the produced beverage cartons as well as neck and closure being ready for transportation to filler. This activity includes the production of beverage cartons for juice packaging. It contains the steps of laminating, cutting, folding and printing as well as cap production. Besides the main raw materials (LPB, LDPE, HDPE, PP and aluminium), ink is considered too. It does not include forming, filling and sealing which need to be modelled in a separate dataset. Production waste is modelled as two separate exchanges, waste paperboard (unsorted) and mixed waste specifically from beverage carton production.

## Geography
The data is for beverage beverage cartons produced and used in Europe.

## Technology
Current installed at specified time. The dataset is applicable for both, sleeve based and roll based, production processes.

## Time period
The reference period of the dataset is the year 2017.

## Reference product
- beverage carton, 1 L, for juice (ambient): 1 unit; By-product classification allocatable product; CPC 32153: Cartons, boxes, cases, record sleeves and other packing containers (except bags) of paper, paperboard, cellulo[…]; HS2017 481920: Paper and paperboard; folding cartons, boxes and cases, of non-corrugated paper or paperboard
  production volume 4.36681e9 unit; name pv_bc; = 1000000*0.15*10^3/wet_mass
    According to the data provider IFEU, the total production volume of beverage cartons in Europe is 1 million tons. The share of juice cartons is 15 %.
  property heating value, net 0.674551 MJ
    Measure of the thermal energy produced during the combustion of a product. Expressed in MJ per unit of product.
  property price 0.0355 EUR2005
    The price data was collected from Alibaba for two beverage cartons suitable for juice and UHT milk packaging in ambient temperature. The average price of the products was 0.06 $/pc. The price was converted to EUR based on the annual exchange rates published by the European Central Bank (https://sdw.ecb.europa.eu/quickview.do?SERIES_KEY=120.EXR.A.USD.EUR.SP00.A, last accessed on 2022-02-15) and adjusted for inflation relative to 2005 using the producer price index (PPI) of the euro area, published by eurostat (https://ec.europa.eu/eurostat/databrowser/view/STS_INPP_A__custom_6416181/default/table?lang=en, last accessed on 2022-05-04).
  property wet mass 0.03435 kg; name wet_mass
  properties: carbon allocation 0.0170436 kg, carbon content 0.514675, carbon content, fossil 0.266584, carbon content, non-fossil 0.248091, dry mass 0.0331152 kg, water content 0.0372864, water in wet mass 0.00123475 kg

## Inputs from technosphere
- LDPE/Alu in waste juice carton (ambient), post-industrial: -0.0005 kg; name m_waste_bc; lognormal variance with pedigree 0.0029, pedigree (3,2,2,1,1)
  Scrap rate of the production process of the carton body is 5.33 %. LDPE and aluminium cannot be recycled and they are sent to incineration.
  production volume; = (m_waste_bc/wet_mass)*pv_bc*wet_mass
    Calculated from production volume of reference product using the relative outputs.
  properties: aluminium content 0.199331, calcium content 0.00977543, carbon content, fossil 0.639851, chlorine content 0.00749213, dry mass 0.886405 kg, heating value, gross 36.0863 MJ, heating value, net 33.2231 MJ, hydrogen content 0.115787, nitrogen content 0.00624023, silicon content 0.00958624, water content 0.128152, wet mass 1 kg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
- aluminium, primary, ingot: 0.00164 kg; lognormal variance with pedigree 0.0407, pedigree (1,2,5,1,1)
  The material is used in carton body. A direct activity link to the supplying market is added to reflect the reality of the supply chain. Please note that the scrap rate (5.33%) is included. The value comes from an LCA study on beverage cartons in the European market conducted by IFEU (data provider). The data for this study was provided by ACE members.
  properties: dry mass 1 kg, wet mass 1 kg
- beverage carton converting: 0.07889 m2; lognormal variance with pedigree 0.0413, pedigree (2,2,5,1,1)
  A standard 1L carton has an area of 0.07889 m². So for the standard 1L carton 0.07889 m2 of this module are used. The exchange has an activity link directly to the producing activity because it is consumed at the same site where it is produced. The value comes from an LCA study on beverage cartons in the European market conducted by IFEU (data provider). The data for this study was provided by ACE members.
  properties: carbon content, fossil 0.00365437, carbon content, non-fossil 0.450248, dry mass 0.00945 kg, water content 0.0582011, wet mass 0.01 kg
  note on carbon content, fossil: C content was calculated as an addition of C content in the raw materials.
- injection moulding: 0.00297 kg; lognormal variance with pedigree 0.0413, pedigree (2,2,5,1,1)
  Injection moulding is used to form the closure and neck. In the service of injection moulding, 1 kg of this process corresponds to 0.994 kg of injection moulded plastics. The exchange has an activity link directly to the producing activity because it is consumed at the same site where it is produced.
- liquid packaging board: 0.02371 kg; lognormal variance with pedigree 0.0407, pedigree (1,2,5,1,1)
  The material is used in carton body. Please note that the scrap rate (5.33%) is included. The value comes from an LCA study on beverage cartons in the European market conducted by IFEU (data provider). The data for this study was provided by ACE members.
  EcoSpold01Location=RER
  properties: carbon content, fossil 3.6e-5, carbon content, non-fossil 0.3861, dry mass 0.945 kg, heating value, net 10.92 MJ, water content 0.0582011, wet mass 1 kg
  note on carbon content, fossil: Fossil C content was calculated after fossil C contents of chemicals used in the production of board (Tab 11.30 ecoinvent v2.2 report 11_III, part 11)
  note on carbon content, non-fossil: Biogenic C content was calculated after biogenic C contents of chemicals used in the production of board (Tab 11.30 ecoinvent v2.2 report 11_III, part 11). The cellulose content in 1 kg of paper (on a wet mas basis) was estimated as (1-chemical content), C content of cellulose was considered 0.44 kgC/kg dry mass (ecoinvent v2.2 report, n 15a, pg 40)
- packaging box factory: 4.90714e-11 unit; = wet_mass/(14000*1000*50); lognormal variance with pedigree 0.344, pedigree (3,4,5,1,1)
  EcoSpold01Location=RER
  The infrastructure input represents a packaging production facility with an annual production of 14'000 t and a total life time of 50 years. It was scaled by the total mass of one juice beverage carton.
- polyethylene, high density, granulate: 0.00211 kg; lognormal variance with pedigree 0.0407, pedigree (1,2,5,1,1)
  EcoSpold01Location=RER
  The material is used in closure and neck. A direct activity link to the supplying market is added to reflect the reality of the supply chain. The value comes from an LCA study on beverage cartons in the European market conducted by IFEU (data provider). The data for this study was provided by ACE members.
  properties: carbon content, fossil 0.857143, dry mass 1 kg, heating value, net 42.47 MJ, wet mass 1 kg
  note on carbon content, fossil: Polyethylene is formed out of a huge amount of ethylene monomers (C2H4) (ecoinvent v2.2 report 11_II). MW=28 g/mol
- polyethylene, low density, granulate: 0.00774 kg; lognormal variance with pedigree 0.0407, pedigree (1,2,5,1,1)
  In a beverage carton, 0.0077 kg of LDPE is used for carton body and 0.00004 kg for closure and neck. Please note that the scrap rate (5.33%) is included in the amount of input to carton body. A direct activity link to the supplying market is added to reflect the reality of the supply chain. The value comes from an LCA study on beverage cartons in the European market conducted by IFEU (data provider). The data for this study was provided by ACE members.
  properties: carbon content, fossil 0.857143, dry mass 1 kg, heating value, net 42.47 MJ, wet mass 1 kg
- polypropylene, granulate: 0.0008 kg; lognormal variance with pedigree 0.0407, pedigree (1,2,5,1,1)
  The material is used in closure and neck. A direct activity link to the supplying market is added to reflect the reality of the supply chain. The value comes from an LCA study on beverage cartons in the European market conducted by IFEU (data provider). The data for this study was provided by ACE members.
  properties: carbon content, fossil 0.857143, dry mass 1 kg, heating value, net 32.78 MJ, wet mass 1 kg
  note on heating value, net: Value extracted from "treatment of waste polypropylene, open burning"
- printing ink, offset, without solvent, in 47.5% solution state: 0.000116 kg; lognormal variance with pedigree 0.0427, pedigree (3,2,5,1,1)
  The material is used in carton body. Please note that the scrap rate (5.33%) is included. The value is an estimate provided by the data provider, IFEU.
  EcoSpold01Location=RER
  properties: carbon content, fossil 0.455266, carbon content, non-fossil 0.221773, dry mass 1 kg, heating value, net 20.51 MJ, wet mass 1 kg
- sheet rolling, aluminium: 0.00164 kg; lognormal variance with pedigree 0.0493, pedigree (2,2,5,1,3)
  Ideally a foil process would be used to process aluminium, but since it is not available in the database, the sheet process has been used as an approximation. The exchange has an activity link directly to the producing activity because it is consumed at the same site where it is produced.
- transport, freight train: 0.00046647 metric ton*km; lognormal variance with pedigree 0.1632, pedigree (2,3,3,1,4)
  This transportation is for the plastics used in the beverage carton. Transport distance is based on eurostat transport statistics for railway transport of goods. The transport data was extracted from the database leaf 'Railway transport - goods transported, by group of goods - from 2008 onwards based on NST 2007 (1 000 t, million tkm) (rail_go_grpgood)' (http://ec.europa.eu/eurostat/data/database) on the 2018-06-01. The transport distance was calculated based on the total mass of goods transported and total payload-distance for the NST 2007 category 'GT08 - Chemicals, chemical products, and man-made fibers; rubber and plastic products ; nuclear fuel' in the year 2016 for all countries for which data was available. The average distance of railway transport for goods in this category in 2016 was 297 km. The fraction of goods transported by rail (in terms of mass) relative to the total mass of goods transported by road, rail and inland waterways was 15% in 2016. Therefore, the average distance that goods travelled by rail in 2016 was 44 km. This was then scaled with the total mass of plastics in this dataset. This value is assumed to be representative for Europe.
- transport, freight, inland waterways, barge: 0.000233235 metric ton*km; lognormal variance with pedigree 0.1632, pedigree (2,3,3,1,4)
  This transportation is for the plastics used in the beverage carton. Transport distance is based on eurostat transport statistics for transport of goods by inland waterways. The transport data was extracted from the database leaf 'Transport by type of good (from 2007 onwards with NST2007) (iww_go_atygo)' (http://ec.europa.eu/eurostat/data/database) on the 2018-06-01. The transport distance was calculated based on the total mass of goods transported and total payload-distance for the NST 2007 category 'GT08 - Chemicals, chemical products, and man-made fibers; rubber and plastic products ; nuclear fuel' in the year 2016 for the European Union (current composition). The average distance of transport by inland waterways for goods in this category in 2016 was 365 km. The fraction of goods transported by inland waterways (in terms of mass) relative to the total mass of goods transported by road, rail and inland waterways was 6% in 2016. Therefore, the average distance that goods travelled by inland waterways in 2016 was 22 km. This was then scaled with the total mass of plastics in this dataset. This value is assumed to be representative for Europe.
- transport, freight, lorry, unspecified: 0.00182435 metric ton*km; lognormal variance with pedigree 0.1632, pedigree (2,3,3,1,4)
  This transportation is for the plastics used in the beverage carton. Transport distance is based on eurostat transport statistics for road freight transport. The transport data was extracted from the database leaf 'Annual road freight transport, by type of goods and type of transport (1 000 t, Mio Tkm), from 2008 onwards (road_go_ta_tg)' (http://ec.europa.eu/eurostat/data/database) on the 2018-06-01. The transport distance was calculated based on the total mass of goods transported and total payload-distance for the NST 2007 category 'GT08 - Chemicals, chemical products, and man-made fibers; rubber and plastic products ; nuclear fuel' in the year 2016 for all countries for which data was available. The average distance of road transport for goods in this category in 2016 was 216 km. The fraction of goods transported by road (in terms of mass) relative to the total mass of goods transported by road, rail and inland waterways was 79% in 2016. Therefore, the average distance that goods travelled by road in 2016 was 171 km. This was then scaled with the total mass of plastics in this dataset. This value is assumed to be representative for Europe.
- waste paperboard, unsorted: -0.00126 kg; name m_waste_pb; lognormal variance with pedigree 0.0029, pedigree (3,2,2,1,1)
  Scrap rate of the production process of the carton body is 5.33 %. LPB can be recycled as waste paperboard, sorted.
  production volume; = (m_waste_pb/wet_mass)*pv_bc*wet_mass
    Calculated from production volume of reference product using the relative outputs.
  properties: carbon content, non-fossil 0.483259, dry mass 0.804 kg, heating value, net 15.92 MJ, price 0.03924 EUR2005, water content 0.243781, wet mass 1 kg
  note on carbon content, non-fossil: C content was calculated for 1 kg DM, using data in Tab A.3, ecoinvent v2.2 report 13_I.

## Sampling procedure
The dataset is based on an LCA study on beverage cartons in the European market conducted by IFEU.
