# mercerizing, textile

Dataset: EcoSpold 2, unit process
Geography: RoW
Time period: 2016-04-01 to 2023-03-31
Technology level: current
Classification: ISIC rev.4 ecoinvent: 1313:Finishing of textiles
Classification: EcoSpold01Categories: textiles/processing
Scenario: Business-as-Usual
System model: Allocation, cut-off by classification
Generated by: [System]
Published in: Faist Emmenegger, M. 2018
Database: ecoinvent
isCopyrightProtected: true
accessRestrictedTo: 1

## General comment
This inventory dataset represents the process of finishing 1 kg of cotton fabric in India through a specialised technique called mercierisation. This dataset is a copy of Indian dataset.
This activity is modelled as a service, so no inputs of Fabric are considered.
Mercerisation is a special type of finising which involves treatment of cotton yarn or fabric to increase its luster and affinity for dyes. The material is immersed under tension in a cold sodium hydroxide (caustic soda) solution in warp or skein form or in the piece, and is later neutralized in acid. The process causes a permanent swelling of the fiber and thus increases its lustre. It is the process of treatment of cellulosic material with cold or hot caustic conditions under specific conditions to improve its appearance and physical as well as chemical properties.
The mercerizing involves these three subsequent steps, 1. Impregnation of the material in relaxed state, by cold caustic solution of required strength and wettability. 2. Stretching while the material is still impregnated in the caustic solution. 3. Washing off the caustic soda from the material while keeping the material still in the stretched state.
we deemed the impact of machinery to be minimum therefore we deliberately excluded machinery from the dataset

## Included activities start
This activity begins with dipping of fabric in strong alkaline solution.

## Included activities end
This activity ends with supplying the service of finishing 1 kg of fabric. This process involves steam generation, mercerisation,washing,conditioning of cotton fabric and drying. The dataset needs to be used with 1kg of fabric
Machinery is excluded.

## Geography
Global average based on inputs from Indian manufacturer.

## Technology
The mercerizing involves these three subsequent steps, 1. Impregnation of the material in relaxed state,by cold caustic solution of required strength and wettability.. 2. Stretching while the material is still impregnated in the caustic solution. 3. Washing off the caustic soda from the material while keeping the material still in the stretched state.

## Reference product
- mercerizing, textile: 1 kg; name RP_amount_1; By-product classification allocatable product; CPC 88213: Textile finishing services
  production volume 7.53478e10 kg; name RP_PV_1
    Source: The Fibre Year, FAO, own calculations
  property price 0.184656 EUR2005
    Calculated based on inputs: The price of the product has been calculated as a sum of the values of the material and energy inputs for this product. This value is therefore a rough estimation. It may underestimate the real price since there are additional expenses when producing any product. These expences can include for example labour costs, treatment of waste materials and profit for the producer. Please consider carefully whether this level of data quality is acceptable for your application.
  properties: carbon allocation 0 kg, carbon content 0

## Inputs from technosphere
- building, hall: 1.55665e-5 m2; lognormal variance with pedigree 0.3046, pedigree (2,1,3,5,1)
  total building area (square meters) divided by production per year and life time of the plant
- diesel, burned in diesel-electric generating set, 18.5kW: 5.106 MJ; lognormal variance with pedigree 0.0146, pedigree (4,4,3,5,1)
  Diesel used for power backup. Forumula includes diesel consumption in liters multiplied density of fule and its calorific value
- electricity, low voltage: 0.000915737, 0.004955, 0.000192567, 7.48714e-5, 0.0052264, 0.00124573, 7.51274e-5, 0.000256751, 0.000102588, 0.0461281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 kWh (47 suppliers, which the file names only by identifier); sum of these 0.131 kWh; lognormal variance with pedigree 0.0066, pedigree (1,4,3,5,1)
  sum of electricity used for:
  dyeing machine
  boiler
  hydro extractor
  dryer
  compactor
- sodium hydroxide, without water, in 50% solution state: 0.0286901, 0.29381 kg (2 suppliers, which the file names only by identifier); sum of these 0.3225 kg; lognormal variance with pedigree 0.0146, pedigree (4,4,3,5,1)
  For preparing Ready For Dyeing (RFD) solution
  properties: dry mass 1 kg, heating value, net 3.03 MJ, wet mass 1 kg
- wastewater from textile production: -0.01672 m3; name wastewater; lognormal variance with pedigree 0.0126, pedigree (4,4,1,5,1)
  considering 80% default wastewater generation
  production volume; = RP_PV_1* wastewater/ RP_amount_1
    Calculated from production volume of reference product using the relative outputs.
- water, deionised: 4.91774, 0.0177027, 15.9646 kg (3 suppliers, which the file names only by identifier); sum of these 20.9 kg; lognormal variance with pedigree 0.0066, pedigree (1,4,3,5,1)
  used for preparing the solution and for washing
  properties: wet mass 1 kg

## Emissions to nature
- Water [air, urban air close to ground]: 0.00418 m3; lognormal variance with pedigree 0.0146, pedigree (4,4,3,5,1)
  Considering 20% evaporation rate

## Sampling procedure
Extrapolated from IN data, uncertainty adjusted accordingly
