# swath, by rotary windrower

Dataset: EcoSpold 2, unit process
Geography: US
Time period: 2021-01-01 to 2023-12-31
Technology level: current
Classification: ISIC rev.4 ecoinvent: 0161:Support activities for crop production
Scenario: Business-as-Usual
System model: Allocation, cut-off by classification
Generated by: Juanita Barrera
Database: ecoinvent
isCopyrightProtected: true
accessRestrictedTo: 1

## General comment
This dataset represents the use of rotary windrower for one hectare. The working width is 4.0 m (average).

## Included activities start
The rotary windrower process starts with preliminary work at the farm, like attaching the adequate machine to the tractor.

## Included activities end
This activity ends with transfer back to farm and concluding work, like uncoupling the machine. The inventory includes transfer to field; field work (for a parcel of land of 1 ha surface); the diesel fuel consumption and the amount of agricultural machinery and of the shed, which has to be attributed to the swathing. Also taken into consideration is the amount of emissions to the air from combustion and the emission to the soil from tyre abrasion during the work process. The overlapping during the field work is considered. The amount of swathed good is not taken into account. Not included are dust other than from combustion and noise.

## Geography
The inventory is extrapolated from the geography of Quebec, Canada. Data quality indicators are adjusted accordingly.

## Technology
Fuel consumption and emissions per kg diesel have been extrapolated to the US, but others inputs were taken from the original values.

## Reference product
- swath, by rotary windrower: 1 ha; By-product classification allocatable product; CPC 86119: Other support services to crop production
  production volume 2.45374e8 ha
    FAOSTAT data year 2020: Permanent meadows and pastures area, 1 cut per year assumed (considering grazing, (own estimation)
  property price 19.3146 EUR2005
    The price is from the year 2023. The price is estimated as a proxy based on the source: https://www.gov.mb.ca/agriculture/farm-management/production-economics/pubs/calculator-farm-machinery-custom-and-rental-guide.pdf. The prices were adjusted for inflation relative to 2005 using the producer price index (PPI) of the euro area, published by eurostat (https://ec.europa.eu/eurostat/databrowser/view/STS_INPP_A__custom_6416181/default/table?lang=en, last accessed on 2023-06-01).
  properties: carbon allocation 0 kg, carbon content 0

## Inputs from technosphere
- agricultural machinery, unspecified: 0.404 kg; lognormal variance with pedigree 0.3042, pedigree (1,4,2,5,1)
  proxy from "swath, by rotary windrower, CA-QC"
- diesel: 4.2138 kg; lognormal variance with pedigree 0.0028, pedigree (1,4,2,1,1)
  Iowa State University, 2001. Fuel Required for Field Operations, Machinery Management, Iowa State Universit Available at: https://store.extension.iastate.edu/product/Fuel-Required-for-Field-Operations-Machinery-Management
  properties: carbon content, fossil 0.865, dry mass 1 kg, heating value, net 42.8 MJ, wet mass 1 kg
- shed: 0.00426 m2; lognormal variance with pedigree 0.3042, pedigree (1,4,2,5,1)
  proxy from "swath, by rotary windrower, CA-QC"
- tractor, 4-wheel, agricultural: 0.458 kg; lognormal variance with pedigree 0.3042, pedigree (1,4,2,5,1)
  proxy from "swath, by rotary windrower, CA-QC"

## Emissions to nature
- Ammonia [air, non-urban air or from high stacks]: 8.4276e-5 kg; lognormal variance with pedigree 0.058325, pedigree (1,2,2,2,3)
  adapted from "swath, by rotary windrower, CA-QC" to match the diesel consumption
- Benzene [air, non-urban air or from high stacks]: 3.08152e-5 kg; lognormal variance with pedigree 0.058325, pedigree (1,2,2,2,3)
  adapted from "swath, by rotary windrower, CA-QC" to match the diesel consumption
- Benzo(a)pyrene [air, non-urban air or from high stacks]: 1.26414e-7 kg; lognormal variance with pedigree 0.658325, pedigree (1,2,2,2,3)
  adapted from "swath, by rotary windrower, CA-QC" to match the diesel consumption
- Cadmium II [air, non-urban air or from high stacks]: 4.2138e-8 kg; lognormal variance with pedigree 0.658325, pedigree (1,2,2,2,3)
  adapted from "swath, by rotary windrower, CA-QC" to match the diesel consumption
- Carbon dioxide, fossil [air, non-urban air or from high stacks]: 13.1144 kg; lognormal variance with pedigree 0.018325, pedigree (1,2,2,2,3)
  adapted from "swath, by rotary windrower, CA-QC" to match the diesel consumption
- Carbon monoxide, fossil [air, non-urban air or from high stacks]: 0.0229322 kg; lognormal variance with pedigree 0.652225, pedigree (1,4,2,2,1)
  adapted from "swath, by rotary windrower, CA-QC" to match the diesel consumption
- Chromium III [air, non-urban air or from high stacks]: 2.1069e-7 kg; lognormal variance with pedigree 0.658325, pedigree (1,2,2,2,3)
  adapted from "swath, by rotary windrower, CA-QC" to match the diesel consumption
- Copper ion [air, non-urban air or from high stacks]: 7.16633e-6 kg; lognormal variance with pedigree 0.658325, pedigree (1,2,2,2,3)
  adapted from "swath, by rotary windrower, CA-QC" to match the diesel consumption
- Dinitrogen monoxide [air, non-urban air or from high stacks]: 0.000505943 kg; lognormal variance with pedigree 0.058325, pedigree (1,2,2,2,3)
  adapted from "swath, by rotary windrower, CA-QC" to match the diesel consumption
- Methane, fossil [air, non-urban air or from high stacks]: 0.000543208 kg; lognormal variance with pedigree 0.058325, pedigree (1,2,2,2,3)
  adapted from "swath, by rotary windrower, CA-QC" to match the diesel consumption
- NMVOC, non-methane volatile organic compounds [air, non-urban air or from high stacks]: 0.0151926 kg; lognormal variance with pedigree 0.042225, pedigree (1,4,2,2,1)
  adapted from "swath, by rotary windrower, CA-QC" to match the diesel consumption
- Nickel II [air, non-urban air or from high stacks]: 2.95253e-7 kg; lognormal variance with pedigree 0.658325, pedigree (1,2,2,2,3)
  adapted from "swath, by rotary windrower, CA-QC" to match the diesel consumption
- Nitrogen oxides [air, non-urban air or from high stacks]: 0.190624 kg; lognormal variance with pedigree 0.042225, pedigree (1,4,2,2,1)
  adapted from "swath, by rotary windrower, CA-QC" to match the diesel consumption
- PAH, polycyclic aromatic hydrocarbons [air, non-urban air or from high stacks]: 1.38597e-5 kg; lognormal variance with pedigree 0.318325, pedigree (1,2,2,2,3)
  adapted from "swath, by rotary windrower, CA-QC" to match the diesel consumption
- Particulate Matter, < 2.5 um [air, non-urban air or from high stacks]: 0.0142467 kg; lognormal variance with pedigree 0.318325, pedigree (1,2,2,2,3)
  adapted from "swath, by rotary windrower, CA-QC" to match the diesel consumption
- Selenium IV [air, non-urban air or from high stacks]: 4.2138e-8 kg; lognormal variance with pedigree 0.058325, pedigree (1,2,2,2,3)
  adapted from "swath, by rotary windrower, CA-QC" to match the diesel consumption
- Sulfur dioxide [air, non-urban air or from high stacks]: 0.00424247 kg; lognormal variance with pedigree 0.018325, pedigree (1,2,2,2,3)
  adapted from "swath, by rotary windrower, CA-QC" to match the diesel consumption
- Zinc II [air, non-urban air or from high stacks]: 4.2138e-6 kg; lognormal variance with pedigree 0.658325, pedigree (1,2,2,2,3)
  adapted from "swath, by rotary windrower, CA-QC" to match the diesel consumption
- Cadmium II [soil, agricultural]: 2.36e-7 kg; lognormal variance with pedigree 0.0442, pedigree (1,4,2,5,1)
  proxy from "swath, by rotary windrower, CA-QC"
- Lead II [soil, agricultural]: 1.04e-6 kg; lognormal variance with pedigree 0.0442, pedigree (1,4,2,5,1)
  proxy from "swath, by rotary windrower, CA-QC"
- Zinc II [soil, agricultural]: 0.000622 kg; lognormal variance with pedigree 0.0442, pedigree (1,4,2,5,1)
  proxy from "swath, by rotary windrower, CA-QC"

## Extrapolations
The dataset is modeled for agricultural production system in US. Data Quality indicators are adjusted accordingly.
