# fish curing plant construction and maintenance

Dataset: EcoSpold 2, unit process
Geography: RoW
Time period: 2011-01-01 to 2023-12-31
Technology level: current
Classification: ISIC rev.4 ecoinvent: 4290:Construction of other civil engineering projects
Scenario: Business-as-Usual
System model: Allocation, cut-off by classification
Generated by: Angel Avadí
Published in: Avadí, A. 2018
Database: ecoinvent
isCopyrightProtected: true
accessRestrictedTo: 1

## General comment
The activity represents the construction and maintenance along its lifetime of a fish curing (salting + curing under controlled temperature) plant, expressed as the installed capacity required to process 1000 kg of raw material. The life cycle inventories were produced based on a sample of 1 Peruvian plant (processing capacity: 2 700 t/y) and data from other industry representatives. This dataset may be adapted to other global production sites.
System boundaries of fish processing plants and relations between activities

## Included activities start
From construction of the plant, through maintenance.

## Included activities end
End of life treatment of the plant

## Geography
Based on Peruvian data

## Technology
Construction and maintenance activities of Peruvian fish curing plants, per t of processing capacity. Plants have a lifespan of 30 years.
Process diagram of small fish curing

## Time period
Production figures represent the period 2012. Valid as of 2017.

## Parameters
- copper wire use: 0.31 kg; name copper_wire_use; triangular min 0.14, mostLikely 0.31, max 1.49, pedigree (3,3,1,1,1)
  Copper wire for construction/maintenance consumed per t of processed raw material
  Uncertainty: Data from 1 plant, assumptions for larger plants

## Reference product
- fish curing plant: 1 unit; name plant; source Angel Avadí 2014; By-product classification allocatable product; CPC 8812: Fish processing services
  One unit of plant represents the installed capacity required to process 1 t of raw material, including annual maintenance of the infrastructure, over the plant's lifetime.
  production volume 3.8e6 unit; name prod_vol; = 1900000*3
    It is assumed that 3 new plants are built per year, with processing capacity of at least 1900 t raw material/year
  property capacity [kg] 1909 kg; name plant_capacity_kg
  property lifetime 30 year; name plant_lifetime
  property price 1028.91 EUR2005
    Calculated based on inputs: The price of the product has been calculated as a sum of the values of the material and energy inputs for this product. This value is therefore a rough estimation. It may underestimate the real price since there are additional expenses when producing any product. These expences can include for example labour costs, treatment of waste materials and profit for the producer. Please consider carefully whether this level of data quality is acceptable for your application.
  properties: carbon allocation 0 kg, carbon content 0

## Inputs from technosphere
- air compressor, screw-type compressor, 300kW: 0.000524 unit; source Angel Avadí 2014; triangular min 0.000114284, mostLikely 0.000248485, max 0.00120923, pedigree (3,3,4,5,1)
  Air compression system 300 kW
  Uncertainty: Data from 1 plant, assumptions for larger plants
- air compressor, screw-type compressor, 4kW: 0.00262 unit; source Angel Avadí 2014; triangular min 0.000571894, mostLikely 0.00123832, max 0.00604979, pedigree (3,3,4,5,1)
  Air compression system 20 kW
  Uncertainty: Data from 1 plant, assumptions for larger plants
- alkyd paint, white, without solvent, in 60% solution state: 0.14042 kg; source Angel Avadí 2014; triangular min 0.0314961, mostLikely 0.0669292, max 0.322835, pedigree (2,3,4,5,1)
  Paint
  Uncertainty: Data from 1 plant, assumptions for larger plants
  properties: carbon content, fossil 0.140367, carbon content, non-fossil 0.199629, dry mass 1 kg, heating value, net 10.3 MJ, wet mass 1 kg
  note on carbon content, fossil: C content was calculated as an addition of C content in the raw materials.
- alkyd paint, white, without solvent, in 60% solution state: 0.02958 kg; source Angel Avadí 2014; triangular min 0.00663477, mostLikely 0.0140989, max 0.0680064, pedigree (2,3,4,5,1)
  Paint
  Uncertainty: Data from 1 plant, assumptions for larger plants
- aluminium, primary, ingot: 0.0282168 kg; source Angel Avadí 2014; triangular min 0.00609483, mostLikely 0.0135441, max 0.0650115, pedigree (3,3,4,5,1)
  Evaporators
  Uncertainty: Data from 1 plant, assumptions for larger plants
  properties: dry mass 1 kg, wet mass 1 kg
- aluminium, primary, ingot: 0.0163842 kg; source Angel Avadí 2014; triangular min 0.00353898, mostLikely 0.0078644, max 0.0377491, pedigree (3,3,4,5,1)
  Evaporators
  Uncertainty: Data from 1 plant, assumptions for larger plants
- aluminium, primary, ingot: 0.155399 kg; source Angel Avadí 2014; triangular min 0.0335662, mostLikely 0.0745915, max 0.358039, pedigree (3,3,4,5,1)
  Evaporators
  Uncertainty: Data from 1 plant, assumptions for larger plants
- building, hall, steel construction: 7.33 m2; source Angel Avadí 2014; triangular min 1.60117, mostLikely 3.47235, max 16.9165, pedigree (3,3,4,5,1)
  Plant building
  Uncertainty: Data from 1 plant, assumptions for larger plants
- chlorine, liquid: 0.0550086 kg; source Angel Avadí 2014; triangular min 0.0119584, mostLikely 0.0263085, max 0.126759, pedigree (2,3,4,5,1)
  Cleaning agents
  Uncertainty: Data from 1 plant, assumptions for larger plants
  properties: dry mass 1 kg, wet mass 1 kg
- chlorine, liquid: 0.274991 kg; source Angel Avadí 2014; triangular min 0.0597807, mostLikely 0.131518, max 0.633676, pedigree (2,3,4,5,1)
  Cleaning agents
  Uncertainty: Data from 1 plant, assumptions for larger plants
- concrete, normal strength: 0.000130073 m3; source Angel Avadí 2014; triangular min 3.34473e-5, mostLikely 5.57456e-5, max 0.000301026, pedigree (3,3,4,5,1)
  Weights
  Uncertainty: Data from 1 plant, assumptions for larger plants
  properties: dry mass 2190 kg, water content 0.086758, wet mass 2380 kg
- concrete, normal strength: 0.000205592 m3; source Angel Avadí 2014; triangular min 5.28665e-5, mostLikely 8.81109e-5, max 0.000475799, pedigree (3,3,4,5,1)
  Weights
  Uncertainty: Data from 1 plant, assumptions for larger plants
- concrete, normal strength: 8.46053e-5 m3; source Angel Avadí 2014; triangular min 2.17556e-5, mostLikely 3.62594e-5, max 0.000195801, pedigree (3,3,4,5,1)
  Weights
  Uncertainty: Data from 1 plant, assumptions for larger plants
- concrete, normal strength: 0.000112975 m3; source Angel Avadí 2014; triangular min 2.90508e-5, mostLikely 4.8418e-5, max 0.000261457, pedigree (3,3,4,5,1)
  Weights
  Uncertainty: Data from 1 plant, assumptions for larger plants
- concrete, normal strength: 0.00250835 m3; source Angel Avadí 2014; triangular min 0.000645005, mostLikely 0.00107501, max 0.00580505, pedigree (3,3,4,5,1)
  Weights
  Uncertainty: Data from 1 plant, assumptions for larger plants
- concrete, normal strength: 0.00105303 m3; source Angel Avadí 2014; triangular min 0.00027078, mostLikely 0.0004513, max 0.00243702, pedigree (3,3,4,5,1)
  Weights
  Uncertainty: Data from 1 plant, assumptions for larger plants
- concrete, normal strength: 0.00124832 m3; source Angel Avadí 2014; triangular min 0.000320996, mostLikely 0.000534993, max 0.00288896, pedigree (3,3,4,5,1)
  Weights
  Uncertainty: Data from 1 plant, assumptions for larger plants
- concrete, normal strength: 0.044657 m3; source Angel Avadí 2014; triangular min 0.0114832, mostLikely 0.0191387, max 0.103349, pedigree (3,3,4,5,1)
  Weights
  Uncertainty: Data from 1 plant, assumptions for larger plants
- copper scrap, sorted, pressed: -0.31 kg; name copper_s; = copper_wire_use; source Angel Avadí 2014
  Waste copper wire at end of life
  production volume; = ABS(prod_vol*copper_s/plant)
    Calculated from production volume of reference product using the relative outputs.
  properties: dry mass 1 kg, price 2.84 EUR2005, wet mass 1 kg
- copper, cathode: 0.31 kg; = copper_wire_use; source Angel Avadí 2014
  Copper wire for construction/maintenance consumed per t of processed raw material. Lifespan of plant: 30 years.
  properties: dry mass 1 kg, wet mass 1 kg
- gas boiler: 0.000524 unit; source Angel Avadí 2014; triangular min 0.000114284, mostLikely 0.000248485, max 0.00120923, pedigree (3,3,4,5,1)
  Industrial heat system 60 KW
  Uncertainty: Data from 1 plant, assumptions for larger plants
- generator, 200kW electrical: 0.000262 unit; source Angel Avadí 2014; triangular min 5.71894e-5, mostLikely 0.000123832, max 0.000604979, pedigree (3,3,4,5,1)
  Electric generator 100 kW
  Uncertainty: Data from 1 plant, assumptions for larger plants
- iron scrap, unsorted: -2.36 kg; name iron_s; = evaporators_steel; source Angel Avadí 2014
  Waste steel and iron at end of life
  production volume; = ABS(prod_vol*iron_s/plant)
    Calculated from production volume of reference product using the relative outputs.
  properties: carbon content, fossil 0.005, dry mass 1 kg, price 0.149 EUR2005, wet mass 1 kg
- lubricating oil: 0.06786 kg; source Angel Avadí 2014; triangular min 0.0148358, mostLikely 0.0321442, max 0.1566, pedigree (2,3,4,5,1)
  Lubricating oil for machinery
  Uncertainty: Data from 1 plant, assumptions for larger plants
  properties: carbon content, fossil 0.75, dry mass 1 kg, heating value, net 40.2 MJ, wet mass 1 kg
  note on carbon content, fossil: Lubricating oil is produced from diesel. C-content/dry mass of fats and oils considered 75%, from: ecoinvent v2.2 report, n 15a, pg 40
  note on heating value, net: Literature value, Source: IPCC 2006, 2006 IPCC Guidelines for National Greenhouse Gas Inventories, Prepared by the National Greenhouse Gas Inventories Programme, Eggleston H.S., Buendia L., Miwa K., Ngara T. and Tanabe K. (eds). Published: IGES, Japan
- lubricating oil: 0.32214 kg; source Angel Avadí 2014; triangular min 0.0704274, mostLikely 0.152593, max 0.7434, pedigree (2,3,4,5,1)
  (same comment as for lubricating oil)
- metal working, average for chromium steel product manufacturing: 9.69 kg; = racks+evaporators_steel; source Angel Avadí 2014
  Construction of racks, equipment, pipes, evaporators
- methyl ethyl ketone: 0.00821908 kg; source Angel Avadí 2014; triangular min 0.00154108, mostLikely 0.00462323, max 0.0184929, pedigree (2,3,4,5,1)
  Butanone, used as a solvent
  Uncertainty: Data from 1 plant, assumptions for larger plants
  properties: carbon content, fossil 0.666667, dry mass 1 kg, heating value, net 33.63 MJ, wet mass 1 kg
- methyl ethyl ketone: 0.0217809 kg; source Angel Avadí 2014; triangular min 0.00408392, mostLikely 0.0122518, max 0.0490071, pedigree (2,3,4,5,1)
  Butanone, used as a solvent
  Uncertainty: Data from 1 plant, assumptions for larger plants
- scrap steel: -4.95758, -2.36942, -0.00300198 kg (3 suppliers, which the file names only by identifier); sum of these -7.33 kg; = racks; source Angel Avadí 2014
  Representing waste chromium steel
  production volume; = ABS(prod_vol*chromium_s/plant)
    Calculated from production volume of reference product using the relative outputs.
  properties: dry mass 1 kg, wet mass 1 kg
- sheet rolling, aluminium: 0.2 kg; = evaporators_Al; source Angel Avadí 2014
  Evaporators
- soap: 7.2 kg; source Angel Avadí 2014; triangular min 1.57263, mostLikely 3.41053, max 16.6168, pedigree (2,3,4,5,1)
  Cleaning agents
  Uncertainty: Data from 1 plant, assumptions for larger plants
  properties: carbon content, non-fossil 0.692237, dry mass 0.87 kg, heating value, net 17.93 MJ, water content 0.149425, wet mass 1 kg
- sodium hydroxide, without water, in 50% solution state: 0.349619 kg; source Angel Avadí 2014; triangular min 0.0758159, mostLikely 0.164617, max 0.808423, pedigree (2,3,4,5,1)
  Proxy for caustic soda
  Uncertainty: Data from 1 plant, assumptions for larger plants
  properties: dry mass 1 kg, heating value, net 3.03 MJ, wet mass 1 kg
- sodium hydroxide, without water, in 50% solution state: 3.58038 kg; source Angel Avadí 2014; triangular min 0.776417, mostLikely 1.68581, max 8.27892, pedigree (2,3,4,5,1)
  Proxy for caustic soda
  Uncertainty: Data from 1 plant, assumptions for larger plants
- spent solvent mixture: -0.000196179, -0.00837355, -0.0214303 kg (3 suppliers, which the file names only by identifier); sum of these -0.03 kg; = solvent; source Avadí, A. 2018
  Spent solvent
  production volume; = prod_vol * (BP_amount_3 / plant)
    Calculated from production volume of reference product using the relative outputs.
  properties: carbon content, fossil 0.666667, dry mass 0.835 kg, heating value, net 21.7 MJ, water content 0.197605, wet mass 1 kg
  note on carbon content, fossil: Tab A.7, ecoinvent v2.2 report 13_I. C content has been calculated after data in the tables, and then referred to 1 kg DM
  note on heating value, net: Value taken from the general comment of the treatment dataset.
- steel, chromium steel 18/8: 7.33 kg; name racks; source Angel Avadí 2014; triangular min 1.60151, mostLikely 3.4731, max 16.9154, pedigree (3,3,4,5,1)
  Racks and other equipment
  Uncertainty: Data from 1 plant, assumptions for larger plants
  properties: carbon content, fossil 0.0008, dry mass 1 kg, wet mass 1 kg
  note on carbon content, fossil: Stainless steel model is the grade 304 steel (18/8 stainless, 18% chromium 8% nickel; max. 0.08% C)
- steel, low-alloyed: 2.36 kg; name evaporators_steel; source Angel Avadí 2014; triangular min 0.516892, mostLikely 1.11914, max 5.44397, pedigree (3,3,4,5,1)
  Pipes and evaporators
  Uncertainty: Data from 1 plant, assumptions for larger plants
  properties: carbon content, fossil 0.005, dry mass 1 kg, wet mass 1 kg
- tap water: 12.3571 kg; source Avadí, A. 2018; triangular min 11.1217, mostLikely 12.3565, max 13.593, pedigree (3,3,5,3,3)
  Water for maintenance/cleansing
  Uncertainty: It is assumed that 60% of total water consumption is used during processing, and 40% for maintenance/cleaning (http://www.dfo-mpo.gc.ca/Library/273700.pdf)
  properties: carbon content, fossil 0.00178991, dry mass 0.000337476 kg, water content 2962.17, wet mass 1 kg
  note on carbon content, fossil: Bicarbonate content is 2.93 mol/m3. CO2 content is 0.1 mol/m3 (ecoinvent v2.2 report 8, Tab 93.1).
- tap water: 23.0577 kg; source Avadí, A. 2018; triangular min 20.7526, mostLikely 23.0565, max 25.3639, pedigree (3,3,5,3,3)
  (same comment as for tap water)
- tap water: 62.1157 kg; source Avadí, A. 2018; triangular min 55.906, mostLikely 62.1126, max 68.3285, pedigree (3,3,5,3,3)
  (same comment as for tap water)
- tap water: 7.47706 kg; source Avadí, A. 2018; triangular min 6.72958, mostLikely 7.47669, max 8.22492, pedigree (3,3,5,3,3)
  (same comment as for tap water)
- tap water: 311.597 kg; source Avadí, A. 2018; triangular min 280.446, mostLikely 311.581, max 342.762, pedigree (3,3,5,3,3)
  (same comment as for tap water)
- tap water: 3565.76 kg; source Avadí, A. 2018; triangular min 3209.29, mostLikely 3565.58, max 3922.4, pedigree (3,3,5,3,3)
  (same comment as for tap water)
- tap water: 2662.64 kg; source Avadí, A. 2018; triangular min 2396.45, mostLikely 2662.5, max 2928.96, pedigree (3,3,5,3,3)
  (same comment as for tap water)
- waste aluminium: -0.00742232, -0.192578 kg (2 suppliers, which the file names only by identifier); sum of these -0.2 kg; = evaporators_Al; source Angel Avadí 2014
  Waste aluminium at end of life
  production volume; = ABS(prod_vol*alu_s/plant)
    Calculated from production volume of reference product using the relative outputs.
  properties: dry mass 1 kg, wet mass 1 kg
- waste concrete: -8.54094, -116.429, -0.0301974 kg (3 suppliers, which the file names only by identifier); sum of these -125 kg; = concrete*2500; source Angel Avadí 2014
  Waste concrete at end of life
  production volume; = ABS(prod_vol*concrete_s/plant)
    Calculated from production volume of reference product using the relative outputs.
  properties: dry mass 0.920168 kg, water content 0.086758, wet mass 1 kg
- waste mineral oil: -0.00265017, -0.280298, -0.107052 kg (3 suppliers, which the file names only by identifier); sum of these -0.39 kg; = oil; source Avadí, A. 2018
  Waste lubricating oil
  production volume; = ABS(prod_vol*oil_s/plant)
    Calculated from production volume of reference product using the relative outputs.
  properties: carbon content, fossil 0.75, dry mass 1 kg, heating value, net 34.7 MJ, wet mass 1 kg
  note on carbon content, fossil: Tab A.6, ecoinvent v2.2 report 13_I. C content has been calculated after data in the tables, and then referred to 1 kg DM
- waste paint on wall: -0.17 kg; name BP_amount_2; = paint; source Avadí, A. 2018
  Waste paint
  production volume; = prod_vol * (BP_amount_2 / plant)
    Calculated from production volume of reference product using the relative outputs.
  properties: carbon content, fossil 0.140367, carbon content, non-fossil 0.199629, dry mass 1 kg, heating value, net 19.7 MJ, wet mass 1 kg
- wastewater from vegetable oil refinery: -6.65646 m3; name BP_amount_1; = (water+soap+soda+chlorine)/1000; source Avadí, A. 2018
  Proxy for wastewater from fish processing plant.
  production volume; = prod_vol * (BP_amount_1 / plant)
    Calculated from production volume of reference product using the relative outputs.
  properties: carbon content, fossil 0.00178991, carbon content, non-fossil 0.8, dry mass 0.871801 kg, water content 1146.05, wet mass 1000 kg
  note on carbon content, fossil: Estimated load for fish processing plant cleansing wastewater. The loading of fish processing wastewater is mainly organic (http://www.dfo-mpo.gc.ca/Library/273700.pdf)
- wire drawing, copper: 0.31 kg; = copper_wire_use; source Angel Avadí 2014
  (same comment as for copper, cathode)

## Sampling procedure
Data from one plant were extrapolated on the basis of built area and processing capacity to represent any plant of the same type, regardless of size.

## Extrapolations
Extrapolation to GLO based on the fact that the current technology is rather common in the world.
