# maintenance, transmission network, electricity, high voltage direct current aerial line

Dataset: EcoSpold 2, unit process
Geography: RoW
Time period: 1998-01-01 to 2023-12-31
Technology level: current
Classification: ISIC rev.4 ecoinvent: 4220:Construction of utility projects
Classification: EcoSpold01Categories: electricity/distribution
Scenario: Business-as-Usual
System model: Allocation, cut-off by classification
Generated by: Heidi Hottenroth
Published in: Jorge, R. 2012
Database: ecoinvent
isCopyrightProtected: true
accessRestrictedTo: 1

## General comment
This dataset represents the maintenance of 1 km and year of an high voltage direct current arieal line (FeAl conductor at 250/350 kV).
Literature data given for the entire lifetime per km was divided by lifetime (40 a) to get yearly values.
Source: Jorge, R., Hawkins, T.R., Hertwich, E..G (2012): Life cycle assessment of electricity transmission and distribution - part 1: power lines and cables. Int J Life Cycle Assess 17: 9-15. supplementary matierial p.12, table S10.

## Included activities start
Manufacture and replacement of parts

## Included activities end
Decommissioning and disposal of parts

## Geography
The scope of the underlying literature source is Europe. Uncertainty was adjusted accordingly.

## Technology
Maintenance is comprised of the replacement of parts

## Time period
refers to publication date of literature sources

## Reference product
- maintenance, transmission network, electricity, high voltage direct current aerial line: 1 km*year; name RP; By-product classification allocatable product; CPC 54242: General construction services of long-distance communication and power lines (cables)
  production volume 94895 km*year; name PV_RP
    calculated according to https://en.wikipedia.org/wiki/List_of_HVDC_projects retrieved on 09.10.2020
    Cumulated global length of aerial lines in the years 1992-2012
  properties: carbon allocation 0 kg, carbon content 0, price 4 EUR2005

## Inputs from technosphere
- cement, unspecified: 0.00147559, 3.81261e-5, 0.00089923, 0.00560394, 0.000175901, 0.000128576, 6.96845e-5, 0.000138498, 0.000211739, 0.0562587 kg (10 suppliers, which the file names only by identifier); sum of these 0.065 kg; = 2,6/40; lognormal variance with pedigree 0.0212, pedigree (4,4,4,5,2)
  Calculated value. Literature value from S9 in Jorge et al. (2012) devided by lifetime of 40 a. For insulator
  properties: dry mass 1 kg, wet mass 1 kg
- diesel, burned in agricultural machinery: 935 MJ; = 100*10*37,4/40; lognormal variance with pedigree 0.0212, pedigree (4,4,4,5,2)
  Calculated value. For tractor use of 100 h with 10 l/h. Literature value from S10 in Jorge et al. (2012) devided by lifetime. Heating value: 37,4 MJ/l
- glass tube, borosilicate: 1.375 kg; name glass; = 55/40; lognormal variance with pedigree 0.0212, pedigree (4,4,4,5,2)
  Calculated value.Literature value from S9 in Jorge et al. (2012) devided by lifetime of 40 a. For insulator
  properties: dry mass 1 kg, wet mass 1 kg
- inert waste, for final disposal: -0.065 kg; name BP_cement; = cement; lognormal variance with pedigree 0.0132, pedigree (4,4,1,5,2)
  Waste generated by this activity. Based on the amount of the corresponding material inputs.
  production volume; = abs(BP_cement/RP)*PV_RP
    Calculated from production volume of reference product using the relative outputs.
  properties: dry mass 1 kg, wet mass 1 kg
- iron scrap, unsorted: -0.6 kg; name BP_steel; = steel; lognormal variance with pedigree 0.0132, pedigree (4,4,1,5,2)
  Waste generated by this activity. Based on the amount of the corresponding material inputs. Recycling is assumed by the original source.
  production volume; = abs(BP_steel/RP)*PV_RP
    Calculated from production volume of reference product using the relative outputs.
  properties: dry mass 1 kg, price 0.149 EUR2005, wet mass 1 kg
- lubricating oil: 0.875 kg; name oil; = 35/40; lognormal variance with pedigree 0.0212, pedigree (4,4,4,5,2)
  Calculated value. Literature value from S9 in Jorge et al. (2012) devided by lifetime of 40 a. For earth conductor and conductors
  properties: carbon content, fossil 0.75, dry mass 1 kg, wet mass 1 kg
  note on carbon content, fossil: Lubricating oil is produced from diesel. C-content/dry mass of fats and oils considered 75%, from: ecoinvent v2.2 report, n 15a, pg 40
- steel, unalloyed: 0.6 kg; name steel; = 24/40; lognormal variance with pedigree 0.0212, pedigree (4,4,4,5,2)
  (same comment as for cement, unspecified)
  properties: carbon content, fossil 0.0025, dry mass 1 kg, wet mass 1 kg
- transport, passenger car: 150 km; = 6000/40; lognormal variance with pedigree 0.0212, pedigree (4,4,4,5,2)
  Calculated value. 6000 km/km for passenger transports during 40 a.
- waste glass: -0.000454021, -1.37448, -3.90418e-6, -4.18461e-5, -1.74698e-5, -9.49347e-7, -5.92872e-6 kg (7 suppliers, which the file names only by identifier); sum of these -1.375 kg; = glass; lognormal variance with pedigree 0.0132, pedigree (4,4,1,5,2)
  (same comment as for inert waste, for final disposal)
  production volume; = abs(BP_glass/RP)*PV_RP
    Calculated from production volume of reference product using the relative outputs.
  properties: dry mass 1 kg, wet mass 1 kg
- waste mineral oil: -0.875 kg; name BP_oil; = oil; lognormal variance with pedigree 0.0132, pedigree (4,4,1,5,2)
  (same comment as for inert waste, for final disposal)
  production volume; = abs(BP_oil/RP)*PV_RP
    Calculated from production volume of reference product using the relative outputs.
  properties: carbon content, fossil 0.75, dry mass 1 kg, wet mass 1 kg
  note on carbon content, fossil: Tab A.6, ecoinvent v2.2 report 13_I. C content has been calculated after data in the tables, and then referred to 1 kg DM
- zinc: 5.2 kg; = 208/40; lognormal variance with pedigree 0.0212, pedigree (4,4,4,5,2)
  Calculated value. Literature value from S9 in Jorge et al. (2012) devided by lifetime of 40 a. For masts
  properties: dry mass 1 kg, wet mass 1 kg
- zinc scrap, post-consumer: -5.2 kg; name BP_zinc; = zinc; lognormal variance with pedigree 0.0132, pedigree (4,4,1,5,2)
  (same comment as for iron scrap, unsorted)
  production volume; = abs(BP_zinc/RP)*PV_RP
    Calculated from production volume of reference product using the relative outputs.
  properties: dry mass 1 kg, price 0.55 EUR2005, wet mass 1 kg, zinc content 1

## Extrapolations
The dataset is extrapolated from the respective regional dataset with uncertainty adjusted.
