# tree seedling production, in heated greenhouse

Dataset: EcoSpold 2, unit process
Geography: RoW
Time period: 2002-01-01 to 2023-12-31
Technology level: current
Classification: EcoSpold01Categories: wooden materials/extraction
Classification: ISIC rev.4 ecoinvent: 0130:Plant propagation
Scenario: Business-as-Usual
System model: Allocation, cut-off by classification
Generated by: [System]
Database: ecoinvent
isCopyrightProtected: true
accessRestrictedTo: 1

## General comment
The dataset refers to the production of 1000 tree seedling The dataset contains the production of tree seedlings in a tree nursery for plantation in forests. The seedlings are produced in a heated greenhouse and packed for transport.
The seedlings go with a packaging of 1.05 kg of growing dras (HDPE), 3.65 kg of plant boxes from cardboard and 0.0525 kg of strech wrap (LLDPE), to be recycled or disposed of after planting

## Included activities start
The activity starts with the establishment of the greenhouse with HDPE film and considers soil improvement, fertilization, transport of inputs and transport packaging materials.The dataset also contains the disposal of the transport packaging (after plantation of the seedling).

## Included activities end
The activity ends with the seedlings packed for transportation. The dataset does not contain data on water use, frame infrastructure of the greenhouse and on the use of fungicides, insecticides etc. as source does not provide this information.

## Reference product
- tree seedling, for planting: 1 unit; source Alexandrido, S. 2000; By-product classification allocatable product; CPC 01961: Live plants; bulbs, tubers and roots; cuttings and slips; mushroom spawn; HS2017 060290: Plants, live; n.e.c. in heading no. 0602
  production volume 1.31599e14 unit; = 1000000000000/557938*73982138
    extrapolated from original dataset via ratio of GDP of Sweden and GLO
  property price 0.0627493 EUR2005
    Calculated based on inputs: The price of the product has been calculated as a sum of the values of the material and energy inputs for this product. This value is therefore a rough estimation. It may underestimate the real price since there are additional expenses when producing any product. These expences can include for example labour costs, treatment of waste materials and profit for the producer. Please consider carefully whether this level of data quality is acceptable for your application.
  properties: carbon allocation 0 kg, carbon content 0

## Inputs from technosphere
- diesel, burned in building machine: 0.0184 MJ; source Alexandrido, S. 2000; lognormal variance with pedigree 0.235, pedigree (5,5,5,5,5)
  properties: heating value, net 1 MJ
- electricity, medium voltage: 0.00233959, 0.0466696, 0.0156808, 0.000716463, 0.000143399, 3.0791e-5, 0.00481936 kWh (7 suppliers, which the file names only by identifier); sum of these 0.0704 kWh; source Alexandrido, S. 2000; lognormal variance with pedigree 0.235, pedigree (5,5,5,5,5)
- extrusion, plastic film: 0.00116 kg; source Alexandrido, S. 2000; lognormal variance with pedigree 0.235, pedigree (5,5,5,5,5)
  for greenhouse film and growing trays
- heat, central or small-scale, other than natural gas: 0.801 MJ; source Alexandrido, S. 2000; lognormal variance with pedigree 0.235, pedigree (5,5,5,5,5)
  Kipelainen et al 2001: Life cycle assessment tool for estimating net CO2 exchange of forest production. Bionenergy 2011, report 237.5 MJ/1000 seedlings
  properties: heating value, net 1 MJ
- inorganic nitrogen fertiliser, as N: 2.19332e-8, 5.14676e-6, 6.10527e-7, 1.49964e-6, 6.3508e-7, 5.85321e-6, 5.49638e-7, 3.85598e-6, 3.94469e-7, 1.43449e-6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 kg (28 suppliers, which the file names only by identifier); sum of these 0.000609 kg; source Alexandrido, S. 2000; lognormal variance with pedigree 0.235, pedigree (5,5,5,5,5)
  assuming and N content of 30%
  properties: dry mass 1 kg, wet mass 1 kg
- packaging film, low density polyethylene: 0.0001655 kg; name m_packaging_film; source Alexandrido, S. 2000; lognormal variance with pedigree 0.235, pedigree (5,5,5,5,5)
  strech wrap and packaging of other inputs
  properties: carbon content, fossil 0.857143, dry mass 1 kg, heating value, net 42.47 MJ, wet mass 1 kg
- packaging, for fertilisers: 0.001218 kg; lognormal variance with pedigree 0.0912, pedigree (4,3,5,5,4)
  Total amount of active substance/s of fertilisers needed for the production of 'tree seedling, for planting' is calculated to be circa 6.09E-04 kg. Fertiliser/s used in this dataset is/are: 'nitrogen fertiliser, as N'. The total amount of active substance/s is doubled in order to account for the packaging of the dilluted product of fertiliser/s that is/are applied. Therefore, 1.22E-03 kg of packaging for fertilisers is justified with this exchange.
  properties: carbon content, fossil 0.825301, dry mass 1 kg, heating value, net 25.01 MJ, price 0.0642 EUR2005, wet mass 1 kg
  note on carbon content, fossil: Considering a chemical formula (C2H4)n for polyethylene, carbon content-fossil is calculated to be 0.856286 kg of Carbon per kg of dry mass.
- polyethylene, high density, granulate: 0.00116 kg; name m_PE; source Alexandrido, S. 2000; lognormal variance with pedigree 0.235, pedigree (5,5,5,5,5)
  for greenhouse film (based on an estimated service life of the greenhouse of 3.5 years) and growing trays
  properties: carbon content, fossil 0.857143, dry mass 1 kg, heating value, net 42.47 MJ, wet mass 1 kg
  note on carbon content, fossil: Polyethylene is formed out of a huge amount of ethylene monomers (C2H4) (ecoinvent v2.2 report 11_II). MW=28 g/mol
- polystyrene, extruded: 4.5e-5 kg; source Alexandrido, S. 2000; lognormal variance with pedigree 0.235, pedigree (5,5,5,5,5)
  for soil improvement
  properties: carbon content, fossil 0.873427, dry mass 1 kg, heating value, net 38.67 MJ, wet mass 1 kg
- waste polyethylene: -8.41735e-8, -2.1461e-7, -8.86416e-8, -1.62306e-8, -0.00132185, -3.58102e-8, -3.21195e-6 kg (7 suppliers, which the file names only by identifier); sum of these -0.0013255 kg; = m_packaging_film+m_PE; source Alexandrido, S. 2000
  disposal of greenhouse film and packaging of other inputs
  production volume; = 1.3255E+09/557938*73982138
    extrapolated from original dataset via ratio of GDP of Sweden and GLO
  properties: carbon content, fossil 0.825301, dry mass 0.996 kg, heating value, net 42.47 MJ, water content 0.00401606, wet mass 1 kg
  note on carbon content, fossil: C content in 1 kg DM was calculated using data in Tab A.1, ecoinvent v2.2 report 13_I
  note on heating value, net: Value taken from the general comment of the treatment dataset.

## Inputs from nature
- Occupation, industrial area [natural resource, land]: 0.00133333 m2*year; = 1/750; lognormal variance with pedigree 0.2426, pedigree (1,1,5,5,2)
  assumed growing density of 750 seedlings/m2, based on Aldentun 2002
- Transformation, from industrial area [natural resource, land]: 0.00133333 m2; = 1/750; lognormal variance with pedigree 0.4, pedigree (1,5,5,5,1)
  assumed growing density of 750 seedlings/m2, based on Aldentun 2002
- Transformation, to industrial area [natural resource, land]: 0.00133333 m2; = 1/750; lognormal variance with pedigree 0.4, pedigree (1,5,5,5,1)
  assumed growing density of 750 seedlings/m2, based on Aldentun 2002

## Sampling procedure
Sample from 4 nurseries in

## Review by Thomas Nemecek 2014-02-02
Users should bear in mind that heat requirements show a wide variability according to the different situations.
