# sodium percarbonate, powder to generic market for bleach

Dataset: EcoSpold 2, unit process
Geography: RER
Time period: 2023-01-01 to 2023-12-31
Technology level: current
Classification: ISIC rev.4 ecoinvent: 2011:Manufacture of basic chemicals
Classification: EcoSpold01Categories: chemicals/inorganics
Scenario: Business-as-Usual
System model: Allocation, cut-off by classification
Generated by: Daria Dellenbach
Database: ecoinvent
isCopyrightProtected: true
accessRestrictedTo: 1

## General comment
This activity links the output of the market for sodium percarbonate to the generic market for bleach.

## Included activities start
Activity starting with the input of sodium percarbonate.

## Included activities end
The activity ends with the production sodium percarbonate for the generic market for bleaches.

## Geography
based on geographical validity of datasets producing sodium percarbonate

## Technology
based on techmology validity of datasets producing sodium percarbonate

## Time period
based on temporal validity of datasets producing sodium percarbonate

## Reference product
- bleach: 1 kg; By-product classification allocatable product; CPC 971: Washing, cleaning and dyeing services; HS2017 282810: Hypochlorites; commercial calcium hypochlorite and other calcium hypochlorites
  production volume 1.29173e7 kg
    Estimated production volume.
  property carbon content, fossil 0.030067
    fossil carbon content on a dry matter basis, arithmetic average based on inputs.
  property price 0.576733 EUR2005
    This price was calculated as an arithmetic average of input prices.
  properties: carbon allocation 0.030067 kg, carbon content 0.030067, carbon content, non-fossil 0, dry mass 1 kg, water content 0, water in wet mass 0 kg, wet mass 1 kg

## Inputs from technosphere
- sodium percarbonate, powder: 1 kg
  properties: carbon content, fossil 0.0902256, dry mass 1 kg, heating value, net 4.63 MJ, wet mass 1 kg
