# flat glass production, uncoated

Dataset: EcoSpold 2, unit process
Geography: RoW
Time period: 1996-01-01 to 2023-12-31
Technology level: current
Classification: ISIC rev.4 ecoinvent: 2310:Manufacture of glass and glass products
Classification: EcoSpold01Categories: glass/construction
Synonyms: plate; Flach; float
Tags: ConvertedDataset
Scenario: Business-as-Usual
System model: Allocation, cut-off by classification
Generated by: Daniel Kellenberger (obsolete)
Published in: Kellenberger D. 2007
Database: ecoinvent
isCopyrightProtected: true
accessRestrictedTo: 1

## General comment
The amount of raw materials is calculated based on the composition of flat glass. The total amount of energy is partitioned in 58% from natural gas, 38% heavy fuel oil and 5% electrical. The amount of tin yearly added to the tin bath is assumed to leave the system by air, as part of the particulates. The same with lead. Both emissions are double counted: as particulate and as emission to air. Most other emissions are a mean value of plants with and plants without abatment. It is assumed that half of water evaporates and other half is treated.
[This dataset was already contained in the ecoinvent database version 2. It was not individually updated during the transfer to ecoinvent version 3. Life Cycle Impact Assessment results may still have changed, as they are affected by changes in the supply chain, i.e. in other datasets. This dataset was generated following the ecoinvent quality guidelines for version 2. It may have been subject to central changes described in the ecoinvent version 3 change report (http://www.ecoinvent.org/database/ecoinvent-version-3/reports-of-changes/), and the results of the central updates were reviewed extensively. The changes added e.g. consistent water flows and other information throughout the database. The documentation of this dataset can be found in the ecoinvent reports of version 2, which are still available via the ecoinvent website. The change report linked above covers all central changes that were made during the conversion process.]

## Included activities end
includes the whole manufacturing process to produce flat glass (raw material provision, cullet addition, melting process, forming process (on float bath), cooling process (annealing lehr), cutting process and storage), internal processes (transport, etc.) and infrastructure. No administration and packing is included.

## Geography
For some exchanges CH- and DE-modules have been used as proxy

## Technology
Basic principle is pouring molten glass onto a bath of molten tin and forming a ribbon with the upper and lower surfaces becoming parallel under the influence of gravity and surface tension. Average technique used in European flat glas production.

## Parameters
- fraction, cooling water, cooling pond system, to air: 0.032 dimensionless; name fraction_CW_CP_to_air; lognormal variance with pedigree 0.0413, pedigree (2,3,1,3,1)
  Calculated based on literature value (Scown, C.D., 2011, Water Footprint of U.S. Transportation Fuels and supplying information of the article) (Vionnet, S., Quantis Water Database - Technical Report, 2012).
- fraction, cooling water, once-through system, to air: 0.004 dimensionless; name fraction_CW_OT_to_air; lognormal variance with pedigree 0.0413, pedigree (2,3,1,3,1)
  (same comment as for fraction, cooling water, cooling pond system, to air)
- fraction, cooling water, recirculating system, to air: 0.771 dimensionless; name fraction_CW_R_to_air; lognormal variance with pedigree 0.0413, pedigree (2,3,1,3,1)
  (same comment as for fraction, cooling water, cooling pond system, to air)
- fraction, cooling water, to air: 0.3875 dimensionless; name fraction_CW_to_air; = (0.5*fraction_CW_OT_to_air)+(0.5*fraction_CW_R_to_air); lognormal variance with pedigree 0.092025, pedigree (4,4,3,2,4)
  Calculated value based on literature value (see comments of the other parametres present in this dataset) and expert opinion. In the case when no industry/literature data are available about the type of cooling or directly fraction, cooling water, to air specific for the process a default assumption is applied. It is assumed that the once-through cooling system is used in 50% of all cases and recirculating system is used in another 50% of all cases.

## Reference product
- flat glass, uncoated: 1 kg; By-product classification allocatable product; CPC 37114: Glass in sheets, bent, edge-worked, engraved, drilled, enamelled or otherwise worked, but not framed, etc.; HS2017 7005: Glass; float glass and surface ground or polished glass, in sheets, whether or not having an absorbent, refle[...]
  EcoSpold01Location=RER
  production volume 3.4828e10 kg
    Source: http://www.fryconsultants.com/GLOBAL_FLAT_GLASS_MARKET_OVERVIEW.ppt
  property carbon content, fossil 0
    Tab 5.1, ecoinvent v2.2 report 7, part XI, for Flat glass composition.
  property carbon content, non-fossil 0
    Tab 5.1, ecoinvent v2.2 report 7, part XI, for Flat glass composition.
  property price 3.16 EUR2005
    Upscale from EU by exchange rate. Afterwards apply the PPP (Purchasing power parity) factor of 0.83.
  properties: carbon allocation 0 kg, carbon content 0, dry mass 1 kg, water content 0, water in wet mass 0 kg, wet mass 1 kg

## Inputs from technosphere
- electricity, medium voltage: 0.00368884, 0.0735841, 0.024724, 0.00112965, 0.000226098, 4.85484e-5, 0.0075987 kWh (7 suppliers, which the file names only by identifier); sum of these 0.111 kWh; lognormal variance with pedigree 0.1726, pedigree (3,5,5,5,5)
  EcoSpold01Location=UCTE
  Uncertainty: ;
- flat glass factory: 2.41e-10 unit; lognormal variance with pedigree 0.378, pedigree (4,5,5,5,1)
  EcoSpold01Location=RER
  Uncertainty: ;
- heavy fuel oil: 0.000942152, 0.000548627, 0.00278912, 0.0651998, 0.000703808, 0.00361652 kg (6 suppliers, which the file names only by identifier); sum of these 0.0738 kg; lognormal variance with pedigree 0.1726, pedigree (3,5,5,5,5)
  EcoSpold01Location=RER
  Uncertainty: ;
  properties: carbon content, fossil 0.849, dry mass 1 kg, heating value, net 41.2 MJ, wet mass 1 kg
- hydrogen, gaseous, medium pressure, merchant: 2.21143e-6, 1.38857e-6 kg (2 suppliers, which the file names only by identifier); sum of these 3.6e-6 kg; lognormal variance with pedigree 0.782, pedigree (3,5,5,5,5)
  EcoSpold01Location=RER
  Uncertainty: ;
  properties: dry mass 1 kg, heating value, net 120.21 MJ, wet mass 1 kg
- lime, packed: 0.4 kg; lognormal variance with pedigree 0.1, pedigree (1,5,5,5,1)
  EcoSpold01Location=CH
  Uncertainty: ;
  properties: carbon content, fossil 0.117492, dry mass 0.998 kg, water content 0.00200401, wet mass 1 kg
  note on carbon content, fossil: Table 3.1, ecoinvent v2.2 report 7, part VII, pg 3. MW CaCO3=100, MW MgCO3=84
- municipal solid waste: -1.93411e-6, -2.29667e-7, -1.42939e-6, -0.00109122, -1.60712e-7, -5.15857e-8, -1.16598e-7, -4.854e-6 kg (8 suppliers, which the file names only by identifier); sum of these -0.0011 kg; lognormal variance with pedigree 0.0206, pedigree (1,3,1,5,3)
  EcoSpold01Location=CH
  Uncertainty: ;
  production volume
    Calculated from the production volume of flat glass, uncoated in proportion to the respective output amounts.
  properties: carbon content, fossil 0.171549, carbon content, non-fossil 0.261655, dry mass 0.771 kg, heating value, net 11.74 MJ, water content 0.297017, wet mass 1 kg
  note on carbon content, fossil: MSW composition in tab 4.1, ecoinvent v2.2 report 13_I. C content referred to 1 kg DM
  note on heating value, net: Value taken from the general comment of the treatment dataset.
- natural gas, high pressure: 0.00090283, 0.00152296, 0.00332205, 0.00111175, 0.000259811, 0.00154634, 0.00148383, 0.00390178, 0.00150635, 0.00232989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 m3 (37 suppliers, which the file names only by identifier); sum of these 0.116923 m3; lognormal variance with pedigree 0.1726, pedigree (3,5,5,5,5)
  EcoSpold01Location=RER
  Uncertainty: ;
  properties: carbon content, fossil 0.602381, dry mass 0.84 kg, heating value, gross 40 MJ, heating value, net 36 MJ, wet mass 0.84 kg
  note on carbon content, fossil: An average C content of 0.506 kg C/ m3 has been assumed (this average has been calculated using data in Tab 3.5, ecoinvent v2.2 report 6_V
  note on heating value, net: Literature value, Source: Christoph Meili;Niels Jungbluth;Maresa Bussa (2021) Life cycle inventories of crude oil and natural gas extraction. ESU-services Ltd. commissioned by BAFU & VSG, Schaffhausen, Switzerland, http://esu-services.ch/data/public-lci-reports/
- nitrogen, liquid: 0.00495 kg; lognormal variance with pedigree 0.692, pedigree (1,1,5,5,1)
  EcoSpold01Location=RER
  Estimation of standard deviation
  properties: dry mass 1 kg, wet mass 1 kg
- refractory, fireclay, packed: 0.00107 kg; lognormal variance with pedigree 1.372, pedigree (1,1,5,5,1)
  EcoSpold01Location=DE
  Estimation of standard deviation
  properties: dry mass 1 kg, wet mass 1 kg
- silica sand: 0.578 kg; lognormal variance with pedigree 0.1, pedigree (1,5,5,5,1)
  EcoSpold01Location=DE
  Uncertainty: ;
  properties: dry mass 0.99 kg, water content 0.010101, wet mass 1 kg
- soda ash, light: 0.229 kg; lognormal variance with pedigree 0.1, pedigree (1,5,5,5,1)
  EcoSpold01Location=RER
  Uncertainty: ;
  properties: carbon content, fossil 0.0517241, dry mass 1 kg, heating value, net 3.43 MJ, wet mass 1 kg
- steel, unalloyed: 1.37e-5 kg; lognormal variance with pedigree 0.056, pedigree (3,4,5,5,1)
  EcoSpold01Location=RER
  Uncertainty: ;
  properties: carbon content, fossil 0.0025, dry mass 1 kg, wet mass 1 kg
  note on carbon content, fossil: Unalloyed steels or carbon steels are those in which the level of an individual element in no case reaches or exceeds the limiting concentration given in Tab. 3.1 ecoinvent v2.2 report 10_partII. Assumed to have a C content of 0.25%
- tin: 9.16e-6 kg; lognormal variance with pedigree 1.582, pedigree (1,1,5,5,1)
  Estimation of standard deviation
  EcoSpold01Location=RER
  properties: dry mass 1 kg, wet mass 1 kg
- wastewater, average: -0.000348758, -1.24171e-6 m3 (2 suppliers, which the file names only by identifier); sum of these -0.00035 m3; lognormal variance with pedigree 0.652, pedigree (1,1,1,5,1)
  EcoSpold01Location=CH
  Calculation of standard deviation based on min. and max. values
  production volume
    (same comment as for municipal solid waste)
  properties: carbon content, non-fossil 0.194039, dry mass 0.346837 kg, mass concentration, TOC 0.1091 kg/m3, mass concentration, calcium 0.039453 kg/m3, mass concentration, chlorine 0.030031 kg/m3, mass concentration, hydrogen 0.013365 kg/m3, mass concentration, nitrogen 0.031015 kg/m3, mass concentration, oxygen 0.069824 kg/m3, mass concentration, sodium 0.06456 kg/m3, mass concentration, sulfur 0.015602 kg/m3, water content 2882.2, wet mass 1000 kg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
  note on carbon content, non-fossil: 0.0673 kg TOC/m3 (Tab A.17, ecoinvent v2.2 report 13_I). TOC was considered as Total Carbon.

## Inputs from nature
- Water, cooling, unspecified natural origin [natural resource, in water]: 0.0007 m3; name water_cooling_UNO_input; source Frischknecht R. 1996; lognormal variance with pedigree 0.2706, pedigree (2,5,5,5,5)
  Literature value.
  Uncertainty: ;

## Emissions to nature
- Carbon dioxide, fossil [air, unspecified]: 0.693 kg; lognormal variance with pedigree 0.1786, pedigree (4,5,5,5,5)
  Uncertainty: ;
- Carbon monoxide, fossil [air, unspecified]: 5e-5 kg; lognormal variance with pedigree 0.692, pedigree (1,1,5,5,1)
  Calculation of standard deviation based on min. and max. values
- Hydrochloric acid [air, unspecified]: 9.25e-5 kg; lognormal variance with pedigree 0.232, pedigree (1,1,5,5,1)
  Calculation of standard deviation based on min. and max. values
- Hydrogen fluoride [air, unspecified]: 2.1e-5 kg; lognormal variance with pedigree 0.402, pedigree (1,1,5,5,1)
  Calculation of standard deviation based on min. and max. values
- NMVOC, non-methane volatile organic compounds [air, unspecified]: 5e-5 kg; lognormal variance with pedigree 0.162, pedigree (1,1,5,5,1)
  Calculation of standard deviation based on min. and max. values
- Nitrogen oxides [air, unspecified]: 0.00327 kg; lognormal variance with pedigree 0.212, pedigree (1,1,5,5,1)
  Calculation of standard deviation based on min. and max. values
- Particulate Matter, < 2.5 um [air, unspecified]: 0.000184 kg; lognormal variance with pedigree 3.972, pedigree (1,1,5,5,1)
  Calculation of standard deviation based on min. and max. values
- Particulate Matter, > 10 um [air, unspecified]: 2.3e-5 kg; lognormal variance with pedigree 0.272, pedigree (1,1,5,5,1)
  Calculation of standard deviation based on min. and max. values
- Particulate Matter, > 2.5 um and < 10um [air, unspecified]: 2.3e-5 kg; lognormal variance with pedigree 0.272, pedigree (1,1,5,5,1)
  Calculation of standard deviation based on min. and max. values
- Sulfur dioxide [air, unspecified]: 0.00404 kg; lognormal variance with pedigree 0.272, pedigree (1,1,5,5,1)
  Calculation of standard deviation based on min. and max. values
- Tin ion [air, unspecified]: 9.13e-6 kg; lognormal variance with pedigree 1.582, pedigree (1,1,5,5,1)
  Estimation of standard deviation
- Water [air, unspecified]: 0.00027125 m3; name water_to_air_unspecified; lognormal variance with pedigree 0.0827, pedigree (2,2,5,5,1)
  Calculated value based on literature values and expert opinion. See comments in the parametres' comment field.
  property fraction, origin: fresh water 0; name fraction_origin_fresh_water
  property fraction, origin: salt water 0; name fraction_origin_salt_water
  property fraction, origin: unspecified 1; name fraction_origin_unspecified
- Water [water, unspecified]: 7.875e-5 m3; name water_to_water_unspecified; = water_cooling_UNO_input*(1-fraction_CW_to_air)-0.00035; lognormal variance with pedigree 0.0827, pedigree (2,2,5,5,1)
  (same comment as for Water)
  property carbon content, fossil 0; name C_content_fossil
  property carbon content, non-fossil 0; name C_content_non_fossil
  property dry mass 0 kg; name DM
  property fraction, origin: fresh water 0; name fraction_origin_fresh_water_Ww
  property fraction, origin: salt water 0; name fraction_origin_salt_water_Ww
  property fraction, origin: unspecified 1; name fraction_origin_unspecified_Ww
  property water in wet mass 1000 kg; name WWM
  property wet mass 1000 kg; name WM

## Sampling procedure
Literature

## Extrapolations
See geography This dataset has been copied from an original dataset covering the geography RER. The uncertainty has been adjusted accordingly.

## Review by Roberto Dones 2009-01-22
passed
