# treatment of hard coal ash, residual material landfill

Dataset: EcoSpold 2, unit process
Geography: IT
Time period: 2010-01-01 to 2023-12-31
Technology level: current
Classification: ISIC rev.4 ecoinvent: 3822:Treatment and disposal of hazardous waste
Scenario: Business-as-Usual
System model: Allocation, cut-off by classification
Generated by: Nikolia Stoikou
Database: ecoinvent
isCopyrightProtected: true
accessRestrictedTo: 1

## General comment
This dataset represents the activity of waste disposal of 'hard coal ash' in a residual material landfill (RMLF). Recommended use of this dataset: for wastes-residues that are low in organic carbon (< 5 w-%) and are not biologically or chemically reactive in water. Inventoried waste consists of fraction: 100% hard coal ash small scale. Waste composition (wet, in ppmw): gross heating value 0.4712 MJ/kg; H2O na; O 298030; H na; C 100000; S na; N na; P 980; B 350; Cl na; Br 97; F na; I 16.4; Ag na; As 92; Ba 1960; Cd 4.5; Co 49; Cr 192; Cu 146.25; Hg 0.1; Mn 693; Mo 28.5; Ni 194; Pb 376; Sb 9.5; Se 7; Sn 19.8; V 388; Zn 475; Be 19.6; Sc 39.6; Sr 1940; Ti 5880; Tl 9.5; W na; Si 245000; Fe 68600; Ca 19600; Al 166600; K 19600; Mg 58800; Na 9800. Share of carbon in initial waste input that is biogenic 0%.

## Included activities start
The activity starts with the waste being available at the gate of the treatment facility. Collection and transportation of the waste to the treatment plant is not included.

## Included activities end
The activity ends with the waste being treated and waste-specific emissions from the landfill are released to the water (short-term emissions to water from leachate and long-term emissions to ground water).

## Geography
This dataset represents a landfill site with mean annual temperature (MAT) of 13.7386363636364 degC, mean annual precipitation (MAP) of 832 mm/year, mean annual actual evaporation (EAT) of 516.653271719652 mm/year, and net infiltration of 315.3 mm/year. The leachate percolating through the residual material landfill has an average residence time of 11.1 years.
Reference for climatic parameters:
World Bank, 2022. Average precipitation in depth (mm per year), World Bank Group Available at: https://data.worldbank.org/indicator/AG.LND.PRCP.MM?end=2019&start=2019
Climatologia del Centro. Nazionale di Meteorologia e Climatologia Aeronautica. Repubblica Italiana Available at: http://clima.meteoam.it/web_clima_sysman/atlanteClimatico.php?ling=eng
undata, 2020. Actual evapotranspiration, United Nations Statistics Division Available at: http://data.un.org/Data.aspx?d=ENV&f=variableID%3a7
World Bank, 2022. Surface area (sq.km), World Bank Group Available at: https://data.worldbank.org/indicator/AG.SRF.TOTL.K2

## Technology
Residual material landfill for polluted, inorganic waste (VVEA Type C). With base seal and leachate collection system. Ultimate average landfill height is 10 meters. Operation phase duration is 30 years. Recultivation after closure. No additional solidification with cement requested. Based on average waste composition and climate data the end of carbonate phase in the residual material landfill is estimated to be reached after 60 000 years.

## Reference product
- hard coal ash: -1 kg; By-product classification Waste; CPC 39320: Ash and residue (except from the manufacture of iron or steel), containing metals or metallic compounds, excep[…]; HS2017 262099: Slag, ash and residues; (not from the manufacture of iron or steel), containing mainly metals or their comp[...]
  main reference product of this activity
  production volume 1.3546e8 kg
    Estimated. Energy prodcution in mainly responsible for hard coal ashes. The production volume is calculated as the sum of hard coal ashes resulting from electricity and heat and power co-generation production from hard coal in the respective country.
  property price 0 EUR2005
    Waste products are assigned a price of zero as they are assumed to require further treatment.
  properties: aluminium content 0.1666, antimony content 9.5e-6, arsenic content 9.2e-5, barium content 0.00196, beryllium content 1.96e-5, boron content 0.00035, bromine content 9.7e-5, cadmium content 4.5e-6, calcium content 0.0196, carbon allocation 0.1 kg, carbon content 0.1, carbon content, fossil 0.1, carbon content, non-fossil 0, chromium content 0.000192, cobalt content 4.9e-5, copper content 0.00014625, dry mass 1 kg, heating value, gross 0.471218 MJ, heating value, net 0 MJ, iodine content 1.64e-5, iron content 0.0686, lead content 0.000376, magnesium content 0.0588, manganese content 0.000693, mercury content 1e-7, molybdenum content 2.85e-5, nickel content 0.000194, oxygen content 0.298033, phosphorus content 0.00098, potassium content 0.0196, scandium content 3.96e-5, selenium content 7e-6, silicon content 0.245, sodium content 0.0098, strontium content 0.00194, thallium content 9.5e-6, tin content 1.98e-5, titanium content 0.00588, vanadium content 0.000388, water content 0, water in wet mass 0 kg, wet mass 1 kg, zinc content 0.000475

## Inputs from technosphere
- cast iron: 5.0555e-6 kg; lognormal variance with pedigree 0.31529, pedigree (1,1,2,1,1)
  for residual material landfill infrastructure
  properties: carbon content, fossil 0.04, dry mass 1 kg, wet mass 1 kg
- concrete, 25MPa: 4.6937e-7 m3; lognormal variance with pedigree 0.31529, pedigree (1,1,2,1,1)
  for residual material landfill infrastructure
  property cement content 206 kg; name cement
  property fly ash content 69 kg; name fly_ash
  property gravel content 1100 kg; name gravel
  property sand content 910 kg; name sand
  properties: dry mass 2285 kg, water content 0.0538293, wet mass 2408 kg
- diesel, burned in building machine: 0.028614 MJ; lognormal variance with pedigree 0.012675, pedigree (1,1,2,1,1)
  for residual material landfill infrastructure and operation
  properties: heating value, net 1 MJ
- electricity, low voltage: 8.5714e-6 kWh; lognormal variance with pedigree 0.012648, pedigree (1,1,2,1,1)
  for residual material landfill operation
- excavation, hydraulic digger: 0.00030086 m3; lognormal variance with pedigree 0.31529, pedigree (1,1,2,1,1)
  for residual material landfill infrastructure
- excavation, skid-steer loader: 0.00030086 m3; lognormal variance with pedigree 0.31529, pedigree (1,1,2,1,1)
  for residual material landfill infrastructure
- extrusion, plastic pipes: 8.1818e-5 kg; lognormal variance with pedigree 0.31529, pedigree (1,1,2,1,1)
  for residual material landfill infrastructure
- gravel, round: 0.1367 kg; lognormal variance with pedigree 0.31529, pedigree (1,1,2,1,1)
  for residual material landfill infrastructure
  properties: dry mass 1 kg, wet mass 1 kg
- heat, district or industrial, other than natural gas: 0.00092016 MJ; lognormal variance with pedigree 0.012648, pedigree (1,1,2,1,1)
  for residual material landfill operation
  property corresponding fuel use, propane, furnace >100kW 0 MJ; name fuel_use
  properties: heating value, net 1 MJ
  note on corresponding fuel use, propane, furnace >100kW: Lower heating value of the fuel input related to the heat/electricity output, taken directly from ecoinvent v3.0 dataset "heat production, natural gas, at industrial furnace >100kW, GLO 2000".
- pitch: 0.0012857 kg; lognormal variance with pedigree 0.31529, pedigree (1,1,2,1,1)
  for residual material landfill infrastructure
  property calculation property, kg 0 kg; name m_bitumen
  properties: carbon content, fossil 0.83, dry mass 1 kg, heating value, net 28 MJ, wet mass 1 kg
  note on calculation property, kg: Mass output. Defined here for use in the combined production calculations.
- polyethylene, high density, granulate: 0.00024899 kg; lognormal variance with pedigree 0.31529, pedigree (1,1,2,1,1)
  for residual material landfill infrastructure
  properties: carbon content, fossil 0.857143, dry mass 1 kg, heating value, net 42.47 MJ, wet mass 1 kg
- polypropylene, granulate: 8.1981e-7 kg; lognormal variance with pedigree 0.31529, pedigree (1,1,2,1,1)
  for residual material landfill infrastructure
  properties: carbon content, fossil 0.857143, dry mass 1 kg, heating value, net 32.78 MJ, wet mass 1 kg
  note on heating value, net: Value extracted from "treatment of waste polypropylene, open burning"
- polyvinylchloride, bulk polymerised: 8.1981e-7 kg; lognormal variance with pedigree 0.31529, pedigree (1,1,2,1,1)
  for residual material landfill infrastructure
  properties: carbon content, fossil 0.387097, dry mass 1 kg, heating value, net 21.5 MJ, wet mass 1 kg
- reinforcing steel: 2.9923e-5 kg; lognormal variance with pedigree 0.31529, pedigree (1,1,2,1,1)
  for residual material landfill infrastructure
  properties: carbon content, fossil 0.004, dry mass 1 kg, wet mass 1 kg
- sand: 0.00022955 kg; lognormal variance with pedigree 0.31529, pedigree (1,1,2,1,1)
  for residual material landfill infrastructure
  properties: dry mass 1 kg, wet mass 1 kg
- steel, chromium steel 18/8, hot rolled: 1.0384e-5 kg; lognormal variance with pedigree 0.31529, pedigree (1,1,2,1,1)
  for residual material landfill infrastructure
  properties: carbon content, fossil 0.0008, dry mass 1 kg, wet mass 1 kg
- synthetic rubber: 2.7327e-7 kg; lognormal variance with pedigree 0.31529, pedigree (1,1,2,1,1)
  for residual material landfill infrastructure
  properties: carbon content, fossil 0.871949, dry mass 1 kg, heating value, net 26.42 MJ, wet mass 1 kg
- tap water: 0.0063763 kg; lognormal variance with pedigree 0.31529, pedigree (1,1,2,1,1)
  for residual material landfill infrastructure
  properties: carbon content, fossil 0.00178991, dry mass 0.000337476 kg, water content 2962.17, wet mass 1 kg

## Inputs from nature
- Organic carbon, placed in landfill [inventory indicator, waste]: 0.1 kg; lognormal variance with pedigree 0.12152, pedigree (1,1,2,1,1)
  organic carbon placed in residual material landfill (for ecoscarcity LCIA only)
- Waste mass, total, placed in landfill [inventory indicator, waste]: 1 kg; lognormal variance with pedigree 0.0002, pedigree (1,1,2,1,1)
  waste mass placed in residual material landfill (for ecoscarcity LCIA only)
- Occupation, construction site [natural resource, land]: 0.00028571 m2*year; lognormal variance with pedigree 0.21182, pedigree (1,1,2,1,1)
  for residual material landfill construction
- Occupation, dump site [natural resource, land]: 0.0017143 m2*year; lognormal variance with pedigree 0.21182, pedigree (1,1,2,1,1)
  for residual material landfill area during operation
- Occupation, shrub land, sclerophyllous [natural resource, land]: 0.00028571 m2*year; lognormal variance with pedigree 0.21182, pedigree (1,1,2,1,1)
  for residual material landfill area initial aftercare recultivation
- Occupation, traffic area, road network [natural resource, land]: 0.0025714 m2*year; lognormal variance with pedigree 0.21182, pedigree (1,1,2,1,1)
  for access road of residual material landfill during construction, operation, and aftercare
- Transformation, from dump site [natural resource, land]: 5.7143e-5 m2; lognormal variance with pedigree 0.53191, pedigree (1,1,2,1,1)
  for residual material landfill area initial aftercare recultivation
- Transformation, from pasture, man made [natural resource, land]: 9.1429e-5 m2; lognormal variance with pedigree 0.53191, pedigree (1,1,2,1,1)
  for residual material landfill and access road
- Transformation, from shrub land, sclerophyllous [natural resource, land]: 5.7143e-5 m2; lognormal variance with pedigree 0.53191, pedigree (1,1,2,1,1)
  for residual material landfill area initial aftercare recultivation
- Transformation, from traffic area, road network [natural resource, land]: 3.4286e-5 m2; lognormal variance with pedigree 0.53191, pedigree (1,1,2,1,1)
  for recultivation of access road of residual material landfill after aftercare period
- Transformation, to dump site [natural resource, land]: 5.7143e-5 m2; lognormal variance with pedigree 0.53191, pedigree (1,1,2,1,1)
  for residual material landfill area
- Transformation, to forest, unspecified [natural resource, land]: 5.7143e-5 m2; lognormal variance with pedigree 0.53191, pedigree (1,1,2,1,1)
  for residual material landfill area aftercare recultivation
- Transformation, to pasture, man made [natural resource, land]: 3.4286e-5 m2; lognormal variance with pedigree 0.53191, pedigree (1,1,2,1,1)
  for recultivation of landfill and access road of residual material landfill after aftercare period
- Transformation, to shrub land, sclerophyllous [natural resource, land]: 5.7143e-5 m2; lognormal variance with pedigree 0.53191, pedigree (1,1,2,1,1)
  for residual material landfill area initial aftercare recultivation
- Transformation, to traffic area, road network [natural resource, land]: 3.4286e-5 m2; lognormal variance with pedigree 0.53191, pedigree (1,1,2,1,1)
  for access road of residual material landfill

## Emissions to nature
- Heat, waste [air, urban air close to ground]: 3.0857e-5 MJ; lognormal variance with pedigree 0.012648, pedigree (1,1,2,1,1)
  from electricity consumption in residual material landfill operation
- Hazardous waste disposed [inventory indicator, waste]: 1 kg; lognormal variance with pedigree 0.0002, pedigree (1,1,2,1,1)
  EN15804 waste mass in residual material landfill
- Aluminium III [water, ground-, long-term]: 0.036628 kg; lognormal variance with pedigree 0.6527, pedigree (1,1,2,1,1)
  emissions to groundwater in residual material landfill
- Aluminium III [water, surface water]: 6.1148e-5 kg; lognormal variance with pedigree 0.86293, pedigree (1,1,2,1,1)
  emissions to surface water in residual material landfill
- Antimony ion [water, ground-, long-term]: 9.1707e-6 kg; lognormal variance with pedigree 1.275, pedigree (1,1,2,1,1)
  emissions to groundwater in residual material landfill
- Antimony ion [water, surface water]: 3.2935e-7 kg; lognormal variance with pedigree 1.4988, pedigree (1,1,2,1,1)
  emissions to surface water in residual material landfill
- Arsenic ion [water, ground-, long-term]: 8.2776e-5 kg; lognormal variance with pedigree 0.97606, pedigree (1,1,2,1,1)
  emissions to groundwater in residual material landfill
- Arsenic ion [water, surface water]: 3.5804e-7 kg; lognormal variance with pedigree 1.4529, pedigree (1,1,2,1,1)
  emissions to surface water in residual material landfill
- BOD5, Biological Oxygen Demand [water, ground-, long-term]: 0.050338 kg; lognormal variance with pedigree 0.12152, pedigree (1,1,2,1,1)
  emissions to groundwater in residual material landfill
- BOD5, Biological Oxygen Demand [water, surface water]: 0.00015501 kg; lognormal variance with pedigree 0.63086, pedigree (1,1,2,1,1)
  emissions to surface water in residual material landfill
- Barium II [water, ground-, long-term]: 0.00010472 kg; lognormal variance with pedigree 1.922, pedigree (1,1,2,1,1)
  emissions to groundwater in residual material landfill
- Barium II [water, surface water]: 1.7482e-7 kg; lognormal variance with pedigree 1.5413, pedigree (1,1,2,1,1)
  emissions to surface water in residual material landfill
- Beryllium II [water, ground-, long-term]: 1.0472e-6 kg; lognormal variance with pedigree 1.922, pedigree (1,1,2,1,1)
  emissions to groundwater in residual material landfill
- Beryllium II [water, surface water]: 1.7482e-9 kg; lognormal variance with pedigree 1.922, pedigree (1,1,2,1,1)
  emissions to surface water in residual material landfill
- Boron [water, ground-, long-term]: 0.00033787 kg; lognormal variance with pedigree 0.79596, pedigree (1,1,2,1,1)
  emissions to groundwater in residual material landfill
- Boron [water, surface water]: 1.2134e-5 kg; lognormal variance with pedigree 1.0198, pedigree (1,1,2,1,1)
  emissions to surface water in residual material landfill
- Bromine [water, ground-, long-term]: 9.5247e-5 kg; lognormal variance with pedigree 0.96632, pedigree (1,1,2,1,1)
  emissions to groundwater in residual material landfill
- Bromine [water, surface water]: 1.7516e-6 kg; lognormal variance with pedigree 1.262, pedigree (1,1,2,1,1)
  emissions to surface water in residual material landfill
- COD, Chemical Oxygen Demand [water, ground-, long-term]: 0.51248 kg; lognormal variance with pedigree 0.12152, pedigree (1,1,2,1,1)
  emissions to groundwater in residual material landfill
- COD, Chemical Oxygen Demand [water, surface water]: 0.0015781 kg; lognormal variance with pedigree 0.63086, pedigree (1,1,2,1,1)
  emissions to surface water in residual material landfill
- Cadmium II [water, ground-, long-term]: 4.4312e-8 kg; lognormal variance with pedigree 1.922, pedigree (1,1,2,1,1)
  emissions to groundwater in residual material landfill
- Cadmium II [water, surface water]: 7.3976e-11 kg; lognormal variance with pedigree 1.922, pedigree (1,1,2,1,1)
  emissions to surface water in residual material landfill
- Calcium II [water, ground-, long-term]: 0.0020684 kg; lognormal variance with pedigree 1.5532, pedigree (1,1,2,1,1)
  emissions to groundwater in residual material landfill
- Calcium II [water, surface water]: 3.453e-6 kg; lognormal variance with pedigree 1.1696, pedigree (1,1,2,1,1)
  emissions to surface water in residual material landfill
- Chromium VI [water, ground-, long-term]: 0.00013763 kg; lognormal variance with pedigree 0.90309, pedigree (1,1,2,1,1)
  emissions to groundwater in residual material landfill
- Chromium VI [water, surface water]: 4.0573e-7 kg; lognormal variance with pedigree 1.4321, pedigree (1,1,2,1,1)
  emissions to surface water in residual material landfill
- Cobalt II [water, ground-, long-term]: 7.3081e-6 kg; lognormal variance with pedigree 1.922, pedigree (1,1,2,1,1)
  emissions to groundwater in residual material landfill
- Cobalt II [water, surface water]: 1.2201e-8 kg; lognormal variance with pedigree 1.8921, pedigree (1,1,2,1,1)
  emissions to surface water in residual material landfill
- Copper ion [water, ground-, long-term]: 4.7387e-6 kg; lognormal variance with pedigree 1.922, pedigree (1,1,2,1,1)
  emissions to groundwater in residual material landfill
- Copper ion [water, surface water]: 7.9111e-9 kg; lognormal variance with pedigree 1.922, pedigree (1,1,2,1,1)
  emissions to surface water in residual material landfill
- DOC, Dissolved Organic Carbon [water, ground-, long-term]: 0.099693 kg; lognormal variance with pedigree 0.12152, pedigree (1,1,2,1,1)
  emissions to groundwater in residual material landfill
- DOC, Dissolved Organic Carbon [water, surface water]: 0.00030699 kg; lognormal variance with pedigree 0.63086, pedigree (1,1,2,1,1)
  emissions to surface water in residual material landfill
- Iodide [water, ground-, long-term]: 1.6062e-5 kg; lognormal variance with pedigree 1.2027, pedigree (1,1,2,1,1)
  emissions to groundwater in residual material landfill
- Iodide [water, surface water]: 3.3834e-7 kg; lognormal variance with pedigree 1.4833, pedigree (1,1,2,1,1)
  emissions to surface water in residual material landfill
- Iron ion [water, ground-, long-term]: 0.00028925 kg; lognormal variance with pedigree 1.922, pedigree (1,1,2,1,1)
  emissions to groundwater in residual material landfill
- Iron ion [water, surface water]: 4.8289e-7 kg; lognormal variance with pedigree 1.4625, pedigree (1,1,2,1,1)
  emissions to surface water in residual material landfill
- Lead II [water, ground-, long-term]: 1.1233e-6 kg; lognormal variance with pedigree 1.922, pedigree (1,1,2,1,1)
  emissions to groundwater in residual material landfill
- Lead II [water, surface water]: 1.8754e-9 kg; lognormal variance with pedigree 1.922, pedigree (1,1,2,1,1)
  emissions to surface water in residual material landfill
- Magnesium [water, ground-, long-term]: 0.0057619 kg; lognormal variance with pedigree 1.5204, pedigree (1,1,2,1,1)
  emissions to groundwater in residual material landfill
- Magnesium [water, surface water]: 9.6193e-6 kg; lognormal variance with pedigree 1.062, pedigree (1,1,2,1,1)
  emissions to surface water in residual material landfill
- Manganese II [water, ground-, long-term]: 8.8242e-6 kg; lognormal variance with pedigree 1.922, pedigree (1,1,2,1,1)
  emissions to groundwater in residual material landfill
- Manganese II [water, surface water]: 1.4732e-8 kg; lognormal variance with pedigree 1.8663, pedigree (1,1,2,1,1)
  emissions to surface water in residual material landfill
- Mercury II [water, ground-, long-term]: 5.3835e-9 kg; lognormal variance with pedigree 1.922, pedigree (1,1,2,1,1)
  emissions to groundwater in residual material landfill
- Mercury II [water, surface water]: 8.9874e-12 kg; lognormal variance with pedigree 1.922, pedigree (1,1,2,1,1)
  emissions to surface water in residual material landfill
- Molybdenum VI [water, ground-, long-term]: 2.4974e-5 kg; lognormal variance with pedigree 1.1303, pedigree (1,1,2,1,1)
  emissions to groundwater in residual material landfill
- Molybdenum VI [water, surface water]: 3.5261e-6 kg; lognormal variance with pedigree 1.2312, pedigree (1,1,2,1,1)
  emissions to surface water in residual material landfill
- Nickel II [water, ground-, long-term]: 3.4946e-5 kg; lognormal variance with pedigree 1.6085, pedigree (1,1,2,1,1)
  emissions to groundwater in residual material landfill
- Nickel II [water, surface water]: 5.8341e-8 kg; lognormal variance with pedigree 1.6841, pedigree (1,1,2,1,1)
  emissions to surface water in residual material landfill
- Phosphate [water, ground-, long-term]: 0.00022894 kg; lognormal variance with pedigree 1.922, pedigree (1,1,2,1,1)
  emissions to groundwater in residual material landfill
- Phosphate [water, surface water]: 3.8221e-7 kg; lognormal variance with pedigree 1.5841, pedigree (1,1,2,1,1)
  emissions to surface water in residual material landfill
- Potassium I [water, ground-, long-term]: 0.017564 kg; lognormal variance with pedigree 0.28978, pedigree (1,1,2,1,1)
  emissions to groundwater in residual material landfill
- Potassium I [water, surface water]: 0.0020356 kg; lognormal variance with pedigree 0.40592, pedigree (1,1,2,1,1)
  emissions to surface water in residual material landfill
- Scandium [water, ground-, long-term]: 2.1158e-6 kg; lognormal variance with pedigree 1.922, pedigree (1,1,2,1,1)
  emissions to groundwater in residual material landfill
- Scandium [water, surface water]: 3.5322e-9 kg; lognormal variance with pedigree 1.922, pedigree (1,1,2,1,1)
  emissions to surface water in residual material landfill
- Selenium IV [water, ground-, long-term]: 6.7573e-6 kg; lognormal variance with pedigree 1.3153, pedigree (1,1,2,1,1)
  emissions to groundwater in residual material landfill
- Selenium IV [water, surface water]: 2.4268e-7 kg; lognormal variance with pedigree 1.5391, pedigree (1,1,2,1,1)
  emissions to surface water in residual material landfill
- Silicon [water, ground-, long-term]: 0.24456 kg; lognormal variance with pedigree 0.051615, pedigree (1,1,2,1,1)
  emissions to groundwater in residual material landfill
- Silicon [water, surface water]: 0.00044381 kg; lognormal variance with pedigree 0.62792, pedigree (1,1,2,1,1)
  emissions to surface water in residual material landfill
- Sodium I [water, ground-, long-term]: 0.0082964 kg; lognormal variance with pedigree 0.3715, pedigree (1,1,2,1,1)
  emissions to groundwater in residual material landfill
- Sodium I [water, surface water]: 0.0015036 kg; lognormal variance with pedigree 0.45455, pedigree (1,1,2,1,1)
  emissions to surface water in residual material landfill
- Strontium II [water, ground-, long-term]: 0.00010365 kg; lognormal variance with pedigree 1.922, pedigree (1,1,2,1,1)
  emissions to groundwater in residual material landfill
- Strontium II [water, surface water]: 1.7304e-7 kg; lognormal variance with pedigree 1.5427, pedigree (1,1,2,1,1)
  emissions to surface water in residual material landfill
- TOC, Total Organic Carbon [water, ground-, long-term]: 0.099693 kg; lognormal variance with pedigree 0.12152, pedigree (1,1,2,1,1)
  emissions to groundwater in residual material landfill
- TOC, Total Organic Carbon [water, surface water]: 0.00030699 kg; lognormal variance with pedigree 0.63086, pedigree (1,1,2,1,1)
  emissions to surface water in residual material landfill
- Thallium I [water, ground-, long-term]: 5.0757e-7 kg; lognormal variance with pedigree 1.922, pedigree (1,1,2,1,1)
  emissions to groundwater in residual material landfill
- Thallium I [water, surface water]: 8.4736e-10 kg; lognormal variance with pedigree 1.922, pedigree (1,1,2,1,1)
  emissions to surface water in residual material landfill
- Tin ion [water, ground-, long-term]: 1.3894e-7 kg; lognormal variance with pedigree 1.922, pedigree (1,1,2,1,1)
  emissions to groundwater in residual material landfill
- Tin ion [water, surface water]: 2.3196e-10 kg; lognormal variance with pedigree 1.922, pedigree (1,1,2,1,1)
  emissions to surface water in residual material landfill
- Titanium ion [water, ground-, long-term]: 0.00031416 kg; lognormal variance with pedigree 1.922, pedigree (1,1,2,1,1)
  emissions to groundwater in residual material landfill
- Titanium ion [water, surface water]: 5.2447e-7 kg; lognormal variance with pedigree 1.4028, pedigree (1,1,2,1,1)
  emissions to surface water in residual material landfill
- Vanadium V [water, ground-, long-term]: 0.00032443 kg; lognormal variance with pedigree 0.79015, pedigree (1,1,2,1,1)
  emissions to groundwater in residual material landfill
- Vanadium V [water, surface water]: 1.1801e-6 kg; lognormal variance with pedigree 1.2927, pedigree (1,1,2,1,1)
  emissions to surface water in residual material landfill
- Zinc II [water, ground-, long-term]: 3.0072e-6 kg; lognormal variance with pedigree 1.922, pedigree (1,1,2,1,1)
  emissions to groundwater in residual material landfill
- Zinc II [water, surface water]: 5.0204e-9 kg; lognormal variance with pedigree 1.922, pedigree (1,1,2,1,1)
  emissions to surface water in residual material landfill
