# scrap preparation facility construction

Dataset: EcoSpold 2, unit process
Geography: RER
Time period: 2002-01-01 to 2023-12-31
Technology level: current
Classification: ISIC rev.4 ecoinvent: 4290:Construction of other civil engineering projects
Classification: EcoSpold01Categories: metals/extraction
Tags: ConvertedDataset
Scenario: Business-as-Usual
System model: Allocation, cut-off by classification
Generated by: Hans-Jörg Althaus
Published in: Althaus H.-J. 2000
Database: ecoinvent
isCopyrightProtected: true
accessRestrictedTo: 1

## General comment
Medium sized plant. Output: 10'000 t/a, life time: 50 years. Assumption is based on data for casting plant.
[This dataset was already contained in the ecoinvent database version 2. It was not individually updated during the transfer to ecoinvent version 3. Life Cycle Impact Assessment results may still have changed, as they are affected by changes in the supply chain, i.e. in other datasets. This dataset was generated following the ecoinvent quality guidelines for version 2. It may have been subject to central changes described in the ecoinvent version 3 change report (http://www.ecoinvent.org/database/ecoinvent-version-3/reports-of-changes/), and the results of the central updates were reviewed extensively. The changes added e.g. consistent water flows and other information throughout the database. The documentation of this dataset can be found in the ecoinvent reports of version 2, which are still available via the ecoinvent website. The change report linked above covers all central changes that were made during the conversion process.]

## Included activities start
The activity starts from the transformation of unspecified land to industrial area.

## Included activities end
Production hall, machinery and administrative buildings (including disposal).

## Geography
Some Swiss datasets are used for European processes.

## Technology
Assumed technology

## Reference product
- scrap preparation facility: 1 unit; By-product classification allocatable product; CPC 53290: Other civil engineering works
  production volume 1.32237 unit
    This is a placeholder value that does not reflect real-world production volumes. This dataset does not currently require a real-world production volume to work in the database framework, and no actual data were collected yet. This has no negative effect on the results of the ecoinvent database. The placeholder value of this activity was scaled according to the nominal GDP of 2005 (source: United Nations, http://data.un.org/Glossary.aspx?q=GDP+%28current+US%24%29, accessed 20130726) to reflect an appropriate share of the global production volume, which is also a placeholder value.
  property price 2.23222e7 EUR2005
    Upscale from EU 27 to the world by PPP (0.8458 in 2003 and 0,8426 in 2004)
  properties: carbon allocation 0 kg, carbon content 0

## Inputs from technosphere
All rows: lognormal variance with pedigree 0.5, pedigree (5,5,5,5,5)
- building, hall: 1670 m2
- building, multi-storey: 25000 m3
  activityLink introduced to establish a direct link to the corresponding regional supply of this product
- concrete, normal strength: 55.5659, 30.5341 m3 (2 suppliers, which the file names only by identifier); sum of these 86.1 m3
  properties: dry mass 2190 kg, water content 0.086758, wet mass 2380 kg
- conveyor belt: 200 m
  (same comment as for building, multi-storey)
- industrial machine, heavy, unspecified: 154000 kg
  (same comment as for building, multi-storey)
- reinforcing steel: 13200 kg
  properties: carbon content, fossil 0.004, dry mass 1 kg, wet mass 1 kg
- waste concrete, not reinforced: -152385, -1614.64 kg (2 suppliers, which the file names only by identifier); sum of these -154000 kg
  production volume
    Calculated from the production volume of scrap preparation facility in proportion to the respective output amounts.
  properties: dry mass 1 kg, wet mass 1 kg
- waste reinforced concrete: -54720.2, -579.802 kg (2 suppliers, which the file names only by identifier); sum of these -55300 kg
  production volume
    (same comment as for waste concrete, not reinforced)
  properties: dry mass 0.99418 kg, water content 0.00585407, wet mass 1 kg

## Inputs from nature
- Occupation, industrial area [natural resource, land]: 1.875e6 m2*year; lognormal variance with pedigree 0.24, pedigree (5,5,5,5,5)
- Transformation, from unspecified [natural resource, land]: 37500 m2; lognormal variance with pedigree 0.32, pedigree (5,5,5,5,5)
- Transformation, to industrial area [natural resource, land]: 37510 m2; lognormal variance with pedigree 0.32, pedigree (5,5,5,5,5)

## Sampling procedure
Internet search

## Extrapolations
see Geography

## Review by Roland Hischier 2003-08-20
Passed.
