# biogas purification to biomethane by pressure swing adsorption

Dataset: EcoSpold 2, unit process
Geography: RoW
Time period: 2018-01-01 to 2023-12-31
Technology level: current
Classification: ISIC rev.4 ecoinvent: 3520:Manufacture of gas; distribution of gaseous fuels through mains
Tags: ConvertedDataset
Scenario: Business-as-Usual
System model: Allocation, cut-off by classification
Share of production covered: 100 %
Generated by: Thomas Kägi
Published in: Kaegi Thomas 2019
Database: ecoinvent
isCopyrightProtected: true
accessRestrictedTo: 1

## General comment
The data presented is derived from information available from the manufacturer of biogas upgrading plants. The upgraded gas leaves the process with a pressure of 5 bar. For the composition of the product gas we assume a share of 96 Vol. % of methane.
[This dataset is meant to replace the following datasets:
- biogas purification to methane 96 vol-%, GLO, 2004 - 2005]

## Included activities start
The activity starts with the biogas being available at the gates of the purification plant.

## Included activities end
The activity ends with the biomethane being available for transportation at the gates of the purification plant. Electricity consumption and emissions represent the raw gas compression, H2S removal, gas conditioning and methane enrichment of biogas. The production and disposal of activated carbon are neglected. Infrastructure expenditures are included employing generic data for facilities of a chemical plant as a first approximation.

## Geography
Plants using the described technology are in operation in Switzerland.

## Technology
Pressure Switch Adsorption (PSA)

## Parameters
- carbon dioxide density (ntp): 1.997 kg/m3; name CO2_density
  CO2 has a density of 1.997 kg/Nm3 in standard temperature and pressure (STP) conditions. STP is defined as 0oC (273.15 K, 32oF) and 1 atm (101.325 kN/m2, 101.325 kPa, 14.7 psia, 0 psig, 30 in Hg, 760 torr).
  Reference: Engineering ToolBox, (2003). Gases - Densities. [online] Available at: https://www.engineeringtoolbox.com/gas-density-d_158.html [Accessed 30 01 2020].
- carbon dioxide, volumetric concentration: 0.367 dimensionless; name CO2_volumetric_share
  Assumed volumetric concentration of CO2 in biogas.
- methane density (stp): 0.717 kg/m3; name CH4_density_STP
  CH4 has a density of 0.717 kg/Nm3 in standard temperature and pressure (STP) conditions. STP is defined as 0oC (273.15 K, 32oF) and 1 atm (101.325 kN/m2, 101.325 kPa, 14.7 psia, 0 psig, 30 in Hg, 760 torr).
  Reference: Engineering ToolBox, (2003). Gases - Densities. [online] Available at: https://www.engineeringtoolbox.com/gas-density-d_158.html [Accessed 30 01 2020].
- share of methane in biogas: 0.633 dimensionless; name CH4_volumetric_concentration
  Assumed volumetric concentration of CH4 in biogas.

## Reference product
- biomethane, high pressure: 1 m3; name RP_CH4; By-product classification allocatable product; CPC 17200: Coal gas, water gas, producer gas and similar gases, other than petroleum gases and other gaseous hydrocarbons; HS2017 271129: Petroleum gases and other gaseous hydrocarbons; in gaseous state, other than natural gas; CAS 74-82-8
  production volume 6.82e8 m3
    Production volume amount was scaled from the respective Swiss value. GDP scaling was employed with Switzerland accounting for roughly 0.8% of the global GDP, yielding a global production volume of 687500000 m3 of biomethane.
  property heating value, net 34.97 MJ
    Literature value, Source: United Nations Statistics Division (2018) International Recommendations for Energy Statistics (IRES). Available at: http://unstats.un.org/unsd/statcom/doc11/BG-IRES.pdf.
  property price 0.144 EUR2005
    Temporary price data. Calculated as 90% of purchasers price based on: Same prices per energy output as natural gas, based on the proportional heating value (55.5 MJ/kg for methane; 54.8 MJ/kg for natural gas)
  properties: carbon allocation 0.522263 kg, carbon content 0.71364, carbon content, fossil 0, carbon content, non-fossil 0.71364, dry mass 0.73183 kg, water content 0, water in wet mass 0 kg, wet mass 0.73183 kg

## Inputs from technosphere
- biogas: 0.02611 m3; name BG1
  Reported share in Hafner 2019
  properties: carbon content, non-fossil 0.45037, dry mass 1.15 kg, heating value, net 22.73 MJ, wet mass 1.15 kg
  note on carbon content, non-fossil: Total C content in kg/Nm3 (Tab 12.8, ecoinvent v2.2 report n17), referred to 1kg DM
  note on heating value, net: Value taken from the general comment of "heat and power co-generation, biogas, gas engine" dataset.
- biogas: 0.93683 m3; name BG3
  Reported share in Hafner 2019
- biogas: 0.57285 m3; name BG2; lognormal variance with pedigree 0.0052, pedigree (2,1,3,5,1)
  Reported share in Hafner 2019
- charcoal: 0.000208 kg
  Reported amount in Stucki 2011
  properties: carbon content, non-fossil 0.8, dry mass 1 kg, heating value, net 28.4 MJ, wet mass 1 kg
  note on heating value, net: Indicative value. Reference: Fuels - Higher and Lower Calorific Values, available at: https://www.engineeringtoolbox.com/fuels-higher-calorific-values-d_169.html
- chemical factory, organics: 5.4e-11 unit; lognormal variance with pedigree 0.448, pedigree (4,5,5,5,5)
  Reported amount in Stucki 2011
  Uncertainty: r
- electricity, low voltage: 0.0070498, 0.000314692, 0.00494875, 0.102718, 0.0101387, 6.31521e-5, 0.0232798, 0.0353642, 0.00175197 kWh (9 suppliers, which the file names only by identifier); sum of these 0.185629 kWh; lognormal variance with pedigree 0.128, pedigree (3,4,3,5,1)
  Reported amount in Stucki 2011
  Uncertainty: l
- lubricating oil: 0.00015 kg
  Reported amount in Stucki 2011
  properties: carbon content, fossil 0.75, dry mass 1 kg, heating value, net 40.2 MJ, wet mass 1 kg
  note on carbon content, fossil: Lubricating oil is produced from diesel. C-content/dry mass of fats and oils considered 75%, from: ecoinvent v2.2 report, n 15a, pg 40
  note on heating value, net: Literature value, Source: IPCC 2006, 2006 IPCC Guidelines for National Greenhouse Gas Inventories, Prepared by the National Greenhouse Gas Inventories Programme, Eggleston H.S., Buendia L., Miwa K., Ngara T. and Tanabe K. (eds). Published: IGES, Japan
- potassium hydroxide: 3.98e-6 kg
  Reported amount in Stucki 2011
  properties: dry mass 0.856 kg, water content 0.168224, wet mass 1 kg

## Emissions to nature
- Carbon dioxide, non-fossil [air, non-urban air or from high stacks]: 0.97457 kg; lognormal variance with pedigree 0.018, pedigree (3,4,3,5,1)
  Emissions are calculated based on a) the composition of the biogas entering the process, b) the composition of biomethane being produced and the fugitive emissions of CH4 (on the basis of the biomethane produced). The composition of the biogas is the following: CH4: 63.3% v/v and CO2: 33.4% v/v, N: 3.2% v/v and H2S: 0.0005% v/v. The composition of the biomethane is the following: CH4: 96% v/v, CO2: 2% v/v, N: 1% v/v, H2S: 0.0003% v/v. Fugitive emissions for this type of upgrading technology have been measured to be 1.25% of CH4 in biogas. Nitrogen and hydrogen sulfide in the biogas, exit the process as emissions to air. Density of CO2 and CH4 considered to be: 1.977 kg/m3 and 0.708 kg/m3 respectively.
  Uncertainty: l
- Heat, waste [air, non-urban air or from high stacks]: 1.28 MJ; lognormal variance with pedigree 0.058, pedigree (3,4,3,5,4)
  Reported amount in Stucki 2011
  Uncertainty: l
- Hydrogen sulfide [air, non-urban air or from high stacks]: 6.7e-6 kg; lognormal variance with pedigree 0.008, pedigree (3,4,3,5,1)
  (same comment as for Carbon dioxide, non-fossil)
- Methane, non-fossil [air, non-urban air or from high stacks]: 0.0086 kg; lognormal variance with pedigree 0.014, pedigree (1,1,3,5,1)
  (same comment as for Carbon dioxide, non-fossil)
- Nitrogen [air, unspecified]: 0.04878 kg
  Emissions are calculated based on a) the composition of the biogas entering the process, b) the composition of biomethane being produced and the fugitive emissions of CH4 (on the basis of the biomethane produced). The composition of the biogas is the following: CH4: 63.3% v/v and CO2: 33.4% v/v, N: 3.2% v/v and H2S: 0.0005% v/v. The composition of the biomethane is the following: CH4: 96% v/v, CO2: 2% v/v, N: 1% v/v, H2S: 0.0003% v/v. Fugitive emissions for this type of upgrading technology have been measured to be 1.25% of CH4 in biogas. Nitrogen and hydrogen sulfide in the biogas, exit the process as emissions to air. Density of CO2 and CH4 considered to be: 1.977 kg/m3 and 0.708 kg/m3 respectively.
- Sulfur dioxide [air, non-urban air or from high stacks]: 6.599e-6 kg; lognormal variance with pedigree 0.008, pedigree (3,4,3,5,1)
  Reported amount in Stucki 2011
  Uncertainty: l

## Sampling procedure
Literature data

## Extrapolations
slightly higher electricity consumption as in reference sources.
