# silver-gold mine operation with refinery

Dataset: EcoSpold 2, unit process
Geography: RoW
Time period: 2002-01-01 to 2023-12-31
Technology level: current
Classification: ISIC rev.4 ecoinvent: 0729:Mining of other non-ferrous metal ores
Tags: ConvertedDataset
Scenario: Business-as-Usual
System model: Allocation, cut-off by classification
Generated by: Matthias Tuchschmid (obsolete)
Published in: Classen M. 2009
Database: ecoinvent
isCopyrightProtected: true
accessRestrictedTo: 1

## General comment
This multi-output process 'mining and refining, gold-silver deposit' delivers the two co-products 'gold, from combined gold-silver-production, at refinery' and 'silver, from combined gold-silver-production, at refinery'. This data set includes the mining in Chile in open pit mine incl. land use. Air emissions are estimated.
[This dataset was already contained in the ecoinvent database version 2. It was not individually updated during the transfer to ecoinvent version 3. Life Cycle Impact Assessment results may still have changed, as they are affected by changes in the supply chain, i.e. in other datasets. This dataset was generated following the ecoinvent quality guidelines for version 2. It may have been subject to central changes described in the ecoinvent version 3 change report (http://www.ecoinvent.org/database/ecoinvent-version-3/reports-of-changes/), and the results of the central updates were reviewed extensively. The changes added e.g. consistent water flows and other information throughout the database. The documentation of this dataset can be found in the ecoinvent reports of version 2, which are still available via the ecoinvent website. The change report linked above covers all central changes that were made during the conversion process.]

## Included activities end
This data set includes the combined mining and refining of gold and silver in an open pit mine in Chile incl. energy and material use, water and air emissions of metals and land use.

## Geography
Material requirements are estimated with Australian data

## Technology
Refinement is estimated with electrolysis-data.

## Time period
Period of public environmental report

## Parameters
- fraction, process water, to air: 0.15 dimensionless; name fraction_PW_to_air; lognormal variance with pedigree 0.092025, pedigree (4,4,3,2,4)

## Reference product
- silver: 1 kg; name silver_RP; By-product classification allocatable product; CPC 41310: Silver (including silver plated with gold or platinum), unwrought or in semi-manufactured forms, or in powder […]; HS2017 710691: Metals; silver, unwrought, (but not powder); CAS 7440-22-4
  production volume 2.15858e7 kg; name silver_RP_PV
    The total amount of primary silver produced in the world in 2015 was 27,600,000 (Source: USGS Minerals Yearbook 2015. Available from: https://www.usgs.gov/centers/nmic/silver-statistics-and-information [downloaded 02 July 2019], Table 8).
    It is assumed that this activity represents the main production route for primary silver. Other datasets in the database model the production of primary silver as well, therefore their production volumes are subtracted from the reported total world primary silver production.
  property price 324.357 EUR2005
    Price calculated as 5-year market average (2015-2019; USD/kg; USGS [2020]) and converted to EUR2005 (USD2019/EUR2005 exchange rate: 0.62; Official Data Foundation [2020] and Macrotrends [2020]).
    References:
    Official Data Foundation (2020). Inflation Calculator [Online]. Available from: https://www.officialdata.org/us/inflation/2005?endYear=2019&amount=1 [Accessed 28/07/2020]
    USGS (2020). Mineral Commodity Summaries 2020 [Online]. Available from: https://pubs.usgs.gov/periodicals/mcs2020/mcs2020.pdf [Accessed 28/07/2020]
    Macrotrends (2020). Euro Dollar Exchange Rate (EUR USD) - Historical Chart [Online]. Available from: https://www.macrotrends.net/2548/euro-dollar-exchange-rate-historical-chart [Accessed 28/07/2020]
  properties: allocation factor 0.325923, carbon allocation 0 kg, carbon content 0, carbon content, fossil 0, carbon content, non-fossil 0, dry mass 1 kg, true value 324.357, water content 0, water in wet mass 0 kg, wet mass 1 kg

## Inputs from technosphere
- blasting: 5.01049 kg; lognormal variance with pedigree 0.0432, pedigree (2,3,5,5,1)
  Estimation, based on peruvian Data
  Uncertainty: E
- charcoal: 0.14764 kg; lognormal variance with pedigree 0.0432, pedigree (2,3,5,5,1)
  Calculation, based on thesis on Australian precious metal production, data for 1999
  Uncertainty: C
  properties: carbon content, non-fossil 0.8, dry mass 1 kg, heating value, net 28.4 MJ, wet mass 1 kg
  note on heating value, net: Indicative value. Reference: Fuels - Higher and Lower Calorific Values, available at: https://www.engineeringtoolbox.com/fuels-higher-calorific-values-d_169.html
- diesel, burned in building machine: 274.707 MJ; lognormal variance with pedigree 0.0446, pedigree (2,4,5,5,1)
  Environmental report (Placer-Dome, 2002)
  Uncertainty: E
  properties: heating value, net 1 MJ
- diesel, burned in diesel-electric generating set, 10MW: 1216.39 MJ; lognormal variance with pedigree 0.0446, pedigree (2,4,5,5,1)
  Environmental report (Placer-Dome, 2002)
  Uncertainty: E
  properties: heating value, net 1 MJ
- electricity, medium voltage: 0.315942, 0.0140966, 0.328487, 0.166542, 0.203934, 0.11802, 13.0468, 260.254, 0.0292671, 87.4446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 kWh (31 suppliers, which the file names only by identifier); sum of these 465.808 kWh; lognormal variance with pedigree 0.0446, pedigree (2,4,5,5,1)
  Environmental report (Placer-Dome, 2002)
  Uncertainty: E
- hydrochloric acid, without water, in 30% solution state: 0.0213146, 0.0973767 kg (2 suppliers, which the file names only by identifier); sum of these 0.118691 kg; lognormal variance with pedigree 0.0432, pedigree (2,3,5,5,1)
  (same comment as for charcoal)
  properties: dry mass 1 kg, heating value, net 3.32 MJ, wet mass 1 kg
- lime, packed: 0.181834, 0.00462949, 0.363561 kg (3 suppliers, which the file names only by identifier); sum of these 0.550024 kg; lognormal variance with pedigree 0.0446, pedigree (2,4,5,5,1)
  (same comment as for charcoal)
  properties: carbon content, fossil 0.117492, dry mass 0.998 kg, water content 0.00200401, wet mass 1 kg
  note on carbon content, fossil: Table 3.1, ecoinvent v2.2 report 7, part VII, pg 3. MW CaCO3=100, MW MgCO3=84
- mine infrastructure, gold and silver: 5.82006e-8 unit; lognormal variance with pedigree 0.3432, pedigree (2,3,5,5,1)
  Environmental report
  Uncertainty: E
- precious metal refinery: 5.5081e-8 unit; lognormal variance with pedigree 0.448, pedigree (4,5,5,5,5)
  Environmental report
  Uncertainty: E
- sodium cyanide: 0.869504, 5.35796 kg (2 suppliers, which the file names only by identifier); sum of these 6.22746 kg; lognormal variance with pedigree 0.0446, pedigree (2,4,5,5,1)
  (same comment as for charcoal)
  properties: carbon content, fossil 0.244898, dry mass 1 kg, heating value, net 7.43 MJ, wet mass 1 kg
- sodium hydroxide, without water, in 50% solution state: 0.0090137, 0.0923077 kg (2 suppliers, which the file names only by identifier); sum of these 0.101321 kg; lognormal variance with pedigree 0.0432, pedigree (2,3,5,5,1)
  (same comment as for charcoal)
  properties: dry mass 1 kg, heating value, net 3.03 MJ, wet mass 1 kg
- sulfidic tailings, from silver mine operation: -4519.08, -1400.34, -258.708, -372.634 kg (4 suppliers, which the file names only by identifier); sum of these -6550.77 kg; lognormal variance with pedigree 0.0034, pedigree (2,3,2,5,1)
  Estimation
  Uncertainty: E
  production volume; = tailings_BP/ silver_RP* silver_RP_PV
    Calculated from the production volume of silver in proportion to the respective output amounts.
  properties: aluminium content 0.017206, calcium content 0.003752, carbon content, fossil 0.0087785, dry mass 0.7 kg, iron content 0.013963, magnesium content 0.0020826, oxygen content 0.88851, potassium content 0.0032546, silicon content 0.055749, sodium content 0.0015368, water content 0.428571, wet mass 1 kg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
- sulfuric acid: 0.0051201, 0.000669691 kg (2 suppliers, which the file names only by identifier); sum of these 0.00578979 kg; lognormal variance with pedigree 0.0432, pedigree (2,3,5,5,1)
  (same comment as for charcoal)
  properties: dry mass 1 kg, wet mass 1 kg
- zinc: 0.025186 kg; lognormal variance with pedigree 0.0432, pedigree (2,3,5,5,1)
  (same comment as for charcoal)
  properties: dry mass 1 kg, wet mass 1 kg

## Inputs from nature
- Gold [natural resource, in ground]: 0.0102363 kg; lognormal variance with pedigree 0.0446, pedigree (2,4,5,5,1)
  1.1 ppm Au and 42 ppm Ag in ore; Estimation
  Uncertainty: E
- Silver [natural resource, in ground]: 0.383425 kg; lognormal variance with pedigree 0.0446, pedigree (2,4,5,5,1)
  42 ppm Ag and 1.1 ppm Au in ore; Estimation
  Uncertainty: E
- Water, unspecified natural origin [natural resource, in water]: 0.0836546 m3; name water_UNO_input; source Placer Dome Inc. 2003; lognormal variance with pedigree 0.0446, pedigree (2,4,5,5,1)
  Calculated value: Data was obtained from Papua New Guinea mining, scaled by milled ore.
  Proxy: Water is approximated with 'Water, unspecified natural origin'.
  Further references:
  Classen M. et al. (2009) Life cycle inventories of metals, Part IX: Gold and Silver. Ecoinvent centre, Dubendorf.
  Calculated value: Data was obtained from Papua New Guinea mining, scaled by milled ore.
  Proxy: Water is approximated with 'Water, unspecified natural origin'.
  Further references:
  Classen M. et al. (2009) Life cycle inventories of metals, Part IX: Gold and Silver. Ecoinvent centre, Dubendorf.
  Uncertainty: E

## Emissions to nature
- Carbon dioxide, fossil [air, non-urban air or from high stacks]: 0.801684 kg; lognormal variance with pedigree 0.0446, pedigree (2,4,5,5,1)
  Estimation, based on Swedish Data
  Uncertainty: E
- Copper ion [air, non-urban air or from high stacks]: 7.37081e-6 kg; lognormal variance with pedigree 0.6946, pedigree (2,4,5,5,1)
  Estimation, based on Swedish Data
  Uncertainty: E
- Lead II [air, non-urban air or from high stacks]: 2.39664e-6 kg; lognormal variance with pedigree 0.6946, pedigree (2,4,5,5,1)
  Estimation, based on Swedish Data
  Uncertainty: E
- Water [air, unspecified]: 0.0125483 m3; name water_to_air_unspecified; lognormal variance with pedigree 0.0827, pedigree (2,2,5,5,1)
  Calculated value based on literature values and expert opinion. See comments in the parametres' comment field.
  property fraction, origin: fresh water 0; name fraction_origin_fresh_water
  property fraction, origin: salt water 0; name fraction_origin_salt_water
  property fraction, origin: unspecified 1; name fraction_origin_unspecified
- Zinc II [air, non-urban air or from high stacks]: 2.03487e-6 kg; lognormal variance with pedigree 0.6946, pedigree (2,4,5,5,1)
  Estimation, based on Swedish Data
  Uncertainty: E
- Arsenic ion [water, ocean]: 0.000360523 kg; lognormal variance with pedigree 0.6946, pedigree (2,4,5,5,1)
  Estimation, based on PG-Data
  Uncertainty: E
- Cadmium II [water, ocean]: 0.00168796 kg; lognormal variance with pedigree 0.3546, pedigree (2,4,5,5,1)
  Estimation, based on PG-Data
  Uncertainty: E
- Copper ion [water, ocean]: 0.0935516 kg; lognormal variance with pedigree 0.3546, pedigree (2,4,5,5,1)
  Estimation, based on PG-Data
  Uncertainty: E
- Cyanide [water, ocean]: 0.151761 kg; lognormal variance with pedigree 0.3546, pedigree (2,4,5,5,1)
  Estimation, based on PG-Data
  Uncertainty: E
- Lead II [water, ocean]: 0.000247024 kg; lognormal variance with pedigree 0.6946, pedigree (2,4,5,5,1)
  Estimation, based on PG-Data
  Uncertainty: E
- Mercury II [water, ocean]: 3.8296e-6 kg; lognormal variance with pedigree 0.6946, pedigree (2,4,5,5,1)
  Estimation, based on PG-Data
  Uncertainty: E
- Nickel II [water, ocean]: 0.0224093 kg; lognormal variance with pedigree 0.6946, pedigree (2,4,5,5,1)
  Estimation, based on PG-Data
  Uncertainty: E
- Water [water, unspecified]: 0.0711073 m3; name water_to_water_unspecified; lognormal variance with pedigree 0.0827, pedigree (2,2,5,5,1)
  (same comment as for Water)
  property carbon content, fossil 0; name C_content_fossil
  property carbon content, non-fossil 0; name C_content_non_fossil
  property dry mass 0 kg; name DM
  property fraction, origin: fresh water 0; name fraction_origin_fresh_water_Ww
  property fraction, origin: salt water 0; name fraction_origin_salt_water_Ww
  property fraction, origin: unspecified 1; name fraction_origin_unspecified_Ww
  property water in wet mass 1000 kg; name WWM
  property wet mass 1000 kg; name WM
- Zinc II [water, ocean]: 0.595916 kg; lognormal variance with pedigree 0.6946, pedigree (2,4,5,5,1)
  Estimation, based on PG-Data
  Uncertainty: E

## Sampling procedure
environmental report

## Extrapolations
See Geography This dataset has been copied from an original dataset covering the geography CL. The uncertainty has been adjusted accordingly.
