# offshore platform production, natural gas

Dataset: EcoSpold 2, unit process
Geography: GLO
Time period: 1980-01-01 to 2023-12-31
Technology level: current
Classification: EcoSpold01Categories: natural gas/production
Classification: ISIC rev.4 ecoinvent: 3011:Building of ships and floating structures
Tags: ConvertedDataset
Scenario: Business-as-Usual
System model: Allocation, cut-off by classification
Generated by: Mireille Faist Emmenegger (obsolete)
Published in: Faist Emmenegger, M. 2007
Database: ecoinvent
isCopyrightProtected: true
accessRestrictedTo: 1

## General comment
Data relates to the platform Odin, which belonged to Esso Norway. The life time is 11 years with a total production of 27.7 Mrd. Nm3 natural gas.
[This dataset was already contained in the ecoinvent database version 2. It was not individually updated during the transfer to ecoinvent version 3. Life Cycle Impact Assessment results may still have changed, as they are affected by changes in the supply chain, i.e. in other datasets. This dataset was generated following the ecoinvent quality guidelines for version 2. It may have been subject to central changes described in the ecoinvent version 3 change report (http://www.ecoinvent.org/database/ecoinvent-version-3/reports-of-changes/), and the results of the central updates were reviewed extensively. The changes added e.g. consistent water flows and other information throughout the database. The documentation of this dataset can be found in the ecoinvent reports of version 2, which are still available via the ecoinvent website. The change report linked above covers all central changes that were made during the conversion process.]

## Included activities end
Material and energy requirements of a natural gas offshore platform.

## Geography
The Odin platform was situated in the North Sea, 178 km off the coast west of Bergen.

## Technology
Data relates to the platform Odin, which belonged to Esso Norway. The Odin platform is a gas installation with a steel jacket, on top drilling equipment, living quarters. It is fairly small (40x40x112 meters). The platform was installed in 1983 and the field closed in 1994. 1996 the platform was brought ashore for dismantling.

## Time period
Energy and water requirements out of 1980 data. The material requirements were reported in 1996.

## Parameters
- fraction, process water, to air: 0.15 dimensionless; name fraction_PW_to_air; lognormal variance with pedigree 0.092025, pedigree (4,4,3,2,4)
  Literature value. In case when no industry/process specific data are available, default evaporation fraction value is used. This value is 15% and is based on literature (Statistics Canada, 2007 & Shaffer, K.H., 2008, Consumptive water use in the Great Lakes Basin, USGS & Shiklomanov, 2003, World Water Resources at the Beginning of the 21st Century) and has been approved by an expert.
- fraction, tap water, to air: 0.15 dimensionless; name fraction_TW_to_air; = fraction_PW_to_air; lognormal variance with pedigree 0.092025, pedigree (4,4,3,2,4)
  Calculated value. See comment in the other parametres present in this dataset. Tap water is considered to be always used as process water, thus process water fractions to air are applied to all tap water input flows to calculate the amount of water consumed in the processes.

## Reference product
- offshore platform, natural gas: 1 unit; By-product classification allocatable product; CPC 49320: Floating or submersible drilling or production platforms
  EcoSpold01Location=OCE
  production volume 1 unit
    27.7E9 Sm3 natural gas
    Dummy value to be replaced by measured, estimated or calculated value
  property price 1.10296e7 EUR2005
    Calculated based on inputs: The price of the product has been calculated as a sum of the values of the material and energy inputs for this product. This value is therefore a rough estimation. It may underestimate the real price since there are additional expenses when producing any product. These expences can include for example labour costs, treatment of waste materials and profit for the producer. Please consider carefully whether this level of data quality is acceptable for your application.
  properties: carbon allocation 0 kg, carbon content 0

## Inputs from technosphere
- aluminium, cast alloy: 80960 kg; lognormal variance with pedigree 0.0606, pedigree (2,4,5,1,3)
  EcoSpold01Location=RER
  Greenpeace report, one platform, standard module
  Uncertainty: Greenpeace report, one platform, standard module
  properties: dry mass 1 kg, wet mass 1 kg
- aluminium, wrought alloy: 172040 kg; lognormal variance with pedigree 0.0606, pedigree (2,4,5,1,3)
  Greenpeace report, one platform, standard module
  EcoSpold01Location=RER
  Uncertainty: Greenpeace report, one platform, standard module
  properties: dry mass 1 kg, wet mass 1 kg
- cast iron: 303 kg; lognormal variance with pedigree 1.448, pedigree (5,5,5,1,1)
  EcoSpold01Location=RER
  Estimation for aluminium anode, basic uncertainity estimated = 10
  Uncertainty: Estimation for aluminium anode, basic uncertainity estimated = 10
  properties: carbon content, fossil 0.04, dry mass 1 kg, wet mass 1 kg
  note on carbon content, fossil: Cast iron is made by remelting pig iron in small furnaces (e.g. cupola furnaces or electric arc furnaces) and poured into moulds to make castings. It usually contains 2% to 6% carbon (ecoinvent v2.2 report 10_partII). An average content of 4% was considered
- concrete, normal strength: 4090 m3; lognormal variance with pedigree 0.0606, pedigree (2,4,5,1,3)
  Greenpeace report, one platform, standard module
  EcoSpold01Location=CH
  Uncertainty: Greenpeace report, one platform, standard module
  properties: dry mass 2190 kg, water content 0.086758, wet mass 2380 kg
- copper, cathode: 15.2 kg; lognormal variance with pedigree 1.448, pedigree (5,5,5,1,1)
  Estimation for aluminium anode, basic uncertainity estimated = 10
  EcoSpold01Location=RER
  Uncertainty: Estimation for aluminium anode, basic uncertainity estimated = 10
  properties: dry mass 1 kg, wet mass 1 kg
- diesel, burned in building machine: 1.16e8 MJ; lognormal variance with pedigree 0.054, pedigree (3,4,5,1,1)
  Calculated based on data from 1980
  EcoSpold01Location=GLO
  Uncertainty: calculated based on data from 1980
  properties: heating value, net 1 MJ
- electricity, medium voltage: 2.12e7 kWh; lognormal variance with pedigree 0.054, pedigree (3,4,5,1,1)
  EcoSpold01Location=UCTE
  Calculated based on data from 1980
  Uncertainty: calculated based on data from 1980
- epoxy resin, liquid: 60298, 12702 kg (2 suppliers, which the file names only by identifier); sum of these 73000 kg; lognormal variance with pedigree 0.134025, pedigree (3,4,5,2,4)
  EcoSpold01Location=RER
  Data for wind turbines
  Uncertainty: Data for wind turbines
  properties: carbon content, fossil 0.42325, dry mass 1 kg, heating value, net 12.82 MJ, wet mass 1 kg
- polyvinylchloride, bulk polymerised: 30000 kg; lognormal variance with pedigree 0.0606, pedigree (2,4,5,1,3)
  (same comment as for aluminium, cast alloy)
  properties: carbon content, fossil 0.387097, dry mass 1 kg, heating value, net 21.5 MJ, wet mass 1 kg
  note on carbon content, fossil: Monomer is vynyl chloride, C2H3Cl (ecoinvent v2.2 report 11_II). MW=62 g/mol
- silicon, metallurgical grade: 379 kg; lognormal variance with pedigree 1.448, pedigree (5,5,5,1,1)
  EcoSpold01Location=NO
  Estimation for aluminium anode, basic uncertainity estimated = 10
  Uncertainty: Estimation for aluminium anode, basic uncertainity estimated = 10
  properties: dry mass 1 kg, wet mass 1 kg
- steel, low-alloyed, hot rolled: 1.31e7 kg; lognormal variance with pedigree 0.0606, pedigree (2,4,5,1,3)
  (same comment as for aluminium, cast alloy)
  properties: carbon content, fossil 0.005, dry mass 1 kg, wet mass 1 kg
  note on carbon content, fossil: Low alloyed steel composition given in Tab. 3.2 ecoinvent v2.2 report 10_partII. Steel assumed to have a C content of 0.5%
- tap water: 2.83e6 kg; name tap_water_input; lognormal variance with pedigree 0.054, pedigree (3,4,5,1,1)
  Calculated based on data from 1980
  EcoSpold01Location=RER
  Uncertainty: calculated based on data from 1980
  properties: carbon content, fossil 0.00178991, dry mass 0.000337476 kg, water content 2962.17, wet mass 1 kg
  note on carbon content, fossil: Bicarbonate content is 2.93 mol/m3. CO2 content is 0.1 mol/m3 (ecoinvent v2.2 report 8, Tab 93.1).
- zinc: 7820 kg; lognormal variance with pedigree 0.0606, pedigree (2,4,5,1,3)
  (same comment as for aluminium, wrought alloy)
  properties: dry mass 1 kg, wet mass 1 kg

## Inputs from nature
- Occupation, seabed, infrastructure [natural resource, land]: 17600 m2*year; lognormal variance with pedigree 0.0926, pedigree (2,4,5,1,1)
  Greenpeace report, one platform
  Uncertainty: Greenpeace report, one platform
- Transformation, from seabed, infrastructure [natural resource, land]: 1600 m2; lognormal variance with pedigree 0.1726, pedigree (2,4,5,1,1)
  Greenpeace report, one platform
  Uncertainty: Greenpeace report, one platform
- Transformation, from seabed, unspecified [natural resource, land]: 1600 m2; lognormal variance with pedigree 0.1726, pedigree (2,4,5,1,1)
  Greenpeace report, one platform
  Uncertainty: Greenpeace report, one platform
- Transformation, to seabed, infrastructure [natural resource, land]: 1600 m2; lognormal variance with pedigree 0.1726, pedigree (2,4,5,1,1)
  Greenpeace report, one platform
  Uncertainty: Greenpeace report, one platform
- Transformation, to seabed, unspecified [natural resource, land]: 1600 m2; lognormal variance with pedigree 0.1726, pedigree (2,4,5,1,1)
  Greenpeace report, one platform
  Uncertainty: Greenpeace report, one platform

## Emissions to nature
- Water [air, unspecified]: 424.5 m3; name water_to_air_unspecified; = (tap_water_input/1000*fraction_TW_to_air); lognormal variance with pedigree 0.0807, pedigree (2,2,5,1,1)
  Calculated value based on literature values and expert opinion. See comments in the parametres' comment field.
  property fraction, origin: fresh water 1; name fraction_origin_fresh_water
  property fraction, origin: salt water 0; name fraction_origin_salt_water
  property fraction, origin: unspecified 0; name fraction_origin_unspecified
- Aluminium III [water, ocean]: 215000 kg; lognormal variance with pedigree 1.448, pedigree (5,5,5,1,1)
  Estimation 85% utilisation of anode
  Uncertainty: Estimation 85% utilisation of anode
- Copper ion [water, ocean]: 12.9 kg; lognormal variance with pedigree 1.448, pedigree (5,5,5,1,1)
  Estimation 85% utilisation of anode
  Uncertainty: Estimation 85% utilisation of anode
- Iron ion [water, ocean]: 258 kg; lognormal variance with pedigree 1.448, pedigree (5,5,5,1,1)
  Estimation 85% utilisation of anode
  Uncertainty: Estimation 85% utilisation of anode
- Silicon [water, ocean]: 322 kg; lognormal variance with pedigree 1.448, pedigree (5,5,5,1,1)
  Estimation 85% utilisation of anode
  Uncertainty: Estimation 85% utilisation of anode
- Titanium ion [water, ocean]: 53.7 kg; lognormal variance with pedigree 1.448, pedigree (5,5,5,1,1)
  Estimation 85% utilisation of anode
  Uncertainty: Estimation 85% utilisation of anode
- Water [water, unspecified]: 2405.5 m3; name water_to_water_unspecified; = (tap_water_input/1000)*(1-fraction_TW_to_air); lognormal variance with pedigree 0.0807, pedigree (2,2,5,1,1)
  (same comment as for Water)
  property carbon content, fossil 0; name C_content_fossil
  property carbon content, non-fossil 0; name C_content_non_fossil
  property dry mass 0 kg; name DM
  property fraction, origin: fresh water 1; name fraction_origin_fresh_water_Ww
  property fraction, origin: salt water 0; name fraction_origin_salt_water_Ww
  property fraction, origin: unspecified 0; name fraction_origin_unspecified_Ww
  property water in wet mass 1000 kg; name WWM
  property wet mass 1000 kg; name WM
- Zinc II [water, ocean]: 6650 kg; lognormal variance with pedigree 1.448, pedigree (5,5,5,1,1)
  Estimation 85% utilisation of anode
  Uncertainty: Estimation 85% utilisation of anode

## Sampling procedure
No information on sampling procedure. Standard transport distances are used.

## Extrapolations
The data for Odin are extrapolated for GLO. The total quantity of material is about 30% less as in Frischknecht et al. 1996. It is assumed that after dismantling ashore the materials are dumped in landfill. The energy and water requirements for construction and installation of the platform are assumed to be correlating to the weight of the equipment in the same relation as for the Leman field in Klitz 1980.

## Review by Michael Spielmann (obsolete) 2003-07-30
Passed.
