# electricity, high voltage, import from CA-BC

Dataset: EcoSpold 2, unit process
Geography: US-WECC
Time period: 2021-01-01 to 2023-12-31
Technology level: current
Classification: ISIC rev.4 ecoinvent: 3510:Electric power generation, transmission and distribution
Tags: United States
Scenario: Business-as-Usual
System model: Allocation, cut-off by classification
Generated by: Karin Treyer
Published in: National Energy Board 2009
Database: ecoinvent
isCopyrightProtected: true
accessRestrictedTo: 1

## General comment
This dataset represents the amount of imported electricity from BC to US-WECC. The import value includes all electricity imports, independently whether used within the importing country, or re-exported. For a discussion of different ways of modeling electricity trade in LCI, please refer to (Itten & Frischknecht 2012).
For structural reasons of the ecoinvent database the annual import volume is set to zero in this dataset. The import volume is considered directly in the respective high voltage electricity market of the importing geography.

## Included activities start
This activity represents the point of 'handing over' the electricity from one country to the other at the border.

## Included activities end
This dataset doesn't include any electricity losses or transmission infrastructure as these are accounted for in the market datasets.

## Reference product
- electricity, high voltage: 1 kWh; By-product classification allocatable product; CPC 17100: Electrical energy; HS2017 271600: Electrical energy
  production volume 1.24485e10 kWh
    For structural reasons of the ecoinvent database the annual import volume is set to zero in this dataset. The import volume is considered directly in the respective high voltage electricity market of the importing geography.
  property price 0.0977 EUR2005
    Temporary price data. Calculated as 90% of purchasers price based on: 94% of the average price (to account for a 6% loss in transformation and transmission) for electricity for industrial consumersin 2005 (excluded taxes). From IEA.
  properties: carbon allocation 0 kg, carbon content 0

## Inputs from technosphere
- electricity, high voltage: 1 kWh
  activityLink added to better reflect the reality of the supply chain

## Sampling procedure
Literature

## Review by Carl Vadenbo 2015-08-04
The update of the whole electricity sector for the ecoinvent v3.2 database consist of hundreds of datasets. All these datasets have passed through a streamlined review processes where the underlying modelling of production volumes, technology shares and efficiencies was reviewed in detail prior to the datasets being submitted to the database.
