# wood pellets, burned in stirling heat and power co-generation unit, 3kW electrical, future

Dataset: EcoSpold 2, unit process
Geography: RoW
Time period: 2000-01-01 to 2023-12-31
Technology level: current
Classification: EcoSpold01Categories: biomass/cogeneration
Classification: ISIC rev.4 ecoinvent: 3530:Steam and air conditioning supply
Tags: with true value; ConvertedDataset
Scenario: Business-as-Usual
System model: Allocation, cut-off by classification
Generated by: Alex Primas
Published in: Primas A. 2007
Database: ecoinvent
isCopyrightProtected: true
accessRestrictedTo: 1

## General comment
The multioutput-process 'wood pellets, burned in Stirling cogen unit 1kWe, future" delivers the coproducts 'heat, pellets, allocation exergy, at Stirling cogen unit 3kWe, future' and 'electricity, pellets, allocation exergy, at Stirling cogen unit 3kWe, future'. The exergy allocation is the allocation scheme suggested to be used within the ecoinvent database (e.g. in electricity mixes).
[This dataset was already contained in the ecoinvent database version 2. It was not individually updated during the transfer to ecoinvent version 3. Life Cycle Impact Assessment results may still have changed, as they are affected by changes in the supply chain, i.e. in other datasets. This dataset was generated following the ecoinvent quality guidelines for version 2. It may have been subject to central changes described in the ecoinvent version 3 change report (http://www.ecoinvent.org/database/ecoinvent-version-3/reports-of-changes/), and the results of the central updates were reviewed extensively. The changes added e.g. consistent water flows and other information throughout the database. The documentation of this dataset can be found in the ecoinvent reports of version 2, which are still available via the ecoinvent website. The change report linked above covers all central changes that were made during the conversion process.]

## Included activities end
The module includes fuel input, infrastructure, emissions to air, and working materials for operation.

## Geography
Wood pellet input modelled for Switzerland. Process applicable in central European conditions.

## Technology
Stirling motor for combustion of wood pellets. Power range: 1-3 kW electrical output, 4.5-10.5 kW heat output. Includes pellet storage volume for one day of operation. Electrical efficiency 23%, total efficiency 90%. Performance and lifetime according to expected future values for a serial product. Emission values based on similar processes and assumptions due to yet missing emission measurements.

## Reference product
- heat, future: 1 MJ; By-product classification allocatable product; CPC 17300: Steam and hot water
  EcoSpold01Location=CH
  production volume 0 MJ
    Future technology, not available today.
  property Corresponding fuel use 2.4557 MJ; name fuel_use; = 0.00012254*20040/1
    Lower heating value of the fuel input related to the heat/electricity output
  property exergy 0.1393 MJ; name exergy
    allocation factor for electricity (=1) vs. heat, where heat is calculated as the termodynamic mean temperature Tm = (Tfeed-Treturn)/ln(Tfeed/Treturn), relative to the application temperature (Tu, typically = 293 K), i.e. (Tm-Tu)/Tm
  property price 0.0106 EUR2005
    Average European district heat price from Ecoheatcool and Euroheat 2005-2006, Ecoheat Work package 1: The European heat market. Final report. 10.6 EUR/GJ i s the price of district heat. http://www.solarthermalworld.org/files/Ecoheatcool%20WP1%20Web.pdf?download
  property true value relation 0.1393; name true_value_relation
    property to calculate "true value" from
  properties: allocation factor 0.288655, carbon allocation 0 kg, carbon content 0, heating value, net 1 MJ, true value 0.00600493

## Inputs from technosphere
- electricity, low voltage: 2.1925e-5, 9.787e-7, 1.53907e-5, 0.000319454, 3.15317e-5, 1.96404e-7, 7.24008e-5, 0.000109983, 5.44865e-6 kWh (9 suppliers, which the file names only by identifier); sum of these 0.000577309 kWh; lognormal variance with pedigree 0.056, pedigree (3,4,5,5,1)
  EcoSpold01Location=CH
  Company data
  Uncertainty: company data
- maintenance, stirling heat and power co-generation unit, 3kW electrical, wood pellet, future: 2.3954e-6 unit; lognormal variance with pedigree 0.356, pedigree (3,4,5,5,1)
  Uncertainty of maintenance cycle
  EcoSpold01Location=CH
  Uncertainty: uncertainty of maintenance cycle
- stirling heat and power co-generation unit, 3kW electrical, wood pellet, future: 1.71039e-7 unit; lognormal variance with pedigree 0.356, pedigree (3,4,5,5,1)
  EcoSpold01Location=CH
  Uncertainty of life time
  Uncertainty: uncertainty of life time
- storage, 650 l mini CHP plant: 1.69746e-7 unit; lognormal variance with pedigree 0.3532, pedigree (2,3,5,5,1)
  EcoSpold01Location=CH
  Uncertainty of life time
  Uncertainty: uncertainty of life time
- wood ash mixture, pure: -7.09963e-5, -4.36039e-5 kg (2 suppliers, which the file names only by identifier); sum of these -0.0001146 kg
  EcoSpold01Location=CH
  Calculated from pellet input
  production volume
    Calculated from the production volume of heat, future in proportion to the respective output amounts.
  properties: carbon content, non-fossil 0.012, dry mass 1 kg, wet mass 1 kg
- wood pellet, measured as dry mass: 0.0229911 kg; lognormal variance with pedigree 0.0427, pedigree (2,2,5,5,1)
  EcoSpold01Location=RER
  Uncertainty on energy and water content, and bulk density
  Uncertainty: uncertainty on energy and water content, and bulk density
  properties: carbon content, non-fossil 0.494, dry mass 1 kg, heating value, net 13.38 MJ, water content 0.1, wet mass 1.1 kg
  note on carbon content, non-fossil: C content of dry mass is 0.494 kgC/kg dry wood (ecoinvent v2.2 report 9).

## Emissions to nature
- Acetaldehyde [air, urban air close to ground]: 2.62805e-8 kg; lognormal variance with pedigree 0.188, pedigree (4,5,5,5,4)
  Estimate based on data for wood boiler
  Uncertainty: estimate based on data for wood boiler
- Ammonia [air, urban air close to ground]: 7.45332e-7 kg; lognormal variance with pedigree 0.158, pedigree (4,5,5,5,4)
  Estimate based on data for wood boiler
  Uncertainty: estimate based on data for wood boiler
- Arsenic ion [air, urban air close to ground]: 4.30828e-10 kg; lognormal variance with pedigree 0.798, pedigree (4,5,5,5,4)
  Estimate based on data for wood boiler
  Uncertainty: estimate based on data for wood boiler
- Benzene [air, urban air close to ground]: 3.92053e-7 kg; lognormal variance with pedigree 0.188, pedigree (4,5,5,5,4)
  Estimate based on data for wood boiler
  Uncertainty: estimate based on data for wood boiler
- Benzo(a)pyrene [air, urban air close to ground]: 2.15414e-10 kg; lognormal variance with pedigree 0.448, pedigree (4,5,5,5,4)
  Estimate based on data for wood boiler
  Uncertainty: estimate based on data for wood boiler
- Bromine [air, urban air close to ground]: 2.58497e-8 kg; lognormal variance with pedigree 0.798, pedigree (4,5,5,5,4)
  Estimate based on data for wood boiler
  Uncertainty: estimate based on data for wood boiler
- Cadmium II [air, urban air close to ground]: 3.01579e-10 kg; lognormal variance with pedigree 0.798, pedigree (4,5,5,5,4)
  Estimate based on data for wood boiler
  Uncertainty: estimate based on data for wood boiler
- Calcium II [air, urban air close to ground]: 2.52034e-6 kg; lognormal variance with pedigree 0.798, pedigree (4,5,5,5,4)
  Estimate based on data for wood boiler
  Uncertainty: estimate based on data for wood boiler
- Carbon dioxide, non-fossil [air, urban air close to ground]: 0.0416193 kg; lognormal variance with pedigree 0.0512, pedigree (2,5,5,5,1)
  Calculated from composition of wood pellets
  Uncertainty: calculated from composition of wood pellets
- Carbon monoxide, non-fossil [air, urban air close to ground]: 1.37865e-5 kg; lognormal variance with pedigree 0.7646, pedigree (2,4,5,5,4)
  Estimate based on larger unit or other technology
  Uncertainty: estimate based on larger unit or other technology
- Chlorine [air, urban air close to ground]: 7.7549e-8 kg; lognormal variance with pedigree 0.188, pedigree (4,5,5,5,4)
  Estimate based on data for wood boiler
  Uncertainty: estimate based on data for wood boiler
- Chromium III [air, urban air close to ground]: 1.70608e-9 kg; lognormal variance with pedigree 0.798, pedigree (4,5,5,5,4)
  Estimate based on data for wood boiler
  Uncertainty: estimate based on data for wood boiler
- Chromium VI [air, urban air close to ground]: 1.72331e-11 kg; lognormal variance with pedigree 0.798, pedigree (4,5,5,5,4)
  Estimate based on data for wood boiler
  Uncertainty: estimate based on data for wood boiler
- Copper ion [air, urban air close to ground]: 9.47821e-9 kg; lognormal variance with pedigree 0.798, pedigree (4,5,5,5,4)
  Estimate based on data for wood boiler
  Uncertainty: estimate based on data for wood boiler
- Dinitrogen monoxide [air, urban air close to ground]: 1.29248e-6 kg; lognormal variance with pedigree 0.188, pedigree (4,5,5,5,4)
  Estimate based on data for wood boiler
  Uncertainty: estimate based on data for wood boiler
- Dioxins, measured as 2,3,7,8-tetrachlorodibenzo-p-dioxin [air, urban air close to ground]: 1.33557e-14 kg; lognormal variance with pedigree 0.448, pedigree (4,5,5,5,4)
  Estimate based on data for wood boiler
  Uncertainty: estimate based on data for wood boiler
- Ethyl benzene [air, urban air close to ground]: 1.29248e-8 kg; lognormal variance with pedigree 0.188, pedigree (4,5,5,5,4)
  Estimate based on data for wood boiler
  Uncertainty: estimate based on data for wood boiler
- Fluorine [air, urban air close to ground]: 2.15414e-8 kg; lognormal variance with pedigree 0.188, pedigree (4,5,5,5,4)
  Estimate based on data for wood boiler
  Uncertainty: estimate based on data for wood boiler
- Formaldehyde [air, urban air close to ground]: 5.60076e-8 kg; lognormal variance with pedigree 0.188, pedigree (4,5,5,5,4)
  Estimate based on data for wood boiler
  Uncertainty: estimate based on data for wood boiler
- Hexachlorobenzene [air, urban air close to ground]: 3.10196e-15 kg; lognormal variance with pedigree 0.448, pedigree (4,5,5,5,4)
  Estimate based on data for wood boiler
  Uncertainty: estimate based on data for wood boiler
- Hydrocarbons, aliphatic, alkanes, unspecified [air, urban air close to ground]: 3.92053e-7 kg; lognormal variance with pedigree 0.188, pedigree (4,5,5,5,4)
  Estimate based on data for wood boiler
  Uncertainty: estimate based on data for wood boiler
- Hydrocarbons, aliphatic, unsaturated [air, urban air close to ground]: 1.33557e-6 kg; lognormal variance with pedigree 0.188, pedigree (4,5,5,5,4)
  Estimate based on data for wood boiler
  Uncertainty: estimate based on data for wood boiler
- Lead II [air, urban air close to ground]: 1.07707e-8 kg; lognormal variance with pedigree 0.798, pedigree (4,5,5,5,4)
  Estimate based on data for wood boiler
  Uncertainty: estimate based on data for wood boiler
- Magnesium [air, urban air close to ground]: 1.55098e-7 kg; lognormal variance with pedigree 0.798, pedigree (4,5,5,5,4)
  Estimate based on data for wood boiler
  Uncertainty: estimate based on data for wood boiler
- Manganese II [air, urban air close to ground]: 7.32407e-8 kg; lognormal variance with pedigree 0.798, pedigree (4,5,5,5,4)
  Estimate based on data for wood boiler
  Uncertainty: estimate based on data for wood boiler
- Mercury II [air, urban air close to ground]: 1.29248e-10 kg; lognormal variance with pedigree 0.798, pedigree (4,5,5,5,4)
  Estimate based on data for wood boiler
  Uncertainty: estimate based on data for wood boiler
- Methane, non-fossil [air, urban air close to ground]: 1.72331e-7 kg; lognormal variance with pedigree 0.188, pedigree (4,5,5,5,4)
  Estimate based on data for wood boiler
  Uncertainty: estimate based on data for wood boiler
- NMVOC, non-methane volatile organic compounds [air, urban air close to ground]: 9.90904e-7 kg; lognormal variance with pedigree 0.188, pedigree (4,5,5,5,4)
  Estimate based on data for wood boiler
  Uncertainty: estimate based on data for wood boiler
- Nickel II [air, urban air close to ground]: 2.58497e-9 kg; lognormal variance with pedigree 0.798, pedigree (4,5,5,5,4)
  Estimate based on data for wood boiler
  Uncertainty: estimate based on data for wood boiler
- Nitrogen oxides [air, urban air close to ground]: 3.01579e-5 kg; lognormal variance with pedigree 0.1646, pedigree (2,4,5,5,4)
  (same comment as for Carbon monoxide, non-fossil)
- PAH, polycyclic aromatic hydrocarbons [air, urban air close to ground]: 4.78219e-9 kg; lognormal variance with pedigree 0.448, pedigree (4,5,5,5,4)
  Estimate based on data for wood boiler
  Uncertainty: estimate based on data for wood boiler
- Particulate Matter, < 2.5 um [air, urban air close to ground]: 4.30828e-6 kg; lognormal variance with pedigree 0.442, pedigree (4,4,5,5,4)
  Estimate based on other technology
  Uncertainty: estimate based on other technology
- Pentachlorophenol [air, urban air close to ground]: 3.48971e-12 kg; lognormal variance with pedigree 0.188, pedigree (4,5,5,5,4)
  Estimate based on data for wood boiler
  Uncertainty: estimate based on data for wood boiler
- Phosphorus [air, urban air close to ground]: 1.29248e-7 kg; lognormal variance with pedigree 0.188, pedigree (4,5,5,5,4)
  Estimate based on data for wood boiler
  Uncertainty: estimate based on data for wood boiler
- Potassium I [air, urban air close to ground]: 1.00814e-5 kg; lognormal variance with pedigree 0.798, pedigree (4,5,5,5,4)
  Estimate based on data for wood boiler
  Uncertainty: estimate based on data for wood boiler
- Sodium I [air, urban air close to ground]: 5.60076e-7 kg; lognormal variance with pedigree 0.798, pedigree (4,5,5,5,4)
  Estimate based on data for wood boiler
  Uncertainty: estimate based on data for wood boiler
- Sulfur dioxide [air, urban air close to ground]: 1.07707e-6 kg; lognormal variance with pedigree 0.148, pedigree (4,5,5,5,4)
  Estimate based on data for wood boiler
  Uncertainty: estimate based on data for wood boiler
- Toluene [air, urban air close to ground]: 1.29248e-7 kg; lognormal variance with pedigree 0.188, pedigree (4,5,5,5,4)
  Estimate based on data for wood boiler
  Uncertainty: estimate based on data for wood boiler
- Zinc II [air, urban air close to ground]: 1.29248e-7 kg; lognormal variance with pedigree 0.798, pedigree (4,5,5,5,4)
  Estimate based on data for wood boiler
  Uncertainty: estimate based on data for wood boiler
- m-Xylene [air, urban air close to ground]: 5.16993e-8 kg; lognormal variance with pedigree 0.188, pedigree (4,5,5,5,4)
  Estimate based on data for wood boiler
  Uncertainty: estimate based on data for wood boiler

## Sampling procedure
Literature data and manufacturer information

## Extrapolations
none This dataset has been copied from an original dataset covering the geography CH. The uncertainty has been adjusted accordingly.

## Review by Rolf Frischknecht 2007-09-25
passed
none

## Review by Emilia Moreno Ruiz 2012-04-16
calculation of fuel use property.
