# lime production, milled, packed

Dataset: EcoSpold 2, unit process
Geography: Europe without Switzerland
Time period: 2000-01-01 to 2023-12-31
Technology level: current
Classification: EcoSpold01Categories: construction materials/others
Classification: ISIC rev.4 ecoinvent: 0810:Quarrying of stone, sand and clay
Scenario: Business-as-Usual
System model: Allocation, cut-off by classification
Generated by: Carl Vadenbo
Published in: Kellenberger D. 2007
Database: ecoinvent
isCopyrightProtected: true
accessRestrictedTo: 1

## General comment
This dataset represents the packing of 1 kg of milled lime. This activity was created as a copy of the corresponding activity for Switzerland. Production volume and uncertainties have been adjusted accordingly. Comment from the original dataset (for Switzerland): The dataset is based on the module 'packing, lime products'.
Water flows were removed for v3.5 as they are included in supplying activity 'lime production, milled, loose'.

## Included activities start
Packing process starting from milled lime, unpacked.

## Included activities end
The activity ends with the product packed at the factory. The dataset includes the packing and the heating energy requirements for packing production and administration.

## Geography
Comment from the original dataset (for Switzerland): Data is based on a Swiss company.

## Technology
Comment from the original dataset (for Switzerland): Data corresponds to the current Swiss technology.

## Parameters
- fraction, process water, to air: 0.291902 dimensionless; name fraction_PW_to_air; lognormal variance with pedigree 0.092025, pedigree (4,4,3,2,4)
  Comment from the original dataset (for Switzerland): Calculated based on literature value (IPPC, 2010) (Vionnet, S., Quantis Water Database - Technical Report, 2012).

## Reference product
- lime, packed: 1 kg; By-product classification allocatable product; CPC 37420: Quicklime, slaked lime and hydraulic lime; HS2017 252100: Limestone flux; limestone and other calcareous stone, of a kind used for the manufacture of lime or cement; CAS 1305-78-8
  Comment from the original dataset (for Switzerland): Estimation, based on personal communication. Data corresponds to the Swiss company KFN for the year 2001.
  production volume 1.32237 kg; = 0.330592352*4
    This is a placeholder value that does not reflect real-world production volumes. This dataset does not currently require a real-world production volume to work in the database framework, and no actual data were collected yet. This has no negative effect on the results of the ecoinvent database. The placeholder value of this activity was scaled according to the nominal GDP of 2005 (source: United Nations, http://data.un.org/Glossary.aspx?q=GDP+%28current+US%24%29, accessed 20130726) to reflect an appropriate share of the global production volume, which is also a placeholder value.
  property carbon content, fossil 0.117492
    Table 3.1, ecoinvent v2.2 report 7, part VII, pg 3. MW CaCO3=100, MW MgCO3=84
  property price 0.121242 EUR2005
    Calculated based on inputs: The price of the product has been calculated as a sum of the values of the material and energy inputs for this product. This value is therefore a rough estimation. It may underestimate the real price since there are additional expenses when producing any product. These expences can include for example labour costs, treatment of waste materials and profit for the producer. Please consider carefully whether this level of data quality is acceptable for your application.
  properties: carbon allocation 0.117257 kg, carbon content 0.117492, carbon content, non-fossil 0, dry mass 0.998 kg, heating value, net 0 MJ, water content 0.00200401, water in wet mass 0.002 kg, wet mass 1 kg

## Inputs from technosphere
- heat, central or small-scale, other than natural gas: 0.00141 MJ; lognormal variance with pedigree 0.0427, pedigree (1,4,5,3,2)
  (same comment as for lime, packed)
  properties: heating value, net 1 MJ
- lime: 1 kg; lognormal variance with pedigree 0.0427, pedigree (1,4,5,3,2)
  (same comment as for lime, packed)
  properties: carbon content, fossil 0.120005, dry mass 1 kg, wet mass 1 kg
- packing, lime product: 1 kg; lognormal variance with pedigree 0.3712, pedigree (4,3,5,5,2)
  Comment from the original dataset (for Switzerland): Estimation, based on personal communication. Data corresponds to the Swiss company KFN for the year 2001.
  This exchange has an activity link directly to the producing activity because the product is primarily consumed in the same geographical area where it is produced.

## Sampling procedure
Comment from the original dataset (for Switzerland): Data is from only one company in Switzerland (KFN).

## Extrapolations
This activity was created as a copy of the corresponding activity for Switzerland, which was based on data for one Swiss company. Production volume and uncertainties have been adjusted accordingly.
