# anodising, aluminium sheet

Dataset: EcoSpold 2, unit process
Geography: RoW
Time period: 1996-01-01 to 2023-12-31
Technology level: current
Classification: ISIC rev.4 ecoinvent: 2592:Treatment and coating of metals; machining
Classification: EcoSpold01Categories: metals/processing
Synonyms: Anodisieren
Tags: ConvertedDataset
Scenario: Business-as-Usual
System model: Allocation, cut-off by classification
Generated by: Hans-Jörg Althaus
Published in: Althaus H.-J. 2004
Database: ecoinvent
isCopyrightProtected: true
accessRestrictedTo: 1

## General comment
Colourless anodising is inventoried. The coating thickness is 20 um.
[This dataset was already contained in the ecoinvent database version 2. It was not individually updated during the transfer to ecoinvent version 3. Life Cycle Impact Assessment results may still have changed, as they are affected by changes in the supply chain, i.e. in other datasets. This dataset was generated following the ecoinvent quality guidelines for version 2. It may have been subject to central changes described in the ecoinvent version 3 change report (http://www.ecoinvent.org/database/ecoinvent-version-3/reports-of-changes/), and the results of the central updates were reviewed extensively. The changes added e.g. consistent water flows and other information throughout the database. The documentation of this dataset can be found in the ecoinvent reports of version 2, which are still available via the ecoinvent website. The change report linked above covers all central changes that were made during the conversion process.]

## Included activities start
The activity starts with the workpiece entering the process. The material on which this activity is applied it is not included as input.

## Included activities end
Mechanical surface treatment (50% of the workpieces), degreasing, pickling, anodising (20 um layer thickness) and sealing. Waste water treatment is included. Dying is not included.

## Geography
Swiss waste treatment assumed

## Technology
Porous anodising

## Parameters
- fraction, cooling water, cooling pond system, to air: 0 dimensionless; normal variance with pedigree 1, pedigree (2,3,1,3,1)
- fraction, cooling water, once-through system, to air: 0.004 dimensionless; name fraction_CW_OT_to_air; lognormal variance with pedigree 0.0413, pedigree (2,3,1,3,1)
  Calculated based on literature value (Scown, C.D., 2011, Water Footprint of U.S. Transportation Fuels and supplying information of the article) (Vionnet, S., Quantis Water Database - Technical Report, 2012).
- fraction, cooling water, recirculating system, to air: 0.771 dimensionless; name fraction_CW_R_to_air; lognormal variance with pedigree 0.0413, pedigree (2,3,1,3,1)
  (same comment as for fraction, cooling water, once-through system, to air)
- fraction, cooling water, to air: 0.3875 dimensionless; name fraction_CW_to_air; = (0.5*fraction_CW_OT_to_air)+(0.5*fraction_CW_R_to_air); lognormal variance with pedigree 0.092025, pedigree (4,4,3,2,4)
  Calculated value based on literature value (see comments of the other parametres present in this dataset) and expert opinion. In the case when no industry/literature data are available about the type of cooling or directly fraction, cooling water, to air specific for the process a default assumption is applied. It is assumed that the once-through cooling system is used in 50% of all cases and recirculating system is used in another 50% of all cases.
- fraction, water, decarbonised, to air: 0.3875 dimensionless; name fraction_WDC_to_air; = fraction_CW_to_air; lognormal variance with pedigree 0.092025, pedigree (4,4,3,2,4)
  Calculated value. See comments in the other parametres present in this dataset. Decarbonised water is considered to be always used as cooling water, thus cooling water fractions to air are applied to all carbonised water input flows to calculate the amount of water consumed in the processes.

## Reference product
- anodising, aluminium sheet: 1 m2; By-product classification allocatable product; CPC 88731: Metal treatment and coating services
  EcoSpold01Location=RER
  production volume 9.95834e10 m2
    55% of gross aluminium production is estimated to be sheet and foil (Davis J R. 1993. Aluminum and aluminum alloys. ASM International); 30% assumed to be anodised; 0.0028 kg/m3; 0.0003 m average thickness
  property price 1.30622 EUR2005
    Calculated based on inputs: The price of the product has been calculated as a sum of the values of the material and energy inputs for this product. This value is therefore a rough estimation. It may underestimate the real price since there are additional expenses when producing any product. These expences can include for example labour costs, treatment of waste materials and profit for the producer. Please consider carefully whether this level of data quality is acceptable for your application.
  properties: carbon allocation 0 kg, carbon content 0

## Inputs from technosphere
- aluminium sulfate, powder: 0.0141 kg; lognormal variance with pedigree 0.0426, pedigree (1,3,5,5,1)
  EcoSpold01Location=RER
  properties: dry mass 1 kg, wet mass 1 kg
- aluminium, wrought alloy: 0.00187 kg; lognormal variance with pedigree 0.0426, pedigree (1,3,5,5,1)
  EcoSpold01Location=RER
  properties: dry mass 1 kg, wet mass 1 kg
- chemical factory, organics: 4e-10 unit; lognormal variance with pedigree 0.68, pedigree (5,5,5,5,5)
  EcoSpold01Location=RER
- chemical, organic: 0.026 kg; lognormal variance with pedigree 0.0426, pedigree (1,3,5,5,1)
  EcoSpold01Location=GLO
  properties: carbon content, fossil 0.628, dry mass 1 kg, heating value, net 19.03 MJ, wet mass 1 kg
  note on carbon content, fossil: This dataset is an unweighted average of 20 organic substances (listed in Tab 88.1, ecoinvent v2.2 report 8, part II), being part of the top100 chemicals included in this database. The C-content has also been calculated as an unweighted average of the C content of the substances composing this dataset.
- electricity, medium voltage: 0.162371, 3.23894, 0.0810826, 0.0497236, 0.00995212, 0.00213694, 0.334471, 0.961324 kWh (8 suppliers, which the file names only by identifier); sum of these 4.84 kWh; lognormal variance with pedigree 0.0426, pedigree (1,3,5,5,1)
  EcoSpold01Location=UCTE
- ethoxylated alcohol (AE3): 0.003 kg; = 0.006*0.5; lognormal variance with pedigree 0.0426, pedigree (1,3,5,5,1)
  Calculated value. The value of 0.006 kg of ethoxylated alcohol, production mix has been allocated to the concrete ethoxylated alcohols. The ratio between (AE3) and (AE7) is used the same as in case of the original eiv2 "ethoxylated alcohol, production mix" dataset.
  property carbon content, fossil 0.207952; name C_content_fossil
  property carbon content, non-fossil 0.485221; name C_content_non_fossil
  property dry mass 1 kg; name DM
  property water content 0; name water_content
  property water in wet mass 0 kg; name WWM
  property wet mass 1 kg; name WM
  properties: heating value, net 21 MJ
- ethoxylated alcohol (AE7): 0.003 kg; = 0.006*0.5; lognormal variance with pedigree 0.0426, pedigree (1,3,5,5,1)
  (same comment as for ethoxylated alcohol (AE3))
  properties: carbon content, fossil 0.321663, carbon content, non-fossil 0.321663, dry mass 1 kg, heating value, net 19.49 MJ, wet mass 1 kg
- hazardous waste, for incineration: -0.00125 kg; lognormal variance with pedigree 0.0028, pedigree (1,3,2,5,1)
  EcoSpold01Location=CH
  production volume
    Calculated from the production volume of anodising, aluminium sheet in proportion to the respective output amounts.
  properties: carbon content, fossil 0.554667, dry mass 0.75 kg, heating value, net 17 MJ, water content 0.333333, wet mass 1 kg
  note on carbon content, fossil: Tab A.6, ecoinvent v2.2 report 13_I. C content has been calculated after data in the tables, and then referred to 1 kg DM
  note on heating value, net: Value taken from the general comment of the treatment dataset.
- heat, district or industrial, other than natural gas: 7.84 MJ; lognormal variance with pedigree 0.0426, pedigree (1,3,5,5,1)
  EcoSpold01Location=RER
  properties: heating value, net 1 MJ
- lubricating oil: 0.0275 kg; lognormal variance with pedigree 0.0426, pedigree (1,3,5,5,1)
  EcoSpold01Location=RER
  properties: carbon content, fossil 0.75, dry mass 1 kg, heating value, net 40.2 MJ, wet mass 1 kg
  note on carbon content, fossil: Lubricating oil is produced from diesel. C-content/dry mass of fats and oils considered 75%, from: ecoinvent v2.2 report, n 15a, pg 40
  note on heating value, net: Literature value, Source: IPCC 2006, 2006 IPCC Guidelines for National Greenhouse Gas Inventories, Prepared by the National Greenhouse Gas Inventories Programme, Eggleston H.S., Buendia L., Miwa K., Ngara T. and Tanabe K. (eds). Published: IGES, Japan
- nitric acid, without water, in 50% solution state: 0.00147593, 0.00545359, 0.00898729, 0.00261307, 0.00218489, 0.002193, 0.00709223 kg (7 suppliers, which the file names only by identifier); sum of these 0.03 kg; lognormal variance with pedigree 0.0426, pedigree (1,3,5,5,1)
  EcoSpold01Location=RER
  properties: dry mass 1 kg, wet mass 1 kg
- polyethylene, low density, granulate: 0.001 kg; lognormal variance with pedigree 0.0426, pedigree (1,3,5,5,1)
  EcoSpold01Location=RER
  properties: carbon content, fossil 0.857143, dry mass 1 kg, heating value, net 42.47 MJ, wet mass 1 kg
  note on carbon content, fossil: Polyethylene is formed out of a huge amount of ethylene monomers (C2H4) (ecoinvent v2.2 report 11_II). MW=28 g/mol
- scrap aluminium: -0.015 kg; lognormal variance with pedigree 0.0028, pedigree (1,3,2,5,1)
  EcoSpold01Location=CH
  production volume
    (same comment as for hazardous waste, for incineration)
  properties: dry mass 1 kg, wet mass 1 kg
- sodium chlorate, powder: 0.011 kg; lognormal variance with pedigree 0.0426, pedigree (1,3,5,5,1)
  EcoSpold01Location=RER
  properties: dry mass 1 kg, wet mass 1 kg
- sodium hydroxide, without water, in 50% solution state: 0.1217 kg; lognormal variance with pedigree 0.0426, pedigree (1,3,5,5,1)
  EcoSpold01Location=RER
  properties: dry mass 1 kg, heating value, net 3.03 MJ, wet mass 1 kg
- sulfuric acid: 0.146 kg; lognormal variance with pedigree 0.0426, pedigree (1,3,5,5,1)
  EcoSpold01Location=RER
  properties: dry mass 1 kg, wet mass 1 kg
- waste bitumen sheet: -0.0275 kg; lognormal variance with pedigree 0.0028, pedigree (1,3,2,5,1)
  EcoSpold01Location=CH
  production volume
    (same comment as for hazardous waste, for incineration)
  properties: carbon content, fossil 0.643207, dry mass 0.985 kg, heating value, net 40.2 MJ, water content 0.0152284, wet mass 1 kg
  note on carbon content, fossil: The bitumen sheet is made of 63% bitumen, 24% surface spread and filler (assumed to be pure SiO2), 6% carrier fleece (assumed to be PE) and 7% elastomer (assumed to be PS) (ecoinvent v2.2 report 13_I, pg 40). C content of bitumen, PE and PS from Tab A.6 and A.1 (ecoinvent v2.2 report 13_I, pg 40), respectively. C content of waste also given in the dataset
- waste wood, untreated: -0.0016641, -4.33169e-5, -0.0322795, -0.000592479, -0.000251405, -0.00039745, -0.00477171 kg (7 suppliers, which the file names only by identifier); sum of these -0.04 kg; lognormal variance with pedigree 0.0028, pedigree (1,3,2,5,1)
  EcoSpold01Location=CH
  production volume
    (same comment as for hazardous waste, for incineration)
  properties: carbon content, non-fossil 0.48632, dry mass 0.8 kg, heating value, net 13.99 MJ, water content 0.25, wet mass 1 kg
  note on carbon content, non-fossil: Tab A.4, ecoinvent v2.2 report 13_I. C content has been referred to 1 kg DM,
- wastewater, unpolluted: -0.459375 m3; = (water_decarbonised_input/1000)*(1-fraction_WDC_to_air); lognormal variance with pedigree 0.0028, pedigree (1,3,2,5,1)
  EcoSpold01Location=CH
  Calculated value based on literature values and expert opinion. See comments in the parametres' comment field.
  production volume
    (same comment as for hazardous waste, for incineration)
  properties: carbon content, fossil 0.00178991, carbon content, non-fossil 0.00178991, dry mass 0.337476 kg, water content 2962.17, wet mass 1000 kg
  note on carbon content, fossil: Assumed to be like in tap water. Bicarbonate content is 2.93 mol/m3. CO2 content is 0.1 mol/m3 (ecoinvent v2.2 report 8, Tab 93.1).
- water, decarbonised: 20.4293, 298.508, 15.2871, 253.393, 160.43, 1.9528 kg (6 suppliers, which the file names only by identifier); sum of these 750 kg; lognormal variance with pedigree 0.0426, pedigree (1,3,5,5,1)
  EcoSpold01Location=RER
  properties: wet mass 1 kg
- white spirit: 0.000125 kg; lognormal variance with pedigree 0.0426, pedigree (1,3,5,5,1)
  EcoSpold01Location=RER
  properties: carbon content, fossil 0.863404, dry mass 1 kg, heating value, net 45 MJ, wet mass 1 kg
  note on carbon content, fossil: The most common variety of white spirit is a mixture of saturated aliphatic and alicyclic C7-C12 hydrocarbons with a content of 15-20% (by weight) of aromatic C7-C12 hydrocarbons (ecoinvent v2.2 report 8-part 94). The average composition was assumed as being 82.5% C9.5 saturated aliphatic and alicyclic hydrocarbons (average formula C9.5H20), and 17.5% C9.5 aromatic hydrocarbons (average formula C9.5H9.5).
- wood chips, dry, measured as dry mass: 0.029913 kg; lognormal variance with pedigree 0.0426, pedigree (1,3,5,5,1)
  EcoSpold01Location=RER
  properties: carbon content, non-fossil 0.494, dry mass 1 kg, heating value, net 9.99 MJ, water content 0.4, wet mass 1.4 kg
  note on carbon content, non-fossil: C content of dry mass is 0.494 kgC/kg dry wood (ecoinvent v2.2 report 9).

## Emissions to nature
- Particulate Matter, > 2.5 um and < 10um [air, unspecified]: 1.35e-5 kg; lognormal variance with pedigree 0.1626, pedigree (1,3,5,5,1)
- Water [air, unspecified]: 0.290625 m3; = (water_decarbonised_input/1000)*fraction_WDC_to_air; lognormal variance with pedigree 0.0827, pedigree (2,2,5,5,1)
  Calculated value based on literature values and expert opinion. See comments in the parametres' comment field.
- Aluminium III [water, unspecified]: 0.0015 kg; lognormal variance with pedigree 0.6926, pedigree (1,3,5,5,1)
- Cadmium II [water, unspecified]: 7.5e-7 kg; lognormal variance with pedigree 0.6926, pedigree (1,3,5,5,1)
- Chloride [water, unspecified]: 0.00666 kg; lognormal variance with pedigree 0.0826, pedigree (1,3,5,5,1)
- Copper ion [water, unspecified]: 1.5e-5 kg; lognormal variance with pedigree 0.6926, pedigree (1,3,5,5,1)
- Iron ion [water, unspecified]: 2.25e-5 kg; lognormal variance with pedigree 0.6926, pedigree (1,3,5,5,1)
- Lead II [water, unspecified]: 2e-5 kg; lognormal variance with pedigree 0.6926, pedigree (1,3,5,5,1)
- Manganese II [water, unspecified]: 0.000128 kg; lognormal variance with pedigree 0.6926, pedigree (1,3,5,5,1)
- Nickel II [water, unspecified]: 0.000218 kg; lognormal variance with pedigree 0.6926, pedigree (1,3,5,5,1)
- Sodium I [water, unspecified]: 0.0433 kg; lognormal variance with pedigree 0.6926, pedigree (1,3,5,5,1)
- Sulfate [water, unspecified]: 0.113 kg; lognormal variance with pedigree 0.0826, pedigree (1,3,5,5,1)
- Tin ion [water, unspecified]: 0.000125 kg; lognormal variance with pedigree 0.6926, pedigree (1,3,5,5,1)
- Zinc II [water, unspecified]: 4.5e-5 kg; lognormal variance with pedigree 0.6926, pedigree (1,3,5,5,1)

## Sampling procedure
Literature / survey

## Extrapolations
None This dataset has been copied from an original dataset covering the geography RER. The uncertainty has been adjusted accordingly.

## Review by Roland Hischier 2004-04-13
passed

## Review by Bo Weidema 2012-07-24
input of ethoxylated alchohols (degreaser) specified

## Review by Emilia Moreno Ruiz 2017-08-17
Water outputs were adjusted
