# titanium zinc plate production, without pre-weathering

Dataset: EcoSpold 2, unit process
Geography: RoW
Time period: 1997-01-01 to 2023-12-31
Technology level: current
Classification: EcoSpold01Categories: metals/extraction
Classification: ISIC rev.4 ecoinvent: 2420:Manufacture of basic precious and other non-ferrous metals
Tags: ConvertedDataset
Scenario: Business-as-Usual
System model: Allocation, cut-off by classification
Generated by: Martin Lehmann
Published in: Kellenberger D. 2007
Database: ecoinvent
isCopyrightProtected: true
accessRestrictedTo: 1

## General comment
The production steps pre-alloying, melting, casting, rolling, coiling, stretch forming and cutting are approximated using "casting, brass", "contour brass" and "sheet rolling, aluminium".
[This dataset was already contained in the ecoinvent database version 2. It was not individually updated during the transfer to ecoinvent version 3. Life Cycle Impact Assessment results may still have changed, as they are affected by changes in the supply chain, i.e. in other datasets. This dataset was generated following the ecoinvent quality guidelines for version 2. It may have been subject to central changes described in the ecoinvent version 3 change report (http://www.ecoinvent.org/database/ecoinvent-version-3/reports-of-changes/), and the results of the central updates were reviewed extensively. The changes added e.g. consistent water flows and other information throughout the database. The documentation of this dataset can be found in the ecoinvent reports of version 2, which are still available via the ecoinvent website. The change report linked above covers all central changes that were made during the conversion process.]

## Included activities start
The activity starts with the reception of zinc at the production facility.

## Included activities end
The dataset describes the production of titanium zinc alloy from primary zinc and the fabrication of titanium zinc plates with all included fabrication steps. Pre-weathering of the plate is not included.

## Geography
Data from a leading titan zinc plate producer in Germany. Applicable for Europe.

## Technology
Induction furnace for all the pre-alloying and melting steps, roll stands with 5 rolling pairs for the rolling step. Coiling facilities.

## Parameters
- fraction, process water, to air: 0.15 dimensionless; name fraction_PW_to_air; lognormal variance with pedigree 0.092025, pedigree (4,4,3,2,4)
  Literature value. In case when no industry/process specific data are available, default evaporation fraction value is used. This value is 15% and is based on literature (Statistics Canada, 2007 & Shaffer, K.H., 2008, Consumptive water use in the Great Lakes Basin, USGS & Shiklomanov, 2003, World Water Resources at the Beginning of the 21st Century) and has been approved by an expert.
- fraction, tap water, to air: 0.15 dimensionless; name fraction_TW_to_air; = fraction_PW_to_air; lognormal variance with pedigree 0.092025, pedigree (4,4,3,2,4)
  Calculated value. See comment in the other parametres present in this dataset. Tap water is considered to be always used as process water, thus process water fractions to air are applied to all tap water input flows to calculate the amount of water consumed in the processes.

## Reference product
- titanium zinc plate, without pre-weathering: 1 kg; name RP_amount_1; By-product classification allocatable product; CPC 41545: Zinc bars, rods, profiles and wire; zinc plates, sheets, strip and foil; HS2017 7804: Lead; plates, sheets, strip and foil, lead powders and flakes
  EcoSpold01Location=DE
  production volume 3.75794 kg; name RP_PV_1
    This is a placeholder value that does not reflect real-world production volumes. This dataset does not currently require a real-world production volume to work in the database framework, and no actual data were collected yet. This has no negative effect on the results of the ecoinvent database.
  property price 1.76 EUR2005
    Calculated value based on data from United Nations Commodity Trade Statistics Database (comtrade.un.org). UN comtrade category: 790500 Zinc plates, sheets, strip and foil. Year 2005. Using exchange rate of 1EURO = 1.209 USD. Average of price of import into 5 main markets (EU, US, JP, IN and CN).
  properties: carbon allocation 0 kg, carbon content 0, carbon content, fossil 0, carbon content, non-fossil 0, dry mass 1 kg, water content 0, water in wet mass 0 kg, wet mass 1 kg

## Inputs from technosphere
- aluminium casting facility: 1.01e-10 unit; lognormal variance with pedigree 0.352, pedigree (1,1,5,5,1)
  composite
  EcoSpold01Location=RER
- aluminium, cast alloy: 5.088e-5 kg; lognormal variance with pedigree 0.054, pedigree (1,4,5,5,1)
  EcoSpold01Location=RER
  properties: dry mass 1 kg, wet mass 1 kg
- aluminium, wrought alloy: 0.00111812 kg; lognormal variance with pedigree 0.054, pedigree (1,4,5,5,1)
  EcoSpold01Location=RER
  properties: dry mass 1 kg, wet mass 1 kg
- casting, brass: 2.11 kg; lognormal variance with pedigree 0.072, pedigree (1,1,5,5,1)
  EcoSpold01Location=CH
  composite
- copper, cathode: 0.00127 kg; lognormal variance with pedigree 0.054, pedigree (1,4,5,5,1)
  EcoSpold01Location=RER
  properties: dry mass 1 kg, wet mass 1 kg
- electric arc furnace dust: -0.000424516, -2.53293e-7, -1.68206e-5 kg (3 suppliers, which the file names only by identifier); sum of these -0.00044159 kg; lognormal variance with pedigree 0.38, pedigree (5,5,5,5,5)
  This flow is issued during the process "contouring, brass". Contouring, brass is used as a proxy for rolling and colling of titanium zinc plate. This flow refers to 1 kg of contouring, brass, which is in its turn and input for the production of 1 kg titanium zinc plate production.
  production volume; = RP_PV_1 * (BP_amount_2 / RP_amount_1)
    Calculated from production volume of reference product using the relative outputs.
  properties: carbon content, fossil 0.01339, dry mass 0.846 kg, water content 0.182033, wet mass 1 kg
- electricity, medium voltage: 0.00025165, 0.000376693, 0.000119001, 0.00221507, 0.00130008, 0.00154137, 0.0187224, 4.46531e-5, 0.37347, 0.125485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 kWh (47 suppliers, which the file names only by identifier); sum of these 0.65833 kWh; = 0.435+0.22333; lognormal variance with pedigree 0.052, pedigree (1,1,5,5,1)
  composite + electricity used in the process contouring, brass
  EcoSpold01Location=UCTE
- heat, district or industrial, natural gas: 0.0258592, 1.57365, 0.000486308 MJ (3 suppliers, which the file names only by identifier); sum of these 1.6 MJ; lognormal variance with pedigree 0.318, pedigree (4,5,5,5,5)
  (same comment as for electric arc furnace dust)
  properties: heating value, net 1 MJ
- lubricating oil: 0.004 kg; lognormal variance with pedigree 0.318, pedigree (4,5,5,5,5)
  (same comment as for electric arc furnace dust)
  properties: carbon content, fossil 0.75, dry mass 1 kg, heating value, net 40.2 MJ, wet mass 1 kg
  note on carbon content, fossil: Lubricating oil is produced from diesel. C-content/dry mass of fats and oils considered 75%, from: ecoinvent v2.2 report, n 15a, pg 40
  note on heating value, net: Literature value, Source: IPCC 2006, 2006 IPCC Guidelines for National Greenhouse Gas Inventories, Prepared by the National Greenhouse Gas Inventories Programme, Eggleston H.S., Buendia L., Miwa K., Ngara T. and Tanabe K. (eds). Published: IGES, Japan
- rolling mill: 1.4286e-9 unit; lognormal variance with pedigree 0.68, pedigree (5,5,5,5,5)
  (same comment as for electric arc furnace dust)
- sludge from steel rolling: -0.0160401, -0.000294923 kg (2 suppliers, which the file names only by identifier); sum of these -0.016335 kg; lognormal variance with pedigree 0.38, pedigree (5,5,5,5,5)
  (same comment as for electric arc furnace dust)
  production volume; = RP_PV_1 * (BP_amount_1 / RP_amount_1)
    Calculated from production volume of reference product using the relative outputs.
  properties: carbon content, fossil 0.0123943, dry mass 0.8 kg, water content 0.25, wet mass 1 kg
- sulfuric acid: 0.34 kg; lognormal variance with pedigree 0.318, pedigree (4,5,5,5,5)
  (same comment as for electric arc furnace dust)
  properties: dry mass 1 kg, wet mass 1 kg
- tap water: 0.0121713, 0.018554, 0.0346209, 0.0932662, 0.0112268, 0.46786, 0.00834376, 5.35396 kg (8 suppliers, which the file names only by identifier); sum of these 6 kg; lognormal variance with pedigree 0.18, pedigree (4,5,5,5,5)
  (same comment as for electric arc furnace dust)
  properties: carbon content, fossil 0.00178991, dry mass 0.000337476 kg, water content 2962.17, wet mass 1 kg
  note on carbon content, fossil: Bicarbonate content is 2.93 mol/m3. CO2 content is 0.1 mol/m3 (ecoinvent v2.2 report 8, Tab 93.1).
- zinc: 1.06 kg; lognormal variance with pedigree 0.054, pedigree (1,4,5,5,1)
  EcoSpold01Location=RER
  properties: dry mass 1 kg, wet mass 1 kg

## Emissions to nature
- NMVOC, non-methane volatile organic compounds [air, unspecified]: 4.5e-5 kg; lognormal variance with pedigree 0.358, pedigree (4,5,5,5,5)
  (same comment as for electric arc furnace dust)
- Water [air, unspecified]: 0.0009 m3; name water_to_air_unspecified; lognormal variance with pedigree 0.0827, pedigree (2,2,5,5,1)
  (same comment as for electric arc furnace dust)
  property fraction, origin: fresh water 1; name fraction_origin_fresh_water
  property fraction, origin: salt water 0; name fraction_origin_salt_water
  property fraction, origin: unspecified 0; name fraction_origin_unspecified
- Zinc II [air, unspecified]: 0.000318 kg; lognormal variance with pedigree 0.0946, pedigree (2,4,5,5,1)
- Arsenic ion [water, unspecified]: 1.5714e-9 kg; lognormal variance with pedigree 1.02, pedigree (5,5,5,5,5)
  (same comment as for electric arc furnace dust)
- BOD5, Biological Oxygen Demand [water, unspecified]: 7.9e-5 kg; lognormal variance with pedigree 0.42, pedigree (5,5,5,5,5)
  (same comment as for electric arc furnace dust)
- COD, Chemical Oxygen Demand [water, unspecified]: 7.9e-5 kg; lognormal variance with pedigree 0.42, pedigree (5,5,5,5,5)
  (same comment as for electric arc furnace dust)
- Cadmium II [water, unspecified]: 1.5714e-9 kg; lognormal variance with pedigree 1.02, pedigree (5,5,5,5,5)
  (same comment as for electric arc furnace dust)
- Chromium III [water, unspecified]: 1.5086e-7 kg; lognormal variance with pedigree 1.02, pedigree (5,5,5,5,5)
  (same comment as for electric arc furnace dust)
- Chromium VI [water, unspecified]: 6.2857e-9 kg; lognormal variance with pedigree 1.02, pedigree (5,5,5,5,5)
  (same comment as for electric arc furnace dust)
- Copper ion [water, unspecified]: 1.7286e-6 kg; lognormal variance with pedigree 1.02, pedigree (5,5,5,5,5)
  (same comment as for electric arc furnace dust)
- DOC, Dissolved Organic Carbon [water, unspecified]: 2.0551e-5 kg; lognormal variance with pedigree 0.42, pedigree (5,5,5,5,5)
  (same comment as for electric arc furnace dust)
- Lead II [water, unspecified]: 1.5714e-7 kg; lognormal variance with pedigree 1.02, pedigree (5,5,5,5,5)
  (same comment as for electric arc furnace dust)
- Mercury II [water, unspecified]: 1.5714e-9 kg; lognormal variance with pedigree 1.02, pedigree (5,5,5,5,5)
  (same comment as for electric arc furnace dust)
- Nickel II [water, unspecified]: 4.7143e-7 kg; lognormal variance with pedigree 1.02, pedigree (5,5,5,5,5)
  (same comment as for electric arc furnace dust)
- TOC, Total Organic Carbon [water, unspecified]: 2.0551e-5 kg; lognormal variance with pedigree 0.42, pedigree (5,5,5,5,5)
  (same comment as for electric arc furnace dust)
- Tin ion [water, unspecified]: 1.5714e-7 kg; lognormal variance with pedigree 1.02, pedigree (5,5,5,5,5)
  (same comment as for electric arc furnace dust)
- Water [water, unspecified]: 0.0051 m3; name water_to_water_unspecified; lognormal variance with pedigree 0.0827, pedigree (2,2,5,5,1)
  (same comment as for electric arc furnace dust)
  property fraction, origin: fresh water 1; name fraction_origin_fresh_water_Ww
  property fraction, origin: salt water 0; name fraction_origin_salt_water_Ww
  property fraction, origin: unspecified 0; name fraction_origin_unspecified_Ww
- Zinc II [water, unspecified]: 3.9286e-6 kg; lognormal variance with pedigree 1.02, pedigree (5,5,5,5,5)
  (same comment as for electric arc furnace dust)

## Sampling procedure
Environmental report, certificate

## Extrapolations
see Geography This dataset has been copied from an original dataset covering the geography DE. The uncertainty has been adjusted accordingly.

## Review by Rolf Frischknecht 2007-11-07
passed

## Review by Bo Weidema 2012-11-05
contouring of brass has been integrated in this activity, thus avoiding a negative input correction for brass swarf
