# clay to generic market for supplementary cementitious materials

Dataset: EcoSpold 2, unit process
Geography: GLO
Time period: 2019-01-01 to 2023-12-31
Technology level: current
Classification: ISIC rev.4 ecoinvent: 2394:Manufacture of cement, lime and plaster
Scenario: Business-as-Usual
System model: Allocation, cut-off by classification
Generated by: Lucia Valsasina
Database: ecoinvent
isCopyrightProtected: true
accessRestrictedTo: 1

## General comment
This activity is a renaming activity, linking clay to the generic market for supplementary cementitious materials (SCM).

## Included activities start
The activity starts with the input of GGBFS.

## Included activities end
With the provision of a generic kg of supplementary cementitious materials.

## Reference product
- supplementary cementitious materials: 1 kg; name SCM; By-product classification allocatable product; CPC 15200: Gypsum; anhydrite; limestone flux; limestone and other calcareous stone, of a kind used for the manufacture of[…]; HS2017 681099: Cement, concrete or artificial stone; articles (other than prefabricated structural components for building[...]
  production volume 5.94166e10 kg; = 2.12202E+11*0.28
    The production volume of clay (2.12202E+11 kg) is taken from the ecoinvent activity "clay pit operation, GLO" (accessed 17th June 2019). According to USGS (2018) 28% of common clay is used for "Porland and other cements". It is here assumed that of that 28%
    USGS 2018. 2015 Minerals Yearbook: Clay and shale [Advances Release]. Retrieved from: https://s3-us-west-2.amazonaws.com/prd-wret/assets/palladium/production/mineral-pubs/clays/myb1-2015-clays.pdf, accessed 17th June 2019.
  property dry mass 1 kg; name SCM_DM
  property price 0.075 EUR2005
    Price set equal to the price of clay as considered as the product that can answer in increase in demand of supplementary cementitious materials. Calculated value based on data from United Nations Commodity Trade Statistics Database (comtrade.un.org). UN comtrade category: 250810 Bentonite. Year 2005. Using exchange rate of 1EURO = 1.209 USD. Average of price of import into 5 main markets (EU, US, JP, IN and CN).
  property water content 0; name SCM_water_content
  property water in wet mass 0 kg; name SCM_WWM
  property wet mass 1 kg; name SCM_WM
  properties: carbon allocation 0 kg, carbon content 0

## Inputs from technosphere
- clay: 0.999847, 0.000153473 kg (2 suppliers, which the file names only by identifier); sum of these 1 kg
  This activity is a renaming activity, linking clay to the generic market for supplementary cementitious materials (SCM).
  properties: dry mass 0.965 kg, water content 0.0362694, wet mass 1 kg
