# tap water production, ultrafiltration treatment

Dataset: EcoSpold 2, unit process
Geography: RoW
Time period: 2012-01-01 to 2023-12-31
Technology level: modern
Classification: EcoSpold01Categories: water supply/production
Classification: ISIC rev.4 ecoinvent: 3600:Water collection, treatment and supply
Synonyms: potable water
Tags: single enterprise data
Scenario: Business-as-Usual
System model: Allocation, cut-off by classification
Generated by: Marylène Dussault
Database: ecoinvent
isCopyrightProtected: true
accessRestrictedTo: 1

## General comment
This dataset represents production of 1 kg of tap water under pressure at facility gate, ready for distribution in network. It represents average operation of ultrafiltration treatment for production of tap water. Ultrafiltration treatment includes intake pumping, ultrafiltration through polyvinylidenfluoride hollow fibers membrane and disinfection. Inventory was constructed from reported chemicals, energy inputs and wastes from a single plant located in Québec covering representing 29% of total production of tap water from this technology. Facility has 5 trains each containing 64 modules. Module useful life was assumed to be 10 years based on personal communication with expert from the facility, which is justify mainly from the high quality of intake water.
[This dataset is meant to replace the following datasets:
- tap water production and supply, GLO, 2000 - 2000]

## Included activities start
From the intake pumping of raw surface water into the water treatment plant.

## Included activities end
This dataset ends with the production of tap water, at facility gate, under pressure. It includes energy for intake pumping, treatment system, lighting and heating of the building as well as the energy of the pump pressurizing water to the beginning of the network. It includes all chemicals and materials added to the water during treatment and replacement of ultrafiltration modules and pressure vessels. It excludes energy for pumping stations and water losses within the network which is included in the tap water market. Emissions to the environment occurring during the treatment and during the distribution were not considered as they are assumed negligible. Main substance in water that would be released in the environment are assumed to be considered in wastewater processes.

## Geography
Extrapolated from data from a single plant in Quebec (Canada).The uncertainty was adjusted accordingly.

## Time period
Time of publication.

## Parameters
- unit conversion, days in a year: 365.25 d/year; name days_per_year; lognormal variance with pedigree 0.0006, pedigree (1,1,1,1,1)
  Conversion factor.

## Reference product
- tap water: 1 kg; name tapwater; By-product classification allocatable product; CPC 18000: Natural water; CAS 7732-18-5
  production volume 1.49943e13 kg; name PV_tapwater; = ((4e15*0.3)-3.5E12)*0.023
    Calculated value based on literature data and expert judgement. The amount of freshwater which falls as rainwater is 110000km3/year. Out of that only 40000km3/year is converted into surface runoff (http://www.fao.org/nr/water/aquastat/water_use/index.stm, accessed 20140522). The total water withdrawal in the world is around 4000km3/year, i.e. 4E15kg (cross-referenced with 3 publications; Shiklomanov, 2003, UN - http://unesdoc.unesco.org/images/0022/002257/225741E.pdf and http://unesdoc.unesco.org/images/0018/001819/181993e.pdf, accessed 20140522). Out of that app. 70% goes for irrigation (http://www.fao.org/nr/water/aquastat/water_use/index.stm, accessed 20140522), thus 1.2E15kg is left for municipal and industrial use.
    The total tap water production technology shares in the world, present in the ecoinvent database are calculated to be as follows; tap water production, conventional treatment - 40%, tap water production, conventional with biological treatment - 11%, tap water production, direct filtration treatment - 18.5%, tap water production, microstainer treatment - 2.2%, tap water production, ultrafiltration treatment - 2.3%, tap water production, seawater reverse osmosis conventional pretreatment, enhance module, single - 0.5%, tap water production, seawater reverse osmosis, conventional pretreatment, enhance module, single stage - 0.1%, tap water production, seawater reverse osmosis, conventional pretreatment, enhance module, two stages - 0.066%, tap water production, seawater reverse osmosis, ultrafiltration pretreatment, baseline module, single stage - 0.049%, tap water production, seawater reverse osmosis, ultrafiltration pretreatment, enhance module, single stage - 0.01%, tap water production, seawater reverse osmosis, ultrafiltration pretreatment, enhance module, two stages - 0.007%, tap water production, underground water with chemical treatment - 10.7%, tap water production, underground water with disinfection - 2.7%, tap water production, underground water without chemical treatment - 11.4%, tap water production, artificial recharge wells - 0.8%.
  property price 0.000397 EUR2005
    Converted from EU price by using Purchasing Power Parities (0.8458 in 2003 and 0.8426 in 2004)
  properties: carbon allocation 6.08566e-7 kg, carbon content 0.0017899, carbon content, fossil 0.0017899, carbon content, non-fossil 0, dry mass 0.00034 kg, water content 2940.18, water in wet mass 0.99966 kg, wet mass 1 kg

## Inputs from technosphere
- diesel, burned in building machine: 2.6708e-5 MJ; = diesel_use*density_diesel*NHV*43.2; lognormal variance with pedigree 0.008, pedigree (1,1,4,1,1)
  Calculated value.
  Uncertainty: Calculated variable. Uncertainty will be determined from propagation of uncertainty factors of underlying variables.
  property density 0.84 kg/l; name density_diesel
  property fuel input in physical units, L 7.36e-7 l; name diesel_use
  property heating value, net 1 MJ; name NHV
  note on fuel input in physical units, L: Calculated value. Diesel volume consumed in a year based on average diesel consumption of other surface water production facility. Diesel exclusively used for routine runs of emergency generators and during emergency.
  note on heating value, net: Literature. net (lower) heating (calorific) value for diesel in MJ/kg
- electricity, medium voltage: 1.22439e-5, 2.92019e-8, 0.000244239, 6.11421e-6, 3.74952e-6, 7.50462e-7, 1.61141e-7, 2.52215e-5, 7.24907e-5 kWh (9 suppliers, which the file names only by identifier); sum of these 0.000365 kWh; lognormal variance with pedigree 0.0132, pedigree (2,4,4,5,1)
  EcoSpold01Location=UCTE
  Measured value. Represents electricity consumption for the entire treatment process including pumping for water intake and pumping for distribution at the plant gate.
- epoxy resin, liquid: 4.07003e-6 kg; name epoxy; lognormal variance with pedigree 0.0146, pedigree (3,4,4,5,1)
  Calculated value. Based on pressure vessel material inputs developed for the seawater reverse osmosis datasets, number of module in operation at ultrafiltration plant and assumed lifetime of 15 years.
  properties: carbon content, fossil 0.42325, dry mass 1 kg, heating value, net 12.82 MJ, wet mass 1 kg
- glass fibre: 5.21384e-5 kg; name fglass; lognormal variance with pedigree 0.0146, pedigree (3,4,4,5,1)
  (same comment as for epoxy resin, liquid)
  properties: dry mass 1 kg, wet mass 1 kg
- oxygen, liquid: 3.43e-5 kg; lognormal variance with pedigree 0.0126, pedigree (1,4,4,5,1)
  Measured value. Represents use of oxygen, delivered in liquid state, for ozone production in surveyed treatment plant.
  properties: dry mass 1 kg, wet mass 1 kg
- sodium hypochlorite, without water, in 15% solution state: 4.02e-6 kg; lognormal variance with pedigree 0.0112, pedigree (2,4,4,1,1)
  Measured value. Represents use of sodium hypochlorite, delivered in 12% solution state, for chlorine desinfection in surveyed treatment plant.
  properties: dry mass 1 kg, wet mass 1 kg
- tap water: 5.99542e-8, 9.13951e-8, 1.70539e-7, 4.59419e-7, 2.30462e-6, 4.11004e-8, 2.6373e-5 kg (7 suppliers, which the file names only by identifier); sum of these 2.95e-5 kg; lognormal variance with pedigree 0.0112, pedigree (2,4,4,1,1)
  Calculated value. Represents water content in hypochlorite solution. Chemical flows are based on active substance only and water contained in solution must be added seperatly. Hypochlorite solution reported to be supply as a 12% concentrated solution.
- ultrafiltration module: 7.96466e-9 unit; lognormal variance with pedigree 0.0126, pedigree (3,4,4,1,1)
  Calculated value. Based on reported amount of module used in treatment facility and the expected lifetime of membrane (estimated ot 5 years).
- wastewater, unpolluted: -1.58816e-8, -3.28412e-6 m3 (2 suppliers, which the file names only by identifier); sum of these -3.3e-6 m3; lognormal variance with pedigree 0.0052, pedigree (2,4,1,5,1)
  Measured value. Average amount of wastewater produced during treatment.
  EcoSpold01Location=CH
  production volume; = PV_tapwater*(ww/tapwater)
    Calculated from the production volume of tap water, at user in proportion to the respective output amounts.
  properties: carbon content, fossil 0.00178991, carbon content, non-fossil 0.00178991, dry mass 0.337476 kg, water content 2962.17, wet mass 1000 kg
  note on carbon content, fossil: Assumed to be like in tap water. Bicarbonate content is 2.93 mol/m3. CO2 content is 0.1 mol/m3 (ecoinvent v2.2 report 8, Tab 93.1).
- water works, capacity 1.1E10l/year: 1.52103e-12 unit; = 1/(Q_av* days_per_year*lifetime*UnitConversion(1, 'm3', 'l')); lognormal variance with pedigree 0.008, pedigree (1,1,4,1,1)
  Calculated value. Amount of water works construction attributed to the production of 1kg of tap water. Value is based on assumed lifetime production of water treatment plant and an assumed typical medium-sized plant of 30,000 m3/day.
  Uncertainty: Calculated variable. Uncertainty will be determined from propagation of uncertainty factors of underlying variables.
  property lifetime 60 year; name lifetime
  property plant average daily flow rate 30000 m3/d; name Q_av
  note on lifetime: Estimated Value. Expected lifetime of water works as defined in the construction process.
  note on plant average daily flow rate: Fixed values, Flow rate of a conventional water purification plant for a medium-size facility as defined in the water works process.

## Inputs from nature
- Water, lake [natural resource, in water]: 0.0010033 m3; name waterIn; lognormal variance with pedigree 0.0132, pedigree (2,4,4,5,1)
  Calculated value. Surface water withdrawal represents average withdrawal from surveyed plants based on water production and wastewater production.

## Sampling procedure
Based on data collected from a ultrafiltration treatment plant in Quebec (Canada). See corresponding Quebec dataset for more information. Note that percent representativeness is not supplied because technology-specific global production volumes is too uncertain. Should this information become available, the representativeness can be calculated by dividing the sum of the water treated by the Quebec plants that served as a basis for the Global dataset by the technology-specific global production volume. (3.87E9 kg/a)

## Extrapolations
From one ultrafiltration tap water production facilities in Quebec (Canada) to global average of same technology. The uncertainty has been changed accordingly.
