# tillage, ridge cultivator

Dataset: EcoSpold 2, unit process
Geography: US
Time period: 2021-01-01 to 2023-12-31
Technology level: current
Classification: ISIC rev.4 ecoinvent: 0161:Support activities for crop production
Scenario: Business-as-Usual
System model: Allocation, cut-off by classification
Generated by: Juanita Barrera
Database: ecoinvent
isCopyrightProtected: true
accessRestrictedTo: 1

## General comment
This dataset represents the service of cultivating of 1 ha agricultural land with a ridge cultivator. An average machinery width of 7.8 m, working at a depth of 5 cm, is considered.

## Included activities start
The activity starts from the agricultural field foreseen to be processed.

## Included activities end
The inventory takes into account the diesel fuel consumption and the amount of agricultural machinery and of the shed, which has to be attributed to the cultivating. Also taken into consideration is the amount of emissions to the air from combustion and the emission to the soil from tyre abrasion during the work process. The following activities were considered part of the work process: preliminary work at the farm, like attaching the adequate machine to the tractor; transfer to field (with an assumed distance of 1 km); field work (for a parcel of land of 1 ha surface); transfer to farm and concluding work, like uncoupling the machine. The overlapping during the field work is considered. Not included are dust other than from combustion and noise.

## Geography
The inventory is extrapolated from the geography of South Africa. Data quality indicators are adjusted accordingly.

## Technology
Fuel consumption and emissions per kg diesel have been extrapolated to the US, but others inputs were taken from the original values.

## Reference product
- tillage, ridge cultivator: 1 ha; By-product classification allocatable product; CPC 86119: Other support services to crop production
  production volume 7.88684e7 ha
    FAOSTAT data year 2020: area of arable land, 0.5 passes/year assumed (own estimation)
  property price 17.1661 EUR2005
    The price is from the year 2020. Price information has been directly provided by the data provider based on the following reference: University of Minnesota, Machinery cost estimates, W.F. Lazarus, 2020. The prices were adjusted for inflation relative to 2005 using the producer price index (PPI) of the euro area, published by eurostat (https://ec.europa.eu/eurostat/databrowser/view/STS_INPP_A__custom_6416181/default/table?lang=en, last accessed on 2023-06-01).
  properties: carbon allocation 0 kg, carbon content 0

## Inputs from technosphere
- agricultural machinery, tillage: 3.76 kg; lognormal variance with pedigree 0.344, pedigree (1,4,5,5,1)
  proxy from "tillage, rotary cultivator, ZA"
- diesel: 2.49003 kg; lognormal variance with pedigree 0.0426, pedigree (1,4,5,1,1)
  2022 Nebraska Crop budget projections, Robert Klein and Glennis McClure, UNL Extension
  properties: carbon content, fossil 0.865, dry mass 1 kg, heating value, net 42.8 MJ, wet mass 1 kg
- shed: 0.00756 m2; lognormal variance with pedigree 0.344, pedigree (1,4,5,5,1)
  proxy from "tillage, rotary cultivator, ZA"
- tractor, 4-wheel, agricultural: 0.687 kg; lognormal variance with pedigree 0.344, pedigree (1,4,5,5,1)
  proxy from "tillage, rotary cultivator, ZA"

## Emissions to nature
- Ammonia [air, non-urban air or from high stacks]: 4.98006e-5 kg; lognormal variance with pedigree 0.098125, pedigree (1,2,5,2,3)
  adapted from "tillage, rotary cultivator, ZA" to match the diesel consumption
- Benzene [air, non-urban air or from high stacks]: 1.81896e-5 kg; lognormal variance with pedigree 0.098125, pedigree (1,2,5,2,3)
  adapted from "tillage, rotary cultivator, ZA" to match the diesel consumption
- Benzo(a)pyrene [air, non-urban air or from high stacks]: 7.4701e-8 kg; lognormal variance with pedigree 0.698125, pedigree (1,2,5,2,3)
  adapted from "tillage, rotary cultivator, ZA" to match the diesel consumption
- Cadmium II [air, non-urban air or from high stacks]: 2.49003e-8 kg; lognormal variance with pedigree 0.698125, pedigree (1,2,5,2,3)
  adapted from "tillage, rotary cultivator, ZA" to match the diesel consumption
- Carbon dioxide, fossil [air, non-urban air or from high stacks]: 7.73499 kg; lognormal variance with pedigree 0.058125, pedigree (1,2,5,2,3)
  adapted from "tillage, rotary cultivator, ZA" to match the diesel consumption
- Carbon monoxide, fossil [air, non-urban air or from high stacks]: 0.033377 kg; lognormal variance with pedigree 0.692025, pedigree (1,4,5,2,1)
  adapted from "tillage, rotary cultivator, ZA" to match the diesel consumption
- Chromium III [air, non-urban air or from high stacks]: 1.24678e-7 kg; lognormal variance with pedigree 0.698125, pedigree (1,2,5,2,3)
  adapted from "tillage, rotary cultivator, ZA" to match the diesel consumption
- Copper ion [air, non-urban air or from high stacks]: 4.23835e-6 kg; lognormal variance with pedigree 0.698125, pedigree (1,2,5,2,3)
  adapted from "tillage, rotary cultivator, ZA" to match the diesel consumption
- Dinitrogen monoxide [air, non-urban air or from high stacks]: 0.000298451 kg; lognormal variance with pedigree 0.098125, pedigree (1,2,5,2,3)
  adapted from "tillage, rotary cultivator, ZA" to match the diesel consumption
- Methane, fossil [air, non-urban air or from high stacks]: 0.000321408 kg; lognormal variance with pedigree 0.098125, pedigree (1,2,5,2,3)
  adapted from "tillage, rotary cultivator, ZA" to match the diesel consumption
- NMVOC, non-methane volatile organic compounds [air, non-urban air or from high stacks]: 0.00626923 kg; lognormal variance with pedigree 0.082025, pedigree (1,4,5,2,1)
  adapted from "tillage, rotary cultivator, ZA" to match the diesel consumption
- Nickel II [air, non-urban air or from high stacks]: 1.74479e-7 kg; lognormal variance with pedigree 0.698125, pedigree (1,2,5,2,3)
  adapted from "tillage, rotary cultivator, ZA" to match the diesel consumption
- Nitrogen oxides [air, non-urban air or from high stacks]: 0.102603 kg; lognormal variance with pedigree 0.082025, pedigree (1,4,5,2,1)
  adapted from "tillage, rotary cultivator, ZA" to match the diesel consumption
- PAH, polycyclic aromatic hydrocarbons [air, non-urban air or from high stacks]: 8.19415e-6 kg; lognormal variance with pedigree 0.358125, pedigree (1,2,5,2,3)
  adapted from "tillage, rotary cultivator, ZA" to match the diesel consumption
- Particulate Matter, < 2.5 um [air, non-urban air or from high stacks]: 0.0147459 kg; lognormal variance with pedigree 0.358125, pedigree (1,2,5,2,3)
  adapted from "tillage, rotary cultivator, ZA" to match the diesel consumption
- Selenium IV [air, non-urban air or from high stacks]: 2.49003e-8 kg; lognormal variance with pedigree 0.098125, pedigree (1,2,5,2,3)
  adapted from "tillage, rotary cultivator, ZA" to match the diesel consumption
- Sulfur dioxide [air, non-urban air or from high stacks]: 0.00249003 kg; lognormal variance with pedigree 0.058125, pedigree (1,2,5,2,3)
  adapted from "tillage, rotary cultivator, ZA" to match the diesel consumption
- Zinc II [air, non-urban air or from high stacks]: 2.49003e-6 kg; lognormal variance with pedigree 0.698125, pedigree (1,2,5,2,3)
  adapted from "tillage, rotary cultivator, ZA" to match the diesel consumption
- Cadmium II [soil, agricultural]: 3.3e-7 kg; lognormal variance with pedigree 0.084, pedigree (1,4,5,5,1)
  proxy from "tillage, rotary cultivator, ZA"
- Lead II [soil, agricultural]: 1.44e-6 kg; lognormal variance with pedigree 0.084, pedigree (1,4,5,5,1)
  proxy from "tillage, rotary cultivator, ZA"
- Zinc II [soil, agricultural]: 0.000874 kg; lognormal variance with pedigree 0.084, pedigree (1,4,5,5,1)
  proxy from "tillage, rotary cultivator, ZA"

## Extrapolations
The dataset is modeled for agricultural production system in US. Data Quality indicators are adjusted accordingly.
