# bentonite quarry operation

Dataset: EcoSpold 2, unit process
Geography: RoW
Time period: 1997-01-01 to 2023-12-31
Technology level: current
Classification: ISIC rev.4 ecoinvent: 0810:Quarrying of stone, sand and clay
Scenario: Business-as-Usual
System model: Allocation, cut-off by classification
Generated by: Daniel Kellenberger (obsolete)
Published in: Kellenberger D. 2007
Database: ecoinvent
isCopyrightProtected: true
accessRestrictedTo: 1

## General comment
This dataset represents the production of 1 kg of bentonite. Bentonite is an industrial mineral with a high content of swellable threelayer clay minerals, which often originates from the transformation of volcanic ashes and tuffs. Bentonite is used for the production of activated bentonite. The production volume of bentonite amounted to 12.04 million metric tons in 2013 (Virta 2015). This dataset is based on information published in an environmental report by a German company (Süd-Chemie AG).
References:
Kellenberger D., Althaus H.-J., Jungbluth N., Künniger T., Lehmann M. and Thalmann P. (2007) Life Cycle Inventories of Building Products. Final report ecoinvent Data v2.0 No. 7. EMPA Dübendorf, Swiss Centre for Life Cycle Inventories, Dübendorf, CH.
Virta R. L. (2015) USGS 2013 Minerals Yearbook – Clay and shale [advance release]

## Included activities start
From the excavation of bentonite in the ground.

## Included activities end
This activity ends with the production of bentonite. The dataset includes the excavation by digger, transportation to the first grinding machine, the land-use of the mine and the recultivation of the land.

## Geography
Data from one German company. The data are assumed to be representative of the global production.

## Technology
The technology used in the modelled German mine is probably state-of-art (first mining company in Europe taking part at an eco-audit based on EG-eco-audit requirements). The assumed thickness of the bentonite layer is 3 m. The thickness of overburden material is estimated to be 30 m. Digging and transportation is made by heavy diesel machines.
Reference:
Kellenberger D., Althaus H.-J., Jungbluth N., Künniger T., Lehmann M. and Thalmann P. (2007) Life Cycle Inventories of Building Products. Final report ecoinvent Data v2.0 No. 7. EMPA Dübendorf, Swiss Centre for Life Cycle Inventories, Dübendorf, CH.

## Parameters
- fraction, process water, to air: 0.2 dimensionless; name fraction_PW_to_air; lognormal variance with pedigree 0.092025, pedigree (4,4,3,2,4)
- fraction, tap water, to air: 0.2 dimensionless; name fraction_TW_to_air; lognormal variance with pedigree 0.092025, pedigree (4,4,3,2,4)

## Reference product
- bentonite: 1 kg; name RP; By-product classification allocatable product; CPC 15400: Clays; HS2017 2508: Clays; (not including expanded clays of heading no. 6806), andalusite kyanite and sillimanite, whether or not[...]
  Bentonite is an industrial mineral with a high content of swellable threelayer clay minerals, which often originates from the transformation of volcanic ashes and tuffs. Bentonite is used for the production of activated bentonite.
  References:
  Kellenberger D., Althaus H.-J., Jungbluth N., Künniger T., Lehmann M. and Thalmann P. (2007) Life Cycle Inventories of Building Products. Final report ecoinvent Data v2.0 No. 7. EMPA Dübendorf, Swiss Centre for Life Cycle Inventories, Dübendorf, CH.
  Virta R. L. (2015) USGS 2013 Minerals Yearbook – Clay and shale [advance release]
  production volume 1.585e10 kg; name RP_PV
    Literature value. The U.S. Geological Survey reports a world production volume of 16210 thousand metric tons in 2016 (USGS 2017).
    Reference:
    U.S. Geological Survey (USGS) (2017) Mineral Commodity Summaries, Clays, January 2017, https://minerals.usgs.gov/minerals/pubs/commodity/clays/mcs-2017-clays.pdf (accessed on the 2017-08-08).
  property carbon content, fossil 0
    Bentonite is an absorbent aluminium phyllosilicate, generally impure clay consisting mostly of montmorillonite, whose chemical formula is (Na,Ca)0.33(Al,Mg)2(Si4O10)(OH)2·nH2O (ecoinvent v2.2 report 7_part XIX)
  property carbon content, non-fossil 0
    (same comment as for bentonite)
  property price 0.096 EUR2005
    Literature value; could be too high as it is not "at mine", but import / export; price found at: http://data.un.org/Data.aspx?q=bentonite&d=ComTrade&f=_l1Code%3a26%3bcmdCode%3a250810.
  properties: carbon allocation 0 kg, carbon content 0, dry mass 1 kg, water content 0, water in wet mass 0 kg, wet mass 1 kg

## Inputs from technosphere
- diesel, burned in building machine: 0.0921 MJ; lognormal variance with pedigree 0.0426, pedigree (1,3,5,5,1)
  properties: heating value, net 1 MJ
- electricity, medium voltage: 2.7293e-7, 4.08548e-7, 1.29064e-7, 2.40238e-6, 1.41002e-6, 1.67171e-6, 2.03056e-5, 4.84291e-8, 0.000405052, 0.000136096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 kWh (47 suppliers, which the file names only by identifier); sum of these 0.000714 kWh; lognormal variance with pedigree 0.0426, pedigree (1,3,5,5,1)
  Literature data.
  Reference:
  Süd-Chemie (1999) vereinfachte Umwelterklärung Bentonit 1999, Standort Moosburg. Süd-Chemie AG, München und Moosburg, D-80333 München.
- ethylene glycol: 3.62e-6 kg; lognormal variance with pedigree 0.0426, pedigree (1,3,5,5,1)
  (same comment as for electricity, medium voltage)
  properties: carbon content, fossil 0.387097, dry mass 1 kg, heating value, net 23.44 MJ, wet mass 1 kg
- heat, district or industrial, other than natural gas: 0.00818437, 3.79167e-6, 8.33384e-7 MJ (3 suppliers, which the file names only by identifier); sum of these 0.008189 MJ; lognormal variance with pedigree 0.0426, pedigree (1,3,5,5,1)
  properties: heating value, net 1 MJ
- lubricating oil: 8.06e-5 kg; lognormal variance with pedigree 0.0426, pedigree (1,3,5,5,1)
  (same comment as for electricity, medium voltage)
  properties: carbon content, fossil 0.75, dry mass 1 kg, heating value, net 40.2 MJ, wet mass 1 kg
  note on carbon content, fossil: Lubricating oil is produced from diesel. C-content/dry mass of fats and oils considered 75%, from: ecoinvent v2.2 report, n 15a, pg 40
  note on heating value, net: Literature value, Source: IPCC 2006, 2006 IPCC Guidelines for National Greenhouse Gas Inventories, Prepared by the National Greenhouse Gas Inventories Programme, Eggleston H.S., Buendia L., Miwa K., Ngara T. and Tanabe K. (eds). Published: IGES, Japan
- municipal solid waste: -3.99584e-7, -2.46725e-8, -1.62458e-8, -6.59663e-7, -7.83321e-8, -4.37882e-8, -4.977e-7, -1.93237e-7, -4.87519e-7, -1.25398e-7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 kg (44 suppliers, which the file names only by identifier); sum of these -0.000387 kg; lognormal variance with pedigree 0.0026, pedigree (1,3,1,5,1)
  (same comment as for electricity, medium voltage)
  production volume; = RP_PV*BP_municipal_solid_waste/ABS(RP)
    Calculated from the production volume of bentonite in proportion to the respective output amounts.
  properties: carbon content, fossil 0.171549, carbon content, non-fossil 0.261655, dry mass 0.771 kg, heating value, net 11.74 MJ, water content 0.297017, wet mass 1 kg
  note on carbon content, fossil: MSW composition in tab 4.1, ecoinvent v2.2 report 13_I. C content referred to 1 kg DM
  note on heating value, net: Value taken from the general comment of the treatment dataset.
- recultivation, bentonite mine: 1.55e-5 m2; lognormal variance with pedigree 0.1626, pedigree (1,3,5,5,1)
  Literature data.
  Reference:
  Süd-Chemie (1997) Umwelterklärung Bentonit 1997, Standort Moosburg. Süd-Chemie AG, München und Moosburg, D-80333 München.
- soda ash, light: 0.02 kg; lognormal variance with pedigree 0.1786, pedigree (4,5,5,5,5)
  Estimated value based on expert judgement.
  properties: carbon content, fossil 0.0517241, dry mass 1 kg, heating value, net 3.43 MJ, wet mass 1 kg
- tap water: 1.38752e-5, 2.11516e-5, 3.94679e-5, 0.000106324, 1.27985e-5, 0.00053336, 9.51189e-6, 0.00610351 kg (8 suppliers, which the file names only by identifier); sum of these 0.00684 kg; lognormal variance with pedigree 0.0426, pedigree (1,3,5,5,1)
  (same comment as for electricity, medium voltage)
  properties: carbon content, fossil 0.00178991, dry mass 0.000337476 kg, water content 2962.17, wet mass 1 kg
  note on carbon content, fossil: Bicarbonate content is 2.93 mol/m3. CO2 content is 0.1 mol/m3 (ecoinvent v2.2 report 8, Tab 93.1).
- transport, passenger car: 0.0385 km; lognormal variance with pedigree 0.1626, pedigree (1,3,5,5,1)
  Transport, passenger car is in this cased used as a proxy for emissions caused by using conveyor belt.
  Reference:
  Süd-Chemie (1999) vereinfachte Umwelterklärung Bentonit 1999, Standort Moosburg. Süd-Chemie AG, München und Moosburg, D-80333 München.'
- wastewater, average: -3.52387e-8, -5.86388e-6, -2.08777e-8 m3 (3 suppliers, which the file names only by identifier); sum of these -5.92e-6 m3; lognormal variance with pedigree 0.0026, pedigree (1,3,1,5,1)
  (same comment as for electricity, medium voltage)
  production volume; = RP_PV*BP_wastewater_average/ABS(RP)
    (same comment as for municipal solid waste)
  properties: carbon content, non-fossil 0.194039, dry mass 0.346837 kg, water content 2882.2, wet mass 1000 kg
  note on carbon content, non-fossil: 0.0673 kg TOC/m3 (Tab A.17, ecoinvent v2.2 report 13_I). TOC was considered as Total Carbon.

## Inputs from nature
- Clay, bentonite [natural resource, in ground]: 1 kg; lognormal variance with pedigree 0.0426, pedigree (1,3,5,5,1)
  (same comment as for electricity, medium voltage)
- Occupation, mineral extraction site [natural resource, land]: 0.0065 m2*year; lognormal variance with pedigree 0.0826, pedigree (1,3,5,5,1)
  Calculated value. Based on Süd-Chemie (1997), the area of the mine was 247 ha in 1997, of which 233.1 ha was being used for storage, while 13.9 ha was being mined. Assuming that the total surface of the mine (247 ha) stays constant over time (meaning that a portion of the surface used is restored every year) and based on an average annual production volume of bentonite of 380000 tonnes, the land occupation is 0.0065 m2*year/kg bentonite.
  Reference:
  Süd-Chemie (1997) Umwelterklärung Bentonit 1997, Standort Moosburg. Süd-Chemie AG, München und Moosburg, D-80333 München.
- Transformation, from unspecified [natural resource, land]: 0.000219298 m2; lognormal variance with pedigree 0.1626, pedigree (1,3,5,5,1)
  Calculated value based on literature data (Süd-Chemie 1997). The volume of material extracted (including the overburden material and the bentonite) is 2.75 mio m3 per year. The average thickness of the overburden layer and bentonite layer is 33 m in total. Based on an annual production volume of bentonite of 380000 tonnes, the transformed land per kg of bentonite produced is 2.19E-4 m2.
  Reference:
  Süd-Chemie (1997) Umwelterklärung Bentonit 1997, Standort Moosburg. Süd-Chemie AG, München und Moosburg, D-80333 München.
- Transformation, to mineral extraction site [natural resource, land]: 0.000219298 m2; lognormal variance with pedigree 0.1626, pedigree (1,3,5,5,1)
  (same comment as for Transformation, from unspecified)
- Water, unspecified natural origin [natural resource, in water]: 3.87e-5 m3; name water_UNO_input; lognormal variance with pedigree 0.0426, pedigree (1,3,5,5,1)
  (same comment as for electricity, medium voltage)

## Emissions to nature
- Water [air, unspecified]: 9.108e-6 m3; = (tap_water_input/1000*fraction_TW_to_air)+(water_UNO_input*fraction_PW_to_air); lognormal variance with pedigree 0.0827, pedigree (2,2,5,5,1)
  Calculated as a fraction of the input of water. For more details, refer to the mathematical relation and the parameters.
  property fraction, origin: fresh water 0.150198; name fraction_origin_fresh_water
  property fraction, origin: salt water 0; name fraction_origin_salt_water
  property fraction, origin: unspecified 0.849802; name fraction_origin_unspecified
- Water [water, unspecified]: 3.0512e-5 m3; = (tap_water_input/1000)*(1-fraction_TW_to_air)+water_UNO_input*(1-fraction_PW_to_air)-0.00000592; lognormal variance with pedigree 0.0827, pedigree (2,2,5,5,1)
  (same comment as for Water)
  property carbon content, fossil 0; name C_content_fossil
  property carbon content, non-fossil 0; name C_content_non_fossil
  property dry mass 0 kg; name DM
  property fraction, origin: fresh water 0.150198; name fraction_origin_fresh_water_Ww
  property fraction, origin: salt water 0; name fraction_origin_salt_water_Ww
  property fraction, origin: unspecified 0.849802; name fraction_origin_unspecified_Ww
  property water in wet mass 1000 kg; name WWM
  property wet mass 1000 kg; name WM

## Sampling procedure
The data is based on an environmental report of one German company (Süd-Chemie AG). It is assumed to be representative of the global production.

## Extrapolations
This dataset has been copied from an original dataset covering the geography DE. The uncertainty has been adjusted accordingly.

## Review by Emilia Moreno Ruiz 2017-08-09
This dataset was additionally reviewed in a separate review process by Eric Johnson of Atlantic Consulting as well as Emilia Moreno Ruiz and Gregor Wernet of ecoinvent.
