# hydraulic digger production

Dataset: EcoSpold 2, unit process
Geography: RoW
Time period: 1996-01-01 to 2023-12-31
Technology level: current
Classification: ISIC rev.4 ecoinvent: 2824:Manufacture of machinery for mining, quarrying and construction
Classification: EcoSpold01Categories: construction processes/civil engineering
Synonyms: engine; excavator
Tags: ConvertedDataset
Scenario: Business-as-Usual
System model: Allocation, cut-off by classification
Generated by: Daniel Kellenberger (obsolete)
Published in: Kellenberger D. 2007
Database: ecoinvent
isCopyrightProtected: true
accessRestrictedTo: 1

## General comment
The module describes a fictitious machine made 100% of steel. The energy consumption for the production process is assumed to be the same as the energy consumption for the production of a car. The transportation distances for delivering the parts to the assembly plant are estimated. This module should not be used if its relative importance would be high in a certain environmental inventory. Average service life:10'000 hours.
[This dataset was already contained in the ecoinvent database version 2. It was not individually updated during the transfer to ecoinvent version 3. Life Cycle Impact Assessment results may still have changed, as they are affected by changes in the supply chain, i.e. in other datasets. This dataset was generated following the ecoinvent quality guidelines for version 2. It may have been subject to central changes described in the ecoinvent version 3 change report (http://www.ecoinvent.org/database/ecoinvent-version-3/reports-of-changes/), and the results of the central updates were reviewed extensively. The changes added e.g. consistent water flows and other information throughout the database. The documentation of this dataset can be found in the ecoinvent reports of version 2, which are still available via the ecoinvent website. The change report linked above covers all central changes that were made during the conversion process.]

## Included activities end
Includes the most important materials, the transportation of the parts to the assembly plant and of the hydraulic digger to the end-user. Also included is the requirement of electricity and heating energy. No disposal is included as it is assumed that all materials used in the machine are 100% recycled.

## Geography
Certain elementary flows or intermediate product flows are extrapolated from Swiss conditions.

## Technology
Average current technology for one typical machine representing the category.

## Reference product
- hydraulic digger: 1 unit; By-product classification allocatable product; CPC 44427: Mechanical shovels, excavators and shovel loaders, except front-end shovel loaders and machinery with a 360-de[…]; HS2017 8429: Bulldozers, graders, levellers, scrapers, angledozers, mechanical shovels, excavators, shovel loaders, tampin[...]
  EcoSpold01Location=RER
  production volume 2.67763 unit
    This is a placeholder value that does not reflect real-world production volumes. This dataset does not currently require a real-world production volume to work in the database framework, and no actual data were collected yet. This has no negative effect on the results of the ecoinvent database.
  property price 10312.5 EUR2005
    Calculated based on inputs: The price of the product has been calculated as a sum of the values of the material and energy inputs for this product. This value is therefore a rough estimation. It may underestimate the real price since there are additional expenses when producing any product. These expences can include for example labour costs, treatment of waste materials and profit for the producer. Please consider carefully whether this level of data quality is acceptable for your application.
  properties: carbon allocation 0 kg, carbon content 0

## Inputs from technosphere
- electricity, medium voltage: 461.936, 9214.59, 3096.07, 141.461, 28.3132, 6.07948, 951.549 kWh (7 suppliers, which the file names only by identifier); sum of these 13900 kWh; lognormal variance with pedigree 0.06, pedigree (1,5,5,5,1)
  EcoSpold01Location=UCTE
- heat, district or industrial, natural gas: 2182.53, 132817 MJ (2 suppliers, which the file names only by identifier); sum of these 135000 MJ; lognormal variance with pedigree 0.06, pedigree (1,5,5,5,1)
  EcoSpold01Location=RER
  properties: heating value, net 1 MJ
- reinforcing steel: 10500 kg; lognormal variance with pedigree 0.06, pedigree (1,5,5,5,1)
  EcoSpold01Location=RER
  properties: carbon content, fossil 0.004, dry mass 1 kg, wet mass 1 kg
- steel, low-alloyed, hot rolled: 4500 kg; lognormal variance with pedigree 0.06, pedigree (1,5,5,5,1)
  EcoSpold01Location=RER
  properties: carbon content, fossil 0.005, dry mass 1 kg, wet mass 1 kg
  note on carbon content, fossil: Low alloyed steel composition given in Tab. 3.2 ecoinvent v2.2 report 10_partII. Steel assumed to have a C content of 0.5%

## Sampling procedure
Most data from the LCA study Oekoinventare von Energiesystemen 1996.

## Extrapolations
See geography This dataset has been copied from an original dataset covering the geography RER. The uncertainty has been adjusted accordingly.

## Review by Roberto Dones 2003-07-16
passed
