# sawlog and veneer log, softwood, measured as solid wood under bark, import from Europe without Switzerland

Dataset: EcoSpold 2, unit process
Geography: CH
Time period: 2019-01-01 to 2023-12-31
Technology level: current
Classification: ISIC rev.4 ecoinvent: 0220:Logging
Scenario: Business-as-Usual
System model: Allocation, cut-off by classification
Generated by: [System]
Database: ecoinvent
isCopyrightProtected: true
accessRestrictedTo: 1

## General comment
This dataset describes the transport (expressed in tkm) needed for an average export European sawlog and veneer log, softwoodto Switzerland. Transport distances are based on expert judgment and are in line with the ecoinvent default transport assumption for Europe.

## Included activities start
The activity starts with the product delivered at the forest road.

## Included activities end
This activity ends at the point of 'handing over' the sawlogs from one country to the other at the border.

## Reference product
- sawlog and veneer log, softwood, measured as solid wood under bark: 1 m3; By-product classification allocatable product; CPC 3110: Wood, sawn or chipped lengthwise, sliced or peeled, of a thickness exceeding 6 mm; railway or tramway sleepers […]; HS2017 4403: Wood in the rough, whether or not stripped of bark or sapwood, or roughly squared
  production volume 55367.3 m3; = 2713000/0.98*0.02
    2'713'000Kg represents the Swiss production mix of 'sawlog and veneer log, softwood, measured as solid wood under bark ', covering 98% of the Swiss market. The import from the rest of Europe covers the remaining 2 % of the market (FAOStat 2016).
  property heating value, net 4483.78 MJ
    Value based on the dataset "softwood forestry, mixed species, sustainable forest management"The property is based on a value of 11.58MJ/kg
  property price 80 EUR2005
    Expert judgement (Urs Luginbühl, Swiss Sawmilling industry, personal communication in June 2014). Cross-reference; Calculated as 90% of purchasers price based on: 2004 prices for World Import/Export data (USD/m3) from UN Commodity Trade Statistics Database (http://data.un.org/Data.aspx?d=ComTrade&f=_l1Code%3a45, [accessed 10th June 2010]) Commodity: 'Logs, poles, coniferous not treated or painted'.
  property wet mass 767.799 kg; name WM
  properties: apparent wood density 675.663 kg/m3, basic wood density 397.449, carbon allocation 223.113 kg, carbon content 0.494, carbon content, fossil 0, carbon content, non-fossil 0.494, dry mass 451.646 kg, dry wood density 451.646 kg/m3, heating value, gross 0 MJ, water content 0.7, water in wet mass 316.152 kg

## Inputs from technosphere
- sawlog and veneer log, softwood, measured as solid wood under bark: 1 m3
  Part of the Swiss market comes from import. The shares of Swiss production and import are defined in the PV comment.
  property basic wood density 397.449; name saw_veneer_logs_basic_wood_d
  properties: apparent wood density 675.663 kg/m3, carbon content, non-fossil 0.494, dry mass 451.646 kg, dry wood density 451.646 kg/m3, heating value, net 4483.78 MJ, water content 0.7, wet mass 767.799 kg
  note on heating value, net: Value based on the dataset "softwood forestry, mixed species, sustainable forest management"The property is based on a value of 11.58MJ/kg
- transport, freight, lorry, unspecified: 153.56 metric ton*km; = 0.2*WM; lognormal variance with pedigree 0.172, pedigree (3,5,3,1,4)
  import: lorry, 200 kg*km (expert guess)
