# heat production, mixed logs, at furnace 30kW, state-of-the-art 2014

Dataset: EcoSpold 2, unit process
Geography: CH
Time period: 2014-01-01 to 2023-12-31
Technology level: modern
Classification: ISIC rev.4 ecoinvent: 3530:Steam and air conditioning supply
Classification: EcoSpold01Categories: wood energy/heating systems
Scenario: Business-as-Usual
System model: Allocation, cut-off by classification
Share of production covered: 100 %
Generated by: Christian Bauer
Published in: Bauer, C. 2007
Database: ecoinvent
isCopyrightProtected: true
accessRestrictedTo: 1

## General comment
This activity represents heat production from combustion of wood logs in Switzerland in a new (=installed in 2014) furnace. Wood log LHV=9430 MJ/m3. It is supposed to be representative for average new installations. The inventory shall be considered valid for new wood log boilers with nominal capacities in the range of 15-50 kW.
Some emission data are from the late 1990's; key emission parameters (CO, PM, NOx, CH4, NMVOC) have been updated according to latest available data. The activity represents average annual operation including start-stop and part-load operation, which results in a reduced efficiency and increasing emissions compared to manufacturer information.
[This dataset was already contained in the ecoinvent database version 2. It was not individually updated during the transfer to ecoinvent version 3. Life Cycle Impact Assessment results may still have changed, as they are affected by changes in the supply chain, i.e. in other datasets. This dataset was generated following the ecoinvent quality guidelines for version 2. It may have been subject to central changes described in the ecoinvent version 3 change report (http://www.ecoinvent.org/database/ecoinvent-version-3/reports-of-changes/), and the results of the central updates were reviewed extensively. The changes added e.g. consistent water flows and other information throughout the database. The documentation of this dataset can be found in the ecoinvent reports of version 2, which are still available via the ecoinvent website. The change report linked above covers all central changes that were made during the conversion process.]

## Included activities start
From delivery of wood logs.

## Included activities end
This module describes the combustion of natural wood logs in a modern boiler. Included are the infrastructure, the wood requirements, the emissions to air, the electricity needed for operation, and the disposal of the ashes.

## Geography
Can be used for wood log combustion in Europe.

## Technology
New boiler technology to be installed today.

## Time period
Key emission factors PM, CO, NMVOC, NOx, CH4 were aupdated according to latest available information. Other emission data (which hardly depend on the combustion technology) are from the second half of the 1990´s.

## Parameters
- scaling factor: 1.33333 dimensionless; name scaling_factor; = 1/0.75; lognormal variance with pedigree 0.0023, pedigree (2,2,1,1,2)
  The scaling factor represents the inverse of the average annual efficiency of the boiler. This efficiency corresponds to average annual operation including start/stop (warm up / cool down) and will therefore be lower than nameplate efficiencies provided by manufacturers. Value according to personal information from Thomas Nussbaumer, Verenum, Switzerland (January 2014).
- share of hardwood: 0.4475 dimensionless; name share_hardwood
  Note that the hardwood and softwood shares do not add to 1. The difference is from industrial wood.
- share of softwood: 0.207 dimensionless; name share_softwood
  (same comment as for share of hardwood)

## Reference product
- heat, central or small-scale, other than natural gas: 1 MJ; name heat_out; = 0.75*scaling_factor; source Thomas Nussbaumer 2014; By-product classification allocatable product; CPC 17300: Steam and hot water
  Reference product scaled to 1. Emission data and amounts of other exchanges in the mathematical relation refer to the input of 1 MJ end energy (in the fuel) and were scaled to the output of 1MJ useful energy (heat). Efficiency provided by the source represents average annual operation including warm-up and cool-down and will therefore be lower than nameplate efficiencies provided by manufacturers,
  production volume 2.44e7 MJ; name APV_heat_out; = 2.44e9*0.01
    Literature value / calculation.
    Corresponds to the APV in the furnace category 8 according to the source. 1% of this APV is assumed to be provided by "state-of-the-art" technology.
  property price 0.0106 EUR2005
    Average European district heat price from Ecoheatcool and Euroheat 2005-2006, Ecoheat Work package 1: The European heat market. Final report. 10.6 EUR/GJ i s the price of district heat. http://www.solarthermalworld.org/files/Ecoheatcool%20WP1%20Web.pdf?download
  properties: carbon allocation 0 kg, carbon content 0, heating value, net 1 MJ

## Inputs from technosphere
- cleft timber, measured as dry mass: 0.0718667 kg; name cleft_timber; = 0.0539*scaling_factor; lognormal variance with pedigree 0.0193, pedigree (2,2,4,1,2)
  kg dry mass, including bark; 0.0539=wood input in [kg/MJ LHV]
  property apparent wood density 491.9 kg/m3; name cleft_timber_apparent_wood_d
  property basic wood density 378.4; name cleft_timber_basic_wood_d
  property carbon content, fossil 0; name cleft_timber_C_content_fossil
  property carbon content, non-fossil 0.494; name cleft_timber_C_content_non_fossil
  property dry mass 1 kg; name cleft_timber_DM
  property dry wood density 430 kg/m3; name cleft_timber_dry_wood_d
  property heating value, gross 20.4 MJ; name cleft_timber_Gross_Heat_Value
  property heating value, net 14.46 MJ; name cleft_timber_Net_Heat_Value
  property water content 0.3; name cleft_timber_water_content
  property water in wet mass 0.3 kg; name cleft_timber_WWM
  property wet mass 1.3 kg; name cleft_timber_WM
- electricity, low voltage: 0.00370667 kWh; = 0.00278*scaling_factor; source Bauer, C. 2007; lognormal variance with pedigree 0.018, pedigree (1,1,4,1,1)
  EcoSpold01Location=CH
  estimation, based on measurements
- furnace, logs, 30kW: 3.08642e-7 unit; = 1/(15*2000*30*3.6); lognormal variance with pedigree 0.0733, pedigree (2,2,5,5,2)
  estimation based on lifetime 15 years, annual operation time 2000 h/a, 30kW
- wood ash mixture, pure: -0.00056 kg; name ash; source Bauer, C. 2007; lognormal variance with pedigree 0.0086, pedigree (2,1,4,1,1)
  EcoSpold01Location=CH
  estimation, based on measurements
  production volume; = APV_heat_out*ash/heat_out
    Calculated from production volume of reference product using the relative outputs.
  properties: carbon content, non-fossil 0.012, dry mass 1 kg, wet mass 1 kg

## Emissions to nature
- Acetaldehyde [air, urban air close to ground]: 8.13333e-8 kg; = 6.1E-08*scaling_factor; source Bauer, C. 2007; lognormal variance with pedigree 0.438, pedigree (1,1,4,1,1)
  estimation, based on measurements
- Ammonia [air, urban air close to ground]: 2.30667e-6 kg; = 1.73e-6*scaling_factor; source Bauer, C. 2007; lognormal variance with pedigree 0.438, pedigree (1,1,4,1,1)
  estimation, based on measurements
- Arsenic ion [air, urban air close to ground]: 1.33333e-9 kg; = 1e-9*scaling_factor; source Bauer, C. 2007; lognormal variance with pedigree 0.438, pedigree (1,1,4,1,1)
  estimation, based on measurements
- Benzene [air, urban air close to ground]: 1.21333e-6 kg; = 9.1e-7*scaling_factor; source Bauer, C. 2007; lognormal variance with pedigree 0.438, pedigree (1,1,4,1,1)
  estimation, based on measurements
- Benzo(a)pyrene [air, urban air close to ground]: 6.66667e-10 kg; = 5e-10*scaling_factor; source Bauer, C. 2007; lognormal variance with pedigree 0.438, pedigree (1,1,4,1,1)
  estimation, based on measurements
- Bromine [air, urban air close to ground]: 8e-8 kg; = 6e-8*scaling_factor; source Bauer, C. 2007; lognormal variance with pedigree 0.438, pedigree (1,1,4,1,1)
  estimation, based on measurements
- Cadmium II [air, urban air close to ground]: 9.33333e-10 kg; = 7e-10*scaling_factor; source Bauer, C. 2007; lognormal variance with pedigree 0.438, pedigree (1,1,4,1,1)
  estimation, based on measurements
- Calcium II [air, urban air close to ground]: 7.8e-6 kg; = 5.85e-6*scaling_factor; source Bauer, C. 2007; lognormal variance with pedigree 0.438, pedigree (1,1,4,1,1)
  estimation, based on measurements
- Carbon dioxide, non-fossil [air, urban air close to ground]: 0.1308 kg; = 0.0981*scaling_factor; source Bauer, C. 2007; lognormal variance with pedigree 0.008, pedigree (1,1,4,1,1)
  estimation, based on measurements
- Carbon monoxide, non-fossil [air, urban air close to ground]: 0.00166667 kg; = 1250e-6*scaling_factor; source Thomas Nussbaumer 2014; lognormal variance with pedigree 0.108, pedigree (1,1,4,1,1)
  expert estimate (see source)
- Chlorine [air, urban air close to ground]: 2.4e-7 kg; = 1.8e-7*scaling_factor; source Bauer, C. 2007; lognormal variance with pedigree 0.438, pedigree (1,1,4,1,1)
  estimation, based on measurements
- Chromium III [air, urban air close to ground]: 5.28e-9 kg; = 3.96e-9*scaling_factor; source Bauer, C. 2007; lognormal variance with pedigree 0.438, pedigree (1,1,4,1,1)
  estimation, based on measurements
- Chromium VI [air, urban air close to ground]: 5.33333e-11 kg; = 4e-11*scaling_factor; source Bauer, C. 2007; lognormal variance with pedigree 0.488, pedigree (1,1,4,1,1)
  estimation, based on measurements
- Copper ion [air, urban air close to ground]: 2.93333e-8 kg; = 2.2e-8*scaling_factor; source Bauer, C. 2007; lognormal variance with pedigree 0.438, pedigree (1,1,4,1,1)
  estimation, based on measurements
- Dinitrogen monoxide [air, urban air close to ground]: 5.33333e-6 kg; = 4e-6*scaling_factor; source Bauer, C. 2007; lognormal variance with pedigree 0.438, pedigree (1,1,4,1,1)
  estimation, based on measurements
- Dioxins, measured as 2,3,7,8-tetrachlorodibenzo-p-dioxin [air, urban air close to ground]: 4.13333e-14 kg; = 3.1e-14*scaling_factor; source Bauer, C. 2007; lognormal variance with pedigree 0.438, pedigree (1,1,4,1,1)
  estimation, based on measurements
- Ethyl benzene [air, urban air close to ground]: 4e-8 kg; = 3e-8*scaling_factor; source Bauer, C. 2007; lognormal variance with pedigree 0.438, pedigree (1,1,4,1,1)
  estimation, based on measurements
- Fluorine [air, urban air close to ground]: 6.66667e-8 kg; = 5e-8*scaling_factor; source Bauer, C. 2007; lognormal variance with pedigree 0.438, pedigree (1,1,4,1,1)
  estimation, based on measurements
- Formaldehyde [air, urban air close to ground]: 1.73333e-7 kg; = 1.3e-7*scaling_factor; source Bauer, C. 2007; lognormal variance with pedigree 0.438, pedigree (1,1,4,1,1)
  estimation, based on measurements
- Hexachlorobenzene [air, urban air close to ground]: 9.6e-15 kg; = 7.2e-15*scaling_factor; source Bauer, C. 2007; lognormal variance with pedigree 0.438, pedigree (1,1,4,1,1)
  estimation, based on measurements
- Hydrocarbons, aliphatic, alkanes, unspecified [air, urban air close to ground]: 1.21333e-6 kg; = 9.1e-7*scaling_factor; source Bauer, C. 2007; lognormal variance with pedigree 0.438, pedigree (1,1,4,1,1)
  estimation, based on measurements
- Hydrocarbons, aliphatic, unsaturated [air, urban air close to ground]: 4.13333e-6 kg; = 3.1e-6*scaling_factor; source Bauer, C. 2007; lognormal variance with pedigree 0.438, pedigree (1,1,4,1,1)
  estimation, based on measurements
- Lead II [air, urban air close to ground]: 3.33333e-8 kg; = 2.5e-8*scaling_factor; source Bauer, C. 2007; lognormal variance with pedigree 0.438, pedigree (1,1,4,1,1)
  estimation, based on measurements
- Magnesium [air, urban air close to ground]: 4.8e-7 kg; = 3.6e-7*scaling_factor; source Bauer, C. 2007; lognormal variance with pedigree 0.438, pedigree (1,1,4,1,1)
  estimation, based on measurements
- Manganese II [air, urban air close to ground]: 2.26667e-7 kg; = 1.7e-7*scaling_factor; source Bauer, C. 2007; lognormal variance with pedigree 0.438, pedigree (1,1,4,1,1)
  estimation, based on measurements
- Mercury II [air, urban air close to ground]: 4e-10 kg; = 3e-10*scaling_factor; source Bauer, C. 2007; lognormal variance with pedigree 0.438, pedigree (1,1,4,1,1)
  estimation, based on measurements
- Methane, non-fossil [air, urban air close to ground]: 1.52e-5 kg; = 1.14e-5*scaling_factor; source Thomas Nussbaumer 2014; lognormal variance with pedigree 0.438, pedigree (1,1,4,1,1)
  expert estimate (see source)
- NMVOC, non-methane volatile organic compounds [air, urban air close to ground]: 3.54667e-5 kg; = 26.6e-6*scaling_factor; source Thomas Nussbaumer 2014; lognormal variance with pedigree 0.008, pedigree (1,1,4,1,1)
  expert estimate (see source)
- Nickel II [air, urban air close to ground]: 8e-9 kg; = 6e-9*scaling_factor; source Bauer, C. 2007; lognormal variance with pedigree 0.438, pedigree (1,1,4,1,1)
  estimation, based on measurements
- Nitrogen oxides [air, urban air close to ground]: 0.000106667 kg; = 8e-5*scaling_factor; source Thomas Nussbaumer 2014; lognormal variance with pedigree 0.038, pedigree (1,1,4,1,1)
  expert estimate (see source)
- PAH, polycyclic aromatic hydrocarbons [air, urban air close to ground]: 1.48e-8 kg; = 1.11e-8*scaling_factor; source Bauer, C. 2007; lognormal variance with pedigree 0.438, pedigree (1,1,4,1,1)
  estimation, based on measurements
- Particulate Matter, < 2.5 um [air, urban air close to ground]: 4.8e-5 kg; = 36e-6*scaling_factor; source Thomas Nussbaumer 2014; lognormal variance with pedigree 0.038, pedigree (1,1,4,1,1)
  expert estimate (see source)
- Particulate Matter, > 2.5 um and < 10um [air, urban air close to ground]: 2.66667e-6 kg; = 2e-6*scaling_factor; source Thomas Nussbaumer 2014; lognormal variance with pedigree 0.038, pedigree (1,1,4,1,1)
  expert estimate (see source)
- Pentachlorophenol [air, urban air close to ground]: 1.08e-11 kg; = 8.1e-12*scaling_factor; source Bauer, C. 2007; lognormal variance with pedigree 0.438, pedigree (1,1,4,1,1)
  estimation, based on measurements
- Phosphorus [air, urban air close to ground]: 4e-7 kg; = 3e-7*scaling_factor; source Bauer, C. 2007; lognormal variance with pedigree 0.438, pedigree (1,1,4,1,1)
  estimation, based on measurements
- Potassium I [air, urban air close to ground]: 3.12e-5 kg; = 2.34e-5*scaling_factor; source Bauer, C. 2007; lognormal variance with pedigree 0.438, pedigree (1,1,4,1,1)
  estimation, based on measurements
- Sodium I [air, urban air close to ground]: 1.73333e-6 kg; = 1.3e-6*scaling_factor; source Bauer, C. 2007; lognormal variance with pedigree 0.438, pedigree (1,1,4,1,1)
  estimation, based on measurements
- Sulfur dioxide [air, urban air close to ground]: 3.33333e-6 kg; = 2.5e-6*scaling_factor; source Bauer, C. 2007; lognormal variance with pedigree 0.438, pedigree (1,1,4,1,1)
  estimation, based on measurements
- Toluene [air, urban air close to ground]: 4e-7 kg; = 3e-7*scaling_factor; source Bauer, C. 2007; lognormal variance with pedigree 0.438, pedigree (1,1,4,1,1)
  estimation, based on measurements
- Water [air, urban air close to ground]: 1.55e-5 m3; lognormal variance with pedigree 0.0143, pedigree (2,2,4,1,2)
  calculation; ensures correct water balance
- Zinc II [air, urban air close to ground]: 4e-7 kg; = 3E-07*scaling_factor; source Bauer, C. 2007; lognormal variance with pedigree 0.438, pedigree (1,1,4,1,1)
  estimation, based on measurements
- m-Xylene [air, urban air close to ground]: 1.6e-7 kg; = 1.2e-7*scaling_factor; source Bauer, C. 2007; lognormal variance with pedigree 0.438, pedigree (1,1,4,1,1)
  estimation, based on measurements

## Sampling procedure
literature and expert judgement

## Review by Emilia Moreno Ruiz 2014-06-03
input changed to cleft timber
