# electricity, high voltage, import from BR-Southern grid

Dataset: EcoSpold 2, unit process
Geography: AR
Time period: 2020-01-01 to 2023-12-31
Technology level: current
Classification: ISIC rev.4 ecoinvent: 3510:Electric power generation, transmission and distribution
Scenario: Business-as-Usual
System model: Allocation, cut-off by classification
Generated by: Florentine Brunner
Published in: Suppen, N. 2017
Database: ecoinvent
isCopyrightProtected: true
accessRestrictedTo: 1

## General comment
This dataset represents the amount of imported electricity from id to AR. The import value includes all electricity imports, independently whether used within the importing country, or re-exported. For a discussion of different ways of modeling electricity trade in LCI, please refer to (Itten & Frischknecht 2012).
For structural reasons of the ecoinvent database the annual import volume is set to zero in this dataset. The import volume is considered directly in the respective high voltage electricity market of the importing geography.

## Included activities start
This activity represents the point of 'handing over' the electricity from one country to the other at the border.

## Included activities end
This dataset doesn't include any electricity losses or transmission infrastructure as these are accounted for in the market datasets

## Time period
The Annual Production Volume is valid for the year 2014.

## Reference product
- electricity, high voltage: 1 kWh; By-product classification allocatable product; CPC 17100: Electrical energy; HS2017 271600: Electrical energy
  production volume 1.20855e7 kWh
    For structural reasons of the ecoinvent database the annual import volume is set to zero in this dataset. The import volume is considered directly in the respective high voltage electricity market of the importing geography.
  property price 0.0977 EUR2005
    Temporary price data. Calculated as 90% of purchasers price based on: 94% of the average price (to account for a 6% loss in transformation and transmission) for electricity for industrial consumersin 2005 (excluded taxes). From IEA.
  properties: carbon allocation 0 kg, carbon content 0

## Inputs from technosphere
- electricity, high voltage: 1 kWh
  The origin (thermal or hydro) of the imported electricity from Brazil to Argentina varies with the season. Since the amounts of electricity imported from Brazil during 2014 are distributed over many months of the year, the import was modelled as Electricity market, high voltage, BR. Value taken from the file BASE_INFORME_MENSUAL.xls, available from CAMMESA "COMPAÑÍA ADMINISTRADORA DEL MERCADO MAYORISTA ELÉCTRICO SOCIEDAD ANÓNIMA" Supporting documentation available at: http://portalweb.cammesa.com/Memnet1/default.aspx Informe mensual

## Sampling procedure
This dataset represents the net amount of imported electricity from Brazil during 2014. The reported amount includes the netl electricity imports, independently whether used within the importing country, or re-exported.

## Extrapolations
The origin (thermal or hydro) of the imported electricity from Brazil to Argentina varies with the season. Since the amounts of electricity imported from Brazil during 2014 are distributed over many months of the year, the import was modelled as Electricity market, high voltage, BR. Source: SÍNTESIS DEL MERCADO ELÉCTRICO MAYORISTA DE LA REPÚBLICA ARGENTINA - Diciembre 2014. http://www.cnea.gov.ar/Sintesis-mercado-electrico-mayorista. Comisión Nacional de Energía Atómica. Enero de 2015
