# maize starch production

Dataset: EcoSpold 2, unit process
Geography: RoW
Time period: 2002-01-01 to 2023-12-31
Technology level: current
Classification: ISIC rev.4 ecoinvent: 1062:Manufacture of starches and starch products
Classification: EcoSpold01Categories: agricultural production/plant production
Tags: ConvertedDataset
Scenario: Business-as-Usual
System model: Allocation, cut-off by classification
Share of production covered: 100 %
Generated by: Thomas Nemecek
Published in: Nemecek, T. 2007
Database: ecoinvent
isCopyrightProtected: true
accessRestrictedTo: 1

## General comment
This dataset represents the production of 1 kg of maize starch with a water content of 14% by weight.
[This dataset was already contained in the ecoinvent database version 2. It was not individually updated during the transfer to ecoinvent version 3. Life Cycle Impact Assessment results may still have changed, as they are affected by changes in the supply chain, i.e. in other datasets. This dataset was generated following the ecoinvent quality guidelines for version 2. It may have been subject to central changes described in the ecoinvent version 3 change report (http://www.ecoinvent.org/database/ecoinvent-version-3/reports-of-changes/), and the results of the central updates were reviewed extensively. The changes added e.g. consistent water flows and other information throughout the database. The documentation of this dataset can be found in the ecoinvent reports of version 2, which are still available via the ecoinvent website. The change report linked above covers all central changes that were made during the conversion process.]

## Included activities start
From reception of the maize grain at the factory gate.

## Included activities end
This activity ends with the production of starch from maize. This dataset includes the production steps required to obtain maize starch from maize corns such as mechanical separation, swelling in process water, milling of the swelled corns, desiccation and drying of the extracted starch. Processing of process water and infrastructure use were included. This dataset doesn't include emissions to air and waste generation as no data related to these emissions was found.

## Geography
Values refer to the situation in Germany, and are assumed to be valid for the Global geography. The uncertainty has been adjusted accordingly.

## Technology
Refers to typical maize starch production in Germany. This technology includes the following manufacturing steps: mechanical separation of impurities; soaking of the maize grains for about 40 hours in 50 °C warm process water; milling of the soaked maize and separation of the germ. The germ is dried and pressed into corn oil; mechanical separation of starch from other components; mechanical desiccation and thermal drying of the extracted starch to obtain a final product with a maximum water content of 14% by weight; evaporation of the process water to obtain the by-products of maize such as gluten and maize-gluten feed.
References
Würdinger E., Roth U., Wegener A. & Peche R. (2003) Kunststoffe aus Nachwachsenden Rohstoffen: Vergleichende Ökobilanz für Loose-fill-Packmittel aus Stärke bzw. aus Polystyrol". Final report. BIfA, IFEU, Flo-Pak (eds.), Projektförderung: Deutsche Bundesstiftung Umwelt; Augsburg, März 2003, 514 p.

## Time period
Year when the data for this inventory was delivered.

## Parameters
- fraction, process water, to air: 0.9 dimensionless; name fraction_PW_to_air; lognormal variance with pedigree 0.092025, pedigree (4,4,3,2,4)
  Literature value (Statistics Canada, 2007 & Shaffer, K.H., 2008, Consumptive water use in the Great Lakes Basin, USGS) (Vionnet, S., Quantis Water Database - Technical Report, 2012).
- fraction, tap water, to air: 0.9 dimensionless; name fraction_TW_to_air; lognormal variance with pedigree 0.092025, pedigree (4,4,3,2,4)
  Calculated value. See comment in the other parametres present in this dataset. Tap water is considered to be always used as process water, thus process water fractions to air are applied to all tap water input flows to calculate the amount of water consumed in the processes.

## Reference product
- maize starch: 1 kg; By-product classification allocatable product; CPC 23220: Starches; inulin; wheat gluten; dextrins and other modified starches; HS2017 110812: Starch; maize (corn) starch
  EcoSpold01Location=DE
  production volume 5.873e10 kg
    2005 estimate ; p. 12 in LCM International (2002). Evaluation of the Community Policy for Starch and Starch Products <http://ec.europa.eu/agriculture/eval/reports/amidon/chap2.pdf>
  property carbon content, non-fossil 0.46
    C-content of starch is considered 46% on dry mass basis (from "Evolutionary and Biochemical Aspects", A.D. Kay and T. Vrede (in Global Ecology, 2010, Elsevier B.V., S.E. Jørgensen Ed.)).
  property heating value, net 11.64 MJ
    LHV is calculated based on the Carbon content of the product. More details can be found on the respective documentation.
  properties: carbon allocation 0.3956 kg, carbon content 0.46, carbon content, fossil 0, dry mass 0.86 kg, price 0.115 EUR2005, water content 0.162791, water in wet mass 0.14 kg, wet mass 1 kg

## Inputs from technosphere
- chemical factory, organics: 4e-10 unit; lognormal variance with pedigree 0.3427, pedigree (2,2,5,5,1)
  EcoSpold01Location=RER
  Estimation. No data was found on the use of infrastructure. Therefore “chemical factory, organics” was used as a proxy.
- electricity, medium voltage: 9.72609e-5, 0.000145589, 4.59931e-5, 0.000856107, 0.000502471, 0.000595728, 0.00723609, 1.72581e-5, 0.144344, 0.048499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 kWh (47 suppliers, which the file names only by identifier); sum of these 0.25444 kWh; lognormal variance with pedigree 0.0427, pedigree (2,2,5,5,1)
  EcoSpold01Location=DE
- heat, district or industrial, natural gas: 0.064454, 3.92233, 0.00121212 MJ (3 suppliers, which the file names only by identifier); sum of these 3.988 MJ; lognormal variance with pedigree 0.0427, pedigree (2,2,5,5,1)
  EcoSpold01Location=RER
  properties: heating value, net 1 MJ
- maize grain: 1.16677, 0.0908011, 0.00289971, 0.000249362, 0.000282166 kg (5 suppliers, which the file names only by identifier); sum of these 1.261 kg; lognormal variance with pedigree 0.0427, pedigree (2,2,5,5,1)
  properties: carbon content, non-fossil 0.46957, dry mass 0.86 kg, water content 0.162791, wet mass 1 kg
- tap water: 0.00396783, 0.00604862, 0.0112864, 0.0304048, 0.00365992, 0.152522, 0.00272007, 1.74539 kg (8 suppliers, which the file names only by identifier); sum of these 1.956 kg; source Würdinger E. 2003; lognormal variance with pedigree 0.0427, pedigree (2,2,5,5,1)
  Literature Value.
  EcoSpold01Location=RER
  properties: carbon content, fossil 0.00178991, dry mass 0.000337476 kg, water content 2962.17, wet mass 1 kg
  note on carbon content, fossil: Bicarbonate content is 2.93 mol/m3. CO2 content is 0.1 mol/m3 (ecoinvent v2.2 report 8, Tab 93.1).
- wastewater from maize starch production: -3.32551e-6, -0.000687674 m3 (2 suppliers, which the file names only by identifier); sum of these -0.000691 m3; lognormal variance with pedigree 0.0027, pedigree (2,2,1,5,1)
  EcoSpold01Location=CH
  production volume
    Calculated from the production volume of maize starch in proportion to the respective output amounts.
  properties: carbon content, non-fossil 0.825003, dry mass 3.85149 kg, water content 258.64, wet mass 1000 kg
  note on carbon content, non-fossil: COD= 7.34 kg/m3 (Tab A.19, ecoinvent v2.2 report 13_I). COD was converted to TOC, using conversion factors in Tab 4.10 (ecoinvent v2.2 report 13_IV). TOC was considered as Total Carbon.

## Emissions to nature
- Water [air, unspecified]: 0.0011385 m3; name water_to_air_unspecified; lognormal variance with pedigree 0.0827, pedigree (2,2,5,5,1)
  Calculated value based on literature values and expert opinion. See comments in the parametres' comment field.
  property fraction, origin: fresh water 1; name fraction_origin_fresh_water
  property fraction, origin: salt water 0; name fraction_origin_salt_water
  property fraction, origin: unspecified 0; name fraction_origin_unspecified
- Water [water, unspecified]: 0.0001265 m3; name water_to_water_unspecified; lognormal variance with pedigree 0.0827, pedigree (2,2,5,5,1)
  (same comment as for Water)
  property carbon content, fossil 0; name C_content_fossil
  property carbon content, non-fossil 0; name C_content_non_fossil
  property dry mass 0 kg; name DM
  property fraction, origin: fresh water 1; name fraction_origin_fresh_water_Ww
  property fraction, origin: salt water 0; name fraction_origin_salt_water_Ww
  property fraction, origin: unspecified 0; name fraction_origin_unspecified_Ww
  property water in wet mass 1000 kg; name WWM
  property wet mass 1000 kg; name WM

## Sampling procedure
Data based on a detailed literature study.

## Extrapolations
Maize production in Germany approximated by Swiss data. This dataset has been copied from an original dataset covering the geography DE. The uncertainty has been adjusted accordingly.

## Review by Maggie Osses 2007-10-24
Passed.
