# patagonian grenadier, capture by trawler and landing in fish blocks, frozen

Dataset: EcoSpold 2, unit process
Geography: RoW
Time period: 2011-01-01 to 2023-12-31
Technology level: current
Classification: ISIC rev.4 ecoinvent: 0311:Marine fishing
Synonyms: hoki; hake; grenadier; gadoids
Tags: combined production
Scenario: Business-as-Usual
System model: Allocation, cut-off by classification
Generated by: Angel Avadí
Published in: Vázquez-Rowe, I. 2013
Database: ecoinvent
isCopyrightProtected: true
accessRestrictedTo: 1

## General comment
This activity represents the capture of Patagonian grenadier (Macruronus magellanicus) along the southern Chilean coast by industrial processing vessels (FAO Area 87; Subarea 87.3). Patagonian grenadier is a gadoid from the Merluccidae family. Therefore, this type of hake is sold as hake in many international markets. The hake is processed on board, producing an intermediate fish block product. To produce this block, a set of processing stages on board are performed. In the first place, the fish is headed and passed through a filleting machine. The following stage consists of separating the skin from the flesh using a wheel and a blade. Prior to the formation of the fish blocks, the flesh containing the few remaining bones is removed. Finally, the last proccessing activity on board implies the packaging and stroage in the cooling chamber of the obtained fish blocks. The organic residues derived from the filleting machines are processed to produce fishmeal on board. Fish blocks are landed at a Chilean port (usually Punta Arenas or Chacabuco).

## Included activities start
Extraction of hake in south Pacific maritime areas and on board processing of hake-based fish blocks and residual fishmeal.

## Included activities end
Post-landing port activities were excluded from system boundaries.

## Geography
Capture of Patagonian grenadier (Macruronus magellanicus) is performed along the southern Chilean coast by industrial processing vessels (FAO Area 87; Subarea 87.3). Fish blocks are landed at a Chilean port (usually Punta Arenas or Chacabuco). Patagonian grenadier is also caught in other areas of the Southern Pacific.

## Technology
80 meter log industrial fishing vessels are responsible for fish block landings.

## Time period
Data collected are linked to landings in year 2011.

## Parameters
- annual landings per vessel: 6.027e6 kg; name landings_vessel_year; triangular min 5.9e6, mostLikely 6.027e6, max 6.1e6, pedigree (1,2,3,1,1)
  Annual landings of vessels in an specific fleet or coherent fleet segment, geometric mean
- average_weight_ trawler: 1.612e6 kg; name WeightTrawler; lognormal variance with pedigree 0.304725, pedigree (3,2,3,2,2)
  Average weight of trawler in a given fishery.
- lifetime: 50 year; lognormal variance with pedigree 0.3101, pedigree (4,2,3,1,1)
  Estimated lifetime of industrial vessels
- marine fuel use efficiency: 929.867 kg; name FUE; lognormal variance with pedigree 0.0026, pedigree (1,1,3,1,1)
  Amount of marine fuel consumed per landed unit of fish
  Uncertainty: B
- net calorific value: 42.7 MJ/kg; name net_cal_value; triangular min 41.3, mostLikely 42.7, max 43.4, pedigree (3,5,3,5,5)
  Net calorific value of marine diesel oil (MDO)
  Uncertainty: M

## Reference product
- fishmeal, 63-65% protein: 1 kg; name landedFishmeal; source Vázquez-Rowe, I. 2013; By-product classification allocatable product; CPC 21291: Flours, meals and pellets, inedible, of fish, crustaceans, molluscs or other aquatic invertebrates; HS2017 230120: Flours, meals and pellets; of fish or of crustaceans, molluscs or other aquatic invertebrates
  Fishmeal from the coproduction of fishmeal and fish oil from hake residues.
  production volume 2.70626e7 kg; = (LandVol*47/53)/5.76
    47% content of hake residue sent to fishmeal production. Conversion of roughly 5.76 kg of residue per kg of fishmeal residue produced.
  property carbon content, fossil 0.000902143; = 0.857142857142857*(1.0525/1000)
    Calculated from the inclusion rate of antioxidant cyclohexane in fishmeal
  property carbon content, non-fossil 0.463843
    Calculated from C_content = polysaccharids*0.444+protein*0.535+lipids*0.774 and polysaccharids = 1-(protein+lipids+ash)
  property price 1.27239 EUR2005
    Calculated value based on data from United Nations Commodity Trade Statistics Database (comtrade.un.org). UN comtrade category: 230120 Flours, meals and pellets; of fish or of crustaceans, molluscs or other aquatic invertebrates. Year 2015. Using exchange rate of 1EURO = 1.209 USD. Average of price of import into 5 main markets (EU, US, IN, JPN and CN).
  properties: ash content 0.015 kg, carbon allocation 0.425707 kg, carbon content 0.464746, dry mass 0.916 kg, energy content 17.9 MJ, fat content 0.0819, protein content 0.65, water content 0.084, water in wet mass 0.076944 kg, wet mass 0.992944 kg

## Inputs from technosphere
- antifouling paint emissions: -0.000188877 kg; name BP_amount_2; = 0.22*(landed/(1000+164.78))+0.22*(landedFishmeal/(1000+164.78)); source Vázquez-Rowe, I. 2013; lognormal variance with pedigree 0.0138, pedigree (4,3,3,5,2)
  Mass of solids from antifouling paint
  Uncertainty: D
  production volume; = LandVol * (BP_amount_2 / landed)
    Calculated from production volume of reference product using the relative outputs.
  properties: carbon content, fossil 0.21, carbon content, non-fossil 0.21, dry mass 1 kg, wet mass 1 kg
- diesel, burned in fishing vessel: 34.0882 MJ; = net_cal_value*FUE*(landed/(1000+164.78))+net_cal_value*FUE*(landedFishmeal/(1000+164.78)); source Vázquez-Rowe, I. 2013; lognormal variance with pedigree 0.0426, pedigree (1,1,5,5,1)
  Combustion of diesel in marige engines
  Uncertainty: D
- lubricating oil: 0.00148817, 0.00706455 kg (2 suppliers, which the file names only by identifier); sum of these 0.00855272 kg; = 9.96204*(landed/(1000+164.78))+9.96204*(landedFishmeal/(1000+164.78)); source Vázquez-Rowe, I. 2013; lognormal variance with pedigree 0.0427, pedigree (1,2,5,5,1)
  Lubricating oil used in vessel machinery.
  Uncertainty: D
  properties: carbon content, fossil 0.75, dry mass 1 kg, heating value, net 40.2 MJ, wet mass 1 kg
  note on carbon content, fossil: Lubricating oil is produced from diesel. C-content/dry mass of fats and oils considered 75%, from: ecoinvent v2.2 report, n 15a, pg 40
  note on heating value, net: Literature value, Source: IPCC 2006, 2006 IPCC Guidelines for National Greenhouse Gas Inventories, Prepared by the National Greenhouse Gas Inventories Programme, Eggleston H.S., Buendia L., Miwa K., Ngara T. and Tanabe K. (eds). Published: IGES, Japan
- trawler maintenance, steel: 0.00534926 kg; = ((WeightTrawler/(lifetime*landings_vessel_year)*(1000+164.78)))*(landed/(1000+164.78))+((WeightTrawler/(lifetime*landings_vessel_year)*(1000+164.78)))*(landedFishmeal/(1000+164.78)); source Pierre Fréon 2014; lognormal variance with pedigree 0.0439, pedigree (2,2,5,5,2)
  Maintenance of a trawler, per 1000 kg of light ship weight (LSW) over 35 years lifetime. Regressions based on mainly primary data were created to relate the weight of each inventory item to a purse seiner"s LSW, adjusted for trawler"s gear. The list of inventory items (granularity) contribute >95% of environmental impacts, as described in the reference publication.
  Uncertainty: D
- trawler, steel: 0.00534926 kg; = ((WeightTrawler/(lifetime*landings_vessel_year)*(1000+164.78)))*(landed/(1000+164.78))+((WeightTrawler/(lifetime*landings_vessel_year)*(1000+164.78)))*(landedFishmeal/(1000+164.78)); source Pierre Fréon 2014; lognormal variance with pedigree 0.3433, pedigree (2,2,5,5,2)
  Construction of a trawler, per 1000 kg of light ship weight (LSW). Regressions based on mainly primary data were created to relate the weight of each inventory item to a trawler"s LSW. The list of inventory items (granularity) contribute >95% of environmental impacts, as described in the reference publication.
  Uncertainty: D
  properties: lifetime 30 year, lifetime capacity [h] 48000 hour
- waste mineral oil: -5.81184e-5, -0.00614696, -0.00234765 kg (3 suppliers, which the file names only by identifier); sum of these -0.00855272 kg; = 9.96204*(landed/(1000+164.78))+9.96204*(landedFishmeal/(1000+164.78)); source Vázquez-Rowe, I. 2013; lognormal variance with pedigree 0.0047, pedigree (1,2,3,5,1)
  Amount of waste lubricant oil generated.
  Uncertainty: D
  production volume; = LandVol * (BP_amount_1 / landed)
    Calculated from production volume of reference product using the relative outputs.
  properties: carbon content, fossil 0.864444, dry mass 0.9 kg, heating value, net 34.7 MJ, water content 0.111111, wet mass 1 kg
  note on carbon content, fossil: Tab A.6, ecoinvent v2.2 report 13_I. C content has been calculated after data in the tables, and then referred to 1 kg DM
  note on heating value, net: Value taken from the general comment of the treatment dataset.

## Inputs from nature
- Fish, demersal, in ocean [natural resource, biotic]: 1.85128 kg; = 2156.33312977099*(landed/(1000+164.78))+2156.33312977099*(landedFishmeal/(1000+164.78)); source Vázquez-Rowe, I. 2013; lognormal variance with pedigree 0.0433, pedigree (1,2,5,5,2)
  Demersal fish in ocean, resource extracted by fisheries, including discards.
  Uncertainty: D

## Emissions to nature
- 1,1,1,2-Tetrafluoroethane [air, non-urban air or from high stacks]: 3.22378e-6 kg; = 0.003755*(landed/(1000+164.78))+0.003755*(landedFishmeal/(1000+164.78)); source Vázquez-Rowe, I. 2013; lognormal variance with pedigree 0.0821, pedigree (1,2,5,5,1)
  R125 represents 44% of the composition of the cooling agent R404A.
  Uncertainty: D
- 1,1,1-Trifluoroethane [air, non-urban air or from high stacks]: 2.93197e-7 kg; = 0.00034151*(landed/(1000+164.78))+0.00034151*(landedFishmeal/(1000+164.78)); source Vázquez-Rowe, I. 2013; lognormal variance with pedigree 0.0821, pedigree (1,2,5,5,1)
  R134a represents 4% of the composition of the cooling agent R404A.
  Uncertainty: D
- Chlorodifluoromethane [air, non-urban air or from high stacks]: 0.000672245 kg; = 0.7830179*(landed/(1000+164.78))+0.7830179*(landedFishmeal/(1000+164.78)); source Vázquez-Rowe, I. 2013; lognormal variance with pedigree 0.0821, pedigree (1,2,5,5,1)
  Cooling agent emissions of R22.
  Uncertainty: D
- Pentafluoroethane [air, non-urban air or from high stacks]: 3.80669e-6 kg; = 0.00443396*(landed/(1000+164.78))+0.00443396*(landedFishmeal/(1000+164.78)); source Vázquez-Rowe, I. 2013; lognormal variance with pedigree 0.0821, pedigree (1,2,5,5,1)
  R143a represents 52% of the composition of the cooling agent R404A.
  Uncertainty: D
- Discarded fish, demersal, to ocean [water, ocean]: 0.231409 kg; name discard; = 269.54*(landed/(1000+164.78))+269.54*(landedFishmeal/(1000+164.78)); source Vázquez-Rowe, I. 2011; lognormal variance with pedigree 0.0458, pedigree (3,3,5,5,2)
  Demersal fish discarded by fisheries. It is assmued, based on data from FAO (Kelleher, 2005), a 12.5% rate of discards for the Chile/Peru hake fisheries
  Uncertainty: D

## Sampling procedure
Two industrial vessels belonging to a Spanish company were included in the study. Together, they landed 11,000 metric tons of fish blocks in 2011.
