# coffee green bean production, arabica

Dataset: EcoSpold 2, unit process
Geography: BR-SP
Time period: 2020-01-01 to 2023-12-31
Technology level: current
Classification: ISIC rev.4 ecoinvent: 0127:Growing of beverage crops
Synonyms: coffee cultivation, coffee beans production, green coffee beans production
Tags: No
Scenario: Business-as-Usual
System model: Allocation, cut-off by classification
Generated by: André Dominghetti
Published in: Folegatti Matsuura, M. 2017
Database: ecoinvent
isCopyrightProtected: true
accessRestrictedTo: 1

## General comment
The raw data collected in interviews were organized in electronic spreadsheets and checked for completeness and consistency. Agricultural inputs were detailed as to their composition and physical characteristics. Agricultural operations were characterized in terms type of fuel and specific consumption. Irrigation is used to supply water to the crop, in the amount of 2412 m3/ha. Emissions from the agricultural process were estimated using the BRCalc/ICVCalc tool, developed by Embrapa Environment, which includes specific climate and soil databases for the 137 Brazilian agricultural mesoregions, in addition to databases of parameters related to agricultural crops, fertilisers and pesticides.
The main emission models adopted by BRCalc/ICVCalc (Folegatti-Matsuura et al., 2022) derive from the references: Nemecek et al. (2015), IPCC (2019), Nemecek & Kagi (2007), Folegatti-Matsuura & Picoli (2018). It was used the model BRLUC (Donke et al., 2020) to estimate the LUC emissions.
[This dataset is meant to replace the following datasets: - coffee green bean production, arabica, BR, 2001 - 2012]

## Included activities start
This activity starts with reforming and cleaning of the area after the harvest of the previous crop

## Included activities end
The dataset includes the inputs of correctives, mineral fertilisers and pesticides and organic fertiliser. The dataset includes the agricultural operations and the amount of fuel consumed during operations and emissions related. The dataset also includes direct field emissions and land use change emissions, with important regionalizations added. The dataset doesn't include: seedlings production, drying, cleaning and storage of harvested grains. The activity ends after harvest at the farm gate.

## Allocation
Coffee is a perennial crop and is cultivated in dedicated areas, not requiring any allocation actions.

## Geography
The inventory is modelled for Brazil, São Paulo

## Technology
This dataset represents the production of 1 kg of green coffee beans (Arabic) in the Mogiana region in the state of Sao Paulo, which is composed of the coffee production region of Campinas and Ribeirão Preto. Planting, cultivation and harvest are mechanized activities. This system is not irrigated. The period of 20 years was adopted as the average life span of a coffee plantation, from the cleaning of the land to the last year of the coffee plantation in production, before a new cleaning. In this study, it was assumed that the phases of implantation and formation of the coffee plantation last one year and two years, respectively. For the formation phase, the data collected correspond to the average of two years. The full production phase lasts 18 years. Grain production data were “annualized” (ie calculated for the reference of 1 hectare of coffee per year). Therefore, the input flows (natural resources, agricultural inputs and energy) and outflows (emissions to air, water and soil) of the initial phases were divided by 20. The input flows of the full production phase correspond to the average of two consecutive agricultural years, considering the behavior of the coffee plantation of alternating years of higher and lower production in succession. Mineral fertiliser input is 1534 kg ammonium sulphate, 255 kg monoammonium phosphate/ha, 1026 kg potassium chloride/ha, 15 kg N (inorganic nitrogen fertiliser)/ha and 20 kg P2O5 (inorganic phosphorus fertiliser)/ha. Total active ingredients (a.i.) applied as pesticides amount to 5.9 kg a.i./ha. The cattle manure input is 250 kg/ha. The average productivity is 2220 kg/ha, at 10% moisture.
The amount of packing for fertilisers was calculated by adding the NPK inputs (elements and not commercial fertiliser) multiplying this total by two.
The dataset represents pre-processed coffee bean, that in Brazil is called "café verde", which were obtained for production systems, typical of the regions studied. Yields represent a historical average, considering the biennial character of the coffee harvest. The data sources are databases of producers and consultants working, in the study regions. In Brazil, there are no official statistics considering production system.
The use of gypsum and dolomite is usual for Brazilian soil conditions, which are predominantly acidic (70% of areas), due to tropical conditions with poverty of rock source or high use of fertilizers, that leads to soil surface acidification (Quaggio, 2000). For coffee, gypsum and dolomite is essential for better rooting, deep layers absorption of nutrients and consequently lower risks of water stress (Resende, 2009; Mattiello et al, 2016).
References:
MATIELLO, J. B.; SANTINATO, R.; GARCIA, A. W. R.; ALMEIDA, S. R. Cultura de Café no Brasil: Manual de recomendações. São Paulo: Futurama/MAPA/PROCAFÉ, 2016. 585 p.
QUAGGIO, J. A. Acidez e calagem em solos tropicais. Campinas: Instituto Agronômico, 2000. 111p.
RESENDE, A. V. Micronutrientes na agricultura brasileira: disponibilidade, utilização e perspectivas. In: LAPIDO-LOUREIRO, F. E.; MELAMED, R.; FIGUEIREDO NETO, J. Fertilizantes: agroindústria e sustentabilidade. Rio de Janeiro: CETEM/MCT, 645p. 2009.

## Time period
Time period of the most of the data collected for this dataset.

## Reference product
- coffee, green bean: 1 kg; By-product classification allocatable product; CPC 01610: Coffee, green; HS2017 090111: Coffee; not roasted or decaffeinated
  This dataset represents the production of 1 kg of green coffee beans (Arabic) in the Mogiana region in the state of Sao Paulo, which is composed of the coffee production region of Campinas and Ribeirão Preto. Planting, cultivation and harvest are mechanized activities. This system is irrigated. The period of 20 years was adopted as the average life span of a coffee plantation, from the cleaning of the land to the last year of the coffee plantation in production, before a new cleaning. In this study, it was assumed that the phases of implantation and formation of the coffee plantation last one year and two years, respectively. For the formation phase, the data collected correspond to the average of two years. The full production phase lasts 18 years. Grain production data were “annualized” (ie calculated for the reference of 1 hectare of coffee per year). Therefore, the input flows (natural resources, agricultural inputs and energy) and outflows (emissions to air, water and soil) of the initial phases were divided by 20. The input flows of the full production phase correspond to the average of two consecutive agricultural years, considering the behavior of the coffee plantation of alternating years of higher and lower production in succession. Mineral fertiliser input is 1534 kg ammonium sulphate, 255 kg monoammonium phosphate/ha, 1026 kg potassium chloride/ha, 15 kg N (inorganic nitrogen fertiliser)/ha and 20 kg P2O5 (inorganic phosphorus fertiliser)/ha. Total active ingredients (a.i.) applied as pesticides amount to 5.9 kg a.i./ha. The cattle manure input is 250 kg/ha. The average productivity is 2220 kg/ha, at 10% moisture.
  production volume 2.43166e8 kg
    IBGE, 2021. Brazilian Institute of Geography and Statistic. Municipal Agricultural Production – PAM. Produção Agrícola Municipal [in Portuguese]. Available at: https://sidra.ibge.gov.br/home/ipp/brasil
  property price 1.6 EUR2005
    Calculated value based on data from United Nations Commodity Trade Statistics Database (comtrade.un.org). UN comtrade category: 90111 Coffee, not roasted, not decaffeinated. Year: 2005. Using exchange rate of 1EURO = 1.209 USD. Average of price of import into 5 main markets (EU, US, JP, IN and CN).
  properties: carbon allocation 0.444722 kg, carbon content 0.490083, carbon content, fossil 0, carbon content, non-fossil 0.490083, dry mass 0.907441 kg, water content 0.102, water in wet mass 0.092559 kg, wet mass 1 kg

## Inputs from technosphere
- ammonium nitrate: 0.691 kg; lognormal variance with pedigree 1.0709, pedigree (2,2,2,1,1)
  The amount of fertiliser was obtained from interviews with producers and experts. The nutrient content in the input was obtained from technical literature and technical regulation documents. The selection of the fertiliser from the ecoinvent database and its ammount was based on the commercial product.
  properties: dry mass 1 kg, wet mass 1 kg
- application of plant protection product, by field sprayer: 0.00282 ha; lognormal variance with pedigree 1.0709, pedigree (2,2,2,1,1)
  Refers to application of pesticides
- combine harvesting: 0.00045 ha; lognormal variance with pedigree 1.0709, pedigree (2,2,2,1,1)
  Refers to harvesting of coffee grains
- copper oxide: 0.00198 kg; lognormal variance with pedigree 1.0709, pedigree (2,2,2,1,1)
  No specific inventory was found in ecoinvent with chemical formula corresponding to a fertilizer with micronutients. It was necessary to adapt the amount of micronutrients to a processes (flows) available in this database, based on the molar masse of the micronutrients.
  properties: dry mass 1 kg, wet mass 1 kg
- diesel, low-sulfur: 0.00399 kg; lognormal variance with pedigree 1.2403, pedigree (3,2,2,1,3)
  The amount of diesel fuel (B12 mix in Brazil) used in agricultural operations not found in ecoinvent
  properties: carbon content, fossil 0.865, dry mass 1 kg, heating value, net 42.8 MJ, wet mass 1 kg
- dolomite: 1.04 kg; lognormal variance with pedigree 1.0709, pedigree (2,2,2,1,1)
  The amount of soil corrective was obtained from interviews with producers and experts.
  properties: carbon content, fossil 0.130435, dry mass 1 kg, wet mass 1 kg
- electricity, low voltage: 0.217 kWh; lognormal variance with pedigree 1.0709, pedigree (2,2,2,1,1)
  Electricity amount used in agricultural field
- fatty acid methyl ester: 0.000564 kg; lognormal variance with pedigree 1.2403, pedigree (3,2,2,1,3)
  The amount of biodiesel fuel (B12 mix in Brazil) used in agricultural operations not found in ecoinvent plus the fatty acids used as pesticide adjuvant
  properties: carbon content, fossil 0.041, carbon content, non-fossil 0.732, dry mass 1 kg, heating value, net 37.2 MJ, wet mass 1 kg
  note on heating value, net: Based on literature, report 17, page 439. Jungbluth, N., Chudacoff, M., Dauriat, A., Dinkel, F., Doka, G., Faist Emmenegger, M., Gnansounou, E., Kljun, N., Schleiss, K., Spielmann, M., Stettler, C., Sutter, J. 2007: Life Cycle Inventories of Bioenergy. ecoinvent report No. 17, Swiss Centre for Life Cycle Inventories, Dübendorf, CH.
- fertilising, by broadcaster: 0.00282 ha; lognormal variance with pedigree 1.0709, pedigree (2,2,2,1,1)
  Refers to application of fertilisers
- fruit tree seedling, for planting: 0.113 unit; lognormal variance with pedigree 1.0902, pedigree (1,1,2,1,1)
  The amount of coffee seedlings used to start coffee production
  properties: carbon content, non-fossil 1, dry mass 0.03 kg, wet mass 0.03 kg
- glyphosate: 0.00187 kg; lognormal variance with pedigree 1.0709, pedigree (2,2,2,1,1)
  The amount of pesticide or adjuvant was obtained from interviews with producers and experts. Concentration of the active ingredient was obtained in the Material Safety Data Sheet. The amount of dilution water was 200 L/ha per application.
  properties: carbon content, fossil 0.214286, dry mass 1 kg, wet mass 1 kg
- gypsum, mineral: 0.518 kg; lognormal variance with pedigree 1.0709, pedigree (2,2,2,1,1)
  The amount of soil corrective was obtained from interviews with producers and experts.
  properties: dry mass 1 kg, wet mass 1 kg
- inorganic nitrogen fertiliser, as N: 0.000473 kg; lognormal variance with pedigree 1.0709, pedigree (2,2,2,1,1)
  (same comment as for ammonium nitrate)
  properties: dry mass 1 kg, wet mass 1 kg
- inorganic phosphorus fertiliser, as P2O5: 0.00793 kg; lognormal variance with pedigree 1.0709, pedigree (2,2,2,1,1)
  (same comment as for ammonium nitrate)
  properties: dry mass 1 kg, wet mass 1 kg
- iron sulfate: 0.00184 kg; lognormal variance with pedigree 1.0709, pedigree (2,2,2,1,1)
  (same comment as for copper oxide)
  properties: dry mass 1 kg, wet mass 1 kg
- limestone and gypsum application, by spreader: 0.00101 ha; lognormal variance with pedigree 1.0709, pedigree (2,2,2,1,1)
  Refers to application of soil correctives
- manganese sulfate: 0.00302 kg; lognormal variance with pedigree 1.0709, pedigree (2,2,2,1,1)
  (same comment as for copper oxide)
  property molecular weight 0 g/mol; name manganese_sulfate_output_MW
  properties: dry mass 1 kg, wet mass 1 kg
- manure, solid, cattle: 0.113 kg; lognormal variance with pedigree 1.0709, pedigree (2,2,2,1,1)
  This fertiliser is a mixture of animal manure and coffee straw, in a 50:50 ratio.
  properties: carbon content, non-fossil 0.441, dry mass 0.22 kg, water content 3.5454, wet mass 1 kg
- monoammonium phosphate: 0.115 kg; lognormal variance with pedigree 1.0709, pedigree (2,2,2,1,1)
  (same comment as for ammonium nitrate)
  properties: dry mass 1 kg, nitrogen content 0.084, phosphorus content 0.226939, wet mass 1 kg
  note on nitrogen content: Nitrogen content (on a dry matter basis) of monoammonium phosphate is calculated from the molecular formula of the nutrient present in the substance.
  note on phosphorus content: Phosphorus content (on a dry matter basis) of monoammonium phosphate is calculated from the molecular formula of the nutrient present in the substance.
- packaging, for fertilisers: 1.11 kg; lognormal variance with pedigree 1.6408, pedigree (4,3,2,5,4)
  The HDPE packaging was considered for macronutrient fertilisers. Soil correctives were not considered in the packaging calculation since these are transported in bulk. The amount of packaging for pesticides was also estimated. It was considered twice the value of the active ingredient of fertilisers and pesticides applied in the field to account for the packaging of the diluted products. The production and disposal of the packaging were included in this exchange.
  properties: carbon content, fossil 0.825301, dry mass 1 kg, price 0.0642 EUR2005, wet mass 1 kg
  note on carbon content, fossil: Considering a chemical formula (C2H4)n for polyethylene, carbon content-fossil is calculated to be 0.856286 kg of Carbon per kg of dry mass.
- packaging, for pesticides: 0.00529 kg; lognormal variance with pedigree 1.6408, pedigree (4,3,2,5,4)
  (same comment as for packaging, for fertilisers)
  properties: carbon content, fossil 0.85714, dry mass 1 kg, price 0.0642 EUR2005, wet mass 1 kg
- pesticide, unspecified: 0.000775 kg; lognormal variance with pedigree 1.0709, pedigree (2,2,2,1,1)
  The commercial pesticides not found in the ecoinvent database were summed up and added as “pesticide, unspecified”
  properties: carbon content, fossil 0.486978, dry mass 1 kg, wet mass 1 kg
- planting with starter fertiliser, by no till planter: 2.25e-5 ha; lognormal variance with pedigree 1.0709, pedigree (2,2,2,1,1)
  Refers to seedlings planting
- potassium chloride: 0.462 kg; lognormal variance with pedigree 1.0709, pedigree (2,2,2,1,1)
  (same comment as for ammonium nitrate)
  properties: dry mass 1 kg, wet mass 1 kg
- tillage, subsoiling, by subsoiler plow: 2.25e-5 ha; lognormal variance with pedigree 1.0709, pedigree (2,2,2,1,1)
  Refers to the operation of subsoiling, for preparing the field before the seedlings are planted
- weed control, by brush cutter, pasture: 2.25e-5 ha; lognormal variance with pedigree 1.0709, pedigree (2,2,2,1,1)
  Refers to weed control operation
- zinc monosulfate: 0.003 kg; lognormal variance with pedigree 1.0709, pedigree (2,2,2,1,1)
  (same comment as for copper oxide)
  properties: dry mass 1 kg, wet mass 1 kg

## Inputs from nature
- Carbon dioxide, in air [natural resource, in air]: 1.65 kg; lognormal variance with pedigree 1.0709, pedigree (2,2,2,1,1)
  Carbon dioxide (CO2) absorption from air during photosynthesis was also included, according to Nemecek and Schnetzer (2012). It considers the carbon content of the reference product based on the ecoinvent database (Jungbluth et al., 2007).
- Energy, gross calorific value, in biomass [natural resource, biotic]: 3.6 MJ; lognormal variance with pedigree 1.0709, pedigree (2,2,2,1,1)
  The calorific value of the reference product was based on the ecoinvent database (Jungbluth et al., 2007).
- Occupation, arable land, unspecified use [natural resource, land]: 4.5 m2*year; lognormal variance with pedigree 1.1022, pedigree (3,1,2,1,1)
  The land occupation was calculated based on crop yield
- Transformation, from permanent crop, non-irrigated, intensive [natural resource, land]: 0.225 m2; lognormal variance with pedigree 1.0608, pedigree (2,1,2,1,1)
  The LUC input comprises the actual data related to land transformation. This land transformation flow is irrelevant to LUC and the amounts are equal in both the 'land transformation from' and 'land transformation to'.
- Transformation, to permanent crop, non-irrigated, intensive [natural resource, land]: 0.225 m2; lognormal variance with pedigree 1.0608, pedigree (2,1,2,1,1)
  (same comment as for Transformation, from permanent crop, non-irrigated, intensive)
- Ulexite [natural resource, in ground]: 0.00189 kg; lognormal variance with pedigree 1.0709, pedigree (2,2,2,1,1)
  Boron source, contains 10% boron. Amount of ulexite reported
- Water, unspecified natural origin [natural resource, in water]: 1.09 m3; lognormal variance with pedigree 1.0608, pedigree (2,1,2,1,1)
  Water consumed for irrigation and pesticide dilution. Estimated volume based on interviews with producers and experts

## Emissions to nature
- Ammonia [air, non-urban air or from high stacks]: 0.00499008 kg; lognormal variance with pedigree 1.33032, pedigree (3,2,2,2,3)
  Ammonia releases to air, according to the AGRAMMON model: 'Plant production' (Nemecek & Schnetzer, 2011)
- Benzene [air, non-urban air or from high stacks]: 2.91e-8 kg; lognormal variance with pedigree 1.1203, pedigree (3,2,2,1,3)
  Emissions derived from fuel combustion (diesel 88%, and biodiesel 12%), using emission factors from Nemecek & Kagi (2007)
- Benzo(a)pyrene [air, non-urban air or from high stacks]: 1.2e-10 kg; lognormal variance with pedigree 1.2403, pedigree (3,2,2,1,3)
  (same comment as for Benzene)
- Cadmium II [air, non-urban air or from high stacks]: 3.99e-11 kg; lognormal variance with pedigree 1.2203, pedigree (3,2,2,1,3)
  (same comment as for Benzene)
- Carbon dioxide, fossil [air, non-urban air or from high stacks]: 0.5065 kg; lognormal variance with pedigree 1.1089, pedigree (4,3,2,3,1)
  Carbon dioxide releases from urea and limestone application, according to IPCC (2006) plus emissions derived from fuel combustion (diesel 88%, and biodiesel 12%), using emission factors from Nemecek & Kagi (2007)
- Carbon dioxide, non-fossil [air, non-urban air or from high stacks]: 0.00156 kg; lognormal variance with pedigree 1.1089, pedigree (4,3,2,3,1)
  (same comment as for Benzene)
- Carbon monoxide, fossil [air, non-urban air or from high stacks]: 2.13e-5 kg; lognormal variance with pedigree 1.1203, pedigree (3,2,2,1,3)
  (same comment as for Benzene)
- Carbon monoxide, non-fossil [air, non-urban air or from high stacks]: 0.00268 kg; lognormal variance with pedigree 1.2189, pedigree (4,3,2,3,1)
  Emissions from burning plant residues during coffee area renovation, according to IPCC (2019)
- Chromium III [air, non-urban air or from high stacks]: 2e-10 kg; lognormal variance with pedigree 1.2403, pedigree (3,2,2,1,3)
  (same comment as for Benzene)
- Copper ion [air, non-urban air or from high stacks]: 6.79e-9 kg; lognormal variance with pedigree 1.1203, pedigree (3,2,2,1,3)
  (same comment as for Benzene)
- Dinitrogen monoxide [air, non-urban air or from high stacks]: 0.00662559 kg; lognormal variance with pedigree 1.1169, pedigree (4,3,2,3,3)
  Direct and indirect N2O emissions according to IPCC (2019) plus emissions derived from fuel combustion (diesel 88%, and biodiesel 12%), using emission factors from Nemecek & Kagi (2007) plus emissions from burning coffee husks and from burning plant residues during coffee area renovation according to IPCC (2019)
- Hydrocarbons, unspecified [air, non-urban air or from high stacks]: 1.2e-5 kg; lognormal variance with pedigree 1.1203, pedigree (3,2,2,1,3)
  (same comment as for Benzene)
- Methane, fossil [air, non-urban air or from high stacks]: 5.15e-7 kg; lognormal variance with pedigree 1.1203, pedigree (3,2,2,1,3)
  (same comment as for Benzene)
- Methane, non-fossil [air, non-urban air or from high stacks]: 0.00344121 kg; lognormal variance with pedigree 1.1369, pedigree (4,3,2,3,3)
  Emissions derived from fuel combustion (diesel 88%, and biodiesel 12%), using emission factors from Nemecek & Kagi (2007) plus emissions from burning coffee husks and from burning plant residues during coffee area renovation, according to IPCC (2019)
- Nickel II [air, non-urban air or from high stacks]: 2.79e-10 kg; lognormal variance with pedigree 1.2403, pedigree (3,2,2,1,3)
  (same comment as for Benzene)
- Nitrogen oxides [air, non-urban air or from high stacks]: 0.00736 kg; lognormal variance with pedigree 1.1269, pedigree (4,3,2,3,3)
  Emissions of NOx from applied mineral fertilisers, according to WFLDB (2019) plus emissions from burning plant residues during coffee area renovation, according to IPCC (2019)
- PAH, polycyclic aromatic hydrocarbons [air, non-urban air or from high stacks]: 1.31e-8 kg; lognormal variance with pedigree 1.1203, pedigree (3,2,2,1,3)
  (same comment as for Benzene)
- Particulate Matter, < 2.5 um [air, non-urban air or from high stacks]: 2.23e-7 kg; lognormal variance with pedigree 1.1203, pedigree (3,2,2,1,3)
  (same comment as for Benzene)
- Selenium IV [air, non-urban air or from high stacks]: 3.99e-11 kg; lognormal variance with pedigree 1.1203, pedigree (3,2,2,1,3)
  (same comment as for Benzene)
- Sulfur dioxide [air, non-urban air or from high stacks]: 4.03e-6 kg; lognormal variance with pedigree 1.1203, pedigree (3,2,2,1,3)
  (same comment as for Nitrogen oxides)
- Water [air, unspecified]: 0.8175 m3; lognormal variance with pedigree 0.118977, pedigree (2,1,2,5,1)
- Zinc II [air, non-urban air or from high stacks]: 3.99e-9 kg; lognormal variance with pedigree 1.1203, pedigree (3,2,2,1,3)
  (same comment as for Benzene)
- Abamectin [soil, agricultural]: 4.05e-7 kg; lognormal variance with pedigree 1.21232, pedigree (3,2,2,2,1)
  All the pesticides emissions were destinated to agricultural soil, according to Nemecek and Schnetzer (2012).
- Arsenic ion [soil, agricultural]: 7.29876e-6 kg
  Heavy metals emissions to agricultural soil through erosion are estimated by using the SALCA-heavy metal model (Nemecek et al., 2015).
- Azoxystrobin [soil, agricultural]: 4.28e-5 kg; lognormal variance with pedigree 1.23232, pedigree (3,2,2,2,1)
  (same comment as for Abamectin)
- Boscalid [soil, agricultural]: 7.09e-5 kg; lognormal variance with pedigree 1.23232, pedigree (3,2,2,2,1)
  (same comment as for Abamectin)
- Cadmium II [soil, agricultural]: 4.20662e-7 kg
  (same comment as for Arsenic ion)
- Carfentrazone-ethyl [soil, agricultural]: 1.26e-5 kg; lognormal variance with pedigree 1.21232, pedigree (3,2,2,2,1)
  (same comment as for Abamectin)
- Chlorantraniliprole [soil, agricultural]: 7.88e-7 kg; lognormal variance with pedigree 1.21232, pedigree (3,2,2,2,1)
  (same comment as for Abamectin)
- Chromium III [soil, agricultural]: 1.80362e-5 kg
  (same comment as for Arsenic ion)
- Copper ion [soil, agricultural]: 4.50034e-6 kg
  (same comment as for Arsenic ion)
- Cyproconazole [soil, agricultural]: 0.000136 kg; lognormal variance with pedigree 1.23232, pedigree (3,2,2,2,1)
  (same comment as for Abamectin)
- Epoxiconazole [soil, agricultural]: 6.76e-5 kg; lognormal variance with pedigree 1.23232, pedigree (3,2,2,2,1)
  (same comment as for Abamectin)
- Glyphosate [soil, agricultural]: 0.00187 kg; lognormal variance with pedigree 1.21232, pedigree (3,2,2,2,1)
  (same comment as for Abamectin)
- Lead II [soil, agricultural]: 8.96774e-6 kg
  (same comment as for Arsenic ion)
- Mercury II [soil, agricultural]: 4.5045e-8 kg; lognormal variance with pedigree 1.1183, pedigree (4,2,2,1,1)
  (same comment as for Arsenic ion)
- Oxyfluorfen [soil, agricultural]: 1.62e-5 kg; lognormal variance with pedigree 1.23232, pedigree (3,2,2,2,1)
  (same comment as for Abamectin)
- Pyraclostrobin [soil, agricultural]: 0.000219 kg; lognormal variance with pedigree 1.11233, pedigree (3,2,2,2,1)
  (same comment as for Abamectin)
- Tebuconazole [soil, agricultural]: 6.76e-5 kg; lognormal variance with pedigree 1.23232, pedigree (3,2,2,2,1)
  (same comment as for Abamectin)
- Thiamethoxam [soil, agricultural]: 0.000141 kg; lognormal variance with pedigree 1.23232, pedigree (3,2,2,2,1)
  (same comment as for Abamectin)
- Arsenic ion [water, surface water]: 7.29949e-10 kg; lognormal variance with pedigree 1.11233, pedigree (3,2,2,2,1)
  Emissions of heavy metals to surface water are calculated according to Schmidt (2007)
- Cadmium II [water, surface water]: 4.61564e-11 kg; lognormal variance with pedigree 1.11233, pedigree (3,2,2,2,1)
  Emissions of heavy metals to surface water are calculated according to Schmidt (2007)
- Chromium III [water, surface water]: 1.81188e-9 kg; lognormal variance with pedigree 1.23232, pedigree (3,2,2,2,1)
  Emissions of heavy metals to surface water are calculated according to Schmidt (2007)
- Copper ion [water, surface water]: 1.69106e-9 kg; lognormal variance with pedigree 1.11233, pedigree (3,2,2,2,1)
  Emissions of heavy metals to surface water are calculated according to Schmidt (2007)
- Lead II [water, surface water]: 8.62405e-10 kg; lognormal variance with pedigree 1.11233, pedigree (3,2,2,2,1)
  Emissions of heavy metals to surface water are calculated according to Schmidt (2007)
- Nitrate [water, ground-]: 0.31 kg; lognormal variance with pedigree 1.11233, pedigree (3,2,2,2,1)
  The SQCB-NO3 model was used according to Nemecek et al. (2015), considering only the quantity of water from precipitation (no irrigation was applied). Technical parameters are available in the BRCalc/ICVCalc tool (Folegatti-Matsuura et al., 2022).
- Phosphorus [water, surface water]: 0.000103 kg; lognormal variance with pedigree 1.11233, pedigree (3,2,2,2,1)
  Only the phosphorus emission to surface water caused by soil erosion was calculated, according to Nemecek et al., 2015. Required technical parameters are available in the BRCalc/ICVCalc tool (Folegatti-Matsuura et al., 2022).
- Water [water, ground-]: 0.0545 m3; lognormal variance with pedigree 0.118977, pedigree (2,1,2,5,1)
- Water [water, surface water]: 0.218 m3; lognormal variance with pedigree 0.118977, pedigree (2,1,2,5,1)

## Sampling procedure
The main source of data for agricultural inputs and operations is interview with relevant coffee producers located in Sao Paulo state, in the Mogiana Region. Emissions from the agricultural process are estimated using BRCalc/ICVCalc (Folegatti-Matsuura et al., 2022).
