# sugarcane processing, traditional annexed plant

Dataset: EcoSpold 2, unit process
Geography: RoW
Time period: 2012-01-01 to 2023-12-31
Technology level: current
Classification: ISIC rev.4 ecoinvent: 1072:Manufacture of sugar
Synonyms: sugarcane biorefinery
Scenario: Business-as-Usual
System model: Allocation, cut-off by classification
Share of production covered: 100 %
Generated by: Mateus Chagas
Published in: Mateus F. Chagas 2015
Database: ecoinvent
isCopyrightProtected: true
accessRestrictedTo: 1

## General comment
This dataset represents a typical Brazilian sugarcane mill processing of 2 million metric tonnes of sugarcane stalks per year for the production of raw sugar, ethanol (anhydrous and hydrated) and surplus bagasse. The plant operates 200 days per season.
The industrial process diverts 50% of sugarcane juice for row sugar production and the other 50%, along with molasses (a by-product of sugar crystallization process), is diverted to ethanol production process. It considers high-pressure boilers (22 bar, 300°C), mechanical drives in the crushing mills and azeotropic distillation for anhydrous ethanol production.
Overall process efficiencies assumed were 96% for sugars extraction, 90% for ethanol fermentation and 76.5% for sugar recovery as raw sugar. Each 1000 kg of cane stalks yields 51.3 kg of raw sugar, 32.3 L of hydrated ethanol (93% w/w), 23.0 L of anhydrous ethanol (99.6% w/w); 6.0 kWh of surplus electricity; and 81.8 kg of surplus bagasse (50% moisture).

## Included activities start
This activity starts when sugarcane arrives at the industrial area.

## Included activities end
The dataset includes the sugarcane conversion into raw sugar, ethanol and surplus bagasse. Processing equipment, chemical inputs, industrial area, water use treatment, and emissions to air are included in the inventory. Sugarcane processed arrives with 5% of vegetal impurities (sugarcane straw) and 1% of mineral impurities (dirt). The dataset doesn't include the surplus electricity production in traditional mills. No additional sugarcane straw recovery and industrial use is considered.
The activity ends when products are available at factory gate.

## Geography
The global dataset is modeled based on information from sugarcane processing plant in Brazil.

## Technology
This dataset represents an typical medium-scale annexed sugarcane mill facilitiy existing in Brazil.

## Time period
Time period where the technology is being implemented and used in Brazil.

## Reference product
- ethanol, without water, in 99.7% solution state, from fermentation: 1 kg; name BP3; source Mateus F. Chagas 2015; By-product classification allocatable product; CPC 35491: Biodiesel; HS2017 290511: Alcohols; saturated monohydric, methanol (methyl alcohol); CAS 64-17-5
  Anhydrous ethanol produced in traditional annexed plants in Brazil.
  production volume 2.30539e10 kg; = PV_RP*BP3/RP
    Estimation based on anhydrous ethanol production in traditional annexed plants. It was assumed that this technology only occurs in Brazil.
  property heating value, net 28.1 MJ
    Based on literature, page 275, Report 17: Jungbluth, N., Chudacoff, M., Dauriat, A., Dinkel, F., Doka, G., Faist Emmenegger, M., Gnansounou, E., Kljun, N., Schleiss, K., Spielmann, M., Stettler, C., Sutter, J. 2007: Life Cycle Inventories of Bioenergy. ecoinvent report No. 17, Swiss Centre for Life Cycle Inventories, Dübendorf, CH.
  property price 0.436 EUR2005
    Calculated using world prices in FAPRI2007, 2009. Agricultural outlook. The prices in 2003 and 2004 were assumed to be the same as the most recent year (2005). (http://www.fapri.missouri.edu/outreach/publications/ag_outlook.asp?current_page=outreach; accessed 22/06/10). Unit conversion from US gallon to kg - 1 gallon = 3.7856 liter * 0.789 kg/liter (ethanol density) = 2.9868 kg (from http://www.peteducation.com/category.cfm?c=0+1305 and http://en.wikipedia.org/wiki/Ethanol accessed 25/6/10).
  properties: allocation factor 0.202222, carbon allocation 0.521739 kg, carbon content 0.521739, carbon content, fossil 0, carbon content, non-fossil 0.521739, dry mass 1 kg, true value 7.848, water content 0, water in wet mass 0 kg, wet mass 1 kg

## Inputs from technosphere
All rows: source Mateus F. Chagas 2015
- acetic acid, without water, in 98% solution state: 2.31432e-6 kg; lognormal variance with pedigree 0.0113, pedigree (2,2,4,5,1)
  Chemicals used for the water treatment in a typical Brazilian sugarcane processing plant (LDC Bioenergia, 2010). Treatment of captured water and recycled water in closed circuits (parameterized by water catchment) were considered.
  properties: carbon content, fossil 0.400016, dry mass 1 kg, heating value, net 14.6 MJ, wet mass 1 kg
  note on heating value, net: Based on literature, page 10, Althaus H.-J., Chudacoff M., Hischier R., Jungbluth N., Osses M. and Primas A. (2007) Life Cycle Inventories of Chemicals. Final report ecoinvent data v2.0 No. 8. EMPA, Swiss Centre for Life Cycle Inventories, Dübendorf, CH, Online-Version under: www.ecoinvent.org.
- aluminium sulfate, powder: 1.78279e-5, 8.46313e-5 kg (2 suppliers, which the file names only by identifier); sum of these 0.000102459 kg; lognormal variance with pedigree 0.0113, pedigree (2,2,4,5,1)
  (same comment as for acetic acid, without water, in 98% solution state)
  properties: dry mass 1 kg, wet mass 1 kg
- ash, from combustion of bagasse from sugarcane: -0.0359506 kg; name BP4; lognormal variance with pedigree 0.0033, pedigree (2,2,1,5,1)
  Ash production. Based on computer simulation of the process validated using literature and industry data.
  production volume; = PV_RP*BP4/RP
    Ash produced in traditional annexed plants. It was assumed that this technology only occurs in Brazil.
  properties: dry mass 1 kg, wet mass 1 kg
- building, hall, steel construction: 4.08938e-7 m2; lognormal variance with pedigree 0.3446, pedigree (3,3,5,5,1)
  Economic investment was used to estimate the amount of equipment and infrastructure. Baseline values were taken from Macedo et al. (2004) and Macedo et al. (2008), using a scaling factor to adjust plant capacity.
- calcium chloride: 1.68896e-6, 5.84944e-6 kg (2 suppliers, which the file names only by identifier); sum of these 7.53839e-6 kg; lognormal variance with pedigree 0.0113, pedigree (2,2,4,5,1)
  (same comment as for acetic acid, without water, in 98% solution state)
  properties: dry mass 1 kg, wet mass 1 kg
- chemical, inorganic: 3.3479e-6 kg; lognormal variance with pedigree 0.0113, pedigree (2,2,4,5,1)
  Antibiotic for fermentation process. Based on computer simulation of the process validated using literature and industry data.
  properties: carbon content, fossil 0.003, dry mass 1 kg, wet mass 1 kg
  note on carbon content, fossil: This dataset is an unweighted average of 20 inorganic substances (listed in Tab 88.1, ecoinvent v2.2 report 8, part II), being part of the top100 chemicals included in this database. The C-content has also been calculated as an unweighted average of the C content of the substances composing this dataset.
- chemical, organic: 6.80815e-7 kg; = 0.0000117+0.0000489; lognormal variance with pedigree 0.0113, pedigree (2,2,4,5,1)
  Chemicals used for the water treatment in a typical Brazilian sugarcane processing plant (LDC Bioenergia, 2010). Treatment of captured water and recycled water in closed circuits (parameterized by water catchment) were considered. The amount contains also an amount to approximate the substance of 2-bromo-2-nitropropane-1,3-diol. Amount of this substance was: 0.0000489 kg
  properties: carbon content, fossil 0.628, dry mass 1 kg, heating value, net 19.03 MJ, wet mass 1 kg
  note on carbon content, fossil: This dataset is an unweighted average of 20 organic substances (listed in Tab 88.1, ecoinvent v2.2 report 8, part II), being part of the top100 chemicals included in this database. The C-content has also been calculated as an unweighted average of the C content of the substances composing this dataset.
- concrete, normal strength: 2.35278e-8, 8.16627e-9, 3.36059e-9, 4.48747e-9, 9.96337e-8, 4.18272e-8, 1.77381e-6 m3 (7 suppliers, which the file names only by identifier); sum of these 1.95481e-6 m3; lognormal variance with pedigree 0.3446, pedigree (3,3,5,5,1)
  (same comment as for building, hall, steel construction)
  properties: dry mass 2190 kg, water content 0.086758, wet mass 2380 kg
- cyclohexane: 5.37012e-5 kg; lognormal variance with pedigree 0.0113, pedigree (2,2,4,5,1)
  Replacement of cyclohexane in dehydration system. Based on computer simulation of the process validated using literature and industry data.
  properties: carbon content, fossil 0.857143, dry mass 1 kg, heating value, net 43.22 MJ, wet mass 1 kg
- dimethylamine: 4.72752e-6, 1.13692e-6 kg (2 suppliers, which the file names only by identifier); sum of these 5.86444e-6 kg; lognormal variance with pedigree 0.0113, pedigree (2,2,4,5,1)
  (same comment as for acetic acid, without water, in 98% solution state)
  properties: carbon content, fossil 0.533333, dry mass 1 kg, heating value, net 13.47 MJ, wet mass 1 kg
- dithiocarbamate-compound: 1.05493e-5 kg; lognormal variance with pedigree 0.0113, pedigree (2,2,4,5,1)
  (same comment as for acetic acid, without water, in 98% solution state)
  properties: carbon content, fossil 0.179339, dry mass 1 kg, wet mass 1 kg
- filter cake, from sugarcane juice filtration: -0.608913 kg; name BP6; lognormal variance with pedigree 0.0033, pedigree (2,2,1,5,1)
  Filter cake production. Based on computer simulation of the process validated using literature and industry data. Value in wet basis (moisture content 65%).
  production volume; = PV_RP*BP6/RP
    Filter cake produced in traditional annexed plants. It was assumed that this technology only occurs in Brazil.
  properties: carbon content, non-fossil 0.6514, dry mass 0.35 kg, price 0.03 EUR2005, water content 1.85714, wet mass 1 kg
- formaldehyde: 4.40181e-8, 1.84044e-7 kg (2 suppliers, which the file names only by identifier); sum of these 2.28062e-7 kg; lognormal variance with pedigree 0.0113, pedigree (2,2,4,5,1)
  (same comment as for acetic acid, without water, in 98% solution state)
  properties: carbon content, fossil 0.4, dry mass 1 kg, heating value, net 20.19 MJ, wet mass 1 kg
- hydrochloric acid, without water, in 30% solution state: 2.23943e-7, 1.02309e-6 kg (2 suppliers, which the file names only by identifier); sum of these 1.24704e-6 kg; lognormal variance with pedigree 0.0113, pedigree (2,2,4,5,1)
  (same comment as for acetic acid, without water, in 98% solution state)
  properties: dry mass 1 kg, heating value, net 3.32 MJ, wet mass 1 kg
- iron(III) chloride, without water, in 40% solution state: 6.03296e-5 kg; lognormal variance with pedigree 0.0113, pedigree (2,2,4,5,1)
  (same comment as for acetic acid, without water, in 98% solution state)
  properties: dry mass 1 kg, wet mass 1 kg
- lubricating oil: 2.54126e-5, 0.000120637 kg (2 suppliers, which the file names only by identifier); sum of these 0.000146049 kg; lognormal variance with pedigree 0.0113, pedigree (2,2,4,5,1)
  Lubrication oil for reception, preparation and milling equipments. Based on computer simulation of the process validated using literature and industry data.
  properties: carbon content, fossil 0.75, dry mass 1 kg, heating value, net 40.2 MJ, wet mass 1 kg
  note on carbon content, fossil: Lubricating oil is produced from diesel. C-content/dry mass of fats and oils considered 75%, from: ecoinvent v2.2 report, n 15a, pg 40
  note on heating value, net: Literature value, Source: IPCC 2006, 2006 IPCC Guidelines for National Greenhouse Gas Inventories, Prepared by the National Greenhouse Gas Inventories Programme, Eggleston H.S., Buendia L., Miwa K., Ngara T. and Tanabe K. (eds). Published: IGES, Japan
- magnesium sulfate: 2.19074e-7 kg; lognormal variance with pedigree 0.0113, pedigree (2,2,4,5,1)
  (same comment as for acetic acid, without water, in 98% solution state)
  properties: dry mass 1 kg, wet mass 1 kg
- metal working, average for chromium steel product manufacturing: 8.52704e-5 kg; lognormal variance with pedigree 0.3446, pedigree (3,3,5,5,1)
  (same comment as for building, hall, steel construction)
- metal working, average for steel product manufacturing: 0.00146049 kg; lognormal variance with pedigree 0.3446, pedigree (3,3,5,5,1)
  (same comment as for building, hall, steel construction)
- monoethanolamine: 2.07839e-6 kg; lognormal variance with pedigree 0.0113, pedigree (2,2,4,5,1)
  (same comment as for acetic acid, without water, in 98% solution state)
  properties: carbon content, fossil 0.393443, dry mass 1 kg, heating value, net 25.8 MJ, wet mass 1 kg
- paraffin: 3.20972e-5 kg; = 2.66E-03 + 1.97E-04; lognormal variance with pedigree 0.0113, pedigree (2,2,4,5,1)
  Flocculating polymer used for juice treatment and water treatment. Based on computer simulation of the process validated using literature and industry data. Treatment of captured water and recycled water in closed circuits (parameterized by water catchment) were considered.
  properties: carbon content, fossil 0.847059, dry mass 1 kg, heating value, net 41.5 MJ, wet mass 1 kg
  note on heating value, net: Indicative value. Reference: Fuels - Higher and Lower Calorific Values, available at: https://www.engineeringtoolbox.com/fuels-higher-calorific-values-d_169.html
- pesticide, unspecified: 2.19074e-7 kg; lognormal variance with pedigree 0.0113, pedigree (2,2,4,5,1)
  Chemicals (biocides) used for the water treatment in a typical Brazilian sugarcane processing plant (LDC Bioenergia, 2010). Treatment of captured water and recycled water in closed circuits (parameterized by water catchment) were considered.
  properties: carbon content, fossil 0.486978, dry mass 1 kg, wet mass 1 kg
- phosphane: 3.72988e-6 kg; lognormal variance with pedigree 0.0113, pedigree (2,2,4,5,1)
  (same comment as for acetic acid, without water, in 98% solution state)
  properties: dry mass 1 kg, wet mass 1 kg
- phosphoric acid, industrial grade, without water, in 85% solution state: 0.00265136 kg; lognormal variance with pedigree 0.0113, pedigree (2,2,4,5,1)
  Phosphoric acid used for juice treatment. Based on computer simulation of the process validated using literature and industry data.
  properties: dry mass 1 kg, wet mass 1 kg
- quicklime, milled, packed: 0.009469, 8.0376e-5 kg (2 suppliers, which the file names only by identifier); sum of these 0.00954938 kg; lognormal variance with pedigree 0.0113, pedigree (2,2,4,5,1)
  Quicklime used for juice treatment. Based on computer simulation of the process validated using literature and industry data.
  properties: dry mass 0.99 kg, water content 0.010101, wet mass 1 kg
- soda ash, dense: 7.3137e-5 kg; lognormal variance with pedigree 0.0113, pedigree (2,2,4,5,1)
  (same comment as for acetic acid, without water, in 98% solution state)
  properties: carbon content, fossil 0.113208, dry mass 1 kg, heating value, net 3.43 MJ, wet mass 1 kg
- sodium dichromate: 6.59469e-6 kg; lognormal variance with pedigree 0.0113, pedigree (2,2,4,5,1)
  (same comment as for acetic acid, without water, in 98% solution state)
  properties: dry mass 1 kg, wet mass 1 kg
- sodium hydroxide, without water, in 50% solution state: 3.34814e-7, 3.42877e-6 kg (2 suppliers, which the file names only by identifier); sum of these 3.76358e-6 kg; lognormal variance with pedigree 0.0113, pedigree (2,2,4,5,1)
  (same comment as for acetic acid, without water, in 98% solution state)
  properties: dry mass 1 kg, heating value, net 3.03 MJ, wet mass 1 kg
- sodium hypochlorite, without water, in 15% solution state: 8.86305e-5, 0.000673073 kg (2 suppliers, which the file names only by identifier); sum of these 0.000761704 kg; lognormal variance with pedigree 0.0113, pedigree (2,2,4,5,1)
  (same comment as for acetic acid, without water, in 98% solution state)
  properties: dry mass 1 kg, wet mass 1 kg
- sodium metasilicate pentahydrate, 58% active substance, powder: 2.84275e-6, 1.40392e-6 kg (2 suppliers, which the file names only by identifier); sum of these 4.24667e-6 kg; lognormal variance with pedigree 0.0113, pedigree (2,2,4,5,1)
  (same comment as for acetic acid, without water, in 98% solution state)
  properties: dry mass 1 kg, heating value, net 5.71 MJ, wet mass 1 kg
- sodium sulfate, anhydrite: 0.000145275, 0.000889428 kg (2 suppliers, which the file names only by identifier); sum of these 0.0010347 kg; lognormal variance with pedigree 0.0113, pedigree (2,2,4,5,1)
  (same comment as for acetic acid, without water, in 98% solution state)
  properties: dry mass 1 kg, wet mass 1 kg
- sugarcane: 11.2346 kg; lognormal variance with pedigree 0.0113, pedigree (2,2,4,5,1)
  Processed sugarcane. Based on computer simulation of the process validated using literature and industry data.
  properties: carbon content, non-fossil 0.533566, dry mass 0.255 kg, water content 2.9216, wet mass 1 kg
- sulfuric acid: 0.00366605, 0.000479506 kg (2 suppliers, which the file names only by identifier); sum of these 0.00414555 kg; = 0.264 + 1.05E-01; lognormal variance with pedigree 0.0113, pedigree (2,2,4,5,1)
  Sulphuric acid used for yeast treatment in fermentation process and water treatment. Based on computer simulation of the process validated using literature and industry data. Treatment of captured water and recycled water in closed circuits (parameterized by water catchment) were considered.
  properties: dry mass 1 kg, wet mass 1 kg
- vinasse, from fermentation of sugarcane: -5.72513 kg; name BP5; lognormal variance with pedigree 0.0033, pedigree (2,2,1,5,1)
  Vinasse production (not including flegmasse). Based on computer simulation of the process validated using literature and industry data.
  production volume; = PV_RP*BP5/RP
    Vinasse produced in traditional annexed plants. It was assumed that this technology only occurs in Brazil.
  properties: carbon content, non-fossil 0.1288, dry mass 0.0554348 kg, price 0.001754 EUR2005, water content 17.0392, wet mass 1 kg

## Inputs from nature
- Occupation, industrial area [natural resource, land]: 3.66247e-5 m2*year; source Mateus F. Chagas 2015; lognormal variance with pedigree 0.0846, pedigree (3,3,5,5,1)
  Industrial area plant based on data from MACEDO et al., 2008.
- Transformation, from arable land, unspecified use [natural resource, land]: 7.19012e-7 m2; source Mateus F. Chagas 2015; lognormal variance with pedigree 0.1646, pedigree (3,3,5,5,1)
  Transformation of area occupied by the industrial plant based on data from MACEDO et al., 2008. The occupation was calculated considering a life span of 25 years.
- Transformation, to industrial area [natural resource, land]: 7.19012e-7 m2; source Mateus F. Chagas 2015; lognormal variance with pedigree 0.1646, pedigree (3,3,5,5,1)
  (same comment as for Transformation, from arable land, unspecified use)
- Water, well, in ground [natural resource, in water]: 0.0168518 m3; source Mateus F. Chagas 2015; lognormal variance with pedigree 0.0113, pedigree (2,2,4,5,1)
  Water catchment. Based on computer simulation of the process validated using literature and industry data.

## Emissions to nature
All rows: source Mateus F. Chagas 2015
- Carbon dioxide, non-fossil [air, non-urban air or from high stacks]: 2.5764 kg; = 186.60 + 41.94 + 7.88E-01; lognormal variance with pedigree 0.0113, pedigree (2,2,4,5,1)
  Emissions from sugarcane bagasse combustion, from fermentation and distillation process. Emissions from sugarcane bagasse combustion in the boilers of cogeneration units were estimated according to GREET (2010) emission factors, except carbon dioxide emissions, which are based on process simulation results. Emissions from fermentation and distillation process were based on process simulation results.
- Carbon monoxide, non-fossil [air, non-urban air or from high stacks]: 0.000821247 kg; lognormal variance with pedigree 0.0526, pedigree (3,3,4,5,1)
  Emissions from sugarcane bagasse combustion in the boilers of cogeneration units were estimated according to GREET (2010) emission factors, except carbon dioxide emissions, which are based on process simulation results.
- Dinitrogen monoxide [air, non-urban air or from high stacks]: 4.5163e-5 kg; lognormal variance with pedigree 0.0526, pedigree (3,3,4,5,1)
  (same comment as for Carbon monoxide, non-fossil)
- Ethanol [air, non-urban air or from high stacks]: 0.000914494 kg; lognormal variance with pedigree 0.0507, pedigree (2,2,4,5,1)
  Emissions from distillation process, based on process simulation results.
- Methane, non-fossil [air, non-urban air or from high stacks]: 0.00033816 kg; lognormal variance with pedigree 0.0526, pedigree (3,3,4,5,1)
  (same comment as for Carbon monoxide, non-fossil)
- NMVOC, non-methane volatile organic compounds [air, non-urban air or from high stacks]: 5.70866e-5 kg; = 5.08E-03 + 1.34E-06; lognormal variance with pedigree 0.0526, pedigree (3,3,4,5,1)
  Emissions from sugarcane bagasse combustion and from sugar drying process. Emissions from combustion in the boilers of cogeneration units were estimated according to GREET (2010) emission factors, except carbon dioxide emissions, which are based on process simulation results. Emissions from sugar drying processos were based on process simulation results.
- Nitrogen oxides [air, non-urban air or from high stacks]: 0.000816753 kg; lognormal variance with pedigree 0.0526, pedigree (3,3,4,5,1)
  (same comment as for Carbon monoxide, non-fossil)
- Particulate Matter, < 2.5 um [air, non-urban air or from high stacks]: 0.000462864 kg; lognormal variance with pedigree 0.3126, pedigree (3,3,4,5,1)
  (same comment as for Carbon monoxide, non-fossil)
- Particulate Matter, > 10 um [air, non-urban air or from high stacks]: 2.29185e-5 kg; lognormal variance with pedigree 0.0526, pedigree (3,3,4,5,1)
  Emissions from sugar drying process, based on process simulation results.
- Particulate Matter, > 2.5 um and < 10um [air, non-urban air or from high stacks]: 0.000925786 kg; = 8.24E-02 + 5.15E-06; lognormal variance with pedigree 0.1326, pedigree (3,3,4,5,1)
  (same comment as for NMVOC, non-methane volatile organic compounds)
- Phosphoric acid [air, non-urban air or from high stacks]: 6.78568e-10 kg; lognormal variance with pedigree 0.0526, pedigree (3,3,4,5,1)
  Emissions from sugar drying process, based on process simulation results.
- Sulfur oxides [air, unspecified]: 4.38148e-5 kg; lognormal variance with pedigree 0.0526, pedigree (3,3,4,5,1)
  (same comment as for Carbon monoxide, non-fossil)

## Extrapolations
Extrapolated from Brazilian data, uncertainty adjusted accordingly.
