# paper sack production

Dataset: EcoSpold 2, unit process
Geography: RoW
Time period: 2015-01-01 to 2023-12-31
Technology level: current
Classification: ISIC rev.4 ecoinvent: 1702:Manufacture of corrugated paper and paperboard and of containers of paper a
Synonyms: Paper bag; Paper sack; Cement sack; Pet food sack
Scenario: Business-as-Usual
System model: Allocation, cut-off by classification
Share of production covered: 86 %
Generated by: Malin Johansson
Database: ecoinvent
isCopyrightProtected: true
accessRestrictedTo: 1

## General comment
This dataset is a copy of the respective European dataset "paper sack production, RER, 2020" for a lack of average global data. It represents the production of an "average European paper sack", which is a hybrid mix of all types of multiwall paper sacks in Europe. It mixes brown (unbleached) and white (bleached) sack kraft paper, LDPE and HDPE plastic liners and different kinds of glues, all in one. The dataset is therefore suitable to use for both white and brown sacks, for example cement sacks and pet food sacks. But it should be handled with care when used for sacks without plastic liners or small bags such as carrier bags. Paper sacks are made of sack kraft paper which is a porous kraft paper with high elasticity and high tear resistance, designed for packaging products with high demands for strength and durability.
Data refers to 2015, it is from a study performed by CEPI Eurokraft and Eurosac in 2017.
The dataset represents average data calculated from 36 plants participating in the study representing 86% of European production by weight (based on total production within the Eurosac membership) in the production year 2015.
The air emission profile for paper sack production are based on the amounts of fuels bought and incinerated on-site. Exisiting ecoinvent emission profiles were used as proxy to calculate the amounts of air emissions. More information about the fuel mix and the proxy emission profiles is provided under the"Extrapolations" Comment of this dataset.
[This dataset is meant to replace the following datasets:]

## Included activities start
This module includes the production of paper sacks at an average converting plant. Activity starts with kraft paper delivered to the converting plant, it includes, paper sack production, printing and energy production on-site.

## Included activities end
The activity ends with the paper sacks leaving the factory gate.

## Geography
The dataset represents average data calculated from 36 plants in Europe participating in the study and representing 86% of European production by weight (based on total production within the Eurosac membership) in the production year 2015.

## Technology
Average of present used technology in 2015

## Time period
Statistics from CEPI Eurokraft for Sack production in Europe 2015. Production volume valid for 2015.

## Reference product
- paper sack: 1 kg; name a_RP; By-product classification allocatable product; CPC 32133: Other uncoated kraft paper and paperboard; sack kraft paper, creped or crinkled; HS2017 481930: Paper and paperboard; sacks and bags of paper, paperboard, cellulose wadding or fibres, having a base of a [...]
  production volume 6.79556e9 kg; name kraft_PV
    Valid for 2017. For a lack of more accurate data, the global production volume of paper sacks is estimated based on the global production volume of kraft paper (1.8E+10kg in 2017) and assuming the same ration of sack production from total kraft paper production as in Europe (44%).
  property carbon content, fossil 0.02; name a_RP_C_content_fossil
    fossil carbon content on a dry matter basis
  property carbon content, non-fossil 0.42; name a_RP_C_content_non_fossil
    biogene carbon content on a dry matter basis
  property dry mass 0.927 kg; name a_RP_DM
  property price 0.867186 EUR2005
    Calculated based on inputs: The price of the product has been calculated as a sum of the values of the material and energy inputs for this product. This value is therefore a rough estimation. It may underestimate the real price since there are additional expenses when producing any product. These expences can include for example labour costs, treatment of waste materials and profit for the producer. Please consider carefully whether this level of data quality is acceptable for your application.
  property water content 0.0787487; name a_RP_water_content
  property water in wet mass 0.073 kg; name a_RP_WWM
  property wet mass 1 kg; name a_RP_WM
  properties: carbon allocation 0.40788 kg, carbon content 0.44, heating value, net 14.11 MJ

## Inputs from technosphere
- chemical, inorganic: 0.000617 kg; lognormal variance with pedigree 0.2106, pedigree (5,5,5,5,5)
  Average for 36 European paper sack converters. Proxy for "anti-slip", varnish etc
  properties: carbon content, fossil 0.003, dry mass 1 kg, wet mass 1 kg
- chemical, organic: 0.000617 kg; lognormal variance with pedigree 0.2106, pedigree (5,5,5,5,5)
  Average for 36 European paper sack converters. Proxy for "anti-slip", varnish etc
  properties: carbon content, fossil 0.628, dry mass 1 kg, heating value, net 19.03 MJ, wet mass 1 kg
- chimney: 1.56966e-6 m; lognormal variance with pedigree 0.3966, pedigree (4,5,5,4,4)
  Estimation based on data of external fuel inputs and emission factors from corresponding fuel combustion ecoinvent datasets (see comment "Extrapolations")
- diesel, low-sulfur: 8.12599e-7, 3.62145e-6, 4.32421e-5, 1.81133e-6, 1.20133e-7, 1.79424e-6 kg (6 suppliers, which the file names only by identifier); sum of these 5.14019e-5 kg; lognormal variance with pedigree 0.0039, pedigree (2,2,3,4,1)
  Average for 36 European paper sack converters
  Uncertainty: A
  properties: carbon content, fossil 0.865, dry mass 1 kg, heating value, net 42.8 MJ, wet mass 1 kg
- electricity, medium voltage: 0.00501815, 0.100101, 0.0336336, 0.00153673, 0.000307575, 6.60433e-5, 0.010337 kWh (7 suppliers, which the file names only by identifier); sum of these 0.151 kWh; lognormal variance with pedigree 0.2106, pedigree (5,5,5,5,5)
  Average for 36 European paper sack converters
- ethylene vinyl acetate copolymer: 0.0049 kg; lognormal variance with pedigree 0.2106, pedigree (5,5,5,5,5)
  Average for 36 European paper sack converters Ethylene vinyl acetate copolymer is used as a proxy for PVA glue.
  properties: carbon content, fossil 0.79734, dry mass 1 kg, heating value, net 35.99 MJ, wet mass 1 kg
- extrusion, plastic film: 0.029 kg; = a_HDPE; lognormal variance with pedigree 0.2106, pedigree (5,5,5,5,5)
  Average for 36 European paper sack converters. The process requires high density polyethylene film. Therefore, the HDPE granulate and the service of extrusion of granulate to film in the equivalent amount are used as inputs.
- hazardous waste, for incineration: -0.00411289 kg; name a_hzw
  Reported as hazardous waste, average amount of 36 European paper sack converters
  production volume; = kraft_PV * a_hzw / a_RP
    Calculated from production volume of reference product using the relative outputs.
  properties: carbon content, fossil 0.554667, dry mass 0.75 kg, heating value, net 17 MJ, water content 0.333333, wet mass 1 kg
  note on heating value, net: Value taken from the general comment of the treatment dataset.
- heavy fuel oil: 8.08738e-6, 4.70939e-6, 2.39416e-5, 0.000559671, 6.04145e-6, 3.1044e-5 kg (6 suppliers, which the file names only by identifier); sum of these 0.000633495 kg; lognormal variance with pedigree 0.0039, pedigree (2,2,3,4,1)
  Average for 36 European paper sack converters
  Uncertainty: A
  properties: carbon content, fossil 0.849, dry mass 1 kg, heating value, net 41.2 MJ, wet mass 1 kg
- industrial furnace, 1MW, oil: 1.17726e-7 unit; lognormal variance with pedigree 0.3966, pedigree (4,5,5,4,4)
  (same comment as for chimney)
- industrial furnace, natural gas: 6.5548e-7 unit; lognormal variance with pedigree 0.1366, pedigree (4,5,5,4,4)
  (same comment as for chimney)
- kraft paper: 0.949 kg; lognormal variance with pedigree 0.2106, pedigree (5,5,5,5,5)
  Average for 36 European paper sack converters
  properties: carbon content, fossil 0.0020219, carbon content, non-fossil 0.439, dry mass 0.945 kg, heating value, net 14.11 MJ, water content 0.0582011, wet mass 1 kg
  note on carbon content, fossil: Fossil C content was calculated after fossil C contents of chemicals used in the production of the paper (in Tab 9.4 ecoinvent v2.2 report 11_III, part 9).
  note on carbon content, non-fossil: carbon content calucalted based on carbon balance of paper sack production process.
- light fuel oil: 2.75958e-6, 0.000289149, 1.42205e-5, 2.87003e-5, 2.05082e-6, 1.90452e-6 kg (6 suppliers, which the file names only by identifier); sum of these 0.000338785 kg; lognormal variance with pedigree 0.0039, pedigree (2,2,3,4,1)
  Average for 36 European paper sack converters
  Uncertainty: A
  properties: carbon content, fossil 0.862, dry mass 1 kg, heating value, net 42.6 MJ, wet mass 1 kg
- maize starch: 0.00626398 kg; lognormal variance with pedigree 0.0033, pedigree (1,2,3,4,1)
  Average for 36 European paper sack converters. Proxy for starch glue. 50/50 potato and maize starch assumed.
  Uncertainty: A
  properties: carbon content, non-fossil 0.46, dry mass 0.86 kg, heating value, net 11.64 MJ, water content 0.162791, wet mass 1 kg
- municipal solid waste: -9.59115e-5, -1.13891e-5, -7.08827e-5, -0.0541132, -7.96962e-6, -2.55811e-6, -5.78202e-6, -0.000240707 kg (8 suppliers, which the file names only by identifier); sum of these -0.0545484 kg
  Reported as mixed waste, non-hazardous, average amount of 36 European paper sack converters
  production volume; = kraft_PV * a_msw / a_RP
    Calculated from production volume of reference product using the relative outputs.
  properties: carbon content, fossil 0.171549, carbon content, non-fossil 0.261655, dry mass 0.771 kg, heating value, net 11.74 MJ, water content 0.297017, wet mass 1 kg
- natural gas, high pressure: 4.63492e-5, 7.81854e-5, 0.000170546, 5.70746e-5, 1.33381e-5, 7.93857e-5, 7.61767e-5, 0.000200308, 7.73323e-5, 0.000119611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 m3 (37 suppliers, which the file names only by identifier); sum of these 0.00600256 m3; lognormal variance with pedigree 0.0039, pedigree (2,2,3,4,1)
  Average for 36 European paper sack converters
  Uncertainty: A
  properties: carbon content, fossil 0.602381, dry mass 0.84 kg, heating value, gross 40 MJ, heating value, net 36 MJ, wet mass 0.84 kg
  note on heating value, net: Literature value, Source: Christoph Meili;Niels Jungbluth;Maresa Bussa (2021) Life cycle inventories of crude oil and natural gas extraction. ESU-services Ltd. commissioned by BAFU & VSG, Schaffhausen, Switzerland, http://esu-services.ch/data/public-lci-reports/
- oil storage, 3000l: 1.47155e-6 unit; lognormal variance with pedigree 0.3966, pedigree (4,5,5,4,4)
  (same comment as for chimney)
- packaging box factory: 1.42857e-9 unit; = 1/14000000/50; lognormal variance with pedigree 0.3966, pedigree (4,5,5,4,4)
  packaging box factory was used as proxy as long as no paper sack converting facility is available. The amount is calculated based on the annual capacity of the factory (14kt paper) and the lifetime of 50 years. See ecoinvent datasets "packaging box factory construction, RER, 1993-2000".
- packaging film, low density polyethylene: 0.024 kg; lognormal variance with pedigree 0.2106, pedigree (5,5,5,5,5)
  Average for 36 European paper sack converters
  properties: carbon content, fossil 0.857143, dry mass 1 kg, heating value, net 42.47 MJ, wet mass 1 kg
- polyethylene, high density, granulate: 0.029 kg; name a_HDPE; lognormal variance with pedigree 0.2106, pedigree (5,5,5,5,5)
  (same comment as for extrusion, plastic film)
  properties: carbon content, fossil 0.857143, dry mass 1 kg, heating value, net 42.47 MJ, wet mass 1 kg
- potato starch: 0.00626398 kg; lognormal variance with pedigree 0.0033, pedigree (1,2,3,4,1)
  (same comment as for maize starch)
  properties: carbon content, non-fossil 0.46, dry mass 0.8 kg, heating value, net 10.66 MJ, water content 0.25, wet mass 1 kg
- printing ink, offset, without solvent, in 47.5% solution state: 0.0109 kg; lognormal variance with pedigree 0.2106, pedigree (5,5,5,5,5)
  Average for 36 European paper sack converters
  properties: carbon content, fossil 0.455266, carbon content, non-fossil 0.221773, dry mass 1 kg, heating value, net 20.51 MJ, wet mass 1 kg
- waste paper, unsorted: -0.0121963 kg; name a_wpap
  Reported as paper waste, average amount of 36 European paper sack converters
  production volume; = kraft_PV * a_wpap / a_RP
    Calculated from production volume of reference product using the relative outputs.
  property carbon content, fossil 0; name a_wpap_C_content_fossil
  property carbon content, non-fossil 0.448889; name a_wpap_C_content_non_fossil
  properties: dry mass 0.9 kg, heating value, net 14.11 MJ, price 0.093 EUR2005, water content 0.111111, wet mass 1 kg
- waste plastic, mixture: -4.75934e-7, -4.51944e-7, -0.00177609, -1.72456e-5, -1.15228e-6, -1.92272e-7, -8.71452e-8 kg (7 suppliers, which the file names only by identifier); sum of these -0.00179569 kg
  Reported as plastic waste, average amount of 36 European paper sack converters
  production volume; = kraft_PV * a_wplas / a_RP
    Calculated from production volume of reference product using the relative outputs.
  properties: carbon content, fossil 0.747344, dry mass 0.847 kg, heating value, net 30.79 MJ, water content 0.180638, wet mass 1 kg

## Inputs from nature
- Water, unspecified natural origin [natural resource, in water]: 0.000728 m3; name water_UNO_input; lognormal variance with pedigree 0.0427, pedigree (1,2,3,4,1)
  Average for 36 European paper sack converters
  Uncertainty: A

## Emissions to nature
- Acetaldehyde [air, urban air close to ground]: 4.09217e-9 kg; lognormal variance with pedigree 0.0912, pedigree (2,5,3,4,4)
  Average for 36 European paper sack converters
- Acetic acid [air, urban air close to ground]: 5.05473e-8 kg; lognormal variance with pedigree 0.0912, pedigree (2,5,3,4,4)
  (same comment as for chimney)
- Acetone [air, urban air close to ground]: 3.85807e-9 kg; lognormal variance with pedigree 0.0912, pedigree (2,5,3,4,4)
  (same comment as for chimney)
- Ammonia [air, urban air close to ground]: 2.75627e-9 kg; lognormal variance with pedigree 0.0912, pedigree (2,5,3,4,4)
  (same comment as for chimney)
- Arsenic ion [air, urban air close to ground]: 3.34366e-10 kg; lognormal variance with pedigree 0.0912, pedigree (2,5,3,4,4)
  (same comment as for chimney)
- Benzene [air, urban air close to ground]: 9.38899e-8 kg; lognormal variance with pedigree 0.0912, pedigree (2,5,3,4,4)
  (same comment as for chimney)
- Benzo(a)pyrene [air, urban air close to ground]: 3.52766e-12 kg; lognormal variance with pedigree 0.0912, pedigree (2,5,3,4,4)
  (same comment as for chimney)
- Butane [air, urban air close to ground]: 1.69118e-7 kg; lognormal variance with pedigree 0.0912, pedigree (2,5,3,4,4)
  (same comment as for chimney)
- Calcium II [air, urban air close to ground]: 2.82925e-9 kg; lognormal variance with pedigree 0.25, pedigree (5,5,5,5,5)
  (same comment as for chimney)
- Carbon dioxide, fossil [air, urban air close to ground]: 0.0163744 kg; lognormal variance with pedigree 0.0518, pedigree (2,5,3,4,4)
  (same comment as for chimney)
- Carbon monoxide, fossil [air, urban air close to ground]: 7.38295e-7 kg; lognormal variance with pedigree 0.7012, pedigree (2,5,3,4,4)
  Estimation based on data of external fuel inputs and emission factors from corresponding fuel combustion ecoinvent datasets (see comment "Extrapolations")
  Uncertainty: e
- Chromium III [air, urban air close to ground]: 1.27316e-10 kg; lognormal variance with pedigree 0.7012, pedigree (2,5,3,4,4)
  (same comment as for chimney)
- Chromium VI [air, urban air close to ground]: 1.28602e-12 kg; lognormal variance with pedigree 0.7012, pedigree (2,5,3,4,4)
  (same comment as for chimney)
- Cobalt II [air, urban air close to ground]: 8.48775e-10 kg; lognormal variance with pedigree 0.7012, pedigree (2,5,3,4,4)
  (same comment as for chimney)
- Copper ion [air, urban air close to ground]: 1.20738e-8 kg; lognormal variance with pedigree 0.7012, pedigree (2,5,3,4,4)
  (same comment as for chimney)
- Dinitrogen monoxide [air, urban air close to ground]: 5.39826e-8 kg; lognormal variance with pedigree 0.0912, pedigree (2,5,3,4,4)
  (same comment as for chimney)
- Dioxins, measured as 2,3,7,8-tetrachlorodibenzo-p-dioxin [air, urban air close to ground]: 2.60944e-17 kg; lognormal variance with pedigree 0.0912, pedigree (2,5,3,4,4)
  (same comment as for chimney)
- Ethanol [air, urban air close to ground]: 7.71614e-9 kg; lognormal variance with pedigree 0.0912, pedigree (2,5,3,4,4)
  (same comment as for chimney)
- Formaldehyde [air, urban air close to ground]: 4.99786e-8 kg; lognormal variance with pedigree 0.25, pedigree (5,5,5,5,5)
  (same comment as for chimney)
- Hydrocarbons, aliphatic, alkanes, unspecified [air, urban air close to ground]: 2.34293e-8 kg; lognormal variance with pedigree 0.0912, pedigree (2,5,3,4,4)
  (same comment as for chimney)
- Hydrocarbons, aliphatic, unsaturated [air, urban air close to ground]: 7.71614e-10 kg; lognormal variance with pedigree 0.0912, pedigree (2,5,3,4,4)
  (same comment as for chimney)
- Hydrocarbons, aromatic [air, urban air close to ground]: 4.36e-9 kg; lognormal variance with pedigree 0.3512, pedigree (2,5,3,4,4)
  (same comment as for chimney)
- Hydrochloric acid [air, urban air close to ground]: 3.86036e-8 kg; lognormal variance with pedigree 0.0912, pedigree (2,5,3,4,4)
  (same comment as for chimney)
- Hydrogen fluoride [air, urban air close to ground]: 1.38453e-9 kg; lognormal variance with pedigree 0.0912, pedigree (2,5,3,4,4)
  (same comment as for chimney)
- Iron ion [air, urban air close to ground]: 2.10908e-8 kg; lognormal variance with pedigree 0.7012, pedigree (2,5,3,4,4)
  (same comment as for chimney)
- Lead II [air, urban air close to ground]: 3.72947e-9 kg; lognormal variance with pedigree 0.7012, pedigree (2,5,3,4,4)
  (same comment as for chimney)
- Mercury II [air, urban air close to ground]: 1.92113e-11 kg; lognormal variance with pedigree 0.7012, pedigree (2,5,3,4,4)
  (same comment as for chimney)
- Methane, fossil [air, urban air close to ground]: 5.62022e-7 kg; lognormal variance with pedigree 0.0912, pedigree (2,5,3,4,4)
  (same comment as for chimney)
- Methanol [air, urban air close to ground]: 1.31174e-8 kg; lognormal variance with pedigree 0.25, pedigree (5,5,5,5,5)
  (same comment as for chimney)
- Molybdenum VI [air, urban air close to ground]: 2.05764e-10 kg; lognormal variance with pedigree 0.7012, pedigree (2,5,3,4,4)
  (same comment as for chimney)
- Nickel II [air, urban air close to ground]: 1.2603e-8 kg; lognormal variance with pedigree 0.7012, pedigree (2,5,3,4,4)
  (same comment as for chimney)
- Nitrogen oxides [air, urban air close to ground]: 7.59546e-6 kg; lognormal variance with pedigree 0.042, pedigree (2,3,2,4,1)
  (same comment as for chimney)
- PAH, polycyclic aromatic hydrocarbons [air, urban air close to ground]: 2.36558e-9 kg; lognormal variance with pedigree 0.3512, pedigree (2,5,3,4,4)
  (same comment as for chimney)
- Particulate Matter, < 2.5 um [air, urban air close to ground]: 2.64538e-7 kg; lognormal variance with pedigree 0.302, pedigree (2,3,2,4,1)
  (same comment as for chimney)
- Particulate Matter, > 10 um [air, urban air close to ground]: 6.17291e-8 kg; lognormal variance with pedigree 0.042, pedigree (2,3,2,4,1)
  (same comment as for chimney)
- Particulate Matter, > 2.5 um and < 10um [air, urban air close to ground]: 3.08646e-8 kg; lognormal variance with pedigree 0.122, pedigree (2,3,2,4,1)
  (same comment as for chimney)
- Pentane [air, urban air close to ground]: 2.84419e-7 kg; lognormal variance with pedigree 0.0912, pedigree (2,5,3,4,4)
  (same comment as for chimney)
- Propane [air, urban air close to ground]: 4.79265e-8 kg; lognormal variance with pedigree 0.0912, pedigree (2,5,3,4,4)
  (same comment as for chimney)
- Propionic acid [air, urban air close to ground]: 4.682e-9 kg; lognormal variance with pedigree 0.0912, pedigree (2,5,3,4,4)
  (same comment as for chimney)
- Selenium IV [air, urban air close to ground]: 3.08646e-10 kg; lognormal variance with pedigree 0.7012, pedigree (2,5,3,4,4)
  (same comment as for chimney)
- Sodium I [air, urban air close to ground]: 1.92904e-8 kg; lognormal variance with pedigree 0.7012, pedigree (2,5,3,4,4)
  (same comment as for chimney)
- Sulfur dioxide [air, urban air close to ground]: 1.1043e-5 kg; lognormal variance with pedigree 0.00206, pedigree (2,3,2,4,1)
  (same comment as for chimney)
- Toluene [air, urban air close to ground]: 4.80914e-8 kg; lognormal variance with pedigree 0.0912, pedigree (2,5,3,4,4)
  (same comment as for chimney)
- Vanadium V [air, urban air close to ground]: 2.57205e-8 kg; lognormal variance with pedigree 0.7012, pedigree (2,5,3,4,4)
  (same comment as for chimney)
- Water [air, non-urban air or from high stacks]: 0.000434 m3; lognormal variance with pedigree 0.0427, pedigree (1,3,3,3,1)
  Difference between water input and water output is assumed to evaporate.
- Zinc II [air, urban air close to ground]: 1.30769e-8 kg; lognormal variance with pedigree 0.7012, pedigree (2,5,3,4,4)
  (same comment as for chimney)
- BOD5, Biological Oxygen Demand [water, surface water]: 5.12821e-6 kg; lognormal variance with pedigree 0.25, pedigree (5,5,5,5,5)
  Average for 36 European paper sack converters
- COD, Chemical Oxygen Demand [water, unspecified]: 0.000411 kg; name a_COD; lognormal variance with pedigree 0.0427, pedigree (1,2,3,4,1)
  Estimation based on data of external fuel inputs and emission factors from corresponding fuel combustion ecoinvent datasets (see comment "Extrapolations")
  Uncertainty: A
- DOC, Dissolved Organic Carbon [water, unspecified]: 0.000152222 kg; = a_TOC; lognormal variance with pedigree 0.0666, pedigree (4,5,3,4,3)
  Assumed equal to TOC.
- TOC, Total Organic Carbon [water, unspecified]: 0.000152222 kg; name a_TOC; = a_COD/2.7; lognormal variance with pedigree 0.0666, pedigree (4,5,3,4,3)
  Calculated by default as TOC (gC) = COD/2.7 (COD measured in g O2). Should more correctly be calculated from the carbon content of the specified emissions to water.
- Water [water, unspecified]: 0.000294 m3; lognormal variance with pedigree 0.0427, pedigree (1,2,3,4,1)
  Average for 36 European paper sack converters
  Uncertainty: A

## Sampling procedure
The data were collected via a survey for the European paper sacks converters in Eurosac.Inputs and outputs to the plants were collected (gate to gate)

## Extrapolations
The following assumptions were made in the modelling of the dataset: For the fuels, proxies for the air emissions were calculated based on: Heavy fuel oil: "heat production, heavy fuel oil, at industrial furnace 1MW” Light fuel oil: "heat production, light fuel oil, at industrial furnace 1MW” Natural gas: "heat production, natural gas, at industrial furnace >100kW” Heavy fuel oil flow converted from GJ to kg with heating value 41,2 MJ/kg. Light fuel oil flow converted from GJ to kg with heating value 42,8 MJ/kg Natural gas flow converted from GJ to m3 with heating value 39 MJ/m3 BOD7 flow converted to BOD5 with the factor 1,17 The flows “chemical, organic” and "chemical, inorganic" were used as proxies for “other inputs”. Pure starch was used as proxy for starch glue, with 50/50 maize/potato beacuse the origin is unknown. Ethylene vinyl acetate copolymer was used as proxy for PVA glue. HDPE granulate were used as proxy for the HDPE film.
