# wind turbine network connection construction, small-scale, 6kW, onshore

Dataset: EcoSpold 2, unit process
Geography: DE
Time period: 2013-01-01 to 2023-12-31
Technology level: current
Classification: ISIC rev.4 ecoinvent: 2811:Manufacture of engines and turbines, except aircraft, vehicle and cycle eng
Synonyms: grid connection
Tags: wind power; infrastructure
Scenario: Business-as-Usual
System model: Allocation, cut-off by classification
Generated by: Johannes Müller
Published in: Knausenberger, Kai 2022
Database: ecoinvent
isCopyrightProtected: true
accessRestrictedTo: 1

## General comment
This dataset represents the construction of the network connection for a small-scale wind turbine with a capacity of 6 kW. This connection connects one turbine to the low-voltage electricity network.
Dataset contains the following components:
• Excavation for foundation and mains connection
• Cable for mains connection (100m, 5x16mm² cable)
• Energy used in building machines

## Included activities start
From the digging with an excavator, and from the reception and treatment of building materials.

## Included activities end
This activity ends with the installation of the network connection. Decomissioning, in this case digging out the network cable is not included as it is assumed, that the cable stays in the ground. It is assumed that all parts will hold for the lifetime of 20 years and don't have to be replaced.

This dataset doesn't include neither the production and installation of the turbines inverter, nor the energy use for assembly of the different wind turbine parts nor their transportation from manufacture to the construction site
(these data are included in the dataset of the wind turbines construction).

## Geography
The dataset represents data for the same geography as the corresponding datasets for wind turbine construction and electricity production.

## Technology
Connection to the low-voltage three-phase current electricity grid (400 V) with a cable-length of 100 m per turbine is assumed for network connection.
Cable size of 5*16mm² is used according [1].
Cross section of the trench that is digged to put the cable below ground is an authors assumption to be 0,2 m wide and 0,6 m depth.
Literature sources:
[1] Kouloumpis, Victor; Sobolewski, Robert A.; Yan, Xiaoyu. Performance and life cycle assessment of a small scale vertical axis wind turbine. in Journal of Cleaner Production 247, 2020, article 119520.

## Time period
The wind turbine from the corresponding dataset (construction of the turbine) has been produced since 2013, the development of the inventory took place in 2022.

## Reference product
- wind turbine network connection, small-scale, 6kW, onshore: 1 unit; name RP; By-product classification allocatable product; CPC 46211: Electrical apparatus for switching or protecting electrical circuits, or for making connexions to or in electr[…]
  1 unit represents 100 m of laid cables for the network connection of the small-scale wind turbine including construction efforts
  production volume 44.5 unit; name PV_RP; = 890/20
    Literature Value. Assuming 890 operational small scale wind turbines in Germany and a lifetime expectancy of 20 years.
  property lifetime 20 year; name RP_lifetime
  property price 1 EUR2005
    Calculated based on inputs: The price of the product has been calculated as a sum of the values of the material and energy inputs for this product. This value is therefore a rough estimation. It may underestimate the real price since there are additional expenses when producing any product. These expences can include for example labour costs, treatment of waste materials and profit for the producer. Please consider carefully whether this level of data quality is acceptable for your application.
  property weight 120 kg; = cable
  properties: carbon allocation 0 kg, carbon content 0

## Inputs from technosphere
- cable, unspecified: 120 kg; name cable; source Kouloumpis, Victor 2020; lognormal variance with pedigree 0.004825, pedigree (3,4,2,2,1)
  Literature value from source [1]. Cable type: 5*16 mm², insulated. Specific cable weight of the cable 12 kg/m.
  properties: carbon content, fossil 0.28196, dry mass 1 kg, heating value, net 8.54 MJ, wet mass 1 kg
- excavation, hydraulic digger: 12 m3; = 0,2*0,6*100; lognormal variance with pedigree 0.004825, pedigree (3,4,2,2,1)
  Own assumptions. The excavated cable channel is assumed to have a width of 0,2 m and a depth of 0,6 m for a length of 100 m.
  Uncertainty: estimated variance
- used cable: -120 kg; name BP_cable; = cable; lognormal variance with pedigree 0.004625, pedigree (3,4,1,2,1)
  Calculated Value.
  production volume; = PV_RP * (BP_cable/RP)
    Calculated from production volume of reference product using the relative outputs.
  properties: carbon content, fossil 0.28196, dry mass 1 kg, wet mass 1 kg

## Sampling procedure
Literature, estimations

## Extrapolations
Data is specific for the network connection of a 6 kW small-scale wind turbine.
