# treatment of waste mineral wool, inert material landfill

Dataset: EcoSpold 2, unit process
Geography: CH
Time period: 1995-01-01 to 2023-12-31
Technology level: current
Classification: ISIC rev.4 ecoinvent: 3821:Treatment and disposal of non-hazardous waste
Scenario: Business-as-Usual
System model: Allocation, cut-off by classification
Generated by: Gabor Doka (obsolete)
Published in: Doka G. 2007
Database: ecoinvent
isCopyrightProtected: true
accessRestrictedTo: 1

## General comment
This dataset represents the activity of waste disposal of 'waste mineral wool, for final disposal' in an inert material landfill.

## Included activities start
The activity starts with the waste being available at the gate of the treatment facility. Collection and transportation of the waste to the treatment plant is not included.

## Included activities end
The activity ends with the waste being treated and no direct emissions from inert material landfill (leachate) are inventoried, as they are considered negligible. The dataset contains only exchanges to process-specific burdens (energy, land use) and infrastructure.

## Geography
Modelling parameters affecting the treatment technology are specific to this geography and to the technology mix encountered in Switzerland in 2000.

## Technology
Inert material landfill with leachate collection system and renaturation after closure. 50% of the sites is equipped with a base seal.

## Reference product
- waste mineral wool, for final disposal: -1 kg; name RP; By-product classification Waste; CPC 39990: Other wastes n.e.c.; HS2017 5103: Waste of wool or of fine or coarse animal hair, including yarn waste but excluding garnetted stock
  Estimated value. The CH production volume is extrapolated from the GLO production volume using the nominal GDP of 2005 (source: United Nations, http://data.un.org/Glossary.aspx?q=GDP+%28current+US%24%29, accessed 20130726 and 20130312). Where EU GDP is 33% of the world and the CH GDP is 0.8% of the world. Where CH GDP is 0.8% of the world.
  production volume 909600 kg; name RP_PV; = 7.58E+07*0.15*0.08
    Estimated value. The CH production volume is extrapolated from the GLO production volume using the nominal GDP of 2005 (source: United Nations, http://data.un.org/Glossary.aspx?q=GDP+%28current+US%24%29, accessed 20130726 and 20130312). Where EU GDP is 33% of the world and the CH GDP is 0.8% of the world. Where CH GDP is 0.8% of the world. Gross domestic product (GDP) at current prices is GDP at prices of the current reporting period. Also known as nominal GDP. Global production volume for mineral fibers is 9 billion kg/year (Buchel at el. 2000, p. 373). The waste generation is estimated to be 15% (taken from the estimated value for gypsum, source: WRAP "International practice in plasterboard recycling: Canada", n.d). Hincapié et al. (2015) includes mineral wool in the Combustible waste category. The fate for this waste category is 0% is directly recycled (“Direct recycling refers to the waste that is immediately re-used on the demolition (construction) site.” page 19), 28% is recycled, 64% incinerated, and 8% goes to landfill (it is assumed that in CH it is all sent to inert landfill). References: Buchel, K.H. et al. (2000) Industrial Inorganic Chemistry. Wiley-VCH. WRAP (n.d.) International practice in plasterboard recycling: Canada. Retrieved from: http://www.wrap.org.uk/sites/files/wrap/Case%20study%20-%20Plasterboard%20recycling%20in%20Canada.pdf, accessed 3 May 2016 Ingrid Hincapié, Alejandro Caballero-Guzmán, Bernd Nowack (2015) Nanomaterials in Landfills Module 3: Nanomaterials in Construction Waste. EMPA, Swiss Federal Laboratories for Materials Science and Technology. St. Gallen, Switzerland
  property heating value, net 0 MJ
    Non combustible products are assumed to have an LHV equal to zero (0).
  property price 0 EUR2005
    Waste products are assigned a price of zero as they are assumed to require further treatment.
  properties: carbon allocation 0 kg, carbon content 0, carbon content, fossil 0, carbon content, non-fossil 0, dry mass 1 kg, water content 0, water in wet mass 0 kg, wet mass 1 kg

## Inputs from technosphere
- inert material landfill: 1.48e-9 unit; lognormal variance with pedigree 0.04, pedigree (1,1,5,1,1)
  landfill infrastructure per kg waste, uncerteinty heeded in module. This exchange has an activity link directly to the producing activity because the product is primarily consumed in the same geographical area where it is produced.
- process-specific burdens, inert material landfill: 1 kg; lognormal variance with pedigree 0.04, pedigree (1,1,5,1,1)
  process-specific burdens per kg waste, uncerteinty heeded in module.;activityLink introduced to establish a direct link to the corresponding regional supply of this product

## Review by Niels Jungbluth 2003-05-28
Passed.
