# sawnwood production, softwood, raw, dried (u=20%)

Dataset: EcoSpold 2, unit process
Geography: Europe without Switzerland
Time period: 2014-01-01 to 2023-12-31
Technology level: current
Classification: ISIC rev.4 ecoinvent: 1610:Sawmilling and planing of wood
Scenario: Business-as-Usual
System model: Allocation, cut-off by classification
Generated by: Frank Werner
Database: ecoinvent
isCopyrightProtected: true
accessRestrictedTo: 1

## General comment
This activity is providing a more generic sawnwood product, combining inputs from the specific products issued from drying in the sawmil. The relative contribution is based in their Production Volumes.

## Included activities start
Entry of the specific products issued of the drying activity

## Included activities end
Delivery of the generic planed product

## Reference product
- sawnwood, softwood, raw, dried (u=20%): 1 m3; By-product classification allocatable product; CPC 31101: Wood, sawn or chipped lengthwise, sliced or peeled, of a thickness exceeding 6 mm, of coniferous wood; HS2017 4407: Wood sawn or chipped lengthwise, sliced or peeled, whether or not planed, sanded or end-jointed, of a thickne[...]
  production volume 3.062e6 m3; = 0.287*1.0669E+07
    10% of the Production Volume issued from the drying has been made accesible as this generic product.
    The Production Volumes have been downscaled from GLO to RER using the relative GDP values 2011 (source: United Nations, <http://data.un.org/Glossary.aspx?q=GDP+%28current+US%24%29>, accessed 20130726).
  property heating value, net 6514.84 MJ
    LHV is calculated based on the Carbon content of the product. More details can be found on the respective documentation.The property is based on a value of 12.06MJ/kg
  property price 160 EUR2005
    Expert judgement (Urs Luginbühl, Swiss Sawmilling industry, personal communication in June 2014). Cross-reference; FAOSTAT (accessed 20140428). The price is calculated by using data on total world import quantity (m3) and import value (1000 USD), year 2005. 109432798 m3 of Sawnwood (C) - coniferous was imported in the world in 2005. The import value was 22249842000 USD. The calculated price is thus (22249842000/109432798=203*0.8=) 164 Euro.
  properties: carbon allocation 199.971 kg, carbon content 0.494, carbon content, fossil 0, carbon content, non-fossil 0.494, dry mass 404.8 kg, water content 0.2, water in wet mass 80.96 kg, wet mass 485.76 kg

## Inputs from technosphere
- sawnwood, beam, softwood, raw, dried (u=20%): 0.312062, 0.0780156 m3 (2 suppliers, which the file names only by identifier); sum of these 0.390078 m3; lognormal variance with pedigree 0.1101, pedigree (3,1,4,3,1)
  based on estimated production volumes; see activity datasets
  properties: carbon content, non-fossil 0.494, dry mass 404.8 kg, heating value, net 5860.46 MJ, water content 0.2, wet mass 485.76 kg
- sawnwood, board, softwood, raw, dried (u=20%): 0.090018, 0.360072 m3 (2 suppliers, which the file names only by identifier); sum of these 0.45009 m3; lognormal variance with pedigree 0.1101, pedigree (3,1,4,3,1)
  based on estimated production volumes; see activity datasets
  properties: carbon content, non-fossil 0.494, dry mass 404.8 kg, heating value, net 5860.46 MJ, water content 0.2, wet mass 485.76 kg
- sawnwood, lath, softwood, raw, dried (u=20%): 0.127866, 0.0319664 m3 (2 suppliers, which the file names only by identifier); sum of these 0.159832 m3; lognormal variance with pedigree 0.1101, pedigree (3,1,4,3,1)
  based on estimated production volumes; see activity datasets
  properties: carbon content, non-fossil 0.494, dry mass 404.8 kg, heating value, net 5860.46 MJ, water content 0.2, wet mass 485.76 kg
