# pyridine production, Chichibabin process

Dataset: EcoSpold 2, unit process
Geography: RoW
Time period: 2010-01-01 to 2023-12-31
Technology level: current
Classification: ISIC rev.4 ecoinvent: 2011:Manufacture of basic chemicals
Scenario: Business-as-Usual
System model: Allocation, cut-off by classification
Generated by: Jürgen Sutter
Database: ecoinvent
isCopyrightProtected: true
accessRestrictedTo: 1

## General comment
The most important method for the manufacture of pyridine is the Chichibabin pyridine synthesis.
Pyridine (C5H5N; CAS 110-86-1, arabenzene, azine) is a colourless liquid. It is miscible in all proportions with water and most common organic solvents and has a boiling point 35 °C higher than benzene.Acetaldehyde and formaldehyde react with ammonia to give mainly pyridine: they appear to first form acrolein, and then acrolein and formaldehyde react with ammonia to give pyridine. Simultaneously, 2-, 3-, and 4-methylpyridines are formed, This method is one of the most widely used for pyridine production.
Frischknecht R., Jungbluth N., Althaus H.-J., Doka G., Dones R., Heck T., Hellweg S., Hischier R., Nemecek T., Rebitzer G. and Spielmann M. (2007) Overview and Methodology. Final report ecoinvent v2.0 No. 1. Swiss Centre for Life Cycle Inventories, Dübendorf, CH, retrieved from: www.ecoinvent.org.
Gendorf (2000) Umwelterklärung 2000, Werk Gendorf. Werk Gendorf, Burgkirchen as pdf-File under: http://www.gendorf.de/pdf/umwelterklaerung2000.pdf
Shinkichi Shimizu, Nanao Watanabe, Toshiaki Kataoka, Takayuki Shoji, Nobuyuki Abe, Sinji Morishita, Hisao Ichimura: Pyridine and Pyridine Derivatives. Published online: 2000. In: Ullmann's Encyclopedia of Industrial Chemistry, Seventh Edition, 2004 Electronic Release (ed. Fiedler E., Grossmann G., Kersebohm D., Weiss G. and Witte C.). 7 th Electronic Release Edition. Wiley InterScience, New York, Online-Version under: DOI: 10.1002/14356007.a22_399

## Included activities end
Chichibabin synthesis of pyridine including materials, energy uses, infrastructure and emissions.

## Geography
The inventory is modelled for the world.

## Technology
Chichibabin synthesis of pyridine

## Time period
Time of publications

## Parameters
- fraction, cooling water, cooling pond system, to air: 0.032 dimensionless; name fraction_CW_CP_to_air; lognormal variance with pedigree 0.0413, pedigree (2,3,1,3,1)
  Calculated based on literature value (Scown, C.D., 2011, Water Footprint of U.S. Transportation Fuels and supplying information of the article) (Vionnet, S., Quantis Water Database - Technical Report, 2012).
- fraction, cooling water, once-through system, to air: 0.004 dimensionless; name fraction_CW_OT_to_air; lognormal variance with pedigree 0.0413, pedigree (2,3,1,3,1)
  (same comment as for fraction, cooling water, cooling pond system, to air)
- fraction, cooling water, recirculating system, to air: 0.771 dimensionless; name fraction_CW_R_to_air; lognormal variance with pedigree 0.0413, pedigree (2,3,1,3,1)
  (same comment as for fraction, cooling water, cooling pond system, to air)
- fraction, cooling water, to air: 0.3875 dimensionless; name fraction_CW_to_air; = (0.5*fraction_CW_OT_to_air)+(0.5*fraction_CW_R_to_air); lognormal variance with pedigree 0.092025, pedigree (4,4,3,2,4)
  Calculated value based on literature value (see comments of the other parametres present in this dataset) and expert opinion. In the case when no industry/literature data are available about the type of cooling or directly fraction, cooling water, to air specific for the process a default assumption is applied. It is assumed that the once-through cooling system is used in 50% of all cases and recirculating system is used in another 50% of all cases.

## Reference product
- hydrogen, gaseous, low pressure: 1 kg; name BP_amount_1; By-product classification allocatable product; CPC 34210: Hydrogen, nitrogen, oxygen, carbon dioxide and rare gases; inorganic oxygen compounds of non-metals n.e.c.; HS2017 280410: Hydrogen; CAS 1333-74-0
  Stoichiometric caclulation
  production volume 3.00472e6 kg; = RP_PV_1 * (BP_amount_1 / RP_amount_1)
    Calculated from production volume of reference product using the relative outputs.
  property heating value, net 120.21 MJ
    LHV is calculated based on the elemental composition of the substance. Based on the CAS number of the substance (001333-74-0), the chemical formula of the substance is found to be: H2, (PubChem 2020). Reference: Kim, S., Chen, J., Cheng, T., Gindulyte, A., He, J., He, S., Li, Q., Shoemaker, B. A., Thiessen, P. A., Yu, B., Zaslavsky, L., Zhang, J., & Bolton, E. E. (2019). PubChem 2019 update: improved access to chemical data. Nucleic acids research, 47(D1), D1102–D1109. https://doi.org/10.1093/nar/gky1033
  property price 1.90471 EUR2005
    Price for 2021.
    Price based on HydrogenEurope: Clean Hydrogen Monitor 2022, available here: https://hydrogeneurope.eu/wp-content/uploads/2022/10/Clean_Hydrogen_Monitor_10-2022_DIGITAL.pdf, last accessed 2023-07-25.
    The prices were converted to EUR based on the annual exchange rates published by the European Central Bank (https://sdw.ecb.europa.eu/quickview.do?SERIES_KEY=120.EXR.A.USD.EUR.SP00.A, last accessed on 2022-02-15) and adjusted for inflation relative to 2005 using the producer price index (PPI) of the euro area, published by eurostat (https://ec.europa.eu/eurostat/databrowser/view/STS_INPP_A__custom_6416181/default/table?lang=en, last accessed on 2022-05-04).
  properties: allocation factor 0.0742076, carbon allocation 0 kg, carbon content 0, carbon content, fossil 0, carbon content, non-fossil 0, dry mass 1 kg, true value 0.294659, water content 0, water in wet mass 0 kg, wet mass 1 kg

## Inputs from technosphere
- acetaldehyde: 0.479687 kg; lognormal variance with pedigree 0.0502, pedigree (1,3,5,3,1)
  Uncertainty: Stoechiometric calculation
  properties: carbon content, fossil 0.545296, dry mass 1 kg, heating value, net 27.53 MJ, wet mass 1 kg
- ammonia, anhydrous, liquid: 0.00207082, 0.00401988, 0.0445577, 0.00188348, 0.000421326, 0.0154845, 0.00133108, 0.00410302 kg (8 suppliers, which the file names only by identifier); sum of these 0.0738718 kg; lognormal variance with pedigree 0.0502, pedigree (1,3,5,3,1)
  Stoichiometric caclulation
  Uncertainty: Stoechiometric calculation
  properties: dry mass 1 kg, wet mass 1 kg
- chemical factory, organics: 1.30475e-10 unit; lognormal variance with pedigree 0.3184, pedigree (4,5,5,5,5)
  Estimation
  Uncertainty: Estimation
- electricity, medium voltage: 0.00360275, 0.0718667, 0.024147, 0.00110328, 0.000220821, 4.74153e-5, 0.00742135 kWh (7 suppliers, which the file names only by identifier); sum of these 0.108409 kWh; lognormal variance with pedigree 0.1875, pedigree (4,5,5,5,5)
  Estimation
  Uncertainty: Stoechiometric calculation
- formaldehyde: 0.133401 kg; lognormal variance with pedigree 0.0502, pedigree (1,3,5,3,1)
  Stoichiometric caclulation
  Uncertainty: Stoechiometric calculation
  properties: carbon content, fossil 0.4, dry mass 1 kg, heating value, net 20.19 MJ, wet mass 1 kg
- heat, from steam, in chemical industry: 0.652375 MJ; lognormal variance with pedigree 0.1786, pedigree (4,5,5,5,5)
  Estimation
  Uncertainty: Estimation
  properties: heating value, net 1 MJ

## Inputs from nature
- Water, cooling, unspecified natural origin [natural resource, in water]: 0.0078285 m3; name water_cooling_UNO_input; lognormal variance with pedigree 0.0502, pedigree (1,3,5,3,1)
  Estimation
  Estimation
  Uncertainty: Estimation

## Emissions to nature
- Acetaldehyde [air, urban air close to ground]: 0.000959375 kg; lognormal variance with pedigree 0.1786, pedigree (4,5,5,5,5)
  Estimation
  Uncertainty: Estimation
- Ammonia [air, urban air close to ground]: 0.000147792 kg; lognormal variance with pedigree 0.1786, pedigree (4,5,5,5,5)
  Estimation
  Uncertainty: Estimation
- Carbon dioxide, fossil [air, urban air close to ground]: 0.215907 kg; lognormal variance with pedigree 0.1786, pedigree (4,5,5,5,5)
  From water treatment
  Uncertainty: Estimation
- Formaldehyde [air, urban air close to ground]: 0.000260806 kg; lognormal variance with pedigree 0.1786, pedigree (4,5,5,5,5)
  Estimation
  Uncertainty: Estimation
- Water [air, unspecified]: 0.00303354 m3; name water_to_air_unspecified; = water_cooling_UNO_input*fraction_CW_to_air; lognormal variance with pedigree 0.130025, pedigree (4,4,5,2,4)
  Calculated value based on literature values and expert opinion. See comments in the parametres' comment field.
  property fraction, origin: fresh water 0; name fraction_origin_fresh_water
  property fraction, origin: salt water 0; name fraction_origin_salt_water
  property fraction, origin: unspecified 1; name fraction_origin_unspecified
- Acetaldehyde [water, surface water]: 0.0115365 kg; lognormal variance with pedigree 0.1786, pedigree (4,5,5,5,5)
  Estimation
  Uncertainty: Estimation
- Ammonium [water, surface water]: 0.021231 kg; lognormal variance with pedigree 0.1786, pedigree (4,5,5,5,5)
  Estimation
  Uncertainty: Estimation
- BOD5, Biological Oxygen Demand [water, surface water]: 0.228216 kg; lognormal variance with pedigree 0.218, pedigree (4,5,5,5,5)
  From water emissions
  Uncertainty: Estimation
- COD, Chemical Oxygen Demand [water, surface water]: 0.021231 kg; lognormal variance with pedigree 0.218, pedigree (4,5,5,5,5)
  From water emissions
  Uncertainty: Estimation
- DOC, Dissolved Organic Carbon [water, surface water]: 0.00654293 kg; lognormal variance with pedigree 0.218, pedigree (4,5,5,5,5)
  From water emissions
  Uncertainty: Estimation
- Formaldehyde [water, surface water]: 0.000625992 kg; lognormal variance with pedigree 0.1786, pedigree (4,5,5,5,5)
  Estimation
  Uncertainty: Estimation
- TOC, Total Organic Carbon [water, surface water]: 0.00654293 kg; lognormal variance with pedigree 0.218, pedigree (4,5,5,5,5)
  From water emissions
  Uncertainty: Estimation
- Water [water, unspecified]: 0.00479495 m3; name water_to_water_unspecified; = water_cooling_UNO_input*(1-fraction_CW_to_air); lognormal variance with pedigree 0.130025, pedigree (4,4,5,2,4)
  (same comment as for Water)
  property fraction, origin: fresh water 0; name fraction_origin_fresh_water_Ww
  property fraction, origin: salt water 0; name fraction_origin_salt_water_Ww
  property fraction, origin: unspecified 1; name fraction_origin_unspecified_Ww

## Extrapolations
Transports and emissions are modelled with standard methods.
