# tap water production, underground water without treatment

Dataset: EcoSpold 2, unit process
Geography: IN
Time period: 2010-01-01 to 2023-12-31
Technology level: current
Classification: ISIC rev.4 ecoinvent: 3600:Water collection, treatment and supply
Classification: EcoSpold01Categories: water supply/production
Synonyms: potable water
Tags: single enterprise data
Scenario: Business-as-Usual
System model: Allocation, cut-off by classification
Generated by: Laura Rubio
Published in: Gmünder S. 2017
Database: ecoinvent
isCopyrightProtected: true
accessRestrictedTo: 1

## General comment
This dataset is created as a child of the global dataset with edited production volume for this geography.
This dataset represents production of 1 kg of tap water under pressure at facility gate, ready for distribution in network. It represents average operation of tap water from underground water without further treatments. Water is pumped from aquifer and pressurized for distribution. Inventory was constructed from reported energy inputs and wastes from a single plant located in Québec assumed to represent 53% of total production of tap water from this technology.

## Included activities start
From the intake pumping of raw surface water into the water treatment plant.

## Included activities end
This dataset ends with the production of tap water, at facility gate, under pressure. It includes energy for intake pumping, lighting and heating of the building as well as the energy of the pump pressurizing water to the beginning of the network. Infrastructure for the facility is estimated. It excludes energy for pumping stations and water losses within the network which is included in the tap water market. Emissions to the environment occurring during the treatment and during the distribution were not considered as they are assumed negligible. Main substance in water that would be released in the environment are assumed to be considered in wastewater processes.

## Geography
Extrapolated from data from a single plant in Quebec (Canada).The uncertainty was adjusted accordingly.

## Time period
The time period is set from 2010 to the year 2017 as it is a considering period in which the process data has not passed through drastic technological changes.

## Reference product
- tap water: 1 kg; name tapwater; By-product classification allocatable product; CPC 18000: Natural water; CAS 7732-18-5
  production volume 3.92511e12 kg; name PV_tapwater; = 56073000000000*0.07
    Calculated value based on AQUASTAT total tap water production volume ( AQUASTAT, 2010)- <http://www.fao.org/nr/water/aquastat/data/popups/itemDefn.html?id=4251>. Further water treatment technology mix was based mainly on “Status of Water Treatment Plants in India” (Pollution & Board, 2010) - http://cpcb.nic.in/upload/NewItems/NewItem_103_statusofwaterqualitypackage.pdf , which compiled data from 52 treatment plants in various parts of the country. The water treatment is divided among conventional (81%), filtration treatment (6%) and underground water with chemical treatment (5.2%). The treatment technology of the remaining (7.0%) was estimated as groundwater without treatment in accordance to literature (IIHS, 2014). Overall the production technology shares, present in the ecoinvent database, are calculated to be as follows; tap water production, conventional treatment (81%) followed by tap water production, direct filtration treatment (6.0%) , tap water production, underground water with chemical treatment (5%) and tap water production, underground water without treatment (7%)
  property price 0.000397 EUR2005
    Converted from EU price by using Purchasing Power Parities (0.8458 in 2003 and 0.8426 in 2004)
  properties: carbon allocation 6.08566e-7 kg, carbon content 0.0017899, carbon content, fossil 0.0017899, carbon content, non-fossil 0, dry mass 0.00034 kg, water content 2940.18, water in wet mass 0.99966 kg, wet mass 1 kg

## Inputs from technosphere
- electricity, medium voltage: 0.000399 kWh; lognormal variance with pedigree 0.0072, pedigree (2,4,3,5,1)
  Measured value, taken from the "tap water production, underground water without treatment, GLO" dataset (accessed 20170920) as it was considered adequate also for this dataset. Represents electricity consumption for the entire treatment process including pumping for water intake and pumping for distribution at the plant gate.
  EcoSpold01Location=UCTE
- pump station: 2.0568e-11 unit; lognormal variance with pedigree 0.0466, pedigree (5,4,3,5,1)
  Approximated process, taken from the "tap water production, underground water without treatment, GLO" dataset (accessed 20170920) as it was considered adequate also for this dataset. Used to represent facility pumping both intake and at facility gate. Value taken directly from ecoinvent V2.2 tap water, at user module.
- water pump operation, diesel: 1.49144e-5 MJ; = diesel_use*density_diesel*NHV; lognormal variance with pedigree 0.004, pedigree (1,1,3,5,1)
  Calculated value,taken from the "tap water production, underground water without treatment, GLO" dataset (accessed 20170920) as it was considered adequate also for this dataset.
  Uncertainty: Calculated variable. Uncertainty will be determined from propagation of uncertainty factors of underlying variables.
  property density 0.84 kg/l; name density_diesel
  property fuel input in physical units, L 4.11e-7 l; name diesel_use
  property heating value, net 43.2 MJ; name NHV
  properties: price 0.07 EUR2005
  note on fuel input in physical units, L: Measured value. Average of diesel volume consumed in a year for emergency generators (both for emergency and routine maintenance runs).
  note on heating value, net: Literature. net (lower) heating (calorific) value for diesel in MJ/kg

## Inputs from nature
- Water, well, in ground [natural resource, in water]: 0.001 m3; name waterIn_1; lognormal variance with pedigree 0.2106, pedigree (5,5,5,5,5)
  Measured value taken from the "tap water production, underground water without treatment, GLO" dataset (accessed 20170920) as it was considered adequate also for this dataset. Data provider reported that no loss occurs thoughout water treatment.

## Sampling procedure
Based on data collected from a single pumping for distribution of underground water production facility in Quebec (Canada). See corresponding Quebec dataset for more information. Note that percent representativeness is not supplied because technology-specific global production volumes is too uncertain. Should this information become available, the representativeness can be calculated by dividing the sum of the water treated by the Quebec plants that served as a basis for the Global dataset by the technology-specific global production volume. (4.35E9 kg/a)

## Extrapolations
From a single pumping for distribution of underground water tap water production facility in Quebec (Canada) to India average of same technology. Indian production volumen data was used fro regionalizing teh dataset. Underground water without treatment accounts for 7% of the total produced tap water in India.The uncertainty has been changed accordingly.

## Review by Philippe Loubet 2017-11-23
The overall quality of this dataset is acceptable.
In the future it would be desirable to update this dataset with Indian data.
