# printing ink production, offset, product in 47.5% solution state

Dataset: EcoSpold 2, unit process
Geography: RoW
Time period: 2000-01-01 to 2023-12-31
Technology level: current
Classification: ISIC rev.4 ecoinvent: 2022:Manufacture of paints, varnishes and similar coatings, printing ink and mas
Classification: EcoSpold01Categories: paintings/production
Tags: ConvertedDataset
Scenario: Business-as-Usual
System model: Allocation, cut-off by classification
Generated by: Roland Hischier
Published in: Hischier R. 2007
Database: ecoinvent
isCopyrightProtected: true
accessRestrictedTo: 1

## General comment
The functional unit represent 1 kg of printing color (black and colored mixed!) for the offset printing sector.
[This dataset was already contained in the ecoinvent database version 2. It was not individually updated during the transfer to ecoinvent version 3. Life Cycle Impact Assessment results may still have changed, as they are affected by changes in the supply chain, i.e. in other datasets. This dataset was generated following the ecoinvent quality guidelines for version 2. It may have been subject to central changes described in the ecoinvent version 3 change report (http://www.ecoinvent.org/database/ecoinvent-version-3/reports-of-changes/), and the results of the central updates were reviewed extensively. The changes added e.g. consistent water flows and other information throughout the database. The documentation of this dataset can be found in the ecoinvent reports of version 2, which are still available via the ecoinvent website. The change report linked above covers all central changes that were made during the conversion process.]
[NEW TEXT for v3] The dataset represents solution. The solvent is NOT part of the dataset ... but needs to be added in order to have a full balance.

## Included activities end
Material inputs (solvents, binders, pigments, fillers), estimation of energy consumption. No emissions to air/water nor solid wastes included.

## Geography
Composition is based on a survey within Switzerland. The data are used here as European average values

## Technology
average data from present technology of Swiss companies

## Parameters
- fraction, cooling water, cooling pond system, to air: 0.032 dimensionless; name fraction_CW_CP_to_air; lognormal variance with pedigree 0.0413, pedigree (2,3,1,3,1)
  Calculated based on literature value (Scown, C.D., 2011, Water Footprint of U.S. Transportation Fuels and supplying information of the article) (Vionnet, S., Quantis Water Database - Technical Report, 2012).
- fraction, cooling water, once-through system, to air: 0.004 dimensionless; name fraction_CW_OT_to_air; lognormal variance with pedigree 0.0413, pedigree (2,3,1,3,1)
  (same comment as for fraction, cooling water, cooling pond system, to air)
- fraction, cooling water, recirculating system, to air: 0.771 dimensionless; name fraction_CW_R_to_air; lognormal variance with pedigree 0.0413, pedigree (2,3,1,3,1)
  (same comment as for fraction, cooling water, cooling pond system, to air)
- fraction, cooling water, to air: 0.3875 dimensionless; name fraction_CW_to_air; = (0.5*fraction_CW_OT_to_air)+(0.5*fraction_CW_R_to_air); lognormal variance with pedigree 0.092025, pedigree (4,4,3,2,4)
  Calculated value based on literature value (see comments of the other parametres present in this dataset) and expert opinion. In the case when no industry/literature data are available about the type of cooling or directly fraction, cooling water, to air specific for the process a default assumption is applied. It is assumed that the once-through cooling system is used in 50% of all cases and recirculating system is used in another 50% of all cases.

## Reference product
- printing ink, offset, without solvent, in 47.5% solution state: 1 kg; By-product classification allocatable product; CPC 35130: Printing ink; HS2017 3215: Ink; printing, writing or drawing ink and other inks; whether or not concentrated or solid
  EcoSpold01Location=RER
  production volume 2.67763 kg
    This is a placeholder value that does not reflect real-world production volumes. This dataset does not currently require a real-world production volume to work in the database framework, and no actual data were collected yet. This has no negative effect on the results of the ecoinvent database.
  property carbon content, fossil 0.455266
    C content was calculated as an addition of C content in the raw materials.
  property carbon content, non-fossil 0.221773
    C content was calculated as an addition of C content in the raw materials.
  property heating value, net 20.51 MJ
    LHV is calculated based on the Carbon content of the product. More details can be found on the respective documentation.
  property price 3.38 EUR2005
    From UN trade database. http://data.un.org/ Import data from the largest economies of the world are used (Brazil, India, USA, China, Japan and EU-27). Commodities: 'Acrylic or vinyl polymer paint or varnish, non-aqueou', 'Polyester based paints, varnishes, non-aqueous medium' and 'Polymer based paint, varnish in non-aqueous medium ne'.
  properties: carbon allocation 0.677039 kg, carbon content 0.677039, dry mass 1 kg, water content 0, water in wet mass 0 kg, wet mass 1 kg

## Inputs from technosphere
- alkyd resin, long oil, without solvent, in 70% white spirit solution state: 0.362 kg; lognormal variance with pedigree 0.0546, pedigree (3,3,5,5,1)
  EcoSpold01Location=RER
  Based on information from Swiss producers
  Uncertainty: based on information from Swiss producers
  properties: carbon content, fossil 0.268755, carbon content, non-fossil 0.412906, dry mass 1 kg, heating value, net 20.65 MJ, wet mass 1 kg
  note on carbon content, fossil: C content was calculated as an addition of C content in the raw materials.
- carbon black: 0.1335 kg; lognormal variance with pedigree 0.0546, pedigree (3,3,5,5,1)
  Based on information from Swiss producers
  EcoSpold01Location=GLO
  Uncertainty: based on information from Swiss producers
  properties: carbon content, fossil 0.85, dry mass 1 kg, heating value, net 25.76 MJ, wet mass 1 kg
- chemical factory, organics: 4e-10 unit; lognormal variance with pedigree 0.5, pedigree (5,5,5,5,5)
  Estimation
  EcoSpold01Location=RER
  Uncertainty: estimation
- electricity, medium voltage: 0.0221663, 0.442168, 0.148567, 0.00678808, 0.00135863, 0.000291728, 0.0456607 kWh (7 suppliers, which the file names only by identifier); sum of these 0.667 kWh; lognormal variance with pedigree 0.0546, pedigree (3,3,5,5,1)
  Based on information from Swiss producers
  EcoSpold01Location=UCTE
  Uncertainty: based on information from Swiss producers
- heat, district or industrial, natural gas: 0.0269987, 1.643 MJ (2 suppliers, which the file names only by identifier); sum of these 1.67 MJ; lognormal variance with pedigree 0.0546, pedigree (3,3,5,5,1)
  (same comment as for alkyd resin, long oil, without solvent, in 70% white spirit solution s)
  properties: heating value, net 1 MJ
- heat, district or industrial, other than natural gas: 1.66923, 0.000773322 MJ (2 suppliers, which the file names only by identifier); sum of these 1.67 MJ; lognormal variance with pedigree 0.0546, pedigree (3,3,5,5,1)
  Based on information from Swiss producers
  EcoSpold01Location=RER
  Uncertainty: based on information from Swiss producers
  properties: heating value, net 1 MJ
- lime: 0.095 kg; lognormal variance with pedigree 0.0546, pedigree (3,3,5,5,1)
  EcoSpold01Location=CH
  Based on information from Swiss producers
  Uncertainty: based on information from Swiss producers
  properties: carbon content, fossil 0.120005, dry mass 1 kg, wet mass 1 kg
- palm oil, crude: 0.0475 kg; lognormal variance with pedigree 0.0546, pedigree (3,3,5,5,1)
  Based on information from Swiss producers
  EcoSpold01Location=MY
  Uncertainty: based on information from Swiss producers
  properties: carbon content, non-fossil 0.752881, dry mass 1 kg, heating value, net 37 MJ, wet mass 1 kg
  note on carbon content, non-fossil: C49H97O6. Palm oil (tab 17.4, ecoinvent v2.2 report 17-part 17)
  note on heating value, net: Literature value, Source: Biograce, Condensed list of standard values, version 2 - Public. Available at: https://biograce.net/app/webroot/files/file/BioGrace_condensed_list_of_standard_values_-_version_2_-_Public.doc
- pitch: 0.0252381, 0.00113128, 0.000557628, 0.00978435, 0.001615, 0.142674 kg (6 suppliers, which the file names only by identifier); sum of these 0.181 kg; lognormal variance with pedigree 0.0546, pedigree (3,3,5,5,1)
  (same comment as for heat, district or industrial, other than natural gas)
  properties: carbon content, fossil 0.83, dry mass 1 kg, heating value, net 28 MJ, wet mass 1 kg
- polyethylene terephthalate, granulate, amorphous: 0.1335 kg; lognormal variance with pedigree 0.0546, pedigree (3,3,5,5,1)
  (same comment as for alkyd resin, long oil, without solvent, in 70% white spirit solution s)
  properties: carbon content, fossil 0.625, dry mass 1 kg, heating value, net 22.95 MJ, wet mass 1 kg
  note on carbon content, fossil: Polymer of the ethylen terephtalate monomer (C10H8O4)n (ecoinvent v2.2 report 11_II), MW=192 g/mol
- soybean oil, crude: 0.0475 kg; lognormal variance with pedigree 0.0546, pedigree (3,3,5,5,1)
  (same comment as for heat, district or industrial, other than natural gas)
  properties: carbon content, non-fossil 0.768, dry mass 1 kg, heating value, net 38.4 MJ, wet mass 1 kg
  note on heating value, net: Values is approximated from HHV from "vegetable oil, crude". Source: Radovanovic,M.; Zivanovic,T.; Stojiljkovic,D.; Jovanovic,V.; Jerinic,N.; Knezevic,S. et.al. Utilization of sunflower husk as a fuel for industrial boilers - 20 years experience. Proc. 5th Eur. Conf. on Industrial Furnaces&Boilers 2000,vol.2,p.221-233. Available at: https://phyllis.nl/Biomass/View/2152

## Inputs from nature
- Water, cooling, unspecified natural origin [natural resource, in water]: 0.001429 m3; name water_cooling_UNO_input; lognormal variance with pedigree 0.0546, pedigree (3,3,5,5,1)
  Based on information from Swiss producers
  Uncertainty: based on information from Swiss producers

## Emissions to nature
- Water [air, unspecified]: 0.000553737 m3; name water_to_air_unspecified; = water_cooling_UNO_input*fraction_CW_to_air; lognormal variance with pedigree 0.130025, pedigree (4,4,5,2,4)
  Calculated value based on literature values and expert opinion. See comments in the parametres' comment field.
  property fraction, origin: fresh water 0; name fraction_origin_fresh_water
  property fraction, origin: salt water 0; name fraction_origin_salt_water
  property fraction, origin: unspecified 1; name fraction_origin_unspecified
- Water [water, unspecified]: 0.000875262 m3; name water_to_water_unspecified; = water_cooling_UNO_input*(1-fraction_CW_to_air); lognormal variance with pedigree 0.130025, pedigree (4,4,5,2,4)
  (same comment as for Water)
  property carbon content, fossil 0; name C_content_fossil
  property carbon content, non-fossil 0; name C_content_non_fossil
  property dry mass 0 kg; name DM
  property fraction, origin: fresh water 0; name fraction_origin_fresh_water_Ww
  property fraction, origin: salt water 0; name fraction_origin_salt_water_Ww
  property fraction, origin: unspecified 1; name fraction_origin_unspecified_Ww
  property water in wet mass 1000 kg; name WWM
  property wet mass 1000 kg; name WM

## Extrapolations
This dataset has been copied from an original dataset covering the geography RER. The uncertainty has been adjusted accordingly.

## Review by Hans-Jörg Althaus 2003-07-02
passed
