# aminopyridine production, Chichibabin amination

Dataset: EcoSpold 2, unit process
Geography: RoW
Time period: 2010-01-01 to 2023-12-31
Technology level: current
Classification: ISIC rev.4 ecoinvent: 2011:Manufacture of basic chemicals
Scenario: Business-as-Usual
System model: Allocation, cut-off by classification
Generated by: Jürgen Sutter
Database: ecoinvent
isCopyrightProtected: true
accessRestrictedTo: 1

## General comment
The most important method for the manufacture of 2-aminopyridine is the reaction of pyridine with sodium amide (Chichibabin amination). Upon hydrolysis of the intermediate sodium salt, 2-aminopyridine is obtained in high yield.
2-Aminopyridine (C6H6N2; CAS 504-29-0) is a colourless solid. The major uses of 2-aminopyridine are as an intermediate for pharmaceuticals such as sulfapyridine, tripelennamine, piroxicam , and tenoxicam, as well as a variety of agrochemicals.
Frischknecht R., Jungbluth N., Althaus H.-J., Doka G., Dones R., Heck T., Hellweg S., Hischier R., Nemecek T., Rebitzer G. and Spielmann M. (2007) Overview and Methodology. Final report ecoinvent v2.0 No. 1. Swiss Centre for Life Cycle Inventories, Dübendorf, CH, retrieved from: www.ecoinvent.org.
Chemiepark GENDORF, Umwelterklärung 2016, https://www.gendorf.de/Nachbarn/Umweltschutz/Industrie%20und%20Nachhaltigkeit
Chemiepark GENDORF, Umwelterklärung 2017, https://www.gendorf.de/Nachbarn/Umweltschutz/Industrie%20und%20Nachhaltigkeit
Chemiepark GENDORF, Umwelterklärung 2020, https://www.gendorf.de/Nachbarn/Umweltschutz/Industrie%20und%20Nachhaltigkeit
Shinkichi Shimizu, Nanao Watanabe, Toshiaki Kataoka, Takayuki Shoji, Nobuyuki Abe, Sinji Morishita, Hisao Ichimura: Pyridine and Pyridine Derivatives. Published online: 2000. In: Ullmann's Encyclopedia of Industrial Chemistry, Seventh Edition, 2004 Electronic Release (ed. Fiedler E., Grossmann G., Kersebohm D., Weiss G. and Witte C.). 7 th Electronic Release Edition. Wiley InterScience, New York, DOI: 10.1002/14356007.a22_399

## Included activities end
Chichibabin amination including materials, energy uses, infrastructure and emissions.

## Geography
The inventory is modelled for the world.

## Technology
Chichibabin amination
The inventory is at least partially based on a generic model on the production of chemicals. The main source of information for the values for heat, electricity, water (process and cooling), nitrogen and infrastructure, is industry data from the Gendorf Chemical Park, based in Germany. For more information refer to the sampling procedure.
Reference(s):
Hischier, R. (2005) Establishing Life Cycle Inventories of Chemicals Based on Differing Data Availability (9 pp). The International Journal of Life Cycle Assessment, Volume 10, Issue 1, pp 59–67. 10.1065/lca2004.10.181.7
Chemiepark GENDORF, Umwelterklärung 2016, https://www.gendorf.de/Nachbarn/Umweltschutz/Industrie%20und%20Nachhaltigkeit
Chemiepark GENDORF, Umwelterklärung 2017, https://www.gendorf.de/Nachbarn/Umweltschutz/Industrie%20und%20Nachhaltigkeit
Chemiepark GENDORF, Umwelterklärung 2020, https://www.gendorf.de/Nachbarn/Umweltschutz/Industrie%20und%20Nachhaltigkeit

## Time period
Time of publications

## Parameters
- fraction, cooling water, cooling pond system, to air: 0.032 dimensionless; name fraction_CW_CP_to_air; lognormal variance with pedigree 0.0413, pedigree (2,3,1,3,1)
  Calculated based on literature value (Scown, C.D., 2011, Water Footprint of U.S. Transportation Fuels and supplying information of the article) (Vionnet, S., Quantis Water Database - Technical Report, 2012).
- fraction, cooling water, once-through system, to air: 0.004 dimensionless; name fraction_CW_OT_to_air; lognormal variance with pedigree 0.0413, pedigree (2,3,1,3,1)
  (same comment as for fraction, cooling water, cooling pond system, to air)
- fraction, cooling water, recirculating system, to air: 0.771 dimensionless; name fraction_CW_R_to_air; lognormal variance with pedigree 0.0413, pedigree (2,3,1,3,1)
  (same comment as for fraction, cooling water, cooling pond system, to air)
- fraction, cooling water, to air: 0.3875 dimensionless; name fraction_CW_to_air; = (0.5*fraction_CW_OT_to_air)+(0.5*fraction_CW_R_to_air); lognormal variance with pedigree 0.092025, pedigree (4,4,3,2,4)
  Calculated value based on literature value (see comments of the other parametres present in this dataset) and expert opinion. In the case when no industry/literature data are available about the type of cooling or directly fraction, cooling water, to air specific for the process a default assumption is applied. It is assumed that the once-through cooling system is used in 50% of all cases and recirculating system is used in another 50% of all cases.
- fraction, water, decarbonised, to air: 0.3875 dimensionless; name fraction_WDC_to_air; = fraction_CW_to_air; lognormal variance with pedigree 0.092025, pedigree (4,4,3,2,4)
  Calculated value. See comments in the other parametres present in this dataset. Decarbonised water is considered to be always used as cooling water, thus cooling water fractions to air are applied to all carbonised water input flows to calculate the amount of water consumed in the processes.

## Reference product
- hydrogen, gaseous, low pressure: 1 kg; name BP_amount_1; By-product classification allocatable product; CPC 34210: Hydrogen, nitrogen, oxygen, carbon dioxide and rare gases; inorganic oxygen compounds of non-metals n.e.c.; HS2017 280410: Hydrogen; CAS 1333-74-0
  Calculated value based on stoichiometric calculations and literature data. For more information on the calculations refer to the sampling procedure.
  production volume 46111.9 kg; = RP_PV_1 * BP_amount_1 / RP_amount_1
    Calculated from production volume of reference product using the relative outputs.
  property heating value, net 120.21 MJ
    LHV is calculated based on the elemental composition of the substance. Based on the CAS number of the substance (001333-74-0), the chemical formula of the substance is found to be: H2, (PubChem 2020). Reference: Kim, S., Chen, J., Cheng, T., Gindulyte, A., He, J., He, S., Li, Q., Shoemaker, B. A., Thiessen, P. A., Yu, B., Zaslavsky, L., Zhang, J., & Bolton, E. E. (2019). PubChem 2019 update: improved access to chemical data. Nucleic acids research, 47(D1), D1102–D1109. https://doi.org/10.1093/nar/gky1033
  property price 1.90471 EUR2005
    Price for 2021.
    Price based on HydrogenEurope: Clean Hydrogen Monitor 2022, available here: https://hydrogeneurope.eu/wp-content/uploads/2022/10/Clean_Hydrogen_Monitor_10-2022_DIGITAL.pdf, last accessed 2023-07-25.
    The prices were converted to EUR based on the annual exchange rates published by the European Central Bank (https://sdw.ecb.europa.eu/quickview.do?SERIES_KEY=120.EXR.A.USD.EUR.SP00.A, last accessed on 2022-02-15) and adjusted for inflation relative to 2005 using the producer price index (PPI) of the euro area, published by eurostat (https://ec.europa.eu/eurostat/databrowser/view/STS_INPP_A__custom_6416181/default/table?lang=en, last accessed on 2022-05-04).
  properties: allocation factor 0.000690983, carbon allocation 0 kg, carbon content 0, carbon content, fossil 0, carbon content, non-fossil 0, dry mass 1 kg, true value 0.0407962, water content 0, water in wet mass 0 kg, wet mass 1 kg

## Inputs from technosphere
- chemical factory, organics: 1.29044e-11 unit; lognormal variance with pedigree 0.478, pedigree (4,5,5,5,5)
  Calculated based on literature data published by the industry. For this activity, no information was readily available concerning infrastructure and land-use. Therefore, the infrastructure is estimated based on data from two chemical factories, the BASF site of Ludwigshafen and the chemical factory in Gendorf (which are both located in Germany), which produce a wide range of chemical substances. Based on this data, the following assumptions are made: the built area amounts to about 4.2 ha, the plant has an average output of 50'000 t/a and a lifespan of fifty years. The estimated infrastructure amount is therefore 4.00 E-10 units per kg of produced chemical.
  References:
  Althaus H.-J., Chudacoff M., Hischier R., Jungbluth N., Osses M. and Primas A. (2007) Life Cycle Inventories of Chemicals. ecoinvent report No. 8, v2.0. EMPA Dübendorf, Swiss Centre for Life Cycle Inventories, Dübendorf, CH.
  Gendorf (2000) Umwelterklärung 2000, Werk Gendorf. Werk Gendorf, Burgkirchen.
  Uncertainty: Estimation
- electricity, medium voltage: 0.000427841, 0.00853447, 0.00286756, 0.00013102, 2.62234e-5, 5.63076e-6, 0.000881316 kWh (7 suppliers, which the file names only by identifier); sum of these 0.0128741 kWh; lognormal variance with pedigree 0.218, pedigree (4,5,5,5,5)
  Calculated based on literature data published by the GENDORF Chemical Park. The factory produced an average of 2462760 tonnes of chemical substances (including intermediates) per year in the years 2015-2019. The average consumption of electricity in the years 2015-2019 was 982796751 kWh per year. This equals 0.39906 kWh/kg chemical produced.
  References:
  Chemiepark GENDORF, Umwelterklärung 2016, https://www.gendorf.de/Nachbarn/Umweltschutz/Industrie%20und%20Nachhaltigkeit
  Chemiepark GENDORF, Umwelterklärung 2017, https://www.gendorf.de/Nachbarn/Umweltschutz/Industrie%20und%20Nachhaltigkeit
  Chemiepark GENDORF, Umwelterklärung 2020, https://www.gendorf.de/Nachbarn/Umweltschutz/Industrie%20und%20Nachhaltigkeit
- heat, district or industrial, natural gas: 0.000983923, 0.0598764 MJ (2 suppliers, which the file names only by identifier); sum of these 0.0608603 MJ; lognormal variance with pedigree 0.1786, pedigree (4,5,5,5,5)
  Calculated based on literature data published by the GENDORF Chemical Park. The factory produced an average of 2462760 tonnes of chemical substances (including intermediates) per year in the years 2015-2019. The average consumption of natural gas in the years 2015-2019 was 4645920000 MJ per year. This equals 1.8865 MJ/kg chemical produced.
  References:
  Chemiepark GENDORF, Umwelterklärung 2016, https://www.gendorf.de/Nachbarn/Umweltschutz/Industrie%20und%20Nachhaltigkeit
  Chemiepark GENDORF, Umwelterklärung 2017, https://www.gendorf.de/Nachbarn/Umweltschutz/Industrie%20und%20Nachhaltigkeit
  Chemiepark GENDORF, Umwelterklärung 2020, https://www.gendorf.de/Nachbarn/Umweltschutz/Industrie%20und%20Nachhaltigkeit
  properties: heating value, net 1 MJ
- heat, from steam, in chemical industry: 0.00670383 MJ; lognormal variance with pedigree 0.1786, pedigree (4,5,5,5,5)
  Calculated based on literature data published by the GENDORF Chemical Park. The factory produced an average of 2462760 tonnes of chemical substances (including intermediates) per year in the years 2015-2019. The average consumption of steam (internal and external sources) in the years 2015-2019 was 511785800 MJ per year. This equals 0.2078 MJ/kg chemical produced.
  References:
  Chemiepark GENDORF, Umwelterklärung 2016, https://www.gendorf.de/Nachbarn/Umweltschutz/Industrie%20und%20Nachhaltigkeit
  Chemiepark GENDORF, Umwelterklärung 2017, https://www.gendorf.de/Nachbarn/Umweltschutz/Industrie%20und%20Nachhaltigkeit
  Chemiepark GENDORF, Umwelterklärung 2020, https://www.gendorf.de/Nachbarn/Umweltschutz/Industrie%20und%20Nachhaltigkeit
  Uncertainty: Estimation
  properties: heating value, net 1 MJ
- hydrochloric acid, without water, in 30% solution state: 0.0124974 kg; lognormal variance with pedigree 0.0807, pedigree (1,3,5,3,1)
  Calculated value based on stoichiometric calculations and literature data to neutralise the formed sodium hydroxide. For more information on the calculations refer to the sampling procedure.
  Uncertainty: Estimation
  properties: dry mass 1 kg, heating value, net 3.32 MJ, wet mass 1 kg
- nitrogen, liquid: 0.000477849 kg; lognormal variance with pedigree 0.1786, pedigree (4,5,5,5,5)
  Calculated based on literature data published by the GENDORF Chemical Park. The factory produced an average of 2462760 tonnes of chemical substances (including intermediates) per year in the years 2015-2019. The average consumption of nitrogen, liquid in the years 2015-2019 was 29168033 m3 per year. This equals 0.014812 kg/kg chemical produced. The density to convert to kg was assumed to be 1.2506 kg/m3.
  References:
  Chemiepark GENDORF, Umwelterklärung 2016, https://www.gendorf.de/Nachbarn/Umweltschutz/Industrie%20und%20Nachhaltigkeit
  Chemiepark GENDORF, Umwelterklärung 2017, https://www.gendorf.de/Nachbarn/Umweltschutz/Industrie%20und%20Nachhaltigkeit
  Chemiepark GENDORF, Umwelterklärung 2020, https://www.gendorf.de/Nachbarn/Umweltschutz/Industrie%20und%20Nachhaltigkeit
  properties: dry mass 1 kg, wet mass 1 kg
- pyridine: 0.0278059 kg; lognormal variance with pedigree 0.218, pedigree (4,5,5,5,5)
  Calculated value based on stoichiometric calculations and literature data. For more information on the calculations refer to the sampling procedure.
  Uncertainty: Estimation
  properties: carbon content, fossil 0.759215, dry mass 1 kg, heating value, net 30.66 MJ, wet mass 1 kg
  note on carbon content, fossil: Calculated based on molecular structure. See tab "chemicals".
- sodium amide: 0.0137137 kg; lognormal variance with pedigree 0.0807, pedigree (1,3,5,3,1)
  (same comment as for pyridine)
  properties: dry mass 1 kg, heating value, net 6.21 MJ, wet mass 1 kg
- tap water: 1.47451e-6, 2.24777e-6, 4.19422e-6, 1.12989e-5, 1.36009e-6, 5.66798e-5, 0.000648616 kg (7 suppliers, which the file names only by identifier); sum of these 0.000725872 kg; lognormal variance with pedigree 0.1786, pedigree (4,5,5,5,5)
  Calculated based on literature data published by the GENDORF Chemical Park. The factory produced an average of 2462760 tonnes of chemical substances (including intermediates) per year in the years 2015-2019. The average consumption of tap water in the years 2015-2019 was 55352 t per year. This equals 0.0225 kg/kg chemical produced.
  References:
  Chemiepark GENDORF, Umwelterklärung 2016, https://www.gendorf.de/Nachbarn/Umweltschutz/Industrie%20und%20Nachhaltigkeit
  Chemiepark GENDORF, Umwelterklärung 2017, https://www.gendorf.de/Nachbarn/Umweltschutz/Industrie%20und%20Nachhaltigkeit
  Chemiepark GENDORF, Umwelterklärung 2020, https://www.gendorf.de/Nachbarn/Umweltschutz/Industrie%20und%20Nachhaltigkeit
  properties: carbon content, fossil 0.00178991, dry mass 0.000337476 kg, water content 2962.17, wet mass 1 kg
  note on carbon content, fossil: Bicarbonate content is 2.93 mol/m3. CO2 content is 0.1 mol/m3 (ecoinvent v2.2 report 8, Tab 93.1).
- wastewater, average: -7.31976e-8, -2.60611e-10 m3 (2 suppliers, which the file names only by identifier); sum of these -7.34582e-8 m3; lognormal variance with pedigree 0.218, pedigree (4,5,5,5,5)
  Calculated based on literature data published by the GENDORF Chemical Park. The factory produced an average of 2462760 tonnes of chemical substances (including intermediates) per year in the years 2015-2019. The average ouput of wastewater going to an external wastewater treatment plant in the years 2015-2019 was 5608 m3 per year. This equals 0.000002277 m3/kg chemical produced.
  References:
  Chemiepark GENDORF, Umwelterklärung 2016, https://www.gendorf.de/Nachbarn/Umweltschutz/Industrie%20und%20Nachhaltigkeit
  Chemiepark GENDORF, Umwelterklärung 2017, https://www.gendorf.de/Nachbarn/Umweltschutz/Industrie%20und%20Nachhaltigkeit
  Chemiepark GENDORF, Umwelterklärung 2020, https://www.gendorf.de/Nachbarn/Umweltschutz/Industrie%20und%20Nachhaltigkeit
  production volume; = RP_PV_1 * ( wastewater_average / RP_amount_1)
    Calculated from production volume of reference product using the relative outputs.
  properties: carbon content, non-fossil 0.194039, dry mass 0.346837 kg, mass concentration, TOC 0.1091 kg/m3, mass concentration, calcium 0.039453 kg/m3, mass concentration, chlorine 0.030031 kg/m3, mass concentration, hydrogen 0.013365 kg/m3, mass concentration, nitrogen 0.031015 kg/m3, mass concentration, oxygen 0.069824 kg/m3, mass concentration, sodium 0.06456 kg/m3, mass concentration, sulfur 0.015602 kg/m3, water content 2882.2, wet mass 1000 kg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
  note on carbon content, non-fossil: 0.0673 kg TOC/m3 (Tab A.17, ecoinvent v2.2 report 13_I). TOC was considered as Total Carbon.
- water, decarbonised: 0.000164634, 0.00240559, 0.000123195, 0.00204203, 0.00129286, 0.000320552, 1.57371e-5 kg (7 suppliers, which the file names only by identifier); sum of these 0.0063646 kg; lognormal variance with pedigree 0.0807, pedigree (1,3,5,3,1)
  Calculated value based on stoichiometric calculations and literature data. For more information on the calculations refer to the sampling procedure.
  Uncertainty: Stoechiometric calculation
  properties: wet mass 1 kg

## Inputs from nature
- Water, cooling, unspecified natural origin [natural resource, in water]: 0.000474462 m3; lognormal variance with pedigree 0.1786, pedigree (4,5,5,5,5)
  Calculated based on literature data published by the GENDORF Chemical Park. The factory produced an average of 2462760 tonnes of chemical substances (including intermediates) per year in the years 2015-2019. The average amount of cooling water released in the years 2015-2019 was 34408800 t per year. It was assumed that 5% of the cooling water was emitted to air during its use, therefore, to calculate the input of cooling water, the output value reported by GENDORF was scaled up by the factor 1/0.95. This equals 0.014707 m3/kg chemical produced.
  References:
  Chemiepark GENDORF, Umwelterklärung 2016, https://www.gendorf.de/Nachbarn/Umweltschutz/Industrie%20und%20Nachhaltigkeit
  Chemiepark GENDORF, Umwelterklärung 2017, https://www.gendorf.de/Nachbarn/Umweltschutz/Industrie%20und%20Nachhaltigkeit
  Chemiepark GENDORF, Umwelterklärung 2020, https://www.gendorf.de/Nachbarn/Umweltschutz/Industrie%20und%20Nachhaltigkeit
- Water, river [natural resource, in water]: 3.11457e-5 m3; lognormal variance with pedigree 0.1786, pedigree (4,5,5,5,5)
  Calculated based on literature data published by the GENDORF Chemical Park. The factory produced an average of 2462760 tonnes of chemical substances (including intermediates) per year in the years 2015-2019. The average consumption of river water in the years 2015-2019 was 22000820 t per year. However, since the cooling water is modelled as an input, the amount of river water was adjusted to avoid double counting. 55% of the input amount of cooling water was deducted from the amount of river water, as that is the share of river water versus well water. This equals 0.00096543 m3/kg chemical produced.
  References:
  Chemiepark GENDORF, Umwelterklärung 2016, https://www.gendorf.de/Nachbarn/Umweltschutz/Industrie%20und%20Nachhaltigkeit
  Chemiepark GENDORF, Umwelterklärung 2017, https://www.gendorf.de/Nachbarn/Umweltschutz/Industrie%20und%20Nachhaltigkeit
  Chemiepark GENDORF, Umwelterklärung 2020, https://www.gendorf.de/Nachbarn/Umweltschutz/Industrie%20und%20Nachhaltigkeit
- Water, well, in ground [natural resource, in water]: 2.63417e-5 m3; lognormal variance with pedigree 0.1786, pedigree (4,5,5,5,5)
  Calculated based on literature data published by the GENDORF Chemical Park. The factory produced an average of 2462760 tonnes of chemical substances (including intermediates) per year in the years 2015-2019. The average consumption of well water in the years 2015-2019 was 18607480 t per year. However, since the cooling water is modelled as an input, the amount of well water was adjusted to avoid double counting. 45% of the input amount of cooling water was deducted from the amount of well water, as that is the share of well water versus river water. This equals 0.00081652 m3/kg chemical produced.
  References:
  Chemiepark GENDORF, Umwelterklärung 2016, https://www.gendorf.de/Nachbarn/Umweltschutz/Industrie%20und%20Nachhaltigkeit
  Chemiepark GENDORF, Umwelterklärung 2017, https://www.gendorf.de/Nachbarn/Umweltschutz/Industrie%20und%20Nachhaltigkeit
  Chemiepark GENDORF, Umwelterklärung 2020, https://www.gendorf.de/Nachbarn/Umweltschutz/Industrie%20und%20Nachhaltigkeit

## Emissions to nature
- Carbon dioxide, fossil [air, urban air close to ground]: 0.00182797 kg; lognormal variance with pedigree 0.184, pedigree (4,5,5,5,5)
  Calculated based on the carbon content of unreacted chemical substances. The unreacted chemicals are assumed to go to wastewater treatment, which has a conversion rate in biological treatment of 95% of carbon into carbon dioxide. The remaining 5% are released as emissions to water, unspecified.
  Uncertainty: Estimation
- Hydrogen [air, unspecified]: 3.47228e-6 kg; lognormal variance with pedigree 0.218, pedigree (4,5,5,5,5)
  Calculated losses, based on the boiling point of a chemical, to water or to air. In addition, unreacted chemicals are assumed to go to wastewater treatment, which has a conversion rate in biological treatment of 95% of carbon into carbon dioxide. The remaining 5% are released as emissions to water.
- Nitrogen [air, unspecified]: 0.000477849 kg; lognormal variance with pedigree 0.218, pedigree (4,5,5,5,5)
  Calculated value. The amount of nitrogen released to air is equal to the amount of nitrogen entering the activity.
- Water [air, unspecified]: 4.74236e-5 m3; name water_to_air_unspecified; lognormal variance with pedigree 0.130025, pedigree (4,4,5,2,4)
  Calculated based on literature data published by the GENDORF Chemical Park. The factory produced an average of 2462760 tonnes of chemical substances (including intermediates) per year in the years 2015-2019. To determine the emissions of water to air, the difference of all water inputs (from river, well, tap water and cooling) and outputs (wastewater, emissions to water) was calculated. The average ouput of water to air in the years 2015-2019 was 3620444 m3 per year. This equals 0.00147 m3/kg chemical produced. For more information on the other water exchanges please consult the respective exchange comment.
  References:
  Chemiepark GENDORF, Umwelterklärung 2016, https://www.gendorf.de/Nachbarn/Umweltschutz/Industrie%20und%20Nachhaltigkeit
  Chemiepark GENDORF, Umwelterklärung 2017, https://www.gendorf.de/Nachbarn/Umweltschutz/Industrie%20und%20Nachhaltigkeit
  Chemiepark GENDORF, Umwelterklärung 2020, https://www.gendorf.de/Nachbarn/Umweltschutz/Industrie%20und%20Nachhaltigkeit
  property fraction, origin: fresh water 1; name fraction_origin_fresh_water
  property fraction, origin: salt water 0; name fraction_origin_salt_water
  property fraction, origin: unspecified 0; name fraction_origin_unspecified
- BOD5, Biological Oxygen Demand [water, unspecified]: 6.50825e-5 kg; lognormal variance with pedigree 0.218, pedigree (4,5,5,5,5)
  Calculated value. The BOD, COD, TOC and BOD5 are calculated based on the amount and type of emissions released to water in the same activity.
- COD, Chemical Oxygen Demand [water, unspecified]: 6.50825e-5 kg; lognormal variance with pedigree 0.218, pedigree (4,5,5,5,5)
  (same comment as for BOD5, Biological Oxygen Demand)
- Chloride [water, surface water]: 0.0121512 kg; lognormal variance with pedigree 0.218, pedigree (4,5,5,5,5)
  Calculated losses, based on the boiling point of a chemical, to water or to air. In addition, unreacted chemicals are assumed to go to wastewater treatment, which has a conversion rate in biological treatment of 95% of carbon into carbon dioxide. The remaining 5% are released as emissions to water.
  This includes emissions from the base neutralisation.
  Uncertainty: Estimation
- DOC, Dissolved Organic Carbon [water, unspecified]: 2.6233e-5 kg; lognormal variance with pedigree 0.218, pedigree (4,5,5,5,5)
  (same comment as for BOD5, Biological Oxygen Demand)
- Sodium I [water, surface water]: 0.00807138 kg; lognormal variance with pedigree 0.218, pedigree (4,5,5,5,5)
  (same comment as for Chloride)
- TOC, Total Organic Carbon [water, unspecified]: 2.6233e-5 kg; lognormal variance with pedigree 0.218, pedigree (4,5,5,5,5)
  (same comment as for BOD5, Biological Oxygen Demand)
- Water [water, unspecified]: 0.000485205 m3; name water_to_water_unspecified; lognormal variance with pedigree 0.130025, pedigree (4,4,5,2,4)
  Calculated based on literature data published by the GENDORF Chemical Park. The factory produced an average of 2462760 tonnes of chemical substances (including intermediates) per year in the years 2015-2019. The amount of water released back to the environment consists of the sum of the amount of process water treated in the internal WWTP that is then released back to the environment and the amount of cooling water released back to the environment. The average ouput of the internal WWTP in the years 2015-2019 was 2628800 m3 and that of cooling water released back to the environment was 34408800 m3. This gives a yearly average of 37037600 m3 emissions of water to water. This equals 0.01504 m3/kg chemical produced.
  References:
  Chemiepark GENDORF, Umwelterklärung 2016, https://www.gendorf.de/Nachbarn/Umweltschutz/Industrie%20und%20Nachhaltigkeit
  Chemiepark GENDORF, Umwelterklärung 2017, https://www.gendorf.de/Nachbarn/Umweltschutz/Industrie%20und%20Nachhaltigkeit
  Chemiepark GENDORF, Umwelterklärung 2020, https://www.gendorf.de/Nachbarn/Umweltschutz/Industrie%20und%20Nachhaltigkeit
  property fraction, origin: fresh water 1; name fraction_origin_fresh_water_Ww
  property fraction, origin: salt water 0; name fraction_origin_salt_water_Ww
  property fraction, origin: unspecified 0; name fraction_origin_unspecified_Ww

## Sampling procedure
Literature data and stoichiometric calculation. This inventory is partially based on a generic model of the production of chemicals. The data generated by this model have been improved with compound-specific data when available.

## Extrapolations
Transports and emissions are modelled with standard methods.
