# treatment of municipal solid waste, open burning

Dataset: EcoSpold 2, unit process
Geography: GLO
Time period: 2010-01-01 to 2023-12-31
Technology level: current
Classification: ISIC rev.4 ecoinvent: 3821:Treatment and disposal of non-hazardous waste
Synonyms: open, uncontrolled burning
Scenario: Business-as-Usual
System model: Allocation, cut-off by classification
Share of production covered: 1 %
Generated by: Avraam Symeonidis
Database: ecoinvent
isCopyrightProtected: true
accessRestrictedTo: 1

## General comment
This dataset represents the activity of waste disposal of 'municipal solid waste' in uncontrolled, open burning. Recommended use of this dataset: This dataset represents the activity of waste disposal of waste glass in uncontrolled, open burning.Inventoried waste contains 21% paper; 8% Mixed cardboard; 15% plastics; 3% laminated materials; 2% laminated packaging, e.g. tetra bricks; 3% combined goods e.g. diapers; 3% glass; 2% textiles; 8% minerals; 9% natural products; 22% compostable material; 2.65% inert metals; 1% volatile metals; 0.0065% batteries; 0.34% electronic goods;. Waste composition (wet, in ppm): upper heating value 13.27 MJ/kg; lower heating value 11.74 MJ/kg; H2O 228830; O 257060; H 48250; C 334230; S 1119; N 3123.8; P 893.79; B 7.1933; Cl 6866.2; Br 13.552; F 56.358; I 0.0121; Ag 0.714; As 0.62521; Ba 149.04; Cd 11.748; Co 1.3453; Cr 315.21; Cu 1212.8; Hg 1.4424; Mn 259.36; Mo 1.9551; Ni 107.38; Pb 502.43; Sb 22.564; Se 0.31969; Sn 73.44; V 9.2147; Zn 1311.2; Be n.a.; Sc n.a.; Sr n.a.; Ti n.a.; Tl n.a.; W n.a.; Si 48510; Fe 29996; Ca 14062; Al 12420; K 2059.7; Mg 3377.7; Na 5143.9; . Share of carbon in waste that is biogenic 60.4%. Share of metals in waste not oxidised and bulk-recyclable (exclude very small or thin parts) iron: 60%, aluminium: 17.8%, copper: 72.8%, .Recycling rates for metallic iron = 95% for metallic aluminium = 0% for metallic copper = 95% . From the burn residues 0.0171kg iron, 0.000839kg copper, are separated and recycled. A mass of 0.21kg residues are left on ground.

## Included activities start
The activity starts with the waste being available at the location (gate) of the uncontrolled disposal. Collection and transportation of the waste to the uncontrolled disposal location is not included.

## Included activities end
The activity ends with the waste being disposed, in an uncontrolled manner and waste-specific emissions from open burning are released to the environment (air and soil).

## Geography
Modelling parameters representing a generic open burning process, not geographical specific.

## Technology
This is an inventory for open burning of solid waste. Informal or uncontrolled burning. No flue gas treatment. Suitable for informal recycling (e.g. burning of e-waste). Based on Municipal waste incineration without any pollution control. Residues (minus any actually recycled metals) are left on site. Assumption of share of thermal NOx to total NOx in average waste burning process is 30%. Contribution from thermal NOx is 810mg per kg waste. Recycling rates for metallic iron = 95% for metallic aluminium = 0% for metallic copper = 95% .

## Time period
This dataset represents a generic open burning without any temporal distinction.

## Reference product
- municipal solid waste: -1 kg; By-product classification Waste; CPC 39910: Municipal waste; HS2017 382510: Residual products of the chemical or allied industries, not elsewhere specified or included; municipal waste
  main reference product of this activity (supply of disposal service).
  production volume 1 kg
    The amount of the annual production volume is a placeholder value. The contribution of this technology to the different local markets can be found in the markets themselves.
  property heating value, net 11.74 MJ
    Value taken from the general comment of the treatment dataset.
  property price 0 EUR2005
    Waste products are assigned a price of zero as they are assumed to require further treatment.
  properties: aluminium content 0.016105, antimony content 2.9259e-5, arsenic content 8.1073e-7, barium content 0.00019326, boron content 9.3277e-6, bromine content 1.7573e-5, cadmium content 1.5233e-5, calcium content 0.018235, carbon allocation 0.334225 kg, carbon content 0.4334, carbon content, fossil 0.17157, carbon content, non-fossil 0.26183, chlorine content 0.0089036, chromium content 0.00040874, cobalt content 1.7444e-6, copper content 0.0015726, dry mass 0.77117 kg, fluorine content 7.3081e-5, heating value, gross 13.272 MJ, hydrogen content 0.062567, iodine content 1.569e-8, iron content 0.038897, lead content 0.00065151, magnesium content 0.0043799, manganese content 0.00033632, mercury content 1.8704e-6, molybdenum content 2.5352e-6, nickel content 0.00013925, nitrogen content 0.0040508, oxygen content 0.33334, phosphorus content 0.001159, potassium content 0.0026709, selenium content 4.1455e-7, silicon content 0.062904, silver content 9.2586e-7, sodium content 0.0066702, sulfur content 0.0014511, tin content 9.5231e-5, vanadium content 1.1949e-5, water content 0.29672, water in wet mass 0.22883 kg, wet mass 1 kg, zinc content 0.0017003

## Inputs from technosphere
- copper scrap, sorted, pressed: -0.00083857 kg; lognormal variance with pedigree 0.63337, pedigree (1,1,1,1,1)
  metallic copper scrap removed from ash reamains and recycled.
  Uncertainty: uncertainty is calculated from uncertainties in waste composition and transfer coefficients to soild residues
  production volume
    calculated in proportion to reference product waste input to incinerator
  properties: dry mass 1 kg, price 2.84 EUR2005, wet mass 1 kg
- iron scrap, sorted, pressed: -0.017098 kg; lognormal variance with pedigree 0.24232, pedigree (1,1,1,1,1)
  metallic iron scrap removed from ash reamains and recycled.
  Uncertainty: uncertainty is calculated from uncertainties in waste composition and transfer coefficients to soild residues
  production volume
    calculated in proportion to reference product waste input to incinerator
  properties: dry mass 1 kg, price 0.175 EUR2005, wet mass 1 kg

## Inputs from nature
- Oxygen [natural resource, in air]: 0.91366 kg; lognormal variance with pedigree 0.049175, pedigree (1,1,3,1,1)
  oxygen from ambient air needed to combust and oxidise this waste. Net demand, i.e. without air O2 leaving the process uncombusted.
  Uncertainty: uncertainty is calculated from uncertainties in waste composition and transfer coefficients to flue gas and soild residues

## Emissions to nature
- Acetaldehyde [air, urban air close to ground]: 0.0004284 kg; lognormal variance with pedigree 0.0431, pedigree (1,1,3,1,1)
  Process-specific (constant) emissions to air from open burning.
  Uncertainty: uncertainty generic estimate
- Aluminium III [air, urban air close to ground]: 6.2749e-6 kg; lognormal variance with pedigree 0.46388, pedigree (1,1,3,1,1)
  Emissions to air from open burning.
  Uncertainty: Uncertainty calculated depending on waste input and uncertainty of transfer coefficents in incineration model.
- Antimony ion [air, urban air close to ground]: 3.3845e-11 kg; lognormal variance with pedigree 1.4639, pedigree (1,1,3,1,1)
  (same comment as for Aluminium III)
- Arsenic ion [air, urban air close to ground]: 5.3286e-9 kg; lognormal variance with pedigree 1.6856, pedigree (1,1,3,1,1)
  (same comment as for Aluminium III)
- Barium II [air, urban air close to ground]: 1.4853e-6 kg; lognormal variance with pedigree 0.96131, pedigree (1,1,3,1,1)
  (same comment as for Aluminium III)
- Benzene [air, urban air close to ground]: 0.00097975 kg; lognormal variance with pedigree 0.0431, pedigree (1,1,3,1,1)
  (same comment as for Acetaldehyde)
- Boron [air, urban air close to ground]: 2.877e-9 kg; lognormal variance with pedigree 1.4399, pedigree (1,1,3,1,1)
  (same comment as for Aluminium III)
- Bromine [air, urban air close to ground]: 4.3458e-6 kg; lognormal variance with pedigree 1.2333, pedigree (1,1,3,1,1)
  (same comment as for Aluminium III)
- Cadmium II [air, urban air close to ground]: 6.549e-8 kg; lognormal variance with pedigree 1.3108, pedigree (1,1,3,1,1)
  (same comment as for Aluminium III)
- Calcium II [air, urban air close to ground]: 0.00020781 kg; lognormal variance with pedigree 0.37197, pedigree (1,1,3,1,1)
  (same comment as for Aluminium III)
- Carbon dioxide, fossil [air, urban air close to ground]: 0.43825 kg; lognormal variance with pedigree 0.038542, pedigree (1,1,3,1,1)
  Emissions to air from open burning.
  Uncertainty: Uncertainty calculated depending on waste input, uncertainty of transfer coefficents in incineration model,and uncertainty in CO and CH4 emissions.
- Carbon dioxide, non-fossil [air, urban air close to ground]: 0.68964 kg; lognormal variance with pedigree 0.038542, pedigree (1,1,3,1,1)
  (same comment as for Carbon dioxide, fossil)
- Carbon monoxide, fossil [air, urban air close to ground]: 0.014998 kg; lognormal variance with pedigree 0.64957, pedigree (1,1,3,1,1)
  (same comment as for Acetaldehyde)
- Carbon monoxide, non-fossil [air, urban air close to ground]: 0.023602 kg; lognormal variance with pedigree 0.64957, pedigree (1,1,3,1,1)
  (same comment as for Acetaldehyde)
- Chromium III [air, urban air close to ground]: 8.2777e-8 kg; lognormal variance with pedigree 0.94964, pedigree (1,1,3,1,1)
  (same comment as for Aluminium III)
- Cobalt II [air, urban air close to ground]: 5.4259e-8 kg; lognormal variance with pedigree 1.559, pedigree (1,1,3,1,1)
  (same comment as for Aluminium III)
- Copper ion [air, urban air close to ground]: 7.2722e-7 kg; lognormal variance with pedigree 0.75016, pedigree (1,1,3,1,1)
  (same comment as for Aluminium III)
- Dinitrogen monoxide [air, urban air close to ground]: 0.00011625 kg; lognormal variance with pedigree 0.0431, pedigree (1,1,3,1,1)
  (same comment as for Aluminium III)
- Dioxins, measured as 2,3,7,8-tetrachlorodibenzo-p-dioxin [air, urban air close to ground]: 1.3306e-10 kg; lognormal variance with pedigree 0.89535, pedigree (1,1,3,1,1)
  Process-specific (constant) emissions to air from open burning.
  Uncertainty: Uncertainty calculated from uncetainty in Chlorine content in waste and estimation formula
- Ethyl benzene [air, urban air close to ground]: 0.00032746 kg; lognormal variance with pedigree 0.0431, pedigree (1,1,3,1,1)
  (same comment as for Acetaldehyde)
- Formaldehyde [air, urban air close to ground]: 0.00044365 kg; lognormal variance with pedigree 0.0431, pedigree (1,1,3,1,1)
  (same comment as for Acetaldehyde)
- Hydrochloric acid [air, urban air close to ground]: 0.004102 kg; lognormal variance with pedigree 0.41575, pedigree (1,1,3,1,1)
  (same comment as for Aluminium III)
- Hydrogen fluoride [air, urban air close to ground]: 6.3245e-6 kg; lognormal variance with pedigree 1.0537, pedigree (1,1,3,1,1)
  (same comment as for Aluminium III)
- Iodine [air, urban air close to ground]: 8.072e-9 kg; lognormal variance with pedigree 1.9243, pedigree (1,1,3,1,1)
  (same comment as for Aluminium III)
- Iron ion [air, urban air close to ground]: 1.5186e-5 kg; lognormal variance with pedigree 0.36362, pedigree (1,1,3,1,1)
  (same comment as for Aluminium III)
- Lead II [air, urban air close to ground]: 2.5494e-6 kg; lognormal variance with pedigree 0.81414, pedigree (1,1,3,1,1)
  (same comment as for Aluminium III)
- Magnesium [air, urban air close to ground]: 7.4947e-6 kg; lognormal variance with pedigree 0.58603, pedigree (1,1,3,1,1)
  (same comment as for Aluminium III)
- Manganese II [air, urban air close to ground]: 2.2077e-6 kg; lognormal variance with pedigree 0.89084, pedigree (1,1,3,1,1)
  (same comment as for Aluminium III)
- Mercury II [air, urban air close to ground]: 7.1357e-7 kg; lognormal variance with pedigree 1.5253, pedigree (1,1,3,1,1)
  (same comment as for Aluminium III)
- Methane, fossil [air, urban air close to ground]: 0.0022925 kg; lognormal variance with pedigree 0.0431, pedigree (1,1,3,1,1)
  (same comment as for Acetaldehyde)
- Methane, non-fossil [air, urban air close to ground]: 0.0036075 kg; lognormal variance with pedigree 0.0431, pedigree (1,1,3,1,1)
  (same comment as for Acetaldehyde)
- Molybdenum VI [air, urban air close to ground]: 9.7593e-9 kg; lognormal variance with pedigree 1.5489, pedigree (1,1,3,1,1)
  (same comment as for Aluminium III)
- Nickel II [air, urban air close to ground]: 7.7587e-8 kg; lognormal variance with pedigree 1.0653, pedigree (1,1,3,1,1)
  (same comment as for Aluminium III)
- Nitrogen oxides [air, urban air close to ground]: 0.0046086 kg; lognormal variance with pedigree 0.39108, pedigree (1,1,3,1,1)
  (same comment as for Aluminium III)
- PAH, polycyclic aromatic hydrocarbons [air, urban air close to ground]: 0.0003443 kg; lognormal variance with pedigree 0.30374, pedigree (1,1,3,1,1)
  (same comment as for Acetaldehyde)
- Particulate Matter, < 2.5 um [air, urban air close to ground]: 0.0032474 kg; lognormal variance with pedigree 0.36633, pedigree (1,1,3,1,1)
  (same comment as for Aluminium III)
- Particulate Matter, > 10 um [air, urban air close to ground]: 0.001249 kg; lognormal variance with pedigree 0.36633, pedigree (1,1,3,1,1)
  (same comment as for Aluminium III)
- Particulate Matter, > 2.5 um and < 10um [air, urban air close to ground]: 0.0017486 kg; lognormal variance with pedigree 0.36633, pedigree (1,1,3,1,1)
  (same comment as for Aluminium III)
- Phenol [air, urban air close to ground]: 1.4799e-5 kg; lognormal variance with pedigree 0.0431, pedigree (1,1,3,1,1)
  (same comment as for Acetaldehyde)
- Phosphorus [air, urban air close to ground]: 6.141e-6 kg; lognormal variance with pedigree 0.73213, pedigree (1,1,3,1,1)
  (same comment as for Aluminium III)
- Polychlorinated biphenyls [air, urban air close to ground]: 1.1189e-7 kg; lognormal variance with pedigree 0.0431, pedigree (1,1,3,1,1)
  (same comment as for Acetaldehyde)
- Potassium I [air, urban air close to ground]: 3.0439e-5 kg; lognormal variance with pedigree 0.60899, pedigree (1,1,3,1,1)
  (same comment as for Aluminium III)
- Selenium IV [air, urban air close to ground]: 1.9907e-8 kg; lognormal variance with pedigree 1.7382, pedigree (1,1,3,1,1)
  (same comment as for Aluminium III)
- Silicon [air, urban air close to ground]: 7.2764e-8 kg; lognormal variance with pedigree 0.49452, pedigree (1,1,3,1,1)
  (same comment as for Aluminium III)
- Silver I [air, urban air close to ground]: 3.6644e-9 kg; lognormal variance with pedigree 1.679, pedigree (1,1,3,1,1)
  (same comment as for Aluminium III)
- Sodium I [air, urban air close to ground]: 2.3346e-5 kg; lognormal variance with pedigree 0.51714, pedigree (1,1,3,1,1)
  (same comment as for Aluminium III)
- Styrene [air, urban air close to ground]: 0.0005275 kg; lognormal variance with pedigree 0.0431, pedigree (1,1,3,1,1)
  (same comment as for Acetaldehyde)
- Sulfur dioxide [air, urban air close to ground]: 0.00045095 kg; lognormal variance with pedigree 0.65577, pedigree (1,1,3,1,1)
  (same comment as for Aluminium III)
- Tin ion [air, urban air close to ground]: 1.1016e-10 kg; lognormal variance with pedigree 1.3069, pedigree (1,1,3,1,1)
  (same comment as for Aluminium III)
- Toluene [air, urban air close to ground]: 0.000372 kg; lognormal variance with pedigree 0.0431, pedigree (1,1,3,1,1)
  (same comment as for Acetaldehyde)
- Vanadium V [air, urban air close to ground]: 7.1145e-7 kg; lognormal variance with pedigree 1.2978, pedigree (1,1,3,1,1)
  (same comment as for Aluminium III)
- Water [air, urban air close to ground]: 0.00061483 m3; lognormal variance with pedigree 0.092373, pedigree (1,1,3,1,1)
  water vapour from waste humidity, hydrogen oxidation.
  Uncertainty: Uncertainty calculated from uncertainty in waste composition and the uncertainty of fraction to air.
- Zinc II [air, urban air close to ground]: 7.3099e-6 kg; lognormal variance with pedigree 0.68659, pedigree (1,1,3,1,1)
  (same comment as for Aluminium III)
- Aluminium III [soil, industrial]: 0.012413 kg; lognormal variance with pedigree 0.34366, pedigree (1,1,3,1,1)
  Emissions from open burning to residues left on ground.
  Uncertainty: Uncertainty calculated depending on waste input and uncertainty of transfer coefficents in incineration model.
- Antimony ion [soil, industrial]: 2.2564e-5 kg; lognormal variance with pedigree 1.1621, pedigree (1,1,3,1,1)
  (same comment as for Aluminium III)
- Arsenic ion [soil, industrial]: 6.1988e-7 kg; lognormal variance with pedigree 1.6321, pedigree (1,1,3,1,1)
  (same comment as for Aluminium III)
- Barium II [soil, industrial]: 0.00014755 kg; lognormal variance with pedigree 0.91093, pedigree (1,1,3,1,1)
  (same comment as for Aluminium III)
- Boron [soil, industrial]: 7.1904e-6 kg; lognormal variance with pedigree 1.3134, pedigree (1,1,3,1,1)
  (same comment as for Aluminium III)
- Bromine [soil, industrial]: 9.2061e-6 kg; lognormal variance with pedigree 1.2301, pedigree (1,1,3,1,1)
  (same comment as for Aluminium III)
- Cadmium II [soil, industrial]: 1.1682e-5 kg; lognormal variance with pedigree 1.2486, pedigree (1,1,3,1,1)
  (same comment as for Aluminium III)
- Calcium II [soil, industrial]: 0.013854 kg; lognormal variance with pedigree 0.32908, pedigree (1,1,3,1,1)
  (same comment as for Aluminium III)
- Carbon [soil, industrial]: 0.0056561 kg; lognormal variance with pedigree 0.075162, pedigree (1,1,3,1,1)
  (same comment as for Aluminium III)
- Chloride [soil, industrial]: 0.0028767 kg; lognormal variance with pedigree 0.41705, pedigree (1,1,3,1,1)
  (same comment as for Aluminium III)
- Chromium III [soil, industrial]: 0.00031513 kg; lognormal variance with pedigree 0.8115, pedigree (1,1,3,1,1)
  (same comment as for Aluminium III)
- Cobalt II [soil, industrial]: 1.291e-6 kg; lognormal variance with pedigree 1.5329, pedigree (1,1,3,1,1)
  (same comment as for Aluminium III)
- Copper ion [soil, industrial]: 0.00037346 kg; lognormal variance with pedigree 1.7126, pedigree (1,1,3,1,1)
  (same comment as for Aluminium III)
- Dioxins, measured as 2,3,7,8-tetrachlorodibenzo-p-dioxin [soil, industrial]: 3.696e-11 kg; lognormal variance with pedigree 1.3758, pedigree (1,1,3,1,1)
  (same comment as for Dioxins, measured as 2,3,7,8-tetrachlorodibenzo-p-dioxin)
- Fluoride [soil, industrial]: 5.035e-5 kg; lognormal variance with pedigree 1.0404, pedigree (1,1,3,1,1)
  (same comment as for Aluminium III)
- Iodide [soil, industrial]: 4.028e-9 kg; lognormal variance with pedigree 1.9272, pedigree (1,1,3,1,1)
  (same comment as for Aluminium III)
- Iron ion [soil, industrial]: 0.012883 kg; lognormal variance with pedigree 0.63186, pedigree (1,1,3,1,1)
  (same comment as for Aluminium III)
- Lead II [soil, industrial]: 0.00049988 kg; lognormal variance with pedigree 0.74989, pedigree (1,1,3,1,1)
  (same comment as for Aluminium III)
- Magnesium [soil, industrial]: 0.0033702 kg; lognormal variance with pedigree 0.50314, pedigree (1,1,3,1,1)
  (same comment as for Aluminium III)
- Manganese II [soil, industrial]: 0.00025715 kg; lognormal variance with pedigree 0.83734, pedigree (1,1,3,1,1)
  (same comment as for Aluminium III)
- Mercury II [soil, industrial]: 7.2882e-7 kg; lognormal variance with pedigree 1.5252, pedigree (1,1,3,1,1)
  (same comment as for Aluminium III)
- Molybdenum VI [soil, industrial]: 1.9453e-6 kg; lognormal variance with pedigree 1.4843, pedigree (1,1,3,1,1)
  (same comment as for Aluminium III)
- Nickel II [soil, industrial]: 0.0001073 kg; lognormal variance with pedigree 0.95455, pedigree (1,1,3,1,1)
  (same comment as for Aluminium III)
- Nitrogen [soil, industrial]: 3.1276e-5 kg; lognormal variance with pedigree 0.5633, pedigree (1,1,3,1,1)
  (same comment as for Aluminium III)
- Phosphorus [soil, industrial]: 0.00088765 kg; lognormal variance with pedigree 0.67427, pedigree (1,1,3,1,1)
  (same comment as for Aluminium III)
- Potassium I [soil, industrial]: 0.0020293 kg; lognormal variance with pedigree 0.56609, pedigree (1,1,3,1,1)
  (same comment as for Aluminium III)
- Selenium IV [soil, industrial]: 2.9978e-7 kg; lognormal variance with pedigree 1.7182, pedigree (1,1,3,1,1)
  (same comment as for Aluminium III)
- Silicon [soil, industrial]: 0.04851 kg; lognormal variance with pedigree 0.1927, pedigree (1,1,3,1,1)
  (same comment as for Aluminium III)
- Silver I [soil, industrial]: 7.1034e-7 kg; lognormal variance with pedigree 1.615, pedigree (1,1,3,1,1)
  (same comment as for Aluminium III)
- Sodium I [soil, industrial]: 0.0051205 kg; lognormal variance with pedigree 0.45048, pedigree (1,1,3,1,1)
  (same comment as for Aluminium III)
- Sulfur [soil, industrial]: 0.00096871 kg; lognormal variance with pedigree 0.64502, pedigree (1,1,3,1,1)
  (same comment as for Aluminium III)
- Tin ion [soil, industrial]: 7.344e-5 kg; lognormal variance with pedigree 1.0051, pedigree (1,1,3,1,1)
  (same comment as for Aluminium III)
- Vanadium V [soil, industrial]: 8.5032e-6 kg; lognormal variance with pedigree 1.2807, pedigree (1,1,3,1,1)
  (same comment as for Aluminium III)
- Zinc II [soil, industrial]: 0.0013039 kg; lognormal variance with pedigree 0.62436, pedigree (1,1,3,1,1)
  (same comment as for Aluminium III)
