# treatment of waste paperboard, unsanitary landfill, hyperarid infiltration class (-250mm)

Dataset: EcoSpold 2, unit process
Geography: GLO
Time period: 2006-01-01 to 2023-12-31
Technology level: current
Classification: ISIC rev.4 ecoinvent: 3821:Treatment and disposal of non-hazardous waste
Scenario: Business-as-Usual
System model: Allocation, cut-off by classification
Share of production covered: 1 %
Generated by: Nikolia Stoikou
Database: ecoinvent
isCopyrightProtected: true
accessRestrictedTo: 1

## General comment
This dataset represents the activity of waste disposal of 'waste paperboard' in an unsanitary landfill. Recommended use of this dataset: for waste material going to unsanitary landfill in a hyperarid water infiltration class location, as part of unsorted, unmanaged, unscavenged municipal waste mixture. Inventoried waste consists of fraction: 100% cardboard. Waste composition (wet, in ppmw): gross heating value 15.61 MJ/kg; net heating value 14.21 MJ/kg; H2O 166670; O na; H 98787; C 640480; S 1636.9; N 6258.4; P 425.31; B na; Cl 1999.5; Br 16.085; F 37.789; I na; Ag 1.0092; As 3.0708; Ba 232.91; Cd 0.34562; Co 7.8638; Cr 8.6236; Cu 68.797; Hg 39.61; Mn 56.696; Mo 1.4747; Ni 3.6203; Pb 16.792; Sb 0.37339; Se 54.889; Sn 1.3466; V 3.1424; Zn 58.914; Be 3.9562; Sc 0.92389; Sr 131.11; Ti 26.807; Tl 0.49387; W 1.0665; Si 2204.6; Fe 978.5; Ca 66160; Al 6756.6; K 1750.7; Mg 2016.5; Na 3106.1. Share of carbon in initial waste that is biogenic 100%. Share of metals in waste not oxidised and bulk-recyclable (exclude very small or thin parts) Iron: 0%; Alu: 0%; Copper: 0%. Overall degradability of waste during 100 years: 32.44%. 0.00254 kg waste mass remains in the landfill even after the long term period.

## Included activities start
The activity starts with the waste being available at the gate of the treatment facility. Collection and transportation of the waste to the treatment plant is not included.

## Included activities end
The activity ends with the waste being treated and waste-specific emissions from unsanitary landfill are released to air via landfill gas, air and soil via windblown evaporites, and to groundwater.

## Geography
This dataset represents a landfill of 'infiltration class 1 hyperarid'. Landfill site with mean annual temperature (MAT) of 8 degC, mean annual precipitation (MAP) of 350 mm/year, and net infiltration of -250 mm/year. Negative infiltration means that leachate flow in landfill is reversed and flows upward to the surface, where waste is evaporated and dissolved solids become solid evaporites. Temperature at site can result in permafrost conditions, which slows down water flow by a factor of (alpha t) 0.999. Total climate adjustments with alpha pt of 0.999. The leachate percolating through the landfill has an average residence time of 15 years.
Reference for climatic parameters: Doka, G., 2018, Inventory parameters for regionalised waste disposal mixes

## Technology
This is an inventory for an unsanitary, sub-controlled landfill for municipal solid waste. Ultimate average landfill height is 15 meters. Operation phase duration is 25 years. The total, waste-specific raw landfill gas mass produced in the landfill is 0.233 kg. The total CH4 mass in the raw landfill gas is 0.2015 kg. Percentage of landfill gas directly emitted is 100w%. Leachate of the landfill is not treated, but emitted untreated. Leachate flow is upward to the surface due to net negative infiltration. No leachate treatment can be performed. Based on average waste composition and chosen climate data the end of carbonate phase is estimated to be reached 6'681 years after waste deposition. Arid conditions at this location prompt formation of evaporites from landfill contents which are partially eroded by wind. It is assumed that 10% of these evaporites are eroded by wind and airborne. Initial decay in the first 100 years of this waste results in a wind erosion rate corresponding to 557.8 g/m2.year and long-term decay corresponds to wind erosion of 14.63 g/m2.year.

## Reference product
- waste paperboard: -1 kg; By-product classification Waste; CPC 39240: Waste and scrap of paper or paperboard; HS2017 470790: Paper or paperboard; waste and scrap, of paper or paperboard n.e.c. in heading no. 4707 and of unsorted was[...]
  main reference product of this activity
  production volume 2.14e9 kg
    Estimated based on the total amount of this waste being treated in the database. The value is then adjusted to reflect the current treatment in the given geography
  property price 0 EUR2005
    Waste products are assigned a price of zero as they are assumed to require further treatment.
  properties: aluminium content 0.00810789, antimony content 4.48068e-7, arsenic content 3.68496e-6, barium content 0.000279494, beryllium content 4.74739e-6, bromine content 1.93019e-5, cadmium content 4.14741e-7, calcium content 0.0793914, carbon allocation 0.640476 kg, carbon content 0.768571, carbon content, fossil 0, carbon content, non-fossil 0.768571, chlorine content 0.00239941, chromium content 1.03483e-5, cobalt content 9.43654e-6, copper content 8.25559e-5, dry mass 0.833333 kg, fluorine content 4.53473e-5, heating value, gross 15.6086 MJ, heating value, net 14.2064 MJ, hydrogen content 0.118545, iron content 0.0011742, lead content 2.01507e-5, magnesium content 0.00241986, manganese content 6.80349e-5, mercury content 4.75321e-5, molybdenum content 1.76966e-6, nickel content 4.34433e-6, nitrogen content 0.00751004, phosphorus content 0.000510375, potassium content 0.00210086, scandium content 1.10866e-6, selenium content 6.58672e-5, silicon content 0.00264546, silver content 1.21105e-6, sodium content 0.00372738, strontium content 0.000157332, sulfur content 0.0019643, thallium content 5.9265e-7, tin content 1.61597e-6, titanium content 3.21686e-5, tungsten content 1.27983e-6, vanadium content 3.77089e-6, water content 0.2, water in wet mass 0.166667 kg, wet mass 1 kg, zinc content 7.06966e-5

## Inputs from technosphere
- diesel, burned in building machine: 0.046738 MJ; lognormal variance with pedigree 0.32902, pedigree (1,1,4,1,1)
  waste distribution and compaction in unsanitary landfill;
  properties: heating value, net 1 MJ
- excavation, skid-steer loader: 0.00031708 m3; lognormal variance with pedigree 0.32902, pedigree (1,1,4,1,1)
  daily cover of waste in unsanitary landfill;

## Inputs from nature
- Organic carbon, placed in landfill [inventory indicator, waste]: 0.64048 kg; lognormal variance with pedigree 0.0140122, pedigree (1,1,4,1,1)
  organic carbon placed in unsanitary landfill (for ecoscarcity LCIA only);
- Waste mass, total, placed in landfill [inventory indicator, waste]: 1 kg; lognormal variance with pedigree 0.008, pedigree (1,1,4,1,1)
  waste mass placed in unsanitary landfill (for ecoscarcity LCIA only);
- Occupation, dump site [natural resource, land]: 0.0023333 m2*year; lognormal variance with pedigree 0.32902, pedigree (1,1,4,1,1)
  for operation phase of unsanitary landfill area;
- Transformation, from pasture, man made [natural resource, land]: 6.6667e-5 m2; lognormal variance with pedigree 0.32902, pedigree (1,1,4,1,1)
  for initial conversion of unsanitary landfill area;
- Transformation, to dump site [natural resource, land]: 6.6667e-5 m2; lognormal variance with pedigree 0.32902, pedigree (1,1,4,1,1)
  conversion to unsanitary landfill area;

## Emissions to nature
- Aluminium III [air, low population density, long-term]: 0.00066471 kg; lognormal variance with pedigree 0.4229, pedigree (1,1,4,1,1)
  windblown leachate evaporites from unsanitary landfill in arid climate;
- Aluminium III [air, non-urban air or from high stacks]: 1.097e-5 kg; lognormal variance with pedigree 0.72669, pedigree (1,1,4,1,1)
  Contributions: landfill gas emission from unsanitary landfill (after 0% capture and utilization) and from windblown leachate evaporites in arid climate;
- Antimony ion [air, low population density, long-term]: 5.0205e-9 kg; lognormal variance with pedigree 1.9298, pedigree (1,1,4,1,1)
  windblown leachate evaporites from unsanitary landfill in arid climate;
- Antimony ion [air, non-urban air or from high stacks]: 1.279e-9 kg; lognormal variance with pedigree 1.9227, pedigree (1,1,4,1,1)
  (same comment as for Aluminium III)
- Arsenic ion [air, low population density, long-term]: 7.501e-8 kg; lognormal variance with pedigree 1.9098, pedigree (1,1,4,1,1)
  windblown leachate evaporites from unsanitary landfill in arid climate;
- Arsenic ion [air, non-urban air or from high stacks]: 2.0376e-8 kg; lognormal variance with pedigree 1.39, pedigree (1,1,4,1,1)
  (same comment as for Aluminium III)
- Barium II [air, low population density, long-term]: 1.4646e-5 kg; lognormal variance with pedigree 0.86346, pedigree (1,1,4,1,1)
  windblown leachate evaporites from unsanitary landfill in arid climate;
- Barium II [air, non-urban air or from high stacks]: 8.6645e-6 kg; lognormal variance with pedigree 0.87996, pedigree (1,1,4,1,1)
  (same comment as for Aluminium III)
- Beryllium II [air, low population density, long-term]: 3.8816e-7 kg; lognormal variance with pedigree 1.3981, pedigree (1,1,4,1,1)
  windblown leachate evaporites from unsanitary landfill in arid climate;
- Beryllium II [air, non-urban air or from high stacks]: 7.4707e-9 kg; lognormal variance with pedigree 1.6821, pedigree (1,1,4,1,1)
  (same comment as for Aluminium III)
- Bromine [air, low population density, long-term]: 2.777e-7 kg; lognormal variance with pedigree 1.2382, pedigree (1,1,4,1,1)
  windblown leachate evaporites from unsanitary landfill in arid climate;
- Bromine [air, non-urban air or from high stacks]: 1.4964e-6 kg; lognormal variance with pedigree 1.0361, pedigree (1,1,4,1,1)
  (same comment as for Aluminium III)
- Cadmium II [air, low population density, long-term]: 3.2578e-8 kg; lognormal variance with pedigree 1.7145, pedigree (1,1,4,1,1)
  windblown leachate evaporites from unsanitary landfill in arid climate;
- Cadmium II [air, non-urban air or from high stacks]: 2.1018e-9 kg; lognormal variance with pedigree 1.7559, pedigree (1,1,4,1,1)
  (same comment as for Aluminium III)
- Calcium II [air, low population density, long-term]: 0.0063368 kg; lognormal variance with pedigree 0.16795, pedigree (1,1,4,1,1)
  windblown leachate evaporites from unsanitary landfill in arid climate;
- Calcium II [air, non-urban air or from high stacks]: 0.00027981 kg; lognormal variance with pedigree 0.36862, pedigree (1,1,4,1,1)
  (same comment as for Aluminium III)
- Carbon dioxide, non-fossil [air, non-urban air or from high stacks]: 0.3254 kg; lognormal variance with pedigree 0.053337, pedigree (1,1,4,1,1)
  landfill gas emission from unsanitary landfill (after 0% capture and utilization);
- Chromium III [air, low population density, long-term]: 5.5148e-9 kg; lognormal variance with pedigree 1.9298, pedigree (1,1,4,1,1)
  windblown leachate evaporites from unsanitary landfill in arid climate;
- Chromium III [air, non-urban air or from high stacks]: 3.1928e-9 kg; lognormal variance with pedigree 1.7746, pedigree (1,1,4,1,1)
  (same comment as for Aluminium III)
- Cobalt II [air, low population density, long-term]: 7.0446e-7 kg; lognormal variance with pedigree 1.3084, pedigree (1,1,4,1,1)
  windblown leachate evaporites from unsanitary landfill in arid climate;
- Cobalt II [air, non-urban air or from high stacks]: 8.2099e-8 kg; lognormal variance with pedigree 1.4181, pedigree (1,1,4,1,1)
  (same comment as for Aluminium III)
- Copper ion [air, low population density, long-term]: 6.8687e-6 kg; lognormal variance with pedigree 1.0198, pedigree (1,1,4,1,1)
  windblown leachate evaporites from unsanitary landfill in arid climate;
- Copper ion [air, non-urban air or from high stacks]: 1.0946e-8 kg; lognormal variance with pedigree 1.6054, pedigree (1,1,4,1,1)
  (same comment as for Aluminium III)
- Hydrochloric acid [air, low population density, long-term]: 3.4521e-5 kg; lognormal variance with pedigree 0.60113, pedigree (1,1,4,1,1)
  windblown leachate evaporites from unsanitary landfill in arid climate;
- Hydrochloric acid [air, non-urban air or from high stacks]: 0.00018666 kg; lognormal variance with pedigree 0.47232, pedigree (1,1,4,1,1)
  (same comment as for Aluminium III)
- Hydrogen fluoride [air, low population density, long-term]: 3.2253e-6 kg; lognormal variance with pedigree 1.1013, pedigree (1,1,4,1,1)
  windblown leachate evaporites from unsanitary landfill in arid climate;
- Hydrogen fluoride [air, non-urban air or from high stacks]: 4.9705e-6 kg; lognormal variance with pedigree 1.1751, pedigree (1,1,4,1,1)
  (same comment as for Aluminium III)
- Iron ion [air, low population density, long-term]: 9.7414e-5 kg; lognormal variance with pedigree 0.66845, pedigree (1,1,4,1,1)
  windblown leachate evaporites from unsanitary landfill in arid climate;
- Iron ion [air, non-urban air or from high stacks]: 4.3655e-7 kg; lognormal variance with pedigree 1.1257, pedigree (1,1,4,1,1)
  (same comment as for Aluminium III)
- Lead II [air, low population density, long-term]: 1.676e-6 kg; lognormal variance with pedigree 1.2073, pedigree (1,1,4,1,1)
  windblown leachate evaporites from unsanitary landfill in arid climate;
- Lead II [air, non-urban air or from high stacks]: 3.2164e-9 kg; lognormal variance with pedigree 1.7677, pedigree (1,1,4,1,1)
  (same comment as for Aluminium III)
- Magnesium [air, low population density, long-term]: 0.00016133 kg; lognormal variance with pedigree 0.57707, pedigree (1,1,4,1,1)
  windblown leachate evaporites from unsanitary landfill in arid climate;
- Magnesium [air, non-urban air or from high stacks]: 4.0419e-5 kg; lognormal variance with pedigree 0.63578, pedigree (1,1,4,1,1)
  (same comment as for Aluminium III)
- Manganese II [air, low population density, long-term]: 3.5652e-6 kg; lognormal variance with pedigree 1.0514, pedigree (1,1,4,1,1)
  windblown leachate evaporites from unsanitary landfill in arid climate;
- Manganese II [air, non-urban air or from high stacks]: 2.1091e-6 kg; lognormal variance with pedigree 1.0673, pedigree (1,1,4,1,1)
  (same comment as for Aluminium III)
- Mercury II [air, low population density, long-term]: 3.8379e-6 kg; lognormal variance with pedigree 1.0934, pedigree (1,1,4,1,1)
  windblown leachate evaporites from unsanitary landfill in arid climate;
- Mercury II [air, non-urban air or from high stacks]: 4.3956e-7 kg; lognormal variance with pedigree 1.1951, pedigree (1,1,4,1,1)
  (same comment as for Aluminium III)
- Methane, non-fossil [air, non-urban air or from high stacks]: 0.1503 kg; lognormal variance with pedigree 0.093867, pedigree (1,1,4,1,1)
  landfill gas emission from unsanitary landfill (after 0% capture and utilization);
- Molybdenum VI [air, low population density, long-term]: 7.2626e-8 kg; lognormal variance with pedigree 1.6477, pedigree (1,1,4,1,1)
  windblown leachate evaporites from unsanitary landfill in arid climate;
- Molybdenum VI [air, non-urban air or from high stacks]: 5.0513e-9 kg; lognormal variance with pedigree 1.7455, pedigree (1,1,4,1,1)
  (same comment as for Aluminium III)
- Nickel II [air, low population density, long-term]: 3.5521e-7 kg; lognormal variance with pedigree 1.4097, pedigree (1,1,4,1,1)
  windblown leachate evaporites from unsanitary landfill in arid climate;
- Nickel II [air, non-urban air or from high stacks]: 6.8364e-9 kg; lognormal variance with pedigree 1.6937, pedigree (1,1,4,1,1)
  (same comment as for Aluminium III)
- Nitrate [air, low population density, long-term]: 0.0005287 kg; lognormal variance with pedigree 0.47696, pedigree (1,1,4,1,1)
  windblown leachate evaporites from unsanitary landfill in arid climate;
- Nitrate [air, non-urban air or from high stacks]: 0.0020985 kg; lognormal variance with pedigree 0.43465, pedigree (1,1,4,1,1)
  landfill gas emission from unsanitary landfill (after 0% capture and utilization) and from windblown leachate evaporites in arid climate;
- Nitrogen oxides [air, non-urban air or from high stacks]: 2.7811e-6 kg; lognormal variance with pedigree 0.65822, pedigree (1,1,4,1,1)
  landfill gas emission from unsanitary landfill (after 0% capture and utilization);
- Particulate Matter, < 2.5 um [air, low population density, long-term]: 0.011684 kg; lognormal variance with pedigree 0.4972, pedigree (1,1,4,1,1)
  windblown leachate evaporites from unsanitary landfill in arid climate;
- Particulate Matter, < 2.5 um [air, non-urban air or from high stacks]: 0.00074372 kg; lognormal variance with pedigree 0.65924, pedigree (1,1,4,1,1)
  (same comment as for Nitrate)
- Particulate Matter, > 10 um [air, low population density, long-term]: 0.029211 kg; lognormal variance with pedigree 0.23656, pedigree (1,1,4,1,1)
  windblown leachate evaporites from unsanitary landfill in arid climate;
- Particulate Matter, > 10 um [air, non-urban air or from high stacks]: 0.0018593 kg; lognormal variance with pedigree 0.39861, pedigree (1,1,4,1,1)
  (same comment as for Nitrate)
- Particulate Matter, > 2.5 um and < 10um [air, low population density, long-term]: 0.017526 kg; lognormal variance with pedigree 0.31558, pedigree (1,1,4,1,1)
  windblown leachate evaporites from unsanitary landfill in arid climate;
- Particulate Matter, > 2.5 um and < 10um [air, non-urban air or from high stacks]: 0.0011156 kg; lognormal variance with pedigree 0.47762, pedigree (1,1,4,1,1)
  (same comment as for Nitrate)
- Phosphorus [air, low population density, long-term]: 2.8081e-6 kg; lognormal variance with pedigree 1.9298, pedigree (1,1,4,1,1)
  windblown leachate evaporites from unsanitary landfill in arid climate;
- Phosphorus [air, non-urban air or from high stacks]: 7.7054e-7 kg; lognormal variance with pedigree 1.0732, pedigree (1,1,4,1,1)
  (same comment as for Nitrate)
- Potassium I [air, low population density, long-term]: 0.00013359 kg; lognormal variance with pedigree 0.59594, pedigree (1,1,4,1,1)
  windblown leachate evaporites from unsanitary landfill in arid climate;
- Potassium I [air, non-urban air or from high stacks]: 4.1576e-5 kg; lognormal variance with pedigree 0.64233, pedigree (1,1,4,1,1)
  (same comment as for Aluminium III)
- Scandium [air, low population density, long-term]: 8.9691e-8 kg; lognormal variance with pedigree 1.5878, pedigree (1,1,4,1,1)
  windblown leachate evaporites from unsanitary landfill in arid climate;
- Scandium [air, non-urban air or from high stacks]: 2.7038e-9 kg; lognormal variance with pedigree 1.823, pedigree (1,1,4,1,1)
  (same comment as for Aluminium III)
- Selenium IV [air, low population density, long-term]: 1.9873e-6 kg; lognormal variance with pedigree 1.3012, pedigree (1,1,4,1,1)
  windblown leachate evaporites from unsanitary landfill in arid climate;
- Selenium IV [air, non-urban air or from high stacks]: 1.8801e-7 kg; lognormal variance with pedigree 1.2693, pedigree (1,1,4,1,1)
  (same comment as for Aluminium III)
- Silicon [air, low population density, long-term]: 6.5334e-6 kg; lognormal variance with pedigree 1.9298, pedigree (1,1,4,1,1)
  windblown leachate evaporites from unsanitary landfill in arid climate;
- Silicon [air, non-urban air or from high stacks]: 3.5794e-6 kg; lognormal variance with pedigree 0.86666, pedigree (1,1,4,1,1)
  (same comment as for Aluminium III)
- Silver I [air, low population density, long-term]: 1.0076e-7 kg; lognormal variance with pedigree 1.5762, pedigree (1,1,4,1,1)
  windblown leachate evaporites from unsanitary landfill in arid climate;
- Silver I [air, non-urban air or from high stacks]: 1.6058e-10 kg; lognormal variance with pedigree 1.9298, pedigree (1,1,4,1,1)
  (same comment as for Aluminium III)
- Sodium I [air, low population density, long-term]: 3.1061e-13 kg; lognormal variance with pedigree 1.9298, pedigree (1,1,4,1,1)
  windblown leachate evaporites from unsanitary landfill in arid climate;
- Sodium I [air, non-urban air or from high stacks]: 0.00031131 kg; lognormal variance with pedigree 0.51673, pedigree (1,1,4,1,1)
  (same comment as for Aluminium III)
- Strontium II [air, low population density, long-term]: 1.2864e-5 kg; lognormal variance with pedigree 0.93402, pedigree (1,1,4,1,1)
  windblown leachate evaporites from unsanitary landfill in arid climate;
- Strontium II [air, non-urban air or from high stacks]: 2.4758e-7 kg; lognormal variance with pedigree 1.219, pedigree (1,1,4,1,1)
  (same comment as for Aluminium III)
- Sulfate [air, low population density, long-term]: 0.00042144 kg; lognormal variance with pedigree 0.60324, pedigree (1,1,4,1,1)
  windblown leachate evaporites from unsanitary landfill in arid climate;
- Sulfate [air, non-urban air or from high stacks]: 5.9252e-5 kg; lognormal variance with pedigree 0.7057, pedigree (1,1,4,1,1)
  (same comment as for Nitrate)
- Sulfur dioxide [air, non-urban air or from high stacks]: 6.9213e-5 kg; lognormal variance with pedigree 0.87959, pedigree (1,1,4,1,1)
  landfill gas emission from unsanitary landfill (after 0% capture and utilization);
- Thallium I [air, low population density, long-term]: 4.8457e-8 kg; lognormal variance with pedigree 1.6685, pedigree (1,1,4,1,1)
  windblown leachate evaporites from unsanitary landfill in arid climate;
- Thallium I [air, non-urban air or from high stacks]: 9.3262e-10 kg; lognormal variance with pedigree 1.9298, pedigree (1,1,4,1,1)
  (same comment as for Aluminium III)
- Tin ion [air, low population density, long-term]: 1.3441e-7 kg; lognormal variance with pedigree 1.5388, pedigree (1,1,4,1,1)
  windblown leachate evaporites from unsanitary landfill in arid climate;
- Tin ion [air, non-urban air or from high stacks]: 2.5775e-10 kg; lognormal variance with pedigree 1.9298, pedigree (1,1,4,1,1)
  (same comment as for Aluminium III)
- Titanium ion [air, low population density, long-term]: 2.6373e-6 kg; lognormal variance with pedigree 1.1452, pedigree (1,1,4,1,1)
  windblown leachate evaporites from unsanitary landfill in arid climate;
- Titanium ion [air, non-urban air or from high stacks]: 4.3526e-8 kg; lognormal variance with pedigree 1.4469, pedigree (1,1,4,1,1)
  (same comment as for Aluminium III)
- Tungsten [air, low population density, long-term]: 4.7931e-8 kg; lognormal variance with pedigree 1.7237, pedigree (1,1,4,1,1)
  windblown leachate evaporites from unsanitary landfill in arid climate;
- Tungsten [air, non-urban air or from high stacks]: 3.6531e-9 kg; lognormal variance with pedigree 1.7876, pedigree (1,1,4,1,1)
  (same comment as for Aluminium III)
- Vanadium V [air, low population density, long-term]: 1.1725e-7 kg; lognormal variance with pedigree 1.6647, pedigree (1,1,4,1,1)
  windblown leachate evaporites from unsanitary landfill in arid climate;
- Vanadium V [air, non-urban air or from high stacks]: 1.0764e-8 kg; lognormal variance with pedigree 1.647, pedigree (1,1,4,1,1)
  (same comment as for Aluminium III)
- Water [air, non-urban air or from high stacks]: 5.4e-5 m3; lognormal variance with pedigree 0.12098, pedigree (1,1,4,1,1)
  from water contained in landfilled waste, released to air in arid sites;
- Zinc II [air, low population density, long-term]: 5.8009e-6 kg; lognormal variance with pedigree 1.0405, pedigree (1,1,4,1,1)
  windblown leachate evaporites from unsanitary landfill in arid climate;
- Zinc II [air, non-urban air or from high stacks]: 9.0627e-8 kg; lognormal variance with pedigree 1.3492, pedigree (1,1,4,1,1)
  (same comment as for Aluminium III)
- Non-hazardous waste disposed [inventory indicator, waste]: 1 kg; lognormal variance with pedigree 0.008, pedigree (1,1,4,1,1)
  EN15804 waste mass in unsanitary landfill;
- Aluminium III [soil, industrial]: 0.0060809 kg; lognormal variance with pedigree 0.41039, pedigree (1,1,4,1,1)
  Contributions: from leachate evaporites in hyperarid climate in unsanitary landfill;
- Antimony ion [soil, industrial]: 5.6667e-8 kg; lognormal variance with pedigree 1.9298, pedigree (1,1,4,1,1)
  Contributions: from leachate evaporites in hyperarid climate in unsanitary landfill;
- Arsenic ion [soil, industrial]: 8.3592e-7 kg; lognormal variance with pedigree 1.6258, pedigree (1,1,4,1,1)
  Contributions: from leachate evaporites in hyperarid climate in unsanitary landfill;
- Barium II [soil, industrial]: 0.0002096 kg; lognormal variance with pedigree 0.55408, pedigree (1,1,4,1,1)
  Contributions: from leachate evaporites in hyperarid climate in unsanitary landfill;
- Beryllium II [soil, industrial]: 3.5605e-6 kg; lognormal variance with pedigree 1.3658, pedigree (1,1,4,1,1)
  Contributions: from leachate evaporites in hyperarid climate in unsanitary landfill;
- Bromine [soil, industrial]: 1.4311e-5 kg; lognormal variance with pedigree 0.9876, pedigree (1,1,4,1,1)
  Contributions: from leachate evaporites in hyperarid climate in unsanitary landfill;
- Cadmium II [soil, industrial]: 3.1094e-7 kg; lognormal variance with pedigree 1.6155, pedigree (1,1,4,1,1)
  Contributions: from leachate evaporites in hyperarid climate in unsanitary landfill;
- Calcium II [soil, industrial]: 0.059543 kg; lognormal variance with pedigree 0.15525, pedigree (1,1,4,1,1)
  Contributions: from leachate evaporites in hyperarid climate in unsanitary landfill;
- Carbon [soil, industrial]: 0.3951 kg; lognormal variance with pedigree 0.019046, pedigree (1,1,4,1,1)
  Contributions: from leachate evaporites in hyperarid climate in unsanitary landfill;
- Chloride [soil, industrial]: 0.001779 kg; lognormal variance with pedigree 0.44327, pedigree (1,1,4,1,1)
  Contributions: from leachate evaporites in hyperarid climate in unsanitary landfill;
- Chromium III [soil, industrial]: 7.8297e-8 kg; lognormal variance with pedigree 1.9298, pedigree (1,1,4,1,1)
  Contributions: from leachate evaporites in hyperarid climate in unsanitary landfill;
- Cobalt II [soil, industrial]: 7.0772e-6 kg; lognormal variance with pedigree 1.1569, pedigree (1,1,4,1,1)
  Contributions: from leachate evaporites in hyperarid climate in unsanitary landfill;
- Copper ion [soil, industrial]: 6.1917e-5 kg; lognormal variance with pedigree 1.0171, pedigree (1,1,4,1,1)
  Contributions: from leachate evaporites in hyperarid climate in unsanitary landfill;
- Fluoride [soil, industrial]: 2.9838e-5 kg; lognormal variance with pedigree 1.061, pedigree (1,1,4,1,1)
  Contributions: from leachate evaporites in hyperarid climate in unsanitary landfill;
- Heat, waste [soil, industrial]: 1.6935 MJ; lognormal variance with pedigree 0.28596, pedigree (1,1,4,1,1)
  from decomposed waste material in unsanitary landfill;
- Iron ion [soil, industrial]: 0.00088065 kg; lognormal variance with pedigree 0.66306, pedigree (1,1,4,1,1)
  Contributions: from leachate evaporites in hyperarid climate in unsanitary landfill;
- Lead II [soil, industrial]: 1.5113e-5 kg; lognormal variance with pedigree 1.2037, pedigree (1,1,4,1,1)
  Contributions: from leachate evaporites in hyperarid climate in unsanitary landfill;
- Magnesium [soil, industrial]: 0.0018148 kg; lognormal variance with pedigree 0.42772, pedigree (1,1,4,1,1)
  Contributions: from leachate evaporites in hyperarid climate in unsanitary landfill;
- Manganese II [soil, industrial]: 5.1021e-5 kg; lognormal variance with pedigree 0.69447, pedigree (1,1,4,1,1)
  Contributions: from leachate evaporites in hyperarid climate in unsanitary landfill;
- Mercury II [soil, industrial]: 3.5333e-5 kg; lognormal variance with pedigree 1.0601, pedigree (1,1,4,1,1)
  Contributions: from leachate evaporites in hyperarid climate in unsanitary landfill;
- Molybdenum VI [soil, industrial]: 6.9898e-7 kg; lognormal variance with pedigree 1.5404, pedigree (1,1,4,1,1)
  Contributions: from leachate evaporites in hyperarid climate in unsanitary landfill;
- Nickel II [soil, industrial]: 3.2582e-6 kg; lognormal variance with pedigree 1.3773, pedigree (1,1,4,1,1)
  Contributions: from leachate evaporites in hyperarid climate in unsanitary landfill;
- Nitrogen [soil, industrial]: 0.0053391 kg; lognormal variance with pedigree 0.3167, pedigree (1,1,4,1,1)
  Contributions: from leachate evaporites in hyperarid climate in unsanitary landfill;
- Phosphorus [soil, industrial]: 3.2207e-5 kg; lognormal variance with pedigree 1.9298, pedigree (1,1,4,1,1)
  Contributions: from leachate evaporites in hyperarid climate in unsanitary landfill;
- Potassium I [soil, industrial]: 0.0015755 kg; lognormal variance with pedigree 0.42177, pedigree (1,1,4,1,1)
  Contributions: from leachate evaporites in hyperarid climate in unsanitary landfill;
- Scandium [soil, industrial]: 8.3149e-7 kg; lognormal variance with pedigree 1.5363, pedigree (1,1,4,1,1)
  Contributions: from leachate evaporites in hyperarid climate in unsanitary landfill;
- Selenium IV [soil, industrial]: 1.9574e-5 kg; lognormal variance with pedigree 1.1809, pedigree (1,1,4,1,1)
  Contributions: from leachate evaporites in hyperarid climate in unsanitary landfill;
- Silicon [soil, industrial]: 9.0935e-5 kg; lognormal variance with pedigree 1.9298, pedigree (1,1,4,1,1)
  Contributions: from leachate evaporites in hyperarid climate in unsanitary landfill;
- Silver I [soil, industrial]: 9.0829e-7 kg; lognormal variance with pedigree 1.5729, pedigree (1,1,4,1,1)
  Contributions: from leachate evaporites in hyperarid climate in unsanitary landfill;
- Sodium I [soil, industrial]: 0.0027948 kg; lognormal variance with pedigree 0.51973, pedigree (1,1,4,1,1)
  Contributions: from leachate evaporites in hyperarid climate in unsanitary landfill;
- Strontium II [soil, industrial]: 0.000118 kg; lognormal variance with pedigree 0.90818, pedigree (1,1,4,1,1)
  Contributions: from leachate evaporites in hyperarid climate in unsanitary landfill;
- Sulfur [soil, industrial]: 0.0014421 kg; lognormal variance with pedigree 0.49905, pedigree (1,1,4,1,1)
  Contributions: from leachate evaporites in hyperarid climate in unsanitary landfill;
- Thallium I [soil, industrial]: 4.4449e-7 kg; lognormal variance with pedigree 1.6336, pedigree (1,1,4,1,1)
  Contributions: from leachate evaporites in hyperarid climate in unsanitary landfill;
- Tin ion [soil, industrial]: 1.212e-6 kg; lognormal variance with pedigree 1.5348, pedigree (1,1,4,1,1)
  Contributions: from leachate evaporites in hyperarid climate in unsanitary landfill;
- Titanium ion [soil, industrial]: 2.4126e-5 kg; lognormal variance with pedigree 1.1199, pedigree (1,1,4,1,1)
  Contributions: from leachate evaporites in hyperarid climate in unsanitary landfill;
- Tungsten [soil, industrial]: 4.6417e-7 kg; lognormal variance with pedigree 1.6065, pedigree (1,1,4,1,1)
  Contributions: from leachate evaporites in hyperarid climate in unsanitary landfill;
- Vanadium V [soil, industrial]: 1.1519e-6 kg; lognormal variance with pedigree 1.5324, pedigree (1,1,4,1,1)
  Contributions: from leachate evaporites in hyperarid climate in unsanitary landfill;
- Zinc II [soil, industrial]: 5.3022e-5 kg; lognormal variance with pedigree 1.0177, pedigree (1,1,4,1,1)
  Contributions: from leachate evaporites in hyperarid climate in unsanitary landfill;
- Heat, waste [water, ground-, long-term]: 10.551 MJ; lognormal variance with pedigree 0.099647, pedigree (1,1,4,1,1)
  from decomposed waste material in unsanitary landfill;
