# transmission network construction, electricity, medium voltage

Dataset: EcoSpold 2, unit process
Geography: RoW
Time period: 1988-01-01 to 2023-12-31
Technology level: current
Classification: EcoSpold01Categories: electricity/distribution
Classification: ISIC rev.4 ecoinvent: 4220:Construction of utility projects
Scenario: Business-as-Usual
System model: Allocation, cut-off by classification
Share of production covered: 100 %
Generated by: Johannes Müller
Published in: René Itten 2014
Database: ecoinvent
isCopyrightProtected: true
accessRestrictedTo: 1

## General comment
This is a copy of the swiss dataset.
This dataset describes the infrastructure (poles, cables etc.) of the electricity transmission network. It includes the high-to-medium voltage switching stations (above 2.5MVA).
Medium voltage level is considered to range between 1 kV and 24 kV Typically, medium to small scale industry, the service sector and public buildings are supplied from this voltage level (Itten et al. 2014). Smaller power plants feed their electricity production into this voltage level.
Reference(s): René Itten, Rolf Frischknecht, Matthias Stucki, 2014, Life Cycle Inventories of Electricity Mixes and Grid

## Included activities start
The activity includes the land and material requirements of an average km of medium voltage transmission grid infrastructrure in Switzerland.

## Included activities end
The activity ends with the disposal of the waste materials.It is assumed that 80 % of the cables are recycled.

## Geography
Data collected for Switzerland

## Technology
Average of medium voltage underground cables (29'629km) and aerial lines (13'042km) in Switzerland in 2010 (Itten et al. 2010). Switching stations use SF6.
The lifetime of the network is assumed to be 30 years (lifetime of most individual components assumed 40 years).

## Time period
This dataset is based on a study by Itten et. al (2014), which is based on a number of literature sources representing the years 2010 and 2011. Due to the long lifetime, as well as project planning and construction times of ectricity transmission and distribution infrastructure, the 2010 situation is considered valid at least until 2020.

## Reference product
- transmission network, electricity, medium voltage: 1 km; name trans_net_RP; By-product classification allocatable product; CPC 53252: Local cables and related works
  production volume 0 km; name trans_net_RP_PV; = 42671/40
    Calcualted as total length of medium votlage grid of 42'671km as reported by Itten et al. (2014), divided by the lifetime of 40 years.
    Reference(s): René Itten, Rolf Frischknecht, Matthias Stucki, 2014, Life Cycle Inventories of Electricity Mixes and Grid
  property lifetime 30 year; name trans_net_RP_lifetime
    according to: 2014, Itten R., Frischknecht R., Stucki M., Life Cycle Inventories of Electricity Mixes and Grid. Version 1.3, Uster, Switzerland, treeze, 3
  property price 929713 EUR2005
    The production volume of this product is small compared to other products supplied by the activities within the same ISIC 3 category. Calculated from Aluminium consumption. According to activity '_80 Infrastructure, excluding buildings, EU27' in the EU & DK IO database (Simapro, (0.0000404 (Al, after first processing) + 0.000615 (Al basic, virgin)) kg Al per EURO.. Ecoinvent: 614 kg Al per km (dataset 'transmission network construction, electricity, medium voltage').
  properties: carbon allocation 0 kg, carbon content 0

## Inputs from technosphere
- aluminium, wrought alloy: 2200 kg; name aluminium; lognormal variance with pedigree 0.0601, pedigree (3,2,5,1,3)
  Literature data: Bumy et al. 2010, Jones and McManus 2010,
  properties: dry mass 1 kg, wet mass 1 kg
- building, hall, steel construction: 0.193 m2; lognormal variance with pedigree 0.138, pedigree (5,5,5,1,1)
  Estimate by Itten et al. 2014.
  This exchange has an activity link directly to the producing activity because the product is primarily consumed in the same geographical area where it is produced.
  Reference(s): René Itten, Rolf Frischknecht, Matthias Stucki, 2014, Life Cycle Inventories of Electricity Mixes and Grid
- building, multi-storey: 7.5 m3; lognormal variance with pedigree 0.138, pedigree (5,5,5,1,1)
  (same comment as for building, hall, steel construction)
- ceramic tile: 20.5 kg; lognormal variance with pedigree 0.0601, pedigree (3,2,5,1,3)
  Literature data: Bumy et al. 2010, Jones and McManus 2010,
  properties: dry mass 1 kg, wet mass 1 kg
- concrete, normal strength: 0.105653, 0.0232009, 0.0150909, 0.0201513, 0.187828, 0.222661, 7.96542 m3 (7 suppliers, which the file names only by identifier); sum of these 8.54 m3; lognormal variance with pedigree 0.0601, pedigree (3,2,5,1,3)
  Literature data: Bumy et al. 2010, Jones and McManus 2010,
  properties: dry mass 2190 kg, water content 0.086758, wet mass 2380 kg
- copper scrap, sorted, pressed: -2080.8 kg; name copper_scrap; = copper *0.8* 0.9; lognormal variance with pedigree 0.406, pedigree (5,5,4,1,1)
  Estimation. Assuming 80% are recycled and 90% recovery rate in the recycling.
  production volume; = trans_net_RP_PV * (copper_scrap / trans_net_RP)
    Calculated from production volume of reference product using the relative outputs.
  properties: dry mass 1 kg, price 2.84 EUR2005, wet mass 1 kg
- copper, cathode: 2890 kg; name copper; lognormal variance with pedigree 0.0601, pedigree (3,2,5,1,3)
  Literature data: Bumy et al. 2010, Jones and McManus 2010,
  properties: dry mass 1 kg, wet mass 1 kg
- epoxy resin, liquid: 17 kg; lognormal variance with pedigree 0.0601, pedigree (3,2,5,1,3)
  Literature data: Bumy et al. 2010, Jones and McManus 2010,
  properties: carbon content, fossil 0.42325, dry mass 1 kg, wet mass 1 kg
- excavation, hydraulic digger: 375 m3; lognormal variance with pedigree 0.0761, pedigree (4,2,5,1,3)
  Literature data; VSE 1988, own calculations by Itten et al. 2014.Reference(s): René Itten, Rolf Frischknecht, Matthias Stucki, 2014, Life Cycle Inventories of Electricity Mixes and Grid
- gravel, crushed: 1598.28, 28084.9, 7316.87 kg (3 suppliers, which the file names only by identifier); sum of these 37000 kg; lognormal variance with pedigree 0.0601, pedigree (3,2,5,1,3)
  Reported as "gravel, unspecified, at mine" by Itten et al. 2014. Literature data: Bumy et al. 2010, Jones and McManus 2010 on the material use of the cable duct. According to ewz (personal communication by Itten et al. 2014) a share of 30 % of the medium and low voltage cables is built in a cable duct made of concrete, the remainder is cable ducts are built with gravel.
  Reference(s): René Itten, Rolf Frischknecht, Matthias Stucki, 2014, Life Cycle Inventories of Electricity Mixes and Grid
  properties: dry mass 1 kg, wet mass 1 kg
- inert waste: -37000 kg; name inert_waste; = gravel; lognormal variance with pedigree 0.406, pedigree (5,5,4,1,1)
  Estimation. 100% disposed.
  production volume; = trans_net_RP_PV * (inert_waste / trans_net_RP)
    Calculated from production volume of reference product using the relative outputs.
  properties: dry mass 1 kg, wet mass 1 kg
- iron scrap, unsorted: -609.84 kg; name iron_scrap; = steel *0.8* 0.9; lognormal variance with pedigree 0.406, pedigree (5,5,4,1,1)
  Estimation. Assuming 80% are recycled and 90% recovery rate in the recycling.
  production volume; = trans_net_RP_PV * (iron_scrap / trans_net_RP)
    Calculated from production volume of reference product using the relative outputs.
  properties: dry mass 1 kg, price 0.149 EUR2005, wet mass 1 kg
- light fuel oil: 1.98094, 207.563, 41.8064, 10.2081, 20.6023, 1.47216, 1.36714 kg (7 suppliers, which the file names only by identifier); sum of these 285 kg; lognormal variance with pedigree 0.0601, pedigree (3,2,5,1,3)
  Literature data: Bumy et al. 2010, Jones and McManus 2010,
  properties: carbon content, fossil 0.862, dry mass 1 kg, wet mass 1 kg
- packaging film, low density polyethylene: 8.56 kg; name polyethylene_film; lognormal variance with pedigree 0.0601, pedigree (3,2,5,1,3)
  Literature data: Bumy et al. 2010, Jones and McManus 2010,
  properties: carbon content, fossil 0.857143, dry mass 1 kg, wet mass 1 kg
  note on carbon content, fossil: Polyethylene is formed out of a huge amount of ethylene monomers (C2H4) (ecoinvent v2.2 report 11_II). MW=28 g/mol
- polyethylene terephthalate, granulate, amorphous: 1370 kg; name pet; lognormal variance with pedigree 0.0601, pedigree (3,2,5,1,3)
  Literature data: Bumy et al. 2010, Jones and McManus 2010,
  properties: carbon content, fossil 0.625, dry mass 1 kg, wet mass 1 kg
- sawlog and veneer log, softwood, debarked, measured as solid wood: 2.54 m3; lognormal variance with pedigree 0.0601, pedigree (3,2,5,1,3)
  Literature data: Bumy et al. 2010, Jones and McManus 2010,
  property wet mass 765 kg; name WM_sawlog
  properties: carbon content, non-fossil 0.494, dry mass 450 kg, water content 0.7
  note on carbon content, non-fossil: C content of dry mass is 0.494 kgC/kg dry wood (ecoinvent v2.2 report 9)
- scrap copper: -548.638, -260.562 kg (2 suppliers, which the file names only by identifier); sum of these -809.2 kg; = copper * (0.2 + 0.8 * 0.1); lognormal variance with pedigree 0.406, pedigree (5,5,4,1,1)
  Estimation. Assuming 80% are recycled and 90% recovery rate in the recycling.
  production volume; = trans_net_RP_PV * (scrap_copper / trans_net_RP)
    Calculated from production volume of reference product using the relative outputs.
  properties: dry mass 1 kg, wet mass 1 kg
- scrap steel: -160.467, -76.6934 kg (2 suppliers, which the file names only by identifier); sum of these -237.16 kg; = steel * (0.2 + 0.8 * 0.1); lognormal variance with pedigree 0.406, pedigree (5,5,4,1,1)
  Estimation. Assuming 80% are recycled and 90% recovery rate in the recycling.
  production volume; = trans_net_RP_PV * scrap_steel / trans_net_RP
    Calculated from production volume of reference product using the relative outputs.
  properties: dry mass 1 kg, wet mass 1 kg
- silicone product: 4.58 kg; lognormal variance with pedigree 0.0601, pedigree (3,2,5,1,3)
  Literature data: Bumy et al. 2010, Jones and McManus 2010,
  properties: carbon content, fossil 0.324324, dry mass 1 kg, wet mass 1 kg
- steel, unalloyed: 847 kg; name steel; lognormal variance with pedigree 0.0601, pedigree (3,2,5,1,3)
  Literature data: Bumy et al. 2010, Jones and McManus 2010,
  Reported by Itten et al. (2014) as "steel converter, unalloyed, at plant".
  Reference(s): René Itten, Rolf Frischknecht, Matthias Stucki, 2014, Life Cycle Inventories of Electricity Mixes and Grid
  properties: carbon content, fossil 0.0025, dry mass 1 kg, wet mass 1 kg
  note on carbon content, fossil: Unalloyed steels or carbon steels are those in which the level of an individual element in no case reaches or exceeds the limiting concentration given in Tab. 3.1 ecoinvent v2.2 report 10_partII. Assumed to have a C content of 0.25%
- sulfur hexafluoride, liquid: 5.41 kg; lognormal variance with pedigree 0.012, pedigree (1,1,3,1,1)
  Swiss SFA study, 1999
  Swiss SFA study, 1999
  properties: dry mass 1 kg, wet mass 1 kg
- synthetic rubber: 269 kg; name rubber; lognormal variance with pedigree 0.0601, pedigree (3,2,5,1,3)
  Literature data: Bumy et al. 2010, Jones and McManus 2010,
  properties: carbon content, fossil 0.871949, dry mass 1 kg, wet mass 1 kg
  note on carbon content, fossil: EPDM (Ethylene-propene-diene terpolymer) rubber is a terpolymer of ethylene, propene, and a diene with the residual unsaturated portion of the diene in the side chain (ecoinvent v2.2 report 7-part XX & Ullmann). Chemical formula (deduced from Evidences of Solvent-Induced Miscibility in Polychloroprene-co-Ethylene-Propene Diene Terpolymer Blends, Dubey et al., Journal of Applied Polymer Science, 2009, 111:1884–1891): C20H35
- waste concrete: -1284.87, -17515.1 kg (2 suppliers, which the file names only by identifier); sum of these -18800 kg; lognormal variance with pedigree 0.406, pedigree (5,5,4,1,1)
  Estimation; 100% disposed. Reported as "disposal, concrete, 5% water, to inert material landfill".
  Reference(s): René Itten, Rolf Frischknecht, Matthias Stucki, 2014, Life Cycle Inventories of Electricity Mixes and Grid
  production volume; = waste_concrete_byP/ trans_net_RP* trans_net_RP_PV
    Calculated from the production volume of transmission network, electricity, medium voltage in proportion to the respective output amounts.
  properties: dry mass 0.5 kg, water content 1, wet mass 1 kg
- waste mineral oil: -206.235, -78.7652 kg (2 suppliers, which the file names only by identifier); sum of these -285 kg; lognormal variance with pedigree 0.406, pedigree (5,5,4,1,1)
  Estimation; 100% disposed. Reported as "calculationdisposal, concrete, 5% water, to inert material landfill".
  Reference(s): René Itten, Rolf Frischknecht, Matthias Stucki, 2014, Life Cycle Inventories of Electricity Mixes and Grid
  production volume; = waste_min_oil_byP/ trans_net_RP* trans_net_RP_PV
    (same comment as for waste concrete)
  properties: carbon content, fossil 0.864444, dry mass 0.9 kg, water content 0.111111, wet mass 1 kg
  note on carbon content, fossil: Tab A.6, ecoinvent v2.2 report 13_I. C content has been calculated after data in the tables, and then referred to 1 kg DM
- waste polyethylene: -0.000542467, -0.00138308, -0.000571263, -0.0001046, -8.51883, -0.0176372, -0.000230784, -0.0206998 kg (8 suppliers, which the file names only by identifier); sum of these -8.56 kg; lognormal variance with pedigree 0.406, pedigree (5,5,4,1,1)
  Estimation; 100% disposed. Reported as "disposeddisposal, used mineral oil, 10% water, to hazardous waste incineration".
  Reference(s): René Itten, Rolf Frischknecht, Matthias Stucki, 2014, Life Cycle Inventories of Electricity Mixes and Grid
  production volume; = waste_PE_byP* trans_net_RP* trans_net_RP_PV
    (same comment as for waste concrete)
  properties: carbon content, fossil 0.825301, dry mass 0.996 kg, water content 0.00401606, wet mass 1 kg
  note on carbon content, fossil: C content in 1 kg DM was calculated using data in Tab A.1, ecoinvent v2.2 report 13_I
- waste polyethylene terephthalate: -2.10546, -1365.09, -0.068195, -0.0124867, -0.0647575, -0.165107, -0.02755, -2.47106 kg (8 suppliers, which the file names only by identifier); sum of these -1370 kg; = pet; lognormal variance with pedigree 0.406, pedigree (5,5,4,1,1)
  Estimation. 100% disposed.
  production volume; = trans_net_RP_PV * (waste_poly / trans_net_RP)
    Calculated from production volume of reference product using the relative outputs.
  properties: carbon content, fossil 0.554108, dry mass 0.998 kg, heating value, net 22.95 MJ, water content 0.00200401, wet mass 1 kg
  note on heating value, net: Value taken from the general comment of the treatment dataset.
- waste rubber, unspecified: -165.07, -103.93 kg (2 suppliers, which the file names only by identifier); sum of these -269 kg; = rubber; lognormal variance with pedigree 0.406, pedigree (5,5,4,1,1)
  Estimation. 100% disposed.
  production volume; = trans_net_RP_PV * (waste_rubber / trans_net_RP)
    Calculated from production volume of reference product using the relative outputs.
  properties: carbon content, fossil 0.853, dry mass 1 kg, heating value, net 27.19 MJ, wet mass 1 kg
- waste wood pole, chrome preserved: -1650 kg; name waste_wood_byP; lognormal variance with pedigree 0.406, pedigree (5,5,4,1,1)
  Estimation; 100% disposed. Reported as "disposal, wood pole, chrome preserved, 20% water, to municipal incineration".
  Reference(s): René Itten, Rolf Frischknecht, Matthias Stucki, 2014, Life Cycle Inventories of Electricity Mixes and Grid
  production volume; = waste_wood_byP/ trans_net_RP* trans_net_RP_PV
    (same comment as for waste concrete)
  properties: carbon content, non-fossil 0.483676, dry mass 0.8 kg, water content 0.25, wet mass 1 kg
  note on carbon content, non-fossil: Tab A.4, ecoinvent v2.2 report 13_I. C content has been referred to 1 kg DM,
- wood preservation, pressure vessel, creosote, outdoor use, ground contact: 1943.1 kg; = 2.54 * WM_sawlog; lognormal variance with pedigree 0.0601, pedigree (3,2,5,1,3)
  Literature data: Bumy et al. 2010, Jones and McManus 2010,
- wood preservative, inorganic salt, containing Cr: 45.2 kg; lognormal variance with pedigree 0.0601, pedigree (3,2,5,1,3)
  Wooden masts used for the medium voltage aireal lines are preserved by an inorganic preservative to prevent fouling. In Switzerland several preservative substances are forbidden; excludgin these, inorganic salt, containing Cr was assumed as the used type of preservative. The amount of preservatives used is based on literature sources (Werner et al. 2003; Künninger et al. 1995). Chromium vI, Copper Boron and Fluorine are wased out of the preserved masts into the soil with leachate rates of 60%, 75%, 95% and 80% respectively (Itten et al. 2014).
  Reference(s): René Itten, Rolf Frischknecht, Matthias Stucki, 2014, Life Cycle Inventories of Electricity Mixes and Grid
  properties: dry mass 1 kg, wet mass 1 kg

## Inputs from nature
- Occupation, industrial area [natural resource, land]: 210.7 m2*year; = 45.7+165; lognormal variance with pedigree 0.258, pedigree (5,5,5,1,1)
  Literature data; VSE 1988, own calculations by Itten et al. 2014. Reported as 165m2a of "Occupation, industrial area, build up" and 45.7m2a "Occupation, industrial area, vegetation".
  Reference(s): René Itten, Rolf Frischknecht, Matthias Stucki, 2014, Life Cycle Inventories of Electricity Mixes and Grid
- Transformation, from arable land, unspecified use [natural resource, land]: 2.93 m2; lognormal variance with pedigree 0.138, pedigree (5,5,5,1,1)
  (same comment as for excavation, hydraulic digger)
- Transformation, from forest, unspecified [natural resource, land]: 2.34 m2; lognormal variance with pedigree 0.138, pedigree (5,5,5,1,1)
  (same comment as for excavation, hydraulic digger)
- Transformation, to industrial area [natural resource, land]: 5.27 m2; = 4.13+1.14; lognormal variance with pedigree 0.138, pedigree (5,5,5,1,1)
  Literature data; VSE 1988, own calculations by Itten et al. 2014. Reported as 4.13m3 "transformation to industrial area, built up" and 1.14m3 "transformation to industrial area, vegetation".
  Reference(s): René Itten, Rolf Frischknecht, Matthias Stucki, 2014, Life Cycle Inventories of Electricity Mixes and Grid

## Emissions to nature
- Sulfur hexafluoride [air, unspecified]: 0.108 kg; lognormal variance with pedigree 0.0402, pedigree (1,1,2,1,1)
  Literature data; Federal office of the environment (FOEN) 2009, Swiss greenhouse gas statistics.
  1% of total SF6 used in electricity transformation facilities is estimated to be emitted during construction, 1% during deconstruction, adding to 2% SF6 emitted of the total SF6 in use. 90% of SF6 in use is attributed to the high to medium votlage switch gear (considered in medium voltage network construction), 10% to the medium to low voltage switch gear (considered in low voltage network construction).
- Boron [soil, unspecified]: 0.944 kg; lognormal variance with pedigree 0.0546, pedigree (3,3,3,1,1)
  Estimate by Itten et al. 2014. Chromium vI, Copper Boron and Fluorine are wased out of the preserved masts into the soil with leachate rates of 60%, 75%, 95% and 80% respectively.
  Reference(s): René Itten, Rolf Frischknecht, Matthias Stucki, 2014, Life Cycle Inventories of Electricity Mixes and Grid
- Copper ion [soil, unspecified]: 3.33 kg; lognormal variance with pedigree 0.0546, pedigree (3,3,3,1,1)
  (same comment as for Boron)
- Fluoride [soil, unspecified]: 3.61 kg; lognormal variance with pedigree 0.0546, pedigree (3,3,3,1,1)
  (same comment as for Boron)

## Sampling procedure
statistics
