# diode production, glass-, for through-hole mounting

Dataset: EcoSpold 2, unit process
Geography: GLO
Time period: 1994-01-01 to 2023-12-31
Technology level: current
Classification: ISIC rev.4 ecoinvent: 2610:Manufacture of electronic components and boards
Classification: EcoSpold01Categories: electronics/component
Tags: ConvertedDataset
Scenario: Business-as-Usual
System model: Allocation, cut-off by classification
Generated by: Roland Hischier
Published in: Hischier R. 2007
Database: ecoinvent
isCopyrightProtected: true
accessRestrictedTo: 1

## General comment
This dataset represents the production of 1 kg of a typical glass diode for hole-through mounting. It is based on the assumption that a typical through-hole mounting diode in electronic modules has an average weight of 0.596 g. The data represent a typical through-hole mounting diode used in the information and communication technology. Material data are taken from datasheets of producers of such diodes and from the literature. Infrastructure and production efforts are based on own assumptions. The production efforts represent not a specific diode type and have thus, accordingly higher uncertainties.
[This dataset was already contained in the ecoinvent database version 2. It was not individually updated during the transfer to ecoinvent version 3. Life Cycle Impact Assessment results may still have changed, as they are affected by changes in the supply chain, i.e. in other datasets. This dataset was generated following the ecoinvent quality guidelines for version 2. It may have been subject to central changes described in the ecoinvent version 3 change report (http://www.ecoinvent.org/database/ecoinvent-version-3/reports-of-changes/), and the results of the central updates were reviewed extensively. The changes added e.g. consistent water flows and other information throughout the database. The documentation of this dataset can be found in the ecoinvent reports of version 2, which are still available via the ecoinvent website. The change report linked above covers all central changes that were made during the conversion process.]

## Included activities start
From reception of metals and plastics at the factory gate.

## Included activities end
This dataset includes raw material input and production efforts for the production of currently used glass diodes for hole-through mounting technology.

## Geography
Data represent a global valuable composition of through-hole type glass diodes.

## Technology
average diode production composed of the diode wafer production (cleaing, masking, etching, doping, oxidising, metal deposition) and the final assembly of the diode (wafer sawing, die bonding, moulding, trimming and forming)

## Reference product
- diode, glass-, for through-hole mounting: 1 kg; By-product classification allocatable product; CPC 47150: Diodes, transistors and similar semi-conductor devices; photosensitive semi-conductor devices; light emitting […]; HS2017 854110: Electrical apparatus; diodes, other than photosensitive or light-emitting diodes (LED)
  EcoSpold01Location=GLO
  A diode is “a component that restricts the direction of movement of charge carriers. Essentially, it allows an electric current to flow in one direction, but blocks it in the opposite direction.”
  Hence, a diode can be seen as an electronic version of a check valve. A circuit that requires current flow in only one direction will consequently include at least one diode in its circuit design. Currently most of the diodes are made from traditional semiconductor materials like silicium or germanium.
  Currently, there is a huge variety of different types of diodes on the market.
  production volume 1 kg
    Dummy value to be replaced by measured, estimated or calculated value
  property carbon content, fossil 0.0203273
    Calculated as the addition of C contents in the product composition
  property price 91.29 EUR2005
    Calculated value based on data from United Nations Commodity Trade Statistics Database (comtrade.un.org). UN comtrade category: 854110 Diodes, except photosensitive and light emitting. Year 2005. Using exchange rate of 1EURO = 1.209 USD. Average of price of import into 5 main markets (EU, US, JP, IN and CN).
  properties: carbon allocation 0.0203273 kg, carbon content 0.0203273, carbon content, non-fossil 0, dry mass 1 kg, water content 0, water in wet mass 0 kg, wet mass 1 kg

## Inputs from technosphere
- copper, cathode: 0.23514 kg; source Behrendt S 1998; lognormal variance with pedigree 0.042, pedigree (1,4,5,1,1)
  EcoSpold01Location=RER
  Calculated Value. The production of 1 kg of diodes lead to a waste amount of 0.37 kg - whereof 0.04 kg are calculated to be unused raw materials. Hence, this dataset here has an input of 1.04 kg of raw materials per kg of diode. The split to the different raw materials (metals, plastics) is based on the reported material specifications.
  Further references:
  Philips Semiconductors (2002) Chemical Content of Semiconductor Devices 2002/2003. Philips Semiconductors, Austin / Zoetermeer / Hong Kong / Tokyo
  ST Microelectronics (2004) Chemical Content of Semiconductor Packaging. PDF from <http://www.stmicroelectronics.com/stonline/company/environm/report03/envi03.pdf>.
  Uncertainty: average from literature & company information
  properties: dry mass 1 kg, wet mass 1 kg
- diode, auxilliaries and energy use: 1 kg; lognormal variance with pedigree 0.134, pedigree (3,4,5,1,4)
  EcoSpold01Location=GLO
  Estimation - details see this other activity dataset
  Uncertainty: rough estimation
- epoxy resin, liquid: 8.5904e-5, 1.8096e-5 kg (2 suppliers, which the file names only by identifier); sum of these 0.000104 kg; source Behrendt S 1998; lognormal variance with pedigree 0.042, pedigree (1,4,5,1,1)
  (same comment as for copper, cathode)
  properties: carbon content, fossil 0.42325, dry mass 1 kg, heating value, net 12.82 MJ, wet mass 1 kg
- funnel glass, for cathode ray tube display: 0.26146 kg; source Behrendt S 1998; lognormal variance with pedigree 0.042, pedigree (1,4,5,1,1)
  Calculated Value. The production of 1 kg of diodes lead to a waste amount of 0.37 kg - whereof 0.04 kg are calculated to be unused raw materials. Hence, this dataset here has an input of 1.04 kg of raw materials per kg of diode. The split to the different raw materials (metals, plastics) is based on the reported material specifications.
  Further references:
  Philips Semiconductors (2002) Chemical Content of Semiconductor Devices 2002/2003. Philips Semiconductors, Austin / Zoetermeer / Hong Kong / Tokyo
  ST Microelectronics (2004) Chemical Content of Semiconductor Packaging. PDF from <http://www.stmicroelectronics.com/stonline/company/environm/report03/envi03.pdf>.
  EcoSpold01Location=GLO
  Uncertainty: average from literature & company information
  properties: dry mass 1 kg, wet mass 1 kg
- lead: 0.016328 kg; source Behrendt S 1998; lognormal variance with pedigree 0.042, pedigree (1,4,5,1,1)
  (same comment as for copper, cathode)
  properties: dry mass 1 kg, wet mass 1 kg
- molybdenum: 0.021008 kg; source Behrendt S 1998; lognormal variance with pedigree 0.042, pedigree (1,4,5,1,1)
  Calculated Value. The production of 1 kg of diodes lead to a waste amount of 0.37 kg - whereof 0.04 kg are calculated to be unused raw materials. Hence, this dataset here has an input of 1.04 kg of raw materials per kg of diode. The split to the different raw materials (metals, plastics) is based on the reported material specifications.
  Further references:
  Philips Semiconductors (2002) Chemical Content of Semiconductor Devices 2002/2003. Philips Semiconductors, Austin / Zoetermeer / Hong Kong / Tokyo
  ST Microelectronics (2004) Chemical Content of Semiconductor Packaging. PDF from <http://www.stmicroelectronics.com/stonline/company/environm/report03/envi03.pdf>.
  EcoSpold01Location=RER
  Uncertainty: average from literature & company information
  properties: dry mass 1 kg, wet mass 1 kg
- nickel, class 1: 0.003848 kg; source Behrendt S 1998; lognormal variance with pedigree 0.042, pedigree (1,4,5,1,1)
  (same comment as for funnel glass, for cathode ray tube display)
  properties: dry mass 1 kg, wet mass 1 kg
- pig iron: 0.0382096, 0.41253 kg (2 suppliers, which the file names only by identifier); sum of these 0.45074 kg; source Behrendt S 1998; lognormal variance with pedigree 0.042, pedigree (1,4,5,1,1)
  EcoSpold01Location=GLO
  Calculated Value. The production of 1 kg of diodes lead to a waste amount of 0.37 kg - whereof 0.04 kg are calculated to be unused raw materials. Hence, this dataset here has an input of 1.04 kg of raw materials per kg of diode. The split to the different raw materials (metals, plastics) is based on the reported material specifications.
  Further references:
  Philips Semiconductors (2002) Chemical Content of Semiconductor Devices 2002/2003. Philips Semiconductors, Austin / Zoetermeer / Hong Kong / Tokyo
  ST Microelectronics (2004) Chemical Content of Semiconductor Packaging. PDF from <http://www.stmicroelectronics.com/stonline/company/environm/report03/envi03.pdf>.
  Uncertainty: average from literature & company information
  properties: carbon content, fossil 0.045, dry mass 1 kg, wet mass 1 kg
  note on carbon content, fossil: Pig iron is the iron produced in the blast furnace. It is an alloy of 94% Fe and more than 2% C (world average 4.5%). (ecoinvent v2.2 report 10_partII)
- silicon, electronics grade: 0.00468 kg; source Behrendt S 1998; lognormal variance with pedigree 0.042, pedigree (1,4,5,1,1)
  Calculated Value. The production of 1 kg of diodes lead to a waste amount of 0.37 kg - whereof 0.04 kg are calculated to be unused raw materials. Hence, this dataset here has an input of 1.04 kg of raw materials per kg of diode. The split to the different raw materials (metals, plastics) is based on the reported material specifications.
  Further references:
  Philips Semiconductors (2002) Chemical Content of Semiconductor Devices 2002/2003. Philips Semiconductors, Austin / Zoetermeer / Hong Kong / Tokyo
  ST Microelectronics (2004) Chemical Content of Semiconductor Packaging. PDF from <http://www.stmicroelectronics.com/stonline/company/environm/report03/envi03.pdf>.
  EcoSpold01Location=DE
  Uncertainty: average from literature & company information
  properties: dry mass 1 kg, wet mass 1 kg
- tin: 0.046488 kg; source Behrendt S 1998; lognormal variance with pedigree 0.042, pedigree (1,4,5,1,1)
  (same comment as for molybdenum)
  properties: dry mass 1 kg, wet mass 1 kg

## Sampling procedure
literature

## Review by Rolf Frischknecht 2007-11-15
passed.

## Review by Roland Hischier 2011-09-20
Transfer of documentation done.
