# selective coating, copper sheet, sputtering

Dataset: EcoSpold 2, unit process
Geography: CA-QC
Time period: 2001-01-01 to 2023-12-31
Technology level: current
Classification: EcoSpold01Categories: metals/refinement
Classification: ISIC rev.4 ecoinvent: 2592:Treatment and coating of metals; machining
Synonyms: sunselect; PVD; physical vapour deposition
Tags: recontextualization
Scenario: Business-as-Usual
System model: Allocation, cut-off by classification
Share of production covered: 70 %
Generated by: Pascal Lesage
Published in: Althaus H.-J. 2000
Database: ecoinvent
isCopyrightProtected: true
accessRestrictedTo: 1

## General comment
Inventory for selective coatings of solar absorbers.
[This dataset was already contained in the ecoinvent database version 2. It was not individually updated during the transfer to ecoinvent version 3. Life Cycle Impact Assessment results may still have changed, as they are affected by changes in the supply chain, i.e. in other datasets. This dataset was generated following the ecoinvent quality guidelines for version 2. It may have been subject to central changes described in the ecoinvent version 3 change report (http://www.ecoinvent.org/database/ecoinvent-version-3/reports-of-changes/), and the results of the central updates were reviewed extensively. The changes added e.g. consistent water flows and other information throughout the database. The documentation of this dataset can be found in the ecoinvent reports of version 2, which are still available via the ecoinvent website. The change report linked above covers all central changes that were made during the conversion process.]
Child dataset exchanges identical to GLO dataset. Created to enable linking to regional markets (e.g. for electricity). Data quality indicators adjusted accordingly.

## Included activities start
The activity starts with the sheet entering the process. The material on which this activity is applied it is not included as input.

## Included activities end
Gate to gate inventory for the process including energy use in the plant, infrastructure and packaging, relevant materials and emissions.

## Geography
Production plant in DE. No data for SE.
Child dataset exchanges identical to GLO dataset. Created to enable linking to regional markets (e.g. for electricity). Data quality indicators adjusted accordingly.

## Technology
Sputtering of chromium and tin

## Time period
Environmental report.

## Parameters
- Quebec gross domestic product 2011: 3.11e11 USD(2011); name quebecGDP2011; lognormal variance with pedigree 0.0006, pedigree (1,1,1,1,1)
  Quebec Gross domestic product for 2011, expressed in 2011 USD. Source: Institut de la statistique du Québec. Converted from CAD to USD using a yearly average exchange rate of 0.989 CAD/USD (Source: bank of Canada).
- fraction, process water, to air: 0.15 dimensionless; lognormal variance with pedigree 0.092025, pedigree (4,4,3,2,4)
- fraction, tap water, to air: 0.15 dimensionless; lognormal variance with pedigree 0.092025, pedigree (4,4,3,2,4)
- world gross domestic product 2011: 7e13 USD(2011); name worldGDP2011; lognormal variance with pedigree 0.0006, pedigree (1,1,1,1,1)
  World Gross domestic product for 2011, expressed in 2011 USD. Source: World Bank.

## Reference product
- selective coat, copper sheet, sputter deposition: 1 m2; By-product classification allocatable product; CPC 88731: Metal treatment and coating services
  production volume 2825.66 m2
    Gross approximation of Quebec production volume using relative value of Quebec GDP to world GDP
  property price 0.788186 EUR2005
    Calculated based on inputs: The price of the product has been calculated as a sum of the values of the material and energy inputs for this product. This value is therefore a rough estimation. It may underestimate the real price since there are additional expenses when producing any product. These expences can include for example labour costs, treatment of waste materials and profit for the producer. Please consider carefully whether this level of data quality is acceptable for your application.
  properties: carbon allocation 0 kg, carbon content 0

## Inputs from technosphere
- argon, liquid: 0.00328 kg; lognormal variance with pedigree 0.0421, pedigree (1,2,5,5,1)
  Questionnaire (plus helium)
  Uncertainty: Q
  properties: dry mass 1 kg, wet mass 1 kg
- chromium: 0.0074 kg; lognormal variance with pedigree 0.0421, pedigree (1,2,5,5,1)
  Questionnaire
  Uncertainty: Q
  properties: dry mass 1 kg, wet mass 1 kg
- copper, cathode: 0.0818 kg; lognormal variance with pedigree 0.0421, pedigree (1,2,5,5,1)
  Copper production wastes
  Uncertainty: C
  properties: dry mass 1 kg, wet mass 1 kg
- corrugated board box: 0.0177 kg; lognormal variance with pedigree 0.0421, pedigree (1,2,5,5,1)
  Questionnaire
  Uncertainty: Q
  properties: carbon content, fossil 0.000656085, carbon content, non-fossil 0.432275, dry mass 0.945 kg, heating value, net 12.86 MJ, water content 0.0582011, wet mass 1 kg
  note on carbon content, fossil: Fossil C content was calculated after fossil C contents of chemicals used in the production of board (Tab 10-15 & 10.16 ecoinvent v2.2 report 11_III, part 10)
  note on carbon content, non-fossil: Biogenic C content was calculated after biogenic C contents of chemicals used in the production of board (Tab 10.15 & 10.16, ecoinvent v2.2 report 11_III, part 10).
- diesel, burned in building machine: 0.225 MJ; lognormal variance with pedigree 0.0421, pedigree (1,2,5,5,1)
  Questionnaire, use for vehicles in plant operation
  Uncertainty: Q
  properties: heating value, net 1 MJ
- electricity, medium voltage: 3.47 kWh; lognormal variance with pedigree 0.0421, pedigree (1,2,5,5,1)
  Questionnaire, total electricity use in the factory
  Uncertainty: Q
- kraft paper: 0.000555 kg; lognormal variance with pedigree 0.0421, pedigree (1,2,5,5,1)
  Questionnaire
  Uncertainty: Q
  properties: carbon content, fossil 0.0020219, carbon content, non-fossil 0.41662, dry mass 0.945 kg, heating value, net 14.11 MJ, water content 0.0582011, wet mass 1 kg
  note on carbon content, fossil: Fossil C content was calculated after fossil C contents of chemicals used in the production of the paper (in Tab 9.4 ecoinvent v2.2 report 11_III, part 9).
  note on carbon content, non-fossil: Biogenic C content was calculated after biogenic C contents of chemicals used in the production of the paper (in Tab 9.4 ecoinvent v2.2 report 11_III, part 9). The cellulose content in 1 kg of paper (on a wet mas basis) was estimated as (1-chemical content), C content of cellulose was considered 0.44 kgC/kg dry mass (ecoinvent v2.2 report, n 15a, pg 40)
- light fuel oil: 0.0062 kg; lognormal variance with pedigree 0.0421, pedigree (1,2,5,5,1)
  Questionnaire, including heating
  Uncertainty: Q
  properties: carbon content, fossil 0.862, dry mass 1 kg, heating value, net 42.6 MJ, wet mass 1 kg
- lubricating oil: 0.000773 kg; lognormal variance with pedigree 0.0421, pedigree (1,2,5,5,1)
  Questionnaire
  Uncertainty: Q
  properties: carbon content, fossil 0.75, dry mass 1 kg, heating value, net 40.2 MJ, wet mass 1 kg
  note on carbon content, fossil: Lubricating oil is produced from diesel. C-content/dry mass of fats and oils considered 75%, from: ecoinvent v2.2 report, n 15a, pg 40
  note on heating value, net: Literature value, Source: IPCC 2006, 2006 IPCC Guidelines for National Greenhouse Gas Inventories, Prepared by the National Greenhouse Gas Inventories Programme, Eggleston H.S., Buendia L., Miwa K., Ngara T. and Tanabe K. (eds). Published: IGES, Japan
- metal coating facility: 3.33e-7 unit; lognormal variance with pedigree 0.3421, pedigree (1,2,5,5,1)
  Questionnaire
  Uncertainty: Q
- municipal solid waste: -0.00341 kg; lognormal variance with pedigree 0.0021, pedigree (1,2,1,5,1)
  Questionnaire
  Uncertainty: Q
  production volume
    (same comment as for selective coat, copper sheet, sputter deposition)
  properties: carbon content, fossil 0.171549, carbon content, non-fossil 0.261655, dry mass 0.771 kg, heating value, net 11.74 MJ, water content 0.297017, wet mass 1 kg
  note on carbon content, fossil: MSW composition in tab 4.1, ecoinvent v2.2 report 13_I. C content referred to 1 kg DM
  note on heating value, net: Value taken from the general comment of the treatment dataset.
- nitrogen, liquid: 0.00182 kg; lognormal variance with pedigree 0.0421, pedigree (1,2,5,5,1)
  Questionnaire
  Uncertainty: Q
  properties: dry mass 1 kg, wet mass 1 kg
- oxygen, liquid: 0.000909 kg; lognormal variance with pedigree 0.0421, pedigree (1,2,5,5,1)
  Questionnaire
  Uncertainty: Q
  properties: dry mass 1 kg, wet mass 1 kg
- polyethylene, low density, granulate: 0.000518 kg; lognormal variance with pedigree 0.0421, pedigree (1,2,5,5,1)
  Plastic packagings
  Uncertainty: P
  properties: carbon content, fossil 0.857143, dry mass 1 kg, heating value, net 42.47 MJ, wet mass 1 kg
  note on carbon content, fossil: Polyethylene is formed out of a huge amount of ethylene monomers (C2H4) (ecoinvent v2.2 report 11_II). MW=28 g/mol
- tap water: 7.236 kg; source NREL - National Renewable Energy Laborat 2005; lognormal variance with pedigree 0.0546, pedigree (3,3,5,5,1)
  Questionnaire
  Calculated based on literature, (Vionnet, S., Quantis Water Database - Technical Report, 2012). The process starts when untreated surface enters the coating plant. It includes the processes: pre-treatment (cleaning) and coating itself. The source presents data on general "Automotive painting, electrocoating, per m2", without specification of what kind of surface is being coated and what kind of coat is used. It is assumed (expert opinion) that this data are more likely to be right then the original - ecoivent values.
  Uncertainty: Q
  properties: carbon content, fossil 0.00178991, dry mass 0.000337476 kg, water content 2962.17, wet mass 1 kg
  note on carbon content, fossil: Bicarbonate content is 2.93 mol/m3. CO2 content is 0.1 mol/m3 (ecoinvent v2.2 report 8, Tab 93.1).
- tin: 0.00862 kg; lognormal variance with pedigree 0.0421, pedigree (1,2,5,5,1)
  Questionnaire
  Uncertainty: Q
  properties: dry mass 1 kg, wet mass 1 kg
- waste mineral oil: -0.000773 kg; lognormal variance with pedigree 0.0021, pedigree (1,2,1,5,1)
  Questionnaire
  Uncertainty: Q
  production volume
    (same comment as for selective coat, copper sheet, sputter deposition)
  properties: carbon content, fossil 0.864444, dry mass 0.9 kg, heating value, net 34.7 MJ, water content 0.111111, wet mass 1 kg
  note on carbon content, fossil: Tab A.6, ecoinvent v2.2 report 13_I. C content has been calculated after data in the tables, and then referred to 1 kg DM
- wastewater, unpolluted: -0.000227 m3; lognormal variance with pedigree 0.0021, pedigree (1,2,1,5,1)
  Questionnaire. The water is mainly used for cooling and thus it does not have to be treated afterwards.
  production volume
    Gross approximation of Quebec production volume using relative value of Quebec GDP to world GDP.
  properties: carbon content, fossil 0.00178991, carbon content, non-fossil 0.00178991, dry mass 0.337476 kg, water content 2962.17, wet mass 1000 kg
  note on carbon content, fossil: Assumed to be like in tap water. Bicarbonate content is 2.93 mol/m3. CO2 content is 0.1 mol/m3 (ecoinvent v2.2 report 8, Tab 93.1).

## Emissions to nature
- Water [air, unspecified]: 0.0010854 m3; lognormal variance with pedigree 0.0827, pedigree (2,2,5,5,1)
  Calculated value based on literature values and expert opinion. See comments in the parametres" comment field.
- Water [water, unspecified]: 0.0061506 m3; lognormal variance with pedigree 0.0827, pedigree (2,2,5,5,1)
  (same comment as for Water)
  property carbon content, fossil 0; name C_content_fossil
  property carbon content, non-fossil 0; name C_content_non_fossil
  property dry mass 0 kg; name DM
  property water in wet mass 1000 kg; name WWM
  property wet mass 1000 kg; name WM

## Sampling procedure
Environmental report and personal communication.

## Extrapolations
GLO dataset extrapolated from German (DE) dataset, which in turn was used to create this child dataset. Exchanges identical to GLO dataset. Created to enable linking to regional markets (e.g. for electricity). Data quality indicators adjusted accordingly.
