# treatment of bottom ash, MSWI-WWT, WW from glass production, slag compartment

Dataset: EcoSpold 2, unit process
Geography: GLO
Time period: 1994-01-01 to 2023-12-31
Technology level: current
Classification: ISIC rev.4 ecoinvent: 3821:Treatment and disposal of non-hazardous waste
Scenario: Business-as-Usual
System model: Allocation, cut-off by classification
Generated by: Nikolia Stoikou
Database: ecoinvent
isCopyrightProtected: true
accessRestrictedTo: 1

## General comment
The process represents the treatment of a waste (bottom ash) that is exclusively generated from another waste treatment. Bottom ash is generated in the municipal solid waste incineration (MSWI) of sewage sludge (with 70% water) that in turn is generated from wastewater treatment (WWT) of 'wastewater from glass production'. Recommended use of this dataset: to be used within the specific chain of treatments for 'wastewater from glass production'. Share of biogenic carbon in the sludge: 0%.

## Included activities start
The activity starts with the waste being available at the gate of the treatment facility. Collection and transportation of the waste to the treatment plant is not included.

## Included activities end
The activity ends with the waste being treated and waste-specific emissions from the slag compartment landfill are released to water (short-term emissions to surface water and long-term emissions to ground water).

## Geography
Modelling parameters affecting the treatment technology are not specific to this geography.

## Technology
Slag compartment for bottom ashes from incineration with base seal and leachate collection system. Recultivation after closure.

## Reference product
- bottom ash, MSWI-WWT, WW from glass production: -1 kg; By-product classification Waste; CPC 39320: Ash and residue (except from the manufacture of iron or steel), containing metals or metallic compounds, excep[…]; HS2017 262110: Slag and ash; ash and residues from the incineration of municipal waste
  production volume 344361 kg
    Calculated in proportion to incinerated waste reference product. The production volume is accounting as well regional specific losses (wastewater not sewered) for this geography
  properties: antimony content 0.000131181, arsenic content 0.00266674, barium content 0.0561645, boron content 0.00161707, cadmium content 0.000141881, carbon allocation 0.00357882 kg, carbon content 0.00395268, carbon content, fossil 0.00395268, carbon content, non-fossil 0, chromium content 0.0115177, copper content 0.0185434, dry mass 0.905417 kg, lead content 0.0104868, nickel content 0.0109239, nitrogen content 0.00165376, oxygen content 0.537689, price 0 EUR2005, sulfur content 0.33044, tin content 0.00809778, water content 0.104463, water in wet mass 0.0945827 kg, wet mass 1 kg, zinc content 0.00597383

## Inputs from technosphere
- process-specific burdens, slag landfill: 0.00841689, 0.280494, 0.71109 kg (3 suppliers, which the file names only by identifier); sum of these 1 kg
  mass-specific expenditures required for landfilling of bottom ash.
- slag landfill: 1.7778e-9 unit
  slag compartment infrastructure required for landfilling of bottom ash.

## Inputs from nature
- Organic carbon, placed in landfill [inventory indicator, waste]: 0.0017894 kg; lognormal variance with pedigree 0.136321, pedigree (1,1,5,1,1)
  Mass of organic carbon in waste (without inorganic carbon), initially put in slag compartment. The exchange represents a flow that is within the technosphere. This exchange should only be used to apply ecofactors for the Swiss LCIA method of Ecological Scarcity and not any other purpose.
  Uncertainty: Uncertainty calculated from uncertainty of composition of incinerated waste, and incinerator model uncertainty and slag compartment transfer coefficient uncertainty.
- Waste mass, total, placed in landfill [inventory indicator, waste]: 1 kg
  Mass of waste initially put in a slag compartment. The exchange represents a flow that is within the technosphere. This exchange should only be used to apply ecofactors for the Swiss LCIA method of Ecological Scarcity and not any other purpose.

## Emissions to nature
- Non-hazardous waste disposed [inventory indicator, waste]: 1 kg
  Inventory indicator for waste mass disposed. To be used in EN15804 "other data" results.
- Antimony ion [water, ground-, long-term]: 1.7187e-5 kg; lognormal variance with pedigree 1.102, pedigree (1,1,5,1,1)
  complement of long-term emissions from incinerator bottom ash in slag compartment
  Uncertainty: Uncertainty calculated from uncertainty of composition of incinerated waste, and incinerator model uncertainty and slag compartment transfer coefficient uncertainty.
- Antimony ion [water, surface water]: 8.0094e-8 kg; lognormal variance with pedigree 0.8721, pedigree (1,1,5,1,1)
  short-term emissions from incinerator bottom ash in slag compartment
  Uncertainty: Uncertainty calculated from uncertainty of composition of incinerated waste, and incinerator model uncertainty and slag compartment transfer coefficient uncertainty.
- Arsenic ion [water, ground-, long-term]: 0.0024109 kg; lognormal variance with pedigree 0.16247, pedigree (1,1,5,1,1)
  (same comment as for Antimony ion)
- Arsenic ion [water, surface water]: 3.632e-6 kg; lognormal variance with pedigree 0.7626, pedigree (1,1,5,1,1)
  (same comment as for Antimony ion)
- BOD5, Biological Oxygen Demand [water, ground-, long-term]: 0.0014739 kg; lognormal variance with pedigree 0.136323, pedigree (1,1,5,1,1)
  (same comment as for Antimony ion)
- BOD5, Biological Oxygen Demand [water, surface water]: 5.3199e-6 kg; lognormal variance with pedigree 0.6258, pedigree (1,1,5,1,1)
  (same comment as for Antimony ion)
- Barium II [water, ground-, long-term]: 0.050845 kg; lognormal variance with pedigree 0.119937, pedigree (1,1,5,1,1)
  (same comment as for Antimony ion)
- Barium II [water, surface water]: 7.7946e-6 kg; lognormal variance with pedigree 1.01897, pedigree (1,1,5,1,1)
  (same comment as for Antimony ion)
- Boron [water, ground-, long-term]: 0.0012182 kg; lognormal variance with pedigree 0.15775, pedigree (1,1,5,1,1)
  (same comment as for Antimony ion)
- Boron [water, surface water]: 1.1472e-5 kg; lognormal variance with pedigree 0.54321, pedigree (1,1,5,1,1)
  (same comment as for Antimony ion)
- COD, Chemical Oxygen Demand [water, ground-, long-term]: 0.0045059 kg; lognormal variance with pedigree 0.136323, pedigree (1,1,5,1,1)
  (same comment as for Antimony ion)
- COD, Chemical Oxygen Demand [water, surface water]: 1.6264e-5 kg; lognormal variance with pedigree 0.6258, pedigree (1,1,5,1,1)
  (same comment as for Antimony ion)
- Cadmium II [water, ground-, long-term]: 0.0001284 kg; lognormal variance with pedigree 0.2246, pedigree (1,1,5,1,1)
  (same comment as for Antimony ion)
- Cadmium II [water, surface water]: 6.6093e-8 kg; lognormal variance with pedigree 0.9641, pedigree (1,1,5,1,1)
  (same comment as for Antimony ion)
- Chromium VI [water, ground-, long-term]: 6.8239e-5 kg; lognormal variance with pedigree 3.4713, pedigree (1,1,5,1,1)
  (same comment as for Antimony ion)
- Chromium VI [water, surface water]: 2.9821e-7 kg; lognormal variance with pedigree 1.2748, pedigree (1,1,5,1,1)
  (same comment as for Antimony ion)
- Copper ion [water, ground-, long-term]: 0.016789 kg; lognormal variance with pedigree 0.15162, pedigree (1,1,5,1,1)
  (same comment as for Antimony ion)
- Copper ion [water, surface water]: 5.8292e-7 kg; lognormal variance with pedigree 1.2472, pedigree (1,1,5,1,1)
  (same comment as for Antimony ion)
- DOC, Dissolved Organic Carbon [water, ground-, long-term]: 0.001783 kg; lognormal variance with pedigree 0.136323, pedigree (1,1,5,1,1)
  (same comment as for Antimony ion)
- DOC, Dissolved Organic Carbon [water, surface water]: 6.4357e-6 kg; lognormal variance with pedigree 0.6258, pedigree (1,1,5,1,1)
  (same comment as for Antimony ion)
- Lead II [water, ground-, long-term]: 0.0094947 kg; lognormal variance with pedigree 0.15607, pedigree (1,1,5,1,1)
  (same comment as for Antimony ion)
- Lead II [water, surface water]: 1.7332e-7 kg; lognormal variance with pedigree 1.3366, pedigree (1,1,5,1,1)
  (same comment as for Antimony ion)
- Nickel II [water, ground-, long-term]: 0.0098844 kg; lognormal variance with pedigree 0.14963, pedigree (1,1,5,1,1)
  (same comment as for Antimony ion)
- Nickel II [water, surface water]: 6.2283e-6 kg; lognormal variance with pedigree 0.86268, pedigree (1,1,5,1,1)
  (same comment as for Antimony ion)
- Nitrate [water, ground-, long-term]: 0.0053789 kg; lognormal variance with pedigree 0.1433, pedigree (1,1,5,1,1)
  (same comment as for Antimony ion)
- Nitrate [water, surface water]: 0.0012522 kg; lognormal variance with pedigree 0.21009, pedigree (1,1,5,1,1)
  (same comment as for Antimony ion)
- Sulfate [water, ground-, long-term]: 0.8157 kg; lognormal variance with pedigree 0.094157, pedigree (1,1,5,1,1)
  (same comment as for Antimony ion)
- Sulfate [water, surface water]: 0.081852 kg; lognormal variance with pedigree 0.22199, pedigree (1,1,5,1,1)
  (same comment as for Antimony ion)
- TOC, Total Organic Carbon [water, ground-, long-term]: 0.001783 kg; lognormal variance with pedigree 0.136323, pedigree (1,1,5,1,1)
  (same comment as for Antimony ion)
- TOC, Total Organic Carbon [water, surface water]: 6.4357e-6 kg; lognormal variance with pedigree 0.6258, pedigree (1,1,5,1,1)
  (same comment as for Antimony ion)
- Tin ion [water, ground-, long-term]: 0.007291 kg; lognormal variance with pedigree 0.15492, pedigree (1,1,5,1,1)
  (same comment as for Antimony ion)
- Tin ion [water, surface water]: 1.1727e-7 kg; lognormal variance with pedigree 1.3529, pedigree (1,1,5,1,1)
  (same comment as for Antimony ion)
- Zinc II [water, ground-, long-term]: 0.0054086 kg; lognormal variance with pedigree 0.1517, pedigree (1,1,5,1,1)
  (same comment as for Antimony ion)
- Zinc II [water, surface water]: 1.6101e-7 kg; lognormal variance with pedigree 1.2677, pedigree (1,1,5,1,1)
  (same comment as for Antimony ion)

## Extrapolations
Modelling parameters are based on an average slag compartment landfill in Switzerland.
