# printed wiring board production, for power supply unit, desktop computer, Pb containing

Dataset: EcoSpold 2, unit process
Geography: GLO
Time period: 2005-01-01 to 2023-12-31
Technology level: current
Classification: EcoSpold01Categories: electronics/module
Classification: ISIC rev.4 ecoinvent: 2610:Manufacture of electronic components and boards
Tags: ConvertedDataset
Scenario: Business-as-Usual
System model: Allocation, cut-off by classification
Generated by: Roland Hischier
Published in: Hischier R. 2007
Database: ecoinvent
isCopyrightProtected: true
accessRestrictedTo: 1

## General comment
This dataset represents the average composition and production efforts for 1 kg of a mounted PWB of a power supply unit (PSU), as used in a desktop PC. Main data are taken from own dismantling activities.
[This dataset was already contained in the ecoinvent database version 2. It was not individually updated during the transfer to ecoinvent version 3. Life Cycle Impact Assessment results may still have changed, as they are affected by changes in the supply chain, i.e. in other datasets. This dataset was generated following the ecoinvent quality guidelines for version 2. It may have been subject to central changes described in the ecoinvent version 3 change report (http://www.ecoinvent.org/database/ecoinvent-version-3/reports-of-changes/), and the results of the central updates were reviewed extensively. The changes added e.g. consistent water flows and other information throughout the database. The documentation of this dataset can be found in the ecoinvent reports of version 2, which are still available via the ecoinvent website. The change report linked above covers all central changes that were made during the conversion process.]

## Included activities start
From reception of printed wiring board at the factory gate.

## Included activities end
This dataset includes component input and production efforts (incl. PWB waste due to failure in mounting) for the production of a PWB used in the power supply unit of a desktop PC, using Pb-containing solder material.

## Geography
Data represent a global valuable composition of PWB in a power supply unit.

## Technology
Average PWB mounting technology (wave soldering)

## Reference product
- printed wiring board, for power supply unit, desktop computer, Pb containing: 1 kg; By-product classification allocatable product; CPC 47160: Electronic integrated circuits; HS2017 853810: Electrical apparatus; parts (e.g. boards, panels, consoles, desks, cabinets, other bases), for goods of hea[...]
  The PC’s power supply must accept a relatively high-voltage alternating current (AC) ranging in different countries from 100 to 240 V, and convert it into much lower voltage direct current (DC), which operates the electronic devices inside. Voltage variation outside the accepted standards can cause data errors or system crashes. The power supply runs all subsystems inside the system unit and is vital to the proper operation of any PC.
  EcoSpold01Location=GLO
  production volume 1 kg
    Dummy value to be replaced by measured, estimated or calculated value
  property carbon content, fossil 0.239221
    C content was calculated as the addition of C content in the PWB components
  property carbon content, non-fossil 0.00383938
    C content was calculated as the addition of C content in the PWB components
  property price 27.0898 EUR2005
    Calculated based on inputs: The price of the product has been calculated as a sum of the values of the material and energy inputs for this product. This value is therefore a rough estimation. It may underestimate the real price since there are additional expenses when producing any product. These expences can include for example labour costs, treatment of waste materials and profit for the producer. Please consider carefully whether this level of data quality is acceptable for your application.
  properties: carbon allocation 0.24306 kg, carbon content 0.24306, dry mass 1 kg, water content 0, water in wet mass 0 kg, wet mass 1 kg

## Inputs from technosphere
- aluminium, wrought alloy: 0.13 kg; lognormal variance with pedigree 0.0687, pedigree (2,5,5,3,1)
  EcoSpold01Location=RER
  Own dismantling activities of a Intel PII Desktop PC PSU
  Uncertainty: own dismantling activities of a Intel PII Desktop PC PSU
  properties: dry mass 1 kg, wet mass 1 kg
- capacitor, electrolyte type, < 2cm height: 0.043673 kg; lognormal variance with pedigree 0.0687, pedigree (2,5,5,3,1)
  EcoSpold01Location=GLO
  Own dismantling activities of a Intel PII Desktop PC PSU
  Uncertainty: own dismantling activities of a Intel PII Desktop PC PSU
  properties: carbon content, fossil 0.189636, carbon content, non-fossil 0.0222053, dry mass 1 kg, wet mass 1 kg
  note on carbon content, fossil: Calculated as the addition of C contents in the product composition, and referred to 1 kg capacitors, and then to 1 kg DM
- capacitor, electrolyte type, > 2cm height: 0.073878 kg; lognormal variance with pedigree 0.0687, pedigree (2,5,5,3,1)
  Own dismantling activities of a Intel PII Desktop PC PSU
  EcoSpold01Location=GLO
  Uncertainty: own dismantling activities of a Intel PII Desktop PC PSU
  properties: carbon content, fossil 0.16971, carbon content, non-fossil 0.0349727, dry mass 1 kg, wet mass 1 kg
- capacitor, film type, for through-hole mounting: 0.022551 kg; lognormal variance with pedigree 0.0687, pedigree (2,5,5,3,1)
  (same comment as for capacitor, electrolyte type, > 2cm height)
  properties: carbon content, fossil 0.278876, dry mass 1 kg, wet mass 1 kg
- capacitor, tantalum-, for through-hole mounting: 0.025 kg; lognormal variance with pedigree 0.0687, pedigree (2,5,5,3,1)
  Own dismantling activities of a Intel PII Desktop PC PSU
  This flow replaces the original capacitor, production mix
  Uncertainty: own dismantling activities of a Intel PII Desktop PC PSU
  property carbon content, fossil 0.181224; name C_content_fossil
  property carbon content, non-fossil 0; name C_content_non_fossil
  property water content 0; name water_content
  property water in wet mass 0 kg; name WWM
  properties: dry mass 1 kg, wet mass 1 kg
- diode, glass-, for through-hole mounting: 0.0065 kg; lognormal variance with pedigree 0.0687, pedigree (2,5,5,3,1)
  (same comment as for capacitor, electrolyte type, < 2cm height)
  properties: carbon content, fossil 0.0203273, dry mass 1 kg, wet mass 1 kg
  note on carbon content, fossil: Calculated as the addition of C contents in the product composition
- inductor, ring core choke type: 0.25612 kg; lognormal variance with pedigree 0.0687, pedigree (2,5,5,3,1)
  EcoSpold01Location=GLO
  Estimation, based on own dismantling activities.
  Uncertainty: own dismantling activities of a Intel PII Desktop PC PSU
  properties: carbon content, fossil 0.445934, dry mass 1 kg, wet mass 1 kg
  note on carbon content, fossil: Calculated as the addition of C contents in the product composition, and referred to 1 kg DM inductor
- integrated circuit, logic type: 0.0030918 kg; lognormal variance with pedigree 0.0687, pedigree (2,5,5,3,1)
  Estimation, based on own dismantling activities.
  EcoSpold01Location=GLO
  Uncertainty: own dismantling activities of a Intel PII Desktop PC PSU
  properties: carbon content, fossil 0.221701, dry mass 1 kg, wet mass 1 kg
- mounting, through-hole technology, Pb-containing solder: 0.049184 m2; lognormal variance with pedigree 0.0687, pedigree (2,5,5,3,1)
  (same comment as for integrated circuit, logic type)
- printed wiring board, for through-hole mounting, Pb containing surface: 0.049184 m2; lognormal variance with pedigree 0.0687, pedigree (2,5,5,3,1)
  (same comment as for inductor, ring core choke type)
  properties: carbon content, fossil 0.203154, dry mass 3.08 kg, wet mass 3.08 kg
  note on carbon content, fossil: C content was calculated as the addition of C content in the PWB components, and then referred to 1 kg DM
- resistor, metal film type, through-hole mounting: 0.012143 kg; lognormal variance with pedigree 0.0687, pedigree (2,5,5,3,1)
  (same comment as for integrated circuit, logic type)
  properties: carbon content, fossil 0.029003, dry mass 1 kg, wet mass 1 kg
  note on carbon content, fossil: Calculated as the addition of C contents in the product composition, and referred to 1 kg DM resistor.
- section bar extrusion, aluminium: 0.13 kg; lognormal variance with pedigree 0.0687, pedigree (2,5,5,3,1)
  Estimation, based on own dismantling activities.
  EcoSpold01Location=RER
  Uncertainty: own dismantling activities of a Intel PII Desktop PC PSU
- transformer, high voltage use: 0.19388 kg; lognormal variance with pedigree 0.0687, pedigree (2,5,5,3,1)
  (same comment as for integrated circuit, logic type)
  properties: carbon content, fossil 0.262798, dry mass 1 kg, wet mass 1 kg
- transformer, low voltage use: 0.061531 kg; lognormal variance with pedigree 0.0687, pedigree (2,5,5,3,1)
  (same comment as for integrated circuit, logic type)
  properties: carbon content, fossil 0.11936, dry mass 1 kg, wet mass 1 kg
- transistor, wired, big size, through-hole mounting: 0.036122 kg; lognormal variance with pedigree 0.0687, pedigree (2,5,5,3,1)
  (same comment as for inductor, ring core choke type)
  properties: carbon content, fossil 0.0946006, dry mass 1 kg, wet mass 1 kg
  note on carbon content, fossil: Calculated as the addition of C contents in the product composition, and referred to 1 kg DM transistor.
- transistor, wired, small size, through-hole mounting: 0.0017959 kg; lognormal variance with pedigree 0.0687, pedigree (2,5,5,3,1)
  (same comment as for inductor, ring core choke type)
  properties: carbon content, fossil 0.080338, dry mass 1 kg, wet mass 1 kg
- used printed wiring boards: -0.020408 kg; lognormal variance with pedigree 0.0127, pedigree (3,3,1,3,1)
  Estimation, based on a european PWB mounting company.
  EcoSpold01Location=GLO
  Uncertainty: data from literature plus own assumptions
  production volume
    Calculated from the production volume of printed wiring board, for power supply unit, desktop computer, Pb containing in proportion to the respective output amounts.
  properties: carbon content, fossil 0.193742, carbon content, non-fossil 0.000960142, dry mass 1 kg, wet mass 1 kg
  note on carbon content, fossil: Composition of printed wiring boards used to calculate C content

## Sampling procedure
own dismanlting

## Extrapolations
see Geography & Technology

## Review by Rolf Frischknecht 2007-09-21
passed.

## Review by Bo Weidema 2012-09-10
changed inputs of production mixes to specified inputs
