# treatment of waste plastic, industrial electronics, municipal incineration FAE

Dataset: EcoSpold 2, unit process
Geography: CH
Time period: 2006-01-01 to 2023-12-31
Technology level: current
Classification: ISIC rev.4 ecoinvent: 3821:Treatment and disposal of non-hazardous waste
Synonyms: polymers waste, part of Waste Electrical and Electronic Equipment (WEEE)
Scenario: Business-as-Usual
System model: Allocation, cut-off by classification
Generated by: Nikolia Stoikou
Database: ecoinvent
isCopyrightProtected: true
accessRestrictedTo: 1

## General comment
The process represents the treatment of 'waste plastic, industrial electronics' in a municipal solid waste incinerator (MSWI). Recommended use of this dataset: For plastic parts from industrial electronics, which go to disposal as part of communal waste mixture, either after a separation procedure, or in small amounts as illegal disposal of a larger item of waste electronics (WEEE).Inventoried waste consists of fraction: 100% Plastics from electronic industrial goods; . Waste composition (wet, in ppmw): gross heating value 36.24 MJ/kg; net heating value 34.78 MJ/kg; H2O 7213.7; O 62000; H 73000; C 808000; S 400; N 13500; P 400; B na; Cl 6400; Br 4200; F 370; I na; Ag na; As 5; Ba 217; Cd 186; Co 29.478; Cr 71; Cu 3194.1; Hg 0.3; Mn 9.8; Mo 4; Ni 299; Pb 165; Sb 4795.2; Se 1.9596; Sn 139; V 1; Zn 520; Be 0.46656; Sc na; Sr 82.582; Ti 4767; Tl 0.37325; W na; Si 2383; Fe 1673; Ca 3047; Al 2773; K 1; Mg na; Na 151. Share of carbon in initial waste input that is biogenic 0%.Share of metals in waste not oxidised and bulk-recyclable (exclude very small or thin parts) Iron: 0%; Alu: 0%; Copper: 0%.Recovery of metal scrap from bottom ash to recycling: 0g iron scrap, 0g aluminium scrap, 0g copper scrap. From this waste, the FLUWA process in the technology mix recovers 0.000841kg (DM) of a hydroxide sludge to be recycled in zinc furnaces. Net energy production: 4.49MJ/kg electric energy and 8.7MJ/kg thermal energy.

## Included activities start
The activity starts with the waste being available at the gate of the treatment facility. Collection and transportation of the waste to the treatment plant is not included.

## Included activities end
The activity ends with the waste being treated and waste-specific emissions from the incineration process and auxiliary material consumption for flue gas cleaning are released to the environment (air and water). Infrastructure and waste-specific energy demands for Municipal Solid Waste Incineration (MSWI) and net energy generation are included.

## Geography
Modelling parameters affecting the treatment technology are specific to this geography and to the technology mix encountered in Switzerland in 2012.

## Technology
The waste is treated in the incineration plant with flue gas cleaning. Incineration is the controlled combustion of a waste and it includes fly ash extraction (FAE). Auxiliary material consumption for this step of air pollution control (APC) are included in the process. Air polution control includes electrostatic precipitator for fly ash (ESP), wet flue gas scrubber and 25% SNCR , 42.77% SCR-high dust , 32.68% SCR-low dust -DeNOx facilities and 0% without DeNOx (weighted according to mass of burnt waste). Efficiency of iron scrap separation from slag : 58%. Efficiency of aluminium scrap separation from slag : 31%. Efficiency of copper scrap separation from slag : 31%. The technology mix for this dataset includes a filter ash treatment (FLUWA) of a share of 46.22%. Gross electric efficiency technology mix 15.84% and Gross thermal efficiency technology mix 28.51%

## Reference product
- heat, for reuse in municipal waste incineration only: 1 MJ; By-product classification allocatable product; CPC 17300: Steam and hot water
  net useful heat generated from this waste and used in internal MSWI plant energy redistribution.
  production volume 6.88285e7 MJ
    calculated in proportion to incinerated waste input
  property price 0.0106 EUR2005
    Average European district heat price from Ecoheatcool and Euroheat 2005-2006, Ecoheat Work package 1: The European heat market. Final report. 10.6 EUR/GJ i s the price of district heat. http://www.solarthermalworld.org/files/Ecoheatcool%20WP1%20Web.pdf?download
  properties: carbon allocation 0 kg, carbon content 0, exergy 0.1842 MJ, true value relation 0.1842
