# electricity production, wind, 1-3MW turbine, onshore

Dataset: EcoSpold 2, unit process
Geography: PE
Time period: 2012-01-01 to 2023-12-31
Technology level: modern
Classification: ISIC rev.4 ecoinvent: 3510:Electric power generation, transmission and distribution
Tags: wind power
Scenario: Business-as-Usual
System model: Allocation, cut-off by classification
Generated by: Alfredo Pro Castaneyra
Published in: Suppen, N 2017
Database: ecoinvent
isCopyrightProtected: false
accessRestrictedTo: 1

## General comment
This dataset represents the production of high voltage electricity at onshore grid-connected wind power plants with a capacity between 1-3 MW in Peru. The reference dataset used was electricity production, wind, 1-3MW turbine, onshore, label-certified, GLO, accessed in November, 2017. Parameters such as annual electricity production volume, installed capacity and wind load hours were adapted. Data from three wind farms was used, these farms are: Cupinisque, Talara and Marcona (COES, 2014). Data was obtained from the Committee of Economic Operations of the National Interconnected System (COES, 2014), the national peruvian entity that regulates the dispatch and generation of energy from the electricity sector. The COES publishes the statistics of operations of the National Interconnected System (SEIN) in an annual basis. The operational statistics for year 2014 were used. In addition, data from OSINERGMIN (2015) was used for installed capacity information. Renewable energies have entered into operation between 2011 and 2012 in Peru.
Wind electricity generation in 2014 was of 0.56%. of thetotal production of electricity in the country, a total of 256.31 GWh. Data from three wind power plants plants, which represent 100% of total wind generation, was used(COES, 2014).
Sources: COES, 2014. Sub Dirección de Gestión de la Información. RA-SGI-0115. ESTADISTICA RELEVANTE DEL SISTEMA ELÉCTRICO INTERCONECTADO NACIONAL, 2014. Retrieved online from http://www.coes.org.pe/Portal/Publicaciones/Estadisticas/ 2014/PDF/08_PRODUCCION CON RECURSOS RENOVABLES DEL SEIN,CUADRO N° 8.2 POR TIPO DE GENERACIÓN CON RER, 2014 and CUADRO N° 8.4 D PRODUCCIÓN DE ENERGÍA ELÉCTRICA DE CENTRALES CON RECURSOS ENERGÉTICOS RENOVABLES DE ORIGEN EÓLICO 2014 - GW.h. 22 august 2017.
MINEM, 2014. Balance Nacional de Energía. Retrieved online from: http://www.minem.gob.pe/minem/archivos/PUBLI_BNE_2014(1).pdf, 10 January 2017.
OSINERGMIN, 2015. CENTRALES DE GENERACIÓN ELÉCTRICA ‐ EN OPERACIÓN, (Inversiones en Concesiones / Autorizaciones Otorgadas por el Ministerio de Energía y Minas desde el Año 1996). Retrieved online https://www.osinergmin.gob.pe/seccion/centro_documental/electricidad/Documentos/PROYECTOS%20GFE/Generaci%C3%B3n/2-EN-OPERACION.pdf, 25 January 2017.

## Included activities start
From operation of the wind power plant to high voltage electricity at the plant. According to (European Communities 2001), electricity produced with wind turbines in a wind power plant is connected to medium voltage or high voltage systems, depending on the size of the windfarm. Normally, each wind turbine contains a transformer from low voltage to medium voltage. The network connection additionally transforms the electricity to high voltage electricity. It is assumed here, that there are no stand-alone grid-connected small wind turbines and that all electricity is connected to the network in form of high voltage electricity.

Source:
European Communities. 2001. Wind Turbine Grid Connection and Interaction. Deutsches Windenergie-Institut /Tech-wise A/S /DM Energy, p. 7 Tab.2.1

## Included activities end
This activity ends with the production of 1kWh of high voltage electricity produced at the power plant and delivered to the grid.

This dataset includes
- the operation and maintenance of the wind power plant
- change of lubricating oil every year

This dataset doesn't include
- raw materials extraction, decommissioning and waste treatment as these activities are already included in infrastructure datasets
- transformation of the electricity produced in order to deliver in to the grid as this is already included in the infrastructure datasets.

## Geography
In Peru, the Economic Operation Committee of the National Interconnected System (COES) is divided in three operation areas, north, central and south. The three wind generation power plants considered in this dataset are located as follows: in the north operation area Cupisnique and Talara; in the south area Marcona.

## Technology
Technology of a 2MW Vestas V80 wind power plant modelled with a dataset for the wind turbine (moving+fixed parts) and a network connection each.
See dataset "wind turbine construction, 2MW, onshore" for detailed technical information.

## Parameters
- Installed capacity: 146.1 MW; name capacity_installed; lognormal variance with pedigree 0.0032, pedigree (2,1,1,5,1)
  Literature value. Total installed capacity in Peruvian wind farms: Marcona (32 MW), Cupisnique (83.2 MW), Talara (30.9 MW).
  Source:
  Comité de Operación Económica del Sistema Interconectado Nacional (COES), Estadísticas de Operación 2014. Pag 69 Cuadro N° 5.19. URL: <http://www.coes.org.pe/dataweb/2004/dtr/estadistica/anual/ProduccionElectricidad/FactPlanta.htm> accessed on november of 2017.
- Percentage of onshore wind power plant class capacity on total: 1 dimensionless; name percentage_class_onshore; lognormal variance with pedigree 0.0127, pedigree (3,2,1,5,2)
  Literature value/calculated value. Percentage of installed capacity with onshore wind turbines 1-3 MW on total installed wind capacity installed in Peru in 2014.
  Source:
  COES, 2014. Sub Dirección de Gestión de la Información. RA-SGI-0115. ESTADISTICA RELEVANTE DEL SISTEMA ELÉCTRICO INTERCONECTADO NACIONAL, 2014. Retrieved online from http://www.coes.org.pe/Portal/Publicaciones/Estadisticas/ 2014/PDF/08_PRODUCCION CON RECURSOS RENOVABLES DEL SEIN,CUADRO N° 8.2 POR TIPO DE GENERACIÓN CON RER, 2014 and CUADRO N° 8.4 D PRODUCCIÓN DE ENERGÍA ELÉCTRICA DE CENTRALES CON RECURSOS ENERGÉTICOS RENOVABLES DE ORIGEN EÓLICO 2014 - GW.h. 22 august 2017.
- Wind load hours: 1772.21 hour; name wind_load_hours; = gross_electricity_production_2014_1/(capacity_installed*1000); lognormal variance with pedigree 0.212, pedigree (5,5,5,5,5)
  Estimated value with the data from the three plants in 2014. Wind load hours were calculated by dividing gross electricity production by total installed capacity of the power plants.
  Source:
  COES, 2014. Sub Dirección de Gestión de la Información. RA-SGI-0115. ESTADISTICA RELEVANTE DEL SISTEMA ELÉCTRICO INTERCONECTADO NACIONAL, 2014. Retrieved online from http://www.coes.org.pe/Portal/Publicaciones/Estadisticas/ 2014/PDF/08_PRODUCCION CON RECURSOS RENOVABLES DEL SEIN,CUADRO N° 8.2 POR TIPO DE GENERACIÓN CON RER, 2014 and CUADRO N° 8.4 D PRODUCCIÓN DE ENERGÍA ELÉCTRICA DE CENTRALES CON RECURSOS ENERGÉTICOS RENOVABLES DE ORIGEN EÓLICO 2014 - GW.h. 22 august 2017.
  OSINERGMIN, 2015. CENTRALES DE GENERACIÓN ELÉCTRICA ‐ EN OPERACIÓN, (Inversiones en Concesiones / Autorizaciones Otorgadas por el Ministerio de Energía y Minas desde el Año 1996). Retrieved online https://www.osinergmin.gob.pe/seccion/centro_documental/electricidad/Documentos/PROYECTOS%20GFE/Generaci%C3%B3n/2-EN-OPERACION.pdf, 25 January 2017.
- distance: 200 km; lognormal variance with pedigree 0.1016, pedigree (4,5,5,4,4)
  Estimation taken from the peruvian dataset, electricity production, wind, >3MW turbine, onshore, PE, 2008-2008, accesded November 2017. Maintenance transport to the power plant. One person travels two times per year over a distance of 200 km each time, one time for check only with a car, one time for change of the lubricating oil with a lorry.
  Uncertainty: estimated variance. High uncertainty.
- gross electricity production 2014: 2.5892e8 kWh; name gross_electricity_production_2014_1
  Literature value. Total wind electricity production in Peru in the year 2014.
  Source:
  Comité de Operación Económica del Sistema Interconectado Nacional (COES), Estadísticas de Operación 2014. Pag 5 Cuadro N° 4. URL: <http://www.coes.org.pe/dataweb/2004/dtr/estadistica/anual/ProduccionElectricidad/FactPlanta.htm> accessed on november of 2017.
- losses from gross electricity production: 0.01 dimensionless; name gross_net_electricity; lognormal variance with pedigree 0.0113, pedigree (3,3,1,3,3)
  Estimation as reported in electricity production, wind, >3MW turbine, onshore, PE, 2008-2008, accessed in November, 2017. The factor for the loss of electricity from gross to net electricity production is an assumption based on experiences, statistics and expertise (1% losses for wind).
- share of wind turbine 2 MW in 1-3 MW class: 1 dimensionless; name share_turbine_2MW; lognormal variance with pedigree 0.2106, pedigree (5,5,5,5,5)
  Parameter introduced for possible extension of this dataset with wind turbines with other capacities. This was taken from peruvian dataset, electricity production, wind, >3MW turbine, onshore, PE, 2008-2008, accesded November 2017.
  Uncertainty: Uncertainty accounting for the extrapolation of using only a 2 MW wind turbine as a representative for the whole 1-3 MW wind turbine class.
- use of lubricating oil for maintenance: 157.5 kg; name lubricating_oil_maintenance; = 63*(2/0.8); lognormal variance with pedigree 0.0912, pedigree (4,4,5,4,4)
  Estimation of the use of maintenance lubricating oil per year, extrapolated from the 800 kW turbine in (Burger & Bauer 2007) (63 kg per year) with the rate of capacities, as reported in the dataset: electricity production, wind, >3MW turbine, onshore, PE, 2008-2008, accesded November 2017.
  Uncertainty: estimated variance. Extrapolation factor very rough.

## Reference product
- electricity, high voltage: 1 kWh; By-product classification allocatable product; CPC 17100: Electrical energy; HS2017 271600: Electrical energy
  production volume 1.70879e9 kWh; name APV_electricity; = percentage_class_onshore* gross_electricity_production_2014_1
    The production data was calculated from statistical reports of the following 3 wind power plants in Peru (Cupisnique, Marcona, Talara). (COES, 2014)
    Sources:
    COES, 2014. Sub Dirección de Gestión de la Información. RA-SGI-0115. ESTADISTICA RELEVANTE DEL SISTEMA ELÉCTRICO INTERCONECTADO NACIONAL, 2014. Retrieved online from http://www.coes.org.pe/Portal/Publicaciones/Estadisticas/ 2014/PDF/08_PRODUCCION CON RECURSOS RENOVABLES DEL SEIN,CUADRO N° 8.2 POR TIPO DE GENERACIÓN CON RER, 2014 and CUADRO N° 8.4 D PRODUCCIÓN DE ENERGÍA ELÉCTRICA DE CENTRALES CON RECURSOS ENERGÉTICOS RENOVABLES DE ORIGEN EÓLICO 2014 - GW.h. 22 august 2017.
  property price 0.0977 EUR2005
    Temporary price data. Calculated as 90% of purchasers price based on: 94% of the average price (to account for a 6% loss in transformation and transmission) for electricity for industrial consumersin 2005 (excluded taxes). From IEA.
  properties: carbon allocation 0 kg, carbon content 0

## Inputs from technosphere
- lubricating oil: 4.4436e-5 kg; name lubricating_oil; = lubricating_oil_maintenance*lifetime/(lifetime*(capacity_MW*1000)*wind_load_hours); lognormal variance with pedigree 0.002, pedigree (1,1,3,1,1)
  Calculated value/Estimation. Estimated consumption of 157.5 kg lubrication oil per year, extrapolated from the 800 kW turbine in (Burger & Bauer 2004) with the rate of capacities are assumed for maintainance.
  properties: carbon content, fossil 0.75, dry mass 1 kg, heating value, net 40.2 MJ, wet mass 1 kg
  note on carbon content, fossil: Lubricating oil is produced from diesel. C-content/dry mass of fats and oils considered 75%, from: ecoinvent v2.2 report, n 15a, pg 40
  note on heating value, net: Literature value, Source: IPCC 2006, 2006 IPCC Guidelines for National Greenhouse Gas Inventories, Prepared by the National Greenhouse Gas Inventories Programme, Eggleston H.S., Buendia L., Miwa K., Ngara T. and Tanabe K. (eds). Published: IGES, Japan
- transport, freight, lorry 7.5-16 metric ton, EURO3: 2.50738e-12 metric ton*km; = ((lubricating_oil/1000)/2)*(distance*2*lifetime/(lifetime*(capacity_MW*1000)*wind_load_hours))
  Calculated value. Two maintenance transports to the power plant with 200 km each. Once a year, the lubricating oil is transported and changed.
- waste mineral oil: -4.4436e-5 kg; name waste_min_oil_10; = lubricating_oil
  Calculated value. The same amount as lubricating oil use.
  production volume; = waste_min_oil_10* APV_electricity
    Calculated from production volume of reference product using the relative outputs.
  properties: carbon content, fossil 0.864444, dry mass 0.9 kg, heating value, net 34.7 MJ, water content 0.111111, wet mass 1 kg
  note on carbon content, fossil: Tab A.6, ecoinvent v2.2 report 13_I. C content has been calculated after data in the tables, and then referred to 1 kg DM
  note on heating value, net: Value taken from the general comment of the treatment dataset.
- wind turbine network connection, 2MW, onshore: 1.41067e-8 unit; = (1/(lifetime*(capacity_MW*1000)*wind_load_hours))* share_turbine_2MW; lognormal variance with pedigree 0.227, pedigree (5,5,5,5,5)
  Calculated value
  properties: lifetime 20 year
  note on lifetime: Estimation/literature value. Today, wind turbine producers often use a lifetime of 20 years for all parts of the wind turbine in their financial calculataions, even if it can be assumed that the foundation could have a longer lifetime.
- wind turbine, 2MW, onshore: 1.41067e-8 unit; = (1/(lifetime*(capacity_MW*1000)*wind_load_hours))* share_turbine_2MW; lognormal variance with pedigree 0.227, pedigree (5,5,5,5,5)
  Calculated value
  property capacity [MW] 2 MW; name capacity_MW
  property lifetime 20 year; name lifetime

## Inputs from nature
- Energy, kinetic (in wind), converted [natural resource, in air]: 3.87 MJ

## Sampling procedure
Statistics reports and literature calculations for three plants in Peru that represent 100% of wind power production. These are: Cupisnique, Marcona, Talara (COES, 2014).

## Extrapolations
The reference dataset used was electricity production, wind, 1-3MW turbine, onshore, label-certified, GLO, 2010-2015, accessed in November, 2017. Parameters such as annual electricity production volume, installed capacity and wind load hours were adapted to regionalize the dataset to Peruvian conditions in year 2014.

## Review by Christopher Oberschelp 2018-01-16
Documentation, key values and data format seem reasonable. Individual deviations may be spotted by comparison with reference datasets. Uncertainties might have to be adjusted later (as agreed upon with ecoinvent).
