# heat pump production, 30kW

Dataset: EcoSpold 2, unit process
Geography: RER
Time period: 1990-01-01 to 2023-12-31
Technology level: current
Classification: EcoSpold01Categories: heat pumps/production of components
Classification: ISIC rev.4 ecoinvent: 2815:Manufacture of ovens, furnaces and furnace burners
Tags: ConvertedDataset
Scenario: Business-as-Usual
System model: Allocation, cut-off by classification
Share of production covered: 0 %
Generated by: Thomas Heck
Published in: Heck, T. 2007
Database: ecoinvent
isCopyrightProtected: true
accessRestrictedTo: 1

## General comment
This dataset represents a 30 kW heat pump unit. Data is extrapolated from a brine-water heat pump for a one family house in Switzerland with a heat capacity of 10 kW. Life time of the heat pump is assumed to be 20 years.
This dataset represents a 30 kW heat pump unit for European conditions. Data is extrapolated from a brine-water heat pump for a one family house in Switzerland with a heat capacity of 10 kW. Life time of the heat pump is assumed to be 20 years.

## Included activities start
From reception of brine water heat pumps at the factory gate.

## Included activities end
This activity ends with a 30 kW heat pump unit with a lifetime of 20 years. The dataset includes emissions caused by refrigerating agent leakages during production process and the disposal of plastic. R134a as refrigerating agent is included. This dataset does not inlcude emissions caused during operation.

## Geography
This dataset is based on a 10 kW heat pump unit operated in Switzerland and extrapolated to European conditions.

## Technology
Brine-water heat pumps use geothermal energy by extracting the heat stored in the ground with a borehole heat exchanger. Borehole heat exchangers basically consist of coaxial or U-shaped polyethylene tubes and are installed vertically in the soil, usually at a depth of 50 up to 250 meters. Thereby the soil serves as heat source. The heat is withdrawn from the soil through a closed-loop system situated in the tube and is fed to the heat pump. As heat-conveying fluid, i.e. brine, in the majority of cases water is used compounded with 25 % to 35% of antifreezing agent. The heat pump then transforms the heat through a second circuit to an appropriate temperature level for low-temperature heating systems. Brine-water heat pumps are more expensive but have a higher annual coefficient of performance compared to air-water heat pumps, i.e. high quality energy is used in a more efficient way. According to Lovvorn and Hess life time of the heat pump is 20 years.
References:
Brunner M. und Gorhan L.: GEOTHERMIE - DIE UMWELTSCHONENDE ENERGIE. http://www.geothermal-energy.ch/downloads/umweltsch-dt.PDF.
Lovvorn, N.C. (2001). Reliability and Lifetime of Residential Heat Pumps. Paper. Proceedings of Joint HPC and IPUHPC Workshop “Hands-On Experience with Heat Pumps for Buildings,” 10-11 October 2001. Arnhem, The Netherlands. CD-ROM: “Hands-On Experience with Heat Pumps for Buildings,” Workshop Report HPC-WR-23. IEA Heat Pump Centre. Sittard, The Netherlands.
Lovvorn, N.C. (2001). Reliability and Lifetime of Residential Heat Pumps. Power Point Presentation. CD-ROM: “Hands-On Experience with Heat Pumps for Buildings,” Workshop Report HPC-WR-23. IEA Heat Pump Centre. Sittard, The Netherlands.
Persönliche Mitteilung Herr Hess, Firma: Polydynamics Ltd., Zürich, Juli 1993.

## Reference product
- heat pump, 30kW: 1 unit; By-product classification allocatable product; CPC 43913: Refrigerating and freezing equipment and heat pumps, except household type equipment; HS2017 841861: Heat pumps; other than air conditioning machines of heading no. 8415
  EcoSpold01Location=RER
  production volume 1.32237 unit
    This is a placeholder value that does not reflect real-world production volumes. This dataset does not currently require a real-world production volume to work in the database framework, and no actual data were collected yet. This has no negative effect on the results of the ecoinvent database. The placeholder value of this activity was scaled according to the nominal GDP of 2005 (source: United Nations, http://data.un.org/Glossary.aspx?q=GDP+%28current+US%24%29, accessed 20130726) to reflect an appropriate share of the global production volume, which is also a placeholder value.
  property price 1569 EUR2005
    Calculated based on inputs: The price of the product has been calculated as a sum of the values of the material and energy inputs for this product. This value is therefore a rough estimation. It may underestimate the real price since there are additional expenses when producing any product. These expences can include for example labour costs, treatment of waste materials and profit for the producer. Please consider carefully whether this level of data quality is acceptable for your application.
  properties: carbon allocation 0 kg, carbon content 0

## Inputs from technosphere
- heat pump, brine-water, 10kW: 3 unit; lognormal variance with pedigree 0.04, pedigree (1,1,5,1,1)
  EcoSpold01Location=CH
  Estimation. Extrapolation/scaling by mass and capacity.

## Sampling procedure
Literature, manufacturer information

## Extrapolations
For this dataset a brine-water heat pump for Swiss conditions with a heat capacity of 10 kW was extrapolated to a heat pump with a heat capacity of 30 kW for European conditions.

## Review by Gerald Rebitzer (obsolete) 2004-04-02
prepared

## Review by Roland Hischier 2011-09-22
Transfer of documentation done.
