# rolling mill production

Dataset: EcoSpold 2, unit process
Geography: RER
Time period: 2002-01-01 to 2023-12-31
Technology level: current
Classification: EcoSpold01Categories: metals/processing
Classification: ISIC rev.4 ecoinvent: 2823:Manufacture of machinery for metallurgy
Tags: ConvertedDataset
Scenario: Business-as-Usual
System model: Allocation, cut-off by classification
Share of production covered: 0 %
Generated by: Silvio Blaser
Published in: Classen M. 2009
Database: ecoinvent
isCopyrightProtected: true
accessRestrictedTo: 1

## General comment
The values for plant area were taken from a map recieved during the visit to a electro-steel manufacturing and forming plant in Gerlafingen, Switzerland. The output was 616000 tonnes of formed steel in 2002. The Lifetime is assumed to be 50 years for infrastructure like buildings and routes, and 25 years for machinery and furnaces
[This dataset was already contained in the ecoinvent database version 2. It was not individually updated during the transfer to ecoinvent version 3. Life Cycle Impact Assessment results may still have changed, as they are affected by changes in the supply chain, i.e. in other datasets. This dataset was generated following the ecoinvent quality guidelines for version 2. It may have been subject to central changes described in the ecoinvent version 3 change report (http://www.ecoinvent.org/database/ecoinvent-version-3/reports-of-changes/), and the results of the central updates were reviewed extensively. The changes added e.g. consistent water flows and other information throughout the database. The documentation of this dataset can be found in the ecoinvent reports of version 2, which are still available via the ecoinvent website. The change report linked above covers all central changes that were made during the conversion process.]

## Included activities start
The activity starts with the transformation of unspecified land to industrial area.

## Included activities end
Includes land occupation data for and land transformation data to buildings, asphalted and green surroundings; land transformation data from unknown; the buildings; company internal roads, parking lots etc.; the main material of which the machinery is composed and their disposal.

## Geography
The visited plant is in the range of size typicall for european union (about a quarter of the maximal size). Data-set is representative for European Union

## Technology
The visited plant produces hot rolled merchant bars, wire rod, concrete reinforcing bars, mats and cold rolled topar-S, topar-Rc and topar-Rs

## Reference product
- rolling mill: 1 unit; By-product classification allocatable product; CPC 44310: Converters, ladles, ingot moulds and casting machines, of a kind used in metallurgy or in metal foundries; met[…]; HS2017 845521: Metal-rolling mills; hot or combination hot and cold rolling mills
  EcoSpold01Location=RER
  production volume 810 unit
    No data available
    Estimated from 1.5E11 kg sheet rolled and 3E11 kg hot rolled and 0.5E11 kg wire drawn products and 1.62E-9 units per kg
  property price 1.65748e6 EUR2005
    Upscale from EU 27 to the world by PPP (0.8458 in 2003 and 0,8426 in 2004)
  properties: carbon allocation 0 kg, carbon content 0

## Inputs from technosphere
- building, hall, steel construction: 73.5 m2; lognormal variance with pedigree 0.3661, pedigree (4,5,5,3,1)
  EcoSpold01Location=CH
- building, multi-storey: 40 m3; lognormal variance with pedigree 0.3661, pedigree (4,5,5,3,1)
  activityLink introduced to establish a direct link to the corresponding regional supply of this product
  EcoSpold01Location=RER
- concrete, normal strength: 16.1986, 8.90135 m3 (2 suppliers, which the file names only by identifier); sum of these 25.1 m3; lognormal variance with pedigree 0.0661, pedigree (4,5,5,3,1)
  EcoSpold01Location=CH
  properties: dry mass 2190 kg, water content 0.086758, wet mass 2380 kg
- steel, low-alloyed: 57700 kg; lognormal variance with pedigree 0.0661, pedigree (4,5,5,3,1)
  EcoSpold01Location=RER
  properties: carbon content, fossil 0.005, dry mass 1 kg, wet mass 1 kg
  note on carbon content, fossil: Low alloyed steel composition given in Tab. 3.2 ecoinvent v2.2 report 10_partII. Steel assumed to have a C content of 0.5%
- waste concrete, not reinforced: -57095, -604.965 kg (2 suppliers, which the file names only by identifier); sum of these -57700 kg; lognormal variance with pedigree 0.0261, pedigree (4,5,1,3,1)
  EcoSpold01Location=CH
  production volume
    Calculated from the production volume of rolling mill in proportion to the respective output amounts.
  properties: dry mass 1 kg, wet mass 1 kg

## Inputs from nature
- Occupation, industrial area [natural resource, land]: 15461 m2*year; lognormal variance with pedigree 0.1061, pedigree (4,5,5,3,1)
- Transformation, from unspecified [natural resource, land]: 310 m2; lognormal variance with pedigree 0.1861, pedigree (4,5,5,3,1)
- Transformation, to industrial area [natural resource, land]: 310.1 m2; lognormal variance with pedigree 0.1861, pedigree (4,5,5,3,1)

## Sampling procedure
plant map and estimation

## Extrapolations
see technology and geography

## Review by Roland Hischier 2003-06-17
Passed.
