# selective coating, copper sheet, physical vapour deposition

Dataset: EcoSpold 2, unit process
Geography: DE
Time period: 1997-01-01 to 2023-12-31
Technology level: current
Classification: EcoSpold01Categories: metals/refinement
Classification: ISIC rev.4 ecoinvent: 2592:Treatment and coating of metals; machining
Synonyms: TINOX
Tags: ConvertedDataset
Scenario: Business-as-Usual
System model: Allocation, cut-off by classification
Share of production covered: 0 %
Generated by: Niels Jungbluth
Published in: Althaus H.-J. 2000
Database: ecoinvent
isCopyrightProtected: true
accessRestrictedTo: 1

## General comment
Inventory for selective coatings of solar absorbers.
[This dataset was already contained in the ecoinvent database version 2. It was not individually updated during the transfer to ecoinvent version 3. Life Cycle Impact Assessment results may still have changed, as they are affected by changes in the supply chain, i.e. in other datasets. This dataset was generated following the ecoinvent quality guidelines for version 2. It may have been subject to central changes described in the ecoinvent version 3 change report (http://www.ecoinvent.org/database/ecoinvent-version-3/reports-of-changes/), and the results of the central updates were reviewed extensively. The changes added e.g. consistent water flows and other information throughout the database. The documentation of this dataset can be found in the ecoinvent reports of version 2, which are still available via the ecoinvent website. The change report linked above covers all central changes that were made during the conversion process.]

## Included activities start
The activity starts with the sheet entering the process. The material on which this activity is applied it is not included as input.

## Included activities end
Gate to gate inventory for the process including infrastructure, excluding process specific emissions. Not including eventual pre-treatment of copper sheets by supplier, packages, wastes.

## Geography
Production plant in DE.

## Technology
TINOX (titanium-nitrite-oxide) PVD process.

## Time period
Environmental report.

## Parameters
- fraction, process water, to air: 0.15 dimensionless; name fraction_PW_to_air; lognormal variance with pedigree 0.092025, pedigree (4,4,3,2,4)
  Literature value. In case when no industry/process specific data are available, default evaporation fraction value is used. This value is 15% and is based on literature (Statistics Canada, 2007 & Shaffer, K.H., 2008, Consumptive water use in the Great Lakes Basin, USGS & Shiklomanov, 2003, World Water Resources at the Beginning of the 21st Century) and has been approved by an expert.

## Reference product
- selective coat, copper sheet, physical vapour deposition: 1 m2; By-product classification allocatable product; CPC 88731: Metal treatment and coating services
  EcoSpold01Location=DE
  production volume 200000 m2
    Data for the only known company.
    According to Ecoinvent v.2 report 10, section 8.2 the total market for selective coatings in the EU is estimated to be 1.2 Mio. m2 per year. Equally distributed over the 6 types of 'selective coating'. Here assumed all of this takes place in DE.
  property price 0.24986 EUR2005
    Calculated based on inputs: The price of the product has been calculated as a sum of the values of the material and energy inputs for this product. This value is therefore a rough estimation. It may underestimate the real price since there are additional expenses when producing any product. These expences can include for example labour costs, treatment of waste materials and profit for the producer. Please consider carefully whether this level of data quality is acceptable for your application.
  properties: carbon allocation 0 kg, carbon content 0

## Inputs from technosphere
- electricity, medium voltage: 1.2 kWh; lognormal variance with pedigree 0.0408, pedigree (2,2,5,3,1)
  Public information. Electricity use for the process.
  EcoSpold01Location=DE
  Uncertainty: Public information. Electricity use for the process.
- lubricating oil: 1.68e-5 kg; lognormal variance with pedigree 0.0408, pedigree (2,2,5,3,1)
  Public information.
  EcoSpold01Location=RER
  Uncertainty: Public information.
  properties: carbon content, fossil 0.75, dry mass 1 kg, heating value, net 40.2 MJ, wet mass 1 kg
  note on carbon content, fossil: Lubricating oil is produced from diesel. C-content/dry mass of fats and oils considered 75%, from: ecoinvent v2.2 report, n 15a, pg 40
  note on heating value, net: Literature value, Source: IPCC 2006, 2006 IPCC Guidelines for National Greenhouse Gas Inventories, Prepared by the National Greenhouse Gas Inventories Programme, Eggleston H.S., Buendia L., Miwa K., Ngara T. and Tanabe K. (eds). Published: IGES, Japan
- metal coating facility: 3.33e-7 unit; lognormal variance with pedigree 0.628, pedigree (5,5,5,1,5)
  Estimation
  EcoSpold01Location=RER
  Uncertainty: Estimation
- nitrogen, liquid: 0.00182 kg; lognormal variance with pedigree 0.1361, pedigree (5,5,5,3,3)
  Estimation
  EcoSpold01Location=RER
  Uncertainty: Estimation
  properties: dry mass 1 kg, wet mass 1 kg
- oxygen, liquid: 0.000909 kg; lognormal variance with pedigree 0.1361, pedigree (5,5,5,3,3)
  Estimation
  EcoSpold01Location=RER
  Uncertainty: Estimation
  properties: dry mass 1 kg, wet mass 1 kg
- silica sand: 0.00089 kg; lognormal variance with pedigree 0.0408, pedigree (2,2,5,3,1)
  Public information.
  EcoSpold01Location=DE
  Uncertainty: Public information.
  properties: dry mass 0.99 kg, water content 0.010101, wet mass 1 kg
- titanium dioxide: 0.001 kg; lognormal variance with pedigree 0.0408, pedigree (2,2,5,3,1)
  EcoSpold01Location=RER
  Titanium nitrite oxide
  Uncertainty: Titanium nitrite oxide
  properties: dry mass 1 kg, wet mass 1 kg

## Inputs from nature
- Water, unspecified natural origin [natural resource, in water]: 0.007236 m3; name water_UNO_input; source NREL - National Renewable Energy Laborat 2005; lognormal variance with pedigree 0.052625, pedigree (3,3,5,2,1)
  Calculated based on literature, (Vionnet, S., Quantis Water Database - Technical Report, 2012). The process starts when untreated surface enters the coating plant. It includes the processes: pre-treatment (cleaning) and coating itself. The source presents data on general "Automotive painting, electrocoating, per m2", without specification of what kind of surface is being coated and what kind of coat is used. It is assumed (expert opinion) that this data are more likely to be right then the original - ecoivent values.
  property carbon content, fossil 0.0104329; name C_content_fossil
  property carbon content, non-fossil 0; name C_content_non_fossil
  property dry mass 0.1101 kg; name DM
  property water content 9081.65; name water_content
  property water in wet mass 999.89 kg; name WWM
  property wet mass 1000 kg; name WM

## Emissions to nature
- Water [air, unspecified]: 0.0010854 m3; name water_to_air_unspecified; = (water_UNO_input*fraction_PW_to_air); lognormal variance with pedigree 0.0807, pedigree (2,2,5,1,1)
  Calculated value based on literature values and expert opinion. See comments in the parametres' comment field.
  property fraction, origin: fresh water 0; name fraction_origin_fresh_water
  property fraction, origin: salt water 0; name fraction_origin_salt_water
  property fraction, origin: unspecified 1; name fraction_origin_unspecified
- Water [water, unspecified]: 0.0061506 m3; name water_to_water_unspecified; = water_UNO_input*(1-fraction_PW_to_air); lognormal variance with pedigree 0.0807, pedigree (2,2,5,1,1)
  (same comment as for Water)
  property fraction, origin: fresh water 0; name fraction_origin_fresh_water_Ww
  property fraction, origin: salt water 0; name fraction_origin_salt_water_Ww
  property fraction, origin: unspecified 1; name fraction_origin_unspecified_Ww

## Sampling procedure
Publication.

## Review by Hans-Jörg Althaus 2003-05-22
passed
