# soap production

Dataset: EcoSpold 2, unit process
Geography: RoW
Time period: 1992-01-01 to 2023-12-31
Technology level: current
Classification: ISIC rev.4 ecoinvent: 2023:Manufacture of soap and detergents, cleaning and polishing preparations, pe
Scenario: Business-as-Usual
System model: Allocation, cut-off by classification
Share of production covered: 60 %
Generated by: Rainer Zah
Published in: Zah R. 2007
Database: ecoinvent
isCopyrightProtected: true
accessRestrictedTo: 1

## General comment
This dataset represents the production of 1 kg of soap from coconut and palm oil. Soap is one of the oldest surfactants having been widely used since ancient times. It essentially contains the soluble sodium salt of fatty acid CnH2n+1COONa and is produced by neutralisation of the fatty acid, usually with caustic soda. The fatty acid in soap comprises a range of chain lengths stemming from the basic oleochemical feedstocks; principally animal (tallow) or vegetable (palm, palm kernel, coconut). Modern soap production largely entails manufacturing of a blend of materials in order to achieve the required performance. The majority of soaps (90%) are produced by a combined saponification and neutralisation process performed on a blend of oleochemical feedstocks comprised of short chain (C12-14, derived from coconut or palm kernel oil) and long chain (C16-18, from tallow or palm oil) esters.
Soap is used primarily for the production of toilet soaps that are used for body cleansing and personal hygiene. In detergents, soap is often used as a foam regulator.
In this dataset, the ratio of coconut (short chain fatty acids) to palm oil (long chain fatty acids) is assumed to be 20:80 and the moisture content is 13%. Material and energy inputs are from literature sources. The water exchanges are estimated based on data from a large chemical plant (Gendorf 2016). Waste production and emissions to air and water are calculated based on literature sources.
Flow diagram of the production of soap:
References:
Zah R., Hischier R. (2007) Life Cycle Inventories of Detergents. ecoinvent report No. 12. Swiss Centre for Life Cycle Inventories, Dübendorf, 2007
Gendorf (2016) Umwelterklärung 2015, Werk Gendorf Industriepark, www.gendorf.de.

## Included activities start
From reception of precursors coconut oil, palm oil, fatty acids from vegetable oil, NaOH, and NaCl at the factory gate.

## Included activities end
This activity ends with 1 kg of soap. The dataset includes material and energy inputs, infrastructure, waste production, and emissions (although unspecified metal emissions to water are omitted).

## Geography
The data are based on the European fatty alcohol sulfonate production but are assumed to be representative of the global production. Some values are based on data from a large chemical factory located in Germany. These are assumed to be valid for this geography.

## Technology
The majority of soaps (90%) are produced by a combined saponification and neutralisation process performed on a blend of oleochemical feedstocks comprised of short chain (C12-14, derived from coconut or palm kernel oil) and long chain (C16-18, from tallow or palm oil) esters. It's an average technology typical for European production mix in the mid 90s.
Reference:
Zah R., Hischier R. (2007) Life Cycle Inventories of Detergents. ecoinvent report No. 12. Swiss Centre for Life Cycle Inventories, Dübendorf, 2007

## Time period
Date of published literature. Some values are based on data published by the Gendorf factory that were collected between 2011 and 2015. The time period has been adjusted accordingly. For more details, see the comments of the exchanges.

## Reference product
- soap: 1 kg; name RP; By-product classification allocatable product; CPC 35321: Soap; organic surface-active products and preparations for use as soap; paper, wadding, felt and nonwovens, im[…]; HS2017 340111: Soap and organic surface-active products; in the form of bars, cakes, moulded shapes, and paper, wadding, f[...]
  Soap is one of the oldest surfactants having been widely used since ancient times. It essentially contains the soluble sodium salt of fatty acid
  CnH2n+1 COO Na
  and is produced by neutralisation of the fatty acid, usually with caustic soda. The fatty acid in soap comprises a range of chain legths stemming from the basic oleochemical feedstocks; principally animal (tallow) or vegetable (palm, palm kernel, coconut).
  production volume 6.65382e8 kg; name RP_PV
    Calculated based on literature value and estimates. In EU and USA app. 9.5E+8 kg of glycerin is produced annually (http://www.biodieselmagazine.com/articles/377/a-glycerin-factor/, accessed 20130322). This value is scaled to GLO production by using GDP (EU+USA=2.70E+13/GLO=5.65E+13) (International Monetary Fund, 2005). It is estimated, that 50% of this production volume is produced via this activity.
  property carbon content, fossil 0
    Soap (CnH2n+1 COO Na) is produced by a combined saponification and neutralisation process performed on a blend of oleochemical feedstocks comprised of short chain (C12-14, derived from coconut or palm kernel oil) and long chain (C16-18, from tallow or palm oil) esters.The ratio of short to long fatty acid chains is 20:80 (ecoinvent v2.2 report 12). Short fatty acid has been estimated as C12.5H(2*12.5+1); MW R=176 g/mol. Long fatty acid has been estimatedas C16H(2*16+1); MW R=225 g/mol. MW of COONa=67 g/mol
  property carbon content, non-fossil 0.692237
    Soap (CnH2n+1 COO Na) is produced by a combined saponification and neutralisation process performed on a blend of oleochemical feedstocks comprised of short chain (C12-14, derived from coconut or palm kernel oil) and long chain (C16-18, from tallow or palm oil) esters.The ratio of short to long fatty acid chains is 20:80 (ecoinvent v2.2 report 12). Short fatty acid has been estimated as C12.5H(2*12.5+1); MW R=176 g/mol. Long fatty acid has been estimated as C16H(2*16+1); MW R=225 g/mol. MW of COONa=67 g/mol
  property heating value, net 17.93 MJ
    LHV is calculated based on the Carbon content of the product. More details can be found on the respective documentation.
  property price 1.73 EUR2005
    According to Industrial Commodity Statistics Yearbook 2005, volume 1. Physical Quantity Data. UN. New York 2008 (hard copy ). The price is for the highest producing country in EU27 where the data are present (Italy) and soap; paper, wadding, and similar, covered with soap or detergent. US$ converted to according to http://en.wikipedia.org/wiki/Table_of_historical_exchange_rates downloaded 30 June 2009.
  properties: carbon allocation 0.602247 kg, carbon content 0.692237, dry mass 0.87 kg, water content 0.149425, water in wet mass 0.13 kg, wet mass 1 kg

## Inputs from technosphere
- chemical factory, organics: 4e-10 unit; lognormal variance with pedigree 0.31, pedigree (2,3,2,4,3)
  Calculated based on literature data published by the industry. For this activity, no information was readily available concerning infrastructure and land-use. Therefore, the infrastructure is estimated based on data from two chemical factories, the BASF site of Ludwigshafen and the chemical factory in Gendorf (which are both located in Germany), which produce a wide range of chemical substances. Based on this data, the following assumptions are made: the built area amounts to about 4.2 ha, the plant has an average output of 50'000 t/a and a lifespan of fifty years. The estimated infrastructure amount is therefore 4.00 E-10 units per kg of produced chemical.
  References:
  Althaus H.-J., Chudacoff M., Hischier R., Jungbluth N., Osses M. and Primas A. (2007) Life Cycle Inventories of Chemicals. ecoinvent report No. 8, v2.0. EMPA Dübendorf, Swiss Centre for Life Cycle Inventories, Dübendorf, CH.
  Gendorf (2000) Umwelterklärung 2000, Werk Gendorf. Werk Gendorf, Burgkirchen.
- coconut oil, crude: 0.139 kg; source Dall'Acqua S. 1995; lognormal variance with pedigree 0.0312, pedigree (2,3,4,5,1)
  Literature source.
  properties: carbon content, non-fossil 0.75, dry mass 1 kg, heating value, net 38.4 MJ, wet mass 1 kg
  note on carbon content, non-fossil: C-content/dry mass of fats and oils considered 75%, from: 'Evolutionary and Biochemical Aspects', A.D. Kay and T. Vrede (in Global Ecology, 2010, Elsevier B.V., S.E. Jørgensen Ed.)
  note on heating value, net: Values is approximated from HHV from "vegetable oil, crude". Source: Radovanovic,M.; Zivanovic,T.; Stojiljkovic,D.; Jovanovic,V.; Jerinic,N.; Knezevic,S. et.al. Utilization of sunflower husk as a fuel for industrial boilers - 20 years experience. Proc. 5th Eur. Conf. on Industrial Furnaces&Boilers 2000,vol.2,p.221-233. Available at: https://phyllis.nl/Biomass/View/2152
- electricity, medium voltage: 0.00166076, 0.0331285, 0.0111311, 0.000508583, 0.000101792, 2.18571e-5, 0.00342103 kWh (7 suppliers, which the file names only by identifier); sum of these 0.0499736 kWh; source Dall'Acqua S. 1995; lognormal variance with pedigree 0.0312, pedigree (2,3,4,5,1)
  Literature source.
- fatty acid: 0.016 kg; source Dall'Acqua S. 1995; lognormal variance with pedigree 0.0312, pedigree (2,3,4,5,1)
  Literature source.
  properties: carbon content, non-fossil 0.75, dry mass 1 kg, heating value, net 22.73 MJ, wet mass 1 kg
  note on carbon content, non-fossil: C-content/dry mass of fats and oils considered 75%, from: ecoinvent v2.2 report, n 15a, pg 40
- heat, district or industrial, natural gas: 0.0481644, 2.93104 MJ (2 suppliers, which the file names only by identifier); sum of these 2.9792 MJ; lognormal variance with pedigree 0.0312, pedigree (2,3,4,5,1)
  properties: heating value, net 1 MJ
- heat, district or industrial, other than natural gas: 1.66209, 0.000770017 MJ (2 suppliers, which the file names only by identifier); sum of these 1.66286 MJ; lognormal variance with pedigree 0.0312, pedigree (2,3,4,5,1)
  properties: heating value, net 1 MJ
- inert waste, for final disposal: -0.00239 kg; name BP_inert_waste_for_final_disposal; source Dall'Acqua S. 1995; lognormal variance with pedigree 0.0252, pedigree (2,3,3,5,1)
  Literature source.
  production volume; = RP_PV*BP_inert_waste_for_final_disposal/ABS(RP)
    Calculated from the production volume of soap in proportion to the respective output amounts.
  properties: dry mass 0.995 kg, water content 0.00502513, wet mass 1 kg
- palm oil, crude: 0.614 kg; source Dall'Acqua S. 1995; lognormal variance with pedigree 0.0312, pedigree (2,3,4,5,1)
  Literature source.
  properties: carbon content, non-fossil 0.752881, dry mass 1 kg, heating value, net 37 MJ, wet mass 1 kg
  note on carbon content, non-fossil: C49H97O6. Palm oil (tab 17.4, ecoinvent v2.2 report 17-part 17)
  note on heating value, net: Literature value, Source: Biograce, Condensed list of standard values, version 2 - Public. Available at: https://biograce.net/app/webroot/files/file/BioGrace_condensed_list_of_standard_values_-_version_2_-_Public.doc
- sodium chloride, powder: 0.005 kg; source Dall'Acqua S. 1995; lognormal variance with pedigree 0.0312, pedigree (2,3,4,5,1)
  Literature source.
  properties: dry mass 1 kg, wet mass 1 kg
- sodium hydroxide, without water, in 50% solution state: 0.119 kg; source Dall'Acqua S. 1995; lognormal variance with pedigree 0.0312, pedigree (2,3,4,5,1)
  Literature source.
  properties: dry mass 1 kg, heating value, net 3.03 MJ, wet mass 1 kg
- tap water: 5.28156e-5, 8.05128e-5, 0.000150233, 0.000404717, 4.8717e-5, 0.00203022, 0.0232328 kg (7 suppliers, which the file names only by identifier); sum of these 0.026 kg; lognormal variance with pedigree 0.0106, pedigree (2,3,2,4,3)
  Calculated based on literature data published by the industry. This value is a 5-year average of data (2011 - 2015) published by the Gendorf factory (Gendorf, 2016, Umwelterklärung, www.gendorf.de), (Gendorf, 2015, Umwelterklärung, www.gendorf.de), (Gendorf, 2014, Umwelterklärung, www.gendorf.de). The amount of tap water per kg of chemical substance produced is calculated using literature data published by the Gendorf factory based in Germany, which produces a wide range of chemical substances. The factory produced 1657400 tonnes of chemical substances in the year 2015 (Gendorf, 2016, Umwelterklärung, www.gendorf.de) and 740000 tonnes of intermediate products. The amount of tap water consumed in the year 2015 was 55100 tonnes (Gendorf, 2016, Umwelterklärung, www.gendorf.de). The resulting amount of tap water is 0.023 kg/kg of chemical product produced. The 5-year average (2011 - 2015, weighted by production volume) is 0.026 kg/kg.
  properties: carbon content, fossil 0.00178991, dry mass 0.000337476 kg, water content 2962.17, wet mass 1 kg
  note on carbon content, fossil: Bicarbonate content is 2.93 mol/m3. CO2 content is 0.1 mol/m3 (ecoinvent v2.2 report 8, Tab 93.1).
- wastewater, average: -2.26904e-6, -8.07865e-9 m3 (2 suppliers, which the file names only by identifier); sum of these -2.27712e-6 m3; lognormal variance with pedigree 0.0452, pedigree (2,4,1,5,4)
  Calculated based on literature data published by the GENDORF Chemical Park. The factory produced an average of 2462760 tonnes of chemical substances (including intermediates) per year in the years 2015-2019. The average ouput of wastewater going to an external wastewater treatment plant in the years 2015-2019 was 5608 m3 per year. This equals 0.000002277 m3/kg chemical produced.
  References:
  Chemiepark GENDORF, Umwelterklärung 2016, https://www.gendorf.de/Nachbarn/Umweltschutz/Industrie%20und%20Nachhaltigkeit
  Chemiepark GENDORF, Umwelterklärung 2017, https://www.gendorf.de/Nachbarn/Umweltschutz/Industrie%20und%20Nachhaltigkeit
  Chemiepark GENDORF, Umwelterklärung 2020, https://www.gendorf.de/Nachbarn/Umweltschutz/Industrie%20und%20Nachhaltigkeit
  production volume; = RP_PV*BP_wastewater_average/ABS(RP)
    (same comment as for inert waste, for final disposal)
  properties: carbon content, non-fossil 0.194039, dry mass 0.346837 kg, water content 2882.2, wet mass 1000 kg
  note on carbon content, non-fossil: 0.0673 kg TOC/m3 (Tab A.17, ecoinvent v2.2 report 13_I). TOC was considered as Total Carbon.

## Inputs from nature
- Water, cooling, unspecified natural origin [natural resource, in water]: 0.014707 m3; lognormal variance with pedigree 0.0454, pedigree (2,4,2,5,4)
  Calculated based on literature data published by the GENDORF Chemical Park. The factory produced an average of 2462760 tonnes of chemical substances (including intermediates) per year in the years 2015-2019. The average amount of cooling water released in the years 2015-2019 was 34408800 t per year. It was assumed that 5% of the cooling water was emitted to air during its use, therefore, to calculate the input of cooling water, the output value reported by GENDORF was scaled up by the factor 1/0.95. This equals 0.014707 m3/kg chemical produced.
  References:
  Chemiepark GENDORF, Umwelterklärung 2016, https://www.gendorf.de/Nachbarn/Umweltschutz/Industrie%20und%20Nachhaltigkeit
  Chemiepark GENDORF, Umwelterklärung 2017, https://www.gendorf.de/Nachbarn/Umweltschutz/Industrie%20und%20Nachhaltigkeit
  Chemiepark GENDORF, Umwelterklärung 2020, https://www.gendorf.de/Nachbarn/Umweltschutz/Industrie%20und%20Nachhaltigkeit
- Water, river [natural resource, in water]: 0.000965426 m3; lognormal variance with pedigree 0.0454, pedigree (2,4,2,5,4)
  Calculated based on literature data published by the GENDORF Chemical Park. The factory produced an average of 2462760 tonnes of chemical substances (including intermediates) per year in the years 2015-2019. The average consumption of river water in the years 2015-2019 was 22000820 t per year. However, since the cooling water is modelled as an input, the amount of river water was adjusted to avoid double counting. 55% of the input amount of cooling water was deducted from the amount of river water, as that is the share of river water versus well water. This equals 0.00096543 m3/kg chemical produced.
  References:
  Chemiepark GENDORF, Umwelterklärung 2016, https://www.gendorf.de/Nachbarn/Umweltschutz/Industrie%20und%20Nachhaltigkeit
  Chemiepark GENDORF, Umwelterklärung 2017, https://www.gendorf.de/Nachbarn/Umweltschutz/Industrie%20und%20Nachhaltigkeit
  Chemiepark GENDORF, Umwelterklärung 2020, https://www.gendorf.de/Nachbarn/Umweltschutz/Industrie%20und%20Nachhaltigkeit
- Water, well, in ground [natural resource, in water]: 0.000816522 m3; lognormal variance with pedigree 0.0454, pedigree (2,4,2,5,4)
  Calculated based on literature data published by the GENDORF Chemical Park. The factory produced an average of 2462760 tonnes of chemical substances (including intermediates) per year in the years 2015-2019. The average consumption of well water in the years 2015-2019 was 18607480 t per year. However, since the cooling water is modelled as an input, the amount of well water was adjusted to avoid double counting. 45% of the input amount of cooling water was deducted from the amount of well water, as that is the share of well water versus river water. This equals 0.00081652 m3/kg chemical produced.
  References:
  Chemiepark GENDORF, Umwelterklärung 2016, https://www.gendorf.de/Nachbarn/Umweltschutz/Industrie%20und%20Nachhaltigkeit
  Chemiepark GENDORF, Umwelterklärung 2017, https://www.gendorf.de/Nachbarn/Umweltschutz/Industrie%20und%20Nachhaltigkeit
  Chemiepark GENDORF, Umwelterklärung 2020, https://www.gendorf.de/Nachbarn/Umweltschutz/Industrie%20und%20Nachhaltigkeit

## Emissions to nature
- Carbon dioxide, fossil [air, urban air close to ground]: 3.5e-5 kg; source Postlethwaite D. 1995; lognormal variance with pedigree 0.0312, pedigree (2,3,4,5,1)
  Calculated Value: calculated by comparing the aggregated emissions of Soap with the aggregated emissions of palm oil and coconut oil. Value from literature sources.
- Carbon dioxide, non-fossil [air, urban air close to ground]: 0.00635 kg; source Postlethwaite D. 1995; lognormal variance with pedigree 0.0312, pedigree (2,3,4,5,1)
  (same comment as for Carbon dioxide, fossil)
- Carbon monoxide, fossil [air, urban air close to ground]: 3.32e-6 kg; source Postlethwaite D. 1995; lognormal variance with pedigree 0.6612, pedigree (2,3,4,5,1)
  (same comment as for Carbon dioxide, fossil)
- Chlorine [air, urban air close to ground]: 6.11e-8 kg; source Postlethwaite D. 1995; lognormal variance with pedigree 0.0612, pedigree (2,3,4,5,1)
  (same comment as for Carbon dioxide, fossil)
- Mercury II [air, urban air close to ground]: 3.3e-7 kg; source Postlethwaite D. 1995; lognormal variance with pedigree 0.6612, pedigree (2,3,4,5,1)
  (same comment as for Carbon dioxide, fossil)
- Methane, fossil [air, urban air close to ground]: 0.000178 kg; source Postlethwaite D. 1995; lognormal variance with pedigree 0.0312, pedigree (2,3,4,5,1)
  (same comment as for Carbon dioxide, fossil)
- NMVOC, non-methane volatile organic compounds [air, urban air close to ground]: 4.5e-6 kg; source Postlethwaite D. 1995; lognormal variance with pedigree 0.0612, pedigree (2,3,4,5,1)
  (same comment as for Carbon dioxide, fossil)
- Particulate Matter, > 10 um [air, urban air close to ground]: 0.000151 kg; source Postlethwaite D. 1995; lognormal variance with pedigree 0.0612, pedigree (2,3,4,5,1)
  (same comment as for Carbon dioxide, fossil)
- Sulfur dioxide [air, urban air close to ground]: 1.11e-5 kg; source Postlethwaite D. 1995; lognormal variance with pedigree 0.0312, pedigree (2,3,4,5,1)
  (same comment as for Carbon dioxide, fossil)
- Water [air, unspecified]: 0.00147008 m3; lognormal variance with pedigree 0.0848, pedigree (2,4,2,5,4)
  Calculated based on literature data published by the GENDORF Chemical Park. The factory produced an average of 2462760 tonnes of chemical substances (including intermediates) per year in the years 2015-2019. To determine the emissions of water to air, the difference of all water inputs (from river, well, tap water and cooling) and outputs (wastewater, emissions to water) was calculated. The average ouput of water to air in the years 2015-2019 was 3620444 m3 per year. This equals 0.00147 m3/kg chemical produced. For more information on the other water exchanges please consult the respective exchange comment.
  References:
  Chemiepark GENDORF, Umwelterklärung 2016, https://www.gendorf.de/Nachbarn/Umweltschutz/Industrie%20und%20Nachhaltigkeit
  Chemiepark GENDORF, Umwelterklärung 2017, https://www.gendorf.de/Nachbarn/Umweltschutz/Industrie%20und%20Nachhaltigkeit
  Chemiepark GENDORF, Umwelterklärung 2020, https://www.gendorf.de/Nachbarn/Umweltschutz/Industrie%20und%20Nachhaltigkeit
- Acidity, unspecified [water, surface water]: 4.19e-6 kg; source Postlethwaite D. 1995; lognormal variance with pedigree 0.0612, pedigree (2,3,4,5,1)
  (same comment as for Carbon dioxide, fossil)
- Chromium III [water, surface water]: 2.01e-7 kg; source Postlethwaite D. 1995; lognormal variance with pedigree 0.6612, pedigree (2,3,4,5,1)
  (same comment as for Carbon dioxide, fossil)
- Dissolved solids [water, surface water]: 0.00244 kg; source Postlethwaite D. 1995; lognormal variance with pedigree 0.0612, pedigree (2,3,4,5,1)
  (same comment as for Carbon dioxide, fossil)
- Iron ion [water, surface water]: 0.00061 kg; source Postlethwaite D. 1995; lognormal variance with pedigree 0.6612, pedigree (2,3,4,5,1)
  (same comment as for Carbon dioxide, fossil)
- Lead II [water, surface water]: 1.61e-8 kg; source Postlethwaite D. 1995; lognormal variance with pedigree 0.6612, pedigree (2,3,4,5,1)
  (same comment as for Carbon dioxide, fossil)
- Mercury II [water, surface water]: 3.82e-8 kg; source Postlethwaite D. 1995; lognormal variance with pedigree 0.6612, pedigree (2,3,4,5,1)
  (same comment as for Carbon dioxide, fossil)
- Nickel II [water, surface water]: 3.53e-8 kg; source Postlethwaite D. 1995; lognormal variance with pedigree 0.6612, pedigree (2,3,4,5,1)
  (same comment as for Carbon dioxide, fossil)
- Nitrogen [water, surface water]: 6.06e-6 kg; source Postlethwaite D. 1995; lognormal variance with pedigree 0.0512, pedigree (2,3,4,5,1)
  (same comment as for Carbon dioxide, fossil)
- Sulfide [water, surface water]: 2.7e-6 kg; source Postlethwaite D. 1995; lognormal variance with pedigree 0.0612, pedigree (2,3,4,5,1)
  (same comment as for Carbon dioxide, fossil)
- Suspended solids, unspecified [water, surface water]: 0.00144 kg; source Postlethwaite D. 1995; lognormal variance with pedigree 0.0612, pedigree (2,3,4,5,1)
  (same comment as for Carbon dioxide, fossil)
- Water [water, unspecified]: 0.0150391 m3; lognormal variance with pedigree 0.0848, pedigree (2,4,2,5,4)
  Calculated based on literature data published by the GENDORF Chemical Park. The factory produced an average of 2462760 tonnes of chemical substances (including intermediates) per year in the years 2015-2019. The amount of water released back to the environment consists of the sum of the amount of process water treated in the internal WWTP that is then released back to the environment and the amount of cooling water released back to the environment. The average ouput of the internal WWTP in the years 2015-2019 was 2628800 m3 and that of cooling water released back to the environment was 34408800 m3. This gives a yearly average of 37037600 m3 emissions of water to water. This equals 0.01504 m3/kg chemical produced.
  References:
  Chemiepark GENDORF, Umwelterklärung 2016, https://www.gendorf.de/Nachbarn/Umweltschutz/Industrie%20und%20Nachhaltigkeit
  Chemiepark GENDORF, Umwelterklärung 2017, https://www.gendorf.de/Nachbarn/Umweltschutz/Industrie%20und%20Nachhaltigkeit
  Chemiepark GENDORF, Umwelterklärung 2020, https://www.gendorf.de/Nachbarn/Umweltschutz/Industrie%20und%20Nachhaltigkeit
- Zinc II [water, surface water]: 1.77e-7 kg; source Postlethwaite D. 1995; lognormal variance with pedigree 0.6612, pedigree (2,3,4,5,1)
  (same comment as for Carbon dioxide, fossil)

## Sampling procedure
Data out of ECOSOL study of European Surfactant Industry. Common translation rules used. Some values are calculated based on data from a large chemical factory located in Germany. For more details, see the comments of the exchanges.

## Extrapolations
This dataset has been copied from an original dataset covering the geography RER. The uncertainty has been adjusted accordingly.

## Review by Gregor Wernet 2017-08-04
This dataset was additionally reviewed in a separate review process by Eric Johnson of Atlantic Consulting as well as Emilia Moreno Ruiz and Gregor Wernet of ecoinvent.
