# flax straw production, dew-retted

Dataset: EcoSpold 2, unit process
Geography: RER
Time period: 2013-10-01 to 2023-09-30
Technology level: current
Classification: ISIC rev.4 ecoinvent: 0116:Growing of fibre crops
Scenario: Business-as-Usual
System model: Allocation, cut-off by classification
Generated by: Marie Demaegdt
Database: ecoinvent
isCopyrightProtected: true
accessRestrictedTo: 1

## General comment
The data refer to fibre flax cultivation and retting in Western Europe (France, Belgium and the Netherlands), the 1st step to produce European Flax™ fibre. European Flax™ is a certification of origin and traceability owned by the Alliance for European Flax-Linen and Hemp (formerly known as CELC) which covers 100% of the fibres obtained from western European retted flax plants, and guarantees third party verified traceability downstream. The unit is 1kg of flax straw, dew-retted in 2014-2028 through Flax cultivation, retting and harvesting. Cultivation is modelled after the average common technical itinerary in the 3 countries including crop rotation; absence of irrigation (flax fields are not irrigated in western Europe, barring exceptional circumstances); reasoned use of fertiliser and pesticide; and 100% dew retting. It is 100% specific of Western Europe and cannot be used to represent any other geography. The detailed technical itinerary is available from the Alliance.
The process starts with the intermediate crop sown before flax in the Autum. It then includes preparing the field for sowing, sowing, inputs. Then flax is pulled and laid evenly in the field (around early July depending on weather) , where it will ret over the course of the next 3-7 weeks, depending on climatic conditions. During retting, microorganisms from the soil develop on the plants thanks to dew, rain and wind, leading to partial decomposition of the stem pectins that is key for flax quality. To achieve optimal retting, flax is turned midway through retting, and then finally, the retted stems are baled. The average yield is 6572.66 kg retted plant per ha. Application of fertilizers is included with N, P, K 168 kg-ha, the total N uptake is considered to be 72 kg/ha, only partially reintegrated with N fertilization, the remaining is from previous crop residues and organic matter mineralization. Transport from field to scutching is not included. This dataset has been modelled with the same activity data as the European Flax™ dataset in the Environmental Footprint 3.1 official database (data from the Alliance for European Flax-Linen & Hemp), however LCIA results are slightly different for some indicators, mainly due to different background datasets used.

## Included activities start
The activity begins with the destruction (green manure) of intermediate crop and preparation of land for sowing.

## Included activities end
The activity ends with the harvesting of the flax straw, dew-retted plant that is ready to be processed into the scutching process. Transport from field to scutching is excluded.

## Geography
The data represent a weighted average across the 3 European countries producing flax: France, Belgium and the Netherlands. This production is 100% certified to European Flax™ and represents 3/4 of the global production for flax long fibre.

## Technology
The data refer to the average agricultural technical itinerary for the geography given.

## Time period
The data refer to 5 croping cycles from 2014 harvest until and including 2018 harvest .

## Parameters
- LUC_crop_specific: 1 dimensionless
  This parameter allows to switch between a "crop specific" and a "country specific" approach when calculating the LUC of a crop. By default, the chosen approach is "crop specific", so the value of the parameter is 1. If you want to apply a "country specific" approach, turn the parameter to 0.

## Reference product
- flax straw, dew-retted: 1 kg; By-product classification allocatable product; CPC 01929: Other fibre crops, raw, n.e.c.; HS2017 530110: Flax; raw or retted, but not spun
  production volume 6.91634e8 kg
    Extract from table 2021 celc data surfaces production of flax straw, dew-retted fibre and co-products. Date of access 10 feb 2021: https://textileexchange.org/app/uploads/2021/08/Textile-Exchange_Preferred-Fiber-and-Materials-Market-Report_2021.pdf
  property price 0.429834 EUR2005
    This is a simulated value based on the price range most commonly observed, btw 0,35 and 0,80 €/k for the period 2014-2018. It is to be noted that there is no stock market for flax straw: prices are set for each lot, by farmers and mills (private or cooperative mills), and there is a large variability according to crop and weather conditions, as well as fibre prices. Source of the data: Flax-Linen Economic Observatory of the Alliance for European Flax-Linen & Hemp, based on data collected by French interbranch representing the majority of European fibre flax straw. The prices were converted to EUR based on the annual exchange rates published by the European Central Bank (https://sdw.ecb.europa.eu/quickview.do?SERIES_KEY=120.EXR.A.AUD.EUR.SP00.A, last accessed on 2023-06-01) and adjusted for inflation relative to 2005 using the producer price index (PPI) of the euro area, published by eurostat (https://ec.europa.eu/eurostat/databrowser/view/STS_INPP_A__custom_6416181/default/table?lang=en, last accessed on 2023-06-01).
  properties: carbon allocation 0.4275 kg, carbon content 0.475, carbon content, fossil 0, carbon content, non-fossil 0.475, dry mass 0.9 kg, water content 0.1111, water in wet mass 0.1 kg, wet mass 1 kg

## Inputs from technosphere
- [sulfonyl]urea-compound: 4.184e-6 kg; lognormal variance with pedigree 0.00328746, pedigree (2,2,3,1,1)
  This is taken as a proxy for Amidosulfuron+iodosulfuron
  properties: carbon content, fossil 0.540853, dry mass 1 kg, wet mass 1 kg
- acetamide-anillide-compound, unspecified: 2.37347e-6 kg; lognormal variance with pedigree 0.00328746, pedigree (2,2,3,1,1)
  Pesticide: Metalaxyl-M (pesticide group: acetamide-anillide-compounds). Seed protection, Applied at registered rate of application (for 115 kg of seeds/ha).
  properties: carbon content, fossil 0.659175, dry mass 1 kg, wet mass 1 kg
- ammonia, anhydrous, liquid: 0.00106642 kg; lognormal variance with pedigree 0.00318908, pedigree (2,1,3,1,1)
  This value has been provided by the Alliance for European Flax-Linen & Hemp.
  properties: dry mass 1 kg, wet mass 1 kg
- ammonium nitrate: 0.00106502 kg; lognormal variance with pedigree 0.00318908, pedigree (2,1,3,1,1)
  71 l/ha of fertilizer divided by the yield
  properties: dry mass 1 kg, wet mass 1 kg
- application of plant protection product, by field sprayer: 0.000546422 ha; lognormal variance with pedigree 0.00318908, pedigree (2,1,3,1,1)
  Application of plant protection product, by field sprayer
- baling: 0.00315144 unit; lognormal variance with pedigree 0.00318908, pedigree (2,1,3,1,1)
  Baling
- cyclic N-compound: 1.90182e-5 kg; lognormal variance with pedigree 0.00328746, pedigree (2,2,3,1,1)
  Pesticide application
  properties: carbon content, fossil 0.641962, dry mass 1 kg, wet mass 1 kg
- fertilising, by broadcaster: 3.79443e-5 ha; lognormal variance with pedigree 0.00318908, pedigree (2,1,3,1,1)
  Fertilizer + herbicide + insecticide + fungicides passes
- land use change, annual crop: 6.84654e-6 ha; lognormal variance with pedigree 0.25, pedigree (5,5,5,5,5)
  This value has been provided by the Alliance for European Flax-Linen & Hemp. Calculated value. Land use change (LUC) combines land transformation areas calculated with the adapted 'Direct Land Use Change Assessment Tool' version 2014 developed by Blonk Consultants and the carbon losses from soil organic carbon (SOC) and vegetation (VEG) as calculated in ecoinvent v3. See 'WFLDB-Guidelines.pdf', available at https://ecoquery.ecoinvent.org/File/Reports. The value is then divided by the yield per ha.
- lime: 0.0608582 kg; lognormal variance with pedigree 0.00318908, pedigree (2,1,3,1,1)
  Lime fertilizer 5% MgO, per kg substance, production mix, at plant // GLO // 165 = data provided by Blonk https://blonksustainability.nl/tag/Land%20Use%20Change) and validated by Arvalis & Inagro https://www.arvalis.fr/).
  properties: carbon content, fossil 0.120005, dry mass 1 kg, wet mass 1 kg
- linseed seed, at farm: 0.0174967 kg; lognormal variance with pedigree 0.00318908, pedigree (2,1,3,1,1)
  It is sowed at about 115 kg of seeds per hectare for a density of 1500-1600 viable plants per m². Note: Alliance/CELC study considers seeds as co-product of scutching; more precisely in Europe 90% of fibre flax seed production is a co-product of fibre flax cutivation and 10% are grown primarily for seed, where yields of fibre, straw etc. are different.
  properties: carbon content, non-fossil 0.590234, dry mass 0.909091 kg, water content 0.1, wet mass 1 kg
- mowing, by rotary mower: 0.000408537 ha; lognormal variance with pedigree 0.00318908, pedigree (2,1,3,1,1)
  Mowing, by rotary mower
- nitrile-compound: 5.62938e-7 kg; lognormal variance with pedigree 0.00328746, pedigree (2,2,3,1,1)
  Fungicide application of Fludioxonil
  properties: carbon content, fossil 0.344995, dry mass 1 kg, wet mass 1 kg
- packaging, for fertilisers or pesticides: 0.00041536 kg; lognormal variance with pedigree 0.00328746, pedigree (2,2,3,1,1)
  25 kg woven PP bags are most used for fertiliser packaging. It is assumed conservatively 100 g/m2, add 10% extra for the edges overlap and cutting losses. It results in 0.50*0.80*2*1.1 = 0.88 m2/bag = 88 g/bag per 25 kg fertiliser. The sum of the solid fertiliser including lime and also the linseeds input is maximum of 762 kg/ha and harvest --> 30.5 (31) bags would be required. In sum per ha and harvest hence 31 pieces * 88g/piece = 2.73 kg bags (conservatively). per kg flax plant harvested hence 0.00041536 kg PP bag,
  properties: carbon content, fossil 0.85714, dry mass 1 kg, heating value, net 27.31 MJ, wet mass 1 kg
- pesticide, unspecified: 0.000456437 kg; lognormal variance with pedigree 0.00328746, pedigree (2,2,3,1,1)
  The amount is derived by the sum of the following pesticides dived by the yield: Fludioxonil 0.0037 kg/ha, Clethodim 0.0025 kg/ha, Mesotrione 0.096 kg/ha, Menral oil 2.85 kg/ha
  properties: carbon content, fossil 0.486978, dry mass 1 kg, wet mass 1 kg
- potassium sulfate: 0.0106502 kg; lognormal variance with pedigree 0.00318908, pedigree (2,1,3,1,1)
  117 kg/ha fertilizer, Potassium sulfate (0/0/60): 117x0.6=70 kg/ha K2O
  properties: dry mass 1 kg, wet mass 1 kg
- pyrethroid-compound: 1.14109e-5 kg; lognormal variance with pedigree 0.00328746, pedigree (2,2,3,1,1)
  Insecticide, registered application rate
  properties: carbon content, fossil 0.623, dry mass 1 kg, wet mass 1 kg
- sowing: 0.000414714 ha; lognormal variance with pedigree 0.00318908, pedigree (2,1,3,1,1)
  Sowing
- swath, by rotary windrower: 0.000456744 ha; lognormal variance with pedigree 0.00318908, pedigree (2,1,3,1,1)
  Swath, by rotary windrower
- tillage, harrowing, by rotary harrow: 0.000102406 ha; lognormal variance with pedigree 0.00318908, pedigree (2,1,3,1,1)
  Soil preparation
- tillage, ploughing: 0.000152352 ha; lognormal variance with pedigree 0.00318908, pedigree (2,1,3,1,1)
  Destruction of intermidiate crop (9,85) + stubble crushing (3.94) + soil preparation (17,51)
- triple superphosphate: 0.0236738 kg; lognormal variance with pedigree 0.00318908, pedigree (2,1,3,1,1)
  155.6 kg/ha fertilizer divided by yield
  properties: dry mass 1 kg, phosphorus content 0.200754, wet mass 1 kg
- urea: 0.00213004 kg; lognormal variance with pedigree 0.00318908, pedigree (2,1,3,1,1)
  Amount of Urea applied
  properties: carbon content, fossil 0.2, dry mass 1 kg, wet mass 1 kg
- zinc: 6.93783e-5 kg; lognormal variance with pedigree 0.00328746, pedigree (2,2,3,1,1)
  This value has been calculated by using the ecoinvent LCI calculation tool for crop production.
  properties: dry mass 1 kg, wet mass 1 kg

## Inputs from nature
- Carbon dioxide, in air [natural resource, in air]: 1.56641 kg; lognormal variance with pedigree 0.00328746, pedigree (2,2,3,1,1)
  The value of 1.6500 Kg/Kg has been provided by the Alliance for European Flax-Linen & Hemp, this value has been rebalanced to 1.5664 considering only C uptake leaving the field as harvested product
- Energy, gross calorific value, in biomass [natural resource, biotic]: 17.0791 MJ; lognormal variance with pedigree 0.00328746, pedigree (2,2,3,1,1)
  Calculated Value. This value has been calculated by using the ecoinvent LCI calculation tool for crop production.
- Occupation, annual crop, non-irrigated [natural resource, land]: 1.52145 m2*year; lognormal variance with pedigree 0.00486541, pedigree (2,1,3,1,1)
  (same comment as for Energy, gross calorific value, in biomass)
- Transformation, from annual crop, non-irrigated [natural resource, land]: 1.52145 m2; lognormal variance with pedigree 0.0109036, pedigree (2,1,3,1,1)
  (same comment as for Energy, gross calorific value, in biomass)
- Transformation, to annual crop, non-irrigated [natural resource, land]: 1.52145 m2; lognormal variance with pedigree 0.0109036, pedigree (2,1,3,1,1)
  (same comment as for Energy, gross calorific value, in biomass)

## Emissions to nature
- Ammonia [air, non-urban air or from high stacks]: 0.000388481 kg; lognormal variance with pedigree 0.0110054, pedigree (2,2,3,1,1)
  (same comment as for Energy, gross calorific value, in biomass)
- Carbon dioxide, fossil [air, non-urban air or from high stacks]: 0.00999094 kg; lognormal variance with pedigree 0.00318908, pedigree (2,2,3,1,1)
  (same comment as for Energy, gross calorific value, in biomass)
- Dinitrogen monoxide [air, non-urban air or from high stacks]: 0.000159944 kg; lognormal variance with pedigree 0.0309911, pedigree (2,2,3,1,1)
  (same comment as for Energy, gross calorific value, in biomass)
- Nitric oxide [air, unspecified]: 0.000261262 kg; lognormal variance with pedigree 0.0309911, pedigree (2,2,3,1,1)
  (same comment as for Energy, gross calorific value, in biomass)
- Amidosulfuron [soil, agricultural]: 3.80364e-6 kg; lognormal variance with pedigree 0.0110054, pedigree (2,2,3,1,1)
  (same comment as for Energy, gross calorific value, in biomass)
- Cadmium II [soil, agricultural]: 1.00647e-6 kg; lognormal variance with pedigree 0.0437915, pedigree (2,2,3,1,1)
  (same comment as for Energy, gross calorific value, in biomass)
- Chromium III [soil, agricultural]: 1.62592e-6 kg; lognormal variance with pedigree 0.0437915, pedigree (2,2,3,1,1)
  (same comment as for Energy, gross calorific value, in biomass)
- Copper ion [soil, agricultural]: -5.72762e-6 kg; normal variance with pedigree 0.2964, pedigree (5,5,5,5,5)
  (same comment as for Energy, gross calorific value, in biomass)
- Fludioxonil [soil, agricultural]: 5.62938e-7 kg; lognormal variance with pedigree 0.0110054, pedigree (2,2,3,1,1)
  (same comment as for Energy, gross calorific value, in biomass)
- Iodosulfuron [soil, agricultural]: 3.80364e-7 kg; lognormal variance with pedigree 0.0110054, pedigree (2,2,3,1,1)
  (same comment as for Energy, gross calorific value, in biomass)
- Lambda-cyhalothrin [soil, agricultural]: 1.14109e-5 kg; lognormal variance with pedigree 0.0110054, pedigree (2,2,3,1,1)
  (same comment as for Energy, gross calorific value, in biomass)
- Lead II [soil, agricultural]: -5.04735e-7 kg; normal variance with pedigree 0.08706, pedigree (5,5,5,5,5)
  (same comment as for Energy, gross calorific value, in biomass)
- Mercury II [soil, agricultural]: -3.39543e-8 kg; normal variance with pedigree 0.08706, pedigree (5,5,5,5,5)
  (same comment as for Energy, gross calorific value, in biomass)
- Mesotrione [soil, agricultural]: 2.28218e-5 kg; lognormal variance with pedigree 0.0110054, pedigree (2,2,3,1,1)
  (same comment as for Energy, gross calorific value, in biomass)
- Metalaxil [soil, agricultural]: 2.37347e-6 kg; lognormal variance with pedigree 0.0110054, pedigree (2,2,3,1,1)
  (same comment as for Energy, gross calorific value, in biomass)
- Mineral oil [soil, agricultural]: 0.000433614 kg; lognormal variance with pedigree 0.0110054, pedigree (2,2,3,1,1)
  (same comment as for Energy, gross calorific value, in biomass)
- Nickel II [soil, agricultural]: -6.08484e-7 kg; normal variance with pedigree 0.08706, pedigree (5,5,5,5,5)
  (same comment as for Energy, gross calorific value, in biomass)
- Prothioconazole [soil, agricultural]: 1.90182e-5 kg; lognormal variance with pedigree 0.0110054, pedigree (2,2,3,1,1)
  (same comment as for Energy, gross calorific value, in biomass)
- Zinc II [soil, agricultural]: 4.17959e-5 kg; lognormal variance with pedigree 0.29636, pedigree (5,5,5,5,5)
  (same comment as for zinc)
- Cadmium II [water, ground-]: 6.99054e-9 kg; lognormal variance with pedigree 0.0890596, pedigree (2,2,3,1,1)
  (same comment as for Energy, gross calorific value, in biomass)
- Cadmium II [water, surface water]: 5.48489e-9 kg; lognormal variance with pedigree 0.0890596, pedigree (2,2,3,1,1)
  (same comment as for Energy, gross calorific value, in biomass)
- Chromium III [water, ground-]: 2.95744e-6 kg; lognormal variance with pedigree 0.0890596, pedigree (2,2,3,1,1)
  (same comment as for Energy, gross calorific value, in biomass)
- Chromium III [water, surface water]: 5.49556e-7 kg; lognormal variance with pedigree 0.0890596, pedigree (2,2,3,1,1)
  (same comment as for Energy, gross calorific value, in biomass)
- Copper ion [water, ground-]: 4.25186e-7 kg; lognormal variance with pedigree 0.0890596, pedigree (2,2,3,1,1)
  (same comment as for Energy, gross calorific value, in biomass)
- Copper ion [water, surface water]: 3.88051e-7 kg; lognormal variance with pedigree 0.0890596, pedigree (2,2,3,1,1)
  (same comment as for Energy, gross calorific value, in biomass)
- Lead II [water, ground-]: 5.37529e-9 kg; lognormal variance with pedigree 0.0890596, pedigree (2,2,3,1,1)
  (same comment as for Energy, gross calorific value, in biomass)
- Lead II [water, surface water]: 2.85562e-8 kg; lognormal variance with pedigree 0.0890596, pedigree (2,2,3,1,1)
  (same comment as for Energy, gross calorific value, in biomass)
- Mercury II [water, ground-]: 9.19969e-11 kg; lognormal variance with pedigree 0.0890596, pedigree (2,2,3,1,1)
  (same comment as for Energy, gross calorific value, in biomass)
- Mercury II [water, surface water]: 8.44439e-10 kg; lognormal variance with pedigree 0.0890596, pedigree (2,2,3,1,1)
  (same comment as for Energy, gross calorific value, in biomass)
- Nickel II [water, surface water]: 3.29277e-7 kg; lognormal variance with pedigree 0.0890596, pedigree (2,2,3,1,1)
  (same comment as for Energy, gross calorific value, in biomass)
- Nitrate [water, ground-]: 0.00771225 kg; lognormal variance with pedigree 0.0437915, pedigree (2,2,3,1,1)
  This value has been provided by the Alliance for European Flax-Linen & Hemp.
- Phosphate [water, ground-]: 3.26554e-5 kg; lognormal variance with pedigree 0.0437915, pedigree (2,2,3,1,1)
  (same comment as for Energy, gross calorific value, in biomass)
- Phosphate [water, surface water]: 9.59254e-5 kg; lognormal variance with pedigree 0.0437915, pedigree (2,2,3,1,1)
  (same comment as for Energy, gross calorific value, in biomass)
- Phosphorus [water, surface water]: 5.1099e-5 kg; lognormal variance with pedigree 0.0437915, pedigree (2,2,3,1,1)
  (same comment as for Energy, gross calorific value, in biomass)
- Zinc II [water, ground-]: 1.93641e-6 kg; lognormal variance with pedigree 0.0890596, pedigree (2,2,3,1,1)
  (same comment as for zinc)
- Zinc II [water, surface water]: 4.75751e-7 kg; lognormal variance with pedigree 0.0890596, pedigree (2,2,3,1,1)
  (same comment as for zinc)

## Sampling procedure
Data collection has been performed by the Alliance for European Flax-Linen & Hemp from referent sources incl. Arvalis and Inagro (agronomic institutes referent respectively for France and for Belgium-Netherlands) for average agricultural technical itinerary practiced in these 3 countries; and interbranch production statistics. These data represent the European production which is 100% certified to European Flax (TM) and amounts for 3/4 of the global production for fibre, flax, long, scutched on 2023.

## Extrapolations
The data on inputs to the field activities are collected directly from the Alliance for European Flax-Linen & Hemp. The ecoinvent LCI calculation tool for crop production was used to calculate field emissions from the cultivation process.
