# wind turbine construction, small-scale, 6kW, onshore

Dataset: EcoSpold 2, unit process
Geography: DE
Time period: 2013-01-01 to 2023-12-31
Technology level: current
Classification: ISIC rev.4 ecoinvent: 2811:Manufacture of engines and turbines, except aircraft, vehicle and cycle eng
Tags: wind power; infrastructure
Scenario: Business-as-Usual
System model: Allocation, cut-off by classification
Generated by: Johannes Müller
Published in: Knausenberger, Kai 2022
Database: ecoinvent
isCopyrightProtected: true
accessRestrictedTo: 1

## General comment
This dataset represents the construction of a small-scale wind turbine with a capacity of 6 kW for onshore use. The term "wind turbine" inludes moving parts such as nacelle, rotor, rotor blades, transition piece as well as fixed parts such as the tower and the foundation. The dataset contains the manufacturing, installation, decomissioning and waste treatment of a small-scale wind turbine with described specifications:
• horizontal-axis technology, three rotor blades
• nominal power output 6 kW
• direct-driven permanent magnet generator
• total weight of the small-scale wind turbine: 180 kg (excluding electric and electronic equipment, tower and foundation)
• tower height 18m with reinforced concrete foundation
Figure sources:
Drawing of the tower:
Submitted by manufacturer, edited to hide technical specifications.
Picture: Jüttemann, Patrick. Kleinwind-Marktreport 2020 (6. Auflage). verlagsfreie Publikation, Bad Honnef, 2020, page 124. Edited to hide brand name on the turbine.

## Included activities start
From the transformation of pasture land to industrial site, and from the reception and treatment of building materials and turbine parts.

## Included activities end
This activity ends with the decommissioning of the wind turbine and the treatment of the resulting materials in the end of the lifetime.
This dataset includes:
• all materials for the construction of the wind turbine, their assembly and their treatment
• land transformation and use
• energy needed for erection and dismantling of the wind turbine.
• transports from intermediates to the manufacturer and transports from the manufacturer to the construction site (default values) along with transport of the excavated mass for the foundation
This dataset doesn't include:
• the connection to the grid, which is modelled in a separate dataset
• the operation and maintenance of the fully finished wind power plant. It is assumed that all parts will hold for the lifetime of 20 years and don't have to be replaced
• auxiliary materials
• transport of materials that go potentially to recycling

## Geography
The manufacturer of the wind turbine is located in Germany.

## Technology
The inventory is based on a small-scale wind turbine with 6 kW nominal power produced in Germany.
Technical characteristics:
• Horizontal-axis technology, three rotor blades
• Nominal power output: 6 kW
• Direct-driven permanent magnet generator
• Tower height: 18m with reinforced concrete foundation
• Lifetime expectation: 20 years
• Rotor diameter: 4,5 m
• Nominal wind speed: 12,5 m/s
• Protection method for high wind speeds: vertical positioning of rotor axis
Moving parts of the wind turbine are the following:
• Rotor: rotor blades; rotor hub; mounting materials; total weight: 24 kg
• Nacelle: bearing/joint for azimuth and vertical orientation (vertical orientation for safety position); tail fin for azimuth orientation; sliding contact for electricity transmission; housing; total weight: 95 kg
• Generator: direct-driven permanent magnet generator; total weight: 60 kg
Fixed parts of the wind turbine are the following:
• Electric and electronic equipment: cables from nacelle to bottom of tower; Inverter including steel housing for weather protection, total weight: 75 kg
• Tower: zinced, conical steel tube with 18 m height; lightning protection; total weight: 1047 kg
• Foundation: steel anchor embedded in the foundation for mounting the tower; concrete and reinforcement; total weight: 391 kg (steel) + concrete (9 m³)
Providing processes for flows have been chosen under spatial consideration with the production site of the turbine located in Germany. If providing processes do not contain transport activities, European average transport distances have been added.
Literature sources:
[1] Burger, Bastian & Bauer, Christian. Windkraft. ecoinvent report No. 6-XIII. Dübendorf, 2007. URL: http://windland.ch/doku_wind/06_XIII_Windkraft.pdf, last checked at 14.12.2021.
[2] Borken-Kleefeld, Jens. Default transport data per commodity group for the US and EU27 – Methodology and notes on data for ecoinvent. ecoinvent Centre. Zürich, 2012.
[3] Kouloumpis, Victor; Sobolewski, Robert A.; Yan, Xiaoyu. Performance and life cycle assessment of a small scale vertical axis wind turbine. in Journal of Cleaner Production 247, 2020, article 119520.
Further description on the creation of the LCI-data can be found in the following document:
Knausenberger, Kai. Erarbeitung der Datengrundlage zur Einbindung von Kleinwindenergieanlagen in ökobilanzbasierte Energiesystemmodelle. master-thesis. Hochschule Pforzheim. Pforzheim, 2022.

## Time period
The wind turbine has been produced since 2013, the development of the invetory took place in 2022.

## Reference product
- wind turbine, small-scale, 6kW, onshore: 1 unit; name RP; By-product classification allocatable product; CPC 53262: Power plants; HS2017 853590: Electrical apparatus; n.e.c. in heading no. 8535, for switching or protecting electrical circuits, for a vo[...]
  production volume 44.5 unit; name PV_RP; = 890/20
    Literature Value. Assuming 890 operational small scale wind turbines in Germany and a lifetime expectancy of 20 years.
  property lifetime 20 year; name RP_lifetime
  property price 1 EUR2005
    Calculated based on inputs: The price of the product has been calculated as a sum of the values of the material and energy inputs for this product. This value is therefore a rough estimation. It may underestimate the real price since there are additional expenses when producing any product. These expences can include for example labour costs, treatment of waste materials and profit for the producer. Please consider carefully whether this level of data quality is acceptable for your application.
  properties: carbon allocation 0 kg, carbon content 0, dry mass 0 kg, water content 0, water in wet mass 0 kg, weight 22959 kg, wet mass 0 kg

## Inputs from technosphere
- aluminium, cast alloy: 9 kg; name alu_cast; = 4,3+4,7; lognormal variance with pedigree 0.003425, pedigree (2,4,2,2,1)
  Primary data from manufacturer. Housing of the generator (4,3 kg), rotor hub (4,7 kg).
  Uncertainty: estimated variance. slightly higher technological score because of the split of the aluminium use in the two aluminium types.
  properties: dry mass 1 kg, wet mass 1 kg
- brass: 0.5 kg; lognormal variance with pedigree 0.003425, pedigree (2,4,2,2,1)
  Primary data from manufacturer. Assumption that sliding contact for electricity is 50% brass and 50% copper.
  properties: dry mass 1 kg, wet mass 1 kg
- brass removed by turning, average, computer numerical controlled: 0.115 kg; = brass*0,23; lognormal variance with pedigree 0.003425, pedigree (2,4,2,2,1)
  Calculated value, given is the removed brass share by CNC-turning as suggested in ecoinvent dataset (brass turning, average, computer numerical controlled | Cutoff, U - RER): 0,23 kg removed material per kg of brass part.
  properties: dry mass 1 kg, wet mass 1 kg
- cable, unspecified: 13.08 kg; name cable; = 11,88+1,2; source Kouloumpis, Victor 2020; lognormal variance with pedigree 0.003425, pedigree (2,4,2,2,1)
  Primary data from manufacturer: Cable from top of tower to foundation (11,9 kg). Cable included in Inverter linear scaled from literature value (1,2 kg), source [3].
  properties: carbon content, fossil 0.28196, dry mass 1 kg, heating value, net 8.54 MJ, wet mass 1 kg
- casting, aluminium, lost-wax: 9 kg; = alu_cast; lognormal variance with pedigree 0.003425, pedigree (2,4,2,2,1)
  Calculated value.
- concrete, normal strength: 9 m3; name concrete_foundation; = land_from; lognormal variance with pedigree 0.003425, pedigree (2,4,2,2,1)
  According to manufacturer a typical foundation size for the tower height of 18 m is 3 x 3 m and 1 m depth.
  property wet mass 2370 kg; name WM_concrete
  properties: dry mass 2180.8 kg, water content 0.086758
- copper, cathode: 19.16 kg; name copper; = 0,5+5,7+12,96; source Kouloumpis, Victor 2020; lognormal variance with pedigree 0.003425, pedigree (2,4,2,2,1)
  Primary data from manufacturer: Sliding contact for electricity transmission (0,5 kg), copper wiring in generator (5,7 kg), Copper used in inverter linear scaled from literature value (13,0 kg), source [3] .
  properties: dry mass 1 kg, wet mass 1 kg
- diesel, burned in building machine: 3930.6 MJ; = 1965,3*2; source Burger, B. 2007, p. p. 21; lognormal variance with pedigree 0.003425, pedigree (2,4,2,2,1)
  Calculated value based on literature. The amount of diesel used for building machine is scaled from source [1] by foundation volume. Assumption: Effort for the deinstallation of the turbine is the same as for its installation.
  properties: heating value, net 1 MJ
- electricity, low voltage: 870.75 kWh; = 744,61+47,66+30+12,2+36,28; source Burger, B. 2007, p. p. 18; lognormal variance with pedigree 0.003425, pedigree (2,4,2,2,1)
  Electricity used for assembly processes, default values calculated from literature, source [1]: 0,5 kWh electricity used for 1 kg of product.
- electronics scrap from control units: -13.92 kg; name el_scrap; = electronics; lognormal variance with pedigree 0.003225, pedigree (2,4,1,2,1)
  Calculated value.
  production volume; = PV_RP * (el_scrap/RP)
    Calculated Value. Based on amounts.
  properties: carbon content, fossil 0.337146, carbon content, non-fossil 0.00013442, dry mass 1 kg, wet mass 1 kg
- electronics, for control units: 13.92 kg; name electronics; source Kouloumpis, Victor 2020; lognormal variance with pedigree 0.003425, pedigree (2,4,2,2,1)
  Electronic components used in inverter. Linear scaling of literature values; source [3].
  properties: carbon content, fossil 0.337146, carbon content, non-fossil 0.00013442, dry mass 1 kg, wet mass 1 kg
  note on carbon content, fossil: The control unit has a composition of 46% steel (housing), 32% plastics, 14% printed wiring boards and 8% cables (various types).;
- epoxy resin, liquid: 0.04 kg; lognormal variance with pedigree 0.003425, pedigree (2,4,2,2,1)
  Primary data from manufacture; resin used as glue in generator.
  properties: carbon content, fossil 0.42325, dry mass 1 kg, heating value, net 12.82 MJ, wet mass 1 kg
- excavation, hydraulic digger: 9 m3; = concrete_foundation; lognormal variance with pedigree 0.003425, pedigree (2,4,2,2,1)
  Calculated value.
- extrusion, co-extrusion: 5.3 kg; = pes; lognormal variance with pedigree 0.003425, pedigree (2,4,2,2,1)
  extrusion of PES for tail fin
- glass fibre reinforced plastic, polyester resin, hand lay-up: 21.7 kg; name gfrp; = 3+18,7; lognormal variance with pedigree 0.003425, pedigree (2,4,2,2,1)
  Primary data from manufacturer. Amounts used for nacelle cover (3,0 kg) and rotor (18,7 kg). GFRP with polyester resin used as proxy for GFRP with vinylester resin.
  properties: carbon content, fossil 0.246639, dry mass 1 kg, wet mass 1 kg
- metal working, average for chromium steel product manufacturing: 5.09 kg; = 4,09+1; lognormal variance with pedigree 0.003425, pedigree (2,4,2,2,1)
  Manufacturing of bearings and assembly components in generator
- metal working, average for copper product manufacturing: 13.46 kg; = 0,5+12,96; lognormal variance with pedigree 0.003425, pedigree (2,4,2,2,1)
  Calculated value. Manufacturing of sliding contact for electricity transmission and copper parts used in inverter
- metal working, average for steel product manufacturing: 265.14 kg; = 180,69+84,45; lognormal variance with pedigree 0.003425, pedigree (2,4,2,2,1)
  Calculated value. Amounts for steel anchor embedded in foundation and mounting materials (180,69 kg), steel parts of nacelle (84,45 kg)
- permanent magnet, for electric motor: 2.87 kg; lognormal variance with pedigree 0.003425, pedigree (2,4,2,2,1)
  Primary data from manufacturer
- polyphenylene sulfide: 5.3 kg; name pes; lognormal variance with pedigree 0.003425, pedigree (2,4,2,2,1)
  Primary data from manufacturer; PES used for tail fin
  properties: carbon content, fossil 0.666667, dry mass 1 kg, heating value, net 24.67 MJ, wet mass 1 kg
- reinforcing steel: 219.96 kg; name steel_reinforcing; source Burger, B. 2007, p. p. 20-22; lognormal variance with pedigree 0.003825, pedigree (2,4,2,2,1)
  The amount of reinforcing steel is scaled from literature value by foundation volume, source [1].
  properties: carbon content, fossil 0.004, dry mass 1 kg, wet mass 1 kg
- scrap copper: -28.2928 kg; name scrap_copper; = copper+cable*0,66+brass; lognormal variance with pedigree 0.003225, pedigree (2,4,1,2,1)
  Calculated value. includes insulated cable with a copper share of 66% and brass from the sliding contact for electricity transmission
  production volume; = PV_RP * (scrap_copper/RP)
    Calculated Value. Based on amounts.
  property lifetime 20 year; name scrap_copper_lifetime
  properties: dry mass 1 kg, wet mass 1 kg
- scrap steel: -1394.83 kg; name scrap_steel; = steel_lowalloyed+chromium_steel+steel_unalloyed; lognormal variance with pedigree 0.003225, pedigree (2,4,1,2,1)
  Calculated value. The amount of zinc is neglected.
  production volume; = PV_RP * (scrap_steel/RP)
    Calculated Value. Based on amounts.
  property lifetime 20 year; name scrap_steel_lifetime
  properties: dry mass 1 kg, wet mass 1 kg
- sheet rolling, steel: 1105.02 kg; = 1045+25,1+34,92; lognormal variance with pedigree 0.003425, pedigree (2,4,2,2,1)
  Manufacturing of the tower (1045 kg), steel sheets used in generator (25,1 kg) and steel used for inverter and housing (34,9 kg).
- steel removed by turning, average, computer numerical controlled: 4.14 kg; = 18*0,23; lognormal variance with pedigree 0.003425, pedigree (2,4,2,2,1)
  Calculated value, given is the removed steel share by CNC-turning as suggested in ecoinvent dataset (steel turning, average, computer numerical controlled | Cutoff, U - RER): 0,23 kg removed material per kg steel part.
  properties: carbon content, fossil 0.0025, dry mass 1 kg, wet mass 1 kg
- steel, chromium steel 18/8: 6.66 kg; name chromium_steel; = 1,57+1,0+4,09; lognormal variance with pedigree 0.003425, pedigree (2,4,2,2,1)
  Primary data from manufacturer. Amounts used for lightning protection (1,57 kg), rotor mounting material (1,0 kg), bearings and assembly components in generator (4,09 kg).
  properties: carbon content, fossil 0.0008, dry mass 1 kg, wet mass 1 kg
  note on carbon content, fossil: Stainless steel model is the grade 304 steel (18/8 stainless, 18% chromium 8% nickel; max. 0.08% C)
- steel, low-alloyed: 100.85 kg; name steel_lowalloyed; = 10+72,85+18; lognormal variance with pedigree 0.003425, pedigree (2,4,2,2,1)
  Amounts used for mounting materials of the tower (assumption: 10 kg), nacelle (primary data from manufacturer: 72,85 kg), generator main shaft (primary data from manufacturer: 18,0 kg)
  properties: carbon content, fossil 0.005, dry mass 1 kg, wet mass 1 kg
  note on carbon content, fossil: Low alloyed steel composition given in Tab. 3.2 ecoinvent v2.2 report 10_partII. Steel assumed to have a C content of 0.5%
- steel, unalloyed: 1287.32 kg; name steel_unalloyed; = 1045+170,7+11,6+25,1+34,92; source Burger, B. 2007, p. p.20-22; lognormal variance with pedigree 0.003425, pedigree (2,4,2,2,1)
  Primary data from manufacturer. The amount of steel used for the steel anchor is scaled from source [1] by foundation volume. Amounts used in tower (1045 kg), steel anchor embedded in foundation (170,7 kg), nacelle (11,6 kg), generator (25,1 kg). Amounts used in inverter incl. steel housing are linear scaled from source [3] and partly based on assumptions (34,9 kg).
  properties: carbon content, fossil 0.0025, dry mass 1 kg, wet mass 1 kg
- waste aluminium: -9 kg; name scrap_aluminium; = alu_cast; lognormal variance with pedigree 0.003225, pedigree (2,4,1,2,1)
  Calculated value.
  production volume; = PV_RP * (scrap_aluminium/RP)
    Calculated Value. Based on amounts.
  properties: dry mass 1 kg, wet mass 1 kg
- waste mineral wool, for final disposal: -12.586 kg; name waste_wool; = 0,58*gfrp; lognormal variance with pedigree 0.003225, pedigree (2,4,1,2,1)
  Calculated value. Glass fibre share in GFRP-parts (58%) are considered as mineral wool waste.
  production volume; = PV_RP * (waste_wool/RP)
    Calculated Value. Based on amounts.
  properties: dry mass 1 kg, wet mass 1 kg
- waste plastic, mixture: -18.8612 kg; name waste_plastic; = cable*0,34+pes+gfrp*0,42; lognormal variance with pedigree 0.003225, pedigree (2,4,1,2,1)
  Calculated value. Includes insulation from cables with a share of PE of 34% (4,04 kg), PES (5,3 kg) and plastic share of GFRP (42%, 9,1 kg). Glass fibre share of GFRP parts considered as mineral wool waste.
  production volume; = PV_RP * (waste_plastic/RP)
    Calculated Value. Based on amounts.
  properties: carbon content, fossil 0.747344, dry mass 0.847 kg, heating value, net 30.79 MJ, water content 0.180638, wet mass 1 kg
  note on heating value, net: Value taken from the general comment of the treatment dataset.
- waste reinforced concrete: -21550 kg; name waste_concrete_reinforced; = concrete_foundation*WM_concrete+ steel_reinforcing; lognormal variance with pedigree 0.003225, pedigree (2,4,1,2,1)
  Calculated value. A density of 2370 kg/m3 is assumed for concrete without reinforcement.
  production volume; = PV_RP * (waste_concrete_reinforced/RP)
    Calculated Value. Based on amounts.
  property lifetime 20 year; name waste_concrete_reinforced_lifetime
  properties: dry mass 0.99418 kg, water content 0.00585407, wet mass 1 kg
  note on lifetime: Literature value. 10% of this waste type incur during the construction of the wind turbine and therefore would only have a very short lifetime.
- welding, arc, steel: 68.4 m; = 18*3,8; source Burger, B. 2007, p. p. 22; lognormal variance with pedigree 0.003425, pedigree (2,4,2,2,1)
  Calculated with default value from literature, source [1]: tower height multiplied by 3,8 = length of welding seam.
- wire drawing, copper: 5.7 kg; lognormal variance with pedigree 0.003425, pedigree (2,4,2,2,1)
  Manufacturing for copper wires used in generator.
- wire drawing, steel: 1.57 kg; lognormal variance with pedigree 0.003425, pedigree (2,4,2,2,1)
  Manufacturing of lightning protection (stainless steel wire)
- zinc coat, pieces: 45.5 m2; = 40+1,5+4; lognormal variance with pedigree 0.003425, pedigree (2,4,2,2,1)
  Calculated values. The surface for zinc coating for the tower is estimated for a cylindrical tube with a diameter and a height of the tower of 0,35 m and 18 m (values from manufacturers technical drawing). Zinc layer consider inside and outside. Zinc coating for nacelle parts estimated as 1,5 m². Zinc coating for housing of inverter estimated as 4 m².

## Inputs from nature
- Occupation, industrial area [natural resource, land]: 180 m2*year; = land_from*20; lognormal variance with pedigree 0.042825, pedigree (2,4,2,2,1)
  Calculated value. Lifetime assumption 20 years
- Transformation, from pasture, man made [natural resource, land]: 9 m2; name land_from; = 3*3*1; lognormal variance with pedigree 0.122825, pedigree (2,4,2,2,1)
  (same comment as for concrete, normal strength)
- Transformation, to industrial area [natural resource, land]: 9 m2; = land_from; lognormal variance with pedigree 0.122825, pedigree (2,4,2,2,1)
  Calculated value.

## Sampling procedure
primary data provided by manufacturer, literature, estimations

## Extrapolations
All data is specific for the 6 kW small-scale wind turbine.
The steel anchor embedded in the foundation and the amount of reinforcing steel are linear scaled from source [1] by foundation volume. The inverter is linear scaled from source [3] by nominal power.
