# fibre production, jute, retting

Dataset: EcoSpold 2, unit process
Geography: RoW
Time period: 2016-03-01 to 2023-12-31
Technology level: current
Classification: ISIC rev.4 ecoinvent: 1311:Preparation and spinning of textile fibres
Scenario: Business-as-Usual
System model: Allocation, cut-off by classification
Generated by: [System]
Published in: Faist Emmenegger, M. 2018
Database: ecoinvent
isCopyrightProtected: true
accessRestrictedTo: 1

## General comment
In practice, jute retting activity involves immersion of the bundles of jute into stagnant water in the jute cultivation field, tanks, ponds, ditches etc., or in slowly flowing clear water in canals, rivulets, rivers etc. After several days of immersion, the jute fibre gets loosen from the stalk and is extracted from the jute stalk which becomes the byproduct.
This dataset serves as the transformation process of jute plant to fibre.
[This dataset was recalculated on 20230912, since the BD dataset was corrected on the same period.]

## Included activities start
The activity starts with the immersion of the jute plant bundles into the water.

## Included activities end
The activity ends with the extraction of the jute fibres from the retted plants. In Bangladesh, Single Stem Stripping is mostly used to extract fibres. It is done manually by hand. The Jute Fibre is then gets dried in the sun.

## Geography
This dataset is a weighted average built from the following geographies: BD, IN.

## Technology
The retting activity is usually accomplished either on the jute growing field or in canals, by immersion of the bundles of jute into stagnant water.

## Reference product
- stalk: 1 kg; By-product classification allocatable product; CPC 01929: Other fibre crops, raw, n.e.c.; HS2017 530500: Coconut, abaca (Manila hemp or Musa textilis Nee), ramie and other vegetable textile fibres n.e.c., raw or [...]
  This exchange is a weighted average of the BD (48.35%) and IN (51.65%) datasets with same activity name (fibre production, jute, retting). For more details, please consult the regional activity.
  production volume 1.15969e8 kg; = PV_jute*stalk/jute
    Calculated from production volume of reference product using the relative outputs.
  property heating value, net 13.79 MJ
    net (lower) heating (calorific) value. lower calorific value of jute stalk is 3300 kcal/kg (CDM, CER methodology)
  property price 0.00702 EUR2005
    Temporary price data.The price of jute fibre is 0.227 Euro (calculated as 90% of purchasers price based on: 2005 import and export prices (total trades (USD) divided by total weight (kg) in biggest economies of the world: EU27, USA, Brasil, China, India, Japan and Russia) from UN Commodity Trade Statistics Database (http://data.un.org/Explorer.aspxDatabase [Accessed 2011.06.20]). Commodity: Jute and other textile bast fibres, raw or retted)). When producing 1kg of jute fibre, 1.7027kg of stalk is produced as a by-product. The economic allocation factor in eiv2.2 was 95% for jute fibre and 5% for stalk. Following this assumption the price of the stalk is calculated to be ((0.05*0.227)/(1.7027-0.05*1.7027)=) 0.007 Euro.
  properties: allocation factor 0.0463164, carbon allocation 0.382479 kg, carbon content 0.43507, carbon content, fossil 0, carbon content, non-fossil 0.43507, dry mass 0.879121 kg, true value 0.0110244, water content 0.1375, water in wet mass 0.120879 kg, wet mass 1 kg

## Inputs from technosphere
- electricity, low voltage: 8.97002e-6, 4.85363e-5, 1.88628e-6, 7.33397e-7, 5.11947e-5, 1.22025e-5, 7.35904e-7, 2.51498e-6, 1.00489e-6, 0.000451844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 kWh (46 suppliers, which the file names only by identifier); sum of these 0.00127948 kWh; lognormal variance with pedigree 0.0066, pedigree (1,4,3,5,1)
  Electricity used for retting water extraction and water ribbioning. This exchange is a weighted average of the BD (48.35%) and IN (51.65%) datasets with same activity name (fibre production, jute, retting). For more details, please consult the regional activity.
- jute plant, harvested: 0.426991 kg; lognormal variance with pedigree 0.0146, pedigree (4,4,3,5,1)
  The output of the jute cultivation activity. This exchange is a weighted average of the BD (48.35%) and IN (51.65%) datasets with same activity name (fibre production, jute, retting). For more details, please consult the regional activity.
  Mature jute plant is harvested. Jute is generally harvested when the plants are at early pod stage. The harvest index remains more or less constant over 60-105 day period following sowing. However, it reaches its peak during 110-120 day period following sowing.
  The plants are usually cut close to the ground by hand. A curved, sickle type knife is used to cut the plants. The plants are then sorted out according to height and diameter. The assorted plants are tied into bundles. Each bundle weighs 8-10 kg. The bundles are kept standing in the field for 3-4 days for defoliation.
  properties: carbon content, non-fossil 0.475, dry mass 0.177647 kg, water content 4.62914, wet mass 1 kg

## Inputs from nature
- Water, lake [natural resource, in water]: 0.00258943 m3; lognormal variance with pedigree 0.0146, pedigree (4,4,3,5,1)
  170 kgs of water converted to m3. No wastewater output is considered as the retting process is usually accomplished on jute growing fields or in canals and the wastewater either gets diluted or washed away. This exchange is a weighted average of the BD (48.35%) and IN (51.65%) datasets with same activity name (fibre production, jute, retting). For more details, please consult the regional activity.
- Water, unspecified natural origin [natural resource, in water]: 0.00385326 m3; lognormal variance with pedigree 0.127577, pedigree (4,1,3,5,1)
  1 kg jute fibre as output of retting process requires 2.4 kg fresh jute. Again, the minimum ratio of plant material to water in stagnant water should be 1:20. This exchange is a weighted average of the BD (48.35%) and IN (51.65%) datasets with same activity name (fibre production, jute, retting). For more details, please consult the regional activity.

## Emissions to nature
- Water [air, unspecified]: 0.000347045 m3; lognormal variance with pedigree 0.0146, pedigree (4,4,3,5,1)
  Balance for the water included in the jute plant. This exchange is a weighted average of the BD (48.35%) and IN (51.65%) datasets with same activity name (fibre production, jute, retting). For more details, please consult the regional activity.
- Water [water, surface water]: 0.00644269 m3; lognormal variance with pedigree 0.127577, pedigree (4,1,3,5,1)
  Balance of water. This exchange is a weighted average of the BD (48.35%) and IN (51.65%) datasets with same activity name (fibre production, jute, retting). For more details, please consult the regional activity.

## Sampling procedure
This dataset was built as a weighted average of regional datasets of the same activityName. Weights are based on production volumes.
BD: production volume = 1.60e+09 kg/year, weight = 0.4835
IN: production volume = 1.71e+09 kg/year, weight = 0.5165

## Extrapolations
This dataset is a weighted average between primary data from India and Bangladesh, based on their production volumes. Uncertainty was adjusted accordingly.
