# drawing of pipe, steel

Dataset: EcoSpold 2, unit process
Geography: RER
Time period: 1997-01-01 to 2023-12-31
Technology level: current
Classification: EcoSpold01Categories: metals/processing
Classification: ISIC rev.4 ecoinvent: 2410:Manufacture of basic iron and steel
Synonyms: drawing of tubes
Tags: ConvertedDataset
Scenario: Business-as-Usual
System model: Allocation, cut-off by classification
Share of production covered: 0 %
Generated by: Silvio Blaser
Published in: Classen M. 2009
Database: ecoinvent
isCopyrightProtected: true
accessRestrictedTo: 1

## General comment
Seamless tube production consists basically of the following manufacturing steps: Heating of the input, Piercing (press-piercing or oblique rolling), Elongation/Stretching, Final Rolling and Heat Treatment.
[This dataset was already contained in the ecoinvent database version 2. It was not individually updated during the transfer to ecoinvent version 3. Life Cycle Impact Assessment results may still have changed, as they are affected by changes in the supply chain, i.e. in other datasets. This dataset was generated following the ecoinvent quality guidelines for version 2. It may have been subject to central changes described in the ecoinvent version 3 change report (http://www.ecoinvent.org/database/ecoinvent-version-3/reports-of-changes/), and the results of the central updates were reviewed extensively. The changes added e.g. consistent water flows and other information throughout the database. The documentation of this dataset can be found in the ecoinvent reports of version 2, which are still available via the ecoinvent website. The change report linked above covers all central changes that were made during the conversion process.]

## Included activities start
The activity starts with the workpiece entering the process. The material on which this activity is applied it is not included as input.

## Included activities end
The module describes the manufacturing of seamless tubes. It is not representive for welded tubes. It includes 110% of the wire drawing process. Does not include the material being rolled.

## Geography
Data-set is representative for European Union

## Technology
Average technique for EU. Because of the lack of data about the production process, it was approximated with the production process of steel wire drawing.

## Reference product
- drawing of pipe, steel: 1 kg; By-product classification allocatable product; CPC 88739: Other fabricated metal product manufacturing services n.e.c.
  EcoSpold01Location=RER
  production volume 7.5e9 kg
    3.3 million tonnes in 1996
    IISI: Steel Statistical Yearbook 2007; Table 28 (Europe incl. Russia; data for Russia is for 2003)
  property price 0.0628275 EUR2005
    Calculated based on inputs: The price of the product has been calculated as a sum of the values of the material and energy inputs for this product. This value is therefore a rough estimation. It may underestimate the real price since there are additional expenses when producing any product. These expences can include for example labour costs, treatment of waste materials and profit for the producer. Please consider carefully whether this level of data quality is acceptable for your application.
  properties: carbon allocation 0 kg, carbon content 0

## Inputs from technosphere
- wire drawing, steel: 1.1 kg; lognormal variance with pedigree 0.084, pedigree (4,5,5,1,3)
  activityLink introduced to establish a direct link to the corresponding regional supply of this product
  EcoSpold01Location=RER

## Sampling procedure
Literature and estimation

## Extrapolations
see technology

## Review by Roland Hischier 2003-06-17
Passed.
