# heat production, natural gas, at diffusion absorption heat pump 4kW, future

Dataset: EcoSpold 2, unit process
Geography: RoW
Time period: 2000-01-01 to 2023-12-31
Technology level: current
Classification: EcoSpold01Categories: heat pumps/heating systems
Classification: ISIC rev.4 ecoinvent: 3530:Steam and air conditioning supply
Synonyms: DAWP; DAHP
Tags: ConvertedDataset
Scenario: Business-as-Usual
System model: Allocation, cut-off by classification
Generated by: Alex Primas
Published in: Primas A. 2007
Database: ecoinvent
isCopyrightProtected: true
accessRestrictedTo: 1

## General comment
NOx and CO emissions derived from measurements of gas boilers operated with natural gas under controlled conditions; no adjustment to real operation of the heat pump system is made due to lack of information. Other emission approximised with data for gas boilers from different references.
[This dataset was already contained in the ecoinvent database version 2. It was not individually updated during the transfer to ecoinvent version 3. Life Cycle Impact Assessment results may still have changed, as they are affected by changes in the supply chain, i.e. in other datasets. This dataset was generated following the ecoinvent quality guidelines for version 2. It may have been subject to central changes described in the ecoinvent version 3 change report (http://www.ecoinvent.org/database/ecoinvent-version-3/reports-of-changes/), and the results of the central updates were reviewed extensively. The changes added e.g. consistent water flows and other information throughout the database. The documentation of this dataset can be found in the ecoinvent reports of version 2, which are still available via the ecoinvent website. The change report linked above covers all central changes that were made during the conversion process.]

## Included activities end
The module includes input natural gas input from low pressure gas network (CH), infrastructure (heat pump with peak boiler and borehole heat exchanger), emissions to air and water, and electricity needed for operation.

## Geography
Biogas input modelled for conditions in Switzerland. Process applicable in central European conditions.

## Technology
Diffusion absorption heat pump with 4 kWth nominal thermal power connected to a short borehole heat exchanger. The unit includes a peak load boiler which allows a maximal output power of 11 kWth. Operation with connection to low pressure gas network. Seasonal performance factor (SPF) of 1.32. Supply temperature of the heating system 50°C.

## Reference product
- heat, future: 1 MJ; By-product classification allocatable product; CPC 17300: Steam and hot water
  EcoSpold01Location=CH
  production volume 0 MJ
    Future technology, not available today.
  property Corresponding fuel use 0.690209 MJ; name fuel_use; = 0.019425*35.532/1
    Lower heating value of the fuel input related to the heat/electricity output
  property price 0.0106 EUR2005
    Average European district heat price from Ecoheatcool and Euroheat 2005-2006, Ecoheat Work package 1: The European heat market. Final report. 10.6 EUR/GJ i s the price of district heat. http://www.solarthermalworld.org/files/Ecoheatcool%20WP1%20Web.pdf?download
  properties: carbon allocation 0 kg, carbon content 0, heating value, net 1 MJ

## Inputs from technosphere
- borehole heat exchanger, 150m: 6.41e-8 unit; lognormal variance with pedigree 0.372, pedigree (4,4,5,5,1)
  Uncertainty of life time
  EcoSpold01Location=CH
  Uncertainty: uncertainty of life time
- electricity, low voltage: 0.00021099, 9.41829e-6, 0.000148109, 0.00307419, 0.000303438, 1.89005e-6, 0.000696732, 0.0010584, 5.24338e-5 kWh (9 suppliers, which the file names only by identifier); sum of these 0.0055556 kWh; lognormal variance with pedigree 0.148, pedigree (4,5,5,5,4)
  Estimate based on gas boiler data
  EcoSpold01Location=CH
  Uncertainty: estimate based on gas boiler data
- heat pump, diffusion absorption, 4kW, future: 6.01e-7 unit; lognormal variance with pedigree 0.372, pedigree (4,4,5,5,1)
  Uncertainty of life time
  EcoSpold01Location=CH
  Uncertainty: uncertainty of life time
- natural gas, low pressure: 0.000201879, 0.000378281, 0.000558855, 0.000682617, 0.00106475, 0.000788286, 0.000164868, 0.000302174, 0.00275104, 0.000925851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 m3 (16 suppliers, which the file names only by identifier); sum of these 0.0210439 m3; = 0.75758/NG_LHV; lognormal variance with pedigree 0.056, pedigree (3,4,5,5,1)
  Uncertainty of operation temperatures of source and supply. Adjusted with a LHV of 36 MJ/m3
  EcoSpold01Location=CH
  Uncertainty: uncertainty of operation temperatures of source and supply
  properties: carbon content, fossil 0.695187, dry mass 1 kg, heating value, gross 40 MJ, heating value, net 36 MJ, wet mass 1 kg
  note on carbon content, fossil: C content considered the same as in high pressure (consumption mix)
  note on heating value, net: Literature value, Source: Christoph Meili;Niels Jungbluth;Maresa Bussa (2021) Life cycle inventories of crude oil and natural gas extraction. ESU-services Ltd. commissioned by BAFU & VSG, Schaffhausen, Switzerland, http://esu-services.ch/data/public-lci-reports/

## Inputs from nature
- Energy, geothermal, converted [natural resource, in ground]: 0.24242 MJ; lognormal variance with pedigree 0.0534941, pedigree (3,4,5,2,1)
  Uncertainty of operation temperatures of source and supply

## Emissions to nature
- Acetaldehyde [air, urban air close to ground]: 7.5758e-10 kg; lognormal variance with pedigree 1.122, pedigree (1,1,5,5,1)
  rough estimate based on gas boiler data
- Acetic acid [air, urban air close to ground]: 1.1364e-7 kg; lognormal variance with pedigree 1.122, pedigree (1,1,5,5,1)
  rough estimate based on gas boiler data
- Benzene [air, urban air close to ground]: 3.0303e-7 kg; lognormal variance with pedigree 1.122, pedigree (1,1,5,5,1)
  rough estimate based on gas boiler data
- Benzo(a)pyrene [air, urban air close to ground]: 7.5758e-12 kg; lognormal variance with pedigree 1.122, pedigree (1,1,5,5,1)
  rough estimate based on gas boiler data
- Butane [air, urban air close to ground]: 5.303e-7 kg; lognormal variance with pedigree 1.122, pedigree (1,1,5,5,1)
  rough estimate based on gas boiler data
- Carbon dioxide, fossil [air, urban air close to ground]: 0.042424 kg; lognormal variance with pedigree 0.042, pedigree (1,1,5,5,1)
  based on composition of natural gas
- Carbon monoxide, fossil [air, urban air close to ground]: 4.4697e-6 kg; lognormal variance with pedigree 1.042, pedigree (1,1,5,5,1)
  rough estimate based on calculation for gas boiler
- Dinitrogen monoxide [air, urban air close to ground]: 3.7879e-7 kg; lognormal variance with pedigree 1.122, pedigree (1,1,5,5,1)
  rough estimate based on gas boiler data
- Dioxins, measured as 2,3,7,8-tetrachlorodibenzo-p-dioxin [air, urban air close to ground]: 2.2727e-17 kg; lognormal variance with pedigree 1.122, pedigree (1,1,5,5,1)
  rough estimate based on gas boiler data
- Formaldehyde [air, urban air close to ground]: 7.5758e-8 kg; lognormal variance with pedigree 1.122, pedigree (1,1,5,5,1)
  rough estimate based on gas boiler data
- Mercury II [air, urban air close to ground]: 2.2727e-11 kg; lognormal variance with pedigree 0.692, pedigree (1,1,5,5,1)
  rough estimate based on gas boiler data
- Methane, fossil [air, urban air close to ground]: 1.5152e-6 kg; lognormal variance with pedigree 1.122, pedigree (1,1,5,5,1)
  rough estimate based on gas boiler data
- Nitrogen oxides [air, urban air close to ground]: 7.5e-6 kg; lognormal variance with pedigree 0.452, pedigree (1,1,5,5,1)
  rough estimate based on calculation for gas boiler
- PAH, polycyclic aromatic hydrocarbons [air, urban air close to ground]: 7.5758e-9 kg; lognormal variance with pedigree 1.122, pedigree (1,1,5,5,1)
  rough estimate based on gas boiler data
- Particulate Matter, < 2.5 um [air, urban air close to ground]: 7.5758e-8 kg; lognormal variance with pedigree 0.162, pedigree (1,1,5,5,1)
  rough estimate based on gas boiler data
- Pentane [air, urban air close to ground]: 9.0909e-7 kg; lognormal variance with pedigree 1.122, pedigree (1,1,5,5,1)
  rough estimate based on gas boiler data
- Propane [air, urban air close to ground]: 1.5152e-7 kg; lognormal variance with pedigree 1.122, pedigree (1,1,5,5,1)
  rough estimate based on gas boiler data
- Propionic acid [air, urban air close to ground]: 1.5152e-8 kg; lognormal variance with pedigree 1.122, pedigree (1,1,5,5,1)
  rough estimate based on gas boiler data
- Sulfur dioxide [air, urban air close to ground]: 3.7879e-7 kg; lognormal variance with pedigree 0.042, pedigree (1,1,5,5,1)
  based on composition of natural gas
- Toluene [air, urban air close to ground]: 1.5152e-7 kg; lognormal variance with pedigree 1.122, pedigree (1,1,5,5,1)
  rough estimate based on gas boiler data
- Nitrate [water, surface water]: 9.8485e-8 kg; lognormal variance with pedigree 0.342, pedigree (1,1,5,5,1)
  rough estimate based on gas boiler data
- Nitrite [water, surface water]: 2.2727e-9 kg; lognormal variance with pedigree 0.342, pedigree (1,1,5,5,1)
  rough estimate based on gas boiler data
- Sulfate [water, surface water]: 3.7879e-8 kg; lognormal variance with pedigree 0.342, pedigree (1,1,5,5,1)
  rough estimate based on gas boiler data
- Sulfite [water, surface water]: 3.7879e-8 kg; lognormal variance with pedigree 0.342, pedigree (1,1,5,5,1)
  rough estimate based on gas boiler data

## Sampling procedure
Literature data and manufacturer information, emissions from ecoinvent process natural gas, burned in boiler condensing modulating under 100kW

## Extrapolations
none This dataset has been copied from an original dataset covering the geography CH. The uncertainty has been adjusted accordingly.

## Review by Rolf Frischknecht 2007-08-13
passed
none

## Review by Emilia Moreno Ruiz 2012-04-16
calculation of fuel use property.
