# electricity production, hydro, aluminium industry

Dataset: EcoSpold 2, unit process
Geography: IAI Area, Russia & RER w/o EU27 & EFTA
Time period: 2015-01-01 to 2023-12-31
Technology level: current
Classification: ISIC rev.4 ecoinvent: 3510:Electric power generation, transmission and distribution
Classification: EcoSpold01Categories: hard coal/power plants
Tags: re-labelling activity; electricity, primary aluminium industry
Scenario: Business-as-Usual
System model: Allocation, cut-off by classification
Generated by: Djibril RENE
Database: ecoinvent
isCopyrightProtected: true
accessRestrictedTo: 1

## General comment
This is a dataset used to create an aluminium industry specific electricity market for European aluminium producing countries outside the region covered by the European Aluminium Association (EAA), i.e. outside EU27 and EFTA. The actual countries covered by this region are Russia, Montenegro and Bosnia and Herzegovina. The production volume represents the total amount of hydroelectricity used in the region for aluminium production (electrolysis and ingot casting). The dataset also identifies the technology and country providing the hydroelectricity in the region.
Electricity markets specific to the aluminium-industry are needed in an LCI database because primary aluminium production is very energy intensive, and hence the location of production plants is often determined by access to large amounts of cheap electricity, which often results in an electricity mix that is different from the general grid mix of the countries where the production plants are located.
It is assumed that the production of electricity in general and in aluminium industry specific power plants is identical. Details on actual electricity generation with each technology can be found in the corresponding datasets.
The share of hydroelectricity produced by the different technologies (reservoir, run-of-river, pumped storage) is calculated using both (1) estimates of the share of hydroelectricity coming from each country within the region (using country-specific aluminium production volumes, supplied by the International Aluminium Institute, and, for BA and ME, International Energy Agency data on electricity sources within each country) and (2) ecoinvent v3.2 country-specific split of hydroelectricity into different technologies. Exceptions to this methodology are: (1) share of hydroelectricity in the aluminium-specific grid mix were supplied by the IAI rather than determined by IEA data for RU; and hydropower was assumed to be from alpine reservoir plants for ME.
Calculations are detailed in the report 'Calculating grid mixes for the aluminium industry in ecoinvent v3', available on the ecoinvent website.

## Included activities start
Re-labelling dataset, not representing a real transformation activity. Conceptually, the activity can be said to start with the production of electricity.

## Included activities end
Re-labelling dataset, not representing a real transformation activity. Conceptually, the activity can be said to end with a given amount of high voltage electricity labelled as specifically used for the production of electricity.

## Time period
Production volume updated with 2015 data from IAI

## Reference product
- electricity, high voltage, aluminium industry: 1 kWh; = PS_BA+PS_RU+ ResA_BA+ ResNA_RoW+ ResNA_RU+RoR_BA+ RoR_RU; By-product classification allocatable product; CPC 17100: Electrical energy; HS2017 271600: Electrical energy
  Expressed as sum of contributing technologies (inputs) to allow uncertainty analysis: each technology share is uncertain, and in a Monte Carlo analysis will always be normalized by the sum contribution of each technology
  production volume 5.77315e10 kWh
    The production volume, which is ultimately used to determine the share of hydroelectricity in the downstream market for aluminium industry specific high voltage electricity, is calculated by multiplying the following data:
    (1) average electricity mix used to produce aluminium in the European aluminium producing countries outside the region covered by the European Aluminium Association (EU27+EFTA), made up of Russia, Montenegro and Bosnia and Herzegovina, based on the subtraction from European data from International Aluminium Institute of the EU27+EFTA data (from European Aluminium Association and validated by International Aluminium Institute).
    (2) primary aluminium production volumes of each aluminium producing country in the region, provided by International Aluminium Institute.
    (3) global average electricity requirements, per tonne primary aluminium, for both Söderberg and prebake electrolysis technologies, as well as the region specific proportion of aluminium produced by each technology.
    (4) electricity compensating line and transformation losses from production to consumption as medium voltage electricity. Losses estimated using country-level ecoinvent v3.2 data for RU and BA. Global average was used for ME.
    (5) electricity consumed in ingot casting.
  property price 0.0977 EUR2005
    Calculated in temporary price data. 94% of the average price (to account for a 6% loss in transformation and transmission) for electricity for industrial consumersin 2005 (excluded taxes). From IEA.
  properties: carbon allocation 0 kg, carbon content 0

## Inputs from technosphere
- electricity, high voltage: 0.0529669 kWh; name ResNA_RoW; lognormal variance with pedigree 0.0252, pedigree (4,5,4,1,2)
  Calculated amount (see general comments). Activity link to GLO due to the elcetricity production of some aluminium producing countries not being modeled in ecoinvent, see general comments.
- electricity, high voltage: 6.84186e-5 kWh; name PS_BA; lognormal variance with pedigree 0.0113, pedigree (3,2,4,1,2)
  Calculated amount (see general comments).
- electricity, high voltage: 0.00755778 kWh; name PS_RU; lognormal variance with pedigree 0.010725, pedigree (3,2,4,2,1)
  Calculated amount (see general comments).
- electricity, high voltage: 0.661297 kWh; name RoR_RU; lognormal variance with pedigree 0.0113, pedigree (3,2,4,1,2)
  Calculated amount (see general comments).
- electricity, high voltage: 0.220432 kWh; name ResNA_RU; lognormal variance with pedigree 0.0113, pedigree (3,2,4,1,2)
  Calculated amount (see general comments).
- electricity, high voltage: 0.0201869 kWh; name ResA_BA; lognormal variance with pedigree 0.0113, pedigree (3,2,4,1,2)
  Calculated amount (see general comments).
- electricity, high voltage: 0.03749 kWh; name RoR_BA; lognormal variance with pedigree 0.0113, pedigree (3,2,4,1,2)
  Calculated amount (see general comments).

## Sampling procedure
IAI data used for total electricity used in the production of aluminium that is from hydroelectric plants. ecoinvent data used to split hydroelectricity production to the respective technologies (reservoir, run-of-river, pumped storage). The cited 97% representativeness is for IAI data (data based on 97% of regional aluminium production). The percent representativeness of data used to split hydroelectricity production to different types of plants (national grid proxy) is 95% (all but ME).

## Extrapolations
For the split of hydroelectricity production to the respective technologies (reservoir, run-of-river, pumped storage), shares of different types of hydroelectric plants in the countries, when available, were used as a proxy for the split relevant for the aluminium industry, see general comments.
