# lime production, hydraulic

Dataset: EcoSpold 2, unit process
Geography: RoW
Time period: 1997-01-01 to 2023-12-31
Technology level: current
Classification: EcoSpold01Categories: construction materials/binder
Classification: ISIC rev.4 ecoinvent: 2394:Manufacture of cement, lime and plaster
Synonyms: Klinker; rotary kiln; clinker; cement; Zement; Drehrohrofen
Tags: ConvertedDataset
Scenario: Business-as-Usual
System model: Allocation, cut-off by classification
Share of production covered: 70 %
Generated by: Tina Künniger
Published in: Kellenberger D. 2004
Database: ecoinvent
isCopyrightProtected: true
accessRestrictedTo: 1

## General comment
Contrary to clinker production, in this module no waste materials as fuel or secondary raw materials are included. Accordingly, no CO2-emissions from burning of waste are included. Other air emissions, assumed proportional to the fuel use, are estimated to be 88% of the emissions from the clinker calcination process, because the energy consumption is assumed to be 88% of the uses for clinker making.
[This dataset was already contained in the ecoinvent database version 2. It was not individually updated during the transfer to ecoinvent version 3. Life Cycle Impact Assessment results may still have changed, as they are affected by changes in the supply chain, i.e. in other datasets. This dataset was generated following the ecoinvent quality guidelines for version 2. It may have been subject to central changes described in the ecoinvent version 3 change report (http://www.ecoinvent.org/database/ecoinvent-version-3/reports-of-changes/), and the results of the central updates were reviewed extensively. The changes added e.g. consistent water flows and other information throughout the database. The documentation of this dataset can be found in the ecoinvent reports of version 2, which are still available via the ecoinvent website. The change report linked above covers all central changes that were made during the conversion process.]

## Included activities end
Includes the whole manufacturing process to burn hydraulic lime (raw material provision, grinding and mixing; rotary kiln process), internal processes (transport, etc.). For the infrastructure only the rotary kiln is taken into account (as material consumption). No administration is included.

## Geography
For some exchanges RER-modules have been used as proxy

## Technology
Copy of the clinker production technology with mainly adjustments of the energy amount and the emissions. Additionally some water for the hydration has been included.

## Parameters
- fraction, process water, to air: 0.15 dimensionless; name fraction_PW_to_air; lognormal variance with pedigree 0.092025, pedigree (4,4,3,2,4)
- fraction, tap water, to air: 0.15 dimensionless; name fraction_TW_to_air; lognormal variance with pedigree 0.092025, pedigree (4,4,3,2,4)

## Reference product
- lime, hydraulic: 1 kg; By-product classification allocatable product; CPC 37420: Quicklime, slaked lime and hydraulic lime; HS2017 252100: Limestone flux; limestone and other calcareous stone, of a kind used for the manufacture of lime or cement; CAS 85117-09-5
  EcoSpold01Location=CH
  production volume 3.96633 kg
    This is a placeholder value that does not reflect real-world production volumes. This dataset does not currently require a real-world production volume to work in the database framework, and no actual data were collected yet. This has no negative effect on the results of the ecoinvent database.
  properties: carbon allocation 0 kg, carbon content 0, carbon content, fossil 0, carbon content, non-fossil 0, dry mass 1 kg, price 1.77 EUR2005, water content 0, water in wet mass 0 kg, wet mass 1 kg

## Inputs from technosphere
- ammonia, anhydrous, liquid: 2.54535e-5, 4.94105e-5, 0.000547684, 2.31509e-5, 5.17876e-6, 0.000190329, 1.6361e-5, 5.04325e-5 kg (8 suppliers, which the file names only by identifier); sum of these 0.000908 kg; lognormal variance with pedigree 0.692, pedigree (1,1,5,5,1)
  EcoSpold01Location=CH
  estimation
  properties: dry mass 1 kg, wet mass 1 kg
- bauxite: 0.00012 kg; lognormal variance with pedigree 0.692, pedigree (1,1,5,5,1)
  EcoSpold01Location=GLO
  estimation
  properties: dry mass 1 kg, wet mass 1 kg
- cement factory: 6.27e-12 unit; lognormal variance with pedigree 0.692, pedigree (1,1,5,5,1)
  estimation
  EcoSpold01Location=CH
- clay: 0.331 kg; lognormal variance with pedigree 0.692, pedigree (1,1,5,5,1)
  estimation
  EcoSpold01Location=CH
  properties: dry mass 0.965 kg, water content 0.0362694, wet mass 1 kg
- diesel, burned in building machine: 0.0134 MJ; lognormal variance with pedigree 0.692, pedigree (1,1,5,5,1)
  EcoSpold01Location=GLO
  estimation
  properties: heating value, net 1 MJ
- electricity, medium voltage: 0.00162015, 0.0323183, 0.0108588, 0.000496144, 9.93028e-5, 2.13225e-5, 0.00225669, 0.00333736, 0.00699189 kWh (9 suppliers, which the file names only by identifier); sum of these 0.058 kWh; lognormal variance with pedigree 0.692, pedigree (1,1,5,5,1)
  EcoSpold01Location=CH
  estimation
- hard coal: 0.00321893, 0.000763828, 0.00250622, 0.0227811, 0.00535012, 0.00328484, 0.00479905, 0.00709899, 0.00139691 kg (9 suppliers, which the file names only by identifier); sum of these 0.0512 kg; lognormal variance with pedigree 0.692, pedigree (1,1,5,5,1)
  estimation
  EcoSpold01Location=WEU
  properties: carbon content, fossil 0.845, dry mass 0.94 kg, heating value, net 27.91 MJ, water content 0.0638298, wet mass 1 kg
  note on carbon content, fossil: C content 75-94% (specified in Tab 1.1, report 6, part VI). A mean content of 0.845 kg C/ kg dry hard coal was considered
  note on heating value, net: Based on the Characterization factor of Hard coal in the CED method
- heavy fuel oil: 0.000399462, 0.000232612, 0.00118256, 0.027644, 0.000298407, 0.00153337, 0.00560958 kg (7 suppliers, which the file names only by identifier); sum of these 0.0369 kg; lognormal variance with pedigree 0.692, pedigree (1,1,5,5,1)
  estimation
  EcoSpold01Location=CH
  properties: carbon content, fossil 0.849, dry mass 1 kg, heating value, net 41.2 MJ, wet mass 1 kg
- industrial machine, heavy, unspecified: 3.76e-5 kg; lognormal variance with pedigree 0.692, pedigree (1,1,5,5,1)
  EcoSpold01Location=RER
  estimation
- inert waste, for final disposal: -8e-5 kg; lognormal variance with pedigree 0.652, pedigree (1,1,1,5,1)
  estimation
  EcoSpold01Location=CH
  production volume
    Calculated from the production volume of lime, hydraulic in proportion to the respective output amounts.
  properties: dry mass 0.995 kg, water content 0.00502513, wet mass 1 kg
- lime: 1.42 kg; lognormal variance with pedigree 0.692, pedigree (1,1,5,5,1)
  EcoSpold01Location=CH
  estimation
  properties: carbon content, fossil 0.120005, dry mass 1 kg, wet mass 1 kg
- lime, hydrated, loose weight: 0.00392 kg; lognormal variance with pedigree 0.692, pedigree (1,1,5,5,1)
  estimation
  EcoSpold01Location=CH
  properties: dry mass 0.997 kg, water content 0.00300903, wet mass 1 kg
- lubricating oil: 4.71e-5 kg; lognormal variance with pedigree 0.692, pedigree (1,1,5,5,1)
  estimation
  EcoSpold01Location=RER
  properties: carbon content, fossil 0.75, dry mass 1 kg, heating value, net 40.2 MJ, wet mass 1 kg
  note on carbon content, fossil: Lubricating oil is produced from diesel. C-content/dry mass of fats and oils considered 75%, from: ecoinvent v2.2 report, n 15a, pg 40
  note on heating value, net: Literature value, Source: IPCC 2006, 2006 IPCC Guidelines for National Greenhouse Gas Inventories, Prepared by the National Greenhouse Gas Inventories Programme, Eggleston H.S., Buendia L., Miwa K., Ngara T. and Tanabe K. (eds). Published: IGES, Japan
- municipal solid waste: -7.64659e-8, -9.07999e-9, -5.76916e-8, -5.65116e-8, -4.3142e-5, -1.45335e-6, -6.35382e-9, -2.03946e-9, -4.60974e-9, -1.91905e-7 kg (10 suppliers, which the file names only by identifier); sum of these -4.5e-5 kg; lognormal variance with pedigree 0.652, pedigree (1,1,1,5,1)
  EcoSpold01Location=CH
  estimation
  production volume
    (same comment as for inert waste, for final disposal)
  properties: carbon content, fossil 0.171549, carbon content, non-fossil 0.261655, dry mass 0.771 kg, heating value, net 11.74 MJ, water content 0.297017, wet mass 1 kg
  note on carbon content, fossil: MSW composition in tab 4.1, ecoinvent v2.2 report 13_I. C content referred to 1 kg DM
  note on heating value, net: Value taken from the general comment of the treatment dataset.
- refractory, basic, packed: 0.00019 kg; lognormal variance with pedigree 0.692, pedigree (1,1,5,5,1)
  estimation
  EcoSpold01Location=DE
  properties: dry mass 1 kg, wet mass 1 kg
- refractory, fireclay, packed: 8.21e-5 kg; lognormal variance with pedigree 0.692, pedigree (1,1,5,5,1)
  EcoSpold01Location=DE
  estimation
  properties: dry mass 1 kg, wet mass 1 kg
- refractory, high aluminium oxide, packed: 0.000137 kg; lognormal variance with pedigree 0.692, pedigree (1,1,5,5,1)
  EcoSpold01Location=DE
  estimation
  properties: dry mass 1 kg, wet mass 1 kg
- sand: 0.000140131, 0.00911914, 7.27495e-7 kg (3 suppliers, which the file names only by identifier); sum of these 0.00926 kg; lognormal variance with pedigree 0.692, pedigree (1,1,5,5,1)
  EcoSpold01Location=CH
  estimation
  properties: dry mass 1 kg, wet mass 1 kg
- steel, chromium steel 18/8, hot rolled: 5.86e-5 kg; lognormal variance with pedigree 0.692, pedigree (1,1,5,5,1)
  EcoSpold01Location=RER
  estimation
  properties: carbon content, fossil 0.0008, dry mass 1 kg, wet mass 1 kg
  note on carbon content, fossil: Stainless steel model is the grade 304 steel (18/8 stainless, 18% chromium 8% nickel; max. 0.08% C)
- tap water: 0.0004146, 0.000632023, 0.00117932, 0.00317701, 0.000382427, 0.0159371, 0.182377, 0.135901 kg (8 suppliers, which the file names only by identifier); sum of these 0.34 kg; lognormal variance with pedigree 0.692, pedigree (1,1,5,5,1)
  estimation
  EcoSpold01Location=RER
  properties: carbon content, fossil 0.00178991, dry mass 0.000337476 kg, water content 2962.17, wet mass 1 kg
  note on carbon content, fossil: Bicarbonate content is 2.93 mol/m3. CO2 content is 0.1 mol/m3 (ecoinvent v2.2 report 8, Tab 93.1).

## Inputs from nature
- Water, unspecified natural origin [natural resource, in water]: 0.00128 m3; name water_UNO_input; source SCA - Slag Cement Association 2003; lognormal variance with pedigree 0.0546, pedigree (3,3,5,5,1)
  estimation
  Calculated based on literature, (Vionnet, S., Quantis Water Database - Technical Report, 2012).

## Emissions to nature
- Ammonia [air, unspecified]: 2.01e-5 kg; lognormal variance with pedigree 0.692, pedigree (1,1,5,5,1)
  estimation
- Antimony ion [air, unspecified]: 1.76e-9 kg; lognormal variance with pedigree 0.692, pedigree (1,1,5,5,1)
  estimation
- Arsenic ion [air, unspecified]: 1.06e-8 kg; lognormal variance with pedigree 0.692, pedigree (1,1,5,5,1)
  estimation
- Beryllium II [air, unspecified]: 2.64e-9 kg; lognormal variance with pedigree 0.692, pedigree (1,1,5,5,1)
  estimation
- Cadmium II [air, unspecified]: 6.16e-9 kg; lognormal variance with pedigree 0.692, pedigree (1,1,5,5,1)
  estimation
- Carbon dioxide, fossil [air, unspecified]: 0.754 kg; lognormal variance with pedigree 0.692, pedigree (1,1,5,5,1)
  estimation
- Carbon monoxide, fossil [air, unspecified]: 0.000415 kg; lognormal variance with pedigree 0.692, pedigree (1,1,5,5,1)
  estimation
- Chromium III [air, unspecified]: 1.28e-9 kg; lognormal variance with pedigree 0.692, pedigree (1,1,5,5,1)
  estimation
- Chromium VI [air, unspecified]: 4.84e-10 kg; lognormal variance with pedigree 0.692, pedigree (1,1,5,5,1)
  estimation
- Cobalt II [air, unspecified]: 3.52e-9 kg; lognormal variance with pedigree 0.692, pedigree (1,1,5,5,1)
  estimation
- Copper ion [air, unspecified]: 1.23e-8 kg; lognormal variance with pedigree 0.692, pedigree (1,1,5,5,1)
  estimation
- Dioxins, measured as 2,3,7,8-tetrachlorodibenzo-p-dioxin [air, unspecified]: 8.44e-13 kg; lognormal variance with pedigree 0.692, pedigree (1,1,5,5,1)
  estimation
- Hydrochloric acid [air, unspecified]: 5.55e-6 kg; lognormal variance with pedigree 0.692, pedigree (1,1,5,5,1)
  estimation
- Lead II [air, unspecified]: 7.48e-8 kg; lognormal variance with pedigree 0.692, pedigree (1,1,5,5,1)
  estimation
- Mercury II [air, unspecified]: 2.9e-8 kg; lognormal variance with pedigree 0.692, pedigree (1,1,5,5,1)
  estimation
- Methane, fossil [air, unspecified]: 7.81e-6 kg; lognormal variance with pedigree 0.692, pedigree (1,1,5,5,1)
  estimation
- NMVOC, non-methane volatile organic compounds [air, unspecified]: 4.96e-5 kg; lognormal variance with pedigree 0.692, pedigree (1,1,5,5,1)
  estimation
- Nickel II [air, unspecified]: 4.4e-9 kg; lognormal variance with pedigree 0.692, pedigree (1,1,5,5,1)
  estimation
- Nitrogen oxides [air, unspecified]: 0.00095 kg; lognormal variance with pedigree 0.692, pedigree (1,1,5,5,1)
  estimation
- Particulate Matter, < 2.5 um [air, non-urban air or from high stacks]: 2.12e-5 kg; lognormal variance with pedigree 0.692, pedigree (1,1,5,5,1)
  estimation
- Particulate Matter, > 10 um [air, non-urban air or from high stacks]: 4.98e-6 kg; lognormal variance with pedigree 0.692, pedigree (1,1,5,5,1)
  estimation
- Particulate Matter, > 2.5 um and < 10um [air, non-urban air or from high stacks]: 6.97e-6 kg; lognormal variance with pedigree 0.692, pedigree (1,1,5,5,1)
  estimation
- Selenium IV [air, unspecified]: 1.76e-9 kg; lognormal variance with pedigree 0.692, pedigree (1,1,5,5,1)
  estimation
- Sulfur dioxide [air, unspecified]: 0.000313 kg; lognormal variance with pedigree 0.692, pedigree (1,1,5,5,1)
  estimation
- Thallium I [air, unspecified]: 1.14e-8 kg; lognormal variance with pedigree 0.692, pedigree (1,1,5,5,1)
  estimation
- Tin ion [air, unspecified]: 7.92e-9 kg; lognormal variance with pedigree 0.692, pedigree (1,1,5,5,1)
  estimation
- Vanadium V [air, unspecified]: 4.4e-9 kg; lognormal variance with pedigree 0.692, pedigree (1,1,5,5,1)
  estimation
- Water [air, unspecified]: 0.000243 m3; name water_to_air_unspecified; = (tap_water_input/1000*fraction_TW_to_air)+(water_UNO_input*fraction_PW_to_air); lognormal variance with pedigree 0.0827, pedigree (2,2,5,5,1)
  Calculated value based on literature values and expert opinion. See comments in the parametres' comment field.
  property fraction, origin: fresh water 0.209877; name fraction_origin_fresh_water
  property fraction, origin: salt water 0; name fraction_origin_salt_water
  property fraction, origin: unspecified 0.790123; name fraction_origin_unspecified
- Zinc II [air, unspecified]: 5.28e-8 kg; lognormal variance with pedigree 0.692, pedigree (1,1,5,5,1)
  estimation
- Water [water, unspecified]: 0.001377 m3; name water_to_water_unspecified; = (tap_water_input/1000)*(1-fraction_TW_to_air)+water_UNO_input*(1-fraction_PW_to_air); lognormal variance with pedigree 0.0827, pedigree (2,2,5,5,1)
  (same comment as for Water)
  property carbon content, fossil 0; name C_content_fossil
  property carbon content, non-fossil 0; name C_content_non_fossil
  property dry mass 0 kg; name DM
  property fraction, origin: fresh water 0.209877; name fraction_origin_fresh_water_Ww
  property fraction, origin: salt water 0; name fraction_origin_salt_water_Ww
  property fraction, origin: unspecified 0.790123; name fraction_origin_unspecified_Ww
  property water in wet mass 1000 kg; name WWM
  property wet mass 1000 kg; name WM

## Sampling procedure
Data adapted from module "clinker, at plant" based on literature

## Extrapolations
See geography This dataset has been copied from an original dataset covering the geography CH. The uncertainty has been adjusted accordingly.

## Review by Roberto Dones 2004-04-14
passed
