# treatment of used window frame, plastic, collection for final disposal

Dataset: EcoSpold 2, unit process
Geography: CH
Time period: 1996-01-01 to 2023-12-31
Technology level: current
Classification: ISIC rev.4 ecoinvent: 3821:Treatment and disposal of non-hazardous waste
Tags: ConvertedDataset; Treatment
Scenario: Business-as-Usual
System model: Allocation, cut-off by classification
Generated by: Martin Lehmann
Published in: Kellenberger D. 2007
Database: ecoinvent
isCopyrightProtected: true
accessRestrictedTo: 1

## General comment
This dataset describes the disposal of a plastic window frame with 1 m2 visible area via a municipal incineration plant. Distance to incineration site is assumed to be 50 km.
[This dataset was already contained in the ecoinvent database version 2. It was not individually updated during the transfer to ecoinvent version 3. Life Cycle Impact Assessment results may still have changed, as they are affected by changes in the supply chain, i.e. in other datasets. This dataset was generated following the ecoinvent quality guidelines for version 2. It may have been subject to central changes described in the ecoinvent version 3 change report (http://www.ecoinvent.org/database/ecoinvent-version-3/reports-of-changes/), and the results of the central updates were reviewed extensively. The changes added e.g. consistent water flows and other information throughout the database. The documentation of this dataset can be found in the ecoinvent reports of version 2, which are still available via the ecoinvent website. The change report linked above covers all central changes that were made during the conversion process.]

## Included activities end
Included processes are the disposal of rubber, plastic (polypropylene, expanded polystyrene, polyvinylchloride), steel, aluminium, copper and zinc, and the transport to the incineration site. Metal parts are too small to be efficiently collected and recycled.

## Geography
Swiss practice of waste management of window frames.

## Technology
Waste management includes incineration of rubber, plastic, steel, aluminium, copper and zinc parts, and the transport to the incineration site by average 28t lorry.

## Reference product
- used window frame, plastic: -1 m2; name RP_amount_1; By-product classification Waste; CPC 39270: Waste, parings and scrap of plastics; HS2017 391590: Plastics n.e.c. in heading no. 3915; waste, parings and scrap
  production volume 0.0336675 m2; name RP_PV_1
    This is a placeholder value that does not reflect real-world production volumes. This dataset does not currently require a real-world production volume to work in the database framework, and no actual data were collected yet. This has no negative effect on the results of the ecoinvent database. The placeholder value of this activity was scaled according to the nominal GDP of 2005 (source: United Nations, http://data.un.org/Glossary.aspx?q=GDP+%28current+US%24%29, accessed 20130726) to reflect an appropriate share of the global production volume, which is also a placeholder value.
  property price 0 EUR2005
    Waste products are assigned a price of zero as they are assumed to require further treatment.
  properties: carbon allocation 24.8766 kg, carbon content 0.263244, carbon content, fossil 0.263244, carbon content, non-fossil 0, dry mass 94.5 kg, water content 0, water in wet mass 0 kg, wet mass 94.5 kg

## Inputs from technosphere
- scrap aluminium: -1.04 kg; name BP_amount_7; lognormal variance with pedigree 0.01, pedigree (1,1,1,1,1)
  composite
  production volume; = BP_amount_7* RP_PV_1/ABS( RP_amount_1)
    Calculated from the production volume of used window frame, plastic in proportion to the respective output amounts.
  properties: dry mass 1 kg, wet mass 1 kg
- scrap copper: -0.00698 kg; name BP_amount_8; lognormal variance with pedigree 0.0107, pedigree (1,3,1,3,1)
  production volume; = BP_amount_8* RP_PV_1/ABS( RP_amount_1)
    (same comment as for scrap aluminium)
  properties: dry mass 1 kg, wet mass 1 kg
- scrap steel: -28.1 kg; name BP_amount_1; lognormal variance with pedigree 0.0107, pedigree (1,3,1,3,1)
  activityLink introduced to establish a direct link to the corresponding regional supply of this product
  production volume; = BP_amount_1* RP_PV_1/ABS( RP_amount_1)
    (same comment as for scrap aluminium)
- waste expanded polystyrene: -0.392 kg; name BP_amount_3; lognormal variance with pedigree 0.0107, pedigree (1,3,1,3,1)
  production volume; = BP_amount_3* RP_PV_1/ABS( RP_amount_1)
    (same comment as for scrap aluminium)
  properties: carbon content, fossil 0.864875, dry mass 0.95 kg, heating value, net 38.67 MJ, water content 0.0526316, wet mass 1 kg
  note on carbon content, fossil: Average of different polystyrene extruded. Shares are 50% (w/w) extruded using CO2/acetone as blowing agent, 25% (w/w) using HFC-134a as a blowing agent and 25% (w/w) using HFC-152a as a blowing agent (ecoinvent v2.2 report 16, part XIV, Tab 4.21). Similar result is reported in Tab A.5, ecoinvent report 13_I.
- waste polyethylene/polypropylene product: -0.368 kg; name BP_amount_5; lognormal variance with pedigree 0.0107, pedigree (1,3,1,3,1)
  production volume; = BP_amount_5* RP_PV_1/ABS( RP_amount_1)
    (same comment as for scrap aluminium)
  properties: carbon content, fossil 0.748045, dry mass 0.847 kg, heating value, net 42.47 MJ, water content 0.180638, wet mass 1 kg
  note on carbon content, fossil: Mixed various plastics was used to estimate the C content of this waste (Tab A.2, ecoinvent v2.2 report 13_I)
- waste polyvinylchloride product: -55.5 kg; name BP_amount_4; lognormal variance with pedigree 0.0107, pedigree (1,3,1,3,1)
  production volume; = BP_amount_4* RP_PV_1/ABS( RP_amount_1)
    (same comment as for scrap aluminium)
  properties: carbon content, fossil 0.440882, dry mass 0.998 kg, heating value, net 21.51 MJ, water content 0.00200401, wet mass 1 kg
- waste rubber, unspecified: -0.798 kg; name BP_amount_2; lognormal variance with pedigree 0.0107, pedigree (1,3,1,3,1)
  production volume; = BP_amount_2* RP_PV_1/ABS( RP_amount_1)
    (same comment as for scrap aluminium)
  properties: carbon content, fossil 0.853, dry mass 1 kg, heating value, net 27.19 MJ, wet mass 1 kg
  note on heating value, net: Value taken from the general comment of the treatment dataset.
- zinc in car shredder residue: -0.325 kg; name BP_amount_6; lognormal variance with pedigree 0.0107, pedigree (1,3,1,3,1)
  production volume; = BP_amount_6* RP_PV_1/ABS( RP_amount_1)
    (same comment as for scrap aluminium)
  properties: dry mass 1 kg, wet mass 1 kg

## Sampling procedure
Calculation from window frame material composition

## Extrapolations
see Geography

## Review by Rolf Frischknecht 2010-02-07
passed
