# liquid manure spreading, by vacuum tanker

Dataset: EcoSpold 2, unit process
Geography: US
Time period: 2021-01-01 to 2023-12-31
Technology level: current
Classification: ISIC rev.4 ecoinvent: 0161:Support activities for crop production
Synonyms: slurry spreading by vacuum tanker
Scenario: Business-as-Usual
System model: Allocation, cut-off by classification
Generated by: Juanita Barrera
Database: ecoinvent
isCopyrightProtected: true
accessRestrictedTo: 1

## General comment
This dataset represents the service of mixing and then pumping 1 m3 liquid slurry (1 t) from farm pit into tanker (average capacity 24.7 m3), and spreading the slurry onto field (low height nozzle spraying). Slurry production and any emission from slurry are not included.

## Included activities start
The liquid manure loading and spreading activity starts from preliminary work at farm, like attaching the adequate machinery to the tractor

## Included activities end
This activity ends with transfer back to farm and concluding work, like uncoupling the machine. The dataset includes mixing the slurry before pumping into tanker at farm; transfer to field; field spreading of 1 m3 of slurry, including field turning, idling and overlapping. The inventory takes into account the diesel fuel consumption and the amount of agricultural machinery and of the shed, which has to be attributed to the slurry loading and spreading. Also taken into consideration is the amount of emissions to the air from combustion and the emission to the soil from tyre abrasion during the work process. The amount of spread material is not taken into account, nor dust other than from combustion and noise.

## Geography
The inventory is a copy of the geography of Quebec, Canada. Data quality indicators are adjusted accordingly.

## Technology
Emissions by the newest models of tractors set into operation during the period from 1999 to 2001.

## Reference product
- liquid manure spreading, by vacuum tanker: 1 m3; By-product classification allocatable product; CPC 86119: Other support services to crop production
  production volume 7.66803e6 m3
    FAOSTAT data year 2020: manure applied to soils, 50% assumed as liquid, dilution 1:1, total N content 2.4 kg N/m3 diluted liquid manure.
  property price 18.5829 EUR2005
    The price is from the year 2023. The price is estimated as a proxy based on the source: https://ag.purdue.edu/commercialag/home/resource/2023/03/indiana-farm-custom-rates/. The prices were adjusted for inflation relative to 2005 using the producer price index (PPI) of the euro area, published by eurostat (https://ec.europa.eu/eurostat/databrowser/view/STS_INPP_A__custom_6416181/default/table?lang=en, last accessed on 2023-06-01).
  properties: carbon allocation 0 kg, carbon content 0

## Inputs from technosphere
- diesel: 0.825 kg; lognormal variance with pedigree 0.0048, pedigree (1,4,2,5,1)
  proxy from "liquid manure spreading, by vacuum tanker, CA-QC"
  properties: carbon content, fossil 0.865, dry mass 1 kg, heating value, net 42.8 MJ, wet mass 1 kg
- liquid manure tank trailer: 0.0563 kg; lognormal variance with pedigree 0.3042, pedigree (1,4,2,5,1)
  proxy from "liquid manure spreading, by vacuum tanker, CA-QC"
- shed: 0.00019 m2; lognormal variance with pedigree 0.3042, pedigree (1,4,2,5,1)
  proxy from "liquid manure spreading, by vacuum tanker, CA-QC"
- tractor, 4-wheel, agricultural: 0.0275 kg; lognormal variance with pedigree 0.3042, pedigree (1,4,2,5,1)
  proxy from "liquid manure spreading, by vacuum tanker, CA-QC"

## Emissions to nature
- Ammonia [air, non-urban air or from high stacks]: 1.6462e-5 kg; lognormal variance with pedigree 0.0603, pedigree (1,2,2,5,3)
  proxy from "liquid manure spreading, by vacuum tanker, CA-QC"
- Benzene [air, non-urban air or from high stacks]: 6.00691e-6 kg; lognormal variance with pedigree 0.0603, pedigree (1,2,2,5,3)
  proxy from "liquid manure spreading, by vacuum tanker, CA-QC"
- Benzo(a)pyrene [air, non-urban air or from high stacks]: 2.4712e-8 kg; lognormal variance with pedigree 0.6603, pedigree (1,2,2,5,3)
  proxy from "liquid manure spreading, by vacuum tanker, CA-QC"
- Cadmium II [air, non-urban air or from high stacks]: 8.25e-9 kg; lognormal variance with pedigree 0.6603, pedigree (1,2,2,5,3)
  proxy from "liquid manure spreading, by vacuum tanker, CA-QC"
- Carbon dioxide, fossil [air, non-urban air or from high stacks]: 2.56244 kg; lognormal variance with pedigree 0.0203, pedigree (1,2,2,5,3)
  proxy from "liquid manure spreading, by vacuum tanker, CA-QC"
- Carbon monoxide, fossil [air, non-urban air or from high stacks]: 0.00593088 kg; lognormal variance with pedigree 0.6542, pedigree (1,4,2,5,1)
  proxy from "liquid manure spreading, by vacuum tanker, CA-QC"
- Chromium III [air, non-urban air or from high stacks]: 4.10599e-8 kg; lognormal variance with pedigree 0.6603, pedigree (1,2,2,5,3)
  proxy from "liquid manure spreading, by vacuum tanker, CA-QC"
- Copper ion [air, non-urban air or from high stacks]: 1.39908e-6 kg; lognormal variance with pedigree 0.6603, pedigree (1,2,2,5,3)
  proxy from "liquid manure spreading, by vacuum tanker, CA-QC"
- Dinitrogen monoxide [air, non-urban air or from high stacks]: 9.88479e-5 kg; lognormal variance with pedigree 0.0603, pedigree (1,2,2,5,3)
  proxy from "liquid manure spreading, by vacuum tanker, CA-QC"
- Methane, fossil [air, non-urban air or from high stacks]: 0.000106452 kg; lognormal variance with pedigree 0.0603, pedigree (1,2,2,5,3)
  proxy from "liquid manure spreading, by vacuum tanker, CA-QC"
- NMVOC, non-methane volatile organic compounds [air, non-urban air or from high stacks]: 0.00262327 kg; lognormal variance with pedigree 0.0442, pedigree (1,4,2,5,1)
  proxy from "liquid manure spreading, by vacuum tanker, CA-QC"
- Nickel II [air, non-urban air or from high stacks]: 5.7788e-8 kg; lognormal variance with pedigree 0.6603, pedigree (1,2,2,5,3)
  proxy from "liquid manure spreading, by vacuum tanker, CA-QC"
- Nitrogen oxides [air, non-urban air or from high stacks]: 0.0355853 kg; lognormal variance with pedigree 0.0442, pedigree (1,4,2,5,1)
  proxy from "liquid manure spreading, by vacuum tanker, CA-QC"
- PAH, polycyclic aromatic hydrocarbons [air, non-urban air or from high stacks]: 2.71071e-6 kg; lognormal variance with pedigree 0.3203, pedigree (1,2,2,5,3)
  proxy from "liquid manure spreading, by vacuum tanker, CA-QC"
- Particulate Matter, < 2.5 um [air, non-urban air or from high stacks]: 0.00327719 kg; lognormal variance with pedigree 0.3203, pedigree (1,2,2,5,3)
  proxy from "liquid manure spreading, by vacuum tanker, CA-QC"
- Selenium IV [air, non-urban air or from high stacks]: 8.25e-9 kg; lognormal variance with pedigree 0.0603, pedigree (1,2,2,5,3)
  proxy from "liquid manure spreading, by vacuum tanker, CA-QC"
- Sulfur dioxide [air, non-urban air or from high stacks]: 0.000828802 kg; lognormal variance with pedigree 0.0203, pedigree (1,2,2,5,3)
  proxy from "liquid manure spreading, by vacuum tanker, CA-QC"
- Zinc II [air, non-urban air or from high stacks]: 8.25e-7 kg; lognormal variance with pedigree 0.6603, pedigree (1,2,2,5,3)
  proxy from "liquid manure spreading, by vacuum tanker, CA-QC"
- Cadmium II [soil, agricultural]: 2.11e-8 kg; lognormal variance with pedigree 0.0442, pedigree (1,4,2,5,1)
  proxy from "liquid manure spreading, by vacuum tanker, CA-QC"
- Lead II [soil, agricultural]: 9.15e-8 kg; lognormal variance with pedigree 0.0442, pedigree (1,4,2,5,1)
  proxy from "liquid manure spreading, by vacuum tanker, CA-QC"
- Zinc II [soil, agricultural]: 5.59e-5 kg; lognormal variance with pedigree 0.0442, pedigree (1,4,2,5,1)
  proxy from "liquid manure spreading, by vacuum tanker, CA-QC"

## Extrapolations
The dataset is modeled for agricultural production system in US. Data Quality indicators are adjusted accordingly. Emissions by the newest models of tractors set into operation during the period from 1999 to 2001.
