# chromium steel pipe production

Dataset: EcoSpold 2, unit process
Geography: GLO
Time period: 2008-01-01 to 2023-12-31
Technology level: current
Classification: ISIC rev.4 ecoinvent: 2410:Manufacture of basic iron and steel
Scenario: Business-as-Usual
System model: Allocation, cut-off by classification
Generated by: Karin Treyer
Database: ecoinvent
isCopyrightProtected: true
accessRestrictedTo: 1

## General comment
This is a proxy dataset for the production of chromium steel pipes.

## Included activities start
This dataset is a first proxy for the production of chromium steel pipes, but has to be revised by specialists.

## Included activities end
This dataset doesn't include any specifications, but only produced chromium steel and it's processing as proxy inputs. Besides these, it doesn't include any energy or material use.

## Reference product
- chromium steel pipe: 1 kg; By-product classification allocatable product; CPC 4128: Tubes, pipes and hollow profiles, of steel; HS2017 7304: Tubes, pipes and hollow profiles, seamless, of iron (other than cast iron) or steel
  production volume 1e7 kg
    Proxy - This value is not a true value and therefore has no correlation with reality. It should be adapted when working on this dataset.
  property carbon content, fossil 0.0008
    Stainless steel model is the grade 304 steel (18/8 stainless, 18% chromium 8% nickel; max. 0.08% C)
  property carbon content, non-fossil 0
    assummed to be the same as in case of "steel, chromium steel 18/8"
  property heating value, net 0 MJ
    Non combustible products are assumed to have an LHV equal to zero (0).
  property price 3.5 EUR2005
    Calculated value based on data from United Nations Commodity Trade Statistics Database (comtrade.un.org). UN comtrade category: 730640 Pipes and tubing, stainless steel, welded. Year 2005. Using exchange rate of 1EURO = 1.209 USD. Average of price of import into 5 main markets (EU, US, JP, IN and CN).
  properties: carbon allocation 0.0008 kg, carbon content 0.0008, dry mass 1 kg, water content 0, water in wet mass 0 kg, wet mass 1 kg

## Inputs from technosphere
- drawing of pipe, steel: 1 kg; lognormal variance with pedigree 0.51, pedigree (5,5,5,5,5)
  Proxy - This input is only a proxy for the whole production process of the whole chromium steel pipe.
- steel, chromium steel 18/8: 1 kg; lognormal variance with pedigree 0.51, pedigree (5,5,5,5,5)
  (same comment as for drawing of pipe, steel)
  properties: carbon content, fossil 0.0008, dry mass 1 kg, wet mass 1 kg
  note on carbon content, fossil: Stainless steel model is the grade 304 steel (18/8 stainless, 18% chromium 8% nickel; max. 0.08% C)

## Sampling procedure
Estimation of basic proxy inputs.

## Review by Bo Weidema 2012-01-11
This dataset has only been reviewed by two editors. Since this is an infrastructure dataset, this deviation from normal procedures is acceptable.

## Review by Hans-Jörg Althaus 2012-01-11
Acceptable as a coarse proxy
