# wheat grain production

Dataset: EcoSpold 2, unit process
Geography: IN
Time period: 2015-01-01 to 2023-12-31
Technology level: current
Classification: ISIC rev.4 ecoinvent: 0111:Growing of cereals (except rice), leguminous crops and oil seeds
Scenario: Business-as-Usual
System model: Allocation, cut-off by classification
Generated by: Sanjeevan Bajaj
Database: ecoinvent
isCopyrightProtected: true
accessRestrictedTo: 1

## General comment
This dataset represents the production of 1 kg of Wheat during November, 2015- April, 2016 at a farm located Village-Gadhera, District- Fatehgarh Sahib of Punjab. In this area, fields are irrigated with ground water using electric pump for surface irrigation. The farm has a yield of 5625 kg fresh matter per ha for this crop cycle. Sowing date for the crop is 14-November, 2015 and harvesting date is 13-April, 2016. Mineral NPK fertilizer input is 177.5-86.25kg/ha. Herbicide used has active ingredient as Piroxofop-Propanyl 60g/ha (Clodinafop-propargyl used as proxy), Sulfosulfuran 9.375g/ha, Metsulfuron 9.375g/ha (Metsulfuron-methyl used as proxy). Fungicide used has active ingredient as Azoxystrobin 54g/ha, Propiconazole 46.8g/ha, Butachlor 625g/ha (Alachlor used as proxy). Insecticides used has active ingredient as Imidachloropid 218.75g/ha, Thiamethoxam 187.5g/ha, and Buprofezin 156.25g/ha. Machinery is used only for soil cultivation with fuel consumption of 31.20 kg/ha using plough and other work. For seed sowing machines usage has led to fuel consumption of 7.8 kg/ha. Machinery is used for harvesting with fuel consumption of 67.6 kg/ha using Threshing with combine harvester, hay reaping.

## Included activities start
This activity starts about two weeks after the harvest of the previous crop. The soil is prepared for cultivation in first week of November and sowing of seeds started about two weeks after soil preparation. Thereafter the crop is mature for harvesting in about 5 months.

## Included activities end
The activity ends with the harvesting of the mature Wheat

## Technology
Cultivation of Wheat follows conventional production standards

## Time period
: Soil cultivating date for the main crop: 07-November, 2015; Harvesting date main crop: 13-April, 2016. The soil cultivation, sowing and harvesting dates are taken as the middle date of the week or fortnight told to the data collector by the farmer. Total time from date of sowing to date of harvesting comes to 180 days. The data is collected for one crop cycle. The cycle of one year is considered for entry in ecoeditor.

## Parameters
- LUC_crop_specific: 1 dimensionless
  This parameter allows to switch between a "crop specific" and a "country specific" approach when calculating the LUC of a crop. By default, the chosen approach is "crop specific", so the value of the parameter is 1. If you want to apply a "country specific" approach, turn the parameter to 0.

## Reference product
- wheat grain: 1 kg; By-product classification allocatable product; CPC 01112: Wheat, other; HS2017 100199: Cereals; wheat and meslin, other than durum wheat, other than seed
  production volume 8.652e10 kg; = 86.52*1000000*1000
    http://agricoop.nic.in/sites/default/files/Annual_rpt_201617_E.pdf (Page 3) Production volume figure is in million tonnes, data is for year 2014-15.
  property price 0.22 EUR2005
    Literature value. Based on SAFEX price of R 3,727 per tonne, source: SAGIS, 2018. Retrieved from: http://www.sagis.org.za/safex_historic.html, accessed 28May2018
  properties: carbon allocation 0 kg, carbon content 0

## Inputs from technosphere
- [sulfonyl]urea-compound: 1.66667e-6 kg; lognormal variance with pedigree 0.0052, pedigree (2,4,3,1,1)
  The data was collected for a hectare area through interview
  properties: carbon content, fossil 0.540853, dry mass 1 kg, wet mass 1 kg
- acetamide-anillide-compound, unspecified: 0.000111111 kg; lognormal variance with pedigree 0.0052, pedigree (2,4,3,1,1)
  The data was collected for a hectare area through interview
  properties: carbon content, fossil 0.659175, dry mass 1 kg, wet mass 1 kg
- combine harvesting: 5.41341e-5 ha; lognormal variance with pedigree 0.0052, pedigree (2,4,3,1,1)
  The data was collected for a hectare area through interview
- cyclic N-compound: 0.00010832 kg; lognormal variance with pedigree 0.0052, pedigree (2,4,3,1,1)
  This exchange is an aggregation of amounts:
  2.777777777777778E-5. Comment:
  8.319999999999998E-6. Comment:
  3.888888888888889E-5. Comment:
  3.3333333333333335E-5. Comment:
  properties: carbon content, fossil 0.641962, dry mass 1 kg, wet mass 1 kg
- diesel, burned in agricultural machinery: 0.509651 MJ; lognormal variance with pedigree 0.0052, pedigree (2,4,3,1,1)
  This exchange is an aggregation of amounts:
  0.04992499249920001. Comment:
  0.4597259725967999. Comment: Hay Reaping
- diphenylether-compound: 1.06667e-5 kg; lognormal variance with pedigree 0.0052, pedigree (2,4,3,1,1)
  The data was collected for a hectare area through interview
  properties: carbon content, fossil 0.560061, dry mass 1 kg, wet mass 1 kg
- inorganic nitrogen fertiliser, as N: 0.00631111 kg; lognormal variance with pedigree 0.0052, pedigree (2,4,3,1,1)
  The data was collected for a hectare area through interview
  properties: dry mass 1 kg, wet mass 1 kg
- inorganic phosphorus fertiliser, as P2O5: 0.0153333 kg; lognormal variance with pedigree 0.0052, pedigree (2,4,3,1,1)
  The data was collected for a hectare area through interview
  properties: dry mass 1 kg, wet mass 1 kg
- irrigation: 0.2232 m3; lognormal variance with pedigree 0.0052, pedigree (2,4,3,1,1)
  The data was collected for a hectare area through interview
  properties: dry mass 0.11 kg, water content 9089.91, wet mass 1000 kg
- land use change, annual crop: 1.28992e-5 ha; = (0.07255802172648654 * LUC_crop_specific + 0.03528956504677354 * (1-LUC_crop_specific))/5625
  Calculated Value. This value has been calculated by using the ecoinvent LCI calculation tool for crop production.
- naphtha: 0.000112 kg; lognormal variance with pedigree 0.0052, pedigree (2,4,3,1,1)
  The data was collected for a hectare area through interview
  properties: carbon content, fossil 0.919743, dry mass 1 kg, heating value, net 45 MJ, wet mass 1 kg
- nitrile-compound: 9.6e-6 kg; lognormal variance with pedigree 0.0052, pedigree (2,4,3,1,1)
  The data was collected for a hectare area through interview
  properties: carbon content, fossil 0.344995, dry mass 1 kg, wet mass 1 kg
- packaging, for fertilisers: 0.0937778 kg; lognormal variance with pedigree 0.0532, pedigree (4,3,3,5,4)
  Total amount of active substance/s of fertilisers needed for the production of 'wheat grain' is calculated to be circa 4.69E-02 kg. Fertiliser/s used in this dataset is/are: 'nitrogen fertiliser, as N', 'phosphate fertiliser, as P2O5', 'urea, as N'. The total amount of active substance/s is doubled in order to account for the packaging of the dilluted product of fertiliser/s that is/are applied. Therefore, 9.38E-02 kg of packaging for fertilisers is justified with this exchange.
  properties: carbon content, fossil 0.825301, dry mass 1 kg, heating value, net 25.01 MJ, price 0.0642 EUR2005, wet mass 1 kg
  note on carbon content, fossil: Considering a chemical formula (C2H4)n for polyethylene, carbon content-fossil is calculated to be 0.856286 kg of Carbon per kg of dry mass.
- packaging, for pesticides: 0.000486062 kg; lognormal variance with pedigree 0.0532, pedigree (4,3,3,5,4)
  Total amount of active substance/s of pesticides needed for the production of wheat grain is calculated to be circa 2.43E-04 kg. Pesticide/s used in this dataset is/are: '[sulfonyl]urea-compound', 'acetamide-anillide-compound, unspecified', 'cyclic N-compound', 'diphenylether-compound', 'nitrile-compound', 'triazine-compound, unspecified'. The total amount of active substance/s is doubled in order to account for the packaging of the dilluted product of pesticide/s that is/are applied. Therefore, 4.86E-04 kg of packaging for pesticides is justified with this exchange.
  properties: carbon content, fossil 0.85714, dry mass 1 kg, heating value, net 25.97 MJ, price 0.0642 EUR2005, wet mass 1 kg
- sowing: 0.000363002 ha; lognormal variance with pedigree 0.0052, pedigree (2,4,3,1,1)
  The data was collected for a hectare area through interview
- tillage, ploughing: 0.000170013 ha; lognormal variance with pedigree 0.0052, pedigree (2,4,3,1,1)
  The data was collected for a hectare area through interview
- triazine-compound: 1.66667e-6 kg; lognormal variance with pedigree 0.0052, pedigree (2,4,3,1,1)
  The data was collected for a hectare area through interview
  properties: carbon content, fossil 0.475616, dry mass 1 kg, wet mass 1 kg
- urea: 0.054119 kg; lognormal variance with pedigree 0.0052, pedigree (2,4,3,1,1)
  The exchange has been updated from 'urea, as N' into 'urea' and therefore its amount has been scaled (multiplied) from 0.0252 kg by 2.1438 kg of 'urea' per kg of 'urea, as N'. Original comment of the exchange is: The data was collected for a hectare area through interview
  properties: carbon content, fossil 0.2, dry mass 1 kg, wet mass 1 kg
- wheat seed, for sowing: 0.0191111 kg; lognormal variance with pedigree 0.0052, pedigree (2,4,3,1,1)
  The data was collected for a hectare area through interview
  property carbon content, non-fossil 0.464601; name C_content_non_fossil
  property dry mass 0.85 kg; name DM; = WM- WWM
  property water content 0.176471; name water_content; = WWM/ DM
  property water in wet mass 0.15 kg; name WWM
  property wet mass 1 kg; name WM
  note on carbon content, non-fossil: Composition data obtained from Wheat, soft red winter, in (http://www.nal.usda.gov/fnic/foodcomp/search/). First, composition data were refered to 1 kg dry mass. Then, C-contents were calculated considering a C-content/dry mass of 46% in carbohydrates (including fibres), 53% in proteins and 75% in fats. All data from "Evolutionary and Biochemical Aspects", A.D. Kay and T. Vrede (in Global Ecology, 2010, Elsevier B.V., S.E. Jørgensen Ed.).

## Inputs from nature
- Carbon dioxide, in air [natural resource, in air]: 1.3209 kg; lognormal variance with pedigree 0.0052, pedigree (2,4,3,1,1)
  (same comment as for land use change, annual crop)
- Energy, gross calorific value, in biomass [natural resource, biotic]: 15.3935 MJ; lognormal variance with pedigree 0.0052, pedigree (2,4,3,1,1)
  The data was collected for a hectare area through interview
- Occupation, annual crop, irrigated [natural resource, land]: 0.814815 m2*year; lognormal variance with pedigree 0.0066, pedigree (2,4,3,1,1)
  (same comment as for land use change, annual crop)
- Transformation, from annual crop, irrigated [natural resource, land]: 1.77778 m2; lognormal variance with pedigree 0.0126, pedigree (2,4,3,1,1)
  (same comment as for land use change, annual crop)
- Transformation, to annual crop, irrigated [natural resource, land]: 1.77778 m2; lognormal variance with pedigree 0.0126, pedigree (2,4,3,1,1)
  (same comment as for land use change, annual crop)

## Emissions to nature
- Ammonia [air, non-urban air or from high stacks]: 0.00564008 kg; lognormal variance with pedigree 0.0126, pedigree (2,4,3,1,1)
  (same comment as for land use change, annual crop)
- Carbon dioxide, fossil [air, non-urban air or from high stacks]: 0.0396593 kg; lognormal variance with pedigree 0.0052, pedigree (2,4,3,1,1)
  (same comment as for land use change, annual crop)
- Dinitrogen monoxide [air, non-urban air or from high stacks]: 0.000800171 kg; lognormal variance with pedigree 0.0346, pedigree (2,4,3,1,1)
  (same comment as for land use change, annual crop)
- Nitrogen oxides [air, non-urban air or from high stacks]: 0.00193524 kg; lognormal variance with pedigree 0.0446, pedigree (2,4,3,1,1)
  (same comment as for land use change, annual crop)
- Water [air, non-urban air or from high stacks]: 0.113832 m3; lognormal variance with pedigree 0.0052, pedigree (2,4,3,1,1)
  (same comment as for land use change, annual crop)
- Alachlor [soil, agricultural]: 0.000111111 kg; lognormal variance with pedigree 0.0376, pedigree (2,4,3,1,1)
  (same comment as for land use change, annual crop)
- Azoxystrobin [soil, agricultural]: 9.6e-6 kg; lognormal variance with pedigree 0.0376, pedigree (2,4,3,1,1)
  (same comment as for land use change, annual crop)
- Buprofezin [soil, agricultural]: 2.77778e-5 kg; lognormal variance with pedigree 0.0376, pedigree (2,4,3,1,1)
  (same comment as for land use change, annual crop)
- Cadmium II [soil, agricultural]: 6.33652e-7 kg; lognormal variance with pedigree 0.0446, pedigree (2,4,3,1,1)
  (same comment as for land use change, annual crop)
- Chromium III [soil, agricultural]: 5.06025e-6 kg; lognormal variance with pedigree 0.0446, pedigree (2,4,3,1,1)
  (same comment as for land use change, annual crop)
- Clodinafop-propargyl [soil, agricultural]: 1.06667e-5 kg; lognormal variance with pedigree 0.0376, pedigree (2,4,3,1,1)
  (same comment as for land use change, annual crop)
- Copper ion [soil, agricultural]: -5.08654e-6 kg
  (same comment as for land use change, annual crop)
- Imidacloprid [soil, agricultural]: 3.88889e-5 kg; lognormal variance with pedigree 0.0376, pedigree (2,4,3,1,1)
  (same comment as for land use change, annual crop)
- Lead II [soil, agricultural]: -6.85613e-7 kg
  (same comment as for land use change, annual crop)
- Mercury II [soil, agricultural]: -2.18504e-8 kg
  (same comment as for land use change, annual crop)
- Metsulfuron-methyl [soil, agricultural]: 1.66667e-6 kg; lognormal variance with pedigree 0.0376, pedigree (2,4,3,1,1)
  (same comment as for land use change, annual crop)
- Mineral oil [soil, agricultural]: 0.000112 kg; lognormal variance with pedigree 0.0376, pedigree (2,4,3,1,1)
  (same comment as for land use change, annual crop)
- Nickel II [soil, agricultural]: -8.30914e-7 kg
  (same comment as for land use change, annual crop)
- Propiconazole [soil, agricultural]: 8.32e-6 kg; lognormal variance with pedigree 0.0376, pedigree (2,4,3,1,1)
  (same comment as for land use change, annual crop)
- Sulfosulfuron [soil, agricultural]: 1.66667e-6 kg; lognormal variance with pedigree 0.0376, pedigree (2,4,3,1,1)
  (same comment as for land use change, annual crop)
- Thiamethoxam [soil, agricultural]: 3.33333e-5 kg; lognormal variance with pedigree 0.0376, pedigree (2,4,3,1,1)
  (same comment as for land use change, annual crop)
- Zinc II [soil, agricultural]: -2.10634e-5 kg
  (same comment as for land use change, annual crop)
- Cadmium II [water, ground-]: 3.80085e-9 kg; lognormal variance with pedigree 0.0946, pedigree (2,4,3,1,1)
  (same comment as for land use change, annual crop)
- Cadmium II [water, surface water]: 1.64718e-8 kg; lognormal variance with pedigree 0.0946, pedigree (2,4,3,1,1)
  (same comment as for land use change, annual crop)
- Chromium III [water, ground-]: 1.67333e-6 kg; lognormal variance with pedigree 0.0946, pedigree (2,4,3,1,1)
  (same comment as for land use change, annual crop)
- Chromium III [water, surface water]: 1.71744e-6 kg; lognormal variance with pedigree 0.0946, pedigree (2,4,3,1,1)
  (same comment as for land use change, annual crop)
- Copper ion [water, ground-]: 2.70918e-7 kg; lognormal variance with pedigree 0.0946, pedigree (2,4,3,1,1)
  (same comment as for land use change, annual crop)
- Copper ion [water, surface water]: 1.36568e-6 kg; lognormal variance with pedigree 0.0946, pedigree (2,4,3,1,1)
  (same comment as for land use change, annual crop)
- Lead II [water, ground-]: 1.75673e-8 kg; lognormal variance with pedigree 0.0946, pedigree (2,4,3,1,1)
  (same comment as for land use change, annual crop)
- Lead II [water, surface water]: 5.15474e-7 kg; lognormal variance with pedigree 0.0946, pedigree (2,4,3,1,1)
  (same comment as for land use change, annual crop)
- Mercury II [water, ground-]: 8.84326e-11 kg; lognormal variance with pedigree 0.0946, pedigree (2,4,3,1,1)
  (same comment as for land use change, annual crop)
- Mercury II [water, surface water]: 4.48343e-9 kg; lognormal variance with pedigree 0.0946, pedigree (2,4,3,1,1)
  (same comment as for land use change, annual crop)
- Nickel II [water, surface water]: 1.3504e-6 kg; lognormal variance with pedigree 0.0946, pedigree (2,4,3,1,1)
  (same comment as for land use change, annual crop)
- Nitrate [water, ground-]: 0.0251206 kg; lognormal variance with pedigree 0.0446, pedigree (2,4,3,1,1)
  (same comment as for land use change, annual crop)
- Phosphate [water, ground-]: 1.74886e-5 kg; lognormal variance with pedigree 0.0446, pedigree (2,4,3,1,1)
  (same comment as for land use change, annual crop)
- Phosphate [water, surface water]: 5.3149e-5 kg; lognormal variance with pedigree 0.0446, pedigree (2,4,3,1,1)
  (same comment as for land use change, annual crop)
- Phosphorus [water, surface water]: 0.000151153 kg; lognormal variance with pedigree 0.0446, pedigree (2,4,3,1,1)
  (same comment as for land use change, annual crop)
- Water [water, ground-]: 0.087048 m3; lognormal variance with pedigree 0.0052, pedigree (2,4,3,1,1)
  (same comment as for land use change, annual crop)
- Water [water, surface water]: 0.02232 m3; lognormal variance with pedigree 0.0052, pedigree (2,4,3,1,1)
  (same comment as for land use change, annual crop)
- Zinc II [water, ground-]: 1.82013e-6 kg; lognormal variance with pedigree 0.0946, pedigree (2,4,3,1,1)
  (same comment as for land use change, annual crop)
- Zinc II [water, surface water]: 2.46995e-6 kg; lognormal variance with pedigree 0.0946, pedigree (2,4,3,1,1)
  (same comment as for land use change, annual crop)

## Sampling procedure
The farmer was identified and contacted by agriculture science faculty familiar with the local farmers in the region. Data was collected directly from the farmer through semi-structured interview using a questionnaire based on the input requirements of the ecoinvent LCI calculation tool for crop production. The farmer does not maintain any written records and has provided the data from recent memory. In this region, typically farmers are unable to provide exact name of active ingredient in the pesticide they use and the same was noted from details given on the pesticide packet. Individual farmer is not able to calculate fuel consumption for his own farm alone and this information has been collected from farming community of the area

## Extrapolations
Ecoinvent LCI calculation tool for crop production was used to calculate field emissions from the cultivation process.
