# treatment of municipal solid waste, municipal incineration FAE

Dataset: EcoSpold 2, unit process
Geography: CH
Time period: 2006-01-01 to 2023-12-31
Technology level: current
Classification: ISIC rev.4 ecoinvent: 3821:Treatment and disposal of non-hazardous waste
Scenario: Business-as-Usual
System model: Allocation, cut-off by classification
Generated by: Nikolia Stoikou
Database: ecoinvent
isCopyrightProtected: true
accessRestrictedTo: 1

## General comment
The process represents the treatment of 'municipal solid waste' in a municipal solid waste incinerator (MSWI). Recommended use of this dataset: For average municipal/communal waste mixture. Not suitable to represent any single specific waste material, like plastics, paper, cardboard. If your waste is a specific mixture of waste materials, inventory the respective waste materials individually. Inventoried waste contains several fractions: 21% paper; 8% Mixed cardboard; 15% plastics; 3% laminated materials; 2% laminated packaging, e.g. drinks cartons; 3% combined goods e.g. diapers; 3% glass; 2% textiles; 8% minerals; 9% natural products; 22% compostable material; 2.65% inert metals; 1% volatile metals; 0.0065% batteries; 0.34% electronic goods; . Waste composition (wet, in ppmw): gross heating value 13.27 MJ/kg; net heating value 11.74 MJ/kg; H2O 228830; O 257060; H 48250; C 334230; S 1119; N 3123.8; P 893.79; B 7.1933; Cl 6866.2; Br 13.552; F 56.358; I 0.0121; Ag 0.714; As 0.62521; Ba 149.04; Cd 11.748; Co 1.3453; Cr 315.21; Cu 1212.8; Hg 1.4424; Mn 259.36; Mo 1.9551; Ni 107.38; Pb 502.43; Sb 22.564; Se 0.31969; Sn 73.44; V 9.2147; Zn 1311.2; Be na; Sc na; Sr na; Ti na; Tl na; W na; Si 48510; Fe 29996; Ca 14062; Al 12420; K 2059.7; Mg 3377.7; Na 5143.9. Share of carbon in initial waste input that is biogenic 60.4%.Share of metals in waste not oxidised and bulk-recyclable (exclude very small or thin parts) Iron: 60.55%; Alu: 20.02%; Copper: 77.52%.Recovery of metal scrap from bottom ash to recycling: 10.444g iron scrap, 0.6856g aluminium scrap, 0.2738g copper scrap. From this waste, the FLUWA process in the technology mix recovers 0.000853kg (DM) of a hydroxide sludge to be recycled in zinc furnaces. Net energy production: 1.38MJ/kg electric energy and 2.85MJ/kg thermal energy.

## Included activities start
The activity starts with the waste being available at the gate of the treatment facility. Collection and transportation of the waste to the treatment plant is not included.

## Included activities end
The activity ends with the waste being treated and waste-specific emissions from the incineration process and auxiliary material consumption for flue gas cleaning are released to the environment (air and water). Infrastructure and waste-specific energy demands for Municipal Solid Waste Incineration (MSWI) and net energy generation are included.

## Geography
Modelling parameters affecting the treatment technology are specific to this geography and to the technology mix encountered in Switzerland in 2012.

## Technology
The waste is treated in the incineration plant with flue gas cleaning. Incineration is the controlled combustion of a waste and it includes fly ash extraction (FAE) . Auxiliary material consumption for this step of air pollution control (APC) are included in the process. Air polution control includes electrostatic precipitator for fly ash (ESP), wet flue gas scrubber and 25% SNCR , 42.77% SCR-high dust , 32.68% SCR-low dust -DeNOx facilities and 0% without DeNOx (weighted according to mass of burnt waste). Efficiency of iron scrap separation from slag : 58%. Efficiency of aluminium scrap separation from slag : 31%. Efficiency of copper scrap separation from slag : 31%. The technology mix for this dataset includes a filter ash treatment (FLUWA) of a share of 46.22%. Gross electric efficiency technology mix 15.84% and Gross thermal efficiency technology mix 28.51%

## Reference product
- municipal solid waste: -1 kg; By-product classification Waste; CPC 39910: Municipal waste; HS2017 382510: Residual products of the chemical or allied industries, not elsewhere specified or included; municipal waste
  main reference product of this activity
  production volume 3.0215e9 kg
    based on corresponding global production volume of MSW fraction in conventional MSWI (wo fly ash extraction) and scaled down to annual Swiss incinerated MSW mass of 3.02 mio. tonnes.
  property price 0 EUR2005
    Waste products are assigned a price of zero as they are assumed to require further treatment.
  properties: aluminium content 0.0161048, antimony content 2.92588e-5, arsenic content 8.10725e-7, barium content 0.000193261, boron content 9.32769e-6, bromine content 1.75732e-5, cadmium content 1.52333e-5, calcium content 0.0182347, carbon allocation 0.334231 kg, carbon content 0.433405, carbon content, fossil 0.171573, carbon content, non-fossil 0.261832, chlorine content 0.00890356, chromium content 0.000408741, cobalt content 1.74444e-6, copper content 0.00157262, dry mass 0.771174 kg, fluorine content 7.30809e-5, heating value, gross 17.2096 MJ, heating value, net 15.2262 MJ, hydrogen content 0.0625675, iodine content 1.56904e-8, iron content 0.038897, lead content 0.000651514, magnesium content 0.0043799, manganese content 0.000336318, mercury content 1.87038e-6, molybdenum content 2.53517e-6, nickel content 0.000139246, nitrogen content 0.00405077, oxygen content 0.333341, phosphorus content 0.001159, potassium content 0.00267086, selenium content 4.14548e-7, silicon content 0.0629038, silver content 9.25861e-7, sodium content 0.00667017, sulfur content 0.00145107, tin content 9.52314e-5, vanadium content 1.19489e-5, water content 0.296725, water in wet mass 0.228826 kg, wet mass 1 kg, zinc content 0.00170033

## Inputs from technosphere
- aluminium scrap, post-consumer, prepared for melting: -0.0006856 kg; lognormal variance with pedigree 0.35162, pedigree (1,1,1,1,1)
  aluminium scrap recovered from this waste.
  Uncertainty: uncertainty calculated from uncertainty in waste composition, uncertainty of share of recyclable metal, uncertainty of transfer coefficient to bottom ash, uncertainty of the efficiency of scrap removal in MSWI plant.
  production volume
    calculated in proportion to incinerated waste input
  properties: dry mass 1 kg, price 0.806 EUR2005, wet mass 1 kg
- ammonia, anhydrous, liquid: 0.00069799 kg; lognormal variance with pedigree 0.66319, pedigree (1,1,4,1,1)
  Input to DeNOx stage (100% NH3).
  Uncertainty: uncertainty calculated from uncertainty in average DeNOx input, uncertainty in the share of thermal NOx, uncertainty of nitrogen content in average municipal waste and the uncertainty in nitrogen content in *this* waste.
  properties: dry mass 1 kg, wet mass 1 kg
- bottom ash, MSWI[F], municipal solid waste: -0.243474 kg; lognormal variance with pedigree 0.022631, pedigree (1,1,1,1,1)
  waste-specific bottom ash from the incineration of this waste
  Uncertainty: uncertainty is calculated from uncertainties in waste composition and transfer coefficients in incinerator
  production volume
    calculated in proportion to incinerated waste input
  properties: aluminium content 0.0548095, calcium content 0.06255, carbon content, fossil 0.0236541, dry mass 0.823972 kg, iron content 0.0967724, magnesium content 0.0159308, oxygen content 0.447305, potassium content 0.00578529, silicon content 0.237894, sodium content 0.0234133, water content 0.213634, wet mass 1 kg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
- cationic resin: 5.9672e-6 kg; lognormal variance with pedigree 1.5288, pedigree (1,1,4,1,1)
  auxiliary input for mercury removal in filter ash treatment (FLUWA).
  Uncertainty: uncertainty calculated from uncertainty in of transfer coefficients in the incinerator, and the uncertainty of the waste composition of this waste
  properties: carbon content, fossil 0.521606, dry mass 0.5 kg, heating value, net 6.68 MJ, water content 1, wet mass 1 kg
- chemical, inorganic: 0.0001119 kg; lognormal variance with pedigree 0.30731, pedigree (1,1,4,1,1)
  auxiliary inputs for the wastewater treatment stage of the incinerator plant. Proxy for Polyelectrolyte.
  Uncertainty: uncertainty calculated from uncertainty in average Polyelectrolyte input, of transfer coefficients in the incinerator, and the uncertainty of the waste composition of this waste
  properties: carbon content, fossil 0.003, dry mass 1 kg, wet mass 1 kg
- chromium trioxide, flakes: 8.92465e-7 kg; lognormal variance with pedigree 1.0019, pedigree (1,1,4,1,1)
  Input to DeNOx stage. Active component in SCR catalyst (vanadium pentoxide, V2O5), here approximated with the available chromium trioxide.
  Uncertainty: uncertainty calculated from uncertainty in average DeNOx input, uncertainty in the share of thermal NOx, uncertainty of nitrogen content in average municipal waste and the uncertainty in nitrogen content in *this* waste.
  properties: dry mass 1 kg, wet mass 1 kg
- copper scrap, sorted, pressed: -0.000273803 kg; lognormal variance with pedigree 0.64245, pedigree (1,1,1,1,1)
  copper scrap recovered from this waste.
  Uncertainty: uncertainty calculated from uncertainty in waste composition, uncertainty of share of recyclable metal, uncertainty of transfer coefficient to bottom ash, uncertainty of the efficiency of scrap removal in MSWI plant.
  production volume
    calculated in proportion to incinerated waste input
  properties: dry mass 1 kg, price 2.84 EUR2005, wet mass 1 kg
- heat, district or industrial, natural gas: 0.130524 MJ; lognormal variance with pedigree 0.66319, pedigree (1,1,4,1,1)
  Input to DeNOx stage, to heat up flue gas in low-dust SCR.
  Uncertainty: uncertainty calculated from uncertainty in average DeNOx input, uncertainty in the share of thermal NOx, uncertainty of nitrogen content in average municipal waste and the uncertainty in nitrogen content in *this* waste.
  properties: heating value, net 1 MJ
- hydrochloric acid, without water, in 30% solution state: 0.000306602 kg; lognormal variance with pedigree 0.036544, pedigree (1,1,4,1,1)
  auxiliary inputs for the wastewater treatment stage of the incinerator plant.
  Uncertainty: uncertainty calculated from uncertainty in average HCl input, of transfer coefficients in the incinerator, and the uncertainty of the waste composition of this waste
  properties: dry mass 1 kg, heating value, net 3.32 MJ, wet mass 1 kg
- hydrogen peroxide, without water, in 50% solution state: 0.000705497 kg; lognormal variance with pedigree 0.038791, pedigree (1,1,4,1,1)
  auxiliary oxidising agent for filter ash treatment (FLUWA).
  Uncertainty: uncertainty calculated from uncertainty in of transfer coefficients in the incinerator, and the uncertainty of the waste composition of this waste
  properties: dry mass 1 kg, heating value, net 7.13 MJ, wet mass 1 kg
- iron scrap, sorted, pressed: -0.0104439 kg; lognormal variance with pedigree 0.2514, pedigree (1,1,1,1,1)
  iron scrap recovered from this waste.
  Uncertainty: uncertainty calculated from uncertainty in waste composition, uncertainty of share of recyclable metal, uncertainty of transfer coefficient to bottom ash, uncertainty of the efficiency of scrap removal in MSWI plant.
  production volume
    calculated in proportion to incinerated waste input
  properties: dry mass 1 kg, price 0.175 EUR2005, wet mass 1 kg
- iron(III) chloride, without water, in 40% solution state: 1.74813e-5 kg; lognormal variance with pedigree 0.23011, pedigree (1,1,4,1,1)
  auxiliary inputs for the wastewater treatment stage of the incinerator plant.
  Uncertainty: uncertainty calculated from uncertainty in average FeCl3 input, of transfer coefficients in the incinerator, and the uncertainty of the waste composition of this waste
  properties: dry mass 1 kg, wet mass 1 kg
- metalliferous hydroxide sludge: -0.00341165 kg; lognormal variance with pedigree 0.064939, pedigree (1,1,1,1,1)
  Metalliferous hydroxide sludge/zinc concentrate from filter ash leaching (FLUWA).
  Uncertainty: uncertainty is calculated from uncertainties in waste composition and transfer coefficients to filter ash in incinerator and the uncertainty of the transfer coefficients of the FLUWA process.
  production volume
    calculated in proportion to incinerated waste input
  properties: calcium content 0.104098, carbon content, non-fossil 0.012313, chlorine content 0.169038, dry mass 0.25 kg, oxygen content 0.361808, phosphorus content 0.0205689, potassium content 0.0153159, sodium content 0.00912778, sulfur content 0.0754908, water content 3, wet mass 1 kg, zinc content 0.203169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
- municipal waste incineration facility: 2.5e-10 unit
  Infrastructure demands per kilogram incinerated waste.
- quicklime, milled, packed: 0.00281326 kg; lognormal variance with pedigree 0.49244, pedigree (1,1,4,1,1)
  auxiliary inputs for the flue gas treatment stage of the incinerator plant.
  Uncertainty: uncertainty calculated from uncertainty in average CaO input, of transfer coefficients in the incinerator, and the uncertainty of the waste composition of this waste
  properties: dry mass 0.99 kg, water content 0.010101, wet mass 1 kg
- residues, MSWI[F], municipal solid waste: -0.0101705 kg; lognormal variance with pedigree 0.02184, pedigree (1,1,1,1,1)
  waste-specific incineration residues (fly ash + scrubber sludge) from the incineration of this waste
  Uncertainty: uncertainty is calculated from uncertainties in waste composition and transfer coefficients in incinerator
  production volume
    calculated in proportion to incinerated waste input
  properties: aluminium content 0.0725386, calcium content 0.120889, chlorine content 0.101977, dry mass 1 kg, magnesium content 0.0162261, oxygen content 0.391118, potassium content 0.0627788, silicon content 0.076962, sodium content 0.0283964, sulfur content 0.0203148, wet mass 1 kg, zinc content 0.0365679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
- sodium hydroxide, without water, in 50% solution state: 0.00117616 kg; lognormal variance with pedigree 0.18474, pedigree (1,1,4,1,1)
  auxiliary inputs for the flue gas treatment stage of the incinerator plant, and partially in the filter ash treatment (FLUWA).
  Uncertainty: uncertainty calculated from uncertainty in average NaOH input, of transfer coefficients in the incinerator, and the uncertainty of the waste composition of this waste
  properties: dry mass 1 kg, heating value, net 3.03 MJ, wet mass 1 kg
- spent activated carbon with mercury: -6.28127e-6 kg; lognormal variance with pedigree 1.5208, pedigree (1,1,1,1,1)
  Spent ion exchanger charged with mercury, from FLUWA filter ash treatment, approximated here with Spent activated carbon with mercury, deposited undergound in a polyethylene Big Bag.
  Uncertainty: uncertainty calculated from uncertainty in of transfer coefficients in the incinerator, and the uncertainty of the waste composition of this waste.
  production volume
    calculated in proportion to incinerated waste input
  properties: carbon content, fossil 0.6, dry mass 1 kg, heating value, net 18.18 MJ, wet mass 1 kg
- titanium dioxide: 4.37308e-5 kg; lognormal variance with pedigree 1.0019, pedigree (1,1,4,1,1)
  Input to DeNOx stage (TiO2 catalyst carrier)
  Uncertainty: uncertainty calculated from uncertainty in average DeNOx input, uncertainty in the share of thermal NOx, uncertainty of nitrogen content in average municipal waste and the uncertainty in nitrogen content in *this* waste.
  properties: dry mass 1 kg, wet mass 1 kg
- triazine-compound: 1.21209e-5 kg; lognormal variance with pedigree 1.3455, pedigree (1,1,4,1,1)
  auxiliary inputs for the wastewater treatment stage of the incinerator plant. Proxy for (pure) Trisodium-trimercapto-s-triazine (CAS 17766-26-6), used as 15% diluted solution, aka TMT15.
  Uncertainty: uncertainty calculated from uncertainty in average TMT15 input, of transfer coefficients in the incinerator, and the uncertainty of the waste composition of this waste
  properties: carbon content, fossil 0.475616, dry mass 1 kg, wet mass 1 kg
- water, decarbonised: 1.32657 kg; lognormal variance with pedigree 0.23011, pedigree (1,1,4,1,1)
  Incinerator process water used in flue gas scrubber stage.
  Uncertainty: uncertainty calculated from uncertainty in average water input, and the uncertainty of the waste composition of this waste
  properties: wet mass 1 kg

## Inputs from nature
- Oxygen [natural resource, in air]: 2.22605 kg; lognormal variance with pedigree 0.039561, pedigree (1,1,4,1,1)
  oxygen from ambient air needed to combust and oxidise this waste. Net demand, i.e. without O2 leaving the plant in flue gas uncombusted.
  Uncertainty: uncertainty is calculated from uncertainties in waste composition and transfer coefficients to flue gas and solid residues in incinerator

## Emissions to nature
- Aluminium III [air, urban air close to ground]: 6.20664e-9 kg; lognormal variance with pedigree 0.42674, pedigree (1,1,4,1,1)
  Emission to air from waste composition and incinerator transfer coefficients.
  Uncertainty: uncertainty is calculated from uncertainties in waste composition and transfer coefficients in incinerator
- Ammonia [air, urban air close to ground]: 8.20659e-7 kg; lognormal variance with pedigree 0.71522, pedigree (1,1,4,1,1)
  Nitrogen species emitted to air after DeNOx stage.
  Uncertainty: uncertainty calculated from uncertainty in average N-emissions and uncertainty in the share of thermal NOx and the uncertainty in nitrogen content in *this* waste.
- Antimony ion [air, urban air close to ground]: 1.12818e-11 kg; lognormal variance with pedigree 1.2442, pedigree (1,1,4,1,1)
  (same comment as for Aluminium III)
- Arsenic ion [air, urban air close to ground]: 4.89743e-9 kg; lognormal variance with pedigree 1.6488, pedigree (1,1,4,1,1)
  (same comment as for Aluminium III)
- Barium II [air, urban air close to ground]: 1.41451e-7 kg; lognormal variance with pedigree 0.9357, pedigree (1,1,4,1,1)
  (same comment as for Aluminium III)
- Benzene [air, urban air close to ground]: 3.38455e-8 kg; lognormal variance with pedigree 0.1101, pedigree (1,1,4,1,1)
  Incomplete combustion product emitted to air.
  Uncertainty: uncertainty calculated from uncertainty in average operation emissions, and the uncertainty of the flue gas volume from this waste.
- Benzo(a)pyrene [air, urban air close to ground]: 7.53171e-13 kg; lognormal variance with pedigree 0.45169, pedigree (1,1,4,1,1)
  (same comment as for Benzene)
- Bromine [air, urban air close to ground]: 6.76922e-9 kg; lognormal variance with pedigree 1.2589, pedigree (1,1,4,1,1)
  (same comment as for Aluminium III)
- Cadmium II [air, urban air close to ground]: 5.90003e-9 kg; lognormal variance with pedigree 1.2808, pedigree (1,1,4,1,1)
  (same comment as for Aluminium III)
- Calcium II [air, urban air close to ground]: 6.92715e-5 kg; lognormal variance with pedigree 0.34698, pedigree (1,1,4,1,1)
  (same comment as for Aluminium III)
- Carbon dioxide, fossil [air, urban air close to ground]: 0.476418 kg; lognormal variance with pedigree 0.040731, pedigree (1,1,4,1,1)
  (same comment as for Aluminium III)
- Carbon dioxide, non-fossil [air, urban air close to ground]: 0.727046 kg; lognormal variance with pedigree 0.040731, pedigree (1,1,4,1,1)
  (same comment as for Aluminium III)
- Carbon monoxide, fossil [air, urban air close to ground]: 2.27759e-5 kg; lognormal variance with pedigree 0.85719, pedigree (1,1,4,1,1)
  (same comment as for Benzene)
- Carbon monoxide, non-fossil [air, urban air close to ground]: 3.47576e-5 kg; lognormal variance with pedigree 0.85719, pedigree (1,1,4,1,1)
  (same comment as for Benzene)
- Chromium III [air, urban air close to ground]: 4.84725e-8 kg; lognormal variance with pedigree 0.84759, pedigree (1,1,4,1,1)
  (same comment as for Aluminium III)
- Cobalt II [air, urban air close to ground]: 2.44661e-9 kg; lognormal variance with pedigree 1.5559, pedigree (1,1,4,1,1)
  (same comment as for Aluminium III)
- Copper ion [air, urban air close to ground]: 6.06016e-8 kg; lognormal variance with pedigree 0.68004, pedigree (1,1,4,1,1)
  (same comment as for Aluminium III)
- Cyanide [air, urban air close to ground]: 1.00097e-5 kg; lognormal variance with pedigree 1.293, pedigree (1,1,4,1,1)
  (same comment as for Ammonia)
- Dinitrogen monoxide [air, urban air close to ground]: 4.65911e-5 kg; lognormal variance with pedigree 1.293, pedigree (1,1,4,1,1)
  (same comment as for Ammonia)
- Dioxins, measured as 2,3,7,8-tetrachlorodibenzo-p-dioxin [air, urban air close to ground]: 6.76864e-14 kg; lognormal variance with pedigree 0.45169, pedigree (1,1,4,1,1)
  (same comment as for Benzene)
- Heat, waste [air, urban air close to ground]: 9.38777 MJ; lognormal variance with pedigree 0.070161, pedigree (1,1,4,1,1)
  Waste heat generated from heating value of this waste plus any electricity required to process it.
  Uncertainty: uncertainty is calculated from uncertainties in waste composition and uncertainties in energy efficiency and the uncertainty in internal energy demand
- Hexachlorobenzene [air, urban air close to ground]: 7.07692e-11 kg; lognormal variance with pedigree 0.1101, pedigree (1,1,4,1,1)
  (same comment as for Benzene)
- Hydrochloric acid [air, urban air close to ground]: 3.41262e-6 kg; lognormal variance with pedigree 0.44501, pedigree (1,1,4,1,1)
  (same comment as for Aluminium III)
- Hydrogen fluoride [air, urban air close to ground]: 3.80229e-7 kg; lognormal variance with pedigree 1.0575, pedigree (1,1,4,1,1)
  (same comment as for Aluminium III)
- Iodine [air, urban air close to ground]: 6.71551e-12 kg; lognormal variance with pedigree 1.9506, pedigree (1,1,4,1,1)
  (same comment as for Aluminium III)
- Iron ion [air, urban air close to ground]: 1.50206e-8 kg; lognormal variance with pedigree 0.32758, pedigree (1,1,4,1,1)
  (same comment as for Aluminium III)
- Lead II [air, urban air close to ground]: 2.4994e-8 kg; lognormal variance with pedigree 0.79635, pedigree (1,1,4,1,1)
  (same comment as for Aluminium III)
- Magnesium [air, urban air close to ground]: 2.6387e-6 kg; lognormal variance with pedigree 0.5303, pedigree (1,1,4,1,1)
  (same comment as for Aluminium III)
- Manganese II [air, urban air close to ground]: 4.95319e-8 kg; lognormal variance with pedigree 0.86959, pedigree (1,1,4,1,1)
  (same comment as for Aluminium III)
- Mercury II [air, urban air close to ground]: 3.33834e-8 kg; lognormal variance with pedigree 1.5344, pedigree (1,1,4,1,1)
  (same comment as for Aluminium III)
- Methane, fossil [air, urban air close to ground]: 2.00978e-7 kg; lognormal variance with pedigree 0.1101, pedigree (1,1,4,1,1)
  (same comment as for Benzene)
- Methane, non-fossil [air, urban air close to ground]: 3.06705e-7 kg; lognormal variance with pedigree 0.1101, pedigree (1,1,4,1,1)
  (same comment as for Benzene)
- Molybdenum VI [air, urban air close to ground]: 2.57244e-9 kg; lognormal variance with pedigree 1.5056, pedigree (1,1,4,1,1)
  (same comment as for Aluminium III)
- NMVOC, non-methane volatile organic compounds [air, urban air close to ground]: 1.5403e-6 kg; lognormal variance with pedigree 0.1101, pedigree (1,1,4,1,1)
  (same comment as for Benzene)
- Nickel II [air, urban air close to ground]: 6.83166e-8 kg; lognormal variance with pedigree 0.97983, pedigree (1,1,4,1,1)
  (same comment as for Aluminium III)
- Nitrogen oxides [air, urban air close to ground]: 0.000259875 kg; lognormal variance with pedigree 0.71522, pedigree (1,1,4,1,1)
  sum of fuel-NOx and thermal-NOx emitted to air after DeNOx stage.
  Uncertainty: uncertainty calculated from uncertainty in average N-emissions and uncertainty in the share of thermal NOx and the uncertainty in nitrogen content in *this* waste.
- Particulate Matter, < 2.5 um [air, urban air close to ground]: 4.04088e-6 kg; lognormal variance with pedigree 0.45169, pedigree (1,1,4,1,1)
  (same comment as for Benzene)
- Particulate Matter, > 2.5 um and < 10um [air, urban air close to ground]: 2.03059e-8 kg; lognormal variance with pedigree 0.22271, pedigree (1,1,4,1,1)
  (same comment as for Benzene)
- Pentachlorobenzene [air, urban air close to ground]: 1.78817e-10 kg; lognormal variance with pedigree 0.1101, pedigree (1,1,4,1,1)
  (same comment as for Benzene)
- Pentachlorophenol [air, urban air close to ground]: 1.47393e-11 kg; lognormal variance with pedigree 0.1101, pedigree (1,1,4,1,1)
  (same comment as for Benzene)
- Phosphorus [air, urban air close to ground]: 9.0831e-7 kg; lognormal variance with pedigree 0.70174, pedigree (1,1,4,1,1)
  (same comment as for Aluminium III)
- Potassium I [air, urban air close to ground]: 1.01463e-5 kg; lognormal variance with pedigree 0.58683, pedigree (1,1,4,1,1)
  (same comment as for Aluminium III)
- Selenium IV [air, urban air close to ground]: 2.74016e-9 kg; lognormal variance with pedigree 1.7339, pedigree (1,1,4,1,1)
  (same comment as for Aluminium III)
- Silicon [air, urban air close to ground]: 2.42548e-8 kg; lognormal variance with pedigree 0.27715, pedigree (1,1,4,1,1)
  (same comment as for Aluminium III)
- Sodium I [air, urban air close to ground]: 7.78207e-6 kg; lognormal variance with pedigree 0.47462, pedigree (1,1,4,1,1)
  (same comment as for Aluminium III)
- Sulfur dioxide [air, urban air close to ground]: 1.11346e-5 kg; lognormal variance with pedigree 0.66313, pedigree (1,1,4,1,1)
  (same comment as for Aluminium III)
- Tin ion [air, urban air close to ground]: 3.67199e-11 kg; lognormal variance with pedigree 1.0902, pedigree (1,1,4,1,1)
  (same comment as for Aluminium III)
- Toluene [air, urban air close to ground]: 6.76911e-8 kg; lognormal variance with pedigree 0.1101, pedigree (1,1,4,1,1)
  (same comment as for Benzene)
- Vanadium V [air, urban air close to ground]: 1.95433e-7 kg; lognormal variance with pedigree 1.2954, pedigree (1,1,4,1,1)
  (same comment as for Aluminium III)
- Water [air, urban air close to ground]: 0.00146212 m3; lognormal variance with pedigree 0.59451, pedigree (1,1,4,1,1)
  water vapour from waste humidity, hydrogen oxidation and part of the process water.
  Uncertainty: Uncertainty calculated from uncertainty in waste composition, process water input and the uncertainty of fraction to air.
- Zinc II [air, urban air close to ground]: 6.58554e-7 kg; lognormal variance with pedigree 0.65121, pedigree (1,1,4,1,1)
  (same comment as for Aluminium III)
- Non-hazardous waste disposed [inventory indicator, waste]: 1 kg
  Inventory indicator for waste mass disposed. To be used in EN15804 "other data" results.
- Aluminium III [water, surface water]: 3.86352e-8 kg; lognormal variance with pedigree 0.32745, pedigree (1,1,4,1,1)
  Emissions to water from waste composition and incinerator transfer coefficients.
  Uncertainty: uncertainty is calculated from uncertainties in waste composition and transfer coefficients in incinerator
- Antimony ion [water, surface water]: 1.52825e-7 kg; lognormal variance with pedigree 1.1447, pedigree (1,1,4,1,1)
  (same comment as for Aluminium III)
- Arsenic ion [water, surface water]: 3.07672e-16 kg; lognormal variance with pedigree 1.5916, pedigree (1,1,4,1,1)
  (same comment as for Aluminium III)
- BOD5, Biological Oxygen Demand [water, surface water]: 0.000243062 kg; lognormal variance with pedigree 0.048995, pedigree (1,1,4,1,1)
  (same comment as for Aluminium III)
- Barium II [water, surface water]: 1.11342e-8 kg; lognormal variance with pedigree 0.57001, pedigree (1,1,4,1,1)
  (same comment as for Aluminium III)
- Boron [water, surface water]: 1.92378e-8 kg; lognormal variance with pedigree 0.9973, pedigree (1,1,4,1,1)
  (same comment as for Aluminium III)
- Bromine [water, surface water]: 7.08162e-6 kg; lognormal variance with pedigree 0.60924, pedigree (1,1,4,1,1)
  (same comment as for Aluminium III)
- COD, Chemical Oxygen Demand [water, surface water]: 0.000243062 kg; lognormal variance with pedigree 0.048995, pedigree (1,1,4,1,1)
  (same comment as for Aluminium III)
- Cadmium II [water, surface water]: 1.05657e-9 kg; lognormal variance with pedigree 0.91896, pedigree (1,1,4,1,1)
  (same comment as for Aluminium III)
- Calcium II [water, surface water]: 0.000126044 kg; lognormal variance with pedigree 0.14035, pedigree (1,1,4,1,1)
  (same comment as for Aluminium III)
- Chloride [water, surface water]: 0.0047018 kg; lognormal variance with pedigree 0.1857, pedigree (1,1,4,1,1)
  (same comment as for Aluminium III)
- Chromium III [water, surface water]: 7.20668e-9 kg; lognormal variance with pedigree 0.51589, pedigree (1,1,4,1,1)
  (same comment as for Aluminium III)
- Cobalt II [water, surface water]: 1.5748e-11 kg; lognormal variance with pedigree 0.9477, pedigree (1,1,4,1,1)
  (same comment as for Aluminium III)
- Copper ion [water, surface water]: 3.31166e-8 kg; lognormal variance with pedigree 0.66403, pedigree (1,1,4,1,1)
  (same comment as for Aluminium III)
- DOC, Dissolved Organic Carbon [water, surface water]: 0.00010634 kg; lognormal variance with pedigree 0.048995, pedigree (1,1,4,1,1)
  (same comment as for Aluminium III)
- Fluoride [water, surface water]: 1.54061e-5 kg; lognormal variance with pedigree 0.75758, pedigree (1,1,4,1,1)
  (same comment as for Aluminium III)
- Heat, waste [water, surface water]: 2.49975 MJ; lognormal variance with pedigree 0.070161, pedigree (1,1,4,1,1)
  (same comment as for Heat, waste)
- Iodide [water, surface water]: 9.51338e-9 kg; lognormal variance with pedigree 1.2061, pedigree (1,1,4,1,1)
  (same comment as for Aluminium III)
- Iron ion [water, surface water]: 9.00358e-8 kg; lognormal variance with pedigree 0.25767, pedigree (1,1,4,1,1)
  (same comment as for Aluminium III)
- Lead II [water, surface water]: 1.60341e-8 kg; lognormal variance with pedigree 0.63548, pedigree (1,1,4,1,1)
  (same comment as for Aluminium III)
- Magnesium [water, surface water]: 1.00954e-5 kg; lognormal variance with pedigree 0.26113, pedigree (1,1,4,1,1)
  (same comment as for Aluminium III)
- Manganese II [water, surface water]: 2.04326e-8 kg; lognormal variance with pedigree 0.68418, pedigree (1,1,4,1,1)
  (same comment as for Aluminium III)
- Mercury II [water, surface water]: 3.31222e-10 kg; lognormal variance with pedigree 1.5049, pedigree (1,1,4,1,1)
  (same comment as for Aluminium III)
- Molybdenum VI [water, surface water]: 1.79569e-9 kg; lognormal variance with pedigree 1.1972, pedigree (1,1,4,1,1)
  (same comment as for Aluminium III)
- Nickel II [water, surface water]: 1.7726e-9 kg; lognormal variance with pedigree 0.72884, pedigree (1,1,4,1,1)
  (same comment as for Aluminium III)
- Nitrate [water, surface water]: 1.40517e-5 kg; lognormal variance with pedigree 0.29661, pedigree (1,1,4,1,1)
  (same comment as for Aluminium III)
- Phosphate [water, surface water]: 1.19662e-6 kg; lognormal variance with pedigree 0.39058, pedigree (1,1,4,1,1)
  (same comment as for Aluminium III)
- Potassium I [water, surface water]: 0.000237378 kg; lognormal variance with pedigree 0.43237, pedigree (1,1,4,1,1)
  (same comment as for Aluminium III)
- Selenium IV [water, surface water]: 2.43946e-9 kg; lognormal variance with pedigree 1.3754, pedigree (1,1,4,1,1)
  (same comment as for Aluminium III)
- Silicon [water, surface water]: 8.38019e-7 kg; lognormal variance with pedigree 0.13887, pedigree (1,1,4,1,1)
  (same comment as for Aluminium III)
- Silver I [water, surface water]: 1.40961e-9 kg; lognormal variance with pedigree 1.6324, pedigree (1,1,4,1,1)
  (same comment as for Aluminium III)
- Sodium I [water, surface water]: 0.000142403 kg; lognormal variance with pedigree 0.28424, pedigree (1,1,4,1,1)
  (same comment as for Aluminium III)
- Sulfate [water, surface water]: 0.000165682 kg; lognormal variance with pedigree 0.50319, pedigree (1,1,4,1,1)
  (same comment as for Aluminium III)
- TOC, Total Organic Carbon [water, surface water]: 0.00010634 kg; lognormal variance with pedigree 0.048995, pedigree (1,1,4,1,1)
  (same comment as for Aluminium III)
- Tin ion [water, surface water]: 4.96203e-8 kg; lognormal variance with pedigree 0.97251, pedigree (1,1,4,1,1)
  (same comment as for Aluminium III)
- Vanadium V [water, surface water]: 1.22229e-9 kg; lognormal variance with pedigree 0.80141, pedigree (1,1,4,1,1)
  (same comment as for Aluminium III)
- Water [water, surface water]: 0.000442064 m3; lognormal variance with pedigree 0.99382, pedigree (1,1,4,1,1)
  process water released to surface water.
  Uncertainty: uncertainty calculated from uncertainty in process water input and the uncertainty of fraction to surface water.
- Zinc II [water, surface water]: 3.94101e-8 kg; lognormal variance with pedigree 0.57698, pedigree (1,1,4,1,1)
  (same comment as for Aluminium III)
