# ammonium nitrate phosphate production

Dataset: EcoSpold 2, unit process
Geography: RNA
Time period: 1997-01-01 to 2023-12-31
Technology level: current
Classification: ISIC rev.4 ecoinvent: 2012:Manufacture of fertilizers and nitrogen compounds
Synonyms: ANP, Nitro aP
Scenario: Business-as-Usual
System model: Allocation, cut-off by classification
Generated by: Anna Kounina
Database: ecoinvent
isCopyrightProtected: true
accessRestrictedTo: 1

## General comment
This dataset represents the production of 1 kg of ammonium nitrate phosphate (ANP) with 22% N and 22% P2O5 from ammonia and rock phosphate. ANP is a compound fertiliser used to enrich the soil in nitrogen (N) and phosphorous (P), two of the main macronutrients needed to support plant growth.
The production of ammonium nitrate phosphate involves the combination of liquid ammonia with nitric acid and rock phosphate, using heat and electricity. Production and waste treatment of catalysts, coating and packaging of the final fertiliser product are excluded. Infrastructure is included by means of a proxy module.
The main data sources for this dataset are Patyk and Reinhardt (1997) and Althaus et al (2007).
References:
Patyk A. and Reinhardt G. (1997) Düngemittel - Energie- und Strombilanzen. Vieweg Verlag. Braunschweig/Wiesbaden.
Althaus H.-J., Chudacoff M., Hischier R., Jungbluth N., Osses M. and Primas A. (2007) Life Cycle Inventories of Chemicals. ecoinvent report No. 8, v2.0. EMPA Dübendorf, Swiss Centre for Life Cycle Inventories, Dübendorf, CH.

## Included activities start
The activity includes all the raw and processed materials necessary to produce this product. Liquid ammonia, nitric acid, rock phosphate, heat (as natural gas) and electricity are included. Direct emissions include ammonia, nitrogen oxides and particulate matter to air and heavy metals to water.

## Included activities end
The activity ends with the final product being ready for transportation at the production site.

## Geography
The dataset is representative of ANP production in North America, adapted from data collected in European fertiliser plants.

## Technology
This datasets corresponds to the technology used in North American fertiliser plants. The production of ammonium nitrate phosphate involves the combination of liquid ammonia with nitric acid and rock phosphate, using heat and electricity.

## Time period
Primary data were collected on fertiliser production for the year 2013-2014. These data were based on annual average data based on different production plants.

## Reference product
- ammonium nitrate phosphate: 1 kg; name RP; By-product classification allocatable product; CPC 34644: Fertilizers containing two nutrients: nitrogen and phosphorus; HS2017 310551: Fertilizers, mineral or chemical; containing nitrates and phosphates; CAS 57608-40-9
  Estimation, based on various data sources (Althaus et al. 2007, Patyk and Reinhardt 1997).
  production volume 3.25896e8 kg; name PVRP
    Kg/y Estimated values. It is assumed that 5% of the global phosphate rock production is used in the production of ANP. The PV was scaled according to the nominal GDP in 2014 of the given region and the global nominal GDP in 2014 (retrieved from: https://unstats.un.org/unsd/snaama/Basic, accessed 20200512). The nominal GDP corresponds to GDP at current price-US Dollars (source: United Nations, http://data.un.org/Glossary.aspx?q=GDP+%28current+US%24%29, accessed 20200512).
  property carbon content, fossil 0
    Carbon content, fossil is calculated based on the chemical formula of the substance.
  property nitrogen content 0.22
    Nitrogen content (on a dry matter basis) of ammonium nitrate phosphate is calculated from the molecular formula of the nutrient present in the substance.
  property phosphorus content 0.0960126
    Phosphorus content (on a dry matter basis) of ammonium nitrate phosphate is calculated from the molecular formula of the nutrient present in the substance.
  property price 0.457143 EUR2005
    Calculated based on inputs: The price of the product has been calculated as a sum of the values of the material and energy inputs for this product. This value is therefore a rough estimation. It may underestimate the real price since there are additional expenses when producing any product. These expences can include for example labour costs, treatment of waste materials and profit for the producer. Please consider carefully whether this level of data quality is acceptable for your application.
  properties: carbon allocation 0 kg, carbon content 0, carbon content, non-fossil 0, dry mass 1 kg, water content 0, water in wet mass 0 kg, wet mass 1 kg

## Inputs from technosphere
- ammonia, anhydrous, liquid: 0.165 kg; lognormal variance with pedigree 0.0446, pedigree (3,4,5,1,1)
  Estimation, based on various data sources (Althaus et al. 2007, Patyk and Reinhardt 1997).
  properties: dry mass 1 kg, hydrogen content 0.177547, nitrogen content 0.822453, wet mass 1 kg
  note on hydrogen content: Hydrogen content (on a dry matter basis) of ammonia, anhydrous, liquid is calculated from the molecular formula of the substance (H3N).
  note on nitrogen content: Nitrogen content (on a dry matter basis) of ammonia, anhydrous, liquid is calculated from the molecular formula of the substance (H3N).
- chemical factory, organics: 4e-10 unit; lognormal variance with pedigree 0.344, pedigree (3,4,5,1,1)
  Estimation, based on various data sources (Althaus et al. 2007, Patyk and Reinhardt 1997).
- electricity, low voltage: 0.281 kWh; lognormal variance with pedigree 0.0446, pedigree (3,4,5,1,1)
  Estimation, based on various data sources (Althaus et al. 2007, Patyk and Reinhardt 1997).
- heat, district or industrial, natural gas: 2.36 MJ; lognormal variance with pedigree 0.0446, pedigree (3,4,5,1,1)
  Estimation, based on various data sources (Althaus et al. 2007, Patyk and Reinhardt 1997).
  properties: heating value, net 1 MJ
- nitric acid, without water, in 50% solution state: 0.425 kg; lognormal variance with pedigree 0.0446, pedigree (3,4,5,1,1)
  Estimation, based on various data sources (Althaus et al. 2007, Patyk and Reinhardt 1997).
  properties: dry mass 1 kg, hydrogen content 0.0159952, nitrogen content 0.222283, oxygen content 0.761721, wet mass 1 kg
  note on hydrogen content: Hydrogen content (on a dry matter basis) of nitric acid, without water, in 50% solution state is calculated from the molecular formula of the substance (HNO3).
  note on nitrogen content: Nitrogen content (on a dry matter basis) of nitric acid, without water, in 50% solution state is calculated from the molecular formula of the substance (HNO3).
  note on oxygen content: Oxygen content (on a dry matter basis) of nitric acid, without water, in 50% solution state is calculated from the molecular formula of the substance (HNO3).
- non-sulfidic overburden, off-site: -1.26188 kg; name BPHZ; lognormal variance with pedigree 0.0066, pedigree (3,4,3,1,1)
  Calculation to close mass balance, based on Fertilizer Europe (2014).
  production volume; = PVRP*BPHZ/RP
    Calculated based on the production volume of the reference product.
  properties: dry mass 1 kg, wet mass 1 kg
- phosphate rock, beneficiated: 1.67188 kg; lognormal variance with pedigree 0.0446, pedigree (3,4,5,1,1)
  Estimation, based on various data sources (Althaus et al. 2007, Patyk and Reinhardt 1997).
  properties: dry mass 1 kg, wet mass 1 kg

## Emissions to nature
- Ammonia [air, urban air close to ground]: 0.000105 kg; lognormal variance with pedigree 0.084, pedigree (3,4,5,1,1)
  Estimation, based on various data sources (Althaus et al. 2007, Patyk and Reinhardt 1997).
- Nitrogen oxides [air, urban air close to ground]: 0.00287 kg; lognormal variance with pedigree 0.084, pedigree (3,4,5,1,1)
  Estimation, based on various data sources (Althaus et al. 2007, Patyk and Reinhardt 1997).
- Particulate Matter, < 2.5 um [air, urban air close to ground]: 0.000206 kg; lognormal variance with pedigree 0.164, pedigree (3,4,5,1,1)
  Estimation, based on various data sources (Althaus et al. 2007, Patyk and Reinhardt 1997).
- Particulate Matter, > 10 um [air, urban air close to ground]: 0.000206 kg; lognormal variance with pedigree 0.084, pedigree (3,4,5,1,1)
  Estimation, based on various data sources (Althaus et al. 2007, Patyk and Reinhardt 1997).
- Particulate Matter, > 2.5 um and < 10um [air, urban air close to ground]: 0.00071429 kg; lognormal variance with pedigree 0.164, pedigree (3,4,5,1,1)
  Estimation, based on various data sources (Althaus et al. 2007, Patyk and Reinhardt 1997).
- Arsenic ion [water, surface water]: 2.36e-6 kg; lognormal variance with pedigree 0.694, pedigree (3,4,5,1,1)
  Estimation, based on various data sources (Althaus et al. 2007, Patyk and Reinhardt 1997).
- Cadmium II [water, surface water]: 2.36e-6 kg; lognormal variance with pedigree 0.694, pedigree (3,4,5,1,1)
  Estimation, based on various data sources (Althaus et al. 2007, Patyk and Reinhardt 1997).
- Chromium III [water, surface water]: 1.17e-5 kg; lognormal variance with pedigree 0.694, pedigree (3,4,5,1,1)
  Estimation, based on various data sources (Althaus et al. 2007, Patyk and Reinhardt 1997).
- Copper ion [water, surface water]: 1.17e-5 kg; lognormal variance with pedigree 0.694, pedigree (3,4,5,1,1)
  Estimation, based on various data sources (Althaus et al. 2007, Patyk and Reinhardt 1997).
- Lead II [water, surface water]: 1.02e-5 kg; lognormal variance with pedigree 0.694, pedigree (3,4,5,1,1)
  Estimation, based on various data sources (Althaus et al. 2007, Patyk and Reinhardt 1997).
- Mercury II [water, surface water]: 1.77e-5 kg; lognormal variance with pedigree 0.694, pedigree (3,4,5,1,1)
  Estimation, based on various data sources (Althaus et al. 2007, Patyk and Reinhardt 1997).
- Nickel II [water, surface water]: 9.1e-6 kg; lognormal variance with pedigree 0.694, pedigree (3,4,5,1,1)
  Estimation, based on various data sources (Althaus et al. 2007, Patyk and Reinhardt 1997).
- Phosphate [water, surface water]: 0.000523 kg; lognormal variance with pedigree 0.084, pedigree (3,4,5,1,1)
  Estimation, based on various data sources (Althaus et al. 2007, Patyk and Reinhardt 1997).
- Zinc II [water, surface water]: 1.39e-5 kg; lognormal variance with pedigree 0.694, pedigree (3,4,5,1,1)
  Estimation, based on various data sources (Althaus et al. 2007, Patyk and Reinhardt 1997).

## Extrapolations
The data were extrapolated from respective data for the geography of Europe, i.e. production of ammonia and nitric acid are adapted to reflect production in North America.
