# electricity production, photovoltaic, 570kWp open ground installation, multi-Si

Dataset: EcoSpold 2, unit process
Geography: AR
Time period: 2012-01-01 to 2023-12-31
Technology level: current
Classification: ISIC rev.4 ecoinvent: 3510:Electric power generation, transmission and distribution
Classification: EcoSpold01Categories: photovoltaic/power plants
Synonyms: silicon; centralised photovoltaic plant; polycrystalline; multi-crystalline
Tags: photovoltaic power
Scenario: Business-as-Usual
System model: Allocation, cut-off by classification
Generated by: Alejandro P Arena
Published in: Suppen, N. 2017
Database: ecoinvent
isCopyrightProtected: true
accessRestrictedTo: 1

## General comment
This dataset represents the production of grid-connected low voltage electricity with a 570 kWp open ground photovoltaic (PV) plant in Argentina in 2014. Large central photovoltaic power stations in the higher kilowatt to megawatt range can feed directly into the medium- or high voltage grid. However, the voltage depends largely on the design and size of the plant. In order to treat all photovoltaic installations the same way (no matter which size, design and installation type (building integrated or open ground)), low voltage electricity is assumed as a product in this dataset. Please see field 'extrapolations' for further discussion.
The plant consists out of multi-Si panel modules with a total capacity of 570 kWp
An inverter is used to convert the low voltage DC power into AC power.
An average yield of 1920,565488 kWh/kWp was assumed for the calculations.

## Included activities start
From the PV module installed and ready to be used.

## Included activities end
This activity ends with low voltage electricity produced with the 570 kWp module, assuming an average yield.

This dataset includes tap water use for cleaning the module and its treatment.

## Technology
Electricity production with a grid-connected 570 kWp multi-Si photovoltaic open ground installation. See field 'extrapolation' for comment on the output voltage.

## Time period
The annual production volume valid for 2014

## Parameters
- Panel area for one 3 kWp unit, mc-Si: 22.1 m2/unit; name panel_area_mcSi; lognormal variance with pedigree 0.0199, pedigree (4,3,2,3,3)
  Literature value. This value has to be multiplied in order to extrapolate to a 570 kWp installation.
  Jungbluth N., Stucki M., Flury K., Frischknecht R. and Buesser S. (2012) Life Cycle Inventories of Photovoltaic Power Production. ESU-services Ltd., Uster, CH, retrieved from: www.esu-services.ch/data/public-lci-reports/
  Tab. 12.3, p.127
  nan
- Share 570kWp open ground installation, multi-Si, on open ground: 1 dimensionless; name pv_570ogi_mSi_og; lognormal variance with pedigree 0.214, pedigree (5,5,5,5,5)
  Statistics
  Only open ground PV installations have been reported as operative during the reference year.
  CAMMESA: COMPAÑÍA ADMINISTRADORA DEL MERCADO MAYORISTA ELÉCTRICO SOCIEDAD ANÓNIMA.
  Retreived from: http://portalweb.cammesa.com/Memnet1/default.aspx
- Yield (Output), photovoltaics: 1920.57 kWh/kWp; name yield; lognormal variance with pedigree 0.0193, pedigree (4,4,2,3,3)
  Calculated value. Specific solar yield in kWh per kilowatt peak installed (radiation intensity and sunshine duration standardised to a default 1kW peak of capacity), calculated as the total generation during the reference year and the installed capacity in MWp.
  The yield is calculated from CAMMESA (2014), which presents data for several PV power plants on open ground in Argentina.
  Source: CAMMESA "COMPAÑÍA ADMINISTRADORA DEL MERCADO MAYORISTA ELÉCTRICO SOCIEDAD ANÓNIMA" Informe anual 2014. Retreived from: http://portalweb.cammesa.com/Memnet1/default.aspx
  Additional information available under request
- Yield (Output), photovoltaics, corrected: 1920.57 kWh/kWp; name yield_corr; = yield*corr
  Estimated value. Since the yield was calculated with information for this specific geography, there is no need to correct the yield.
- capacity: 0.57 MW; lognormal variance with pedigree 0.001925, pedigree (2,2,1,2,2)
  Capacity of the photovoltaic cell in MWp per installation unit [MWp/unit]
  nan
- correction factor: 1 dimensionless; name corr; lognormal variance with pedigree 0.0175, pedigree (4,3,2,3,3)
  Estimation. This factor has been set to 1 since the yiedl has been calculated with data for this country.
- fraction, process water, to air: 0.15 dimensionless; name fraction_PW_to_air; lognormal variance with pedigree 0.092025, pedigree (4,4,3,2,4)
  Literature value.Data taken from the original "electricity production, photovoltaic, 570kWp open ground installation, multi-Si" /GLO 2008 dataset.
  In case when no industry/process specific data are available, default evaporation fraction value is used. This value is 15% and is based on literature (Statistics Canada, 2007 & Shaffer, K.H., 2008, Consumptive water use in the Great Lakes Basin, USGS & Shiklomanov, 2003, World Water Resources at the Beginning of the 21st Century) and has been approved by an expert.
  nan
- fraction, tap water, to air: 0.15 dimensionless; name fraction_TW_to_air; = fraction_PW_to_air; lognormal variance with pedigree 0.092025, pedigree (4,4,3,2,4)
  Calculated value. See comment in the other parametres present in this dataset. Tap water is considered to be always used as process water, thus process water fractions to air are applied to all tap water input flows to calculate the amount of water consumed in the processes.
  nan
- gross electricity production: 1.65775e7 kWh; name gross_electricity; lognormal variance with pedigree 0.0018, pedigree (2,1,1,1,2)
  Literature value/statistics. Total gross grid-connected photovoltaic electricity production in 2014 in this geography. The gross electricity production was calculated from the net electricity production considering the losses due to auxiliary consumption within the power plant (see the comment for the parameter losses from gross electricity production)..
  The net electricity production was obtained from CAMMESA: COMPAÑÍA ADMINISTRADORA DEL MERCADO MAYORISTA ELÉCTRICO SOCIEDAD ANÓNIMA. Informe anual 2014. Retreived from: http://portalweb.cammesa.com/Memnet1/default.aspx
- lifetime: 30 year; lognormal variance with pedigree 0.026625, pedigree (4,3,3,2,3)
  Standard lifetime considered for current PV technology.
  Oral communication. Gnos, S. 2002. Personal Communication, 10.2002. NET AG, Switzerland
  nan
- losses from gross electricity production: 0.05 dimensionless; name losses_gross_net; lognormal variance with pedigree 0.0167, pedigree (3,3,1,3,3)
  Estimation. The factor for the loss of electricity from gross to net electricity production is an assumption based on experiences and expertise (5% losses for photovoltaics).
  nan
- water use for cleaning photovoltaic panels: 20 l/m2; name water_pv_panels_cleaning; lognormal variance with pedigree 0.1227, pedigree (5,4,5,3,4)
  Estimation. Data taken from the original GLO 2008 dataset
  nan

## Reference product
- electricity, low voltage: 1 kWh; By-product classification allocatable product; CPC 17100: Electrical energy; HS2017 271600: Electrical energy
  production volume 1.2041e9 kWh; name apv_electricity; = gross_electricity* (1-losses_gross_net)* pv_570ogi_mSi_og
    Calculated value
  property price 0.107 EUR2005
    Temporary price data. Calculated as 90% of purchasers price based on: IEA Key world energy statistics 2004 (www.iea.org/textbase/nppdf/free/2004/keyworld2004.pdf)
  properties: carbon allocation 0 kg, carbon content 0

## Inputs from technosphere
- photovoltaic plant, 570kWp, multi-Si, on open ground: 3.04491e-8 unit; name installation; = 1/(lifetime*( capacity*1000)*(yield_corr)); lognormal variance with pedigree 0.0161, pedigree (3,2,3,5,1)
  Calculated value. Lifetime*capacity*annual yield = y * kWp/unit * kWh/(kWp*y) = kWh/unit and then the reciproke. Correction factor for yield: 0.92
- tap water: 1.34585e-5 kg; name tapwater; = panel_area_mcSi* water_pv_panels_cleaning* installation; lognormal variance with pedigree 0.0047, pedigree (2,2,3,5,1)
  Calculated value. Amount of installation needed to produce 1 kWh * panel area per installation * water need to clean 1 m2 of panel. [unit/kWh * m2/unit * l/m2 = l/kWh]. A density of 1 kg/dm3 is assumed.
  properties: carbon content, fossil 0.00178991, dry mass 0.000337476 kg, water content 2962.17, wet mass 1 kg
  note on carbon content, fossil: Bicarbonate content is 2.93 mol/m3. CO2 content is 0.1 mol/m3 (ecoinvent v2.2 report 8, Tab 93.1).
- wastewater, average: -1.34585e-8 m3; name sewage; = tapwater /1000; lognormal variance with pedigree 0.0027, pedigree (2,2,1,5,1)
  Calculated value considering the use of tapwater
  production volume; = apv_electricity*sewage
    Calculated value
  properties: carbon content, non-fossil 0.194039, dry mass 0.346837 kg, mass concentration, TOC 0.1091 kg/m3, mass concentration, calcium 0.039453 kg/m3, mass concentration, chlorine 0.030031 kg/m3, mass concentration, hydrogen 0.013365 kg/m3, mass concentration, nitrogen 0.031015 kg/m3, mass concentration, oxygen 0.069824 kg/m3, mass concentration, sodium 0.06456 kg/m3, mass concentration, sulfur 0.015602 kg/m3, water content 2882.2, wet mass 1000 kg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
  note on carbon content, non-fossil: 0.0673 kg TOC/m3 (Tab A.17, ecoinvent v2.2 report 13_I). TOC was considered as Total Carbon.

## Inputs from nature
- Energy, solar, converted [natural resource, in air]: 3.8503 MJ; lognormal variance with pedigree 0.00388441, pedigree (2,2,3,1,1)
  Energy loss in the system is included.

## Emissions to nature
- Water [air, unspecified]: 2.01878e-9 m3; name water_to_air_unspecified; = ( tapwater /1000)* fraction_TW_to_air; source COMPAÑÍA ADMINISTRADORA DEL MERCADO MAYO 2014; lognormal variance with pedigree 0.130025, pedigree (4,4,5,2,4)
  Calculated value based on literature values.
  property fraction, origin: fresh water 1; name fraction_origin_fresh_water
  property fraction, origin: salt water 0; name fraction_origin_salt_water
  property fraction, origin: unspecified 0; name fraction_origin_unspecified

## Sampling procedure
The information reported in this dataset corresponds to the following PV power plants which represent the total operative units during the reference year:
San JUAN I (2 MW)
CAÑADA HONDA 1 (2 MW)
CAÑADA HONDA 2 (3 MW)
CHIMBERAS 1 (2 MW)
.

## Extrapolations
The yield output, the net electricity production volume, and the installed capacity have been obtained/calculated from data obtained from CAMMESA.
Source: CAMMESA "COMPAÑÍA ADMINISTRADORA DEL MERCADO MAYORISTA ELÉCTRICO SOCIEDAD ANÓNIMA" Informe anual 2014. Supporting documentation available at: http://portalweb.cammesa.com/Memnet1/default.aspx

The correction factor, the yield output corrected, the lifetime, the gross electricity production, the panel area for one 3 kWp mSi and the share 570kWp open ground installation, multi-Si, on open ground have been calculated for Argentina.
The parameters "tap water to air" and "process water to air" and the exchange "Energy, solar, converted data" has been taken from the original dataset
The remaining exchanges have been extrapolated for Argentina from the original dataset "electricity production, photovoltaic, 570kWp open ground installation, multi-Si"/GLO 2008 (accessed: January 26th, 2018).

The simplifying assumption was made that all electricity is directly provided as low voltage electricity, so that no transformation has to take place.
