# basalt quarry operation

Dataset: EcoSpold 2, unit process
Geography: RER
Time period: 2003-01-01 to 2023-12-31
Technology level: current
Classification: ISIC rev.4 ecoinvent: 0810:Quarrying of stone, sand and clay
Classification: EcoSpold01Categories: construction materials/additives
Tags: ConvertedDataset
Scenario: Business-as-Usual
System model: Allocation, cut-off by classification
Generated by: Mischa Classen
Published in: Althaus H.-J. 2000
Database: ecoinvent
isCopyrightProtected: true
accessRestrictedTo: 1

## General comment
The module is designed for the use as raw-material for rockwool.
[This dataset was already contained in the ecoinvent database version 2. It was not individually updated during the transfer to ecoinvent version 3. Life Cycle Impact Assessment results may still have changed, as they are affected by changes in the supply chain, i.e. in other datasets. This dataset was generated following the ecoinvent quality guidelines for version 2. It may have been subject to central changes described in the ecoinvent version 3 change report (http://www.ecoinvent.org/database/ecoinvent-version-3/reports-of-changes/), and the results of the central updates were reviewed extensively. The changes added e.g. consistent water flows and other information throughout the database. The documentation of this dataset can be found in the ecoinvent reports of version 2, which are still available via the ecoinvent website. The change report linked above covers all central changes that were made during the conversion process.]

## Included activities end
The module includes a mining step and a subsequent benefication step comprising crushing, washing and classification.

## Geography
Data for one german quarry used as proxy for whole European situation

## Technology
Basalt is exploited in open-pit quarries.

## Parameters
- fraction, process water, to air: 0.2 dimensionless; name fraction_PW_to_air; lognormal variance with pedigree 0.092025, pedigree (4,4,3,2,4)
  Literature value (Statistics Canada, 2007 & Shaffer, K.H., 2008, Consumptive water use in the Great Lakes Basin, USGS) (Vionnet, S., Quantis Water Database - Technical Report, 2012).

## Reference product
- basalt: 1 kg; name RP; By-product classification allocatable product; CPC 15130: Granite, sandstone and other monumental or building stone; HS2017 2516: Granite, porphyry, basalt, sandstone, other monumental and building stone, whether or not roughly trimmed, cu[...]
  EcoSpold01Location=RER
  production volume 1.32237 kg; name PV_RP
    This is a placeholder value that does not reflect real-world production volumes. This dataset does not currently require a real-world production volume to work in the database framework, and no actual data were collected yet. This has no negative effect on the results of the ecoinvent database. The placeholder value of this activity was scaled according to the nominal GDP of 2005 (source: United Nations, http://data.un.org/Glossary.aspx?q=GDP+%28current+US%24%29, accessed 20130726) to reflect an appropriate share of the global production volume, which is also a placeholder value.
  property carbon content, non-fossil 0
    Tab 3.1, ecoinvent v2.2 report 7, part XIV for basalt composition
  properties: carbon allocation 0 kg, carbon content 0, carbon content, fossil 0, dry mass 1 kg, price 0.031 EUR2005, water content 0, water in wet mass 0 kg, wet mass 1 kg

## Inputs from technosphere
- alkyd paint, white, without solvent, in 60% solution state: 3e-6 kg; lognormal variance with pedigree 0.06, pedigree (1,4,5,1,3)
  EcoSpold01Location=RER
  properties: carbon content, fossil 0.140367, carbon content, non-fossil 0.199629, dry mass 1 kg, heating value, net 10.3 MJ, wet mass 1 kg
  note on carbon content, fossil: C content was calculated as an addition of C content in the raw materials.
- blasting: 7.73e-5 kg; lognormal variance with pedigree 0.074, pedigree (4,5,5,1,3)
  EcoSpold01Location=RER
  activityLink introduced to establish a direct link to the corresponding regional supply of this product
- chemical, organic: 3.6e-7 kg; lognormal variance with pedigree 0.06, pedigree (1,4,5,1,3)
  EcoSpold01Location=GLO
  properties: carbon content, fossil 0.628, dry mass 1 kg, heating value, net 19.03 MJ, wet mass 1 kg
  note on carbon content, fossil: This dataset is an unweighted average of 20 organic substances (listed in Tab 88.1, ecoinvent v2.2 report 8, part II), being part of the top100 chemicals included in this database. The C-content has also been calculated as an unweighted average of the C content of the substances composing this dataset.
- diesel, burned in building machine: 0.0414 MJ; lognormal variance with pedigree 0.06, pedigree (1,4,5,1,3)
  EcoSpold01Location=GLO
  properties: heating value, net 1 MJ
- electricity, medium voltage: 0.00621 kWh; lognormal variance with pedigree 0.06, pedigree (1,4,5,1,3)
  EcoSpold01Location=UCTE
- heat, district or industrial, other than natural gas: 0.00029735 MJ; lognormal variance with pedigree 0.06, pedigree (1,4,5,1,3)
  EcoSpold01Location=CH
  properties: heating value, net 1 MJ
- limestone quarry infrastructure: 8e-11 unit; lognormal variance with pedigree 0.43, pedigree (5,4,5,1,3)
  EcoSpold01Location=CH
- lubricating oil: 5.4e-5 kg; lognormal variance with pedigree 0.06, pedigree (1,4,5,1,3)
  EcoSpold01Location=RER
  properties: carbon content, fossil 0.75, dry mass 1 kg, heating value, net 40.2 MJ, wet mass 1 kg
  note on carbon content, fossil: Lubricating oil is produced from diesel. C-content/dry mass of fats and oils considered 75%, from: ecoinvent v2.2 report, n 15a, pg 40
  note on heating value, net: Literature value, Source: IPCC 2006, 2006 IPCC Guidelines for National Greenhouse Gas Inventories, Prepared by the National Greenhouse Gas Inventories Programme, Eggleston H.S., Buendia L., Miwa K., Ngara T. and Tanabe K. (eds). Published: IGES, Japan
- municipal solid waste: -6.14e-5 kg; name MSW; lognormal variance with pedigree 0.0202, pedigree (1,4,2,1,3)
  EcoSpold01Location=CH
  production volume; = PV_RP*( MSW/ RP)
    Calculated from the production volume of basalt in proportion to the respective output amounts.
  properties: carbon content, fossil 0.171549, carbon content, non-fossil 0.261655, dry mass 0.771 kg, heating value, net 11.74 MJ, water content 0.297017, wet mass 1 kg
  note on carbon content, fossil: MSW composition in tab 4.1, ecoinvent v2.2 report 13_I. C content referred to 1 kg DM
  note on heating value, net: Value taken from the general comment of the treatment dataset.
- transport, passenger car: 1.08e-5 km; lognormal variance with pedigree 0.06, pedigree (1,4,5,1,3)
  EcoSpold01Location=CH
- waste graphical paper: -5.2e-7 kg; name waste_paper; lognormal variance with pedigree 0.0202, pedigree (1,4,2,1,3)
  EcoSpold01Location=CH
  production volume; = PV_RP*( waste_paper/ RP)
    (same comment as for municipal solid waste)
  properties: carbon content, non-fossil 0.454955, dry mass 0.888 kg, heating value, net 14.12 MJ, water content 0.126126, wet mass 1 kg
- waste paint: -4.86153e-6, -1.84701e-8 kg (2 suppliers, which the file names only by identifier); sum of these -4.88e-6 kg; lognormal variance with pedigree 0.0202, pedigree (1,4,2,1,3)
  EcoSpold01Location=CH
  production volume; = PV_RP*(waste_paint/ RP)
    (same comment as for municipal solid waste)
  properties: carbon content, fossil 0.65, dry mass 1 kg, heating value, net 19.7 MJ, wet mass 1 kg
  note on carbon content, fossil: Tab A.5, ecoinvent v2.2 report 13_I. C content has been calculated after data in the tables, and then referred to 1 kg DM
- wastewater, average: -2.35348e-9, -9.36465e-8 m3 (2 suppliers, which the file names only by identifier); sum of these -9.6e-8 m3; lognormal variance with pedigree 0.0202, pedigree (1,4,2,1,3)
  production volume; = PV_RP*( wastewater/ RP)
    Calculated from production volume of reference product using the relative outputs.
  properties: carbon content, non-fossil 0.194039, dry mass 0.346837 kg, mass concentration, TOC 0.1091 kg/m3, mass concentration, calcium 0.039453 kg/m3, mass concentration, chlorine 0.030031 kg/m3, mass concentration, hydrogen 0.013365 kg/m3, mass concentration, nitrogen 0.031015 kg/m3, mass concentration, oxygen 0.069824 kg/m3, mass concentration, sodium 0.06456 kg/m3, mass concentration, sulfur 0.015602 kg/m3, water content 2882.2, wet mass 1000 kg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
  note on carbon content, non-fossil: 0.0673 kg TOC/m3 (Tab A.17, ecoinvent v2.2 report 13_I). TOC was considered as Total Carbon.

## Inputs from nature
- Basalt [natural resource, in ground]: 1 kg; lognormal variance with pedigree 0.062, pedigree (3,4,5,1,3)
- Occupation, mineral extraction site [natural resource, land]: 0.00798 m2*year; lognormal variance with pedigree 0.118, pedigree (4,4,5,1,3)
- Transformation, from forest, unspecified [natural resource, land]: 0.000798 m2; lognormal variance with pedigree 0.188, pedigree (4,4,5,1,3)
- Transformation, from mineral extraction site [natural resource, land]: 0.000798 m2; lognormal variance with pedigree 0.188, pedigree (4,4,5,1,3)
- Transformation, to mineral extraction site [natural resource, land]: 0.000798 m2; lognormal variance with pedigree 0.188, pedigree (4,4,5,1,3)
- Transformation, to unspecified [natural resource, land]: 0.000798 m2; lognormal variance with pedigree 0.188, pedigree (4,4,5,1,3)
- Water, lake [natural resource, in water]: 8.4e-6 m3; name water_lake_input; lognormal variance with pedigree 0.06, pedigree (1,4,5,1,3)

## Emissions to nature
- Particulate Matter, < 2.5 um [air, non-urban air or from high stacks]: 8e-6 kg; lognormal variance with pedigree 0.378, pedigree (4,4,5,1,3)
  Estimated based on proxy (limestone quarry operation).
- Particulate Matter, > 10 um [air, non-urban air or from high stacks]: 0.000112 kg; lognormal variance with pedigree 0.1761, pedigree (4,5,5,3,4)
  Estimated based on proxy (limestone quarry operation).
- Particulate Matter, > 2.5 um and < 10um [air, non-urban air or from high stacks]: 4e-5 kg; lognormal variance with pedigree 0.2561, pedigree (4,5,5,3,4)
  Estimated based on proxy (limestone quarry operation).
- Water [air, unspecified]: 1.68e-6 m3; name water_to_air_unspecified; = (water_lake_input*fraction_PW_to_air); lognormal variance with pedigree 0.0807, pedigree (2,2,5,1,1)
  Calculated value based on literature values and expert opinion. See comments in the parametres' comment field.
  property fraction, origin: fresh water 1; name fraction_origin_fresh_water
  property fraction, origin: salt water 0; name fraction_origin_salt_water
  property fraction, origin: unspecified 0; name fraction_origin_unspecified
- Water [water, unspecified]: 6.72e-6 m3; name water_to_water_unspecified; = water_lake_input*(1-fraction_PW_to_air); lognormal variance with pedigree 0.0807, pedigree (2,2,5,1,1)
  (same comment as for Water)
  property carbon content, fossil 0; name C_content_fossil
  property carbon content, non-fossil 0; name C_content_non_fossil
  property dry mass 0 kg; name DM
  property fraction, origin: fresh water 1; name fraction_origin_fresh_water_Ww
  property fraction, origin: salt water 0; name fraction_origin_salt_water_Ww
  property fraction, origin: unspecified 0; name fraction_origin_unspecified_Ww
  property water in wet mass 1000 kg; name WWM
  property wet mass 1000 kg; name WM

## Sampling procedure
Literature

## Extrapolations
see Geography and Technology

## Review by Roberto Dones 2003-08-29
passed
