# light olefins production, from methanol-to-olefins conversion, ethylene-to-propylene ratio of 0.67

Dataset: EcoSpold 2, unit process
Geography: CN
Time period: 2021-01-01 to 2023-12-31
Technology level: current
Classification: ISIC rev.4 ecoinvent: 2011:Manufacture of basic chemicals
Tags: combined production
Scenario: Business-as-Usual
System model: Allocation, cut-off by classification
Generated by: Iasonas Ioannou
Published in: Lin Lv 2021
Database: ecoinvent
isCopyrightProtected: true
accessRestrictedTo: 1

## General comment
This dataset represents the combined production of light olefins via the catalytic dehydration of methanol. Namely, this dataset covers the production of 1.00 kg of propylene and 0.67 kg of ethylene as reference products. At the same time, the formed liquefied petroleum gas, pentane, and gasoline (0.03, 0.04, and 0.06 kg, respectively) are treated as valuable by-products. The process includes, feedstock, materials, energy and registers all relevant direct emissions.
Light olefins are crucial building blocks for the chemicals and plastics sector and are predominantly generated through steam cracking of hydrocarbons. The annual production volume of ethylene and propylene are extremely high and constitutes them as the most highly produced petrochemicals. The high production volume of light olefins is driven by a high demand, which in 2007 amounted to 115 and 73 Mt for ethylene and propylene, respectively.
Notably, methanol may be used to cover part of the ethylene and propylene demand. Besides, such pathway may be appealing to decouple the production of light olefins from the petroleum feedstocks, e.g., naphtha.
The share of the produced light olefins, through the methanol-to-olefins (MTO) process, depends on the operating conditions of the reactor and the used catalyst. The latter process variables are able to modify the weight ratio of propylene-to-ethylene, to either maximize the yield towards ethylene or propylene (i.e., amount of ethylene < propylene, or vice versa). Furthermore, the upgrade of C4-C5 fractions is also considered, enhancing the yield towards propylene.
In the present dataset, there are two reference products (ethylene and propylene), thus allocation (subdivision) of the Life Cycle Inventory (LCI) is required. The allocation is based on mass content. For more information, consult the ''Modelling & Administrative'' section.
References:
Olah, G.A. (2005), Beyond Oil and Gas: The Methanol Economy. Angewandte Chemie International Edition, 44: 2636-2639. https://doi.org/10.1002/anie.200462121
Yang, M., Fan, D., Wei, Y., Tian, P., Liu, Z., Recent Progress in Methanol-to-Olefins (MTO) Catalysts. Adv. Mater. 2019, 31, 1902181. https://doi.org/10.1002/adma.201902181
Bertau, M., Offermanns, H., Plass, L., Schmidt, F., & Wernicke, H. J. (Eds.). (2014). Methanol: the basic chemical and energy feedstock of the future (Vol. 1). Heidelberg: Springer.

## Included activities start
The activity starts with the raw materials entering the methano-to-olefins facility.

## Included activities end
The activity ends with the final products being ready for further processing or transportation at the production site gate. The dataset includes the consumption of raw materials and energy, estimated catalyst use, emissions to air and water from the process, as well as the infrastructure use.

## Geography
This inventory is modelled for China, where the coal-to- and methanol-to-olefins technologies are important technological pathways to produce light olefins.
According to Lv et al (2021), in 2019, 24% of propylene produced in China was supplied from methanol conversion plants. Furthermore, based on Wood Mackenzie, in 2019, the installed capacity of ethylene from CTO/MTO accounted for 21% of China’s total ethylene capacity.
This activity originates from literature data for the conversion of methanol to olefins (MTO) for China. The material and energy inputs reflect well the production technology and are, therefore, considered to be valid for the chosen geography.
References:
2021, Lin Lv, Guobao Song, Xinyue Zhao, Jingwen Chen, Environmental Burdens of China’s Propylene manufacturing: Comparative life-cycle assessment and scenario analysis, Science of the Total Environment, 799
https://www.woodmac.com/news/can-chinas-cto-and-mto-industries-survive-the-threat-of-massive-steam-cracker-investment/, assessed in 2023-10-09.

## Technology
In this dataset, the catalytic conversion of methanol to light olefins originates from the work by Lv et al. (2021) that was, in turn, based on the environmental impact assessment report for a joint venture between China Power Investment Corporation and Total, Ltd., in Inner Mongolia Autonomous Region, China.
In the methanol-to-olefins process, the methanol feedstock is first dehydrated to dimethyl ether (DME), and DME, in turn, dehydrates further to yield ethylene, propylene, and smaller amounts of butenes. Hence, the conversion of methanol into olefins covers the following reaction steps:
1) Dehydration of methanol to DME:
2 CH3OH <--> CH3OCH3 + H2O
2) Production of light olefins through DME dehydration:
CH3OCH3 --> C2H4 + H2O
CH3OCH3 --> 2/3 C3H6 + H2O
CH3OCH3 --> 2/4 C4H8 + H2O
Other reactions take place simultaneously, which give yield to methane, ethane, C5 hydrocarbons, hydrogen, coke, and CO2. At the same time, additional steps to upgrade the C4-C5 fractions could enhance the yield towards propylene.
This inventory covers the production of propylene, ethylene, LPG, C5s, and gasoline, along with the consumption of energy and auxiliary materials and services. The data is based on an existing project for the coal-to-olefins production process. Namely, the plant, which this inventory represents, is located in the Inner Mongolia Autonomous Region of China and was built in 2016. This plant has an annual olefin output of 800 000 t,
References:
2021, Lin Lv, Guobao Song, Xinyue Zhao, Jingwen Chen, Environmental Burdens of China’s Propylene manufacturing: Comparative life-cycle assessment and scenario analysis, Science of the Total Environment, 799
Bertau, M., Offermanns, H., Plass, L., Schmidt, F., & Wernicke, H. J. (Eds.). (2014). Methanol: the basic chemical and energy feedstock of the future (Vol. 1). Heidelberg: Springer.

## Time period
This activity originates from literature data, for conversion of methanol to olefins (MTO) published in 2021. The material and energy inputs reflect well the production technology and not expected to change significantly over the next 5 years.
References:
Lv, L.; Song, G.; Zhao, X.; Chen, J. (2021): Environmental Burdens of China’s Propylene manufacturing: Comparative life-cycle assessment and scenario analysis, Science of the Total Environment, 799, 149451.

## Parameters
- fraction of cooling water which evaporates to air, once-through cooling system: 0.04 dimensionless; name fraction_CW_OT_to_air

## Reference product
- propylene: 1 kg; name RP_Propylene; By-product classification allocatable product; CPC 33421: Ethylene, propylene, butylene, butadiene; HS2017 290122: Acyclic hydrocarbons; unsaturated, propene (propylene); CAS 115-07-1
  Value reported by Lv, L.; Song, G.; Zhao, X.; Chen, J. (2021): Environmental Burdens of China’s Propylene manufacturing: Comparative life-cycle assessment and scenario analysis, Science of the Total Environment, 799, 149451.
  production volume 6.3e9 kg; name RP_PV; = 6.30e9
    According to Lv et al (2021), the installed capacity for propylene in 2019 in China was 3.79E10 kg. According to the same publication, 24% of propylene in China are produced from methanol.
    According to HSBC Global Research (2014), the expected coal-to-olefins projects in China are expected to show a ethylene-to-propylene ratio of 0.81.
    The latter information was used to identify the production volume of the following activites available in the ecoinvent Database (since v3.10);
    1) light olefins production, from methanol-to-olefins conversion, ethylene-to-propylene ratio of 0.67
    2) light olefins production, from methanol-to-olefins conversion, ethylene-to-propylene ratio of 1.51
    3) propylene production, from methanol-to-propylene conversion
    An average capacity factor of 83% was assumed.
    Reference:
    Lv, L.; Song, G.; Zhao, X.; Chen, J. (2021): Environmental Burdens of China’s Propylene manufacturing: Comparative life-cycle assessment and scenario analysis, Science of the Total Environment, 799, 149451.
    HSBC Global Research (2014), Coal-to-chemicals, A potential growth engine but with environmental constraints, available at: https://www.longfinance.net/media/documents/hsbc_coal_to_chems_environment.pdf, assessed in 2023-10-09.
  property heating value, net 43.22 MJ
    LHV is calculated based on the elemental composition of the substance. Based on the CAS number of the substance (000115-07-1), the chemical formula of the substance is found to be: C3H6, (PubChem 2020).
    Reference: Kim, S., Chen, J., Cheng, T., Gindulyte, A., He, J., He, S., Li, Q., Shoemaker, B. A., Thiessen, P. A., Yu, B., Zaslavsky, L., Zhang, J., & Bolton, E. E. (2019). PubChem 2019 update: improved access to chemical data. Nucleic acids research, 47(D1), D1102–D1109. https://doi.org/10.1093/nar/gky1033
  property price 0.693977 EUR2005
    Calculated value based on data from United Nations Commodity Trade Statistics Database (comtrade.un.org). UN comtrade category: 290122. Propylene. Average price from the year 2015-2019. Average of price of import into 5 main markets (EU, US, MX, CO and CN).
    The prices were converted to EUR based on the annual exchange rates published by the European Central Bank (https://sdw.ecb.europa.eu/quickview.do?SERIES_KEY=120.EXR.A.USD.EUR.SP00.A, last accessed on 2022-02-15) and adjusted for inflation relative to 2005 using the producer price index (PPI) of the euro area, published by eurostat (https://ec.europa.eu/eurostat/databrowser/view/STS_INPP_A__custom_6416181/default/table?lang=en, last accessed on 2022-05-04).
  properties: allocation factor 0.924327, carbon allocation 0.857143 kg, carbon content 0.857143, carbon content, fossil 0.857143, carbon content, non-fossil 0, dry mass 1 kg, true value 0.693977, water content 0, water in wet mass 0 kg, wet mass 1 kg

## Inputs from technosphere
- chemical factory, organics: 3.98512e-10 unit; = (1+0.67+0.03+0.04+0.06)*4.0e-10 * ( IF(RP_ethylene;0.4011976047904192) + IF(RP_propylene;0.5988023952095808) ); lognormal variance with pedigree 0.3434, pedigree (2,4,2,4,4)
  Calculated based on literature data published by the industry. For this activity, no information was readily available concerning infrastructure and land-use. Therefore, the infrastructure is estimated based on data from two chemical factories, the BASF site of Ludwigshafen and the chemical factory in Gendorf (which are both located in Germany), which produce a wide range of chemical substances. Based on this data, the following assumptions are made: the built area amounts to about 4.2 ha, the plant has an average output of 50'000 t/a and a lifespan of fifty years. The estimated infrastructure amount is therefore 4.00 E-10 units per kg of produced chemical.
- dimethyl sulfide: 6.64187e-5 kg; = 0.00012 * ( IF(RP_ethylene;0.4011976047904192) + IF(RP_propylene;0.5988023952095808) ); lognormal variance with pedigree 0.000925, pedigree (1,2,2,2,1)
  (same comment as for propylene)
  properties: carbon content, fossil 0.157354, dry mass 1 kg, heating value, net 23.42 MJ, wet mass 1 kg
- electricity, medium voltage: 0.220256 kWh; = 0.39794 * ( IF(RP_ethylene;0.4011976047904192) + IF(RP_propylene;0.5988023952095808) ); lognormal variance with pedigree 0.000925, pedigree (1,2,2,2,1)
  Electricity consumption for the conversion of methanol to light olefins.
  Reference:
  Lv, L.; Song, G.; Zhao, X.; Chen, J. (2021): Environmental Burdens of China’s Propylene manufacturing: Comparative life-cycle assessment and scenario analysis, Science of the Total Environment, 799, 149451.
- heat, from steam, in chemical industry: 8.90426 MJ; = 5.85*2.75 * ( IF(RP_ethylene;0.4011976047904192) + IF(RP_propylene;0.5988023952095808) ); lognormal variance with pedigree 0.000925, pedigree (1,2,2,2,1)
  Steam requirements for the production of light olefins from methanol.
  Reference:
  Lv, L.; Song, G.; Zhao, X.; Chen, J. (2021): Environmental Burdens of China’s Propylene manufacturing: Comparative life-cycle assessment and scenario analysis, Science of the Total Environment, 799, 149451.
  properties: heating value, net 1 MJ
- hydrogen, gaseous, low pressure: 0.000686327 kg; = 0.00124* ( IF(RP_ethylene;0.4011976047904192) + IF(RP_propylene;0.5988023952095808) ); lognormal variance with pedigree 0.000925, pedigree (1,2,2,2,1)
  Hydrogen requirements for the production of light olefins from methanol.
  Reference:
  Lv, L.; Song, G.; Zhao, X.; Chen, J. (2021): Environmental Burdens of China’s Propylene manufacturing: Comparative life-cycle assessment and scenario analysis, Science of the Total Environment, 799, 149451.
  properties: dry mass 1 kg, heating value, net 120.21 MJ, wet mass 1 kg
- methanol: 1.48778 kg; = 4.48 * 0.6 * ( IF(RP_ethylene;0.4011976047904192) + IF(RP_propylene;0.5988023952095808) ); lognormal variance with pedigree 0.000925, pedigree (1,2,2,2,1)
  Main raw material for the production of light olefins. According to the operating rates of methanol-to- and coal-to-olefins plants in China, 60% of capacity is covered by coal-based methanol, according to https://infogram.com/methanol_asia_ctotable_october22-1ho16vod7o5yx4n, accessed 15-09-2023. The remaining 40% is covered by the methanol market.
  Reference:
  Lv, L.; Song, G.; Zhao, X.; Chen, J. (2021): Environmental Burdens of China’s Propylene manufacturing: Comparative life-cycle assessment and scenario analysis, Science of the Total Environment, 799, 149451.
  properties: carbon content, fossil 0.375, dry mass 1 kg, heating value, net 20 MJ, wet mass 1 kg
  note on heating value, net: Based on literature, page 533, Report 17: Jungbluth, N., Chudacoff, M., Dauriat, A., Dinkel, F., Doka, G., Faist Emmenegger, M., Gnansounou, E., Kljun, N., Schleiss, K., Spielmann, M., Stettler, C., Sutter, J. 2007: Life Cycle Inventories of Bioenergy. ecoinvent report No. 17, Swiss Centre for Life Cycle Inventories, Dübendorf, CH.
- methanol: 0.991853 kg; = 4.48 * (1-0.6) * ( IF(RP_ethylene;0.4011976047904192) + IF(RP_propylene;0.5988023952095808) ); lognormal variance with pedigree 0.000925, pedigree (1,2,2,2,1)
  (same comment as for methanol)
- nitrogen, liquid: 0.184181 kg; name N2in; = 266.21/1000*1.25 * ( IF(RP_ethylene;0.4011976047904192) + IF(RP_propylene;0.5988023952095808) ); lognormal variance with pedigree 0.000925, pedigree (1,2,2,2,1)
  (same comment as for propylene)
  properties: dry mass 1 kg, wet mass 1 kg
- sodium hydroxide, without water, in 50% solution state: 0.0166213 kg; = 0.03003* ( IF(RP_ethylene;0.4011976047904192) + IF(RP_propylene;0.5988023952095808) ); lognormal variance with pedigree 0.000925, pedigree (1,2,2,2,1)
  (same comment as for propylene)
  properties: dry mass 1 kg, heating value, net 3.03 MJ, wet mass 1 kg
- wastewater, average: -0.00135051 m3; name WW; = 2.44/1000* ( IF(RP_ethylene;0.4011976047904192) + IF(RP_propylene;0.5988023952095808) ); lognormal variance with pedigree 0.000725, pedigree (1,2,1,2,1)
  Wastewater output, as a result of the conversion of methnaol-to-olefins.
  production volume; = RP_PV * (WW / RP_Propylene)
    Calculated from production volume of reference product using the relative outputs.
  properties: carbon content, non-fossil 0.194039, dry mass 0.346837 kg, mass concentration, TOC 0.1091 kg/m3, mass concentration, calcium 0.039453 kg/m3, mass concentration, chlorine 0.030031 kg/m3, mass concentration, hydrogen 0.013365 kg/m3, mass concentration, nitrogen 0.031015 kg/m3, mass concentration, oxygen 0.069824 kg/m3, mass concentration, sodium 0.06456 kg/m3, mass concentration, sulfur 0.015602 kg/m3, water content 2882.2, wet mass 1000 kg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
  note on carbon content, non-fossil: 0.0673 kg TOC/m3 (Tab A.17, ecoinvent v2.2 report 13_I). TOC was considered as Total Carbon.

## Inputs from nature
- Water, cooling, unspecified natural origin [natural resource, in water]: 0.0487071 m3; = 0.088* ( IF(RP_ethylene;0.4011976047904192) + IF(RP_propylene;0.5988023952095808) ); lognormal variance with pedigree 0.000925, pedigree (1,2,2,2,1)
  The original source did not provide information on the consumption of cooling water. This elementary exchange is added for completion based on a similar process. Namely, the methanol-to-olefins conversion, with an ethylene-to-propylene ratio of 1.51 (instead of 0.67 of this dataset), available in the ecoinvent Database v.3.10.

## Emissions to nature
- Carbon dioxide, fossil [air, unspecified]: 0.149442 kg; = 0.27* ( IF(RP_ethylene;0.4011976047904192) + IF(RP_propylene;0.5988023952095808) ); lognormal variance with pedigree 0.000925, pedigree (1,2,2,2,1)
  Direct process emissions. Value reported by Lv, L.; Song, G.; Zhao, X.; Chen, J. (2021): Environmental Burdens of China’s Propylene manufacturing: Comparative life-cycle assessment and scenario analysis, Science of the Total Environment, 799, 149451.
- Carbon monoxide, fossil [air, unspecified]: 1.40697e-5 kg; = 2.542E-05* ( IF(RP_ethylene;0.4011976047904192) + IF(RP_propylene;0.5988023952095808) ); lognormal variance with pedigree 0.000925, pedigree (1,2,2,2,1)
  (same comment as for Carbon dioxide, fossil)
- Nitrogen [air, unspecified]: 0.184181 kg; = N2in; lognormal variance with pedigree 0.000925, pedigree (1,2,2,2,1)
  Calculated based on the input amount of nitrogen.
- Nitrogen oxides [air, unspecified]: 7.32433e-5 kg; = 0.00013233* ( IF(RP_ethylene;0.4011976047904192) + IF(RP_propylene;0.5988023952095808) ); lognormal variance with pedigree 0.040325, pedigree (1,2,2,2,1)
  (same comment as for Carbon dioxide, fossil)
- Particulate Matter, > 2.5 um and < 10um [air, unspecified]: 4.39471e-6 kg; = 7.94E-06* ( IF(RP_ethylene;0.4011976047904192) + IF(RP_propylene;0.5988023952095808) ); lognormal variance with pedigree 0.040325, pedigree (1,2,2,2,1)
  (same comment as for Carbon dioxide, fossil)
- Water [air, unspecified]: 0.00194828 m3; = fraction_CW_OT_to_air* 0.088 * ( IF(RP_ethylene;0.4011976047904192) + IF(RP_propylene;0.5988023952095808) ); lognormal variance with pedigree 0.000925, pedigree (1,2,2,2,1)
  Calculated as a fraction of the input of cooling water. For more details, refer to the mathematical relation and the parameters.
- BOD5, Biological Oxygen Demand [water, unspecified]: 8.38149e-5 kg; = 0.00015143* ( IF(RP_ethylene;0.4011976047904192) + IF(RP_propylene;0.5988023952095808) ); lognormal variance with pedigree 0.25, pedigree (5,5,5,5,5)
  (same comment as for propylene)
- COD, Chemical Oxygen Demand [water, unspecified]: 0.000233218 kg; = 0.00042136* ( IF(RP_ethylene;0.4011976047904192) + IF(RP_propylene;0.5988023952095808) ); lognormal variance with pedigree 0.25, pedigree (5,5,5,5,5)
  (same comment as for propylene)
- Carboxylic acids, unspecified [water, unspecified]: 0.000563657 kg; = 0.00101837* ( IF(RP_ethylene;0.4011976047904192) + IF(RP_propylene;0.5988023952095808) ); lognormal variance with pedigree 0.040325, pedigree (1,2,2,2,1)
  (same comment as for Carbon dioxide, fossil)
- DOC, Dissolved Organic Carbon [water, unspecified]: 8.63771e-5 kg; = 0.000156059259259259* ( IF(RP_ethylene;0.4011976047904192) + IF(RP_propylene;0.5988023952095808) ); lognormal variance with pedigree 0.25, pedigree (5,5,5,5,5)
  Estimated value based on the TOC output.
- TOC, Total Organic Carbon [water, unspecified]: 8.63771e-5 kg; = 0.000156059259259259* ( IF(RP_ethylene;0.4011976047904192) + IF(RP_propylene;0.5988023952095808) ); lognormal variance with pedigree 0.25, pedigree (5,5,5,5,5)
  Estimated value based on the COD output.
- Water [water, unspecified]: 0.0467588 m3; = (1-fraction_CW_OT_to_air)* 0.088 *( IF(RP_ethylene;0.4011976047904192) + IF(RP_propylene;0.5988023952095808) ); lognormal variance with pedigree 0.000925, pedigree (1,2,2,2,1)
  (same comment as for Water)

## Sampling procedure
Data obtained from the literature.
References:
2021, Lin Lv, Guobao Song, Xinyue Zhao, Jingwen Chen, Environmental Burdens of China’s Propylene manufacturing: Comparative life-cycle assessment and scenario analysis, Science of the Total Environment, 799

Due to the fact that that there are two reference products in this dataset, subdivision of the exchange amounts between ethylene and propylene is required first. This subdivision is based on the shares of mass from the respective products. The ethylene contribution is 0.67 kg while propylene contribute roughly 1.0 kg. The resulting fractions for the subdivision are approximately 40.12 and 59.88% for ethylene, propylene, and butenes, respectively. Meaning that 40.12% of the exchanges are allocated to ethylene production and the remaining 59.88% are allocated to propylene production.

## Extrapolations
Literature data.
