# flattened bamboo production

Dataset: EcoSpold 2, unit process
Geography: RoW
Time period: 2010-01-01 to 2023-12-31
Technology level: current
Classification: ISIC rev.4 ecoinvent: 162:Manufacture of products of wood, cork, straw and plaiting materials
Scenario: Business-as-Usual
System model: Allocation, cut-off by classification
Generated by: Edwin Zea Escamilla
Database: ecoinvent
isCopyrightProtected: true
accessRestrictedTo: 1

## General comment
This dataset is a weighted average of the existing local datasets (BR, CN, CO, PH). It represents the production of 1 Kg of flattened bamboo. The input of bamboo pole is assumed to have a water content of u=20%. The production takes place at a bamboo processing facility which is usually located extremely close to the bamboo pole production site. This is a handcrafted process usually done with hatchets. To produce flattened bamboo, a bamboo pole is cracked open and its internodes are removed. The innermost part of the bamboo is then trimmed down. During this process, some fibres are broken, rendering the material flexible but still able to maintain its shape. The main application of flattened bamboo is in load-bearing wall systems, where it is used between bamboo poles to support the soil-cement mortar with which the walls are plastered (Murphy et al., 2004; Zea Escamilla et al., 2013). Flattened bamboo is also used to produce woven bamboo mats. The figures origin from mainly calculations and literature values. This dataset was developed with the support of the International Organization for Bamboo and Rattan INBAR.
Ref:
Murphy, R.J., Trujillo, D., Londoño, X., 2004. Life cycle assessment (LCA) of a Guadua
house. In: International Symposium of Bamboo - Guadua. Pereira, Colombia.
Zea Escamilla, E. and G. Habert, Environmental impacts from the production of bamboo based construction materials representing the global production diversity. Journal of Cleaner Production, 2013.

## Included activities start
From reception of bamboo pole at the processing facility

## Included activities end
This activity ends with flattened bamboo (u=20%) at the processing facility. The dataset includes the inputs for trimming and processing. The dataset does not include infrastructure. This process is considered to be handcrafted, no power tools are used.

## Technology
Current production technology

## Reference product
- flattened bamboo: 1 kg; name RP; By-product classification allocatable product; CPC 31212: Wood, continuously shaped along any of its edges or faces (including strips and friezes for parquet flooring, […]; HS2017 140110: Bamboo used primarily for plaiting
  production volume 4.93302e7 kg; name PV_RP; = 1.59E+08*1.0697
    The production volume is a rough estimate based on the annual production volume of woven bamboo mats assuming that all flattened bamboo is further processed into mats. 1.0697 Kg of flattened bamboo is required to produce 1 Kg of bamboo mat.
    The PV for bamboo mats is calculated based on the Chinese production volumes of woven bamboo mat panels. These are based on export data retrieved from INBAR (at <http://trade.inbar.int:10444/>, last accessed in December 2020). For more details, please refer to the documentation of the PV of “woven bamboo mat, CN”.
  property heating value, net 17.68 MJ
    Jetsada P. & Panmanas S. (2017),Evaluation of lower heating value and elemental composition of bamboo using near infrared spectroscopy,Energy,Volume 121,Pages 147-158,ISSN 0360-5442,https://doi.org/10.1016/j.energy.2017.01.020.
  property price 0.529363 EUR2005
    Based on expert judgement, price given as 0.64 USD/kg. Converted with an exchange rate of 1EURO = 1.209 USD.
  properties: carbon allocation 0.411667 kg, carbon content 0.494, carbon content, fossil 0, carbon content, non-fossil 0.494, dry mass 0.833333 kg, water content 0.2, water in wet mass 0.166667 kg, wet mass 1 kg

## Inputs from technosphere
- bamboo pole: 1.24974 kg; lognormal variance with pedigree 0.005, pedigree (2,3,3,4,2)
  weighted averages over all existing local production datasets available for this specific product
  properties: carbon content, non-fossil 0.494, dry mass 0.833333 kg, heating value, net 17.68 MJ, water content 0.2, wet mass 1 kg
  note on heating value, net: Jetsada P. & Panmanas S. (2017),Evaluation of lower heating value and elemental composition of bamboo using near infrared spectroscopy,Energy,Volume 121,Pages 147-158,ISSN 0360-5442,https://doi.org/10.1016/j.energy.2017.01.020.
- waste bamboo residues: -0.249735 kg; name bamboo_residues
  (same comment as for bamboo pole)
  production volume; = PV_RP*(bamboo_residues/RP)
    Calculated from production volume of reference product using the relative outputs.
  properties: carbon content, non-fossil 0.494, dry mass 0.833333 kg, heating value, net 17.68 MJ, water content 0.2, wet mass 1 kg

## Sampling procedure
The dataset is mostly based on literature values and was developed with the support of the International Organization for Bamboo and Rattan INBAR

## Extrapolations
The amounts of flows are weighted averages over all existing local production datasets available for this specific product. The weights are the annual production volumes of the local datasets relative to the sum of all local annual production volumes.
