# natural gas, high pressure, import from RU

Dataset: EcoSpold 2, unit process
Geography: NL
Time period: 2021-01-01 to 2023-12-31
Technology level: current
Classification: ISIC rev.4 ecoinvent: 3520:Manufacture of gas; distribution of gaseous fuels through mains
Scenario: Business-as-Usual
System model: Allocation, cut-off by classification
Share of production covered: 100 %
Generated by: Maresa Bussa
Published in: Bussa, M. 2023
Database: ecoinvent
isCopyrightProtected: true
accessRestrictedTo: 1

## General comment
This dataset represents the import of natural gas [m3] from Russian Federation to Netherlands. The gas inputs to this import activity shares of gas supplied through LNG import and via long-distance pipeline for the specific combination of origin and destination. The average transport distance from the countries of origin to European region was adapted from previous studies, whereas additional combinations of supply-demand geographies were estimated for other regions.
Reference(s):
Bussa, M., N. Jungbluth, Ch. Meili (2023) Life cycle inventories for long-distance transport and distribution of natural gas. ESU-services Ltd. Schaffhausen, Switzerland. Available from: http://esu-services.ch/data/public-lci-reports/

## Included activities start
The activity starts from the outbound gate of the natural gas production plants.

## Included activities end
This dataset describes the transport needed for an average export of natural gas from the place of origin. Gas losses and emissions during seasonal storage are included. The dataset “Natural gas, burned in gas turbine” is used to account for the emissions and infrastructure of the operational energy requirements of the storage capacities. The infrastructure of the storage is neglected in this study as it is assumed to be insignificant. The activity ends at the "entry gate" of national markets for natural gas at high pressure.

## Geography
Netherlands

## Technology
An average leakage rate of 0.1% of the gas stored was used by Bussa et al. (2023), based on previous studies. Furthermore, Bussa et al. assumed that 15% of total natural gas supply is temporarily stored, based on European Commission (2015), for all geographies covered.

## Time period
Transport modes investigated for 2021.

## Reference product
- natural gas, high pressure: 1 m3; By-product classification allocatable product; CPC 12020: Natural gas, liquefied or in the gaseous state; HS2017 271121: Petroleum gases and other gaseous hydrocarbons; in gaseous state, natural gas; CAS 8006-14-2
  Output (corresponding to 1 MJ based on the net calorific value of 36 MJ/Sm3)
  production volume 1.0731e10 m3
    Import of natural gas in 2021 by trade partner based on EuroStat [NRG_TI_GAS] (accessed on 2023-06-06) for countries within Europe (except GB, which was based on 'Digest of UK Energy Statistics (DUKES): natural gas', accessed on 2023-06-20), and on 'bp Statistical Review of World Energy June 2022' for the rest of the world. PVs for imports to Rest-of-Europe and GLO/Rest-of-the-World were calculated by subtracting the sum of country-specific PVs modelled separately from the total import of the respective regions.
  property heating value, gross 40 MJ
    At standard conditions; based on Meili et al. (2022) section 5.2
  property heating value, net 36 MJ
    At standard conditions; based on Meili et al. (2022) section 5.2
  property price 0.16673 EUR2005
    Calculated value based on data from the United Nations Commodity Trade Statistics Database (http://data.un.org/Data.aspx?q=natural+gas&d=ComTrade&f=_l1Code%3a28%3bcmdCode%3a271121; accessed 12 October 2023). UN Comtrade category: 271121 - Natural gas in gaseous state. An average for 2019-2021 was used and adjusted for inflation to the year 2005. The average price of imports and exports into the four main markets (EU, US, JP, and CN) was determined. Density of natural gas of 0.735 kg/m³ for unit conversion was used.
  properties: amount in multioutput activity_m3 0 m3, carbon allocation 0.544635 kg, carbon content 0.741, carbon content, fossil 0.741, carbon content, non-fossil 0, dry mass 0.735 kg, water content 0, water in wet mass 0 kg, wet mass 0.735 kg

## Inputs from technosphere
- natural gas, burned in gas turbine: 0.081 MJ; lognormal variance with pedigree 0.0169951, pedigree (4,2,2,3,3)
  Qualified estimates from different gas companies, as described in Bussa et al. 2023
- natural gas, high pressure: 0.118566 m3; = 0.177525297354873*(1-0.332184356740691)*0.0277805555555556; lognormal variance with pedigree 0.00869512, pedigree (4,2,1,1,1)
  Imports via pipeline + losses; shares of offshore and onshore production from table 4.1 in Meili et al. (2023)
  properties: carbon content, fossil 0.741, dry mass 0.735 kg, heating value, gross 40 MJ, heating value, net 36 MJ, wet mass 0.735 kg
  note on heating value, gross: At standard conditions; based on Meili et al. (2022) section 5.2
- natural gas, high pressure: 0.332218 m3; = 0.332184356740691*0.0277805555555556; lognormal variance with pedigree 0.00869512, pedigree (4,2,1,1,1)
  Imports via LNG, as described in Bussa et al. 2023
- natural gas, high pressure: 0.549316 m3; = 0.822474702645127*(1-0.332184356740691)*0.0277805555555556; lognormal variance with pedigree 0.00869512, pedigree (4,2,1,1,1)
  (same comment as for natural gas, high pressure)
- transport, pipeline, offshore, long distance, natural gas: 0.90405 metric ton*km; lognormal variance with pedigree 0.00459512, pedigree (3,4,1,1,1)
  Average weighted distance is estimated based on trade statistics and pipeline network., as described in Bussa et al. 2023
- transport, pipeline, onshore, long distance, natural gas: 2.66805 metric ton*km; lognormal variance with pedigree 0.124113, pedigree (3,4,1,1,1)
  (same comment as for transport, pipeline, offshore, long distance, natural gas)

## Emissions to nature
- Butane [air, non-urban air or from high stacks]: 6.35205e-7 kg; lognormal variance with pedigree 0.0503005, pedigree (2,3,4,1,1)
  Calculated based on leakage and average gas composition, as described in Bussa et al. 2023
- Carbon dioxide, fossil [air, non-urban air or from high stacks]: 2.29297e-6 kg; lognormal variance with pedigree 0.656773, pedigree (2,3,4,1,1)
  Calculated based on leakage and average gas composition, as described in Bussa et al. 2023
- Ethane [air, non-urban air or from high stacks]: 5.49036e-6 kg; lognormal variance with pedigree 0.0503005, pedigree (2,3,4,1,1)
  Calculated based on leakage and average gas composition, as described in Bussa et al. 2023
- Mercury II [air, non-urban air or from high stacks]: 1e-12 kg; lognormal variance with pedigree 0.0503005, pedigree (2,3,4,1,1)
  Calculated based on leakage and average gas composition, as described in Bussa et al. 2023
- Methane, fossil [air, non-urban air or from high stacks]: 6.62866e-5 kg; lognormal variance with pedigree 0.0503005, pedigree (2,3,4,1,1)
  Calculated based on leakage and average gas composition, as described in Bussa et al. 2023
- NMVOC, non-methane volatile organic compounds [air, non-urban air or from high stacks]: 4.5738e-8 kg; lognormal variance with pedigree 0.00979512, pedigree (2,3,4,1,1)
  Calculated based on leakage and average gas composition, as described in Bussa et al. 2023
- Propane [air, non-urban air or from high stacks]: 1.23525e-6 kg; lognormal variance with pedigree 0.0503005, pedigree (2,3,4,1,1)
  Calculated based on leakage and average gas composition, as described in Bussa et al. 2023

## Sampling procedure
Literature. Online calculators for distances. The data for storage emissions are based on global data. The share of gas stored is a rough estimate based on European data. The average weighted transport distance is based on the trade movements 2021.

## Extrapolations
The consumption mixes for regions and non-european countries were calculated based on the production and trade statistics provided in BP (2022) . Data from Eurostat (2023) were used to modell consumption mixes for European countries. The British consumption mix is based on data from the Department for Business, Energy and Industrial Strategy (2022.)
