# tillage, subsoiling, by subsoiler or v-ripper

Dataset: EcoSpold 2, unit process
Geography: US
Time period: 2021-01-01 to 2023-12-31
Technology level: current
Classification: ISIC rev.4 ecoinvent: 0161:Support activities for crop production
Scenario: Business-as-Usual
System model: Allocation, cut-off by classification
Generated by: Juanita Barrera
Database: ecoinvent
isCopyrightProtected: true
accessRestrictedTo: 1

## General comment
This dataset represents the subsoiling operation by subsoiler or v-ripper in one hectare (ha). This operation is performed during soil preparation phase. It is performed to break up a compacted soil in order to increase soil aeration. Functional Unit (FU) is one hectare of tillage subsoiling. The operation time is about 1.19 hours per ha (62.5% of this time is actually worked, discounting time for maintenance, waiting in the field and re-allocations between the plots).

## Included activities start
The activity starts from the agricultural field foreseen to be processed.

## Included activities end
This activity ends when soil is tilled. The dataset includes the diesel fuel consumption and the amount of agricultural machinery and shed. Also taken into consideration is the amount of emissions to the air from diesel combustion and the emission to the soil from tyre abrasion during the work process.

## Geography
The inventory is extrapolated from the Global geography. Data quality indicators from adjusted accordingly.

## Technology
Fuel consumption and emissions per kg diesel have been extrapolated to the US, but others inputs were taken from the original values.

## Reference product
- tillage, subsoiling, by subsoiler or v-ripper: 1 ha; By-product classification allocatable product; CPC 86119: Other support services to crop production
  production volume 76696 ha
    Estimated based sugarcane production area, year 2020, according to the FAOSTAT data. This operation is assumed to occur once every 5 years
  property price 30.8202 EUR2005
    The price is from the year 2020. Price information has been directly provided by the data provider based on the following reference: University of Minnesota, Machinery cost estimates, W.F. Lazarus, 2020. The prices were adjusted for inflation relative to 2005 using the producer price index (PPI) of the euro area, published by eurostat (https://ec.europa.eu/eurostat/databrowser/view/STS_INPP_A__custom_6416181/default/table?lang=en, last accessed on 2023-06-01).
  properties: carbon allocation 0 kg, carbon content 0

## Inputs from technosphere
- agricultural machinery, tillage: 0.470238 kg; lognormal variance with pedigree 0.3029, pedigree (2,2,2,5,1)
  proxy from "tillage, subsoiling, by subsoiler plow, GLO"
- diesel: 7.45562 kg; lognormal variance with pedigree 0.0015, pedigree (2,2,2,1,1)
  average of subsoiling data - UMN Farm Machinery Economic Cost Estimation Spreadsheet (MACHDATA.XLSM) Lazarus, 2022; 2021 Nebraska Crop budget projections, Robert Klein and Glennis McClure, UNL Extension
  properties: carbon content, fossil 0.865, dry mass 1 kg, heating value, net 42.8 MJ, wet mass 1 kg
- shed: 0.002 m2; lognormal variance with pedigree 0.3128, pedigree (3,3,2,5,3)
  proxy from "tillage, subsoiling, by subsoiler plow, GLO"
- tractor, 4-wheel, agricultural: 0.849057 kg; lognormal variance with pedigree 0.3029, pedigree (2,2,2,5,1)
  proxy from "tillage, subsoiling, by subsoiler plow, GLO"

## Emissions to nature
- Ammonia [air, non-urban air or from high stacks]: 0.000149054 kg; lognormal variance with pedigree 0.060325, pedigree (3,2,2,2,3)
  adapted from "tillage, subsoiling, by subsoiler plow, GLO" to match the diesel consumption
- Benzene [air, non-urban air or from high stacks]: 5.42016e-5 kg; lognormal variance with pedigree 0.060325, pedigree (3,2,2,2,3)
  adapted from "tillage, subsoiling, by subsoiler plow, GLO" to match the diesel consumption
- Benzo(a)pyrene [air, non-urban air or from high stacks]: 2.23581e-7 kg; lognormal variance with pedigree 0.660325, pedigree (3,2,2,2,3)
  adapted from "tillage, subsoiling, by subsoiler plow, GLO" to match the diesel consumption
- Cadmium II [air, non-urban air or from high stacks]: 7.45271e-8 kg; lognormal variance with pedigree 0.660325, pedigree (3,2,2,2,3)
  adapted from "tillage, subsoiling, by subsoiler plow, GLO" to match the diesel consumption
- Carbon dioxide, fossil [air, non-urban air or from high stacks]: 23.2615 kg; lognormal variance with pedigree 0.020325, pedigree (3,2,2,2,3)
  adapted from "tillage, subsoiling, by subsoiler plow, GLO" to match the diesel consumption
- Carbon monoxide, fossil [air, non-urban air or from high stacks]: 0.0402447 kg; lognormal variance with pedigree 0.660325, pedigree (3,2,2,2,3)
  adapted from "tillage, subsoiling, by subsoiler plow, GLO" to match the diesel consumption
- Chromium III [air, non-urban air or from high stacks]: 3.72636e-7 kg; lognormal variance with pedigree 0.660325, pedigree (3,2,2,2,3)
  adapted from "tillage, subsoiling, by subsoiler plow, GLO" to match the diesel consumption
- Copper ion [air, non-urban air or from high stacks]: 1.26922e-5 kg; lognormal variance with pedigree 0.660325, pedigree (3,2,2,2,3)
  adapted from "tillage, subsoiling, by subsoiler plow, GLO" to match the diesel consumption
- Dinitrogen monoxide [air, non-urban air or from high stacks]: 0.000894326 kg; lognormal variance with pedigree 0.060325, pedigree (3,2,2,2,3)
  adapted from "tillage, subsoiling, by subsoiler plow, GLO" to match the diesel consumption
- Methane, fossil [air, non-urban air or from high stacks]: 0.000962078 kg; lognormal variance with pedigree 0.060325, pedigree (3,2,2,2,3)
  adapted from "tillage, subsoiling, by subsoiler plow, GLO" to match the diesel consumption
- NMVOC, non-methane volatile organic compounds [air, non-urban air or from high stacks]: 0.0223581 kg; lognormal variance with pedigree 0.060325, pedigree (3,2,2,2,3)
  adapted from "tillage, subsoiling, by subsoiler plow, GLO" to match the diesel consumption
- Nickel II [air, non-urban air or from high stacks]: 5.23948e-7 kg; lognormal variance with pedigree 0.660325, pedigree (3,2,2,2,3)
  adapted from "tillage, subsoiling, by subsoiler plow, GLO" to match the diesel consumption
- Nitrogen oxides [air, non-urban air or from high stacks]: 0.317079 kg; lognormal variance with pedigree 0.050325, pedigree (3,2,2,2,3)
  adapted from "tillage, subsoiling, by subsoiler plow, GLO" to match the diesel consumption
- PAH, polycyclic aromatic hydrocarbons [air, non-urban air or from high stacks]: 2.45262e-5 kg; lognormal variance with pedigree 0.320325, pedigree (3,2,2,2,3)
  adapted from "tillage, subsoiling, by subsoiler plow, GLO" to match the diesel consumption
- Particulate Matter, < 2.5 um [air, non-urban air or from high stacks]: 0.0632352 kg; lognormal variance with pedigree 0.060325, pedigree (3,2,2,2,3)
  adapted from "tillage, subsoiling, by subsoiler plow, GLO" to match the diesel consumption
- Selenium IV [air, non-urban air or from high stacks]: 7.45271e-8 kg; lognormal variance with pedigree 0.060325, pedigree (3,2,2,2,3)
  adapted from "tillage, subsoiling, by subsoiler plow, GLO" to match the diesel consumption
- Sulfur dioxide [air, non-urban air or from high stacks]: 0.00754305 kg; lognormal variance with pedigree 0.020325, pedigree (3,2,2,2,3)
  adapted from "tillage, subsoiling, by subsoiler plow, GLO" to match the diesel consumption
- Zinc II [air, non-urban air or from high stacks]: 7.45271e-6 kg; lognormal variance with pedigree 0.660325, pedigree (3,2,2,2,3)
  adapted from "tillage, subsoiling, by subsoiler plow, GLO" to match the diesel consumption
- Cadmium II [soil, agricultural]: 5.896e-5 kg; lognormal variance with pedigree 0.0462, pedigree (3,4,2,5,1)
  proxy from "tillage, subsoiling, by subsoiler plow, GLO"
- Lead II [soil, agricultural]: 0.000255493 kg; lognormal variance with pedigree 0.0462, pedigree (3,4,2,5,1)
  proxy from "tillage, subsoiling, by subsoiler plow, GLO"
- Zinc II [soil, agricultural]: 0.00157227 kg; lognormal variance with pedigree 0.0462, pedigree (3,4,2,5,1)
  proxy from "tillage, subsoiling, by subsoiler plow, GLO"

## Extrapolations
The dataset is modeled for agricultural production system in US. Data Quality indicators are adjusted accordingly.
