# aluminium hydroxide factory construction

Dataset: EcoSpold 2, unit process
Geography: RER
Time period: 2002-01-01 to 2023-12-31
Technology level: current
Classification: EcoSpold01Categories: metals/extraction
Classification: ISIC rev.4 ecoinvent: 4100:Construction of buildings
Tags: ConvertedDataset
Scenario: Business-as-Usual
System model: Allocation, cut-off by classification
Generated by: Hans-Jörg Althaus
Published in: Althaus H.-J. 2000
Database: ecoinvent
isCopyrightProtected: true
accessRestrictedTo: 1

## General comment
Medium sized plant. Output: 1'220'000 t/a, life time: 50 years
[This dataset was already contained in the ecoinvent database version 2. It was not individually updated during the transfer to ecoinvent version 3. Life Cycle Impact Assessment results may still have changed, as they are affected by changes in the supply chain, i.e. in other datasets. This dataset was generated following the ecoinvent quality guidelines for version 2. It may have been subject to central changes described in the ecoinvent version 3 change report (http://www.ecoinvent.org/database/ecoinvent-version-3/reports-of-changes/), and the results of the central updates were reviewed extensively. The changes added e.g. consistent water flows and other information throughout the database. The documentation of this dataset can be found in the ecoinvent reports of version 2, which are still available via the ecoinvent website. The change report linked above covers all central changes that were made during the conversion process.]

## Included activities start
The activity starts from the transformation of unspecified land to industrial area.

## Included activities end
Part of the Al2O3 plant needed for Al(OH)3 fabrication including port, storage and process infrastructure. Also includes Building for administration. Includes disposal.

## Geography
Some Swiss datasets are used for European processes.

## Technology
Technology of one medium sized plant in Germany

## Reference product
- aluminium hydroxide factory: 1 unit; By-product classification allocatable product; CPC 53269: Other constructions for manufacturing
  production volume 1.32237 unit
    This is a placeholder value that does not reflect real-world production volumes. This dataset does not currently require a real-world production volume to work in the database framework, and no actual data were collected yet. This has no negative effect on the results of the ecoinvent database. The placeholder value of this activity was scaled according to the nominal GDP of 2005 (source: United Nations, http://data.un.org/Glossary.aspx?q=GDP+%28current+US%24%29, accessed 20130726) to reflect an appropriate share of the global production volume, which is also a placeholder value.
  property price 1.34877e8 EUR2005
    Upscale from EU 27 to the world by PPP (0.8458 in 2003 and 0,8426 in 2004)
  properties: carbon allocation 0 kg, carbon content 0

## Inputs from technosphere
- building, hall: 5600 m2; lognormal variance with pedigree 0.344, pedigree (3,4,5,1,1)
- building, multi-storey: 25000 m3; lognormal variance with pedigree 0.344, pedigree (3,4,5,1,1)
  activityLink introduced to establish a direct link to the corresponding regional supply of this product
- concrete, normal strength: 2013.54, 1106.46 m3 (2 suppliers, which the file names only by identifier); sum of these 3120 m3; lognormal variance with pedigree 0.344, pedigree (3,4,5,1,1)
  properties: dry mass 2190 kg, water content 0.086758, wet mass 2380 kg
- conveyor belt: 640 m; lognormal variance with pedigree 0.344, pedigree (3,4,5,1,1)
  (same comment as for building, multi-storey)
- industrial machine, heavy, unspecified: 220000 kg; lognormal variance with pedigree 0.344, pedigree (3,4,5,1,1)
  (same comment as for building, multi-storey)
- reinforcing steel: 2.09e6 kg; lognormal variance with pedigree 0.344, pedigree (3,4,5,1,1)
  properties: carbon content, fossil 0.004, dry mass 1 kg, wet mass 1 kg
- steel, chromium steel 18/8, hot rolled: 1.87e6 kg; lognormal variance with pedigree 0.344, pedigree (3,4,5,1,1)
  properties: carbon content, fossil 0.0008, dry mass 1 kg, wet mass 1 kg
  note on carbon content, fossil: Stainless steel model is the grade 304 steel (18/8 stainless, 18% chromium 8% nickel; max. 0.08% C)
- steel, low-alloyed, hot rolled: 24600 kg; lognormal variance with pedigree 0.344, pedigree (3,4,5,1,1)
  properties: carbon content, fossil 0.005, dry mass 1 kg, wet mass 1 kg
  note on carbon content, fossil: Low alloyed steel composition given in Tab. 3.2 ecoinvent v2.2 report 10_partII. Steel assumed to have a C content of 0.5%
- waste concrete, not reinforced: -217693, -2306.63 kg (2 suppliers, which the file names only by identifier); sum of these -220000 kg; lognormal variance with pedigree 0.304, pedigree (3,4,1,1,1)
  production volume
    Calculated from the production volume of aluminium hydroxide factory in proportion to the respective output amounts.
  properties: dry mass 1 kg, wet mass 1 kg
- waste reinforced concrete: -8.63847e6, -91531.1 kg (2 suppliers, which the file names only by identifier); sum of these -8.73e6 kg; lognormal variance with pedigree 0.304, pedigree (3,4,1,1,1)
  production volume
    (same comment as for waste concrete, not reinforced)
  properties: dry mass 0.99418 kg, water content 0.00585407, wet mass 1 kg

## Inputs from nature
- Occupation, industrial area [natural resource, land]: 2.612e7 m2*year; lognormal variance with pedigree 0.0826, pedigree (2,4,5,1,1)
- Transformation, from unspecified [natural resource, land]: 522000 m2; lognormal variance with pedigree 0.162, pedigree (1,4,5,1,1)
- Transformation, to industrial area [natural resource, land]: 522000 m2; lognormal variance with pedigree 0.1626, pedigree (2,4,5,1,1)

## Sampling procedure
Internet search

## Extrapolations
see Geography

## Review by Roland Hischier 2003-06-10
Passed.
