# beam, hardwood, raw, air drying to u=20%

Dataset: EcoSpold 2, unit process
Geography: CA-QC
Time period: 2011-01-01 to 2023-12-31
Technology level: current
Classification: ISIC rev.4 ecoinvent: 1610:Sawmilling and planing of wood
Tags: recontextualization
Scenario: Business-as-Usual
System model: Allocation, cut-off by classification
Generated by: Hugues Imbeault-Tétreault
Published in: Werner, F. (Ed.) 2015
Database: ecoinvent
isCopyrightProtected: true
accessRestrictedTo: 1

## General comment
This dataset represents the natural air drying process of hardwood beam, per m3 dried wood. After sawing the softwood is dried. Air drying occurs during storage, which is assumed to take place at the sawmill site. Beams will be dried for 30 months. Shrinkage ratio of between the moisture content of u=30% - 0% is 0.004 %/%.
Within ecoinvent, three products - boards, beams and laths - are distinguished:
After being sawn, the resulting products can either be air dried down to a moisture content of u=20% (mass of water per dry mass), kiln dried down to u=20% or kiln dried down to u=10%. The activity name indicates the respective product, drying technology and target moisture.
The data was provided by and approved by the Swiss forest industry (Holzindustrie Schweiz HIS).
The exchanges of this child dataset are identical to the GLO dataset. This dataset was created to enable linking to regional markets (e.g. for electricity). Data quality indicators were adjusted accordingly.

## Included activities start
Natural air drying process starting from sawn hardwood, at sawmill site.

## Included activities end
This activity ends with air dried hardwood beam at the sawmill.The dataset includes air drying of wet wood assumed as u=70% down to u=20%, shrinkage and land use. The dataset does not include air emissions released from the wood because the same emissions would occur if the wood would not be used.

## Parameters
- moisture content beam: 20 dimensionless; name moisture_beam
  moisture content of beam after drying
- moisture content sawnwood: 70 dimensionless; name moisture_sawnwood
  moisture content of sawn timber before drying
- shrinkage ratio (u=30% - 0%): 0.004 dimensionless; name shrinkage_ratio
  % volume loss/% loss of moisture content (u) between u=30% and u=0
- wood density, basic: 588.8 kg/m3; name basic_wood_d; = dry_wood_d*(1-moisture_beam*shrinkage_ratio)
  kg oven-dry matter/wet volume
- wood density, dry: 640 kg/m3; name dry_wood_d
  kg oven-dry matter/oven-dry volume

## Reference product
- sawnwood, beam, hardwood, raw, dried (u=20%): 1 m3; name beam_raw_airdried; By-product classification allocatable product; CPC 31102: Wood, sawn or chipped lengthwise, sliced or peeled, of a thickness exceeding 6 mm, of non-coniferous wood; HS2017 4407: Wood sawn or chipped lengthwise, sliced or peeled, whether or not planed, sanded or end-jointed, of a thickne[...]
  production volume 157076 m3; = 55858*0.2*0.4/24340*8.5557E+05
    Annual production of sawn hardwood (sawnwood NC = non-coniferous from FAOStat for Switzerland) x 40% board x 40% air dried; estimated from Swiss production volumes via the production volumes of sawnwood (NC= non-coniferous) in Switzerland and Quebec according to FAOStat and Statistics Canada, respectively.
  property dry mass 588.8 kg; = basic_wood_d
  property heating value, net 8524.3 MJ
    Assumed equal to "sawnwood, beam, hardwood, dried (u=20%), planed".The property is based on a value of 12.06MJ/kg
  property price 265 EUR2005
    Expert judgement (Urs Luginbühl, Swiss Sawmilling industry, personal communication in June 2014). Cross-reference; FAOSTAT (accessed 20140428). The price is calculated by using data on total world import quantity (m3) and import value (1000 USD), year 2005. 25656806 m3 of Sawnwood (NC) - coniferous was imported in the world in 2005. The import value was 9652714000 USD. The calculated price is thus (9652714000/25656806=376*0.8=) 303 Euro.
  property water content 0.2; name water_content
  property water in wet mass 117.76 kg; name WWM_dried; = basic_wood_d* water_content
  property wet mass 706.56 kg; = basic_wood_d*(1+ water_content)
  properties: carbon allocation 290.867 kg, carbon content 0.494, carbon content, fossil 0, carbon content, non-fossil 0.494

## Inputs from technosphere
- sawnwood, hardwood, raw: 1.04167 m3; name sawnwood_raw; = beam_raw_airdried/(1- (30-moisture_beam)*shrinkage_ratio); lognormal variance with pedigree 0.0106, pedigree (2,1,4,5,1)
  processed internally within the sawmill
  property water in wet mass 394.24 kg; name WWM_sawnwood
  properties: carbon content, non-fossil 0.494, dry mass 563.2 kg, heating value, net 7462.65 MJ, water content 0.7, wet mass 957.44 kg

## Inputs from nature
- Occupation, industrial area [natural resource, land]: 0.008575 m2*year; name occupation; = 0.343/100*30/12; lognormal variance with pedigree 0.0106, pedigree (2,1,4,5,1)
  land occupation estimated for production volume over 100 years times monthts divided by 12 months per year
- Transformation, from unspecified [natural resource, land]: 0.00343 m2; name transformation_from; = 0.343/100; lognormal variance with pedigree 0.0106, pedigree (2,1,4,5,1)
  land occupation estimated for production volume over 100 years
- Transformation, to industrial area [natural resource, land]: 0.00343 m2; name transformation_to; = 0.343/100; lognormal variance with pedigree 0.0106, pedigree (2,1,4,5,1)
  land occupation estimated for production volume over 100 years

## Emissions to nature
- Water [air, unspecified]: 0.292907 m3; = (WWM_sawnwood*sawnwood_raw-WWM_dried*beam_raw_airdried)/1000; lognormal variance with pedigree 0.0086, pedigree (1,1,4,1,1)
  difference in water in wet mass between undried and dried sawn timber, converted from kg to m3

## Sampling procedure
complementary literature and sampling from sawmills

## Extrapolations
Extrapolated from CH data. The exchanges of this child dataset are identical to the GLO dataset. This dataset was created to enable linking to regional markets (e.g. for electricity). Data quality indicators were adjusted accordingly.
