# polyethylene terephthalate production, granulate, bottle grade

Dataset: EcoSpold 2, unit process
Geography: RoW
Time period: 2015-01-01 to 2023-12-31
Technology level: current
Classification: ISIC rev.4 ecoinvent: 2013:Manufacture of plastics and synthetic rubber in primary forms
Synonyms: PET
Scenario: Business-as-Usual
System model: Allocation, cut-off by classification
Generated by: Thomas Fröhlich
Published in: PlasticsEurope 2017
Database: ecoinvent
isCopyrightProtected: true
accessRestrictedTo: 1

## General comment
The dataset represents the production mix of commercial bottle grade PET production technologies. PET production covered by this study is by esterification of ethylene glycol and terephthalic acid (PTA). The esterification process is carried out under moderate pressure (2.5-5.5 bar) and at high temperature (230-270 °C) whilst the water formed during the reaction is continuously removed via distillation.
The monomers of PET production, purified terephthalic acid (PTA) and mono ethylene glycol (MEG) are polymerised in the liquid phase to produce amorphous PET. This form of the polymer is suitable for the production of fibres and film. Most bottle grade PET today is a copolyester slightly modified through addition of 1-2% Benzene-1,3-dicarboxylic acid (isophthalic acid, IPA) or 4(hydroxymethyl)cyclohexyl-methanol (cyclohexanedimethanol, CHDM) during polymerisation.
The first step of PET production is the esterification of PTA and MEG to bishydroxyethyl terepthalate (BHET) with water as a by-product at around 220-260 °C in the presence of an anti-mony catalyst (usually Sb2O3). Water forming from the esterification reaction is continuously removed by distillation. Formation of the undesired side product diethylene glycol is suppressed by maintaining low molar ratios of MEG:PTA (less than 2 or even 1.5). BHET is then sent to Pre-polycondensation in a second reactor under a vacuum and further to a melt polycondensation reactor at higher temperatures and still under vacuum. Vacuum is required to remove water and other side products and to drive the reaction equilibrium towards the polymer.
As melt polymerisation does not produce high molecular weight, a subsequent polymerisation step, solid state polymerisation (SSP) is required for bottle grade PET. During SSP the polymer chain lengths are increased by heat in the absence of oxygen and water, by means of either vacuum or purging with an inert gas to drive off the by-products of reactions. The reaction is driven by temperature, pressure, and the diffusion of by-products from the interior of the pellet to the surface. The product of SSP is a partially crystalline resin that can be used to produce bottles via injection moulding and stretch blow moulding.

## Included activities start
Acitivity starts with PTA entering the polymerisation plant. Both amorphous and bottle grade PET produciton are included. Energy supply is included in terms of heat production inside the battery limits of the plant. Steam and electricity supply is outside the activity.

## Included activities end
Activity ends with polymer granulate leaving the factory.

## Allocation
Within the foreground system economic allocation was applied for off-spec PET (<0.2 % of total PET output).

## Geography
Extrapolated from dataset with data for EU27 including Norway and Switzerland. The production volume and uncertainty have been adjusted accordingly.

## Time period
Data was collected for the year 2015, processed in 2016 and published in 2017

## Reference product
- polyethylene terephthalate, granulate, bottle grade: 1 kg; By-product classification allocatable product; CPC 34710: Polymers of ethylene, in primary forms; HS2017 390130: Ethylene polymers; in primary forms, ethylene-vinyl acetate copolymers; CAS 25038-59-9
  Reference Product
  production volume 1.44351e10 kg; name RP_PV
    According to Plastics Europe, Global production volume of plastics in 2013 was 299 Mt. It is assumed that the global production share (of the total plastic production) of polyethylene terephthalate, granulate, bottle grade is equal to the respective European production share, which is 8 % of the total plastics production in Europe.
    Source: PlasticsEurope, 2013, Plastics - The Facts 2013, accessed online at: https://www.plasticseurope.org/en/resources/market-data on 11th of July 2018
  properties: carbon allocation 0.625 kg, carbon content 0.625, carbon content, fossil 0.625, carbon content, non-fossil 0, dry mass 1 kg, heating value, net 22.95 MJ, price 1.29 EUR2005, water content 0, water in wet mass 0 kg, wet mass 1 kg

## Inputs from technosphere
- antimony: 0.000268011 kg; lognormal variance with pedigree 0.0152, pedigree (3,3,3,5,3)
  Weighted average of reported input
  properties: dry mass 1 kg, wet mass 1 kg
- chemical factory, organics: 4e-10 unit; lognormal variance with pedigree 0.31, pedigree (2,3,2,4,3)
  Calculated based on literature data published by the industry. For this activity, no information was readily available concerning infrastructure and land-use. Therefore, the infrastructure is estimated based on data from two chemical factories, the BASF site of Ludwigshafen and the chemical factory in Gendorf (which are both located in Germany), which produce a wide range of chemical substances. Based on this data, the following assumptions are made: the built area amounts to about 4.2 ha, the plant has an average output of 50"000 t/a and a lifespan of fifty years. The estimated infrastructure amount is therefore 4.00 E-10 units per kg of produced chemical.
  References:
  Althaus H.-J., Chudacoff M., Hischier R., Jungbluth N., Osses M. and Primas A. (2007) Life Cycle Inventories of Chemicals. ecoinvent report No. 8, v2.0. EMPA Dübendorf, Swiss Centre for Life Cycle Inventories, Dübendorf, CH.
  Gendorf (2000) Umwelterklärung 2000, Werk Gendorf. Werk Gendorf, Burgkirchen.
- chemical, inorganic: 9.30791e-6 kg; lognormal variance with pedigree 0.0152, pedigree (3,3,3,5,3)
  Sum input parameter covering partly confidential information on additives, solvents, catalysts. Weighted average of reported input materials.
  properties: carbon content, fossil 0.003, dry mass 1 kg, wet mass 1 kg
  note on carbon content, fossil: This dataset is an unweighted average of 20 inorganic substances (listed in Tab 88.1, ecoinvent v2.2 report 8, part II), being part of the top100 chemicals included in this database. The C-content has also been calculated as an unweighted average of the C content of the substances composing this dataset.
- chemical, organic: 2.1083e-5 kg; lognormal variance with pedigree 0.0152, pedigree (3,3,3,5,3)
  (same comment as for chemical, inorganic)
  properties: carbon content, fossil 0.628, dry mass 1 kg, heating value, net 19.03 MJ, wet mass 1 kg
  note on carbon content, fossil: This dataset is an unweighted average of 20 organic substances (listed in Tab 88.1, ecoinvent v2.2 report 8, part II), being part of the top100 chemicals included in this database. The C-content has also been calculated as an unweighted average of the C content of the substances composing this dataset.
- compressed air, 600 kPa gauge: 0.0750977 m3; lognormal variance with pedigree 0.0152, pedigree (3,3,3,5,3)
  Weighted average of reported input
- diethylene glycol: 0.00411825 kg; lognormal variance with pedigree 0.0152, pedigree (3,3,3,5,3)
  Weighted average of reported input
  properties: carbon content, fossil 0.45283, dry mass 1 kg, heating value, net 25.14 MJ, wet mass 1 kg
- electricity, medium voltage: 0.00665938, 0.13284, 0.00332547, 0.00203933, 0.00040817, 8.76433e-5, 0.0137178, 0.0394271 kWh (8 suppliers, which the file names only by identifier); sum of these 0.198505 kWh; lognormal variance with pedigree 0.0152, pedigree (3,3,3,5,3)
  Weighted average of reported input
- ethylene glycol: 0.334943 kg; lognormal variance with pedigree 0.0152, pedigree (3,3,3,5,3)
  Weighted average of reported input
  properties: carbon content, fossil 0.387097, dry mass 1 kg, heating value, net 23.44 MJ, wet mass 1 kg
- hazardous waste, for incineration: -6.75213e-5 kg; name BP_amount2; lognormal variance with pedigree 0.0134, pedigree (3,3,2,5,3)
  Weighted average of reported waste
  production volume; = BP_amount2*RP_PV
    calculated with production volume of reference product
  properties: carbon content, fossil 0.554667, dry mass 0.75 kg, heating value, net 17 MJ, water content 0.333333, wet mass 1 kg
  note on carbon content, fossil: Tab A.6, ecoinvent v2.2 report 13_I. C content has been calculated after data in the tables, and then referred to 1 kg DM
  note on heating value, net: Value taken from the general comment of the treatment dataset.
- heat, from steam, in chemical industry: 0.387656 MJ; lognormal variance with pedigree 0.0152, pedigree (3,3,3,5,3)
  Weighted average of reported input
  properties: heating value, net 1 MJ
- natural gas, high pressure: 0.000490198, 0.000826903, 0.00180373, 0.000603632, 0.000141066, 0.000839598, 0.000805659, 0.0021185, 0.000817881, 0.00126503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 m3 (36 suppliers, which the file names only by identifier); sum of these 0.0610479 m3; lognormal variance with pedigree 0.0152, pedigree (3,3,3,5,3)
  Weighted average of reported input
  properties: carbon content, fossil 0.695187, dry mass 1 kg, heating value, net 36 MJ, wet mass 1 kg
  note on heating value, net: Literature value, Source: Christoph Meili;Niels Jungbluth;Maresa Bussa (2021) Life cycle inventories of crude oil and natural gas extraction. ESU-services Ltd. commissioned by BAFU & VSG, Schaffhausen, Switzerland, http://esu-services.ch/data/public-lci-reports/
- nitrogen, liquid: 0.0220013 kg; lognormal variance with pedigree 0.0152, pedigree (3,3,3,5,3)
  Weighted average of reported input
  properties: dry mass 1 kg, wet mass 1 kg
- phosphoric acid, industrial grade, without water, in 85% solution state: 2.7427e-5 kg; lognormal variance with pedigree 0.0152, pedigree (3,3,3,5,3)
  Weighted average of reported input
  properties: dry mass 1 kg, wet mass 1 kg
- purified terephthalic acid: 0.862765 kg; lognormal variance with pedigree 0.0152, pedigree (3,3,3,5,3)
  Weighted average of reported input
  properties: carbon content, fossil 0.578313, dry mass 1 kg, heating value, net 21.9 MJ, wet mass 1 kg
- spent solvent mixture: -0.00113685 kg; name BP_amount5; lognormal variance with pedigree 0.0134, pedigree (3,3,2,5,3)
  Weighted average of reported waste
  production volume; = BP_amount5*RP_PV
    calculated with production volume of reference product
  properties: carbon content, fossil 0.571257, dry mass 0.835 kg, heating value, net 21.7 MJ, water content 0.197605, wet mass 1 kg
  note on carbon content, fossil: Tab A.7, ecoinvent v2.2 report 13_I. C content has been calculated after data in the tables, and then referred to 1 kg DM
- waste plastic, mixture: -1.72593e-7, -1.63893e-7, -0.00064408, -6.25393e-6, -4.17863e-7, -6.97254e-8, -3.16023e-8 kg (7 suppliers, which the file names only by identifier); sum of these -0.00065119 kg; lognormal variance with pedigree 0.0134, pedigree (3,3,2,5,3)
  Weighted average of reported waste
  production volume; = BP_amount4*RP_PV
    calculated with production volume of reference product
  properties: carbon content, fossil 0.747344, dry mass 0.847 kg, heating value, net 30.79 MJ, water content 0.180638, wet mass 1 kg
- wastewater, average: -0.000420209 m3; name BP_amount3; lognormal variance with pedigree 0.0134, pedigree (3,3,2,5,3)
  Weighted average of reported waste
  production volume; = BP_amount3*RP_PV
    calculated with production volume of reference product
  properties: carbon content, non-fossil 0.194039, dry mass 0.346837 kg, water content 2882.2, wet mass 1000 kg
  note on carbon content, non-fossil: 0.0673 kg TOC/m3 (Tab A.17, ecoinvent v2.2 report 13_I). TOC was considered as Total Carbon.
- wastewater, unpolluted: -6.7476e-5 m3; name BP_amount1; lognormal variance with pedigree 0.0134, pedigree (3,3,2,5,3)
  Weighted average of reported waste
  production volume; = BP_amount1*RP_PV
    calculated with production volume of reference product
  properties: carbon content, fossil 0.00178991, carbon content, non-fossil 0.00178991, dry mass 0.337476 kg, water content 2962.17, wet mass 1000 kg
  note on carbon content, fossil: Assumed to be like in tap water. Bicarbonate content is 2.93 mol/m3. CO2 content is 0.1 mol/m3 (ecoinvent v2.2 report 8, Tab 93.1).

## Inputs from nature
- Water, cooling, unspecified natural origin [natural resource, in water]: 0.000623954 m3; lognormal variance with pedigree 0.0152, pedigree (3,3,3,5,3)
  Weighted average of reported input
- Water, lake [natural resource, in water]: 5.66495e-5 m3; lognormal variance with pedigree 0.0152, pedigree (3,3,3,5,3)
  Weighted average of reported input
- Water, river [natural resource, in water]: 4.96321e-5 m3; lognormal variance with pedigree 0.0152, pedigree (3,3,3,5,3)
  Weighted average of reported input
- Water, well, in ground [natural resource, in water]: 0.000258976 m3; lognormal variance with pedigree 0.0152, pedigree (3,3,3,5,3)
  Weighted average of reported input

## Emissions to nature
- Acetaldehyde [air, unspecified]: 1.27595e-5 kg; lognormal variance with pedigree 0.1346, pedigree (3,3,3,5,3)
  Weighted average of reported emissions
- Benzene [air, unspecified]: 6.42001e-8 kg; lognormal variance with pedigree 0.1346, pedigree (3,3,3,5,3)
  Weighted average of reported emissions
- Carbon dioxide, fossil [air, unspecified]: 0.112817 kg; lognormal variance with pedigree 0.0152, pedigree (3,3,3,5,3)
  Weighted average of reported emissions
- Carbon monoxide, fossil [air, unspecified]: 0.000254865 kg; lognormal variance with pedigree 0.6646, pedigree (3,3,3,5,3)
  Weighted average of reported emissions
- Dinitrogen monoxide [air, unspecified]: 2.78686e-7 kg; lognormal variance with pedigree 0.0546, pedigree (3,3,3,5,3)
  Weighted average of reported emissions
- NMVOC, non-methane volatile organic compounds [air, unspecified]: 1.97627e-5 kg; lognormal variance with pedigree 0.0546, pedigree (3,3,3,5,3)
  Weighted average of reported emissions
- Nitrogen oxides [air, unspecified]: 8.95435e-5 kg; lognormal variance with pedigree 0.0546, pedigree (3,3,3,5,3)
  Weighted average of reported emissions
- Particulate Matter, > 2.5 um and < 10um [air, unspecified]: 1.20244e-5 kg; lognormal variance with pedigree 0.1346, pedigree (3,3,3,5,3)
  Weighted average of reported emissions
- Sulfur dioxide [air, unspecified]: 1.88849e-5 kg; lognormal variance with pedigree 0.0152, pedigree (3,3,3,5,3)
  Weighted average of reported emissions
- Water [air, unspecified]: 0.000610241 m3; lognormal variance with pedigree 0.0152, pedigree (3,3,3,5,3)
  Weighted average of reported emissions
- Aluminium III [water, unspecified]: 2.30131e-9 kg; lognormal variance with pedigree 0.6646, pedigree (3,3,3,5,3)
  Weighted average of reported emissions
- Antimony ion [water, unspecified]: 7.24536e-7 kg; lognormal variance with pedigree 0.6646, pedigree (3,3,3,5,3)
  Weighted average of reported emissions
- Cadmium II [water, unspecified]: 1.23539e-10 kg; lognormal variance with pedigree 0.6646, pedigree (3,3,3,5,3)
  Weighted average of reported emissions
- Chromium III [water, unspecified]: 5.30471e-10 kg; lognormal variance with pedigree 0.6646, pedigree (3,3,3,5,3)
  Weighted average of reported emissions
- Copper ion [water, unspecified]: 5.79754e-10 kg; lognormal variance with pedigree 0.6646, pedigree (3,3,3,5,3)
  Weighted average of reported emissions
- Lead II [water, unspecified]: 1.11658e-9 kg; lognormal variance with pedigree 0.6646, pedigree (3,3,3,5,3)
  Weighted average of reported emissions
- Mercury II [water, unspecified]: 6.03955e-12 kg; lognormal variance with pedigree 0.6646, pedigree (3,3,3,5,3)
  Weighted average of reported emissions
- Nickel II [water, unspecified]: 1.70401e-9 kg; lognormal variance with pedigree 0.6646, pedigree (3,3,3,5,3)
  Weighted average of reported emissions
- Nitrogen, organic bound [water, unspecified]: 3.32894e-6 kg; lognormal variance with pedigree 0.0546, pedigree (3,3,3,5,3)
  Weighted average of reported emissions
- Phosphorus [water, unspecified]: 1.19257e-6 kg; lognormal variance with pedigree 0.0546, pedigree (3,3,3,5,3)
  Weighted average of reported emissions
- Suspended solids, unspecified [water, unspecified]: 0.000845734 kg; lognormal variance with pedigree 0.0546, pedigree (3,3,3,5,3)
  Weighted average of reported emissions
- Zinc II [water, unspecified]: 2.78841e-8 kg; lognormal variance with pedigree 0.6646, pedigree (3,3,3,5,3)
  Weighted average of reported emissions

## Sampling procedure
Extrapolated from European data. Questionnaires sent out to all production units in Europe operated by PlasticEurope/ECVM member companies.

## Extrapolations
This dataset has been created as a copy of the original dataset covering the geography RER, i.e., Europe. Annual production volume(s) and uncertainty have been adjusted accordingly. It is important to note that original RER dataset represents the average production mix, composed of several different processes/technologies, in Europe in the year of reference. It might not reflect the actual global production mix and should hence only be used as a proxy.
