# energy use and operation emissions, electric bicycle

Dataset: EcoSpold 2, unit process
Geography: RoW
Time period: 2009-01-01 to 2023-12-31
Technology level: current
Classification: EcoSpold01Categories: transport systems/road
Classification: ISIC rev.4 ecoinvent: 4922:Other passenger land transport
Scenario: Business-as-Usual
System model: Allocation, cut-off by classification
Generated by: Lucia Valsasina
Published in: M. Leuenberger 2010
Database: ecoinvent
isCopyrightProtected: true
accessRestrictedTo: 1

## General comment
The data set reflects the average operation (1 kWh/100km) of a e-bike of 24kg total weight.
[This dataset was already contained in the ecoinvent database version 2. It was not individually updated during the transfer to ecoinvent version 3. Life Cycle Impact Assessment results may still have changed, as they are affected by changes in the supply chain, i.e. in other datasets. This dataset was generated following the ecoinvent quality guidelines for version 2. It may have been subject to central changes described in the ecoinvent version 3 change report (http://www.ecoinvent.org/database/ecoinvent-version-3/reports-of-changes/), and the results of the central updates were reviewed extensively. The changes added e.g. consistent water flows and other information throughout the database. The documentation of this dataset can be found in the ecoinvent reports of version 2, which are still available via the ecoinvent website. The change report linked above covers all central changes that were made during the conversion process.]

## Included activities end
This data set includes the electricity demand using consumer mix for bicycle operation.

## Technology
eBike with four level support function of electric motor. Maximal speed 25km/h.

## Reference product
- energy use, electric bicycle: 1 km; By-product classification allocatable product; CPC 64119: Other land transportation services of passengers, n.e.c.
  EcoSpold01Location=CH
  production volume 3.96633 km
    Estimated. The global production volume is extrapolated from the swiss production volume using the nominal GDP of 2005 (source: United Nations, http://data.un.org/Glossary.aspx?q=GDP+%28current+US%24%29, accessed 20130726 and 20130312).
    Gross domestic product (GDP) at current prices is GDP at prices of the current reporting period. Also known as nominal GDP.
  property price 0.00107 EUR2005
    Calculated based on inputs: The price of the product has been calculated as a sum of the values of the material and energy inputs for this product. This value is therefore a rough estimation. It may underestimate the real price since there are additional expenses when producing any product. These expences can include for example labour costs, treatment of waste materials and profit for the producer. Please consider carefully whether this level of data quality is acceptable for your application.
  properties: carbon allocation 0 kg, carbon content 0

## Inputs from technosphere
- electricity, low voltage: 0.00037978, 1.69528e-5, 0.000266594, 0.0055335, 0.000546184, 3.40206e-6, 0.00125411, 0.0019051, 9.43801e-5 kWh (9 suppliers, which the file names only by identifier); sum of these 0.01 kWh; lognormal variance with pedigree 0.042, pedigree (1,1,5,5,1)
  Company information: e-bike: 1kWh/100km, i.o.-scooter: 3 kWh/100km
  EcoSpold01Location=CH
  Uncertainty: Company information: e-bike: 1kWh/100km, i.o.-scooter: 3 kWh/100km

## Extrapolations
extrapolated from swiss dataset
