# colemanite mine operation and beneficiation

Dataset: EcoSpold 2, unit process
Geography: TR
Time period: 2008-01-01 to 2023-12-31
Technology level: current
Classification: ISIC rev.4 ecoinvent: 0891:Mining of chemical and fertilizer minerals
Classification: EcoSpold01Categories: chemicals/inorganics
Scenario: Business-as-Usual
System model: Allocation, cut-off by classification
Generated by: Eleonora Crenna
Published in: Allard, G. 2013
Database: ecoinvent
isCopyrightProtected: true
accessRestrictedTo: 1

## General comment
This dataset represents the production of 1 kg of calcium borate from colemanite, a naturally occurring mineral containing boron in form of B2O3, which is extracted from open pit sites. The beneficiation process is carried out by disintegration, washing and classification in the size fractions in large sizes. Calcium borate is used in many sectors, for example as flame retardant in resin-based compounds, as a ceramic flux in ceramic glazes, and as additive in fertilizers. This dataset considers the production of calcium borate occurring in open pit sites in Turkey, which owns approximately 73% of the world’s boron reserves and 35% in the production and trade of borates.
References:
Önal, G., & Burat, F. (2008). Boron mining and processing in Turkey. Gospodarka Surowcami Mineralnymi, 24(3), 49-60.
USGS, 2017. Minerals Yearbook - Boron.
[This dataset is meant to replace the following datasets:
- calcium borates production, TR, 2000 - 2000]

## Included activities start
The activity starts with the mining of colemanite (Ca2B6O11 * 5H2O) from the ground.

## Included activities end
The activity ends with the production of colemanite concentrate.

## Geography
Data used represent conditions in Turkey. Proxy data from a study in Mexico were used for some flows. See specific comments to exchanges.

## Technology
Calcium borates are obtained from surface mining of colemanite (Ca2B6O11 * 5H2O) deposits. Open pit mining requires extensive drilling and blasting to reach load deposits. Ores are removed from the mine and transported to milling and beneficiating plants for concentrating the ore. Concentration, or beneficiation, is carried out by disintegration, washing and classification in the size fractions in large sizes, At Emet Colemanite Concentration plant (Turkey), a colemanite ore of 27% B2O3 content is treated to produce a concentrate having 43% B2O3.
Reference:
Önal, G., & Burat, F. (2008). Boron mining and processing in Turkey. Gospodarka Surowcami Mineralnymi, 24(3), 49-60.

## Time period
date of published literature

## Reference product
- calcium borates: 1 kg; name RefProd; By-product classification allocatable product; CPC 34270: Cyanides, cyanide oxides and complex cyanides; fulminates, cyanates and thiocyanates; silicates; borates; perb[…]; HS2017 252800: Natural borates and concentrates thereof (whether or not calcined), but not including borates separated fro[...]
  EcoSpold01Location=TR
  production volume 1.9e9 kg; name RefProd_PV
    The production volumes is expressed in kg. PV is is approximated with the total production of concentrate reported by USGS. In 2020 Turkey was estimated to produce 1'900k metric tonnes of calcium borates concentrate (USGS, 2020. Minerals Yearbook - Boron. Tables- only release),
  property boron content 0.169674; name RefProd_B_content; = (2*10.81)/(2*10.81+3*16)*0.43/0.787
    boron content on a dry matter basis. Calculated value based on stoichiometry (B MW = 10.81 g/mol; O MW = 16 g/mol) and the concentration of B2O3 in concentrated colemanite (0.43 as reported in Önal, G., & Burat, F. (2008). Boron mining and processing in Turkey. Gospodarka Surowcami Mineralnymi, 24(3), 49-60.)
  property price 0.44 EUR2005
    Calculated value based on data from United Nations Commodity Trade Statistics Database (comtrade.un.org). UN comtrade category: 281000 Oxides of boron, boric acids. Year 2005. Using exchange rate of 1EURO = 1.209 USD. Average of price of import into 5 main markets (EU, US, JP, IN and CN).
  properties: carbon allocation 0 kg, carbon content 0, carbon content, fossil 0, carbon content, non-fossil 0, dry mass 1 kg, water content 0, water in wet mass 0 kg, wet mass 1 kg

## Inputs from technosphere
- blasting: 0.000271 kg; lognormal variance with pedigree 0.2687, pedigree (4,3,5,3,5)
  EcoSpold01Location=RER
  Amount taken from the dataset "calcium borates production" (GLO) as published in ecoinvent v3.8, based on Althaus et al. (2007).
  Reference:
  Althaus H.-J., Chudacoff M., Hischier R., Jungbluth N., Osses M. and Primas A. (2007) Life Cycle Inventories of Chemicals. ecoinvent report No. 8, v2.0. EMPA Dübendorf, Swiss Centre for Life Cycle Inventories, Dübendorf, CH, from www.ecoinvent.org <http://www.ecoinvent.org>.
  Uncertainty: approximation with data from iron mining & lime treatment
- conveyor belt: 2.78e-8 m; lognormal variance with pedigree 0.5787, pedigree (4,3,5,3,5)
  Amount taken from the dataset "calcium borates production" (GLO) as published in ecoinvent v3.8, based on Althaus et al. (2007).
  Reference:
  Althaus H.-J., Chudacoff M., Hischier R., Jungbluth N., Osses M. and Primas A. (2007) Life Cycle Inventories of Chemicals. ecoinvent report No. 8, v2.0. EMPA Dübendorf, Swiss Centre for Life Cycle Inventories, Dübendorf, CH, from www.ecoinvent.org <http://www.ecoinvent.org>.
  EcoSpold01Location=RER
  Uncertainty: approximation with data from iron mining & lime treatment
- diesel, burned in building machine: 0.194946 MJ; = 143000/50000000*(0.43/0.27)*42.8; lognormal variance with pedigree 0.0513, pedigree (4,4,5,3,2)
  EcoSpold01Location=GLO
  Approximation from the pre-feasibility study in Mexico colemanite deposits deposits (Chapter 21.0 Capital and operating coast, Table 22): 143 tonnes of fuel are required for 50K tonnes of colemanite. Conversion in MJ: 42.8 MJ/kg according to Ecoinvent data quality guidelines.
  Reference:
  Allard, G., Salazar Velazquez, R., Verley, C.G., Vidal, M.F., 2013. Preliminary Economic Assessment for the El Cajon Borate Deposit, Magdalena Basin Project, Sonora, Mexico (Pursuant to National Instrument 43-101 of the Canadian Securities Administrators).
  Weidema et al. 2013. Overview and methodology - Data quality guideline for the ecoinvent database version 3.
  Uncertainty: approximation with data from iron mining & lime treatment
- electricity, medium voltage: 0.159259 kWh; = 100/1000*(0.43/0.27); lognormal variance with pedigree 0.0513, pedigree (4,4,5,3,2)
  Approximation from the pre-feasibility study in Mexico colemanite deposits deposits (Chapter 21.0 Capital and operating coast, Table 22): 100 kWh electricity are required for 1 metric ton of colemanite.
  Reference:
  Allard, G., Salazar Velazquez, R., Verley, C.G., Vidal, M.F., 2013. Preliminary Economic Assessment for the El Cajon Borate Deposit, Magdalena Basin Project, Sonora, Mexico (Pursuant to National Instrument 43-101 of the Canadian Securities Administrators).
  EcoSpold01Location=UCTE
  Uncertainty: approximation with data from iron mining & lime treatment
- heat, district or industrial, natural gas: 2.89056 MJ; = 50/1000*36.3*(0.43/0.27); lognormal variance with pedigree 0.0513, pedigree (4,4,5,3,2)
  Approximation from the pre-feasibility study in Mexico colemanite deposits (Chapter 21.0 Capital and operating coast, Table 22): 50m3 natural gas are required for 1 metric ton colemanite. 36.3 MJ/m3 --> Conversion in MJ in data quality guidelines.
  Reference:
  Allard, G., Salazar Velazquez, R., Verley, C.G., Vidal, M.F., 2013. Preliminary Economic Assessment for the El Cajon Borate Deposit, Magdalena Basin Project, Sonora, Mexico (Pursuant to National Instrument 43-101 of the Canadian Securities Administrators).
- mine infrastructure, open cast, non-ferrous metal: 1.01181e-10 unit; = 5E-11 * (boron_in_ground_amount + gangue_amount); lognormal variance with pedigree 0.050625, pedigree (4,4,5,2,1)
  Calculated value based "mine construction, open cast, non-ferrous metal" (GLO) dataset and the amount of mined ores.
- non-sulfidic tailing, off-site: -1.44232 kg; name tailing_amount; = (boron_in_ground_amount + gangue_amount - RefProd - PM_amount )/tailing_DM; lognormal variance with pedigree 0.0526, pedigree (4,4,5,5,1)
  Calculated value, to obtain mass balance.
  production volume; = RefProd_PV * tailing_amount / RefProd
    Calculated from production volume of reference product using the relative outputs.
  property dry mass 0.7 kg; name tailing_DM
  property water in wet mass 0.3 kg; name tailing_wwm
  properties: water content 0.428571, wet mass 1 kg
- recultivation, iron mine: 9.42e-5 m2; lognormal variance with pedigree 0.3987, pedigree (4,3,5,3,5)
  Amount taken from the dataset "calcium borates production" (GLO) as published in ecoinvent v3.8, based on Althaus et al. (2007).
  Reference:
  Althaus H.-J., Chudacoff M., Hischier R., Jungbluth N., Osses M. and Primas A. (2007) Life Cycle Inventories of Chemicals. ecoinvent report No. 8, v2.0. EMPA Dübendorf, Swiss Centre for Life Cycle Inventories, Dübendorf, CH, from www.ecoinvent.org <http://www.ecoinvent.org>.
- wastewater, average: -0.0011599 m3; name WW_amount; = water_well_in_ground_input - (tailing_amount * tailing_wwm)/1000; lognormal variance with pedigree 0.1786, pedigree (4,5,5,5,5)
  Calculated value, to obtain mass balance. This exchange is used as a proxy for wastewater coming from the mining. The actual composition of wastewater is unknown.
  production volume; = RefProd_PV * WW_amount / RefProd
    Calculated from production volume of reference product using the relative outputs.
  property dry mass 0.346837 kg; name WW_DM
  properties: carbon content, non-fossil 0.194039, water content 2882.2, wet mass 1000 kg
  note on carbon content, non-fossil: 0.0673 kg TOC/m3 (Tab A.17, ecoinvent v2.2 report 13_I). TOC was considered as Total Carbon.

## Inputs from nature
- Boron [natural resource, in ground]: 0.169674 kg; name boron_in_ground_amount; = (0.43/0.27)*0.27/(2*10.81+3*16)*10.81*2/0.787; lognormal variance with pedigree 0.0506, pedigree (4,4,5,1,1)
  Calculated value based on boron content in colemanite in ground. At Emet Colemanite Concentration plant (Turkey) a colemanite ore of 27% B2O3 content is treated to produce a concentrate having 43% B2O3. Recovery rate of 78.7% as assumed for sodium borates. B MW = 10.81 g/mol; O MW = 16 g/mol
  Reference: Önal, G., & Burat, F. (2008). Boron mining and processing in Turkey. Gospodarka Surowcami Mineralnymi, 24(3), 49-60.
- Gangue [natural resource, in ground]: 1.85395 kg; name gangue_amount; = (0.43/0.27)/0.787 - boron_in_ground_amount; lognormal variance with pedigree 0.0506, pedigree (4,4,5,1,1)
  Calculated value, based on the B2O3 content in both colemanite ores (27%) and in calcium borate (43%). Recovery rate of B2O3 (78.7%) is assumed as for sodium borate.
  Reference: Önal, G., & Burat, F. (2008). Boron mining and processing in Turkey. Gospodarka Surowcami Mineralnymi, 24(3), 49-60.
- Occupation, mineral extraction site [natural resource, land]: 0.00706 m2*year; lognormal variance with pedigree 0.3087, pedigree (4,3,5,3,5)
  (same comment as for recultivation, iron mine)
- Transformation, from forest, unspecified [natural resource, land]: 9.42e-5 m2; lognormal variance with pedigree 0.3987, pedigree (4,3,5,3,5)
  (same comment as for recultivation, iron mine)
- Transformation, to mineral extraction site [natural resource, land]: 9.42e-5 m2; lognormal variance with pedigree 0.3987, pedigree (4,3,5,3,5)
  (same comment as for recultivation, iron mine)
- Water, well, in ground [natural resource, in water]: 0.00159259 m3; name water_well_in_ground_input; = 50000000/50000000/1000*(0.43/0.27); lognormal variance with pedigree 0.0513, pedigree (4,4,5,3,2)
  Water pumped from well for exploration and drilling programs. Approximation from the pre-feasibility study in Mexico colemanite deposits deposits (Chapter 21.0 Capital and operating coast, Table 22): 50k tonnes of water are required for 50k tonnes of colemanite.
  Reference:
  Allard, G., Salazar Velazquez, R., Verley, C.G., Vidal, M.F., 2013. Preliminary Economic Assessment for the El Cajon Borate Deposit, Magdalena Basin Project, Sonora, Mexico (Pursuant to National Instrument 43-101 of the Canadian Securities Administrators).
  Uncertainty: approximation with data from iron mining & lime treatment
  property dry mass 0.1101 kg; name Water_well_DM

## Emissions to nature
- Particulate Matter, > 10 um [air, urban air close to ground]: 0.014 kg; name PM_amount; = 14/1000; lognormal variance with pedigree 0.138, pedigree (4,5,5,5,4)
  Literature. Particulates are generated from the dryers, and have an average diameter of 44um. This value is approximated with the emissions of particulate from the mining of sodium borates.
  References:
  Energy and Environmental Profile of the U.S. Mining Industry, 2013. Chapter 3: Potash, Soda Ash, and Borates. Table 3-6, Available at: https://www.energy.gov/sites/prod/files/2013/11/f4/potash_soda_borate.pdf
  U.S.E.P.A. 1980. Source category survey: Borax and Boric acid industry. 58 pp.
  Uncertainty: approximation with data from iron mining & lime treatment

## Sampling procedure
Due to lack of specific information on the extraction of boron from colemanite in Turkey, some values were approximated and others copied from the previous dataset "calcium borates production" (GLO) as published in ecoinvent v.3.8, based on Althaus et al. (2007). See Extrapolations and exchange comments for more details.

Reference:
Althaus H.-J., Chudacoff M., Hischier R., Jungbluth N., Osses M. and Primas A. (2007) Life Cycle Inventories of Chemicals. ecoinvent report No. 8, v2.0. EMPA Dübendorf, Swiss Centre for Life Cycle Inventories, Dübendorf, CH, from www.ecoinvent.org <http://www.ecoinvent.org>.

## Extrapolations
The inputs of energy, diesel and process water were approximated from the pre-feasibility study in Mexican colemanite deposits (Allard et al., 2013). The amount of airborne emissions was retrieved from the Energy and Environmental Profile of the U.S. Mining Industry (2013). The amount of gangue in ground, the tailings and wastewater were calculated to obtain mass balance, For further details, see comments to the related exchanges.

References:

Allard, G., Salazar Velazquez, R., Verley, C.G., Vidal, M.F., 2013. Preliminary Economic Assessment for the El Cajon Borate Deposit, Magdalena Basin Project, Sonora, Mexico (Pursuant to National Instrument 43-101 of the Canadian Securities Administrators)
Energy and Environmental Profile of the U.S. Mining Industry, 2013. Chapter 3: Potash, Soda Ash, and Borates. Table 3-6, Available at: https://www.energy.gov/sites/prod/files/2013/11/f4/potash_soda_borate.pdf
