# waste collection lorry production, 21 metric ton

Dataset: EcoSpold 2, unit process
Geography: CH
Time period: 1991-01-01 to 2023-12-31
Technology level: current
Classification: ISIC rev.4 ecoinvent: 2910:Manufacture of motor vehicles
Classification: EcoSpold01Categories: waste management/others
Scenario: Business-as-Usual
System model: Allocation, cut-off by classification
Generated by: Gabor Doka (obsolete)
Published in: Doka G. 2007
Database: ecoinvent
isCopyrightProtected: true
accessRestrictedTo: 1

## General comment
based on a vehicle lifetime of 540'000 vehicle-kilometers. Gross load capactity 8.2 tons. Load factor 50%. Average load 4.1 tons. lifetime transport service 2.214 million ton-kilometers.

## Included activities end
vehicle and road infrastructure for waste collection vehicle. Production and maintenance.

## Technology
Waste collection and hydraulic compression vehicle. Gross load capactity 8.2 tons. Load factor 50%. Average load 4.1 tons. Extrapolated from data for lorry 16t class (ecoinvent 2000 report No. 14). Assuming 30% higher vehicle mass.

## Reference product
- waste collection lorry, 21 metric ton: 1 unit; By-product classification allocatable product; CPC 49119: Special-purpose motor vehicles n.e.c.; HS2017 870590: Vehicles; break-down lorries, road-sweepers, spraying lorries, mobile workshops, mobile radiological units,[...]
  EcoSpold01Location=CH
  production volume 0.0336675 unit
    This is a placeholder value that does not reflect real-world production volumes. This dataset does not currently require a real-world production volume to work in the database framework, and no actual data were collected yet. This has no negative effect on the results of the ecoinvent database. The placeholder value of this activity was scaled according to the nominal GDP of 2005 (source: United Nations, http://data.un.org/Glossary.aspx?q=GDP+%28current+US%24%29, accessed 20130726) to reflect an appropriate share of the global production volume, which is also a placeholder value.
  property price 33854 EUR2005
    Calculated based on inputs: The price of the product has been calculated as a sum of the values of the material and energy inputs for this product. This value is therefore a rough estimation. It may underestimate the real price since there are additional expenses when producing any product. These expences can include for example labour costs, treatment of waste materials and profit for the producer. Please consider carefully whether this level of data quality is acceptable for your application.
  properties: carbon allocation 0 kg, carbon content 0

## Inputs from technosphere
- lorry, 16 metric ton: 1.3 unit; lognormal variance with pedigree 0.04, pedigree (1,1,5,1,1)
  unqualified estimate of mass increase compared to a 16t lorry.
  EcoSpold01Location=RER
- maintenance, lorry 16 metric ton: 1 unit; lognormal variance with pedigree 0.16, pedigree (1,1,5,1,1)
  approximated with maintenance for 16t lorry.
  EcoSpold01Location=CH

## Extrapolations
see Technology/Text

## Review by Niels Jungbluth 2003-07-09
Passed.

## Review by Bo Weidema 2012-06-28
waste treatment of lorry deleted to avoid double-counting
