# treatment of waste plastic, consumer electronics, dismantling, sorting and cleaning, formal sector

Dataset: EcoSpold 2, unit process
Geography: IN
Time period: 2017-01-01 to 2023-12-31
Technology level: current
Classification: ISIC rev.4 ecoinvent: 3830:Materials recovery
Scenario: Business-as-Usual
System model: Allocation, cut-off by classification
Share of production covered: 1 %
Generated by: Prasad Gangane
Published in: Gangane, P. 2017
Database: ecoinvent
isCopyrightProtected: true
accessRestrictedTo: 1

## General comment
The formal plastic recycling sector in India contributes to a comparitively smaller percentage of the overall plastic recycling of the country in comparison with the informal sector. The formal plastic recycling sector depends on its supply chain for raw material. The formal sector has its systems in place to segregate, dismantle, sort and clean the waste plastics received. The formal sector ensures safe segregation and dismantling techniques in its functioning. Visited formal recyclers were from different parts of the country based out of Pune, Bangalore, Hyderabad. Electricity is obtained from the grid. Data collection questionnaire was circulated amongst the recyclers and on-site visits were carried out. Information provided was verified and actual readings were taken related to electrical energy consumption the formal sector. The dataset is representation of treatment of plastic wastes.

## Included activities start
This dataset include activities that occur once the material is received by the formal sector for further processing.

## Included activities end
This dataset includes activities until the received waste plastics is segregated, dismantled and sorted.

## Geography
The geography included for the formal sector includes the leading formal plastic recyclers spread across the country.

## Technology
The technology that is used in the formal sector is standard and is uniformly adopted by all the formal recyclers. The equipment is maintained and is not of very old technology.

## Time period
The recycling sector has been following this method for several years. There is no anticipated change in the next few years in their method of working. However, with the new e-waste rules in the country, bringing in more focus on sustainable recycling, certain changes are expected to occur over a period of time.

## Reference product
- waste plastic, consumer electronics, sorted: 1 kg; name Sorted_amount; By-product classification Recyclable; CPC 39270: Waste, parings and scrap of plastics; HS2017 391590: Plastics n.e.c. in heading no. 3915; waste, parings and scrap
  This exchange represents the cleaned and sorted material used by formal and informal plastic recycling sectors in India. These recyclers are engaged into recycling of different plastic types from e-waste/WEEE, mainly Polycarbonate (PC), High Impact Polystyrene (HIPS), Acrylonitrile Butadiene Styrene (ABS), Poly Propylene (PP) etc.
  production volume 1.44849e6 kg; name RP_PV; = abs((1.5E+06)*Sorted_amount/unsorted_amount)
    Calculated from the annual plastic waste generation in India (1.5E+06 kgs treaded by the formal recycling sector) https://www.epa.gov/sites/production/files/2014-05/documents/india.pdf
  property price 0.5 EUR2005
    Temporary https://www.ecoprog.com/fileadmin/user_upload/leseproben/ext_market_report_plastic_recycling_Europe_ecoprog.pdf
  properties: cadmium content 1.05e-7, carbon allocation 0.83022 kg, carbon content 0.83022, carbon content, fossil 0.83022, carbon content, non-fossil 0, chromium content 9.1e-7, copper content 6.2e-7, dry mass 1 kg, heating value, net 34.78 MJ, lead content 5.66e-7, nickel content 1.225e-6, total polycyclic aromatic hydrocarbon content 0.0010858, water content 0, water in wet mass 0 kg, wet mass 1 kg, zinc content 6.517e-5

## Inputs from technosphere
- electricity, low voltage: 0.0120816 kWh; lognormal variance with pedigree 0.017225, pedigree (2,5,3,2,2)
  Electricity consumed for washer and other auxiliary applications
- sodium chloride, powder: 3.45187e-5 kg; lognormal variance with pedigree 0.051225, pedigree (2,5,3,2,2)
  Common salt used for density separation
  properties: dry mass 1 kg, wet mass 1 kg
- sodium hydroxide, without water, in 50% solution state: 8.80227e-5 kg; lognormal variance with pedigree 0.051225, pedigree (2,5,3,2,2)
  Caustic soda used for cleaning of plastic
  properties: dry mass 1 kg, heating value, net 3.03 MJ, wet mass 1 kg
- waste plastic, consumer electronics: -0.0355612 kg; name Reject_amount; = abs(Unsorted_amount-Sorted_amount); lognormal variance with pedigree 0.049225, pedigree (2,5,1,2,2)
  Plastic reject which is discarded and used for secondary application
  production volume; = abs(RP_PV*Reject_amount/sorted_amount)
    Calculated from production volume of reference product using the relative outputs.
  property concentration, cadmium 1.05e-7 kg/kg; name Reject_amount_concentration_Cd
  property concentration, copper 6.2e-7 kg/kg; name Reject_amount_concentration_Cu
  property concentration, lead 6.2e-7 kg/kg; name Reject_amount_concentration_Pb
  property concentration, nickel 1.225e-6 kg/kg; name Reject_amount_Ni_concentration
  property concentration, zinc 6.517e-5 kg/kg; name Reject_amount_concentration_Zn
  properties: carbon content, fossil 0.830215, concentration, chromium 9.1e-7 kg/kg, dry mass 0.847 kg, heating value, net 34.78 MJ, total polycyclic aromatic hydrocarbon content 0.0010858, water content 0.180638, wet mass 1 kg
  note on heating value, net: Assumed equal to "waste plastic, consumer electronics, sorted".
- waste plastic, consumer electronics, unsorted: 1.03556 kg; name Unsorted_amount
  This exchange represents the material input of the formal and informal plastic recycling sectors in India. These recyclers are engaged into recycling of different plastic types from e-waste/WEEE, mainly Polycarbonate (PC), High Impact Polystyrene (HIPS), Acrylonitrile Butadiene Styrene (ABS), Poly Propylene (PP) etc.
  properties: cadmium content 1.05e-7, carbon content, fossil 0.83022, chromium content 9.1e-7, copper content 6.2e-7, dry mass 1 kg, heating value, net 34.78 MJ, lead content 5.66e-7, nickel content 1.225e-6, total polycyclic aromatic hydrocarbon content 0.0010858, wet mass 1 kg, zinc content 6.517e-5

## Inputs from nature
- Water, well, in ground [natural resource, in water]: 5.08366e-5 m3; lognormal variance with pedigree 0.051225, pedigree (2,5,3,2,2)
  raw water from the borewell used for treatment
  property COD, mass per volume 0.2371 kg/m3; name COD_inlet
  property mass concentration, dissolved ammonia NH4 as N 0.00305 kg/m3; name N_inlet
  property suspended soilds, mass per volume 3.776 kg/m3; name Solid_inlet

## Emissions to nature
- BOD5, Biological Oxygen Demand [water, unspecified]: 1.83454e-5 kg; = COD*0.3; lognormal variance with pedigree 0.051225, pedigree (2,5,3,2,2)
  Addition of BOD to common ETP. BOD is not measured thus BOD is assumed to be 0.3 times of COD
- COD, Chemical Oxygen Demand [water, surface water]: 6.11514e-5 kg; name COD; = ( COD_outlet- COD_inlet)* Water_outlet; lognormal variance with pedigree 0.051225, pedigree (2,5,3,2,2)
  Addition of COD to Common ETP
- Chloride [water, unspecified]: 2.13115e-5 kg; lognormal variance with pedigree 0.045225, pedigree (2,4,3,2,2)
  Amount derived from Stochiometric Balance with input of NaCl
- DOC, Dissolved Organic Carbon [water, unspecified]: 2.03838e-5 kg; = COD/3; lognormal variance with pedigree 0.051225, pedigree (2,5,3,2,2)
  Addition of DOC to Common ETP
- Dissolved solids [water, surface water]: 1.76912e-5 kg; = abs(( Solid_outlet- Solid_inlet)* Water_outlet); lognormal variance with pedigree 0.051225, pedigree (2,5,3,2,2)
  Addition of solids to common ETP
- Nitrogen [water, surface water]: 1.84029e-7 kg; = (N_outlet- N_inlet)* Water_outlet; lognormal variance with pedigree 0.051225, pedigree (2,5,3,2,2)
  Addition of Nitrogen to common ETP
- Sodium I [water, unspecified]: 6.44205e-5 kg; lognormal variance with pedigree 0.045225, pedigree (2,4,3,2,2)
  Amount derived from Stochiometric balance with an input of NaCl and NaOH
- TOC, Total Organic Carbon [water, unspecified]: 2.03838e-5 kg; = COD/3; lognormal variance with pedigree 0.051225, pedigree (2,5,3,2,2)
  Addition of TOC to common etp
- Water [water, surface water]: 5.08366e-5 m3; name Water_outlet; lognormal variance with pedigree 0.051225, pedigree (2,5,3,2,2)
  outlet water discharged to common effluent treatment plant
  property COD, mass per volume 1.44 kg/m3; name COD_outlet
  property mass concentration, dissolved ammonia NH4 as N 0.00667 kg/m3; name N_outlet
  property suspended soilds, mass per volume 4.124 kg/m3; name Solid_outlet

## Sampling procedure
An initial data collection questionnaire was circulated amongst the recyclers. On-site visits were carried out and data was collected from leading recyclers in the formal recycling sector. Information provided was verified and readings were taken for information that is unavailable with the formal sector. The recyclers were engaged into recycling of plastics mainly Polycarbonate (PC), High Impact Polystyrene (HIPS), Acrylonitrile Butadiene Styrene (ABS), Poly Propylene (PP) etc.Data collected from different recyclers was compiled in the excel sheets and analysed. All the data was aggregated to per 1000 kgs of treatment of waste plastics.

## Extrapolations
The geography included for the formal sector is a wide representation of formal recyclers spread across the country.
