# potassium sulfate production

Dataset: EcoSpold 2, unit process
Geography: RER
Time period: 1999-01-01 to 2023-12-31
Technology level: current
Classification: ISIC rev.4 ecoinvent: 2012:Manufacture of fertilizers and nitrogen compounds
Synonyms: Potassium sulphate; 7778-80-5; Sulfuric acid dipotassium salt; potassium sulfate; Sulfuric acid potassium salt; Dipotassium sulfate
Scenario: Business-as-Usual
System model: Allocation, cut-off by classification
Generated by: Angelika Heil
Published in: Nemecek, T. 2007
Database: ecoinvent
isCopyrightProtected: true
accessRestrictedTo: 1

## General comment
This dataset represents the production of 1 kg of potassium sulfate from potassium chloride and sulfuric acid. Potassium sulfate forms colorless, nonhygroscopic crystals. It is, after potassium chloride, the most important potassium-containing fertilizer, being used mainly for special crops. It constitutes about 5% of the world demand for potash fertilizers. Potassium sulfate is also used in industry for the production of other potassium compounds, accelerators for rapid-setting cements, synthetic rubbers, desensitizers for explosives, lubricants, powdered fire extinguishers, dyes, explosives, and pharmaceuticals.
This dataset is based on detailed literature studies and specifications from the manufacturer.
References:
Schultz, H., Bauer, G., Schachl, E., Hagedorn, F. and Schmittinger, P. 2000. Potassium Compounds. Ullmann's Encyclopedia of Industrial Chemistry.
Nemecek T., Kägi T. and Blaser S. (2007) Life Cycle Inventories of Agricultural Production Systems. Final report ecoinvent v2.0 No.15. Swiss Centre for Life Cycle Inventories, Dübendorf, CH.

## Included activities start
The activity starts when the raw materials enter the process.

## Included activities end
This activity ends with the production of potassium sulfate from potassium chloride and sulfuric acid. Production and waste treatment of catalysts, coating and packaging of the final fertiliser products were not included. Infrastructure was included by means of a proxy module.

## Geography
According to the reference used for this inventory, the European average is derived from mean values of several fertiliser plants within Europe. The production of raw materials and/or intermediates outside Europe was taken into account by considering the production technology in the respective country and the relative import shares.

## Technology
The production inventory was derived from detailed literature studies and specifications from the manufacturer, relevant for the European production.

## Time period
Year when the main reference used for this inventory was published.

## Reference product
- potassium sulfate: 1 kg; name RP; By-product classification allocatable product; CPC 34632: Potassium sulphate (sulphate of potash); HS2017 310430: Fertilizers, mineral or chemical; potassic, potassium sulphate; CAS 7778-80-5
  Potassium sulfate forms colorless, nonhygroscopic crystals. It is, after potassium chloride, the most important potassium-containing fertilizer, being used mainly for special crops. It constitutes about 5% of the world demand for potash fertilizers. Potassium sulfate is also used in industry for the production of other potassium compounds, accelerators for rapid-setting cements, synthetic rubbers, desensitizers for explosives, lubricants, powdered fire extinguishers, dyes, explosives, and pharmaceuticals.
  production volume 8.9088e8 kg; name RP_PV
    Estimated value. The European production volume is extrapolated from the US production volume based on reports from Cefic (European Chemical Industry Council), and the American Chemistry Council.
    According to Cefic (2016) the Global sales of chemicals in the year 2015 was 3 534 billion euros. The reported share of sales per regions are: EU28 14.7%; Other Europe (Switzerland, Norway, Turkey, Russia and Ukraine) 2.7%; NAFTA (US, Canada and Mexico) 16.5%; Latin America 3.8%; China 39.9%; Japan 3.9%; Republic of Korea 3.2%; India 2.2%; Rest of Asia 11.9%; Rest of the World 1.3%. Cefic also reports the US total sales, 518.7 billion euros of the global 3 534 billion euros (14.7%). The same share is reported from the American Chemistry Council (2016), according to this source the USA sales account for 15% of global sales for the year 2016.
    According to the OECD the worldwide production of potassium sulfate for 2006 was about 5.12 million tonnes. Since no data were found for the European production this value was scaled accordingly.
    Reference(s):
    Cefic 2016. Facts and figures 2016 of the European chemical industry. Accessible at: http://www.cefic.org/Facts-and-Figures/Chemicals-Industry-Profile/
    American Chemistry Council 2016. Outlook: U.S. Chemical Industry Continues to Outpace Industrial Output; Accounts for More Than One-Half of Construction Spending by Manufacturing Sector. Accessible at: https://www.americanchemistry.com/Media/PressReleasesTranscripts/ACC-news-releases/US-Chemical-Industry-Continues-to-Outpace-Industrial-Output.html
    OECD. 2007. Screening Information Dataset, Initial Assessment Profile for SIAM 25. Retrieved from: http://webnet.oecd.org/hpv/ui/handler.axd?id=c5333e82-7c08-4417-b46f-41c52ee7851f, 15 June 2017.
  property carbon content, fossil 0
    Carbon content, fossil is calculated based on the chemical formula of the substance.
  property oxygen content 0.367255
    Oxygen content (on a dry matter basis) of potassium sulfate is calculated from the molecular formula of the substance (K2O4S).
  property potassium content 0.448737
    Potassium content (on a dry matter basis) of potassium sulfate is calculated from the molecular formula of the substance (K2O4S).
  property price 0.188 EUR2005
    Temporary price data. Calculated as 90% of purchasers price based on: 2004 import price calulated from FAOSTAT (http://faostat.fao.org/site/575/DesktopDefault.aspx?PageID=575#ancor [accessed 2011.01.27] Potash Fertilizers (K20 total nutrients) in kUSD/Mg
  property sulfur content 0.184008
    Sulfur content (on a dry matter basis) of potassium sulfate is calculated from the molecular formula of the substance (K2O4S).
  properties: carbon allocation 0 kg, carbon content 0, carbon content, non-fossil 0, dry mass 1 kg, water content 0, water in wet mass 0 kg, wet mass 1 kg

## Inputs from technosphere
- chemical factory, organics: 8e-10 unit; lognormal variance with pedigree 0.349225, pedigree (2,3,5,2,3)
  Calculated based on literature data published by the industry. For this activity, no information was readily available concerning infrastructure and land-use. Therefore, the infrastructure is estimated based on data from two chemical factories, the BASF site of Ludwigshafen and the chemical factory in Gendorf (which are both located in Germany), which produce a wide range of chemical substances. Based on this data, the following assumptions are made: the built area amounts to about 4.2 ha, the plant has an average output of 50'000 t/a and a lifespan of fifty years. The estimated infrastructure amount is therefore 4.00 E-10 units per kg of produced chemical. Additional assumptions were made in the case of this dataset.
  References:
  Althaus H.-J., Chudacoff M., Hischier R., Jungbluth N., Osses M. and Primas A. (2007) Life Cycle Inventories of Chemicals. ecoinvent report No. 8, v2.0. EMPA Dübendorf, Swiss Centre for Life Cycle Inventories, Dübendorf, CH.
  Gendorf (2000) Umwelterklärung 2000, Werk Gendorf. Werk Gendorf, Burgkirchen.
- electricity, medium voltage: 0.0659472 kWh; lognormal variance with pedigree 0.040625, pedigree (2,1,5,2,1)
  The reference product of this dataset has been changed from 'potassium sulfate, as K2O' (K2O - molar mass 94.2 g/mol) into 'potassium sulfate' (K2SO4 - molar mass 174.259 g/mol) and therefore the whole dataset has been scaled. Therefore, this exchange amount has been scaled (multiplied) from 0.122 kWh by 0.5406 (1/(174.259/94.2)).
  Original comment of the exchange: Nemecek T., Kägi T. and Blaser S. (2007) Life Cycle Inventories of Agricultural Production Systems. Final report ecoinvent v2.0 No.15. Swiss Centre for Life Cycle Inventories, Dübendorf, CH.
- heat, district or industrial, other than natural gas: 3.11357 MJ; lognormal variance with pedigree 0.040625, pedigree (2,1,5,2,1)
  The reference product of this dataset has been changed from 'potassium sulfate, as K2O' (K2O - molar mass 94.2 g/mol) into 'potassium sulfate' (K2SO4 - molar mass 174.259 g/mol) and therefore the whole dataset has been scaled. Therefore, this exchange amount has been scaled (multiplied) from 5.76 MJ by 0.5406 (1/(174.259/94.2)).
  Original comment of the exchange: Nemecek T., Kägi T. and Blaser S. (2007) Life Cycle Inventories of Agricultural Production Systems. Final report ecoinvent v2.0 No.15. Swiss Centre for Life Cycle Inventories, Dübendorf, CH.
  properties: heating value, net 1 MJ
- potassium chloride: 0.881306 kg; lognormal variance with pedigree 0.040625, pedigree (2,1,5,2,1)
  In a first step, the amount of 'potassium chloride' has been updated from ' potassium chloride, as K2O' (K2O molar mass 94.2 g/mol) into 'potassium chloride' (KCl molar mass 74.551 g/mol) and therefore its amount has been scaled (multiplied) from 1.03 kg by 1.583 (1/(74.551/94.2).
  Secondly, the reference product of this dataset has been changed from 'potassium sulfate, as K2O' (K2O - molar mass 94.2 g/mol) into 'potassium sulfate' (K2SO4 - molar mass 174.259 g/mol) and therefore the whole dataset has been scaled. Therefore, this exchange amount has been scaled (multiplied) from 1.13 kg by 0.5406 (1/(174.259/94.2)).
  Original comment of the exchange is: Source: Nemecek T., Kägi T. and Blaser S. (2007) Life Cycle Inventories of Agricultural Production Systems. Final report ecoinvent v2.0 No.15. Swiss Centre for Life Cycle Inventories, Dübendorf, CH. refering to Davis J, Haglund C (1999). Life Cycle Inventory (LCI) of Fertiliser Production - Fertiliser Products Used in Sweden and Western Europe.
  properties: chlorine content 0.475552, dry mass 1 kg, potassium content 0.524448, wet mass 1 kg
  note on chlorine content: Chlorine content (on a dry matter basis) of potassium chloride is calculated from the molecular formula of the substance (KCl).
  note on potassium content: Potassium content (on a dry matter basis) of potassium chloride is calculated from the molecular formula of the substance (KCl).
- sulfuric acid: 0.610823 kg; lognormal variance with pedigree 0.040625, pedigree (2,1,5,2,1)
  The reference product of this dataset has been changed from 'potassium sulfate, as K2O' (K2O - molar mass 94.2 g/mol) into 'potassium sulfate' (K2SO4 - molar mass 174.259 g/mol) and therefore the whole dataset has been scaled. Therefore, this exchange amount has been scaled (multiplied) from 1.13 kg by 0.5406 (1/(174.259/94.2)).
  Original comment of the exchange: Nemecek T., Kägi T. and Blaser S. (2007) Life Cycle Inventories of Agricultural Production Systems. Final report ecoinvent v2.0 No.15. Swiss Centre for Life Cycle Inventories, Dübendorf, CH.
  properties: dry mass 1 kg, wet mass 1 kg

## Emissions to nature
- Particulate Matter, < 2.5 um [air, urban air close to ground]: 6.43256e-9 kg; lognormal variance with pedigree 0.3693, pedigree (2,3,5,3,3)
  The reference product of this dataset has been changed from 'potassium sulfate, as K2O' (K2O - molar mass 94.2 g/mol) into 'potassium sulfate' (K2SO4 - molar mass 174.259 g/mol) and therefore the whole dataset has been scaled. Therefore, this exchange amount has been scaled (multiplied) from 1.19E-08 kg by 0.5406 (1/(174.259/94.2)).
  Original comment of the exchange: Nemecek T., Kägi T. and Blaser S. (2007) Life Cycle Inventories of Agricultural Production Systems. Final report ecoinvent v2.0 No.15. Swiss Centre for Life Cycle Inventories, Dübendorf, CH.
- Particulate Matter, > 10 um [air, urban air close to ground]: 2.03247e-8 kg; lognormal variance with pedigree 0.1093, pedigree (2,3,5,3,3)
  The reference product of this dataset has been changed from 'potassium sulfate, as K2O' (K2O - molar mass 94.2 g/mol) into 'potassium sulfate' (K2SO4 - molar mass 174.259 g/mol) and therefore the whole dataset has been scaled. Therefore, this exchange amount has been scaled (multiplied) from 3.76E-08 kg by 0.5406 (1/(174.259/94.2)).
  Original comment of the exchange: Nemecek T., Kägi T. and Blaser S. (2007) Life Cycle Inventories of Agricultural Production Systems. Final report ecoinvent v2.0 No.15. Swiss Centre for Life Cycle Inventories, Dübendorf, CH.
- Particulate Matter, > 2.5 um and < 10um [air, urban air close to ground]: 8.91909e-9 kg; lognormal variance with pedigree 0.1793, pedigree (2,3,5,3,3)
  The reference product of this dataset has been changed from 'potassium sulfate, as K2O' (K2O - molar mass 94.2 g/mol) into 'potassium sulfate' (K2SO4 - molar mass 174.259 g/mol) and therefore the whole dataset has been scaled. Therefore, this exchange amount has been scaled (multiplied) from 1.65E-08 kg by 0.5406 (1/(174.259/94.2)).
  Original comment of the exchange: Nemecek T., Kägi T. and Blaser S. (2007) Life Cycle Inventories of Agricultural Production Systems. Final report ecoinvent v2.0 No.15. Swiss Centre for Life Cycle Inventories, Dübendorf, CH.

## Sampling procedure
The values given in the reference originate from manufacturers and/or other data sources which in turn refer to the real situation and hence are considered reliable.
