# sawlog and veneer log, meranti, debarked, measured as solid wood, import from MY

Dataset: EcoSpold 2, unit process
Geography: RER
Time period: 2000-01-01 to 2023-12-31
Technology level: current
Classification: ISIC rev.4 ecoinvent: 0220:Logging
Synonyms: Seraya; Lauan; Shorea ssp.
Tags: ConvertedDataset
Scenario: Business-as-Usual
System model: Allocation, cut-off by classification
Generated by: Frank Werner (obsolete)
Published in: Althaus H.J. 2007
Database: ecoinvent
isCopyrightProtected: true
accessRestrictedTo: 1

## General comment
This dataset represents the import of debarked meranti logs to European port. The imported wood is produced by (close to) sustainable forest management in Malasya. A transport distance of 200 km by a lorry (32 t) is assumed for the transportation of the logs to a main naval port in Malaysia. A transport distance of 15,000 km by a maritime freight ship is assumed for the overseas transportation of the log to a main naval port in Europe, e.g. Rotterdam, Antwerpen, Bremerhafen or Hamburg.

## Included activities start
The activity starts with the product delivered at the forest road.

## Included activities end
This activity ends with imported meranti roundwood at European harbour.

## Reference product
- sawlog and veneer log, meranti, debarked, measured as solid wood: 1 m3; By-product classification allocatable product; CPC 3110: Wood, sawn or chipped lengthwise, sliced or peeled, of a thickness exceeding 6 mm; railway or tramway sleepers […]; HS2017 440341: Wood, tropical; as specified in Subheading Note 2 to this Chapter, dark red meranti, light red meranti and [...]
  Reference product. The reference product being imported is meranti legs that are harvested from (close to) sustainable forest management in Malaysia. Data based on given reference.
  production volume 1 m3
    This is a placeholder value. The PV is unknown.
  property carbon content, non-fossil 0.494
    C content of dry mass is 0.494 kgC/kg dry wood (ecoinvent v2.2 report 21).
  property heating value, net 7950.27 MJ
    LHV is calculated based on the Carbon content of the product. More details can be found on the respective documentation.The property is based on a value of 7.79MJ/kg
  property price 174.94 EUR2005
    Reference: FAOSTAT (accessed 20140112). The price is calculated by using data on total world import quantity (m3) and import value (1000 USD), year 2005. 15174881 m3 of Ind Rwd Wir (NC) Tropica was imported in the world in 2005. The import value was 3209966000 USD. The calculated price is thus (3209966000/15174881*0.8)=174.936586454945 Euro.
  properties: carbon allocation 296.4 kg, carbon content 0.494, carbon content, fossil 0, dry mass 600 kg, water content 0.7, water in wet mass 420 kg, wet mass 1020 kg

## Inputs from technosphere
- sawlog and veneer log, meranti, debarked, measured as solid wood: 1 m3; lognormal variance with pedigree 0.0541, pedigree (3,4,5,3,1)
  Reference product. Meranti logs at a large maritime harbour in Europe. The meranti wood is produced by (close to) sustainable forest management. It is shipped to Europe to be used in wooden products.
  properties: carbon content, non-fossil 0.494, dry mass 600 kg, heating value, net 7950.27 MJ, water content 0.7, wet mass 1020 kg
- transport, freight, lorry, unspecified: 226 metric ton*km; source Althaus H.J. 2007; lognormal variance with pedigree 0.2081, pedigree (5,5,5,3,1)
  literature value, ecoinvent report no. 21, Figure 5.8
- transport, freight, sea, bulk carrier for dry goods: 15300 metric ton*km; source Althaus H.J. 2007; lognormal variance with pedigree 0.2081, pedigree (5,5,5,3,1)
  literature value, ecoinvent report no. 21, Figure 5.8

## Sampling procedure
literature

## Extrapolations
see Technology
