# treatment of waste paper to pulp, wet lap, totally chlorine free bleached

Dataset: EcoSpold 2, unit process
Geography: RoW
Time period: 2007-01-01 to 2023-12-31
Technology level: current
Classification: ISIC rev.4 ecoinvent: 1701:Manufacture of pulp, paper and paperboard
Classification: EcoSpold01Categories: paper & cardboard/graphic paper
Tags: single enterprise data
Scenario: Business-as-Usual
System model: Allocation, cut-off by classification
Share of production covered: 0.2 %
Generated by: Hugues Imbeault-Tétreault
Database: ecoinvent
isCopyrightProtected: true
accessRestrictedTo: 1

## General comment
This dataset describes the production of deinked wet lap (40% water on wet mass) totally chlorine free (TCF) pulp.

## Included activities start
From the reception of waste paper at the pulp mill, including paper handling. Other inputs include chemicals for deinking and sludge treatment, electricity, heat from natural gas, pulp factory infrastructure and water for dilution of chemicals.

## Included activities end
To the loading on lorry. The dataset includes waste paper handling, pulp making, water clarification and on-site effluent treatment. Outputs include effluent emissions to water, deinking emissions to air, wet lap deinked pulp, deinking sludge and municipal waste. Exclusions: liquefied petroleum gas burned in forklift motor.
Due to confidentiality, deinking air emissions and many effluent water emissions were aggregated into the following groups: chlorinated solvent, aromatic hydrocarbons, unspecified hydrocarbons, non-methane volatile organic compounds (air emissions) and volatile organic compounds (water emissions). Those emissions did not constitute major impact contributors to any damage category (less than 0.2% of the total of each category) using the IMPACT 2002+ LCIA method.

## Geography
Data from a deinked pulp factory located in the province of Québec, Canada.

## Parameters
- amine passivator solution 60%: 0.0021 kg; name Amine_60p; lognormal variance with pedigree 0.0106, pedigree (1,5,1,5,1)
  Water included. Data per air dry ton pulp produced (10% water content; water mass / total mass) from a deinked pulp factory located in the province of Québec, Canada.
- ammonium nitrate solution 34.7%: 0.0181 kg; name NH4_NO3_34_7p; lognormal variance with pedigree 0.0106, pedigree (1,5,1,5,1)
  (same comment as for amine passivator solution 60%)
- anionic polyacrylamide: 1.65 kg; name APAM; lognormal variance with pedigree 0.0106, pedigree (1,5,1,5,1)
  Pure. Data per air dry ton pulp produced (10% water content; water mass / total mass) from a deinked pulp factory located in the province of Québec, Canada.
- calcium nitrate solution 65%: 0.101 kg; name Ca_NO3_2_65p; lognormal variance with pedigree 0.0106, pedigree (1,5,1,5,1)
  (same comment as for amine passivator solution 60%)
- cationic polyacrylamide: 0.197 kg; name CPAM; lognormal variance with pedigree 0.0106, pedigree (1,5,1,5,1)
  (same comment as for anionic polyacrylamide)
- computer printout: 377 kg; name CP; = 3.77E-01 * 1000; lognormal variance with pedigree 0.0106, pedigree (1,5,1,5,1)
  10% water content (water mass / total mass). Data reported in source for 1 ton of wet lap deinked pulp scaled to 10% water on a wet mass basis. Data from a deinked pulp factory located in the province of Québec, Canada.
- fraction of market pulp amount the global virgin pulp fiber production in 2000: 0.27 dimensionless; name FracMarketPulp; lognormal variance with pedigree 0.0006, pedigree (1,1,1,1,1)
  Source: Sixta et al. (2006) Handbook of pulp. Wiley-VCH. Weinheim.
- global recovered fiber pulp production: 1.47e11 kg; name GloRecovFibPulpProdVol; lognormal variance with pedigree 0.0006, pedigree (1,1,1,1,1)
  In 2000. Includes market pulp and pulp used in integrated mills. Assumed to be 10 % water content on a wet mass basis. Source: Sixta et al. (2006) Handbook of pulp. Wiley-VCH. Weinheim.
- heavy printed bleached kraft waste paper: 54.2 kg; name HPBK; = 5.42E-02 * 1000; lognormal variance with pedigree 0.0106, pedigree (1,5,1,5,1)
  10% water content (water mass / total mass). Data per air dry ton pulp produced (10% water content; water mass / total mass) from a deinked pulp factory located in the province of Québec, Canada.
- hydrogen peroxide solution 50%: 20.4 kg; name H2O2_50p; lognormal variance with pedigree 0.0106, pedigree (1,5,1,5,1)
  (same comment as for amine passivator solution 60%)
- light printed or misprinted bleached kraft waste paper: 205 kg; name LPMBK; = 2.05E-01 * 1000; lognormal variance with pedigree 0.0106, pedigree (1,5,1,5,1)
  (same comment as for heavy printed bleached kraft waste paper)
- manifold white ledger waste paper: 18.9 kg; name MWL; = 1.89E-02 * 1000; lognormal variance with pedigree 0.0106, pedigree (1,5,1,5,1)
  (same comment as for heavy printed bleached kraft waste paper)
- phophoric acid solution 75%: 0.471 kg; name H3PO4_75p; lognormal variance with pedigree 0.0106, pedigree (1,5,1,5,1)
  (same comment as for amine passivator solution 60%)
- polyaluminium chloride solution 57%: 0.0928 kg; name PAC_57p; lognormal variance with pedigree 0.0106, pedigree (1,5,1,5,1)
  (same comment as for amine passivator solution 60%)
- polyamine solution 50%: 0.578 kg; name PAM_50p; lognormal variance with pedigree 0.0106, pedigree (1,5,1,5,1)
  (same comment as for amine passivator solution 60%)
- scaling factor: 0.000717412 dimensionless; name scaling_factor
- sodium dithionite solution 30%: 19.8 kg; name Na2S2O4_30p; lognormal variance with pedigree 0.0106, pedigree (1,5,1,5,1)
  (same comment as for amine passivator solution 60%)
- sodium hydroxide solution 50%: 9.8 kg; name NaOH_50p; lognormal variance with pedigree 0.0106, pedigree (1,5,1,5,1)
  (same comment as for amine passivator solution 60%)
- sodium hypochlorite solution 12%: 0.369 kg; name NaOCl_12p; lognormal variance with pedigree 0.0106, pedigree (1,5,1,5,1)
  (same comment as for amine passivator solution 60%)
- softwood sorted white ledger: 314 kg; name SSWL; = 3.14E-01 * 1000; lognormal variance with pedigree 0.0106, pedigree (1,5,1,5,1)
  (same comment as for heavy printed bleached kraft waste paper)
- sorted office paper: 73.8 kg; name SOP; = 7.38E-02 * 1000; lognormal variance with pedigree 0.0106, pedigree (1,5,1,5,1)
  (same comment as for heavy printed bleached kraft waste paper)
- unsorted office paper: 351 kg; name UOP; = 3.51E-01 * 1000; lognormal variance with pedigree 0.0106, pedigree (1,5,1,5,1)
  (same comment as for heavy printed bleached kraft waste paper)
- urea solution 50%: 2.94 kg; name Urea_50p; lognormal variance with pedigree 0.0106, pedigree (1,5,1,5,1)
  CO(NH2)2. Water included. Data per air dry ton pulp produced (10% water content; water mass / total mass) from a deinked pulp factory located in the province of Québec, Canada.

## Reference product
- deinked pulp, wet lap: 1 kg; name Pulp; = 1000 * 0.9 / Pulp_DM * scaling_factor; By-product classification allocatable product; CPC 03211: Balata, gutta-percha, guayule, chicle and similar natural gums in primary forms or in plates, sheets or strip; HS2017 4706: Pulps of fibres derived from recovered (waste and scrap) paper or paperboard or of other fibrous cellulosic m[...]
  Wet lap (40% water on a wet mass basis). Initial values of this dataset were given for the production of 1 ton of wet lap pulp scaled to 10% water on a wet mass basis.
  Amount was scaled to the amount of reference product.
  production volume 5.94395e10 kg; name PulpProdVol; = GloRecovFibPulpProdVol * FracMarketPulp * 0.9 / Pulp_DM
    Production volume calculated with the global recovered fiber pulp production in 2000, which includes market pulp and pulp produced in integrated mills and is assumed to be 10% water on a wet mass basis. The market pulp fraction of the global virgin fiber pulp production was used to approximate the market pulp share of the recovered fiber pulp production.
  property carbon content, fossil 0; name Pulp_C_content_fossil
    fossil carbon content on a dry matter basis
  property carbon content, non-fossil 0.494; name Pulp_C_content_non_fossil
    Biogenic carbon content of dry mass is 0.494 kgC/kg dry wood (ecoinvent v2.2 report 6_IX & ecoinvent v2.2 report 9). No other C containing products in the formulation of the pulp assumed.
  property dry mass 0.6 kg; name Pulp_DM; = Pulp_WM - Pulp_WWM
  property heating value, net 8 MJ
    LHV is calculated based on the Carbon content of the product. More details can be found on the respective documentation.
  property price 0.178 EUR2005
    Estimated value. It is estimated, that the price of the deinked pulp is 50% of the sulfate pulp.
  property water content 0.666667; name Pulp_water_content; = Pulp_WWM / Pulp_DM
  property water in wet mass 0.4 kg; name Pulp_WWM
  property wet mass 1 kg; name Pulp_WM
  properties: carbon allocation 0.2964 kg, carbon content 0.494

## Inputs from technosphere
- ammonium nitrate: 1.25272e-6, 6.67773e-7, 2.2669e-6 kg (3 suppliers, which the file names only by identifier); sum of these 4.18739e-6 kg; = ((NH4_NO3_34_7p * NH4_NO3_concentration * 28 / 80) * scaling_factor)*2.85731828339295; lognormal variance with pedigree 0.04, pedigree (1,1,5,1,1)
  The exchange has been updated from 'ammonium nitrate, as N' into 'ammonium nitrate' and therefore its amount has been scaled (multiplied) from 0 kg by 2.8573 kg of 'ammonium nitrate' per kg of 'ammonium nitrate, as N'. Original comment of the exchange is: NH4(NO3). Data from a deinked pulp factory located in the province of Québec, Canada.
  Amount was scaled to the amount of reference product.
  Uncertainty: No uncertainty added - uncertainty based on propagation of the uncertainty of the underlying parameters.
  properties: concentration 0.347, dry mass 1 kg, wet mass 1 kg
- calcium nitrate: 2.33714e-5, 2.03953e-5 kg (2 suppliers, which the file names only by identifier); sum of these 4.37667e-5 kg; = (Ca_NO3_2_65p * Ca_NO3_2_concentration) * scaling_factor
  Ca(NO3)2. Data from a deinked pulp factory located in the province of Québec, Canada.
  Amount was scaled to the amount of reference product.
  properties: concentration 0.65, dry mass 1 kg, wet mass 1 kg
- chemical, inorganic: 3.5264e-5 kg; name ChemInorg; = (PAC_57p * ChemInorg_concentration) * scaling_factor; lognormal variance with pedigree 0.04, pedigree (1,1,5,1,1)
  Chemicals, inorganic used as proxy for polyaluminium chloride in 57% w/w solution. Data from a deinked pulp factory located in the province of Québec, Canada.
  Amount was scaled to the amount of reference product.
  Uncertainty: No uncertainty added - uncertainty based on propagation of the uncertainty of the underlying parameters.
  property carbon content, fossil 0; name ChemInorg_C_content_fossil
  property carbon content, non-fossil 0; name ChemInorg_C_content_non_fossil
  property concentration 0.57; name ChemInorg_concentration
  property dry mass 1 kg; name ChemInorg_DM
  property water content 0; name ChemInorg_water_content
  property water in wet mass 0 kg; name ChemInorg_WWM
  property wet mass 1 kg; name ChemInorg_WM
- dimethylamine: 6.77152e-7, 1.62848e-7 kg (2 suppliers, which the file names only by identifier); sum of these 8.4e-7 kg; = (Amine_60p * Dimethylamine_concentration) * scaling_factor; lognormal variance with pedigree 0.04, pedigree (1,1,5,1,1)
  Data from a deinked pulp factory located in the province of Québec, Canada.
  Amount was scaled to the amount of reference product.
  Uncertainty: No uncertainty added - uncertainty based on propagation of the uncertainty of the underlying parameters.
  properties: carbon content, fossil 0.533333, concentration 0.6, dry mass 1 kg, heating value, net 13.47 MJ, wet mass 1 kg
- electricity, medium voltage: 0.0104357, 0.208169, 0.00521123, 0.00319577, 0.045061, 0.000639629, 0.000137343, 0.0145358, 0.0214966, 0.0617849 kWh (10 suppliers, which the file names only by identifier); sum of these 0.370667 kWh; = 556 * scaling_factor; lognormal variance with pedigree 0.0506, pedigree (1,5,5,5,1)
  Data from a deinked pulp factory located in the province of Québec, Canada.
  Amount was scaled to the amount of reference product.
- fatty alcohol: 0.000468 kg; name Antifoam; = 0.702 * scaling_factor; lognormal variance with pedigree 0.0506, pedigree (1,5,5,5,1)
  Fatty alcohol used as proxy for antifoam as reported in source data. Data from a deinked pulp factory located in the province of Québec, Canada.
  Amount was scaled to the amount of reference product.
  property carbon content, fossil 0.0408973; name Antifoam_C_content_fossil
  property carbon content, non-fossil 0.743434; name Antifoam_C_content_non_fossil
  property dry mass 1 kg; name Antifoam_DM
  property water content 0; name Antifoam_water_content
  property water in wet mass 0 kg; name Antifoam_WWM
  property wet mass 1 kg; name Antifoam_WM
  properties: heating value, net 41.01 MJ
- heat, district or industrial, natural gas: 0.102549, 0.277451 MJ (2 suppliers, which the file names only by identifier); sum of these 0.38 MJ; = (HeatNaturalGas_MJFuel_input / HeatNaturalGas_fuel_use) * scaling_factor; lognormal variance with pedigree 0.04, pedigree (1,1,5,1,1)
  Calculated based on reported fuel input (in MJ) and efficiency (1/Fuel_use)
  Amount was scaled to the amount of reference product.
  Uncertainty: No uncertainty added - uncertainty based on propagation of the uncertainty of the underlying parameters.
  properties: Corresponding fuel use 1.05263 MJ, heat of fuel used 600 MJ, heating value, net 1 MJ
  note on Corresponding fuel use: Inverse of efficiency. Value taken from dataset "heat production, natural gas, at industrial furnace >100kW GLO"
- hydrogen peroxide, without water, in 50% solution state: 0.0011832, 0.0056168 kg (2 suppliers, which the file names only by identifier); sum of these 0.0068 kg; = (H2O2_50p * H2O2_concentration) * scaling_factor; lognormal variance with pedigree 0.04, pedigree (1,1,5,1,1)
  (same comment as for dimethylamine)
  properties: concentration 0.5, dry mass 1 kg, heating value, net 7.13 MJ, water content 1, wet mass 2 kg
- malusil: 0.00343333 kg; name Malusil; = 5.15 * scaling_factor; lognormal variance with pedigree 0.0506, pedigree (1,5,5,5,1)
  Talc. Data from a deinked pulp factory located in the province of Québec, Canada.(magnesium silicate).
  Amount was scaled to the amount of reference product.
  property carbon content, fossil 0; name Malusil_C_content_fossil
  property carbon content, non-fossil 0; name Malusil_C_content_non_fossil
  property dry mass 1 kg; name Malusil_DM
  property water content 0; name Malusil_water_content
  property water in wet mass 0 kg; name Malusil_WWM
  property wet mass 1 kg; name Malusil_WM
- municipal solid waste: -0.000662115, -3.40005e-5, -4.03741e-6, -2.56526e-5, -0.0191831, -2.82522e-6, -9.06847e-7, -2.04972e-6, -8.53306e-5 kg (9 suppliers, which the file names only by identifier); sum of these -0.02 kg; = 30 * scaling_factor; lognormal variance with pedigree 0.0106, pedigree (1,5,1,5,1)
  Pulper residues. Consist of all sorts of consumer products that came with the waste paper.
  Amount was scaled to the amount of reference product.
  production volume; name PulperResProdVol; = PulperResidue * PulpProdVol / Pulp
    Calculated from production volume of deinked pulp using the relative outputs.
  properties: carbon content, fossil 0.171549, carbon content, non-fossil 0.261655, dry mass 0.41 kg, heating value, net 11.74 MJ, water content 1.43902, wet mass 1 kg
  note on carbon content, non-fossil: Biogenic carbon content on a dry matter basis. Default value.
  note on heating value, net: Value taken from the general comment of the treatment dataset.
- phosphoric acid, fertiliser grade, without water, in 70% solution state: 7.29766e-6, 0.000228202 kg (2 suppliers, which the file names only by identifier); sum of these 0.0002355 kg; = (H3PO4_75p * H3PO4_concentration) * scaling_factor; lognormal variance with pedigree 0.04, pedigree (1,1,5,1,1)
  Phosphoric acid, fertiliser grade, without water, in 70% solution state used as proxy for phosphoric acid in 75% w/w solution as reported in source data. Data from a deinked pulp factory located in the province of Québec, Canada.
  Amount was scaled to the amount of reference product.
  Uncertainty: No uncertainty added - uncertainty based on propagation of the uncertainty of the underlying parameters.
  properties: concentration 0.75, dry mass 1 kg, wet mass 1 kg
- potassium hydroxide: 1.69333e-6 kg; name KOH; = 0.00254 * scaling_factor; lognormal variance with pedigree 0.0506, pedigree (1,5,5,5,1)
  Pure. Data from a deinked pulp factory located in the province of Québec, Canada.
  Amount was scaled to the amount of reference product.
  property carbon content, fossil 0; name KOH_C_content_fossil
  property carbon content, non-fossil 0; name KOH_C_content_non_fossil
  property dry mass 0.856 kg; name KOH_DM
  property water content 0.168224; name KOH_water_content
  property water in wet mass 0.144 kg; name KOH_WWM
  property wet mass 1 kg; name KOH_WM
- pulp factory: 5e-11 unit; name PulpFactory; = ((Pulp/scaling_factor) / PulpFactory_lifetime_capacity_kg) * scaling_factor
  Calculated with the amount of deinked wet lap pulp considered in this dataset and the pulp factory lifetime capacity specified in the « pulp factory construction, GLO 2000 » ecoinvent dataset. The (virgin) pulp factory is used as a proxy for a deinked pulp factory.
  Amount was scaled to the amount of reference product.
  property lifetime capacity [kg] 2e10 kg; name PulpFactory_lifetime_capacity_kg; = 50*400000000
  note on lifetime capacity [kg]: Lifetime of 50 years and annual production of 400 kton of pulp for the ecoinvent pulp factory (see dataset "pulp factory construction").
- retention aid, for paper production: 0.000470764, 0.000953236 kg (2 suppliers, which the file names only by identifier); sum of these 0.001424 kg; = (CPAM + APAM + PAM_50p * RetentionAid_concentration) * scaling_factor; lognormal variance with pedigree 0.04, pedigree (1,1,5,1,1)
  Retention aid, for paper production used as proxy for: cationic polyacrylamid; anionic polyacrylamide; and polyamine in 50% w/w solution, as reported in source data. Data from a deinked pulp factory located in the province of Québec, Canada.
  Amount was scaled to the amount of reference product.
  Uncertainty: No uncertainty added - uncertainty based on propagation of the uncertainty of the underlying parameters.
  properties: carbon content, fossil 0.5, concentration 0.5, dry mass 1 kg, heating value, net 15.15 MJ, wet mass 1 kg
- sludge from pulp and paper production: -0.346506, -0.000256246, -0.0733643 kg (3 suppliers, which the file names only by identifier); sum of these -0.420127 kg; = 630.19 * scaling_factor; lognormal variance with pedigree 0.0106, pedigree (1,5,1,5,1)
  Average amount over 6 years (2005 to 2010 incl.) of deinking sludge and effluent treatment sludge sent to landfarming only, which represents 67.4% of the total sludge output. The remaining 32.6%, not included in the sludge amount, are treated by activities not yet modeled for paper deinking sludge in ecoinvent (i.e. 12.3% to mining site restauration, 13.5% as input to another process, 3.6% to cogeneration. 1.8% to landfilling and 1.3% to composting). According to the IMPACT 2002+ LCIA method, considering only the landfarmed sludge overestimates the damage scores by 4% for climate change and 22% for resources, and underestimates them by 9% for human health and 17 % for ecosystem quality. Those results take into account the avoided fertilizers from sludge landfarming. The overestimated impacts are due to the ignored energy avoided by cogeneration.
  Amount was scaled to the amount of reference product.
  production volume; name SludgeProdVol; = Sludge * PulpProdVol / Pulp
    Calculated from production volume of reference product using the relative outputs.
  properties: carbon content, non-fossil 0.225, dry mass 0.42 kg, heating value, net 2.65 MJ, water content 1.38095, wet mass 1 kg
  note on carbon content, non-fossil: Biogenic carbon content on a dry matter basis. The sludge composition is the average of deinking and effluent treatment sludge compositions weighted with the quantity of both sludge types sent to landfarming. Data from a pulp factory located in Québec, Canada.
- soap: 0.00205333 kg; name Soap; = 3.08 * scaling_factor; lognormal variance with pedigree 0.0506, pedigree (1,5,5,5,1)
  (same comment as for electricity, medium voltage)
  property carbon content, fossil 0; name Soap_C_content_fossil
  property carbon content, non-fossil 0.692237; name Soap_C_content_non_fossil
  property dry mass 0.87 kg; name Soap_DM
  property water content 0.149425; name Soap_water_content
  property water in wet mass 0.13 kg; name Soap_WWM
  property wet mass 1 kg; name Soap_WM
  properties: heating value, net 17.93 MJ
- sodium dithionite, anhydrous: 0.00068904, 0.00327096 kg (2 suppliers, which the file names only by identifier); sum of these 0.00396 kg; = (Na2S2O4_30p * Na2S2O4_concentration) * scaling_factor; lognormal variance with pedigree 0.04, pedigree (1,1,5,1,1)
  Water necessary to obtain a 30% solution included in "water, deionised, from tap water, at user". Data from a deinked pulp factory located in the province of Québec, Canada.
  Amount was scaled to the amount of reference product.
  Uncertainty: No uncertainty added - uncertainty based on propagation of the uncertainty of the underlying parameters.
  properties: concentration 0.3, dry mass 1 kg, wet mass 1 kg
- sodium hydroxide, without water, in 50% solution state: 0.000290608, 0.00297606 kg (2 suppliers, which the file names only by identifier); sum of these 0.00326667 kg; = (NaOH_50p * NaOH_concentration) * scaling_factor; lognormal variance with pedigree 0.04, pedigree (1,1,5,1,1)
  (same comment as for dimethylamine)
  properties: concentration 0.5, dry mass 1 kg, heating value, net 3.03 MJ, water content 1, wet mass 2 kg
- sodium hypochlorite, without water, in 15% solution state: 3.4349e-6, 2.60851e-5 kg (2 suppliers, which the file names only by identifier); sum of these 2.952e-5 kg; = (NaOCl_12p * NaOCl_concentration) * scaling_factor; lognormal variance with pedigree 0.04, pedigree (1,1,5,1,1)
  Sodium hypochlorite, without water, in 15% solution state used as proxy for sodium hypochlorite in 12% w/w solution as reported in source data. Data from a deinked pulp factory located in the province of Québec, Canada.
  Amount was scaled to the amount of reference product.
  Uncertainty: No uncertainty added - uncertainty based on propagation of the uncertainty of the underlying parameters.
  properties: concentration 0.12, dry mass 1 kg, wet mass 1 kg
- urea: 0.000471875, 7.3982e-5, 0.000402947 kg (3 suppliers, which the file names only by identifier); sum of these 0.000948804 kg; = ((Urea_50p * Urea_concentration * 28 / 62) * scaling_factor)*2.14379903903132; lognormal variance with pedigree 0.04, pedigree (1,1,5,1,1)
  The exchange has been updated from 'urea, as N' into 'urea' and therefore its amount has been scaled (multiplied) from 0.0005 kg by 2.1438 kg of 'urea' per kg of 'urea, as N'. Original comment of the exchange is: CO(NH2)2. Data from a deinked pulp factory located in the province of Québec, Canada.
  Amount was scaled to the amount of reference product.
  Uncertainty: No uncertainty added - uncertainty based on propagation of the uncertainty of the underlying parameters.
  properties: carbon content, fossil 0.2, concentration 0.5, dry mass 1 kg, wet mass 1 kg
- waste paper, unsorted: 0.309756, 0.309756, 0.309756 kg (3 suppliers, which the file names only by identifier); sum of these 0.929267 kg; = (-(CP + HPBK + LPMBK + MWL + SSWL + SOP + UOP)) * scaling_factor
  Sum of multiple waste paper sources. 10% water on a wet mass basis. Data from a deinked pulp factory located in the province of Québec, Canada. Initial values of this dataset were given for the production of 1 ton of wet lap pulp (40% water on a wet mass basis) scaled to 10% water on a wet mass basis. This is why the reference product is not 1 kg of waste paper.
  Amount was scaled to 1.
  production volume; name WastePaperProdVol; = WastePaperRefProd * PulpProdVol / (-Pulp)
    Calculated from production volume of deinked pulp using the relative outputs.
  properties: carbon content, non-fossil 0.448889, dry mass 0.9 kg, heating value, net 14.11 MJ, price 0.093 EUR2005, water content 0.111111, wet mass 1 kg
  note on carbon content, non-fossil: Biogenic carbon content on a dry mass basis is based on carbon content of wood fiber source (0.494 kg C/kg dry wood, taken from ecoinvent v2.2 report 6_IX and report 9) considered to be the only source of the carbon in the waste paper/pulp.
- water, deionised: 0.00490196, 1.76459e-5, 0.0159133 kg (3 suppliers, which the file names only by identifier); sum of these 0.0208329 kg; = (Na2S2O4_30p * (1 - Na2S2O4_concentration) + H2O2_50p * (1 - H2O2_concentration) + NaOH_50p * (1 - NaOH_concentration) + PAM_50p * (1 - RetentionAid_concentration) + Urea_50p * (1 - Urea_concentration) + PAC_57p * (1 - ChemInorg_concentration) + H3PO4_75p * (1 - H3PO4_concentration) + NH4_NO3_34_7p * (1 - NH4_NO3_concentration) + NaOCl_12p * (1 - NaOCl_concentration) + Amine_60p * (1 - Dimethylamine_concentration) + Ca_NO3_2_65p * (1 - Ca_NO3_2_concentration)) * scaling_factor; lognormal variance with pedigree 0.04, pedigree (1,1,5,1,1)
  Deionised water for chemical solutions that are not included in the exchanges of:
  sodium dithionite, anhydrous
  retention aid, for paper production (CPAM)
  chemicals, organic
  urea, as N
  nitrogen fertiliser, as N
  ammonium nitrate, as N
  dimethylamine.
  Amount was scaled to the amount of reference product.
  Uncertainty: No uncertainty added - uncertainty based on propagation of the uncertainty of the underlying parameters.
  properties: wet mass 1 kg

## Inputs from nature
- Water, river [natural resource, in water]: 0.00481333 m3; name WaterRiver; = 7.22 * scaling_factor; lognormal variance with pedigree 0.0506, pedigree (1,5,5,5,1)
  (same comment as for electricity, medium voltage)
  property carbon content, fossil 0.0104329; name WaterRiver_C_content_fossil
  property carbon content, non-fossil 0; name WaterRiver_C_content_non_fossil
  property dry mass 0.1101 kg; name WaterRiver_DM
  property water content 9081.65; name WaterRiver_water_content
  property water in wet mass 999.89 kg; name WaterRiver_WWM
  property wet mass 1000 kg; name WaterRiver_WM

## Emissions to nature
- Chlorinated solvents, unspecified [air, non-urban air or from high stacks]: 0.0131948 kg; lognormal variance with pedigree 0.17, pedigree (1,5,5,5,1)
  Aggregated confidential deinking emissions. See "Activity Description" for more information.
- Hydrocarbons, aromatic [air, non-urban air or from high stacks]: 1.3044e-5 kg; lognormal variance with pedigree 0.17, pedigree (1,5,5,5,1)
  (same comment as for Chlorinated solvents, unspecified)
- Hydrocarbons, unspecified [air, non-urban air or from high stacks]: 0.000199856 kg; lognormal variance with pedigree 0.17, pedigree (1,5,5,5,1)
  (same comment as for Chlorinated solvents, unspecified)
- NMVOC, non-methane volatile organic compounds [air, non-urban air or from high stacks]: 7.02939e-5 kg; lognormal variance with pedigree 0.17, pedigree (1,5,5,5,1)
  (same comment as for Chlorinated solvents, unspecified)
- Aluminium III [water, surface water]: 1.71333e-6 kg; name AlWater; = 0.00257 * scaling_factor; lognormal variance with pedigree 0.7, pedigree (1,5,5,5,1)
  Effluent emission. Data from a deinked pulp factory located in the province of Québec, Canada.
  Amount was scaled to the amount of reference product.
  property carbon content, fossil 0; name AlWater_C_content_fossil
  property carbon content, non-fossil 0; name AlWater_C_content_non_fossil
  property dry mass 1 kg; name AlWater_DM
  property water content 0; name AlWater_water_content
  property water in wet mass 0 kg; name AlWater_WWM
  property wet mass 1 kg; name AlWater_WM
- BOD5, Biological Oxygen Demand [water, surface water]: 1.87333e-5 kg; name BOD5Water; = 0.0281 * scaling_factor; lognormal variance with pedigree 0.09, pedigree (1,5,5,5,1)
  (same comment as for Aluminium III)
- COD, Chemical Oxygen Demand [water, surface water]: 0.000766667 kg; name CODWater; = 1.15 * scaling_factor; lognormal variance with pedigree 0.09, pedigree (1,5,5,5,1)
  (same comment as for Aluminium III)
- Chlorinated solvents, unspecified [water, surface water]: 2.71322e-5 kg; lognormal variance with pedigree 0.35, pedigree (1,5,5,5,1)
  Aggregated confidential effluent emissions. See "Activity Description" for more information.
- Copper ion [water, surface water]: 1.16e-7 kg; name CuWater; = 0.000174 * scaling_factor; lognormal variance with pedigree 0.7, pedigree (1,5,5,5,1)
  (same comment as for Aluminium III)
  property carbon content, fossil 0; name CuWater_C_content_fossil
  property carbon content, non-fossil 0; name CuWater_C_content_non_fossil
  property dry mass 1 kg; name CuWater_DM
  property water content 0; name CuWater_water_content
  property water in wet mass 0 kg; name CuWater_WWM
  property wet mass 1 kg; name CuWater_WM
- DOC, Dissolved Organic Carbon [water, surface water]: 0.000283951 kg; name DOCWater; = ((TOCWater/scaling_factor)) * scaling_factor; source Weidema B. P. 2011; lognormal variance with pedigree 0.04, pedigree (1,1,5,1,1)
  Estimated using the Data Quality Guidelines (Section 5.9.7) recommendations.
  Amount was scaled to the amount of reference product.
  Uncertainty: No uncertainty added - uncertainty based on propagation of the uncertainty of the underlying parameters. Uncertainty of actual relation between variables not accounted.
- Hydrocarbons, aromatic [water, surface water]: 8.61337e-7 kg; lognormal variance with pedigree 0.35, pedigree (1,5,5,5,1)
  (same comment as for Chlorinated solvents, unspecified)
- Nickel II [water, surface water]: 8.66667e-8 kg; name NiWater; = 0.00013 * scaling_factor; lognormal variance with pedigree 0.7, pedigree (1,5,5,5,1)
  (same comment as for Aluminium III)
  property carbon content, fossil 0; name NiWater_C_content_fossil
  property carbon content, non-fossil 0; name NiWater_C_content_non_fossil
  property dry mass 1 kg; name NiWater_DM
  property water content 0; name NiWater_water_content
  property water in wet mass 0 kg; name NiWater_WWM
  property wet mass 1 kg; name NiWater_WM
- Suspended solids, unspecified [water, surface water]: 7.46667e-5 kg; name SuspSolWater; = 0.112 * scaling_factor; lognormal variance with pedigree 0.09, pedigree (1,5,5,5,1)
  Effluent emission. Data from a deinked pulp factory located in the province of Québec, Canada.
  Amount was scaled to the amount of reference product.
  Uncertainty: Same basic uncertainty than BOD, COD, etc assumed.
  property carbon content, fossil 0; name SuspSolWater_C_content_fossil
  property carbon content, non-fossil 0.25; name SuspSolWater_C_content_non_fossil
  property dry mass 1 kg; name SuspSolWater_DM
  property water content 0; name SuspSolWater_water_content
  property water in wet mass 0 kg; name SuspSolWater_WWM
  property wet mass 1 kg; name SuspSolWater_WM
- TOC, Total Organic Carbon [water, surface water]: 0.000283951 kg; name TOCWater; = ((CODWater/scaling_factor) / 2.7) * scaling_factor; source Weidema B. P. 2011; lognormal variance with pedigree 0.04, pedigree (1,1,5,1,1)
  (same comment as for DOC, Dissolved Organic Carbon)
- VOC, volatile organic compounds [water, surface water]: 4.07049e-5 kg; lognormal variance with pedigree 0.35, pedigree (1,5,5,5,1)
  (same comment as for Chlorinated solvents, unspecified)
- Water [water, surface water]: 0.00408524 m3; name WaterEffluent; = ((WaterRiver_WWM * (WaterRiver/scaling_factor) + WastePaperRefProd_WWM * (WastePaperRefProd/scaling_factor) + (WaterDeion/scaling_factor) - Pulp_WWM * (Pulp/scaling_factor) - Sludge_WWM * (Sludge/scaling_factor) - PulperResidue_WWM * (PulperResidue/scaling_factor) ) / 1000) * scaling_factor; lognormal variance with pedigree 0.04, pedigree (1,1,5,1,1)
  Treated effluent to river. Calculated with the difference between water input and water output.
  Amount was scaled to the amount of reference product.
  property carbon content, fossil 0; name WaterEffluent_C_content_fossil
  property carbon content, non-fossil 0; name WaterEffluent_C_content_non_fossil
  property dry mass 0 kg; name WaterEffluent_DM
  property water in wet mass 1000 kg; name WaterEffluent_WWM
  property wet mass 1000 kg; name WaterEffluent_WM
- Zinc II [water, surface water]: 1.02667e-6 kg; name ZnWater; = 0.00154 * scaling_factor; lognormal variance with pedigree 0.7, pedigree (1,5,5,5,1)
  (same comment as for Aluminium III)
  property carbon content, fossil 0; name ZnWater_C_content_fossil
  property carbon content, non-fossil 0; name ZnWater_C_content_non_fossil
  property dry mass 1 kg; name ZnWater_DM
  property water content 0; name ZnWater_water_content
  property water in wet mass 0 kg; name ZnWater_WWM
  property wet mass 1 kg; name ZnWater_WM

## Sampling procedure
Most data are primary data from a deinked pulp factory located in the province of Québec, Canada. The amount of sludge generated was calculated from a 6 year average from year 2005 to 2010.

## Extrapolations
This dataset is a copy of an original dataset covering the Québec geography. The uncertainty has been adjusted accordingly.

## Review by Emilia Moreno Ruiz 2015-10-16
broken formula fix
