# transport, regular bus

Dataset: EcoSpold 2, unit process
Geography: CH
Time period: 2005-01-01 to 2023-12-31
Technology level: current
Classification: ISIC rev.4 ecoinvent: 4921:Urban and suburban passenger land transport
Scenario: Business-as-Usual
System model: Allocation, cut-off by classification
Share of production covered: 100 %
Generated by: Michael Spielmann (obsolete)
Published in: Spielmann M. 2007
Database: ecoinvent
isCopyrightProtected: true
accessRestrictedTo: 1

## General comment
Inventory refers to the entire transport life cycle. For road infrastructure, expenditures and environmental interventions due to construction of roads have been allocated based on the Gross tonne kilometre performance. Expenditures due to operation of the road infrastructure, as well as land use have been allocated based on the yearly vehicle kilometre performance. For the attribution of vehicle share to the transport performance a vehicle life time performance of 2.39E05 pkm/vehicle has been assumed. The energy use and combustion emissions data represents average data for the operation of an average Swiss regular bus (fleet average) in the year 2005, comprising various emission technologies.

## Included activities end
operation of vehicle; production and maintenance of vehicles; construction of road. For the energy use and combustion emissions dataset, the fuel consumption is included. Direct airborne emissions of gaseous substances, particulate matters and heavy metals are accounted for. Particulate emissions comprise exhaust- and abrasions emissions. Heavy metal emissions to soil and water caused by tyre abrasion are included.

## Geography
The data for vehicle operation and road infrastructure reflect Swiss conditions. Data for vehicle manufacturing and maintenance represents generic European data. Data for the vehicle disposal reflect the Swiss situation. The data of the energy use and combustion emissions refers to Swiss Conditions.

## Technology
Diesel, various emission treatment standards. Diesel engine

## Reference product
- transport, regular bus: 1 person*km; By-product classification allocatable product; CPC 641: Local transport and sightseeing transportation services of passengers
  production volume 0.0336675 person*km; name transport_RP_PV
    This is a placeholder value that does not reflect real-world production volumes. This dataset does not currently require a real-world production volume to work in the database framework, and no actual data were collected yet. This has no negative effect on the results of the ecoinvent database. The placeholder value of this activity was scaled according to the nominal GDP of 2005 (source: United Nations, http://data.un.org/Glossary.aspx?q=GDP+%28current+US%24%29, accessed 20130726) to reflect an appropriate share of the global production volume, which is also a placeholder value.
  property price 0.0187696 EUR2005
    Calculated based on inputs: The price of the product has been calculated as a sum of the values of the material and energy inputs for this product. This value is therefore a rough estimation. It may underestimate the real price since there are additional expenses when producing any product. These expences can include for example labour costs, treatment of waste materials and profit for the producer. Please consider carefully whether this level of data quality is acceptable for your application.
  properties: carbon allocation 0 kg, carbon content 0

## Inputs from technosphere
- bus: 7.1429e-8 unit; lognormal variance with pedigree 0.342025, pedigree (3,1,5,2,1)
  Uncertainty: o
- diesel, low-sulfur: 0.0249866 kg; lognormal variance with pedigree 0.0406, pedigree (1,1,5,1,1)
  Energy use and combustion emissions
  Uncertainty: d
  properties: carbon content, fossil 0.865, dry mass 1 kg, heating value, net 42.8 MJ, wet mass 1 kg
- maintenance, bus: 7.1429e-8 unit; lognormal variance with pedigree 0.342025, pedigree (3,1,5,2,1)
  activityLink introduced to establish a direct link to the corresponding regional supply of this product
  Uncertainty: o
- road: 0.00045728 m*year; lognormal variance with pedigree 0.342, pedigree (3,1,5,1,1)
  (same comment as for maintenance, bus)
- road maintenance: 8.6684e-5 m*year; lognormal variance with pedigree 0.342, pedigree (3,1,5,1,1)
  This input indicates the unit of road per vkm used during the transport activity. The road input is composed by two demand factors: - Road infrastructure and disposal (RI&D), which varies according to the gross vehicle weight. - Road operations & maintenance (RO&M), which does not vary according to the gross vehicle weight.
  Uncertainty: o

## Emissions to nature
- Acetaldehyde [air, unspecified]: 2.99145e-6 kg; lognormal variance with pedigree 0.0812, pedigree (2,3,5,1,1)
  Energy use and combustion emissions
  Uncertainty: d
- Ammonia [air, unspecified]: 3.57145e-7 kg; lognormal variance with pedigree 0.0512, pedigree (2,3,5,1,1)
  Energy use and combustion emissions
  Uncertainty: d
- Benzene [air, unspecified]: 2.14623e-7 kg; lognormal variance with pedigree 0.08, pedigree (1,1,5,1,1)
  Energy use and combustion emissions
  Uncertainty: d
- Cadmium II [air, unspecified]: 2.65294e-10 kg; lognormal variance with pedigree 0.756, pedigree (4,5,5,1,1)
  Energy use and combustion emissions
  Uncertainty: t
- Carbon dioxide, fossil [air, unspecified]: 0.0788933 kg; lognormal variance with pedigree 0.0406, pedigree (2,1,5,1,1)
  Energy use and combustion emissions
  Uncertainty: o
- Carbon monoxide, fossil [air, unspecified]: 0.000229537 kg; lognormal variance with pedigree 0.69, pedigree (1,1,5,1,1)
  Energy use and combustion emissions
  Uncertainty: d
- Chromium III [air, unspecified]: 1.66365e-9 kg; lognormal variance with pedigree 0.756, pedigree (4,5,5,1,1)
  Energy use and combustion emissions
  Uncertainty: t
- Chromium VI [air, unspecified]: 2.49866e-12 kg; lognormal variance with pedigree 0.756, pedigree (4,5,5,1,1)
  Energy use and combustion emissions
  Uncertainty: o
- Copper ion [air, unspecified]: 7.04176e-8 kg; lognormal variance with pedigree 0.756, pedigree (4,5,5,1,1)
  Energy use and combustion emissions
  Uncertainty: t
- Dinitrogen monoxide [air, unspecified]: 9.4422e-7 kg; lognormal variance with pedigree 0.0812, pedigree (2,3,5,1,1)
  Energy use and combustion emissions
  Uncertainty: d
- Formaldehyde [air, unspecified]: 5.49853e-6 kg; lognormal variance with pedigree 0.0812, pedigree (2,3,5,1,1)
  Energy use and combustion emissions
  Uncertainty: d
  property carbon content, fossil 0.400016; name C_content_fossil
  property carbon content, non-fossil 0; name C_content_non_fossil
  property dry mass 1 kg; name DM
  property water content 0; name water_content
  property water in wet mass 0 kg; name WWM
  property wet mass 1 kg; name WM
- Lead II [air, unspecified]: 2.01858e-9 kg; lognormal variance with pedigree 0.756, pedigree (4,5,5,1,1)
  Energy use and combustion emissions
  Uncertainty: t
- Mercury II [air, unspecified]: 4.99724e-13 kg; lognormal variance with pedigree 0.756, pedigree (4,5,5,1,1)
  Energy use and combustion emissions
  Uncertainty: t
- Methane, fossil [air, unspecified]: 1.60965e-6 kg; lognormal variance with pedigree 0.08, pedigree (1,1,5,1,1)
  Energy use and combustion emissions
  Uncertainty: d
- NMVOC, non-methane volatile organic compounds [air, unspecified]: 5.34882e-5 kg; lognormal variance with pedigree 0.08, pedigree (1,1,5,1,1)
  Energy use and combustion emissions
  Uncertainty: d
- Nickel II [air, unspecified]: 2.10508e-9 kg; lognormal variance with pedigree 0.756, pedigree (4,5,5,1,1)
  Energy use and combustion emissions
  Uncertainty: t
- Nitrogen oxides [air, unspecified]: 0.00091722 kg; lognormal variance with pedigree 0.08, pedigree (1,1,5,1,1)
  Energy use and combustion emissions
  Uncertainty: d
- PAH, polycyclic aromatic hydrocarbons [air, unspecified]: 2.85716e-11 kg; lognormal variance with pedigree 1.5812, pedigree (2,3,5,1,1)
  Energy use and combustion emissions
  Uncertainty: r
- Particulate Matter, < 2.5 um [air, unspecified]: 3.17252e-5 kg; lognormal variance with pedigree 0.3401, pedigree (1,1,5,3,1)
  Energy use and combustion emissions
  Uncertainty: i
- Particulate Matter, > 10 um [air, unspecified]: 4.04574e-6 kg; lognormal variance with pedigree 0.0807, pedigree (1,3,5,3,1)
  Energy use and combustion emissions
  Uncertainty: a
- Particulate Matter, > 2.5 um and < 10um [air, unspecified]: 4.39924e-6 kg; lognormal variance with pedigree 0.1627, pedigree (3,3,5,3,1)
  Energy use and combustion emissions
  Uncertainty: a
- Selenium IV [air, unspecified]: 2.49866e-10 kg; lognormal variance with pedigree 0.756, pedigree (4,5,5,1,1)
  Energy use and combustion emissions
  Uncertainty: t
- Sulfur dioxide [air, unspecified]: 2.49866e-6 kg; lognormal variance with pedigree 0.0406, pedigree (2,1,5,1,1)
  Energy use and combustion emissions
  Uncertainty: o
- Toluene [air, unspecified]: 1.12008e-6 kg; lognormal variance with pedigree 0.08, pedigree (1,1,5,1,1)
  Energy use and combustion emissions
  Uncertainty: d
- Xylenes, unspecified [air, unspecified]: 5.36553e-7 kg; lognormal variance with pedigree 0.08, pedigree (1,1,5,1,1)
  Energy use and combustion emissions
  Uncertainty: d
- Zinc II [air, unspecified]: 5.32367e-8 kg; lognormal variance with pedigree 0.756, pedigree (4,5,5,1,1)
  Energy use and combustion emissions
  Uncertainty: t
- Cadmium II [soil, unspecified]: 1.26936e-10 kg; lognormal variance with pedigree 0.208, pedigree (5,5,5,1,1)
  Energy use and combustion emissions
  Uncertainty: a
- Chromium III [soil, unspecified]: 6.05389e-10 kg; lognormal variance with pedigree 0.208, pedigree (5,5,5,1,1)
  Energy use and combustion emissions
  Uncertainty: a
- Copper ion [soil, unspecified]: 8.49505e-9 kg; lognormal variance with pedigree 0.208, pedigree (5,5,5,1,1)
  Energy use and combustion emissions
  Uncertainty: a
- Lead II [soil, unspecified]: 5.22396e-9 kg; lognormal variance with pedigree 0.208, pedigree (5,5,5,1,1)
  Energy use and combustion emissions
  Uncertainty: a
- Nickel II [soil, unspecified]: 1.64044e-9 kg; lognormal variance with pedigree 0.208, pedigree (5,5,5,1,1)
  Energy use and combustion emissions
  Uncertainty: a
- Zinc II [soil, unspecified]: 3.58495e-7 kg; lognormal variance with pedigree 0.208, pedigree (5,5,5,1,1)
  Energy use and combustion emissions
  Uncertainty: a
- Cadmium II [water, unspecified]: 1.26936e-10 kg; lognormal variance with pedigree 0.468, pedigree (5,5,5,1,1)
  Energy use and combustion emissions
  Uncertainty: a
- Chromium III [water, unspecified]: 6.05389e-10 kg; lognormal variance with pedigree 0.468, pedigree (5,5,5,1,1)
  Energy use and combustion emissions
  Uncertainty: a
- Copper ion [water, unspecified]: 8.49505e-9 kg; lognormal variance with pedigree 0.468, pedigree (5,5,5,1,1)
  Energy use and combustion emissions
  Uncertainty: a
- Lead II [water, unspecified]: 5.22396e-9 kg; lognormal variance with pedigree 0.808, pedigree (5,5,5,1,1)
  Energy use and combustion emissions
  Uncertainty: a
- Nickel II [water, unspecified]: 1.64044e-9 kg; lognormal variance with pedigree 0.808, pedigree (5,5,5,1,1)
  Energy use and combustion emissions
  Uncertainty: a
- Zinc II [water, unspecified]: 3.58495e-7 kg; lognormal variance with pedigree 0.808, pedigree (5,5,5,1,1)
  Energy use and combustion emissions
  Uncertainty: a

## Sampling procedure
Literature data.
