# sodium hydroxide to generic market for neutralising agent

Dataset: EcoSpold 2, unit process
Geography: RoW
Time period: 2000-01-01 to 2023-12-31
Technology level: current
Classification: ISIC rev.4 ecoinvent: 2011:Manufacture of basic chemicals
Classification: EcoSpold01Categories: chemicals/inorganics
Synonyms: caustic soda; caustic
Scenario: Business-as-Usual
System model: Allocation, cut-off by classification
Generated by: Sofia Parada Tur
Database: ecoinvent
isCopyrightProtected: true
accessRestrictedTo: 1

## General comment
This activity links the output of the market for sodium hydroxide to the generic market for neutralising agent.

## Included activities start
Activity starting with the input of sodium hydroxide

## Included activities end
The activity ends with the production sodium hydroxide for the generic market for neutralising agents.

## Geography
based on geographical validity of datasets producing sodium hydroxide in chlor-alkali electrolysis.

## Technology
based on techmology validity of datasets producing sodium hydroxide in chlor-alkali electrolysis.

## Time period
based on temporal validity of datasets producing sodium hydroxide in chlor-alkali electrolysis.

## Reference product
- neutralising agent, sodium hydroxide-equivalent: 1 kg; name neutralising_agent_output; By-product classification allocatable product; CPC 34231: Chemical elements n.e.c.; inorganic acids except phosphoric, nitric and sulphonitric; inorganic oxygen compoun[…]; HS2017 28: Inorganic chemicals; organic and inorganic compounds of precious metals; of rare earth metals, of radio-active [...]
  production volume 2.4311e10 kg; = (0.18*1.16E+11)+ (0.05*1.16E+11)/ sodium_hydroxide_input
    based on annual production volume of sodium hydroxide, namely 1.16E+11 kg in 2022 (mathematical relation in chlor alkali electrolysis).
    The amount of sodium hydroxide used as neutralising agent is based on statistics of the DOW chemical company on its uses in 2002. 18% of NaOH is used in the paper and pulp industries. 5% is used in water treatment. It is assumed that all neutralising agent applications are in these 2 sectors. This assumption is based on a market research by Marianne Wesnæs and Bo Weidema, 2.-0 LCA consultants, www.lca-net.com, 2006-10-19. URL: http://www.lca-net.com/files/naoh.pdf Retrieved 13.02.2012
  property price 0.376 EUR2005
    Calculated value based on data from United Nations Commodity Trade Statistics Database (comtrade.un.org). UN comtrade category: 281511 Sodium hydroxide (caustic soda) solid. Year 2005. Using exchange rate of 1EURO = 1.209 USD. Average of price of import into 5 main markets (EU, US, JP, IN and CN).
  properties: carbon allocation 0 kg, carbon content 0, carbon content, fossil 0, carbon content, non-fossil 0, dry mass 1 kg, water content 0, water in wet mass 0 kg, wet mass 1 kg

## Inputs from technosphere
- sodium hydroxide, without water, in 50% solution state: 1 kg; name sodium_hydroxide_input
  properties: dry mass 1 kg, heating value, net 3.03 MJ, wet mass 1 kg
