# planting, by row crop planter

Dataset: EcoSpold 2, unit process
Geography: US
Time period: 2021-01-01 to 2023-12-31
Technology level: current
Classification: ISIC rev.4 ecoinvent: 0161:Support activities for crop production
Scenario: Business-as-Usual
System model: Allocation, cut-off by classification
Generated by: Juanita Barrera
Database: ecoinvent
isCopyrightProtected: true
accessRestrictedTo: 1

## General comment
This dataset models service of planting by row crop planter. The time requirements is very variable, depending on culture, stocking density. Typical values between 5 and 30 Th/ha, planting material not included. FU is one ha planted.

## Included activities start
The activity starts from the agricultural field foreseen to be processed.

## Included activities end
This activity ends with planting. The inventory takes into account the diesel fuel consumption and the amount of agricultural machinery and of the shed, which has to be attributed to the planter. Also taken into consideration is the amount of emissions to the air from combustion and the emission to the soil from tyre abrasion during the work process. The following activities were considered part of the work process: preliminary work at the farm, like attaching the adequate machine to the tractor; transfer to field (with an assumed distance of 1 km); field work (for a parcel of land of 1 ha surface); transfer to farm and concluding work, like uncoupling the machine. The overlapping during the field work is considered. The planting material is not taken into account. Not included are dust other than from combustion and noise.

## Geography
The inventory is extrapolated from the Global geography. Data quality indicators are adjusted accordingly.

## Technology
Fuel consumption and emissions per kg diesel have been extrapolated to the US, but others inputs were taken from the original values.

## Reference product
- planting, by row crop planter: 1 ha; By-product classification allocatable product; CPC 86119: Other support services to crop production
  production volume 2.7e6 ha
    FAOSTAT data year 2020: permanent crops, crop cycle of 20 years assumed.
  property price 33.7399 EUR2005
    The price is from the year 2020. Price information has been directly provided by the data provider based on the following reference: University of Minnesota, Machinery cost estimates, W.F. Lazarus, 2020. The prices were adjusted for inflation relative to 2005 using the producer price index (PPI) of the euro area, published by eurostat (https://ec.europa.eu/eurostat/databrowser/view/STS_INPP_A__custom_6416181/default/table?lang=en, last accessed on 2023-06-01).
  properties: carbon allocation 0 kg, carbon content 0

## Inputs from technosphere
- agricultural machinery, unspecified: 0.966 kg; lognormal variance with pedigree 0.3042, pedigree (1,4,2,5,1)
  proxy from "sowing, GLO"
- diesel: 2.62544 kg; lognormal variance with pedigree 0.0028, pedigree (1,4,2,1,1)
  average of row crop planter data - UMN Farm Machinery Economic Cost Estimation Spreadsheet (MACHDATA.XLSM) Lazarus, 2022k; 2021 Nebraska Crop budget projections, Robert Klein and Glennis McClure, UNL Extension
  properties: carbon content, fossil 0.865, dry mass 1 kg, heating value, net 42.8 MJ, wet mass 1 kg
- shed: 0.00546 m2; lognormal variance with pedigree 0.3042, pedigree (1,4,2,5,1)
  proxy from "sowing, GLO"
- tractor, 4-wheel, agricultural: 0.596 kg; lognormal variance with pedigree 0.3042, pedigree (1,4,2,5,1)
  proxy from "sowing, GLO"

## Emissions to nature
- Ammonia [air, non-urban air or from high stacks]: 5.25089e-5 kg; lognormal variance with pedigree 0.058325, pedigree (1,2,2,2,3)
  adapted from "sowing, GLO" to match the diesel consumption
- Benzene [air, non-urban air or from high stacks]: 1.91754e-5 kg; lognormal variance with pedigree 0.058325, pedigree (1,2,2,2,3)
  adapted from "sowing, GLO" to match the diesel consumption
- Benzo(a)pyrene [air, non-urban air or from high stacks]: 7.90382e-8 kg; lognormal variance with pedigree 0.658325, pedigree (1,2,2,2,3)
  adapted from "sowing, GLO" to match the diesel consumption
- Cadmium II [air, non-urban air or from high stacks]: 2.62544e-8 kg; lognormal variance with pedigree 0.658325, pedigree (1,2,2,2,3)
  adapted from "sowing, GLO" to match the diesel consumption
- Carbon dioxide, fossil [air, non-urban air or from high stacks]: 8.17874 kg; lognormal variance with pedigree 0.018325, pedigree (1,2,2,2,3)
  adapted from "sowing, GLO" to match the diesel consumption
- Carbon monoxide, fossil [air, non-urban air or from high stacks]: 0.00982823 kg; lognormal variance with pedigree 0.652225, pedigree (1,4,2,2,1)
  adapted from "sowing, GLO" to match the diesel consumption
- Chromium III [air, non-urban air or from high stacks]: 1.31272e-7 kg; lognormal variance with pedigree 0.658325, pedigree (1,2,2,2,3)
  adapted from "sowing, GLO" to match the diesel consumption
- Copper ion [air, non-urban air or from high stacks]: 4.46738e-6 kg; lognormal variance with pedigree 0.658325, pedigree (1,2,2,2,3)
  adapted from "sowing, GLO" to match the diesel consumption
- Dinitrogen monoxide [air, non-urban air or from high stacks]: 0.000315466 kg; lognormal variance with pedigree 0.058325, pedigree (1,2,2,2,3)
  adapted from "sowing, GLO" to match the diesel consumption
- Methane, fossil [air, non-urban air or from high stacks]: 0.000338833 kg; lognormal variance with pedigree 0.058325, pedigree (1,2,2,2,3)
  adapted from "sowing, GLO" to match the diesel consumption
- NMVOC, non-methane volatile organic compounds [air, non-urban air or from high stacks]: 0.00859111 kg; lognormal variance with pedigree 0.042225, pedigree (1,4,2,2,1)
  adapted from "sowing, GLO" to match the diesel consumption
- Nickel II [air, non-urban air or from high stacks]: 1.84193e-7 kg; lognormal variance with pedigree 0.658325, pedigree (1,2,2,2,3)
  adapted from "sowing, GLO" to match the diesel consumption
- Nitrogen oxides [air, non-urban air or from high stacks]: 0.116839 kg; lognormal variance with pedigree 0.042225, pedigree (1,4,2,2,1)
  adapted from "sowing, GLO" to match the diesel consumption
- PAH, polycyclic aromatic hydrocarbons [air, non-urban air or from high stacks]: 8.65984e-6 kg; lognormal variance with pedigree 0.318325, pedigree (1,2,2,2,3)
  adapted from "sowing, GLO" to match the diesel consumption
- Particulate Matter, < 2.5 um [air, non-urban air or from high stacks]: 0.0087973 kg; lognormal variance with pedigree 0.318325, pedigree (1,2,2,2,3)
  adapted from "sowing, GLO" to match the diesel consumption
- Selenium IV [air, non-urban air or from high stacks]: 2.62544e-8 kg; lognormal variance with pedigree 0.058325, pedigree (1,2,2,2,3)
  adapted from "sowing, GLO" to match the diesel consumption
- Sulfur dioxide [air, non-urban air or from high stacks]: 0.00264606 kg; lognormal variance with pedigree 0.018325, pedigree (1,2,2,2,3)
  adapted from "sowing, GLO" to match the diesel consumption
- Zinc II [air, non-urban air or from high stacks]: 2.62544e-6 kg; lognormal variance with pedigree 0.658325, pedigree (1,2,2,2,3)
  adapted from "sowing, GLO" to match the diesel consumption
- Cadmium II [soil, agricultural]: 3.25e-7 kg; lognormal variance with pedigree 0.0442, pedigree (1,4,2,5,1)
  proxy from "sowing, GLO"
- Lead II [soil, agricultural]: 1.44e-6 kg; lognormal variance with pedigree 0.0442, pedigree (1,4,2,5,1)
  proxy from "sowing, GLO"
- Zinc II [soil, agricultural]: 0.000852 kg; lognormal variance with pedigree 0.0442, pedigree (1,4,2,5,1)
  proxy from "sowing, GLO"

## Extrapolations
The dataset is modeled for agricultural production system in US. Data Quality indicators are adjusted accordingly.
