# oriented strand board production

Dataset: EcoSpold 2, unit process
Geography: CA-QC
Time period: 2005-01-01 to 2023-12-31
Technology level: current
Classification: EcoSpold01Categories: wooden materials/extraction
Classification: ISIC rev.4 ecoinvent: 1621:Manufacture of veneer sheets and wood-based panels
Synonyms: OSB
Scenario: Business-as-Usual
System model: Allocation, cut-off by classification
Generated by: Lindita Bushi
Database: ecoinvent
isCopyrightProtected: true
accessRestrictedTo: 1

## General comment
This dataset represents the production of 3/8-inch (9,5mm) oriented strand board in Quebec and is collected from four different mills in Canada between 2005 and 2006.
The dataset is based on Canadian average but is representative of Quebec's production.

## Included activities start
Activity starts at the entrance of the production site. it includes:
- the inputs (materials and energy) to the production processes received at the factory gate;
- the infrastructures (building, furnace for wood).

## Included activities end
Activity ends at the gate of the production site. Outputs include:
- the material outputs (oriented strand borad and by-products);
- process emissions;
- combustion emissions from wood (internal use).

## Geography
Most data from 4 Canadian mills, including 1 from Québec. The Québec mill accounts for 25% of the production from the surveyed mills. Some data are taken directly from the GLO dataset The uncertainty has been adjusted accordingly.

## Time period
Data collected for the period 2005-2006. The uncertainty has been adjusted accordingly.

## Parameters
- density, wood chips, bulk, oven dry: 239 kg/m3; name densityWoodChipsBulkOD; lognormal variance with pedigree 0.0493, pedigree (1,5,5,3,2)
  Density of wood residues used as fuel.
  The volume refers to the bulked volume: dried matter content = 239 kg/m3 dried matter (u=0%) (ecoinvent v2.2 report 9, Table 13.1)
- fuel use: 1.1 MJ; name fuel_in; lognormal variance with pedigree 0.2106, pedigree (5,5,5,5,5)
  Fuel use of wood chips furnace.
  Default value
- heat use: 2076.39 MJ; name totalHeatUse; = HVWoodChips* amountWoodChips/fuelUse+NHVNaturalGas*36.3*2.79/fuelUse; lognormal variance with pedigree 0.001325, pedigree (1,2,1,2,2)
  Total heat use of the process from wood, natural gas and liquid propane gas. Gas combustion and wood combustion are considered exchangeable. Diesel and light fuel oil are considered not exchangeable with other energy sources, so heat produced from these sources is not included here.
  Uncertainty: Variance from default values table. Data for process emissions collected from Canadian entreprises.
- wood chips heat value: 19.1 MJ/kg; name HVWoodChips; lognormal variance with pedigree 0.0006, pedigree (1,1,1,1,1)
  Net value
  Characteristics of the available dataset of wood chips (humidity = 140%) as fuel input has been adjusted to actual humidity of 50%, which is achieved after some weeks of drying. The apparent density of the chips is 430 kg/m3, the bulk density is 239 kg/m3, and the low heating value is 4044 MJ/m3
- wood residues as fuel: 115.367 kg; name amountWoodChips; lognormal variance with pedigree 0.001825, pedigree (1,3,1,2,2)
  It includes wood used internally as hog fuel
  Uncertainty: Variance from default values table. Data collected from Canadian entreprises

## Reference product
- oriented strand board: 1 m3; name amountRP; By-product classification allocatable product; CPC 31432: Oriented strand board (OSB); HS2017 441012: Oriented strand board (OSB) of wood, whether or not agglomerated with resins or other organic binding substances
  EcoSpold01Location=RER
  production volume 77750 m3; name annualProductionVolume; = 4.5e6 * 3.11e11 / 1.8e13
    Calculated with European production volume (4.5 Mm³; http://www.unece.org/fileadmin/DAM/timber/publications/07.pdf), Quebec 2011 GDP (1.8e13 USD) and the global GDP in 2011 (7e13 USD).
  property carbon content, fossil 0.0370693
    Adapted from default value to account for regional variability. C content calculated as the addition of the C contents in the final product components (phenolic resin, paraffin)
  property carbon content, non-fossil 0.470942
    Adapted from default value to account for regional variability. The OSB is composed of wood and additives. The weight of the wood is assumed to be the DM kg minus 27.61 kg additives. C content of wood is 0.494 kgC/kg dry wood (ecoinvent v2.2 report 9)
  property heating value, net 8417.59 MJ
    LHV is calculated based on the Carbon content of the product. More details can be found on the respective documentation.The property is based on a value of 14.39MJ/kg
  property water content 0.0850575; name WCOSB
  property water in wet mass 50.17 kg; name WWMOSB
  properties: allocation factor 0.998207, carbon allocation 299.641 kg, carbon content 0.508012, dry mass 589.83 kg, price 566 EUR2005, true value 566, wet mass 640 kg

## Inputs from technosphere
- diesel, burned in building machine: 60.1364 MJ; = kgFuel_input*NHValueDiesel*42.8; lognormal variance with pedigree 0.04, pedigree (1,1,5,1,1)
  EcoSpold01Location=GLO
  Fuel (gasoline) consumed on site by operating machines
  Uncertainty: No uncertainty added - uncertainty based on propagation of the uncertainty of the underlying parameters
  property Corresponding fuel use 1.11 MJ; name fuelUse
  property heating value, net 1 MJ; name NHValueDiesel
  property kgFuel_Input 1.40758 kg; name kgFuel_input
  note on Corresponding fuel use: Lower heating value of the fuel input related to the heat/electricity output
- electricity, medium voltage: 123.488 kWh; lognormal variance with pedigree 0.047225, pedigree (1,3,5,2,2)
  EcoSpold01Location=UCTE
  This electricity includes process and furnace utilisation
  Uncertainty: Variance from default values table. Data for inputs collected from Canadian entreprises.
- furnace, wood chips, hardwood storage area, 300kW: 3.66443e-5 unit; = (1.81E-08/0.000238)*(amountWoodChips/densityWoodChipsBulkOD); lognormal variance with pedigree 0.56, pedigree (5,5,5,5,5)
  Taken from ecoinvent 2.2 dataset “Wood chips, from industry, softwood, burned in furnace 300kW/CH”.
  Fraction is calculated per m3 of wood chips using the original dataset:
  ((fraciton/MJ)/(0,000238m3/MJproduced)
  Emission per m3 is multiplied by the m3 of wood chips burned:
  (amount (in kg))/density (kg/m3)
  Uncertainty: “Wood chips, from industry, softwood, burned in furnace 300kW/CH”.
- heat, district or industrial, natural gas: 91.0769 MJ; name heatNatGas; = totalHeatUse-(amountWoodChips*HVWoodChips/fuelUse); lognormal variance with pedigree 0.04, pedigree (1,1,5,1,1)
  EcoSpold01Location=RER
  It includes natural gas and liquid propane gas
  Uncertainty: No uncertainty added - uncertainty based on propagation of the uncertainty of the underlying parameters
  property heating value, gross 40.3 MJ; name heatingValueGas
  property heating value, net 1 MJ; name NHVNaturalGas
- heat, district or industrial, other than natural gas: 5.66096 MJ; = kgFuelInputLFO* HVLFO*42.6/fuelUseLFO; lognormal variance with pedigree 0.04, pedigree (1,1,5,1,1)
  It includes combustion of light fuel oil and gasoline.
  Uncertainty: No uncertainty added - uncertainty based on propagation of the uncertainty of the underlying parameters
  property Corresponding fuel use 1.11 MJ; name fuelUseLFO
  property fuel input in physical units, kg 0.147769 kg; name kgFuelinputLFO
  property heating value, net 1 MJ; name HVLFO
- lubricating oil: 0.171435 kg; = (0.013716445+0.181075176)*densityLubricatingOil+0.000325935; lognormal variance with pedigree 0.047225, pedigree (1,3,5,2,2)
  Hydraulic fluid + motor and press thermal oils+ grease
  Uncertainty: Variance from default values table. Data for inputs collected from Canadian entreprises.
  property density 0.88 kg/l; name densityLubricatingOil
  properties: carbon content, fossil 0.75, dry mass 1 kg, heating value, net 40.2 MJ, wet mass 1 kg
  note on carbon content, fossil: Lubricating oil is produced from diesel. C-content/dry mass of fats and oils considered 75%, from: ecoinvent v2.2 report, n 15a, pg 40
  note on heating value, net: Literature value, Source: IPCC 2006, 2006 IPCC Guidelines for National Greenhouse Gas Inventories, Prepared by the National Greenhouse Gas Inventories Programme, Eggleston H.S., Buendia L., Miwa K., Ngara T. and Tanabe K. (eds). Published: IGES, Japan
- paraffin: 10.1697 kg; lognormal variance with pedigree 0.047225, pedigree (1,3,5,2,2)
  Slack wax
  EcoSpold01Location=RER
  Uncertainty: Variance from default value table. Data for inputs collected from Canadian entreprises.
  properties: carbon content, fossil 0.847059, dry mass 1 kg, heating value, net 41.5 MJ, wet mass 1 kg
  note on carbon content, fossil: An average composition of C12H26 (molecular weight of 170 g/mol) was assumed for n-parafins, after ecoinvent v2.2 report 8, part II, pg 398
  note on heating value, net: Indicative value. Reference: Fuels - Higher and Lower Calorific Values, available at: https://www.engineeringtoolbox.com/fuels-higher-calorific-values-d_169.html
- phenolic resin: 20.4622 kg; lognormal variance with pedigree 0.047225, pedigree (1,3,5,2,2)
  EcoSpold01Location=RER
  PF resin
  Uncertainty: Variance from default values table. Data for inputs collected from Canadian entreprises.
  properties: carbon content, fossil 0.772277, dry mass 1 kg, heating value, net 33.57 MJ, wet mass 1 kg
  note on carbon content, fossil: (C6H5OH)-CH2-(C6H5OH) was considered to be the basic structure in phenolic resin (ecoinvent v2.2 report 8-part 61). C13H14O2, MW=202 g/mol
- pulpwood, hardwood, measured as solid wood under bark: 1.10553 m3; name Pulpwood; lognormal variance with pedigree 0.047225, pedigree (1,3,5,2,2)
  Only hardwood species are used in Quebec: Aspen 72%, poplar 21% and birch 7%. 12 % bark considered. Volume adapted to the default ecoinvent dry mass (563.2 kg/m3) in order to keep the carbon balance in the database. The true dry mass is for this dataset is 426 kg/m3, aspen being a very light hardwood. The side-effect of this adaptation is the underestimation of land-use during wood extraction.
  Uncertainty: Variance from default value table. Data for inputs collected from Canadian entreprises.
  property dry mass 650 kg; name DMPulpwood
  property water content 0.8; name water_content_Pulpwood
  property water in wet mass 520 kg; name WWMPulpwood; = DMPulpwood * water_content_Pulpwood
  property wet mass 1170 kg; name WMPulpwood; = DMPulpwood + WWMPulpwood
  properties: carbon content, non-fossil 0.494, heating value, net 6071.3 MJ
  note on heating value, net: Value based on "hardwood forestry, mixed species, sustainable forest management"The property is based on a value of 11.58MJ/kg
- tap water: 0.0789222 kg; name water; lognormal variance with pedigree 0.047225, pedigree (1,3,5,2,2)
  Uncertainty: Variance from default value table. Data for inputs collected from Canadian entreprises.
  property water in wet mass 0.999663 kg; name WWMWater
  properties: carbon content, fossil 0.00178991, dry mass 0.000337476 kg, water content 2962.17, wet mass 1 kg
  note on carbon content, fossil: Bicarbonate content is 2.93 mol/m3. CO2 content is 0.1 mol/m3 (ecoinvent v2.2 report 8, Tab 93.1).
- waste wood, untreated: -12.8301 kg; name amountWoodWaste; = 10.2825/DMWasteWood; lognormal variance with pedigree 0.001825, pedigree (1,3,1,2,2)
  It includes waste wood (landfilled).
  Another amount of wood not considered in this exchange is stockpile in the mill.
  Uncertainty: Variance from default value table. Data collected from Canadian entreprises
  production volume; = annualProductionVolume*amountWoodWaste/ amountRP
    Calculated from production volume of reference product using the relative outputs.
  property dry mass 0.8 kg; name DMWasteWood
  property water content 0.25; name WCWasteWood
  property water in wet mass 0.2 kg; name WWMWasteWood
  properties: carbon content, non-fossil 0.494, heating value, net 13.99 MJ, wet mass 1 kg
  note on heating value, net: Value taken from the general comment of the treatment dataset.
- wood ash mixture, pure: -4.73725 kg; name amountWoodAsh; lognormal variance with pedigree 0.001825, pedigree (1,3,1,2,2)
  Ash from combustion from heat production is included here.
  Uncertainty: Variance from default value table. Data collected from Canadian entreprises
  production volume; = annualProductionVolume*amountWoodAsh/ amountRP
    Calculated from production volume of reference product using the relative outputs.
  properties: carbon content, non-fossil 0.012, dry mass 1 kg, wet mass 1 kg
- wooden board factory, organic bonded boards: 3.32403e-8 unit; = 3.33E-08; lognormal variance with pedigree 0.448, pedigree (4,5,5,5,4)
  EcoSpold01Location=RER
  Taken from GLO dataset

## Inputs from nature
- Carbon dioxide, non-fossil, resource correction [natural resource, in air]: -36.3074 kg

## Emissions to nature
- Acetaldehyde [air, unspecified]: 0.0621776 kg; = 0.062165584+(0.000000061/0.000238)*(amountWoodChips/densityWoodChipsBulkOD); lognormal variance with pedigree 0.488, pedigree (1,5,5,5,3)
  On-site process emissions and emissions from energy production from wood. Related VOCs are typically released during the drying and pressing of the OSB products.
  Energy production from wood and its emissions are modelled using ecoinvent 2.2 dataset "Wood chips, from industry, softwood, burned in furnace 300kW/CH".
  Emission is calculated per m3 of wood chips using the original dataset:
  ((emission/MJ)/(0,000238m3/MJproduced)
  Emission per m3 is multiplied by the m3 of wood chips burned:
  (amount (in kg))/density (kg/m3)
  Uncertainty: DQP values adapted from original dataset (“heat production, softwood chips from industry, at furnace 300kW”) . This uncertainty is multiplied by uncertainty of the wood chips amount.
- Ammonia [air, unspecified]: 0.00350247 kg; = (0.00000173/0.000238)*(amountWoodChips/densityWoodChipsBulkOD); lognormal variance with pedigree 0.488, pedigree (1,5,5,5,3)
  Emissions from energy production from wood on site.
  Energy production from wood and its emissions are modelled using ecoinvent 2.2 dataset "Wood chips, from industry, softwood, burned in furnace 300kW/CH".
  Emission is calculated per m3 of wood chips using the original dataset:
  ((emission/MJ)/(0,000238m3/MJproduced)
  Emission per m3 is multiplied by the m3 of wood chips burned:
  (amount (in kg))/density (kg/m3)
  Uncertainty: DQP values adapted from original dataset (“heat production, softwood chips from industry, at furnace 300kW”) . This uncertainty is multiplied by uncertainty of the wood chips amount.
- Arsenic ion [air, unspecified]: 2.02455e-6 kg; = (0.000000001/0.000238)*(amountWoodChips/densityWoodChipsBulkOD); lognormal variance with pedigree 0.488, pedigree (1,5,5,5,3)
  (same comment as for Ammonia)
- Benzene [air, unspecified]: 0.00184234 kg; = (0.00000091/0.000238)*(amountWoodChips/densityWoodChipsBulkOD); lognormal variance with pedigree 0.488, pedigree (1,5,5,5,3)
  (same comment as for Ammonia)
- Benzo(a)pyrene [air, unspecified]: 1.01227e-6 kg; = (5.00E-10/0.000238)*(amountWoodChips/densityWoodChipsBulkOD); lognormal variance with pedigree 0.488, pedigree (1,5,5,5,3)
  (same comment as for Ammonia)
- Bromine [air, unspecified]: 0.000121473 kg; = (0.00000006/0.000238)*(amountWoodChips/densityWoodChipsBulkOD); lognormal variance with pedigree 0.488, pedigree (1,5,5,5,3)
  (same comment as for Ammonia)
- Cadmium II [air, unspecified]: 1.41718e-6 kg; = (7.00E-10/0.000238)*(amountWoodChips/densityWoodChipsBulkOD); lognormal variance with pedigree 0.488, pedigree (1,5,5,5,3)
  (same comment as for Ammonia)
- Calcium II [air, unspecified]: 0.0118436 kg; = (0.00000585/0.000238)*(amountWoodChips/densityWoodChipsBulkOD); lognormal variance with pedigree 0.488, pedigree (1,5,5,5,3)
  (same comment as for Ammonia)
- Carbon dioxide, non-fossil [air, unspecified]: 208.528 kg; = (0.103/0.000238)*(amountWoodChips/densityWoodChipsBulkOD); lognormal variance with pedigree 0.488, pedigree (1,5,5,5,3)
  (same comment as for Ammonia)
- Carbon monoxide, fossil [air, unspecified]: 0.832165 kg; lognormal variance with pedigree 0.081225, pedigree (1,3,5,2,2)
  On-site process emission
  Uncertainty: Variance from default value table. Data for process emissions collected from Canadian entreprises.
- Carbon monoxide, non-fossil [air, unspecified]: 0.0971783 kg; = (0.000048/0.000238)*(amountWoodChips/densityWoodChipsBulkOD); lognormal variance with pedigree 0.398, pedigree (1,5,5,5,3)
  Emissions from energy production from wood on site.
  Uncertainty: DQP values adapted from original dataset (“heat production, softwood chips from industry, at furnace 300kW”) . This uncertainty is multiplied by uncertainty of the wood chips amount.
- Chlorine [air, unspecified]: 0.000364419 kg; = (0.00000018/0.000238)*(amountWoodChips/densityWoodChipsBulkOD); lognormal variance with pedigree 0.398, pedigree (1,5,5,5,3)
  (same comment as for Ammonia)
- Chromium III [air, unspecified]: 8.01721e-6 kg; = (3.96E-09/0.000238)*(amountWoodChips/densityWoodChipsBulkOD); lognormal variance with pedigree 0.398, pedigree (1,5,5,5,3)
  (same comment as for Ammonia)
- Chromium VI [air, unspecified]: 8.09819e-8 kg; = (4.00E-11/0.000238)*(amountWoodChips/densityWoodChipsBulkOD); lognormal variance with pedigree 0.398, pedigree (1,5,5,5,3)
  (same comment as for Ammonia)
- Copper ion [air, unspecified]: 4.45401e-5 kg; = (0.000000022/0.000238)*(amountWoodChips/densityWoodChipsBulkOD); lognormal variance with pedigree 0.398, pedigree (1,5,5,5,3)
  (same comment as for Ammonia)
- Dinitrogen monoxide [air, unspecified]: 0.00506137 kg; = (0.0000025/0.000238)*(amountWoodChips/densityWoodChipsBulkOD); lognormal variance with pedigree 0.398, pedigree (1,5,5,5,3)
  (same comment as for Ammonia)
- Dioxins, measured as 2,3,7,8-tetrachlorodibenzo-p-dioxin [air, unspecified]: 6.2761e-11 kg; = (3.10E-14/0.000238)*(amountWoodChips/densityWoodChipsBulkOD); lognormal variance with pedigree 0.398, pedigree (1,5,5,5,3)
  (same comment as for Ammonia)
- Ethyl benzene [air, unspecified]: 6.07364e-5 kg; = (0.00000003/0.000238)*(amountWoodChips/densityWoodChipsBulkOD); lognormal variance with pedigree 0.488, pedigree (1,5,5,5,3)
  (same comment as for Ammonia)
- Fluorine [air, unspecified]: 0.000101227 kg; = (0.00000005/0.000238)*(amountWoodChips/densityWoodChipsBulkOD); lognormal variance with pedigree 0.398, pedigree (1,5,5,5,3)
  (same comment as for Ammonia)
- Formaldehyde [air, unspecified]: 0.0796985 kg; = 0.079578+(0.00000013/0.000238)*(amountWoodChips/densityWoodChipsBulkOD); lognormal variance with pedigree 0.0907, pedigree (3,3,5,3,3)
  (same comment as for Acetaldehyde)
- Hexachlorobenzene [air, unspecified]: 1.45767e-11 kg; = (7.20E-15/0.000238)*(amountWoodChips/densityWoodChipsBulkOD); lognormal variance with pedigree 0.488, pedigree (1,5,5,5,3)
  (same comment as for Ammonia)
- Hydrocarbons, aliphatic, alkanes, unspecified [air, unspecified]: 0.00184234 kg; = (0.00000091/0.000238)*(amountWoodChips/densityWoodChipsBulkOD); lognormal variance with pedigree 0.488, pedigree (1,5,5,5,3)
  (same comment as for Ammonia)
- Hydrocarbons, aliphatic, unsaturated [air, unspecified]: 0.0062761 kg; = (0.0000031/0.000238)*(amountWoodChips/densityWoodChipsBulkOD); lognormal variance with pedigree 0.488, pedigree (1,5,5,5,3)
  (same comment as for Ammonia)
- Lead II [air, unspecified]: 5.06137e-5 kg; = (0.000000025/0.000238)*(amountWoodChips/densityWoodChipsBulkOD); lognormal variance with pedigree 0.488, pedigree (1,5,5,5,3)
  (same comment as for Ammonia)
- Magnesium [air, unspecified]: 0.000728837 kg; = (0.00000036/0.000238)*(amountWoodChips/densityWoodChipsBulkOD); lognormal variance with pedigree 0.488, pedigree (1,5,5,5,3)
  (same comment as for Ammonia)
- Manganese II [air, unspecified]: 0.000344173 kg; = (0.00000017/0.000238)*(amountWoodChips/densityWoodChipsBulkOD); lognormal variance with pedigree 0.488, pedigree (1,5,5,5,3)
  (same comment as for Ammonia)
- Mercury II [air, unspecified]: 6.07364e-7 kg; = (3.00E-10/0.000238)*(amountWoodChips/densityWoodChipsBulkOD); lognormal variance with pedigree 0.488, pedigree (1,5,5,5,3)
  (same comment as for Ammonia)
- Methane, non-fossil [air, unspecified]: 0.000809819 kg; = (0.0000004/0.000238)*(amountWoodChips/densityWoodChipsBulkOD); lognormal variance with pedigree 0.488, pedigree (1,5,5,5,3)
  (same comment as for Ammonia)
- Methanol [air, unspecified]: 0.198204 kg; lognormal variance with pedigree 0.081225, pedigree (1,3,5,2,2)
  On-site process emissions.
  Uncertainty: Variance from default value table. Data for process emissions collected from Canadian entreprises.
- NMVOC, non-methane volatile organic compounds [air, unspecified]: 0.0825246 kg; = 0.081456+(0.0000006/0.000238)*(amountWoodChips/densityWoodChipsBulkOD); lognormal variance with pedigree 0.488, pedigree (1,5,5,5,3)
  On-site process emissions and emissions from energy production from wood. Related VOCs are typically released during the drying and pressing of the OSB products
  Energy production from wood and its emissions are modelled using ecoinvent 2.2 dataset "Wood chips, from industry, softwood, burned in furnace 300kW/CH".
  Emission is calculated per m3 of wood chips using the original dataset:
  ((emission/MJ)/(0,000238m3/MJproduced)
  Emission per m3 is multiplied by the m3 of wood chips burned:
  (amount (in kg))/density (kg/m3)
  Uncertainty: DQP values adapted from original dataset (“heat production, softwood chips from industry, at furnace 300kW”) . This uncertainty is multiplied by uncertainty of the wood chips amount.
- Nickel II [air, unspecified]: 1.21473e-5 kg; = (0.000000006/0.000238)*(amountWoodChips/densityWoodChipsBulkOD); lognormal variance with pedigree 0.488, pedigree (1,5,5,5,3)
  (same comment as for Ammonia)
- Nitrogen oxides [air, unspecified]: 0.450181 kg; = 0.19341+(0.000127/0.000238)*(amountWoodChips/densityWoodChipsBulkOD); lognormal variance with pedigree 0.488, pedigree (1,5,5,5,3)
  On-site process and emissions from energy production from wood.
  Energy production from wood and its emissions are modelled using ecoinvent 2.2 dataset "Wood chips, from industry, softwood, burned in furnace 300kW/CH".
  Emission is calculated per m3 of wood chips using the original dataset:
  ((emission/MJ)/(0,000238m3/MJproduced)
  Emission per m3 is multiplied by the m3 of wood chips burned:
  (amount (in kg))/density (kg/m3)
  Uncertainty: DQP values adapted from original dataset (“heat production, softwood chips from industry, at furnace 300kW”) . This uncertainty is multiplied by uncertainty of the wood chips amount.
- PAH, polycyclic aromatic hydrocarbons [air, unspecified]: 2.24725e-5 kg; = (1.11E-08/0.000238)*(amountWoodChips/densityWoodChipsBulkOD); lognormal variance with pedigree 0.488, pedigree (1,5,5,5,3)
  (same comment as for Ammonia)
- Particulate Matter, < 2.5 um [air, unspecified]: 0.318218 kg; lognormal variance with pedigree 0.081825, pedigree (2,3,5,2,2)
  On-site process and emissions from energy production from wood.
- Particulate Matter, > 10 um [air, unspecified]: 0.223518 kg; lognormal variance with pedigree 0.161825, pedigree (2,3,5,2,2)
  On-site process related particulates are typically released during the drying and pressing of the OSB products.
  Calculated value from total particulates and PM<10 um
  Uncertainty: Variance from default value table. Data for process emissions collected from Canadian entreprises.
- Particulate Matter, > 2.5 um and < 10um [air, unspecified]: 0.112944 kg; lognormal variance with pedigree 0.081825, pedigree (2,3,5,2,2)
  On-site process related particulates are typically released during the drying and pressing of the OSB products. Calculated value from PM<10 um and PM<2.5 um.
  Uncertainty: Variance from default values table. Data for process emissions collected from Canadian entreprises.
- Pentachlorophenol [air, unspecified]: 1.63988e-8 kg; = (8.10E-12/0.000238)*(amountWoodChips/densityWoodChipsBulkOD); lognormal variance with pedigree 0.488, pedigree (1,5,5,5,3)
  (same comment as for Ammonia)
- Phenol [air, unspecified]: 0.00966068 kg; lognormal variance with pedigree 0.081225, pedigree (1,3,5,2,2)
  On-site process related VOCs are typically released during the drying and pressing of the OSB products
  Uncertainty: Variance from default value table. Data for process emissions collected from Canadian entreprises.
- Phosphorus [air, unspecified]: 0.000607364 kg; = (0.0000003/0.000238)*(amountWoodChips/densityWoodChipsBulkOD); lognormal variance with pedigree 0.488, pedigree (1,5,5,5,3)
  (same comment as for Ammonia)
- Potassium I [air, unspecified]: 0.0473744 kg; = (0.0000234/0.000238)*(amountWoodChips/densityWoodChipsBulkOD); lognormal variance with pedigree 0.488, pedigree (1,5,5,5,3)
  (same comment as for Ammonia)
- Sodium I [air, unspecified]: 0.00263191 kg; = (0.0000013/0.000238)*(amountWoodChips/densityWoodChipsBulkOD); lognormal variance with pedigree 0.488, pedigree (1,5,5,5,3)
  (same comment as for Ammonia)
- Sulfur dioxide [air, unspecified]: 0.00506137 kg; = (0.0000025/0.000238)*(amountWoodChips/densityWoodChipsBulkOD); lognormal variance with pedigree 0.488, pedigree (1,5,5,5,3)
  (same comment as for Ammonia)
- Toluene [air, unspecified]: 0.00310777 kg; = 0.0025049+(0.0000003/0.000238)*(amountWoodChips/densityWoodChipsBulkOD); lognormal variance with pedigree 0.488, pedigree (1,5,5,5,3)
  (same comment as for Nitrogen oxides)
- Water [air, unspecified]: 0.519198 m3; = ((WWMPulpwood*pulpwood+WWMWater*water)-( WWMOSB* amountRP+ WWMResidualWood* amountWoodWasteSold+WWMWasteWood* amountWoodWaste))*1e-3; lognormal variance with pedigree 0.042725, pedigree (3,2,5,2,1)
  Evaporated water during wood combustion.
  Calculated from the mass balance
- Zinc II [air, unspecified]: 0.000607364 kg; = (0.0000003/0.000238)*(amountWoodChips/densityWoodChipsBulkOD); lognormal variance with pedigree 0.488, pedigree (1,5,5,5,3)
  (same comment as for Ammonia)
- m-Xylene [air, unspecified]: 0.000242946 kg; = (0.00000012/0.000238)*(amountWoodChips/densityWoodChipsBulkOD); lognormal variance with pedigree 0.488, pedigree (1,5,5,5,3)
  (same comment as for Ammonia)

## Sampling procedure
Collected data from canadian producers located in Alberta, British-Columbia, Quebec and Ontario. 25% of the surveyed production is located in Quebec.

## Extrapolations
See Geography.
The data for heat production from waste wood (inputs and emissions) have been extrapolated from ecoinvent 2.2 dataset “Wood chips, from industry, softwood, burned in furnace 300kW/CH”. The uncertainty has been adjusted accordingly.

## Review by Christian Bauer 2013-08-29
passed

## Review by Emilia Moreno Ruiz 2015-09-18
broken formula fixed
