# pomegranate production

Dataset: EcoSpold 2, unit process
Geography: RoW
Time period: 2015-01-01 to 2023-12-31
Technology level: current
Classification: ISIC rev.4 ecoinvent: 0124:Growing of pome fruits and stone fruits
Scenario: Business-as-Usual
System model: Allocation, cut-off by classification
Generated by: Sanjeevan Bajaj
Database: ecoinvent
isCopyrightProtected: true
accessRestrictedTo: 1

## General comment
This dataset represents the production of 1 kg of fresh Pomegranate which is a peripheral crop harvested in May, 2016 at a farm located in village- Vadner Bhairav and District- Nashik of Maharashtra. The farm has a yield of 60,000 kg fresh matter per ha for this crop cycle. Harvesting date is 15-May, 2016. Mineral NPK fertilizer input is 54.68-89.69-166.25 kg/ha. Micro/macro nutrients applied are Mg 135.47 kg/ha, Zinc 54.26 kg/ha, Borax 51.67, Manganese sulfate 27.13 kg/ha, Portafer 72.34 kg/ha, and Sulfite 103.62 kg/ha. Organic fertilizer applied amounts to 9000 kg of manure from Local mix slurry. Fungicides used has active ingredient as Carbendazin 750g/ha, Mancozeb 6187.5g/ha. Insecticides used has active ingredient as Dimethoate 900g/ha, Dichlorovos 2280g/ha, Chlorpyriphos 450g/ha, Imidacloprid 267g/ha. Other pesticide used is plant based horticultural oil (neem and Karanj) 15.19 kg/ha. Machinery is used for Pesticide spray with fuel consumption of 6.24 kg/ha and for Nutrient spray with fuel consumption of 18.72 kg/ha.

## Included activities start
This is a perennial crop with periodic harvesting

## Included activities end
The activity ends with the harvesting of the mature Pomegranate from the tree.

## Technology
Cultivation of Pomegranate follows conventional production standards

## Time period
Harvesting date main crop: 15-May, 2016. The cycle of one year is considered for entry in ecoeditor.

## Reference product
- pomegranate: 1 kg; By-product classification allocatable product; CPC 01359: Other fruits, n.e.c.; HS2017 081090: Fruit, edible; fruits n.e.c. in heading no. 0801 to 0810, fresh
  production volume 6.9355e8 kg; = 3*1000*1000000
    https://financialtribune.com/articles/economy-domestic-economy/53155/pomegranate-production-estimated-at-over-1m-tons News item November 2016
  property carbon content, non-fossil 0.475
    biogenic carbon content on a dry matter basis from faostat.
    Reference: http://www.fao.org/forestry/17111/en
  property price 0.644593 EUR2005
    Literature value. Price taken from Agri Exchange (retrieved from: http://agriexchange.apeda.gov.in/Market%20Profile/one/POMEGRANATE.aspx, accessed 15Feb2018). The procurament price, defined as "Cost Calculation from harvest to packhouse to port Showing the cost involved in exporting pomegranate (as per information collected during 2008)" is reported to be 40-60Rs./kg. An averag of 50Rs./kg is here assumed.
  properties: carbon allocation 0.104832 kg, carbon content 0.475, carbon content, fossil 0, dry mass 0.2207 kg, water content 3.53104, water in wet mass 0.7793 kg, wet mass 1 kg

## Inputs from technosphere
- application of plant protection product, by field sprayer: 5.90909e-5 ha; lognormal variance with pedigree 0.0078, pedigree (3,3,3,5,2)
  The data was collected for a hectare area through interview
- benzimidazole-compound: 1.25e-5 kg; lognormal variance with pedigree 0.0078, pedigree (3,3,3,5,2)
  The data was collected for a hectare area through interview
  properties: carbon content, fossil 0.529668, dry mass 1 kg, wet mass 1 kg
- borax, anhydrous, powder: 0.000861167 kg; lognormal variance with pedigree 0.0078, pedigree (3,3,3,5,2)
  The data was collected for a hectare area through interview
  properties: dry mass 1 kg, wet mass 1 kg
- compost: 0.15 kg; lognormal variance with pedigree 0.0078, pedigree (3,3,3,5,2)
  The data was collected for a hectare area through interview
  property cadmium content 3.6e-7; name Cd_content
  property chromium content 2.23e-5; name Cr_content
  property copper content 5.77e-5; name Cu_content
  property dry mass 0.5 kg; name DM
  property lead content 4.9e-5; name Pb_content
  property mercury content 1.2e-7; name Hg_content
  property nickel content 1.63e-5; name Ni_content
  property nitrogen content 0.014; name N_content
  property phosphorus content 0.0035; name P_content
  property potassium content 0.01; name K_content
  property zinc content 0.000184; name Zn_content
  properties: carbon content, non-fossil 0.183645, water content 1, wet mass 1 kg
- cyclic N-compound: 4.45e-6 kg; lognormal variance with pedigree 0.0078, pedigree (3,3,3,5,2)
  The data was collected for a hectare area through interview
  properties: carbon content, fossil 0.641962, dry mass 1 kg, wet mass 1 kg
- diesel, burned in agricultural machinery: 0.0140414 MJ; lognormal variance with pedigree 0.0078, pedigree (3,3,3,5,2)
  The data was collected for a hectare area through interview
- dolomite: 0.0111982, 0.00593184 kg (2 suppliers, which the file names only by identifier); sum of these 0.0171301 kg; lognormal variance with pedigree 0.0078, pedigree (3,3,3,5,2)
  The data was collected for a hectare area through interview
  properties: carbon content, fossil 0.130435, dry mass 1 kg, heating value, net 3.95 MJ, wet mass 1 kg
- establishing orchard: 0.000729167 unit; lognormal variance with pedigree 0.0078, pedigree (3,3,3,5,2)
  The data was collected for a hectare area through interview
- fruit tree seedling, for planting: 0.000729167 unit; lognormal variance with pedigree 0.0078, pedigree (3,3,3,5,2)
  The data was collected for a hectare area through interview
  properties: carbon content, non-fossil 1, dry mass 0.03 kg, wet mass 0.03 kg
- inorganic nitrogen fertiliser, as N: 3.29656e-8, 7.73559e-6, 9.17624e-7, 9.85375e-6, 2.25396e-6, 9.54525e-7, 8.79738e-6, 8.26107e-7, 5.79554e-6, 5.92888e-7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 kg (29 suppliers, which the file names only by identifier); sum of these 0.0009115 kg; lognormal variance with pedigree 0.0078, pedigree (3,3,3,5,2)
  The data was collected for a hectare area through interview
  properties: dry mass 1 kg, wet mass 1 kg
- inorganic phosphorus fertiliser, as P2O5: 1.14212e-5, 2.53512e-5, 0.000219329, 7.07824e-6, 1.73829e-6, 2.46152e-6, 6.14112e-6, 8.06611e-7, 3.9533e-6, 9.42557e-8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 kg (29 suppliers, which the file names only by identifier); sum of these 0.00149483 kg; lognormal variance with pedigree 0.0078, pedigree (3,3,3,5,2)
  The data was collected for a hectare area through interview
  properties: dry mass 1 kg, wet mass 1 kg
- irrigation: 7.09153e-5, 0.00141819, 0.0865417, 0.00109259, 0.00292944, 0.00402675, 0.312187, 0.000639116, 1.64372e-5, 0.038408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 m3 (16 suppliers, which the file names only by identifier); sum of these 0.479733 m3; lognormal variance with pedigree 0.0078, pedigree (3,3,3,5,2)
  The data was collected for a hectare area through interview
  properties: dry mass 0.11 kg, water content 9089.91, wet mass 1000 kg
- mancozeb: 0.000103125 kg; lognormal variance with pedigree 0.0078, pedigree (3,3,3,5,2)
  The data was collected for a hectare area through interview
  properties: carbon content, fossil 0.17759, dry mass 1 kg, wet mass 1 kg
- manganese sulfate: 0.000452167 kg; lognormal variance with pedigree 0.0078, pedigree (3,3,3,5,2)
  The data was collected for a hectare area through interview
  property molecular weight 0 g/mol; name manganese_sulfate_output_MW
  properties: dry mass 1 kg, wet mass 1 kg
- naphtha: 3.3056e-7, 4.14014e-6, 0.000195174, 1.3642e-6, 4.35722e-5, 8.58597e-6 kg (6 suppliers, which the file names only by identifier); sum of these 0.000253167 kg; lognormal variance with pedigree 0.0078, pedigree (3,3,3,5,2)
  Neem & Karanj
  properties: carbon content, fossil 0.919743, dry mass 1 kg, heating value, net 45 MJ, wet mass 1 kg
- organophosphorus-compound, unspecified: 6.05e-5 kg; lognormal variance with pedigree 0.0078, pedigree (3,3,3,5,2)
  This exchange is an aggregation of amounts:
  1.5E-5. Comment:
  7.5E-6. Comment:
  3.7999999999999995E-5. Comment:
  properties: carbon content, fossil 0.260898, dry mass 1 kg, wet mass 1 kg
- packaging, for fertilisers: 0.0446145 kg; lognormal variance with pedigree 0.0532, pedigree (4,3,3,5,4)
  Total amount of active substance/s of fertilisers needed for the production of 'pomegranate' is calculated to be circa 2.23E-02 kg. Fertiliser/s used in this dataset is/are: 'dolomite', 'nitrogen fertiliser, as N', 'phosphate fertiliser, as P2O5', 'potassium sulfate, as K2O'. The total amount of active substance/s is doubled in order to account for the packaging of the dilluted product of fertiliser/s that is/are applied. Therefore, 4.46E-02 kg of packaging for fertilisers is justified with this exchange.
  properties: carbon content, fossil 0.825301, dry mass 1 kg, heating value, net 25.01 MJ, price 0.0642 EUR2005, wet mass 1 kg
  note on carbon content, fossil: Considering a chemical formula (C2H4)n for polyethylene, carbon content-fossil is calculated to be 0.856286 kg of Carbon per kg of dry mass.
- packaging, for pesticides: 0.0136221 kg; lognormal variance with pedigree 0.0532, pedigree (4,3,3,5,4)
  Total amount of active substance/s of pesticides needed for the production of pomegranate is calculated to be circa 6.81E-03 kg. Pesticide/s used in this dataset is/are: 'benzimidazole-compound', 'borax, anhydrous, powder', 'cyclic N-compound', 'mancozeb', 'manganese sulfate', 'organophosphorus-compound, unspecified', 'portafer', 'sulfite', 'zinc monosulfate'. The total amount of active substance/s is doubled in order to account for the packaging of the dilluted product of pesticide/s that is/are applied. Therefore, 1.36E-02 kg of packaging for pesticides is justified with this exchange.
  properties: carbon content, fossil 0.85714, dry mass 1 kg, heating value, net 25.97 MJ, price 0.0642 EUR2005, wet mass 1 kg
- planting tree: 0.000729167 unit; lognormal variance with pedigree 0.0078, pedigree (3,3,3,5,2)
  The data was collected for a hectare area through interview
- polyethylene, high density, granulate: 0.00416667 kg; lognormal variance with pedigree 0.0078, pedigree (3,3,3,5,2)
  The data was collected for a hectare area through interview
  properties: carbon content, fossil 0.857143, dry mass 1 kg, heating value, net 42.47 MJ, wet mass 1 kg
  note on carbon content, fossil: Polyethylene is formed out of a huge amount of ethylene monomers (C2H4) (ecoinvent v2.2 report 11_II). MW=28 g/mol
- portafer: 0.00120567 kg; lognormal variance with pedigree 0.0078, pedigree (3,3,3,5,2)
  The data was collected for a hectare area through interview
  properties: dry mass 1 kg, wet mass 1 kg
- potassium sulfate: 0.000891914, 0.00423403 kg (2 suppliers, which the file names only by identifier); sum of these 0.00512594 kg; lognormal variance with pedigree 0.0078, pedigree (3,3,3,5,2)
  The exchange has been updated from 'potassium sulfate, as K2O' into 'potassium sulfate' and therefore its amount has been scaled (multiplied) from 0.0028 kg by 1.85 kg of 'potassium sulfate' per kg of 'potassium sulfate, as K2O'. Original comment of the exchange is: The data was collected for a hectare area through interview
  properties: dry mass 1 kg, wet mass 1 kg
- sulfite: 0.00115607, 0.000570933 kg (2 suppliers, which the file names only by identifier); sum of these 0.001727 kg; lognormal variance with pedigree 0.0078, pedigree (3,3,3,5,2)
  The data was collected for a hectare area through interview
  properties: dry mass 1 kg, wet mass 1 kg
- trellis system, wooden poles, soft wood, tar impregnated: 1.66667e-5 ha; lognormal variance with pedigree 0.0078, pedigree (3,3,3,5,2)
  The data was collected for a hectare area through interview
- zinc monosulfate: 0.00200496, 0.000379535 kg (2 suppliers, which the file names only by identifier); sum of these 0.0023845 kg; lognormal variance with pedigree 0.0078, pedigree (3,3,3,5,2)
  The data was collected for a hectare area through interview
  properties: dry mass 1 kg, wet mass 1 kg

## Inputs from nature
- Carbon dioxide, in air [natural resource, in air]: 0.379683 kg; lognormal variance with pedigree 0.0078, pedigree (3,3,3,5,2)
  Calculated Value. This value has been calculated by using the ecoinvent LCI calculation tool for crop production.
- Energy, gross calorific value, in biomass [natural resource, biotic]: 4.367 MJ; lognormal variance with pedigree 0.0078, pedigree (3,3,3,5,2)
  The data was collected for a hectare area through interview
- Occupation, permanent crop, irrigated [natural resource, land]: 0.166667 m2*year; lognormal variance with pedigree 0.0092, pedigree (3,3,3,5,2)
  (same comment as for Carbon dioxide, in air)
- Transformation, from permanent crop, irrigated [natural resource, land]: 0.00833333 m2; lognormal variance with pedigree 0.0152, pedigree (3,3,3,5,2)
  (same comment as for Carbon dioxide, in air)
- Transformation, to permanent crop, irrigated [natural resource, land]: 0.00833333 m2; lognormal variance with pedigree 0.0152, pedigree (3,3,3,5,2)
  (same comment as for Carbon dioxide, in air)

## Emissions to nature
- Ammonia [air, non-urban air or from high stacks]: 0.000171516 kg; lognormal variance with pedigree 0.0286, pedigree (4,5,3,5,2)
  (same comment as for Carbon dioxide, in air)
- Carbon dioxide, fossil [air, non-urban air or from high stacks]: 0.0081766 kg; lognormal variance with pedigree 0.0212, pedigree (4,5,3,5,2)
  (same comment as for Carbon dioxide, in air)
- Dinitrogen monoxide [air, non-urban air or from high stacks]: 4.56135e-5 kg; lognormal variance with pedigree 0.0506, pedigree (4,5,3,5,2)
  (same comment as for Carbon dioxide, in air)
- Nitrogen oxides [air, non-urban air or from high stacks]: 0.000120295 kg; lognormal variance with pedigree 0.0606, pedigree (4,5,3,5,2)
  (same comment as for Carbon dioxide, in air)
- Water [air, non-urban air or from high stacks]: 0.244664 m3; lognormal variance with pedigree 0.0212, pedigree (4,5,3,5,2)
  (same comment as for Carbon dioxide, in air)
- Cadmium II [soil, agricultural]: 7.02655e-8 kg; lognormal variance with pedigree 0.0606, pedigree (4,5,3,5,2)
  (same comment as for Carbon dioxide, in air)
- Carbendazim [soil, agricultural]: 1.25e-5 kg; lognormal variance with pedigree 0.0536, pedigree (4,5,3,5,2)
  Carbendazim is used as pesticide
- Chlorpyrifos [soil, agricultural]: 7.5e-6 kg; lognormal variance with pedigree 0.0536, pedigree (4,5,3,5,2)
  Chlorpyrifos is used as pesticide
- Chromium III [soil, agricultural]: 1.92043e-6 kg; lognormal variance with pedigree 0.0606, pedigree (4,5,3,5,2)
  (same comment as for Carbon dioxide, in air)
- Copper ion [soil, agricultural]: 2.8532e-6 kg; lognormal variance with pedigree 0.0606, pedigree (4,5,3,5,2)
  (same comment as for Carbon dioxide, in air)
- Dichlorvos [soil, agricultural]: 3.8e-5 kg; lognormal variance with pedigree 0.0536, pedigree (4,5,3,5,2)
  The data was collected for a hectare area through interview
- Dimethoate [soil, agricultural]: 1.5e-5 kg; lognormal variance with pedigree 0.0536, pedigree (4,5,3,5,2)
  Dimethoate is used as pesticide
- Imidacloprid [soil, agricultural]: 4.45e-6 kg; lognormal variance with pedigree 0.0536, pedigree (4,5,3,5,2)
  Metalaxil is used as pesticide
- Lead II [soil, agricultural]: 3.24592e-6 kg; lognormal variance with pedigree 0.0606, pedigree (4,5,3,5,2)
  (same comment as for Carbon dioxide, in air)
- Mancozeb [soil, agricultural]: 0.000103125 kg; lognormal variance with pedigree 0.0536, pedigree (4,5,3,5,2)
  Mancozeb is used as pesticide
- Mercury II [soil, agricultural]: 7.89622e-10 kg; lognormal variance with pedigree 0.0606, pedigree (4,5,3,5,2)
  (same comment as for Carbon dioxide, in air)
- Mineral oil [soil, agricultural]: 0.000253167 kg; lognormal variance with pedigree 0.0536, pedigree (4,5,3,5,2)
  Neem & Karanj
- Nickel II [soil, agricultural]: 9.71135e-7 kg; lognormal variance with pedigree 0.0606, pedigree (4,5,3,5,2)
  (same comment as for Carbon dioxide, in air)
- Zinc II [soil, agricultural]: 0.000922237 kg; lognormal variance with pedigree 0.0606, pedigree (4,5,3,5,2)
  (same comment as for Carbon dioxide, in air)
- Cadmium II [water, ground-]: 7.50177e-10 kg; lognormal variance with pedigree 0.1106, pedigree (4,5,3,5,2)
  (same comment as for Carbon dioxide, in air)
- Cadmium II [water, surface water]: 1.39093e-9 kg; lognormal variance with pedigree 0.1106, pedigree (4,5,3,5,2)
  (same comment as for Carbon dioxide, in air)
- Chromium III [water, ground-]: 3.45187e-7 kg; lognormal variance with pedigree 0.1106, pedigree (4,5,3,5,2)
  (same comment as for Carbon dioxide, in air)
- Chromium III [water, surface water]: 1.32756e-7 kg; lognormal variance with pedigree 0.1106, pedigree (4,5,3,5,2)
  (same comment as for Carbon dioxide, in air)
- Copper ion [water, ground-]: 5.94834e-8 kg; lognormal variance with pedigree 0.1106, pedigree (4,5,3,5,2)
  (same comment as for Carbon dioxide, in air)
- Copper ion [water, surface water]: 1.95593e-7 kg; lognormal variance with pedigree 0.1106, pedigree (4,5,3,5,2)
  (same comment as for Carbon dioxide, in air)
- Lead II [water, ground-]: 9.23788e-9 kg; lognormal variance with pedigree 0.1106, pedigree (4,5,3,5,2)
  (same comment as for Carbon dioxide, in air)
- Lead II [water, surface water]: 1.15769e-7 kg; lognormal variance with pedigree 0.1106, pedigree (4,5,3,5,2)
  (same comment as for Carbon dioxide, in air)
- Mercury II [water, ground-]: 2.01234e-11 kg; lognormal variance with pedigree 0.1106, pedigree (4,5,3,5,2)
  (same comment as for Carbon dioxide, in air)
- Mercury II [water, surface water]: 3.59932e-10 kg; lognormal variance with pedigree 0.1106, pedigree (4,5,3,5,2)
  (same comment as for Carbon dioxide, in air)
- Nickel II [water, surface water]: 1.17199e-7 kg; lognormal variance with pedigree 0.1106, pedigree (4,5,3,5,2)
  (same comment as for Carbon dioxide, in air)
- Nitrate [water, ground-]: 0.00450965 kg; lognormal variance with pedigree 0.0606, pedigree (4,5,3,5,2)
  (same comment as for Carbon dioxide, in air)
- Phosphate [water, ground-]: 3.06619e-6 kg; lognormal variance with pedigree 0.0606, pedigree (4,5,3,5,2)
  (same comment as for Carbon dioxide, in air)
- Phosphate [water, surface water]: 1.56404e-5 kg; lognormal variance with pedigree 0.0606, pedigree (4,5,3,5,2)
  (same comment as for Carbon dioxide, in air)
- Phosphorus [water, surface water]: 1.03409e-5 kg; lognormal variance with pedigree 0.0606, pedigree (4,5,3,5,2)
  (same comment as for Carbon dioxide, in air)
- Water [water, ground-]: 0.187096 m3; lognormal variance with pedigree 0.0212, pedigree (4,5,3,5,2)
  (same comment as for Carbon dioxide, in air)
- Water [water, surface water]: 0.0479733 m3; lognormal variance with pedigree 0.0212, pedigree (4,5,3,5,2)
  (same comment as for Carbon dioxide, in air)
- Zinc II [water, ground-]: 5.49112e-7 kg; lognormal variance with pedigree 0.1106, pedigree (4,5,3,5,2)
  (same comment as for Carbon dioxide, in air)
- Zinc II [water, surface water]: 3.52239e-7 kg; lognormal variance with pedigree 0.1106, pedigree (4,5,3,5,2)
  (same comment as for Carbon dioxide, in air)

## Sampling procedure
The farmer was identified and contacted by agriculture science faculty through agriculture consultant familiar with the local farmers in the region. Data was collected directly from the farmer through semi-structured interview using a questionnaire based on the input requirements of the ecoinvent LCI calculation tool for crop production. Supplemented with information collected from farming community of the area.

## Extrapolations
Ecoinvent LCI calculation tool for crop production was used to calculate field emissions from the cultivation process.
