# benzaldehyde production

Dataset: EcoSpold 2, unit process
Geography: RER
Time period: 2000-01-01 to 2023-12-31
Technology level: current
Classification: ISIC rev.4 ecoinvent: 2011:Manufacture of basic chemicals
Classification: EcoSpold01Categories: chemicals/organics
Tags: ConvertedDataset
Scenario: Business-as-Usual
System model: Allocation, cut-off by classification
Share of production covered: 100 %
Generated by: Jürgen Sutter
Published in: Sutter, J. 2007
Database: ecoinvent
isCopyrightProtected: true
accessRestrictedTo: 1

## General comment
This data represents the production of 1 kg of benzaldehyde from benzal chloride. Raw materials are modelled with a stoichiometric calculation. Energy consumptions are modelled with literature data. The emissions are estimated. Infrastructure is included with a default value.
[This dataset was already contained in the ecoinvent database version 2. It was not individually updated during the transfer to ecoinvent version 3. Life Cycle Impact Assessment results may still have changed, as they are affected by changes in the supply chain, i.e. in other datasets. This dataset was generated following the ecoinvent quality guidelines for version 2. It may have been subject to central changes described in the ecoinvent version 3 change report (http://www.ecoinvent.org/database/ecoinvent-version-3/reports-of-changes/), and the results of the central updates were reviewed extensively. The changes added e.g. consistent water flows and other information throughout the database. The documentation of this dataset can be found in the ecoinvent reports of version 2, which are still available via the ecoinvent website. The change report linked above covers all central changes that were made during the conversion process.]

## Included activities start
From the reception of benzal chloride at the factory gate.

## Included activities end
This activity ends with 1 kg of benzaldehyde, 100% at the factory gate. The dataset includes the input materials, energy uses, infrastructure and emissions.

## Geography
The inventory is modelled for Europe.

## Technology
Benzaldehyde is produced by the hydrolysis of benzal chloride.
Reference:
Brühne, F., Wright: Benzaldehyde. In: Ullmann's Encyclopedia of Industrial Chemistry, Seventh Edition, 2004 Electronic Release (ed. Fiedler E., Grossmann G., Kersebohm D., Weiss G. and Witte C.). 7 th Electronic Release Edition. Wiley InterScience, New York, Online-Version under: http://www.mrw.interscience.wiley.com/ueic/articles/

## Time period
Time of publications

## Parameters
- fraction, cooling water, cooling pond system, to air: 0.032 dimensionless; name fraction_CW_CP_to_air; lognormal variance with pedigree 0.0413, pedigree (2,3,1,3,1)
  Calculated based on literature value (Scown, C.D., 2011, Water Footprint of U.S. Transportation Fuels and supplying information of the article) (Vionnet, S., Quantis Water Database - Technical Report, 2012).
- fraction, cooling water, once-through system, to air: 0.004 dimensionless; name fraction_CW_OT_to_air; lognormal variance with pedigree 0.0413, pedigree (2,3,1,3,1)
  (same comment as for fraction, cooling water, cooling pond system, to air)
- fraction, cooling water, recirculating system, to air: 0.771 dimensionless; name fraction_CW_R_to_air; lognormal variance with pedigree 0.0413, pedigree (2,3,1,3,1)
  (same comment as for fraction, cooling water, cooling pond system, to air)
- fraction, cooling water, to air: 0.3875 dimensionless; name fraction_CW_to_air; = (0.5*fraction_CW_OT_to_air)+(0.5*fraction_CW_R_to_air); lognormal variance with pedigree 0.092025, pedigree (4,4,3,2,4)
  Calculated value based on literature value (see comments of the other parametres present in this dataset) and expert opinion. In the case when no industry/literature data are available about the type of cooling or directly fraction, cooling water, to air specific for the process a default assumption is applied. It is assumed that the once-through cooling system is used in 50% of all cases and recirculating system is used in another 50% of all cases.

## Reference product
- benzaldehyde: 1 kg; By-product classification allocatable product; CPC 34170: Ethers, alcohol peroxides, ether peroxides, epoxides, acetals and hemiacetals, and their halogenated, sulphona[…]; HS2017 291221: Aldehydes; cyclic, without other oxygen function, benzaldehyde; CAS 100-52-7
  Benzaldehyde is a colorless and highly refractive liquid with an odor of bitter almonds. Like many other aromatic aldehydes, it is volatile in steam.
  Benzaldehyde is an important starting material for the manufacture of odorants and flavors. The compound is responsible for the odor of natural bitter almond oil and is incorporated directly in perfumes, soaps, foods, drinks, and other products. Substantial amounts are used in the production of derivatives that are also employed in the perfume and flavor industries. Another application of benzaldehyde is the production of triphenylmethane dyes. For example, the leuco base of Malachite Green is obtained by condensation of benzaldehyde with dimethylaniline. The acridine dye benzoflavin is obtained from benzaldehyde and m-toluenediamine. In the pharmaceutical industry benzaldehyde is used as an intermediate in the manufacture of chloramphenicol, ephedrin, ampicillin, diphenylhydantoin, and other products.
  Other important chemical intermediates obtained from benzaldehyde are benzoin, benzylamine, benzyl alcohol, mandelic acid, and benzylideneacetone. Benzaldehyde is used in photochemistry, as a corrosion inhibitor and dyeing auxiliary, in the electroplating industry, and in the production of agricultural chemicals. The use of benzaldehyde in the extractive separation of isomeric amines has been proposed.
  EcoSpold01Location=RER
  production volume 1.32237 kg
    This is a placeholder value that does not reflect real-world production volumes. This dataset does not currently require a real-world production volume to work in the database framework, and no actual data were collected yet. This has no negative effect on the results of the ecoinvent database. The placeholder value of this activity was scaled according to the nominal GDP of 2005 (source: United Nations, http://data.un.org/Glossary.aspx?q=GDP+%28current+US%24%29, accessed 20130726) to reflect an appropriate share of the global production volume, which is also a placeholder value.
  property heating value, net 30.86 MJ
    LHV is calculated based on the elemental composition of the substance. Based on the CAS number of the substance (000100-52-7), the chemical formula of the substance is found to be: C7H6O, (PubChem 2020).
    Reference: Kim, S., Chen, J., Cheng, T., Gindulyte, A., He, J., He, S., Li, Q., Shoemaker, B. A., Thiessen, P. A., Yu, B., Zaslavsky, L., Zhang, J., & Bolton, E. E. (2019). PubChem 2019 update: improved access to chemical data. Nucleic acids research, 47(D1), D1102–D1109. https://doi.org/10.1093/nar/gky1033
  property price 1.78 EUR2005
    Calculated value based on data from United Nations Commodity Trade Statistics Database (comtrade.un.org). UN comtrade category: 291221 Benzaldehyde. Year 2005. Using exchange rate of 1EURO = 1.209 USD. Average of price of import into 5 main markets (EU, US, JP, IN and CN).
  properties: carbon allocation 0.792252 kg, carbon content 0.792252, carbon content, fossil 0.792252, carbon content, non-fossil 0, dry mass 1 kg, water content 0, water in wet mass 0 kg, wet mass 1 kg

## Inputs from technosphere
- benzal chloride: 1.5889 kg; source Frischknecht R. 2007; lognormal variance with pedigree 0.076, pedigree (4,5,5,1,1)
  EcoSpold01Location=RER
  Stoichiometric calculation. The values were calculated with an assumed yield of 95 %.
  Uncertainty: Stoechiometric calculation
  properties: carbon content, fossil 0.525, dry mass 1 kg, heating value, net 20.34 MJ, wet mass 1 kg
- chemical factory, organics: 4e-10 unit; lognormal variance with pedigree 0.448, pedigree (4,5,5,5,5)
  EcoSpold01Location=RER
  Estimation. Data was estimated based on the dataset "chemical plant, organics". This module assumes a built area of about 4.2 ha, an average output of 50'000 t/a, and plant life of fifty years. The estimated value is 4.00 E-10 units per kg of produced chemical.
  Uncertainty: Estimation
- electricity, medium voltage: 0.0747864 kWh; source Gwalior 2005; lognormal variance with pedigree 0.0426, pedigree (1,3,5,5,1)
  EcoSpold01Location=UCTE
  Literature value. Data from a production plant in India.
  Uncertainty: Gwalior 2005
- heat, district or industrial, natural gas: 4.2408 MJ; source Gwalior 2005; lognormal variance with pedigree 0.0426, pedigree (1,3,5,5,1)
  Literature value. Data from a production plant in India.
  Uncertainty: Gwalior 2005
  properties: heating value, net 1 MJ
- heat, district or industrial, other than natural gas: 2.36704 MJ; source Gwalior 2005; lognormal variance with pedigree 0.0426, pedigree (1,3,5,5,1)
  Literature value. Data from a production plant in India.
  Uncertainty: Gwalior 2005
  properties: heating value, net 1 MJ
- wastewater, average: -5.58244e-8, -2.2213e-6 m3 (2 suppliers, which the file names only by identifier); sum of these -2.27712e-6 m3; lognormal variance with pedigree 0.0438, pedigree (2,4,1,4,4)
  Calculated based on literature data published by the GENDORF Chemical Park. The factory produced an average of 2462760 tonnes of chemical substances (including intermediates) per year in the years 2015-2019. The average ouput of wastewater going to an external wastewater treatment plant in the years 2015-2019 was 5608 m3 per year. This equals 0.000002277 m3/kg chemical produced.
  References:
  Chemiepark GENDORF, Umwelterklärung 2016, https://www.gendorf.de/Nachbarn/Umweltschutz/Industrie%20und%20Nachhaltigkeit
  Chemiepark GENDORF, Umwelterklärung 2017, https://www.gendorf.de/Nachbarn/Umweltschutz/Industrie%20und%20Nachhaltigkeit
  Chemiepark GENDORF, Umwelterklärung 2020, https://www.gendorf.de/Nachbarn/Umweltschutz/Industrie%20und%20Nachhaltigkeit
  properties: carbon content, non-fossil 0.194039, dry mass 0.346837 kg, mass concentration, TOC 0.1091 kg/m3, mass concentration, calcium 0.039453 kg/m3, mass concentration, chlorine 0.030031 kg/m3, mass concentration, hydrogen 0.013365 kg/m3, mass concentration, nitrogen 0.031015 kg/m3, mass concentration, oxygen 0.069824 kg/m3, mass concentration, sodium 0.06456 kg/m3, mass concentration, sulfur 0.015602 kg/m3, water content 2882.2, wet mass 1000 kg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
  note on carbon content, non-fossil: 0.0673 kg TOC/m3 (Tab A.17, ecoinvent v2.2 report 13_I). TOC was considered as Total Carbon.

## Inputs from nature
- Water, cooling, unspecified natural origin [natural resource, in water]: 0.014707 m3; source Gendorf 2000; lognormal variance with pedigree 0.0838, pedigree (2,4,5,4,4)
  Calculated based on literature data published by the GENDORF Chemical Park. The factory produced an average of 2462760 tonnes of chemical substances (including intermediates) per year in the years 2015-2019. The average amount of cooling water released in the years 2015-2019 was 34408800 t per year. It was assumed that 5% of the cooling water was emitted to air during its use, therefore, to calculate the input of cooling water, the output value reported by GENDORF was scaled up by the factor 1/0.95. This equals 0.014707 m3/kg chemical produced.
  References:
  Chemiepark GENDORF, Umwelterklärung 2016, https://www.gendorf.de/Nachbarn/Umweltschutz/Industrie%20und%20Nachhaltigkeit
  Chemiepark GENDORF, Umwelterklärung 2017, https://www.gendorf.de/Nachbarn/Umweltschutz/Industrie%20und%20Nachhaltigkeit
  Chemiepark GENDORF, Umwelterklärung 2020, https://www.gendorf.de/Nachbarn/Umweltschutz/Industrie%20und%20Nachhaltigkeit
  Uncertainty: Estimation
- Water, river [natural resource, in water]: 0.000965426 m3; lognormal variance with pedigree 0.0838, pedigree (2,4,5,4,4)
  Calculated based on literature data published by the GENDORF Chemical Park. The factory produced an average of 2462760 tonnes of chemical substances (including intermediates) per year in the years 2015-2019. The average consumption of river water in the years 2015-2019 was 22000820 t per year. However, since the cooling water is modelled as an input, the amount of river water was adjusted to avoid double counting. 55% of the input amount of cooling water was deducted from the amount of river water, as that is the share of river water versus well water. This equals 0.00096543 m3/kg chemical produced.
  References:
  Chemiepark GENDORF, Umwelterklärung 2016, https://www.gendorf.de/Nachbarn/Umweltschutz/Industrie%20und%20Nachhaltigkeit
  Chemiepark GENDORF, Umwelterklärung 2017, https://www.gendorf.de/Nachbarn/Umweltschutz/Industrie%20und%20Nachhaltigkeit
  Chemiepark GENDORF, Umwelterklärung 2020, https://www.gendorf.de/Nachbarn/Umweltschutz/Industrie%20und%20Nachhaltigkeit
- Water, well, in ground [natural resource, in water]: 0.000816522 m3; lognormal variance with pedigree 0.0838, pedigree (2,4,5,4,4)
  Calculated based on literature data published by the GENDORF Chemical Park. The factory produced an average of 2462760 tonnes of chemical substances (including intermediates) per year in the years 2015-2019. The average consumption of well water in the years 2015-2019 was 18607480 t per year. However, since the cooling water is modelled as an input, the amount of well water was adjusted to avoid double counting. 45% of the input amount of cooling water was deducted from the amount of well water, as that is the share of well water versus river water. This equals 0.00081652 m3/kg chemical produced.
  References:
  Chemiepark GENDORF, Umwelterklärung 2016, https://www.gendorf.de/Nachbarn/Umweltschutz/Industrie%20und%20Nachhaltigkeit
  Chemiepark GENDORF, Umwelterklärung 2017, https://www.gendorf.de/Nachbarn/Umweltschutz/Industrie%20und%20Nachhaltigkeit
  Chemiepark GENDORF, Umwelterklärung 2020, https://www.gendorf.de/Nachbarn/Umweltschutz/Industrie%20und%20Nachhaltigkeit

## Emissions to nature
- Benzal chloride [air, urban air close to ground]: 0.0031778 kg; lognormal variance with pedigree 0.188, pedigree (4,5,5,5,5)
  Estimation. Air emissions occurring from the purge vent, the distillation vent and fugitive emission sources were estimated to be 0.2% of the raw material input.
  It is assumed that the manufacturing plants are located in an urban/industrial area and consequently the emissions are categorised as emanating in a high population density area.
  Uncertainty: Estimation
- Carbon dioxide, fossil [air, urban air close to ground]: 0.13213 kg; lognormal variance with pedigree 0.1786, pedigree (4,5,5,5,5)
  Estimation. The carbon contained in the removed benzal chloride during waste water treatment was accounted for as CO2 emissions to air.
  It is assumed that the manufacturing plants are located in an urban/industrial area and consequently the emissions are categorised as emanating in a high population density area.
  Uncertainty: Calculated from the carbon balance
- Water [air, unspecified]: 0.00147008 m3; lognormal variance with pedigree 0.1232, pedigree (2,4,5,4,4)
  Calculated based on literature data published by the GENDORF Chemical Park. The factory produced an average of 2462760 tonnes of chemical substances (including intermediates) per year in the years 2015-2019. To determine the emissions of water to air, the difference of all water inputs (from river, well, tap water and cooling) and outputs (wastewater, emissions to water) was calculated. The average ouput of water to air in the years 2015-2019 was 3620444 m3 per year. This equals 0.00147 m3/kg chemical produced. For more information on the other water exchanges please consult the respective exchange comment.
  References:
  Chemiepark GENDORF, Umwelterklärung 2016, https://www.gendorf.de/Nachbarn/Umweltschutz/Industrie%20und%20Nachhaltigkeit
  Chemiepark GENDORF, Umwelterklärung 2017, https://www.gendorf.de/Nachbarn/Umweltschutz/Industrie%20und%20Nachhaltigkeit
  Chemiepark GENDORF, Umwelterklärung 2020, https://www.gendorf.de/Nachbarn/Umweltschutz/Industrie%20und%20Nachhaltigkeit
  property fraction, origin: fresh water 0; name fraction_origin_fresh_water
  property fraction, origin: salt water 0; name fraction_origin_salt_water
  property fraction, origin: unspecified 1; name fraction_origin_unspecified
- AOX, Adsorbable Organic Halides [water, surface water]: 0.00216 kg; lognormal variance with pedigree 0.188, pedigree (4,5,5,5,5)
  Estimation. The chloride contained in the removed benzal chloride and in the hydrogen chloride byproduct was assumed to leave the the production process as chloride emission in the waste water. The value for AOX is calculated from the chloride and the benzal chloride emissions.
  Uncertainty: Calculated from mass blanace
- BOD5, Biological Oxygen Demand [water, surface water]: 0.00373 kg; lognormal variance with pedigree 0.188, pedigree (4,5,5,5,5)
  Calculation. This data was calculated from the amount of emissions in the treated waste water assuming a carbon conversion of 96% for COD and the worst case scenario: BOD=COD.
  It is assumed that the manufacturing plants are located in an urban/industrial area and consequently the emissions are categorized as emanating in a high population density area. The emissions into water are assumed to be emitted into rivers.
  Uncertainty: Calculated from the water emissions
- Benzal chloride [water, surface water]: 0.0076266 kg; lognormal variance with pedigree 0.188, pedigree (4,5,5,5,5)
  Estimation. The remaining amount of unreacted benzal chloride (4.8 % of the input) was assumed to leave the production process with the waste water. This waste water was treated in an internal waste water plant with an assumed removal efficiency of 90% for benzal chloride.
  It is assumed that the manufacturing plants are located in an urban/industrial area and consequently the emissions are categorised as emanating in a high population density area.
  The emissions into water are assumed to be emitted into rivers.
  Uncertainty: Estimation
- COD, Chemical Oxygen Demand [water, surface water]: 0.00373 kg; lognormal variance with pedigree 0.188, pedigree (4,5,5,5,5)
  (same comment as for BOD5, Biological Oxygen Demand)
- Chloride [water, surface water]: 0.67539 kg; lognormal variance with pedigree 0.448, pedigree (4,5,5,5,5)
  Estimation. The chloride contained in the removed benzal chloride and in the hydrogen chloride byproduct was assumed to leave the the production process as chloride emission in the waste water.
  It is assumed that the manufacturing plants are located in an urban/industrial area and consequently the emissions are categorised as emanating in a high population density area.
  Water emissions are assumed to be emitted into rivers.
  Uncertainty: Estimation
- DOC, Dissolved Organic Carbon [water, surface water]: 0.00255 kg; lognormal variance with pedigree 0.188, pedigree (4,5,5,5,5)
  Calculation. This data was calculated from the amount of emissions in the treated waste water assuming a carbon conversion of 96% for COD and the worst case scenario: TOC=DOC.
  It is assumed that the manufacturing plants are located in an urban/industrial area and consequently the emissions are categorized as emanating in a high population density area. The emissions into water are assumed to be emitted into rivers.
  Uncertainty: Calculated from the water emissions
- TOC, Total Organic Carbon [water, surface water]: 0.00255 kg; lognormal variance with pedigree 0.188, pedigree (4,5,5,5,5)
  (same comment as for DOC, Dissolved Organic Carbon)
- Water [water, unspecified]: 0.0150391 m3; lognormal variance with pedigree 0.1232, pedigree (2,4,5,4,4)
  Calculated based on literature data published by the GENDORF Chemical Park. The factory produced an average of 2462760 tonnes of chemical substances (including intermediates) per year in the years 2015-2019. The amount of water released back to the environment consists of the sum of the amount of process water treated in the internal WWTP that is then released back to the environment and the amount of cooling water released back to the environment. The average ouput of the internal WWTP in the years 2015-2019 was 2628800 m3 and that of cooling water released back to the environment was 34408800 m3. This gives a yearly average of 37037600 m3 emissions of water to water. This equals 0.01504 m3/kg chemical produced.
  References:
  Chemiepark GENDORF, Umwelterklärung 2016, https://www.gendorf.de/Nachbarn/Umweltschutz/Industrie%20und%20Nachhaltigkeit
  Chemiepark GENDORF, Umwelterklärung 2017, https://www.gendorf.de/Nachbarn/Umweltschutz/Industrie%20und%20Nachhaltigkeit
  Chemiepark GENDORF, Umwelterklärung 2020, https://www.gendorf.de/Nachbarn/Umweltschutz/Industrie%20und%20Nachhaltigkeit
  property carbon content, fossil 0; name C_content_fossil
  property carbon content, non-fossil 0; name C_content_non_fossil
  property dry mass 0 kg; name DM
  property fraction, origin: fresh water 0; name fraction_origin_fresh_water_Ww
  property fraction, origin: salt water 0; name fraction_origin_salt_water_Ww
  property fraction, origin: unspecified 1; name fraction_origin_unspecified_Ww
  property water in wet mass 1000 kg; name WWM
  property wet mass 1000 kg; name WM

## Sampling procedure
Literature data

## Review by Roland Hischier 2009-01-28
passed.
none

## Review by Roland Hischier 2011-09-22
Transfer of documentation done.
