# purified terephthalic acid production

Dataset: EcoSpold 2, unit process
Geography: RoW
Time period: 2011-01-01 to 2023-12-31
Technology level: current
Classification: ISIC rev.4 ecoinvent: 2013:Manufacture of plastics and synthetic rubber in primary forms
Synonyms: PTA
Scenario: Business-as-Usual
System model: Allocation, cut-off by classification
Generated by: Thomas Fröhlich
Published in: PlasticsEurope 2016
Database: ecoinvent
isCopyrightProtected: true
accessRestrictedTo: 1

## General comment
The dataset represents the production mix of commercial PTA production technologies.
Crude terephthalic acid (CTA) is produced by oxidation of p-xylene. A subsequent purification step leads to purified terephthalic acid (PTA). The oxidation reaction is catalysed by cobalt-manganese-bromide cata-lysts. Acetic acid is used as solvent, and compressed air is used for oxygen supply. As a bromide source, usually hydrobromic acid is used, but sodium bromide (NaBr), tetrabromoethane or other bromide com-pounds are also possible.
The conversion of p-xylene is usually carried out in bubble col-umn reactors in liquid phase at elevated temperature (175-225 °C) and pressure (15-30 bar). Temperature control is achieved by boiling point evaporation of acetic acid. Oxidation of p-xylene proceeds via several steps producing terephthalic acid with yields of more than 95 % at conversion of p-xylene of more than 98 %. From the reactor effluent, crude terephthalic acid (CTA) is obtained by crystallisation and centrifuga-tion/filtration. Vapour output from the reactor is condensed in heat exchangers and the condensate (mostly acetic acid and water) is recycled to the reactor. Steam generated from residual heat of this condensate is usually used internally. Liquid output from the centrifuge/filters is also recycled to the reactor after de-gassing and dehydration. For purification, CTA is entirely dissolved in water (at >260 °C) and brought into contact with hydrogen in the presence of a Pd catalyst. Under these conditions the undesired co-product 4-carboxybenzaldehyde (4-CBA) is converted to p-toluic acid, which is separated from terephthalic acid in a series of crystallisers. After centrifugation/filtration and drying, purified terephthalic acid (PTA) is obtained as powder.

## Included activities start
Acitivity starts with p-xylene and ethylene glycol entering the polymerisation plant. Energy supply is included in terms of heat production inside the battery limits of the plant. Steam and electricity supply is outside the activity.

## Included activities end
Activity ends with PTA leaving the factory.

## Geography
Extrapolated from dataset with data for EU27 including Norway and Switzerland. The production volume and uncertainty have been adjusted accordingly.

## Time period
Data was collected for the years 2011-2013, processed in 2014 and published in 2015

## Reference product
- purified terephthalic acid: 1 kg; By-product classification allocatable product; CPC 34140: Carboxylic acids and their anhydrides, halides, peroxides and peroxyacids and their halogenated, sulphonated, […]; HS2017 291736: Acids; aromatic polycarboxylic acids; terephthalic acid and its salts; CAS 100-21-0
  Reference Product
  production volume 1.7407e10 kg; name RP_PV
    According to Plastics Europe, Global production volume of plastics in 2013 was 299 Mt. It is assumed that the global production share (of the total plastic production) of purified terephthalic acid is equal to the respective European production share, which is 9 % of the total plastics production in Europe.
    Source: PlasticsEurope, 2013, Plastics - The Facts 2013, accessed online at: https://www.plasticseurope.org/en/resources/market-data on 11th of July 2018
  property heating value, net 21.9 MJ
    LHV is calculated based on the elemental composition of the substance. Based on the name of the substance, the chemical formula of the substance is assumed to be: C8H6O4
  property price 0.67 EUR2005
    Calculated value based on data from United Nations Commodity Trade Statistics Database (comtrade.un.org). UN comtrade category: 291736 Terephthalic acid, its salts. Year 2005. Using exchange rate of 1EURO = 1.209 USD. Average of price of import into 5 main markets (EU, US, JP, IN and CN).
  properties: carbon allocation 0.578313 kg, carbon content 0.578313, carbon content, fossil 0.578313, carbon content, non-fossil 0, dry mass 1 kg, water content 0, water in wet mass 0 kg, wet mass 1 kg

## Inputs from technosphere
- acetic acid, without water, in 98% solution state: 0.0554999 kg; lognormal variance with pedigree 0.0532, pedigree (3,3,5,5,3)
  Weighted average of reported input
  properties: carbon content, fossil 0.400016, dry mass 1 kg, heating value, net 14.6 MJ, wet mass 1 kg
  note on heating value, net: Based on literature, page 10, Althaus H.-J., Chudacoff M., Hischier R., Jungbluth N., Osses M. and Primas A. (2007) Life Cycle Inventories of Chemicals. Final report ecoinvent data v2.0 No. 8. EMPA, Swiss Centre for Life Cycle Inventories, Dübendorf, CH, Online-Version under: www.ecoinvent.org.
- chemical factory, organics: 4e-10 unit; lognormal variance with pedigree 0.3118, pedigree (2,3,3,4,3)
  Calculated based on literature data published by the industry. For this activity, no information was readily available concerning infrastructure and land-use. Therefore, the infrastructure is estimated based on data from two chemical factories, the BASF site of Ludwigshafen and the chemical factory in Gendorf (which are both located in Germany), which produce a wide range of chemical substances. Based on this data, the following assumptions are made: the built area amounts to about 4.2 ha, the plant has an average output of 50"000 t/a and a lifespan of fifty years. The estimated infrastructure amount is therefore 4.00 E-10 units per kg of produced chemical.
  References:
  Althaus H.-J., Chudacoff M., Hischier R., Jungbluth N., Osses M. and Primas A. (2007) Life Cycle Inventories of Chemicals. ecoinvent report No. 8, v2.0. EMPA Dübendorf, Swiss Centre for Life Cycle Inventories, Dübendorf, CH.
  Gendorf (2000) Umwelterklärung 2000, Werk Gendorf. Werk Gendorf, Burgkirchen.
- chemical, inorganic: 0.000612427 kg; lognormal variance with pedigree 0.0532, pedigree (3,3,5,5,3)
  Sum input parameter covering partly confidential information on additives, solvents, catalysts. Weighted average of reported input materials.
  properties: carbon content, fossil 0.003, dry mass 1 kg, wet mass 1 kg
  note on carbon content, fossil: This dataset is an unweighted average of 20 inorganic substances (listed in Tab 88.1, ecoinvent v2.2 report 8, part II), being part of the top100 chemicals included in this database. The C-content has also been calculated as an unweighted average of the C content of the substances composing this dataset.
- chemical, organic: 0.00744987 kg; lognormal variance with pedigree 0.0532, pedigree (3,3,5,5,3)
  (same comment as for chemical, inorganic)
  properties: carbon content, fossil 0.628, dry mass 1 kg, heating value, net 19.03 MJ, wet mass 1 kg
  note on carbon content, fossil: This dataset is an unweighted average of 20 organic substances (listed in Tab 88.1, ecoinvent v2.2 report 8, part II), being part of the top100 chemicals included in this database. The C-content has also been calculated as an unweighted average of the C content of the substances composing this dataset.
- cobalt: 0.00021955 kg; lognormal variance with pedigree 0.0532, pedigree (3,3,5,5,3)
  Weighted average of reported input
  properties: dry mass 1 kg, wet mass 1 kg
- compressed air, 600 kPa gauge: 0.345986 m3; lognormal variance with pedigree 0.0532, pedigree (3,3,5,5,3)
  Weighted average of reported input
- electricity, medium voltage: 0.00877565, 0.175055, 0.00438226, 0.00268741, 0.000537881, 0.000115495, 0.0180771, 0.0519566 kWh (8 suppliers, which the file names only by identifier); sum of these 0.261587 kWh; lognormal variance with pedigree 0.0532, pedigree (3,3,5,5,3)
  Weighted average of reported input
- hazardous waste, for incineration: -4.72996e-5 kg; name BP_amount3; lognormal variance with pedigree 0.0134, pedigree (3,3,2,5,3)
  Weighted average of reported waste
  production volume; = BP_amount3*RP_PV
    calculated with production volume of reference product
  properties: carbon content, fossil 0.554667, dry mass 0.75 kg, heating value, net 17 MJ, water content 0.333333, wet mass 1 kg
  note on carbon content, fossil: Tab A.6, ecoinvent v2.2 report 13_I. C content has been calculated after data in the tables, and then referred to 1 kg DM
  note on heating value, net: Value taken from the general comment of the treatment dataset.
- heat, from steam, in chemical industry: 1.85538 MJ; lognormal variance with pedigree 0.0532, pedigree (3,3,5,5,3)
  Weighted average of reported input
  properties: heating value, net 1 MJ
- manganese: 0.000217466 kg; lognormal variance with pedigree 0.0532, pedigree (3,3,5,5,3)
  Weighted average of reported input
  properties: dry mass 1 kg, wet mass 1 kg
- municipal solid waste: -1.57095e-7, -1.86543e-8, -8.86327e-5, -1.30535e-8, -4.18995e-9, -9.47044e-9, -3.94257e-7 kg (7 suppliers, which the file names only by identifier); sum of these -8.92294e-5 kg; lognormal variance with pedigree 0.0134, pedigree (3,3,2,5,3)
  Weighted average of reported waste
  production volume; = BP_amount4*RP_PV
    calculated with production volume of reference product
  properties: carbon content, fossil 0.171549, carbon content, non-fossil 0.261655, dry mass 0.771 kg, heating value, net 11.74 MJ, water content 0.297017, wet mass 1 kg
  note on carbon content, fossil: MSW composition in tab 4.1, ecoinvent v2.2 report 13_I. C content referred to 1 kg DM
- natural gas, high pressure: 0.000175004, 0.000295209, 0.000643942, 0.0002155, 5.03615e-5, 0.000299741, 0.000287625, 0.000756316, 0.000291988, 0.000451624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 m3 (36 suppliers, which the file names only by identifier); sum of these 0.0217945 m3; lognormal variance with pedigree 0.0532, pedigree (3,3,5,5,3)
  Weighted average of reported input
  properties: carbon content, fossil 0.695187, dry mass 1 kg, heating value, net 36 MJ, wet mass 1 kg
  note on heating value, net: Literature value, Source: Christoph Meili;Niels Jungbluth;Maresa Bussa (2021) Life cycle inventories of crude oil and natural gas extraction. ESU-services Ltd. commissioned by BAFU & VSG, Schaffhausen, Switzerland, http://esu-services.ch/data/public-lci-reports/
- nitrogen, liquid: 0.0345896 kg; lognormal variance with pedigree 0.0532, pedigree (3,3,5,5,3)
  Weighted average of reported input
  properties: dry mass 1 kg, wet mass 1 kg
- p-xylene: 0.658543 kg; lognormal variance with pedigree 0.0532, pedigree (3,3,5,5,3)
  Weighted average of reported input
  properties: carbon content, fossil 0.905124, dry mass 1 kg, heating value, net 40.798 MJ, wet mass 1 kg
  note on heating value, net: Lower heating value based on ChemEurope (available here: https://www.chemeurope.com/en/encyclopedia/Heat_of_combustion.html, last accessed 05-07-2023).
- sewage sludge: -3.73978e-6 m3; name BP_amount1; lognormal variance with pedigree 0.0134, pedigree (3,3,2,5,3)
  Weighted average of reported waste
  production volume; = BP_amount1*RP_PV
    calculated with production volume of reference product
  properties: carbon content, non-fossil 0.4096, dry mass 36.05 kg, water content 19, wet mass 721 kg
- sodium hydroxide, without water, in 50% solution state: 0.014073 kg; lognormal variance with pedigree 0.0532, pedigree (3,3,5,5,3)
  Weighted average of reported input
  properties: dry mass 1 kg, heating value, net 3.03 MJ, wet mass 1 kg
- waste mineral oil: -3.73702e-5 kg; name BP_amount2; lognormal variance with pedigree 0.0134, pedigree (3,3,2,5,3)
  Weighted average of reported waste
  production volume; = BP_amount2*RP_PV
    calculated with production volume of reference product
  properties: carbon content, fossil 0.864444, dry mass 0.9 kg, heating value, net 34.7 MJ, water content 0.111111, wet mass 1 kg
- wastewater, average: -0.00547835 m3; name BP_amount6; lognormal variance with pedigree 0.0134, pedigree (3,3,2,5,3)
  Weighted average of reported waste
  production volume; = BP_amount6*RP_PV
    calculated with production volume of reference product
  properties: carbon content, non-fossil 0.194039, dry mass 0.346837 kg, water content 2882.2, wet mass 1000 kg
  note on carbon content, non-fossil: 0.0673 kg TOC/m3 (Tab A.17, ecoinvent v2.2 report 13_I). TOC was considered as Total Carbon.

## Inputs from nature
- Water, cooling, unspecified natural origin [natural resource, in water]: 0.00167304 m3; lognormal variance with pedigree 0.0532, pedigree (3,3,5,5,3)
  Weighted average of reported input
- Water, river [natural resource, in water]: 0.00143331 m3; lognormal variance with pedigree 0.0532, pedigree (3,3,5,5,3)
  Weighted average of reported input
- Water, unspecified natural origin [natural resource, in water]: 0.00279464 m3; lognormal variance with pedigree 0.0532, pedigree (3,3,5,5,3)
  Weighted average of reported input
- Water, well, in ground [natural resource, in water]: 7.89904e-5 m3; lognormal variance with pedigree 0.0532, pedigree (3,3,5,5,3)
  Weighted average of reported input

## Emissions to nature
- Acetic acid [air, unspecified]: 2.19616e-5 kg; lognormal variance with pedigree 0.1726, pedigree (3,3,5,5,3)
  Weighted average of reported waste
- Benzene [air, unspecified]: 8.7144e-6 kg; lognormal variance with pedigree 0.1726, pedigree (3,3,5,5,3)
  Weighted average of reported emissions
- Carbon dioxide, fossil [air, unspecified]: 0.106456 kg; lognormal variance with pedigree 0.0532, pedigree (3,3,5,5,3)
  Weighted average of reported emissions
- Carbon monoxide, fossil [air, unspecified]: 0.00097233 kg; lognormal variance with pedigree 0.7026, pedigree (3,3,5,5,3)
  Weighted average of reported emissions
- Dinitrogen monoxide [air, unspecified]: 6.64666e-7 kg; lognormal variance with pedigree 0.0926, pedigree (3,3,5,5,3)
  Weighted average of reported emissions
- Methane, bromo-, Halon 1001 [air, unspecified]: 3.01354e-5 kg; lognormal variance with pedigree 0.1726, pedigree (3,3,5,5,3)
  Weighted average of reported waste
- Methane, fossil [air, unspecified]: 0.000203583 kg; lognormal variance with pedigree 0.0926, pedigree (3,3,5,5,3)
  Weighted average of reported emissions
- Methanol [air, unspecified]: 8.88155e-6 kg; lognormal variance with pedigree 0.1726, pedigree (3,3,5,5,3)
  Weighted average of reported emissions
- Methyl acetate [air, unspecified]: 1.61463e-5 kg; lognormal variance with pedigree 0.1726, pedigree (3,3,5,5,3)
  Weighted average of reported emissions
- Methyl formate [air, unspecified]: 1.25639e-7 kg; lognormal variance with pedigree 0.1726, pedigree (3,3,5,5,3)
  Weighted average of reported emissions
- NMVOC, non-methane volatile organic compounds [air, unspecified]: 0.000377925 kg; lognormal variance with pedigree 0.0926, pedigree (3,3,5,5,3)
  Weighted average of reported emissions
- Nitrogen oxides [air, unspecified]: 6.21985e-5 kg; lognormal variance with pedigree 0.0926, pedigree (3,3,5,5,3)
  Weighted average of reported emissions
- Particulate Matter, < 2.5 um [air, unspecified]: 3.72484e-6 kg; lognormal variance with pedigree 0.1726, pedigree (3,3,5,5,3)
  Weighted average of reported emissions
- Particulate Matter, > 10 um [air, unspecified]: 2.06699e-6 kg; lognormal variance with pedigree 0.1726, pedigree (3,3,5,5,3)
  Weighted average of reported emissions
- Sulfur dioxide [air, unspecified]: 3.12074e-6 kg; lognormal variance with pedigree 0.0532, pedigree (3,3,5,5,3)
  Weighted average of reported emissions
- Toluene [air, unspecified]: 1.17687e-5 kg; lognormal variance with pedigree 0.1726, pedigree (3,3,5,5,3)
  Weighted average of reported emissions
- Water [air, unspecified]: 0.000501912 m3; lognormal variance with pedigree 0.0532, pedigree (3,3,5,5,3)
  Calculated to close water balance
- Xylenes, unspecified [air, unspecified]: 3.63438e-5 kg; lognormal variance with pedigree 0.1726, pedigree (3,3,5,5,3)
  Weighted average of reported emissions
- Arsenic ion [water, unspecified]: 2.61569e-10 kg; lognormal variance with pedigree 0.7026, pedigree (3,3,5,5,3)
  Weighted average of reported emissions
- Cadmium II [water, unspecified]: 6.1754e-11 kg; lognormal variance with pedigree 0.7026, pedigree (3,3,5,5,3)
  Weighted average of reported emissions
- Chromium III [water, unspecified]: 4.10395e-8 kg; lognormal variance with pedigree 0.7026, pedigree (3,3,5,5,3)
  Weighted average of reported emissions
- Cobalt II [water, unspecified]: 1.7482e-6 kg; lognormal variance with pedigree 0.7026, pedigree (3,3,5,5,3)
  Weighted average of reported emissions
- Copper ion [water, unspecified]: 4.41718e-10 kg; lognormal variance with pedigree 0.7026, pedigree (3,3,5,5,3)
  Weighted average of reported emissions
- Lead II [water, unspecified]: 4.70038e-10 kg; lognormal variance with pedigree 0.7026, pedigree (3,3,5,5,3)
  Weighted average of reported emissions
- Mercury II [water, unspecified]: 9.90817e-10 kg; lognormal variance with pedigree 0.7026, pedigree (3,3,5,5,3)
  Weighted average of reported emissions
- Nickel II [water, unspecified]: 5.67319e-8 kg; lognormal variance with pedigree 0.7026, pedigree (3,3,5,5,3)
  Weighted average of reported emissions
- Nitrogen, organic bound [water, unspecified]: 3.54178e-5 kg; lognormal variance with pedigree 0.0926, pedigree (3,3,5,5,3)
  Weighted average of reported emissions
- Phosphorus [water, unspecified]: 5.34348e-6 kg; lognormal variance with pedigree 0.0926, pedigree (3,3,5,5,3)
  Weighted average of reported emissions
- Suspended solids, unspecified [water, unspecified]: 3.92536e-5 kg; lognormal variance with pedigree 0.0926, pedigree (3,3,5,5,3)
  Weighted average of reported emissions
- Zinc II [water, unspecified]: 1.29893e-7 kg; lognormal variance with pedigree 0.7026, pedigree (3,3,5,5,3)
  Weighted average of reported emissions

## Sampling procedure
Extrapolated from European data. Questionnaires sent out to all production units in Europe operated by PlasticEurope/ECVM member companies.

## Extrapolations
This dataset has been created as a copy of the original dataset covering the geography RER, i.e., Europe. Annual production volume(s) and uncertainty have been adjusted accordingly. It is important to note that original RER dataset represents the average production mix, composed of several different processes/technologies, in Europe in the year of reference. It might not reflect the actual global production mix and should hence only be used as a proxy.
