# selective coating, aluminium sheet, nickel pigmented aluminium oxide

Dataset: EcoSpold 2, unit process
Geography: SK
Time period: 1993-01-01 to 2023-12-31
Technology level: current
Classification: EcoSpold01Categories: metals/refinement
Classification: ISIC rev.4 ecoinvent: 2592:Treatment and coating of metals; machining
Tags: ConvertedDataset
Scenario: Business-as-Usual
System model: Allocation, cut-off by classification
Generated by: Niels Jungbluth
Published in: Althaus H.-J. 2000
Database: ecoinvent
isCopyrightProtected: true
accessRestrictedTo: 1

## General comment
Inventory for selective coatings of solar absorbers (a=0.85~0.91, e=0.23~0.40).
[This dataset was already contained in the ecoinvent database version 2. It was not individually updated during the transfer to ecoinvent version 3. Life Cycle Impact Assessment results may still have changed, as they are affected by changes in the supply chain, i.e. in other datasets. This dataset was generated following the ecoinvent quality guidelines for version 2. It may have been subject to central changes described in the ecoinvent version 3 change report (http://www.ecoinvent.org/database/ecoinvent-version-3/reports-of-changes/), and the results of the central updates were reviewed extensively. The changes added e.g. consistent water flows and other information throughout the database. The documentation of this dataset can be found in the ecoinvent reports of version 2, which are still available via the ecoinvent website. The change report linked above covers all central changes that were made during the conversion process.]

## Included activities start
The activity starts with the sheet entering the process. The material on which this activity is applied it is not included as input.

## Included activities end
Gate to gate inventory for the process including infrastructure and relevant materials and emissions. Not including wastes and packages.

## Geography
Production plant in SK.

## Technology
Highly selective, aluminium oxide-based layer pigmented with colloidal nickel

## Time period
Date of information.

## Parameters
- fraction, process water, to air: 0.15 dimensionless; name fraction_PW_to_air; lognormal variance with pedigree 0.092025, pedigree (4,4,3,2,4)
  Literature value. In case when no industry/process specific data are available, default evaporation fraction value is used. This value is 15% and is based on literature (Statistics Canada, 2007 & Shaffer, K.H., 2008, Consumptive water use in the Great Lakes Basin, USGS & Shiklomanov, 2003, World Water Resources at the Beginning of the 21st Century) and has been approved by an expert.
- fraction, tap water, to air: 0.15 dimensionless; name fraction_TW_to_air; = fraction_PW_to_air; lognormal variance with pedigree 0.092025, pedigree (4,4,3,2,4)
  Calculated value. See comment in the other parametres present in this dataset. Tap water is considered to be always used as process water, thus process water fractions to air are applied to all tap water input flows to calculate the amount of water consumed in the processes.

## Reference product
- selective coat, aluminium sheet, nickel pigmented aluminium oxide: 1 m2; By-product classification allocatable product; CPC 88731: Metal treatment and coating services
  EcoSpold01Location=SK
  production volume 200000 m2
    One Company on the market.
    According to Ecoinvent v.2 report 10, section 8.2 the total market for selective coatings in the EU is estimated to be 1.2 Mio. m2 per year. Equally distributed over the 6 types of 'selective coating'. Here assumed all of this takes place at the factory in SK.
  property price 1.01616 EUR2005
    Calculated based on inputs: The price of the product has been calculated as a sum of the values of the material and energy inputs for this product. This value is therefore a rough estimation. It may underestimate the real price since there are additional expenses when producing any product. These expences can include for example labour costs, treatment of waste materials and profit for the producer. Please consider carefully whether this level of data quality is acceptable for your application.
  properties: carbon allocation 0 kg, carbon content 0

## Inputs from technosphere
- boric acid, anhydrous, powder: 0.018 kg; lognormal variance with pedigree 0.0407, pedigree (2,2,5,1,1)
  Questionnaire
  EcoSpold01Location=RER
  Uncertainty: Questionnaire
  properties: dry mass 1 kg, wet mass 1 kg
- electricity, medium voltage: 1.81 kWh; lognormal variance with pedigree 0.0407, pedigree (2,2,5,1,1)
  Questionnaire, electricity use for the process
  EcoSpold01Location=SK
  Uncertainty: Questionnaire, electricity use for the process
- heat, district or industrial, other than natural gas: 38.95 MJ; lognormal variance with pedigree 0.0407, pedigree (2,2,5,1,1)
  Questionnaire
  EcoSpold01Location=RER
  Uncertainty: Questionnaire
  properties: heating value, net 1 MJ
- metal coating facility: 3.33e-7 unit; lognormal variance with pedigree 0.0407, pedigree (2,2,5,1,1)
  Estimation
  EcoSpold01Location=RER
  Uncertainty: Estimation
- nickel, class 1: 0.0218 kg; lognormal variance with pedigree 0.0407, pedigree (2,2,5,1,1)
  Questionnaire
  EcoSpold01Location=GLO
  Uncertainty: Questionnaire
  properties: dry mass 1 kg, wet mass 1 kg
- nitric acid, without water, in 50% solution state: 0.106 kg; lognormal variance with pedigree 0.0407, pedigree (2,2,5,1,1)
  EcoSpold01Location=RER
  Questionnaire
  Uncertainty: Questionnaire
  properties: dry mass 1 kg, wet mass 1 kg
- phosphoric acid, fertiliser grade, without water, in 70% solution state: 0.269 kg; lognormal variance with pedigree 0.0407, pedigree (2,2,5,1,1)
  Questionnaire
  EcoSpold01Location=GLO
  Uncertainty: Questionnaire
  properties: dry mass 1 kg, wet mass 1 kg
- sodium hydroxide, without water, in 50% solution state: 0.164 kg; lognormal variance with pedigree 0.0407, pedigree (2,2,5,1,1)
  Questionnaire
  EcoSpold01Location=RER
  Uncertainty: Questionnaire
  properties: dry mass 1 kg, heating value, net 3.03 MJ, wet mass 1 kg
- tap water: 7.236 kg; name tap_water_input; source NREL - National Renewable Energy Laborat 2005; lognormal variance with pedigree 0.052625, pedigree (3,3,5,2,1)
  Questionnaire
  Calculated based on literature, (Vionnet, S., Quantis Water Database - Technical Report, 2012). The process starts when untreated surface enters the coating plant. It includes the processes: pre-treatment (cleaning) and coating itself. The source presents data on general "Automotive painting, electrocoating, per m2", without specification of what kind of surface is being coated and what kind of coat is used. It is assumed (expert opinion) that this data are more likely to be right then the original - ecoivent values.
  EcoSpold01Location=RER
  Uncertainty: Questionnaire
  properties: carbon content, fossil 0.00178991, dry mass 0.000337476 kg, water content 2962.17, wet mass 1 kg
  note on carbon content, fossil: Bicarbonate content is 2.93 mol/m3. CO2 content is 0.1 mol/m3 (ecoinvent v2.2 report 8, Tab 93.1).

## Emissions to nature
- Water [air, unspecified]: 0.0010854 m3; name water_to_air_unspecified; = (tap_water_input/1000*fraction_TW_to_air); lognormal variance with pedigree 0.0807, pedigree (2,2,5,1,1)
  Calculated value based on literature values and expert opinion. See comments in the parametres' comment field.
  property fraction, origin: fresh water 1; name fraction_origin_fresh_water
  property fraction, origin: salt water 0; name fraction_origin_salt_water
  property fraction, origin: unspecified 0; name fraction_origin_unspecified
- Aluminium III [water, surface water]: 0.0016 kg; lognormal variance with pedigree 0.6907, pedigree (2,2,5,1,1)
  Questionnaire
  Uncertainty: Questionnaire
- Nickel II [water, surface water]: 0.0005 kg; lognormal variance with pedigree 0.6907, pedigree (2,2,5,1,1)
  Questionnaire
  Uncertainty: Questionnaire
- Suspended solids, unspecified [water, surface water]: 0.016 kg; lognormal variance with pedigree 0.0807, pedigree (2,2,5,1,1)
  Questionnaire
  Uncertainty: Questionnaire
- Water [water, unspecified]: 0.0061506 m3; name water_to_water_unspecified; = (tap_water_input/1000)*(1-fraction_TW_to_air); lognormal variance with pedigree 0.0807, pedigree (2,2,5,1,1)
  (same comment as for Water)
  property carbon content, fossil 0; name C_content_fossil
  property carbon content, non-fossil 0; name C_content_non_fossil
  property dry mass 0 kg; name DM
  property fraction, origin: fresh water 1; name fraction_origin_fresh_water_Ww
  property fraction, origin: salt water 0; name fraction_origin_salt_water_Ww
  property fraction, origin: unspecified 0; name fraction_origin_unspecified_Ww
  property water in wet mass 1000 kg; name WWM
  property wet mass 1000 kg; name WM

## Sampling procedure
Personal communication.

## Review by Hans-Jörg Althaus 2003-09-22
Passed.
