# peanut production

Dataset: EcoSpold 2, unit process
Geography: RoW
Time period: 2009-01-01 to 2023-12-31
Technology level: current
Classification: ISIC rev.4 ecoinvent: 0111:Growing of cereals (except rice), leguminous crops and oil seeds
Tags: WFLDB
Scenario: Business-as-Usual
System model: Allocation, cut-off by classification
Generated by: [System]
Database: ecoinvent
isCopyrightProtected: true
accessRestrictedTo: 1

## General comment
This dataset is a weighted average of the regional datasets, with weights based on production volume of the reference product. Detailed comments and sources about the exchanges can be found in the regional datasets.
The geographicalCorrelation score of every pedigree matrix of was changed to '5'.
Sum of regional production volumes: 2.285e+10 kg
CN: PV = 1.586e+10 kg; weight = 0.6941
IN: PV = 6.338e+9 kg; weight = 0.2774
AR: PV = 6.509e+8 kg; weight = 0.02849
Yield of the global dataset = 2759.24309039 kg/ha, calculated as a weighted average of the regional yields.
The comments below were part of the CN regional dataset.
This dataset represents the production of 1 kg of peanuts. The average yield from 2009 - 2012 is 3.5 t/ha. The data are representative for peanut production in China used for the export market. Mineral NPK fertiliser input is 80-27-28 kg/ha. No organic fertilisers are applied. Total active ingredients (a.i.) applied as pesticides amount to 11.25 kg a.i./ha.
The dataset was modelled within the project 'World Food LCA database (WFLDB)'. The aim of this project was to provide inventories of a broad variety of agricultural products and processes and to cover for each product at least 50% of the global export market. The export share of peanuts produced in China amounts to 10% of the global export (tonnage exported in 2010). The production system regarded in this dataset aimed at representing peanuts produced in China for the export market.
PEF-Quality: data quality rating (DQR) = 1.7 (i.e. very good quality). This dataset refers to an average situation; for specific situations exchanges might differ substantially due to site specific parameters

## Included activities start
This activity starts with soil cultivation after the harvest of the previous crop.

## Included activities end
This activity ends with the harvest of peanuts at farm gate. The dataset includes total diesel combusted in agricultural machinery, corresponding infrastructure, fuel use and sheds. Further, direct field emissions and land use change are included. Heavy metal uptake by the crop is considered. The inputs of seeds, fertilisers and pesticides as well as packaging of fertilisers and pesticides are considered.
Statistical data from FAO used to assess land use change is incomplete for China. The original land use of 40.9% of annual cropland and 100% of perennial cropland transformed in the last 20 years is unknown. Land use change impacts may therefore be underestimated.

## Reference product
- peanut: 1 kg; By-product classification allocatable product; CPC 01422: Groundnuts, in shell; HS2017 080290: Nuts, edible; n.e.c. in heading no. 0801 and 0802, fresh or dried, whether or not shelled or peeled
  production volume 1.72015e10 kg
    Source: FAOSTAT. Average, 2009-2012
  property carbon content, non-fossil 0.58063
    calculation: C-content of components according to ecoinvent report No. 15a. Source of composition: Souci, S.W., Fachmann, W., Kraut, H. (Hg.: Bundesminsiterium fur Ernahrung, Landwirtschaft und Forsten, Bonn) 'Die Zusammensetzung der Lebensmittel - Nahrwerttabellen', medpharm Scientific Publishers Stuttgart, CRC Press; 2000.
  property price 3.2 EUR2005
    Literature data (FAOSTAT). Price of peanut produced in Spain in 2008.
  properties: carbon allocation 0.54793 kg, carbon content 0.58063, carbon content, fossil 0, dry mass 0.943681 kg, water content 0.05968, water in wet mass 0.0563189 kg, wet mass 1 kg

## Inputs from technosphere
- acetamide-anillide-compound, unspecified: 9.52723e-5 kg; lognormal variance with pedigree 0.0158498, pedigree (2,2,4,5,1)
  Literature value or expert estimation (Angelini et al. 2013).
  properties: carbon content, fossil 0.659175, dry mass 1 kg, wet mass 1 kg
- application of plant protection product, by field sprayer: 0.0031371 ha; lognormal variance with pedigree 0.126664, pedigree (2,2,4,5,1)
  Literature value or expert estimation (Angelini et al. 2013).
- combine harvesting: 0.00028846 ha; lognormal variance with pedigree 0.126177, pedigree (2,1,4,5,1)
  Estimation based on a modified MEXALCA-approach (Roches et al. 2010; Nemecek et al. 2012): See supporting documentation 'WFLDB-Documentation.pdf' chapter 'Machinery processes' for L2 data (https://ecoquery.ecoinvent.org/File/Reports).
- cyclic N-compound: 7.93936e-6 kg; lognormal variance with pedigree 0.0158498, pedigree (2,2,4,5,1)
  Literature value or expert estimation (Angelini et al. 2013).
  properties: carbon content, fossil 0.641962, dry mass 1 kg, wet mass 1 kg
- diesel, burned in agricultural machinery: 0.144307 MJ; lognormal variance with pedigree 0.126177, pedigree (2,1,4,5,1)
  Literature value or expert estimation (Yang et al. 2014).
- fertilising, by broadcaster: 0.000277376 ha; lognormal variance with pedigree 0.126177, pedigree (2,1,4,5,1)
  (same comment as for combine harvesting)
- glyphosate: 0.000123655 kg; lognormal variance with pedigree 0.0158498, pedigree (2,2,4,5,1)
  Literature value or expert estimation (Angelini et al. 2013).
  properties: carbon content, fossil 0.214286, dry mass 1 kg, wet mass 1 kg
- inorganic nitrogen fertiliser, as N: 3.49098e-7, 8.19182e-5, 9.71743e-6, 0.000104349, 2.38689e-5, 1.01082e-5, 9.31622e-5, 8.74829e-6, 6.13735e-5, 6.27855e-6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 kg (27 suppliers, which the file names only by identifier); sum of these 0.00832127 kg; lognormal variance with pedigree 0.126177, pedigree (2,1,4,5,1)
  Calculated based on literature values or expert estimation: The total amount of nutrient (Personal written communication, Binaya Kumar Parida., Yara, 2015) multiplied by the share of fertiliser type (Personal written communication, Binaya Kumar Parida., Yara, 2015). See supporting documentation 'WFLDB-Documentation.pdf' chapter 'Fertiliser application' for L3 and L4 data (https://ecoquery.ecoinvent.org/File/Reports).
  Corresponds to 30.0 kg/ha
  properties: dry mass 1 kg, wet mass 1 kg
- inorganic phosphorus fertiliser, as P2O5: 0.000442084, 0.000123433, 3.03131e-5, 4.29251e-5, 0.000107091, 1.4066e-5, 6.89393e-5, 1.64367e-6, 0.00105394, 3.70774e-5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 kg (27 suppliers, which the file names only by identifier); sum of these 0.0220436 kg; lognormal variance with pedigree 0.126177, pedigree (2,1,4,5,1)
  Calculated based on literature values or expert estimation: The total amount of nutrient (Personal written communication, Miles Harriman, Yara, 2015) multiplied by the share of fertiliser type (Personal written communication, Miles Harriman, Yara, 2015). See supporting documentation 'WFLDB-Documentation.pdf' chapter 'Fertiliser application' for L3 and L4 data (https://ecoquery.ecoinvent.org/File/Reports).
  Corresponds to 27.0 kg/ha
  properties: dry mass 1 kg, wet mass 1 kg
- irrigation: 7.08444e-5, 0.00141677, 0.0010915, 0.00292651, 0.00402273, 0.311875, 0.000638477, 1.64207e-5, 0.0383696, 0.00967134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 m3 (15 suppliers, which the file names only by identifier); sum of these 0.392799 m3; lognormal variance with pedigree 0.126177, pedigree (2,1,4,5,1)
  Calculated value: The total amount of water used for irrigation (calculated from evapotranspiration, Pfister et al. 2011) multiplied by the country-share of irrigation technique (WFLDB-Guidelines.pdf, Appendix 6.1). See supporting documentation 'WFLDB-Documentation.pdf' chapter 'Water use for irrigation' for L2 data (https://ecoquery.ecoinvent.org/File/Reports).
  properties: dry mass 0.11 kg, water content 9089.91, wet mass 1000 kg
- nitrile-compound: 2.48105e-5 kg; lognormal variance with pedigree 0.0158498, pedigree (2,2,4,5,1)
  Literature value or expert estimation (Angelini et al. 2013).
  properties: carbon content, fossil 0.344995, dry mass 1 kg, wet mass 1 kg
- packaging, for fertilisers: 0.120581 kg; lognormal variance with pedigree 0.0592, pedigree (4,3,4,5,4)
  Total amount of active substance/s of fertilisers needed for the production of 'peanut' is calculated to be circa 6.03E-02 kg. Fertiliser/s used in this dataset is/are: 'nitrogen fertiliser, as N', 'phosphate fertiliser, as P2O5', 'potassium chloride, as K2O', 'urea, as N'. The total amount of active substance/s is doubled in order to account for the packaging of the dilluted product of fertiliser/s that is/are applied. Therefore, 1.21E-01 kg of packaging for fertilisers is justified with this exchange.
  properties: carbon content, fossil 0.825301, dry mass 1 kg, heating value, net 25.01 MJ, price 0.0642 EUR2005, wet mass 1 kg
  note on carbon content, fossil: Considering a chemical formula (C2H4)n for polyethylene, carbon content-fossil is calculated to be 0.856286 kg of Carbon per kg of dry mass.
- packaging, for pesticides: 0.000503851 kg; lognormal variance with pedigree 0.0592, pedigree (4,3,4,5,4)
  Total amount of active substance/s of pesticides needed for the production of peanut is calculated to be circa 2.52E-04 kg. Pesticide/s used in this dataset is/are: 'acetamide-anillide-compound, unspecified', 'cyclic N-compound', 'glyphosate', 'nitrile-compound', 'pyrethroid-compound'. The total amount of active substance/s is doubled in order to account for the packaging of the dilluted product of pesticide/s that is/are applied. Therefore, 5.04E-04 kg of packaging for pesticides is justified with this exchange.
  properties: carbon content, fossil 0.85714, dry mass 1 kg, heating value, net 25.97 MJ, price 0.0642 EUR2005, wet mass 1 kg
- peanut seed, for sowing: 0.0632423 kg; lognormal variance with pedigree 0.126177, pedigree (2,1,4,5,1)
  Proxy: Data from peanut US used following the example of Linnebank 2014, convert 130 lb/acre in 147 kg/ha.
  properties: carbon content, non-fossil 0.63623, dry mass 0.95048 kg, water content 0.0521, wet mass 1 kg
  note on carbon content, non-fossil: calculation: C-content of components according to ecoinvent report No. 15a. Source of composition: Souci, S.W., Fachmann, W., Kraut, H. (Hg.: Bundesminsiterium fur Ernahrung, Landwirtschaft und Forsten, Bonn) 'Die Zusammensetzung der Lebensmittel - Nahrwerttabellen', medpharm Scientific Publishers Stuttgart, CRC Press; 2000.
- potassium chloride: 0.000678968, 0.008187 kg (2 suppliers, which the file names only by identifier); sum of these 0.00886597 kg; lognormal variance with pedigree 0.126177, pedigree (2,1,4,5,1)
  The exchange has been updated from 'potassium chloride, as K2O' into 'potassium chloride' and therefore its amount has been scaled (multiplied) from 0.0056 kg by 1.5829 kg of 'potassium chloride' per kg of 'potassium chloride, as K2O'. Original comment of the exchange is: Calculated based on literature values or expert estimation: The total amount of nutrient (Personal written communication, Miles Harriman, Yara, 2015) multiplied by the share of fertiliser type (Personal written communication, Miles Harriman, Yara, 2015). See supporting documentation 'WFLDB-Documentation.pdf' chapter 'Fertiliser application' for L3 and L4 data (https://ecoquery.ecoinvent.org/File/Reports).
  Corresponds to 28.0 kg/ha
  properties: dry mass 1 kg, wet mass 1 kg
- pyrethroid-compound: 2.48105e-7 kg; lognormal variance with pedigree 0.0158498, pedigree (2,2,4,5,1)
  Literature value or expert estimation (Angelini et al. 2013).
  properties: carbon content, fossil 0.623, dry mass 1 kg, wet mass 1 kg
- sowing: 0.00028846 ha; lognormal variance with pedigree 0.126177, pedigree (2,1,4,5,1)
  (same comment as for combine harvesting)
- tillage, cultivating, chiselling: 4.82712e-6 ha; lognormal variance with pedigree 0.126177, pedigree (2,1,4,5,1)
  (same comment as for combine harvesting)
- tillage, currying, by weeder: 0.000554752 ha; lognormal variance with pedigree 0.126177, pedigree (2,1,4,5,1)
  Literature value or expert estimation (Singh et al. 2014).
- tillage, harrowing, by spring tine harrow: 9.65436e-6 ha; lognormal variance with pedigree 0.126177, pedigree (2,1,4,5,1)
  Proxy: Extrapolated using a modified MEXALCA-approach (Roches et al. 2010; Nemecek et al. 2012). See supporting documentation 'WFLDB-Documentation.pdf' chapter 'Machinery processes' for L1 data (https://ecoquery.ecoinvent.org/File/Reports).
- tillage, ploughing: 0.000282203 ha; lognormal variance with pedigree 0.126177, pedigree (2,1,4,5,1)
  (same comment as for combine harvesting)
- transport, tractor and trailer, agricultural: 0.000609249, 2.47749e-6 metric ton*km (2 suppliers, which the file names only by identifier); sum of these 0.000611726 metric ton*km; lognormal variance with pedigree 0.164439, pedigree (4,1,4,5,1)
  On-farm transport: Yield (in tonnes) multiplied by the average distance from field to farm. The distance was assumed to be 2 km (proxy).
- urea: 0.0406363, 0.00513934, 0.00637108 kg (3 suppliers, which the file names only by identifier); sum of these 0.0521467 kg; lognormal variance with pedigree 0.126177, pedigree (2,1,4,5,1)
  The exchange has been updated from 'urea, as N' into 'urea' and therefore its amount has been scaled (multiplied) from 0.0243 kg by 2.1438 kg of 'urea' per kg of 'urea, as N'. Original comment of the exchange is: Calculated based on literature values or expert estimation: The total amount of nutrient (Personal written communication, Miles Harriman, Yara, 2015) multiplied by the share of fertiliser type (Personal written communication, Miles Harriman, Yara, 2015). See supporting documentation 'WFLDB-Documentation.pdf' chapter 'Fertiliser application' for L3 and L4 data (https://ecoquery.ecoinvent.org/File/Reports).
  Corresponds to 80.0 kg/ha
  properties: carbon content, fossil 0.2, dry mass 1 kg, wet mass 1 kg

## Inputs from nature
- Carbon dioxide, in air [natural resource, in air]: 1.85474 kg; lognormal variance with pedigree 0.0158498, pedigree (2,2,4,5,1)
  CO2 uptake by biomass
- Energy, gross calorific value, in biomass [natural resource, biotic]: 24.6369 MJ; lognormal variance with pedigree 0.0158498, pedigree (2,2,4,5,1)
  Gross energy content is related to MJ/kg dry matter of product. Source: ecoinvent data
- Occupation, annual crop [natural resource, land]: 4.43002 m2*year; lognormal variance with pedigree 0.0220616, pedigree (2,1,4,5,1)
  Related to the duration from harvest date of previous crop to harvest date of main crop: 350 days.
- Transformation, from arable land, unspecified use [natural resource, land]: 4.885 m2; lognormal variance with pedigree 0.0462144, pedigree (2,1,4,5,1)
  10000 m2 divided by the life time of the crop.
- Transformation, to arable land, unspecified use [natural resource, land]: 4.885 m2; lognormal variance with pedigree 0.0462144, pedigree (2,1,4,5,1)
  10000 m2 divided by the life time of the crop.

## Emissions to nature
- Ammonia [air, non-urban air or from high stacks]: 0.00760005 kg; lognormal variance with pedigree 0.0467216, pedigree (2,2,4,5,1)
  Calculated value - EMEP/EEA (2013). See 'WFLDB-Guidelines.pdf', available at https://ecoquery.ecoinvent.org/File/Reports.
- Carbon dioxide, fossil [air, non-urban air or from high stacks]: 0.0381894 kg; lognormal variance with pedigree 0.0158498, pedigree (2,2,4,5,1)
  Calculated value - CO2 emissions from urea and lime. See 'WFLDB-Guidelines.pdf', available at https://ecoquery.ecoinvent.org/File/Reports.
- Carbon dioxide, from soil or biomass stock [air, non-urban air or from high stacks]: 0.897529 kg; normal variance with pedigree 0.5, pedigree (3,3,5,5,2)
  Global average LUC emissions according 2nd edition of the Quantis-modified tool developed by Blonk Consultants 'WFLDB-adapted-Blonk 2014 direct-land-use-change-assessment-tool_2015-05-18a.xlsx', tab. 'Country & land use unknown'. The emission are based on the relative change in production areas in all countries for a given crop. The weighted average is used which takes into acount relative difference in crop expansion into primary forest, secondary forest, grassland, perennial and annual land.
  Uncertainty: Uncertainty estimated based on IPCC guidlines 2006.
- Dinitrogen monoxide [air, non-urban air or from high stacks]: 0.00102446 kg; lognormal variance with pedigree 0.126664, pedigree (2,2,4,5,1)
  Calculated value - IPCC (2006). See 'WFLDB-Guidelines.pdf', available at https://ecoquery.ecoinvent.org/File/Reports.
- Nitrogen oxides [air, non-urban air or from high stacks]: 0.00128717 kg; lognormal variance with pedigree 0.126664, pedigree (2,2,4,5,1)
  Calculated value - EEA/EMEP (2013). See 'WFLDB-Guidelines.pdf', available at https://ecoquery.ecoinvent.org/File/Reports.
- Water [air, non-urban air or from high stacks]: 0.18572 m3; lognormal variance with pedigree 0.126177, pedigree (2,1,4,5,1)
  Calculated value - Emission calculated from water balance. See 'WFLDB-Guidelines.pdf', available at https://ecoquery.ecoinvent.org/File/Reports.
- Azoxystrobin [soil, agricultural]: 2.48105e-5 kg; lognormal variance with pedigree 0.0467216, pedigree (2,2,4,5,1)
  Calculated value - 100% emission in soil. See 'WFLDB-Guidelines.pdf', available at https://ecoquery.ecoinvent.org/File/Reports.
- Cadmium II [soil, agricultural]: 1.38742e-6 kg
  Comment on mathematicalRelation:
  -9.44322e-08 from Crop, default, heavy metals uptake model
  Heavy metal uptake can be excluded by setting the parameter heavyMetalUptakeSwitch to zero.
- Chromium III [soil, agricultural]: 1.88165e-6 kg
  Comment on mathematicalRelation:
  -1.30622568093e-07 from Calculated value - Freiermuth (2006). See 'WFLDB-Guidelines.pdf', available at https://ecoquery.ecoinvent.org/File/Reports.
  -5.0685e-07 from Crop, default, heavy metals uptake model
  Heavy metal uptake can be excluded by setting the parameter heavyMetalUptakeSwitch to zero.
- Copper ion [soil, agricultural]: -8.44967e-6 kg
  Comment on mathematicalRelation:
  -1.53346303502e-06 from Calculated value - Freiermuth (2006). See 'WFLDB-Guidelines.pdf', available at https://ecoquery.ecoinvent.org/File/Reports.
  -6.163017e-06 from Crop, default, heavy metals uptake model
  Heavy metal uptake can be excluded by setting the parameter heavyMetalUptakeSwitch to zero.
- Cyhalothrin [soil, agricultural]: 2.48105e-7 kg; lognormal variance with pedigree 0.0467216, pedigree (2,2,4,5,1)
  (same comment as for Azoxystrobin)
- Cyproconazole [soil, agricultural]: 7.93936e-6 kg; lognormal variance with pedigree 0.0467216, pedigree (2,2,4,5,1)
  (same comment as for Azoxystrobin)
- Glyphosate [soil, agricultural]: 0.000123655 kg; lognormal variance with pedigree 0.0467216, pedigree (2,2,4,5,1)
  (same comment as for Azoxystrobin)
- Lead II [soil, agricultural]: -4.82237e-8 kg
  Comment on mathematicalRelation:
  2.89151750973e-09 from Calculated value - Freiermuth (2006). See 'WFLDB-Guidelines.pdf', available at https://ecoquery.ecoinvent.org/File/Reports.
  -5.029161e-07 from Crop, default, heavy metals uptake model
  Heavy metal uptake can be excluded by setting the parameter heavyMetalUptakeSwitch to zero.
- Mercury II [soil, agricultural]: -2.55106e-8 kg
  Comment on mathematicalRelation:
  7.4953307393e-11 from Calculated value - Freiermuth (2006). See 'WFLDB-Guidelines.pdf', available at https://ecoquery.ecoinvent.org/File/Reports.
  Heavy metal uptake can be excluded by setting the parameter heavyMetalUptakeSwitch to zero.
- Metolachlor [soil, agricultural]: 9.52723e-5 kg; lognormal variance with pedigree 0.0467216, pedigree (2,2,4,5,1)
  (same comment as for Azoxystrobin)
- Nickel II [soil, agricultural]: -2.19945e-6 kg
  Comment on mathematicalRelation:
  -5.65914396887e-08 from Calculated value - Freiermuth (2006). See 'WFLDB-Guidelines.pdf', available at https://ecoquery.ecoinvent.org/File/Reports.
  -9.71478e-07 from Crop, default, heavy metals uptake model
  Heavy metal uptake can be excluded by setting the parameter heavyMetalUptakeSwitch to zero.
- Zinc II [soil, agricultural]: -1.31883e-5 kg
  Comment on mathematicalRelation:
  1.41894941634e-06 from Calculated value - Freiermuth (2006). See 'WFLDB-Guidelines.pdf', available at https://ecoquery.ecoinvent.org/File/Reports.
  -2.978139e-05 from Crop, default, heavy metals uptake model
  Heavy metal uptake can be excluded by setting the parameter heavyMetalUptakeSwitch to zero.
- Cadmium II [water, ground-]: 1.72741e-8 kg; lognormal variance with pedigree 0.358938, pedigree (2,2,4,5,1)
  Calculated value - Freiermuth (2006). See 'WFLDB-Guidelines.pdf', available at https://ecoquery.ecoinvent.org/File/Reports. This emission might be overestimated in case of basic soils.
- Cadmium II [water, surface water]: 6.71734e-8 kg; lognormal variance with pedigree 0.358938, pedigree (2,2,4,5,1)
  Calculated value - Freiermuth (2006). See 'WFLDB-Guidelines.pdf', available at https://ecoquery.ecoinvent.org/File/Reports.
- Chromium III [water, ground-]: 8.15996e-6 kg; lognormal variance with pedigree 0.358938, pedigree (2,2,4,5,1)
  (same comment as for Cadmium II)
- Chromium III [water, surface water]: 7.49232e-6 kg; lognormal variance with pedigree 0.358938, pedigree (2,2,4,5,1)
  (same comment as for Cadmium II)
- Copper ion [water, ground-]: 1.75325e-6 kg; lognormal variance with pedigree 0.358938, pedigree (2,2,4,5,1)
  (same comment as for Cadmium II)
- Copper ion [water, surface water]: 5.03099e-6 kg; lognormal variance with pedigree 0.358938, pedigree (2,2,4,5,1)
  (same comment as for Cadmium II)
- Lead II [water, ground-]: 3.99647e-8 kg; lognormal variance with pedigree 0.358938, pedigree (2,2,4,5,1)
  (same comment as for Cadmium II)
- Lead II [water, surface water]: 1.11866e-6 kg; lognormal variance with pedigree 0.358938, pedigree (2,2,4,5,1)
  (same comment as for Cadmium II)
- Mercury II [water, ground-]: 6.21919e-8 kg; lognormal variance with pedigree 0.358938, pedigree (2,2,4,5,1)
  (same comment as for Cadmium II)
- Mercury II [water, surface water]: 1.27528e-8 kg; lognormal variance with pedigree 0.358938, pedigree (2,2,4,5,1)
  (same comment as for Cadmium II)
- Nickel II [water, ground-]: 5.70798e-9 kg; lognormal variance with pedigree 0.358938, pedigree (2,2,4,5,1)
  (same comment as for Cadmium II)
- Nickel II [water, surface water]: 4.38706e-6 kg; lognormal variance with pedigree 0.358938, pedigree (2,2,4,5,1)
  (same comment as for Cadmium II)
- Nitrate [water, ground-]: 0.0651903 kg; lognormal variance with pedigree 0.177866, pedigree (2,2,4,5,1)
- Phosphate [water, ground-]: 9.50297e-5 kg; lognormal variance with pedigree 0.177866, pedigree (2,2,4,5,1)
  Calculated value - Prasuhn (2006). See 'WFLDB-Guidelines.pdf', available at https://ecoquery.ecoinvent.org/File/Reports. This emission might be overestimated in case of basic soils.
- Phosphate [water, surface water]: 0.000264964 kg; lognormal variance with pedigree 0.177866, pedigree (2,2,4,5,1)
  Calculated value - Prasuhn (2006). See 'WFLDB-Guidelines.pdf', available at https://ecoquery.ecoinvent.org/File/Reports.
- Phosphorus [water, surface water]: 0.000251777 kg; lognormal variance with pedigree 0.177866, pedigree (2,2,4,5,1)
  Calculated value - Prasuhn (2006) and SQCB-Erosion. See 'WFLDB-Guidelines.pdf', available at https://ecoquery.ecoinvent.org/File/Reports.
- Water [water, ground-]: 0.0414146 m3; lognormal variance with pedigree 0.126177, pedigree (2,1,4,5,1)
  (same comment as for Water)
- Water [water, surface water]: 0.16566 m3; lognormal variance with pedigree 0.126177, pedigree (2,1,4,5,1)
  (same comment as for Water)
- Zinc II [water, ground-]: 5.87676e-6 kg; lognormal variance with pedigree 0.358938, pedigree (2,2,4,5,1)
  (same comment as for Cadmium II)
- Zinc II [water, surface water]: 7.07028e-6 kg; lognormal variance with pedigree 0.358938, pedigree (2,2,4,5,1)
  (same comment as for Cadmium II)

## Sampling procedure
WFLDB Methodological Guidelines for the Life Cycle Inventory of Agricultural Products in the latest version, available at: (Report section: https://v30.ecoquery.ecoinvent.org/File/Reports). Data sources: Data were categorised from level 0 (L0) to level (L4) as follows: L0 = estimate, proxy; L1 = statistical data (e.g. FAOSTAT); L2 = L1 adapted to crop and country; L3 = literature data or L1 resp. L2 data approved by experts; medium detailing (i.e. kg of total N-fertiliser); L4 = L3 data of high detailing (i.e. portion N-fertiliser types).In this dataset data were obtained for yield: L3; Fertilisers: L4; Pesticides: L3; Machinery: L3; Irrigation: L2. For information regarding the calculation of individual exchanges see supporting documentation WFLDB-Documentation.pdf.

## Extrapolations
The amount of the exchanges are weighted average of regional datasets.

## Review by Assumpció ANTON 2016-05-30
Be aware that the use of statistics in input calculations could provide some specific inputs not common for specific crops, this should be corrected if better information is available and better reflexed in DQR . Currently, I would dissent for some of good marks provided, being a revision of criteria applied advisable.
Pesticides will need to be amended periodically checking for update of pesticides' ban.
