# silicon tetrahydride production, silicon hydrochlorination

Dataset: EcoSpold 2, unit process
Geography: GLO
Time period: 2000-01-01 to 2023-12-31
Technology level: current
Classification: ISIC rev.4 ecoinvent: 2011:Manufacture of basic chemicals
Synonyms: Monosilane; 7440-21-3; Silicone; monosaline; Silicon metal; Silicon tetrahydride
Scenario: Business-as-Usual
System model: Allocation, cut-off by classification
Share of production covered: 100 %
Generated by: [System]
Published in: Jungbluth, N. 2007
Database: ecoinvent
isCopyrightProtected: true
accessRestrictedTo: 1

## General comment
This dataset represents the production of silicon tetrahydride (SiH4) and silicon tetrachloride (SiCl4) by hydrochloration of silicon to trichlorosilane, followed by the disproportionation of trichlorosilane. Silicon tetrachloride is a clear, colorless liquid that fumes strongly in air and hydrolyzes rapidly in water, producing SiO2 gel. It is used for the production of high-purity silicon, highly dispersed silica, as well as corrosion-resistant coatings for metal surfaces. Silicon tetrahydride is used to deposit silicon on surfaces such as glass or silica-coated surfaces. This dataset is based on literature data as well as data from similar processes.
References:
Simmler, W. 2000. Silicon Compounds, Inorganic. Ullmann's Encyclopedia of Industrial Chemistry.

## Included activities start
From the reception of metallurgical grade silicon and hydrochloric acid at the factory gate.

## Included activities end
This activity ends with the trichlorosilane hydrogenation process, including the consumption of raw materials, energy uses, infrastructure and emissions.

## Geography
The inventory is modelled for the world.

## Technology
Hydrochloration of silicon and disproportionation of trichlorosilane are the most important processes to produce silicon tetrahydride.
Industrially, silicon tetrahydride is produced from metallurgical grade silicon (MG-silicon) in a two-step process. In the first step, powdered silicon is reacted with hydrochloric acid at about 300 °C to produce trichlorosilane, HSiCl3, along with hydrogen gas, according to the chemical equation:
Si + 3HCl → HSiCl3 + H2
The hydrogen is re-used in other silicon purification processes and therefore not considered as co-product. In the second step, catalytic disproportionation of trichlorosilane results in SiH4 and SiCl4. For a mixture of trichloro- and dichlorosilane, copper, a mixture of silica and alumina at 300 °C, and quaternary ammonium groups bonded to carbon in an ion-exchange resin have been reported as catalysts for the main reaction leading to silicon tetrahydride.
4 HSiCl3 → 2 H2SiCl2 + 2 SiCl4
2 H2SiCl2 → SiCl4+ SiH4
Purification
In-process purification is achieved by contacting part of the silicon tetrahydride produced with the starting mixture of chlorosilanes, which contains the impurities as chlorides, chiefly those of arsenic, phosphorus, and boron. This procedure converts the contaminants into their more volatile hydrides, which are removed with the off-gas.
Removal of boron compounds from silanes that are to be used for the production of high-purity silicon is very important. When SiH4 is produced from alkali metal hydrides, it is recommended that water should be added to hydrolyze boron hydrides under the alkaline reaction conditions. Water vapor is added during distillation for the same reason. Boron compounds can be removed from SiH4 by adsorption from the gas phase onto activated carbon or silica carriers loaded with compounds that form complexes with boron compounds (AlCl3, FeCl3, C2H5CN, NH2CN, PCl3).
If alkali metal hydrides MH are reacted in organic solvents, it is often unnecessary to include a special stage for removing boron compounds from the silicon compounds, as the former react to form boranate complexes under the following conditions:
References:
Simmer, Walter: Silicon Compounds, Inorganic. Published online: 2002. In: Ullmann's Encyclopedia of Industrial Chemistry, Seventh Edition, 2004 Electronic Release (ed. Fiedler E., Grossmann G., Kersebohm D., Weiss G. and Witte C.). 7 th Electronic Release Edition. Wiley InterScience, New York, Online-Version under: http://www.mrw.interscience.wiley.com/emrw/9783527306732/home

## Time period
Time of publications.

## Parameters
- fraction, cooling water, cooling pond system, to air: 0.032 dimensionless; name fraction_CW_CP_to_air; lognormal variance with pedigree 0.0413, pedigree (2,3,1,3,1)
  Calculated based on literature value (Scown, C.D., 2011, Water Footprint of U.S. Transportation Fuels and supplying information of the article) (Vionnet, S., Quantis Water Database - Technical Report, 2012).
- fraction, cooling water, once-through system, to air: 0.004 dimensionless; name fraction_CW_OT_to_air; lognormal variance with pedigree 0.0413, pedigree (2,3,1,3,1)
  (same comment as for fraction, cooling water, cooling pond system, to air)
- fraction, cooling water, recirculating system, to air: 0.771 dimensionless; name fraction_CW_R_to_air; lognormal variance with pedigree 0.0413, pedigree (2,3,1,3,1)
  (same comment as for fraction, cooling water, cooling pond system, to air)
- fraction, cooling water, to air: 0.3875 dimensionless; name fraction_CW_to_air; = (0.5*fraction_CW_OT_to_air)+(0.5*fraction_CW_R_to_air); lognormal variance with pedigree 0.092025, pedigree (4,4,3,2,4)
  Calculated value based on literature value (see comments of the other parametres present in this dataset) and expert opinion. In the case when no industry/literature data are available about the type of cooling or directly fraction, cooling water, to air specific for the process a default assumption is applied. It is assumed that the once-through cooling system is used in 50% of all cases and recirculating system is used in another 50% of all cases.

## Reference product
- silicon tetrachloride: 1 kg; name BP_silicon_tetrachloride; By-product classification allocatable product; CPC 34231: Chemical elements n.e.c.; inorganic acids except phosphoric, nitric and sulphonitric; inorganic oxygen compoun[…]; HS2017 281119: Inorganic acids; other than hydrogen fluoride; CAS 10026-04-7
  production volume 5.47635e6 kg; = RP_PV*BP_silicon_tetrachloride/ABS(RP)
    Calculated from the production volume of silicon tetrahydride in proportion to the respective output amounts.
  property price 0.5 EUR2005
    Calculated based on several resellers (available here: https://connect2india.com/amp/products/silicon-tetrachloride.html, https://kns-2021.en.made-in-china.com/product/rZLTnzRdsgYi/China-Silicon-Tetrachloride-Stc.html, all last accessed 2022-07-29).
    The price was converted to EUR based on the annual exchange rates published by the European Central Bank (https://sdw.ecb.europa.eu/quickview.do?SERIES_KEY=120.EXR.A.USD.EUR.SP00.A, last accessed on 2022-02-15) and adjusted for inflation relative to 2005 using the producer price index (PPI) of the euro area, published by eurostat (https://appsso.eurostat.ec.europa.eu/nui/show.do?dataset=sts_inpp_a&lang=en, last accessed on 2022-05-04).
  properties: allocation factor 0.402301, carbon allocation 0 kg, carbon content 0, carbon content, fossil 0, carbon content, non-fossil 0, dry mass 1 kg, true value 0.458605, water content 0, water in wet mass 0 kg, wet mass 1 kg

## Inputs from technosphere
All rows: source Jungbluth, N. 2007
- electricity, high voltage: 12.018, 37.984 kWh (2 suppliers, which the file names only by identifier); sum of these 50.002 kWh; lognormal variance with pedigree 0.1786, pedigree (4,5,5,5,5)
  Estimation. The energy consumption for the silicon hydrochloration process is estimated from the production of electronic grade silicon. In this dataset an amount of 150 kWh electricity and 160 MJ heat per kg EG-silicon are considered. This values are also used here.The electricity is calculated with the mix that is considered in the literature data.
  Uncertainty: E
- heat, district or industrial, natural gas: 53.5109 MJ; lognormal variance with pedigree 0.1786, pedigree (4,5,5,5,5)
  (same comment as for electricity, high voltage)
  properties: heating value, net 1 MJ
- hydrochloric acid, without water, in 30% solution state: 0.0658416, 0.3008 kg (2 suppliers, which the file names only by identifier); sum of these 0.366642 kg; lognormal variance with pedigree 0.076, pedigree (4,5,5,1,1)
  Stoechiometric calculation. The values for the consumption of the raw materials are calculated with an assumed yield of 95 %.
  Uncertainty: S
  properties: dry mass 1 kg, heating value, net 3.32 MJ, wet mass 1 kg
- silicon, metallurgical grade: 0.438614 kg; lognormal variance with pedigree 0.076, pedigree (4,5,5,1,1)
  (same comment as for hydrochloric acid, without water, in 30% solution state)
  properties: dry mass 1 kg, wet mass 1 kg
- silicone factory: 4.38614e-12 unit; lognormal variance with pedigree 0.448, pedigree (4,5,5,5,5)
  Estimation. There the infrastructure is estimated based on the module 'silicon plant', which simulates the production of electronic grade silicon.
  Uncertainty: E

## Inputs from nature
- Water, cooling, unspecified natural origin [natural resource, in water]: 19.0797 m3; name water_cooling_UNO_input; source Jungbluth, N. 2007; lognormal variance with pedigree 0.198, pedigree (4,5,5,5,5)
  Estimation. The amount of cooling water is estimated from the production of electronic grade silicon.
  Uncertainty: E

## Emissions to nature
- Water [air, unspecified]: 7.39339 m3; = (water_cooling_UNO_input*fraction_CW_to_air); lognormal variance with pedigree 0.0807, pedigree (2,2,5,1,1)
  Calculated as a fraction of the input of water. For more details, refer to the mathematical relation and the parameters.
  property fraction, origin: fresh water 0; name fraction_origin_fresh_water
  property fraction, origin: salt water 0; name fraction_origin_salt_water
  property fraction, origin: unspecified 1; name fraction_origin_unspecified
- AOX, Adsorbable Organic Halides [water, surface water]: 3.86419e-6 kg; source Jungbluth, N. 2007; lognormal variance with pedigree 0.188, pedigree (4,5,5,5,5)
  Estimation. Emissions to water from the silicon hydrochloration process are estimated from the production of electronic grade silicon
  Uncertainty: E
- BOD5, Biological Oxygen Demand [water, surface water]: 6.27218e-5 kg; source Jungbluth, N. 2007; lognormal variance with pedigree 0.188, pedigree (4,5,5,5,5)
  (same comment as for AOX, Adsorbable Organic Halides)
- COD, Chemical Oxygen Demand [water, surface water]: 0.000618446 kg; source Jungbluth, N. 2007; lognormal variance with pedigree 0.188, pedigree (4,5,5,5,5)
  (same comment as for AOX, Adsorbable Organic Halides)
- Chloride [water, surface water]: 0.0110092 kg; source Jungbluth, N. 2007; lognormal variance with pedigree 0.448, pedigree (4,5,5,5,5)
  (same comment as for AOX, Adsorbable Organic Halides)
- Copper ion [water, surface water]: 3.13609e-8 kg; source Jungbluth, N. 2007; lognormal variance with pedigree 0.448, pedigree (4,5,5,5,5)
  (same comment as for AOX, Adsorbable Organic Halides)
- DOC, Dissolved Organic Carbon [water, surface water]: 0.00027852 kg; source Jungbluth, N. 2007; lognormal variance with pedigree 0.188, pedigree (4,5,5,5,5)
  (same comment as for AOX, Adsorbable Organic Halides)
- Iron ion [water, surface water]: 1.71937e-6 kg; source Jungbluth, N. 2007; lognormal variance with pedigree 0.798, pedigree (4,5,5,5,5)
  (same comment as for AOX, Adsorbable Organic Halides)
- Nitrogen [water, surface water]: 6.3599e-5 kg; source Jungbluth, N. 2007; lognormal variance with pedigree 0.188, pedigree (4,5,5,5,5)
  (same comment as for AOX, Adsorbable Organic Halides)
- Phosphate [water, surface water]: 8.59683e-7 kg; source Jungbluth, N. 2007; lognormal variance with pedigree 0.188, pedigree (4,5,5,5,5)
  (same comment as for AOX, Adsorbable Organic Halides)
- Sodium I [water, surface water]: 0.0103513 kg; source Jungbluth, N. 2007; lognormal variance with pedigree 0.798, pedigree (4,5,5,5,5)
  (same comment as for AOX, Adsorbable Organic Halides)
- TOC, Total Organic Carbon [water, surface water]: 0.00027852 kg; source Jungbluth, N. 2007; lognormal variance with pedigree 0.188, pedigree (4,5,5,5,5)
  (same comment as for AOX, Adsorbable Organic Halides)
- Water [water, unspecified]: 11.6863 m3; = water_cooling_UNO_input*(1-fraction_CW_to_air); lognormal variance with pedigree 0.0807, pedigree (2,2,5,1,1)
  (same comment as for Water)
  property carbon content, fossil 0; name C_content_fossil
  property carbon content, non-fossil 0; name C_content_non_fossil
  property dry mass 0 kg; name DM
  property fraction, origin: fresh water 0; name fraction_origin_fresh_water_Ww
  property fraction, origin: salt water 0; name fraction_origin_salt_water_Ww
  property fraction, origin: unspecified 1; name fraction_origin_unspecified_Ww
  property water in wet mass 1000 kg; name WWM
  property wet mass 1000 kg; name WM
- Zinc II [water, surface water]: 6.00901e-7 kg; source Jungbluth, N. 2007; lognormal variance with pedigree 0.798, pedigree (4,5,5,5,5)
  (same comment as for AOX, Adsorbable Organic Halides)

## Sampling procedure
Literature data.

## Extrapolations
Energy consumption, emissions and infrastructure are estimated based on data from a similar process.

## Review by Emilia Moreno Ruiz 2017-08-08
This dataset was additionally reviewed in a separate review process by Eric Johnson of Atlantic Consulting as well as Emilia Moreno Ruiz and Gregor Wernet of ecoinvent.
