# waste preparation facility construction

Dataset: EcoSpold 2, unit process
Geography: CH
Time period: 2000-01-01 to 2023-12-31
Technology level: current
Classification: ISIC rev.4 ecoinvent: 4290:Construction of other civil engineering projects
Scenario: Business-as-Usual
System model: Allocation, cut-off by classification
Generated by: Thomas Kägi
Published in: Kägi T. 2017
Database: ecoinvent
isCopyrightProtected: true
accessRestrictedTo: 1

## General comment
The inventory is valid for the production of 1 facility with an estimated lifespan of 50 years and a production volume of 10’000 t per year. This inventory is a very rough estimation and should be used carefully. It should not be used if the building itself is in focus of the LCA.
In order to include the infrastructure of scrap sorting and preparation facilities in Switzerland, a new infrastructure inventory was created. It is based on the already existing ecoinvent inventory “scrap preparation facility {RER}” but without the administration building of 50x50x10 m3 which seems highly overestimated (size of half a soccer field, place for about 200 persons) for a production plant with a capacity of 10’000 t per year. The lifespan of the building is estimated to be 50 years.

## Included activities start
Service is starting with the components used for the building

## Included activities end
This module includes all processes of the production of the facility. Machinery infrastructure is excluded

## Allocation
no allocation involved

## Reference product
- waste preparation facility: 1 unit; name RP_amount; By-product classification allocatable product; CPC 53290: Other civil engineering works
  production volume 1 unit; name RP_PV
    Assuming one plant a year
  properties: carbon allocation 0 kg, carbon content 0, lifetime 50 year, lifetime capacity [kg] 5e8 kg, price 2.2322e7 EUR2005

## Inputs from technosphere
All rows: lognormal variance with pedigree 0.2106, pedigree (5,5,5,5,5)
- building, hall: 1670 m2
  activityLink introduced to establish a direct link to the corresponding regional supply of this product
- building, multi-storey: 2500 m3
  (same comment as for building, hall)
- concrete, 30MPa: 67 m3
  properties: dry mass 2205 kg, water content 0.0816327, wet mass 2385 kg
- concrete, normal strength: 19.1 m3
  properties: dry mass 2190 kg, water content 0.086758, wet mass 2380 kg
- conveyor belt: 200 m
  (same comment as for building, hall)
- industrial machine, heavy, unspecified: 154000 kg
  (same comment as for building, hall)
- reinforcing steel: 13200 kg
  properties: carbon content, fossil 0.004, dry mass 1 kg, wet mass 1 kg
- waste concrete, not reinforced: -55300 kg; name BP_waste_concrete
  production volume; = ABS(BP_waste_concrete/RP_amount*RP_PV)
    Assuming one plant a year
  properties: dry mass 1 kg, wet mass 1 kg
- waste reinforced concrete: -154000 kg; name BP_waste_reinforced
  production volume; = ABS(BP_waste_reinforced/RP_amount*RP_PV)
    Assuming one plant a year
  properties: dry mass 0.99418 kg, water content 0.00585407, wet mass 1 kg

## Inputs from nature
- Occupation, industrial area [natural resource, land]: 1.875e6 m2*year; lognormal variance with pedigree 0.2106, pedigree (5,5,5,5,5)
- Transformation, from unspecified [natural resource, land]: 37500 m2; lognormal variance with pedigree 0.2106, pedigree (5,5,5,5,5)
- Transformation, to industrial area [natural resource, land]: 37510 m2; lognormal variance with pedigree 0.2106, pedigree (5,5,5,5,5)

## Sampling procedure
High uncertainty. Uncertainty estimation according to the pedigree matrix

## Review by Ivan Muñoz Ortiz 2017-08-10
An offline review in excel has been carried out for all the PE recycling activities, checking mass balances, data sources, etc. Several comments were made to the data provider and improvements have been made to the datasets.
