# nitrate salts production, for solar power application

Dataset: EcoSpold 2, unit process
Geography: GLO
Time period: 2015-01-01 to 2023-12-31
Technology level: current
Classification: ISIC rev.4 ecoinvent: 2029:Manufacture of other chemical products n.e.c.
Synonyms: solar salts
Scenario: Business-as-Usual
System model: Allocation, cut-off by classification
Generated by: Florentine Brunner
Database: ecoinvent
isCopyrightProtected: true
accessRestrictedTo: 1

## General comment
This activity represents the mixing of sodium nitrate, technical grade and potassium nitrate, technical grade to nitrate salts, for solar power application. Nitrate salts applied in the thermal storage systems of solar thermal parabolic trough plants, 50 MW, and solar tower power plant, 20 MW, constructed between 2010 and 2020 are commonly a mixture of 60% sodium nitrate and 40% potassium nitrate.

## Included activities start
The activity starts with the input of sodium nitrate, technical grade and potassium nitrate, technical grade.

## Included activities end
The activity ends with the nitrate salts mixture ready to be used in the thermal storage system of concentrating solar power plants.

## Geography
The mixture of nitrate salts is based on data from a solar tower plant and a parabolic through plant in South Africa.

## Technology
For concentrating solar power plants constructed between 2010 and 2020 the applied nitrate salt mixture typically consists of 60% sodium nitrate and 40% potassium nitrate.

## Reference product
- nitrate salts, for solar power application: 1 kg; By-product classification allocatable product; CPC 34280: Hydrogen peroxide; phosphides; carbides; hydrides, nitrides, azides, silicides and borides; HS2017 2850: Hydrides, nitrides, azides, silicides and borides, whether or not chemically defined, other than compounds wh[...]
  production volume 2.79529e8 kg
    Production volume calculated based on the demand of nitrate salts, for solar power application for the construction of first generation concentration solar power plants (represented by the activities “thermal storage system construction, solar thermal parabolic trough, 50 MW, GLO” and “thermal storage system construction, solar tower power plant, 20 MW, GLO”) (2.43E+08 kg). plus the volume estimated to be required by second generation plants, which are expected to use 15% of the salts from primary production and reuse 85% of the salts from shut down power plants (3.65E+07 kg).
  property price 0.715 EUR2005
    Information from personal communication with SQM S.A. (https://www.sqm.com/en/): the average market price for nitrate salts used in solar power application in 2019 is approximately 800USD per metric tonne. See also SQM 2018 Results, http://s1.q4cdn.com/793210788/files/doc_presentations/2018/07/SQM-CorpPres_1Q18_long-final_12jul2018-update.pdf, accessed June 2019. Converted to EUR applying an exchange rate of 1.12 USD/EUR (as of June 2019).
  properties: carbon allocation 0 kg, carbon content 0

## Inputs from technosphere
- potassium nitrate, technical grade: 0.4 kg; lognormal variance with pedigree 0.0053, pedigree (2,4,3,3,1)
  Solar salts applied in the thermal storage systems of solar thermal parabolic trough plants, 50 MW, and solar tower power plant, 20 MW, constructed between 2010 and 2020 are commonly a mixture of 60% sodium nitrate and 40% potassium nitrate.
  properties: dry mass 1 kg, wet mass 1 kg
- sodium nitrate, technical grade: 0.6 kg; lognormal variance with pedigree 0.0053, pedigree (2,4,3,3,1)
  (same comment as for potassium nitrate, technical grade)
  properties: dry mass 1 kg, wet mass 1 kg
