# flat glass production, uncoated

Dataset: EcoSpold 2, unit process
Geography: RER
Time period: 1996-01-01 to 2023-12-31
Technology level: current
Classification: ISIC rev.4 ecoinvent: 2310:Manufacture of glass and glass products
Classification: EcoSpold01Categories: glass/construction
Synonyms: Flach; float; plate
Tags: ConvertedDataset
Scenario: Business-as-Usual
System model: Allocation, cut-off by classification
Generated by: Daniel Kellenberger (obsolete)
Published in: Kellenberger D. 2007
Database: ecoinvent
isCopyrightProtected: true
accessRestrictedTo: 1

## General comment
This dataset represents the production of 1 kg of uncoated flat glass.The amount of raw materials is calculated based on the composition of flat glass. The total amount of energy is partitioned in 58% from natural gas, 38% heavy fuel oil and 5% electrical. The amount of tin yearly added to the tin bath is assumed to leave the system by air, as part of the particulates. The same with lead. Both emissions are double counted: as particulate and as emission to air. Most other emissions are a mean value of plants with and plants without abatment. It is assumed that half of water evaporates and other half is treated.
[This dataset was already contained in the ecoinvent database version 2. It was not individually updated during the transfer to ecoinvent version 3. Life Cycle Impact Assessment results may still have changed, as they are affected by changes in the supply chain, i.e. in other datasets. This dataset was generated following the ecoinvent quality guidelines for version 2. It may have been subject to central changes described in the ecoinvent version 3 change report (http://www.ecoinvent.org/database/ecoinvent-version-3/reports-of-changes/), and the results of the central updates were reviewed extensively. The changes added e.g. consistent water flows and other information throughout the database. The documentation of this dataset can be found in the ecoinvent reports of version 2, which are still available via the ecoinvent website. The change report linked above covers all central changes that were made during the conversion process.]

## Included activities end
includes the whole manufacturing process to produce flat glass (raw material provision, cullet addition, melting process, forming process (on float bath), cooling process (annealing lehr), cutting process and storage), internal processes (transport, etc.) and infrastructure. No administration and packing is included.

## Geography
For some exchanges CH- and DE-modules have been used as proxy

## Technology
Basic principle is pouring molten glass onto a bath of molten tin and forming a ribbon with the upper and lower surfaces becoming parallel under the influence of gravity and surface tension. Average technique used in European flat glas production.

## Parameters
- fraction, cooling water, cooling pond system, to air: 0.032 dimensionless; name fraction_CW_CP_to_air; lognormal variance with pedigree 0.0413, pedigree (2,3,1,3,1)
  Calculated based on literature value (Scown, C.D., 2011, Water Footprint of U.S. Transportation Fuels and supplying information of the article) (Vionnet, S., Quantis Water Database - Technical Report, 2012).
- fraction, cooling water, once-through system, to air: 0.004 dimensionless; name fraction_CW_OT_to_air; lognormal variance with pedigree 0.0413, pedigree (2,3,1,3,1)
  (same comment as for fraction, cooling water, cooling pond system, to air)
- fraction, cooling water, recirculating system, to air: 0.771 dimensionless; name fraction_CW_R_to_air; lognormal variance with pedigree 0.0413, pedigree (2,3,1,3,1)
  (same comment as for fraction, cooling water, cooling pond system, to air)
- fraction, cooling water, to air: 0.3875 dimensionless; name fraction_CW_to_air; = (0.5*fraction_CW_OT_to_air)+(0.5*fraction_CW_R_to_air); lognormal variance with pedigree 0.092025, pedigree (4,4,3,2,4)
  Calculated value based on literature value (see comments of the other parametres present in this dataset) and expert opinion. In the case when no industry/literature data are available about the type of cooling or directly fraction, cooling water, to air specific for the process a default assumption is applied. It is assumed that the once-through cooling system is used in 50% of all cases and recirculating system is used in another 50% of all cases.

## Reference product
- flat glass, uncoated: 1 kg; By-product classification allocatable product; CPC 37114: Glass in sheets, bent, edge-worked, engraved, drilled, enamelled or otherwise worked, but not framed, etc.; HS2017 7005: Glass; float glass and surface ground or polished glass, in sheets, whether or not having an absorbent, refle[...]
  EcoSpold01Location=RER
  production volume 7.172e9 kg
    Unknown
    Flat glass market 22% of 32600 million kg glass production in Europe (http://www.waste-stream.eu/html/glass_market.html)
  property carbon content, fossil 0
    Tab 5.1, ecoinvent v2.2 report 7, part XI, for Flat glass composition.
  property carbon content, non-fossil 0
    Tab 5.1, ecoinvent v2.2 report 7, part XI, for Flat glass composition.
  property price 3.16 EUR2005
    Upscale from EU by exchange rate. Afterwards apply the PPP (Purchasing power parity) factor of 0.83.
  properties: carbon allocation 0 kg, carbon content 0, dry mass 1 kg, water content 0, water in wet mass 0 kg, wet mass 1 kg

## Inputs from technosphere
- electricity, medium voltage: 0.111 kWh; source IPCC 2001; lognormal variance with pedigree 0.1706, pedigree (3,5,5,1,5)
  EcoSpold01Location=UCTE
  Estimation, based on literature value. The 5% of the total consumption is considered to be an electricity consumption.
  Uncertainty: ;
- flat glass factory: 2.41e-10 unit; lognormal variance with pedigree 0.3761, pedigree (4,5,5,3,1)
  Estimation. The typical production amount of a flat glass production plant is assumed about 50'000 tons per year. The life span of the flat glass plant is assumed 50 years.
  EcoSpold01Location=RER
  Uncertainty: ;
- heavy fuel oil: 0.0738 kg; source IPCC 2001; lognormal variance with pedigree 0.1706, pedigree (3,5,5,1,5)
  Estimation, based on a literature value. The 38% of the total energy consumption is considered: heat reaction to form glass, heat required to raise glass temperature and heat content of the gas released during melting.
  EcoSpold01Location=RER
  Uncertainty: ;
  properties: carbon content, fossil 0.849, dry mass 1 kg, heating value, net 41.2 MJ, wet mass 1 kg
- hydrogen, gaseous, medium pressure, merchant: 3.6e-6 kg; lognormal variance with pedigree 0.78, pedigree (3,5,5,1,5)
  Estimation. It is assumed that about 1% of the gas leakage per hour (total volume assumed to be 3.000 m3), representing 200.000 m3/year. The density considered is 0.09 kg/m3.
  EcoSpold01Location=RER
  Uncertainty: ;
  properties: dry mass 1 kg, heating value, net 120.21 MJ, wet mass 1 kg
- lime, packed: 0.390069, 0.00993116 kg (2 suppliers, which the file names only by identifier); sum of these 0.4 kg; source IPCC 2001; lognormal variance with pedigree 0.098, pedigree (1,5,5,1,1)
  Literature value.
  EcoSpold01Location=CH
  Uncertainty: ;
  properties: carbon content, fossil 0.117492, dry mass 0.998 kg, water content 0.00200401, wet mass 1 kg
  note on carbon content, fossil: Table 3.1, ecoinvent v2.2 report 7, part VII, pg 3. MW CaCO3=100, MW MgCO3=84
- municipal solid waste: -0.0011 kg; lognormal variance with pedigree 0.0186, pedigree (1,3,1,1,3)
  Estimation, based on literature values. It is assumed that the amount of 50.000 kg/year is about the same as the rock wool production.
  Further references:
  Flumroc (2002) Vierter Flumroc-Ökologiebericht. Flumroc AG, Flums (CH).
  EcoSpold01Location=CH
  Uncertainty: ;
  production volume
    Calculated from the production volume of flat glass, uncoated in proportion to the respective output amounts.
  properties: carbon content, fossil 0.171549, carbon content, non-fossil 0.261655, dry mass 0.771 kg, heating value, net 11.74 MJ, water content 0.297017, wet mass 1 kg
  note on carbon content, fossil: MSW composition in tab 4.1, ecoinvent v2.2 report 13_I. C content referred to 1 kg DM
  note on heating value, net: Value taken from the general comment of the treatment dataset.
- natural gas, high pressure: 0.000809601, 0.116113 m3 (2 suppliers, which the file names only by identifier); sum of these 0.116923 m3; source IPCC 2001; lognormal variance with pedigree 0.1706, pedigree (3,5,5,1,5)
  EcoSpold01Location=RER
  Estimation, based on a literature value. The 57% of the total energy consumption is considered: heat reaction to form glass, heat required to raise glass temperature and heat content of the gas released during melting. It is assumed that the plant is connected to a high pressure pipeline.
  Uncertainty: ;
  properties: carbon content, fossil 0.602381, dry mass 0.84 kg, heating value, gross 40 MJ, heating value, net 36 MJ, wet mass 0.84 kg
  note on carbon content, fossil: An average C content of 0.506 kg C/ m3 has been assumed (this average has been calculated using data in Tab 3.5, ecoinvent v2.2 report 6_V
  note on heating value, net: Literature value, Source: Christoph Meili;Niels Jungbluth;Maresa Bussa (2021) Life cycle inventories of crude oil and natural gas extraction. ESU-services Ltd. commissioned by BAFU & VSG, Schaffhausen, Switzerland, http://esu-services.ch/data/public-lci-reports/
- nitrogen, liquid: 0.00495 kg; lognormal variance with pedigree 0.69, pedigree (1,1,5,1,1)
  Estimation. It is assumed that about 1% of the gas leakage per hour (total volume assumed to be 3.000 m3), representing 200.000 m3/year. The density considered is 1.25 kg/m3.
  EcoSpold01Location=RER
  properties: dry mass 1 kg, wet mass 1 kg
- refractory, fireclay, packed: 0.00107 kg; lognormal variance with pedigree 1.37, pedigree (1,1,5,1,1)
  Estimation of standard deviation
  EcoSpold01Location=DE
  properties: dry mass 1 kg, wet mass 1 kg
- silica sand: 0.578 kg; source IPCC 2001; lognormal variance with pedigree 0.098, pedigree (1,5,5,1,1)
  EcoSpold01Location=DE
  Literature value.
  Uncertainty: ;
  properties: dry mass 0.99 kg, water content 0.010101, wet mass 1 kg
- soda ash, light: 0.229 kg; source IPCC 2001; lognormal variance with pedigree 0.098, pedigree (1,5,5,1,1)
  Literature value.
  EcoSpold01Location=RER
  Uncertainty: ;
  properties: carbon content, fossil 0.0517241, dry mass 1 kg, heating value, net 3.43 MJ, wet mass 1 kg
- steel, unalloyed: 1.37e-5 kg; lognormal variance with pedigree 0.0541, pedigree (3,4,5,3,1)
  Estimation, based on a personal communication (Mr. Pioch, Pilkington Gladbeck). The total amount considers a consumption of 2 - 3 tons/years, a float glass production amount of 600 - 800 t/day and 364 production days.
  EcoSpold01Location=RER
  Uncertainty: ;
  properties: carbon content, fossil 0.0025, dry mass 1 kg, wet mass 1 kg
  note on carbon content, fossil: Unalloyed steels or carbon steels are those in which the level of an individual element in no case reaches or exceeds the limiting concentration given in Tab. 3.1 ecoinvent v2.2 report 10_partII. Assumed to have a C content of 0.25%
- tin: 9.16e-6 kg; lognormal variance with pedigree 1.58, pedigree (1,1,5,1,1)
  Estimation, based on a personal communication (Mr. Pioch, Pilkington Gladbeck). The total amount considers a consumption of 2 tons/years, a float glass production amount of 600 - 800 t/day and 364 production days.
  EcoSpold01Location=RER
  properties: dry mass 1 kg, wet mass 1 kg
- wastewater, average: -8.58038e-6, -0.00034142 m3 (2 suppliers, which the file names only by identifier); sum of these -0.00035 m3; source EPA 1998; lognormal variance with pedigree 0.65, pedigree (1,1,1,1,1)
  Estimation, based on literature values. Water is recycled or treated using standard tecniques. It is assumed that half of the water evaporates and other half is treated.
  EcoSpold01Location=CH
  production volume
    (same comment as for municipal solid waste)
  properties: carbon content, non-fossil 0.194039, dry mass 0.346837 kg, mass concentration, TOC 0.1091 kg/m3, mass concentration, calcium 0.039453 kg/m3, mass concentration, chlorine 0.030031 kg/m3, mass concentration, hydrogen 0.013365 kg/m3, mass concentration, nitrogen 0.031015 kg/m3, mass concentration, oxygen 0.069824 kg/m3, mass concentration, sodium 0.06456 kg/m3, mass concentration, sulfur 0.015602 kg/m3, water content 2882.2, wet mass 1000 kg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
  note on carbon content, non-fossil: 0.0673 kg TOC/m3 (Tab A.17, ecoinvent v2.2 report 13_I). TOC was considered as Total Carbon.

## Inputs from nature
- Water, cooling, unspecified natural origin [natural resource, in water]: 0.0007 m3; name water_cooling_UNO_input; source Frischknecht R. 1996; lognormal variance with pedigree 0.2706, pedigree (2,5,5,5,5)
  Literature value.
  Uncertainty: ;

## Emissions to nature
- Carbon dioxide, fossil [air, unspecified]: 0.693 kg; source IPCC 2001; lognormal variance with pedigree 0.1766, pedigree (4,5,5,1,5)
  Stoichiometric calculation. The CO2 emissions from combustion are calculated based on the amount of fuel burned. The geogenic CO2 emissions from the rocks are also calculated based on the composition of the materials in the product and the amount of raw materials, from literature values.
  Uncertainty: ;
- Carbon monoxide, fossil [air, unspecified]: 5e-5 kg; source EPA 1998; lognormal variance with pedigree 0.69, pedigree (1,1,5,1,1)
  Literature value.
- Hydrochloric acid [air, unspecified]: 9.25e-5 kg; source IPCC 2001; lognormal variance with pedigree 0.23, pedigree (1,1,5,1,1)
  Estimation, based on literature values. It is considered that 50% of the companies have abatement and the other 50% not.
- Hydrogen fluoride [air, unspecified]: 2.1e-5 kg; source IPCC 2001; lognormal variance with pedigree 0.4, pedigree (1,1,5,1,1)
  (same comment as for Hydrochloric acid)
- NMVOC, non-methane volatile organic compounds [air, unspecified]: 5e-5 kg; source EPA 1998; lognormal variance with pedigree 0.16, pedigree (1,1,5,1,1)
  Proxy, based on literature value. NMVOC is used as proxy for methane.
- Nitrogen oxides [air, unspecified]: 0.00327 kg; source IPCC 2001; lognormal variance with pedigree 0.21, pedigree (1,1,5,1,1)
  (same comment as for Hydrochloric acid)
- Particulate Matter, < 2.5 um [air, unspecified]: 0.000184 kg; source IPCC 2001; lognormal variance with pedigree 3.97, pedigree (1,1,5,1,1)
  Estimation, based on literature values. It is considered that 50% of the companies have abatement and the other 50% not. Of the total amount of particles, it is assumed that the 80% are PM2.5.
- Particulate Matter, > 10 um [air, unspecified]: 2.3e-5 kg; source IPCC 2001; lognormal variance with pedigree 0.27, pedigree (1,1,5,1,1)
  Estimation, based on literature values. It is considered that 50% of the companies have abatement and the other 50% not. Of the total amount of particles, it is assumed that the 10% are PM10.
- Particulate Matter, > 2.5 um and < 10um [air, unspecified]: 2.3e-5 kg; source IPCC 2001; lognormal variance with pedigree 0.27, pedigree (1,1,5,1,1)
  Estimation, based on literature values. It is considered that 50% of the companies have abatement and the other 50% not. Of the total amount of particles, it is assumed that the 10% are between PM2.5 and PM10.
- Sulfur dioxide [air, unspecified]: 0.00404 kg; source IPCC 2001; lognormal variance with pedigree 0.27, pedigree (1,1,5,1,1)
  (same comment as for Hydrochloric acid)
- Tin ion [air, unspecified]: 9.13e-6 kg; lognormal variance with pedigree 1.58, pedigree (1,1,5,1,1)
  Estimation. It is assumed that the amount of tin to compensate the losses is released to air.
- Water [air, unspecified]: 0.00027125 m3; name water_to_air_unspecified; = (water_cooling_UNO_input*fraction_CW_to_air); lognormal variance with pedigree 0.0807, pedigree (2,2,5,1,1)
  Calculated value based on literature values and expert opinion. See comments in the parametres' comment field.
  property fraction, origin: fresh water 0; name fraction_origin_fresh_water
  property fraction, origin: salt water 0; name fraction_origin_salt_water
  property fraction, origin: unspecified 1; name fraction_origin_unspecified
- Water [water, unspecified]: 7.875e-5 m3; name water_to_water_unspecified; = water_cooling_UNO_input*(1-fraction_CW_to_air)-0.00035; lognormal variance with pedigree 0.0807, pedigree (2,2,5,1,1)
  (same comment as for Water)
  property carbon content, fossil 0; name C_content_fossil
  property carbon content, non-fossil 0; name C_content_non_fossil
  property dry mass 0 kg; name DM
  property fraction, origin: fresh water 0; name fraction_origin_fresh_water_Ww
  property fraction, origin: salt water 0; name fraction_origin_salt_water_Ww
  property fraction, origin: unspecified 1; name fraction_origin_unspecified_Ww
  property water in wet mass 1000 kg; name WWM
  property wet mass 1000 kg; name WM

## Sampling procedure
Literature

## Extrapolations
See geography

## Review by Roberto Dones 2009-01-22
passed

## Review by Roland Hischier 2011-09-22
Transfer of documentation done.
Part "IncludedActivities" needs revision !
