# steel production, low-alloyed, hot rolled

Dataset: EcoSpold 2, unit process
Geography: RoW
Time period: 2000-01-01 to 2023-12-31
Technology level: current
Classification: ISIC rev.4 ecoinvent: 2410:Manufacture of basic iron and steel
Classification: EcoSpold01Categories: metals/extraction
Tags: ConvertedDataset
Scenario: Business-as-Usual
System model: Allocation, cut-off by classification
Generated by: Hans-Jörg Althaus
Published in: Classen M. 2009
Database: ecoinvent
isCopyrightProtected: true
accessRestrictedTo: 1

## General comment
represents Average of World and European production mix. This is assumed to correspond to the consumption mix in Europe
[This dataset was already contained in the ecoinvent database version 2. It was not individually updated during the transfer to ecoinvent version 3. Life Cycle Impact Assessment results may still have changed, as they are affected by changes in the supply chain, i.e. in other datasets. This dataset was generated following the ecoinvent quality guidelines for version 2. It may have been subject to central changes described in the ecoinvent version 3 change report (http://www.ecoinvent.org/database/ecoinvent-version-3/reports-of-changes/), and the results of the central updates were reviewed extensively. The changes added e.g. consistent water flows and other information throughout the database. The documentation of this dataset can be found in the ecoinvent reports of version 2, which are still available via the ecoinvent website. The change report linked above covers all central changes that were made during the conversion process.]

## Included activities start
The activity starts with the reception of the semi finished product at the rolling facility.

## Included activities end
The activity ends with the rolled products. It includes a mix of differently produced steels and hot rolling shapes.

## Geography
Data relate to plants in the EU

## Technology
technology mix

## Reference product
- steel, low-alloyed, hot rolled: 1 kg; By-product classification allocatable product; CPC 4121: Flat-rolled products of steel, not further worked than hot-rolled; HS2017 7218: Stainless steel in ingots or other primary forms; semi-finished products of stainless steel
  EcoSpold01Location=RER
  production volume 6.04549e10 kg
    It is assumed that 50% of low-alloyed is hot rolled.
  property carbon content, fossil 0.005
    Low alloyed steel composition given in Tab. 3.2 ecoinvent v2.2 report 10_partII. Steel assumed to have a C content of 0.5%
  property carbon content, non-fossil 0
    Low alloyed steel composition given in Tab. 3.2 ecoinvent v2.2 report 10_partII.
  property heating value, net 0 MJ
    Non combustible products are assumed to have an LHV equal to zero (0).
  property price 0.412 EUR2005
    Temporary price data.Same price as basic steel from European Union statistics
  properties: carbon allocation 0.005 kg, carbon content 0.005, dry mass 1 kg, water content 0, water in wet mass 0 kg, wet mass 1 kg

## Inputs from technosphere
- hot rolling, steel: 1 kg; lognormal variance with pedigree 0.042, pedigree (1,1,5,5,1)
  EcoSpold01Location=RER
  relates directly to output
- steel, low-alloyed: 1 kg; lognormal variance with pedigree 0.0432, pedigree (2,3,5,5,1)
  EcoSpold01Location=RER
  properties: carbon content, fossil 0.005, dry mass 1 kg, wet mass 1 kg
  note on carbon content, fossil: Low alloyed steel composition given in Tab. 3.2 ecoinvent v2.2 report 10_partII. Steel assumed to have a C content of 0.5%

## Sampling procedure
literature, statistics

## Extrapolations
This dataset has been copied from an original dataset covering the geography RER. The uncertainty has been adjusted accordingly.

## Review by Roland Hischier 2007-08-13
passed
