# iron sulfate production

Dataset: EcoSpold 2, unit process
Geography: CA-QC
Time period: 1993-01-01 to 2023-12-31
Technology level: current
Classification: ISIC rev.4 ecoinvent: 2011:Manufacture of basic chemicals
Classification: EcoSpold01Categories: metals/extraction
Tags: recontextualization
Scenario: Business-as-Usual
System model: Allocation, cut-off by classification
Generated by: Pascal Lesage
Published in: Jungbluth, N. 2007
Database: ecoinvent
isCopyrightProtected: true
accessRestrictedTo: 1

## General comment
Child dataset exchanges identical to GLO dataset. Created to enable linking to regional markets (e.g. for electricity). Data quality indicators adjusted accordingly.
[This dataset was already contained in the ecoinvent database version 2. It was not individually updated during the transfer to ecoinvent version 3. Life Cycle Impact Assessment results may still have changed, as they are affected by changes in the supply chain, i.e. in other datasets. This dataset was generated following the ecoinvent quality guidelines for version 2. It may have been subject to central changes described in the ecoinvent version 3 change report (http://www.ecoinvent.org/database/ecoinvent-version-3/reports-of-changes/), and the results of the central updates were reviewed extensively. The changes added e.g. consistent water flows and other information throughout the database. The documentation of this dataset can be found in the ecoinvent reports of version 2, which are still available via the ecoinvent website. The change report linked above covers all central changes that were made during the conversion process.]

## Included activities start
The activity starts with the reception of the raw materials at the production plant gates.

## Included activities end
The activity ends with the produced iron sulfate. A rough estimation is used for the electricity used for purification of the by-product. No data included for infrastructure and emissions.

## Technology
Chemical product for waste water treatment.

## Time period
Time of publication.

## Parameters
- Quebec gross domestic product 2011: 3.11e11 USD(2011); name quebecGDP2011; lognormal variance with pedigree 0.0006, pedigree (1,1,1,1,1)
  Quebec Gross domestic product for 2011, expressed in 2011 USD. Source: Institut de la statistique du Québec. Converted from CAD to USD using a yearly average exchange rate of 0.989 CAD/USD (Source: bank of Canada).
- world gross domestic product 2011: 7e13 USD(2011); name worldGDP2011; lognormal variance with pedigree 0.0006, pedigree (1,1,1,1,1)
  World Gross domestic product for 2011, expressed in 2011 USD. Source: World Bank.

## Reference product
- iron sulfate: 1 kg; By-product classification allocatable product; CPC 34240: Phosphates of triammonium; salts and peroxysalts of inorganic acids and metals n.e.c.; HS2017 283329: Sulphates; n.e.c. in item no. 2833.2; CAS 7720-78-7
  production volume 0.0177714 kg
    Gross approximation of Quebec production volume using relative value of Quebec GDP to world GDP
  property price 0.071 EUR2005
    Estimated values. Consumer's price for 2015 is between 77 and 80 USD/tonne (http://sdjiangyuanjh.en.made-in-china.com/product/CKLJkmiybRWH/China-Ferrous-Sulfate.html, accessed 20151022). The price has been calculated from a mean value of 78.5 USD. The echange rate for 2015 is of EUR = 1.109 (http://www.imf.org, accessed 20160105)
  properties: carbon allocation 0 kg, carbon content 0, carbon content, fossil 0, carbon content, non-fossil 0, dry mass 1 kg, water content 0, water in wet mass 0 kg, wet mass 1 kg

## Inputs from technosphere
- chemical factory, organics: 4e-10 unit; lognormal variance with pedigree 0.372, pedigree (4,4,5,5,1)
  Rough estimation
  Uncertainty: R
- electricity, medium voltage: 0.222 kWh; lognormal variance with pedigree 0.062, pedigree (4,4,5,5,1)
  Literature
  Uncertainty: L

## Sampling procedure
Diploma thesis for a waste water treatment plant.
