# alkylbenzene production, linear

Dataset: EcoSpold 2, unit process
Geography: CA-QC
Time period: 1995-01-01 to 2023-12-31
Technology level: current
Classification: ISIC rev.4 ecoinvent: 2023:Manufacture of soap and detergents, cleaning and polishing preparations, pe
Synonyms: Benzene C6-12-alkyl derivs.
Scenario: Business-as-Usual
System model: Allocation, cut-off by classification
Generated by: Pascal Lesage
Published in: Zah R. 2007
Database: ecoinvent
isCopyrightProtected: true
accessRestrictedTo: 1

## General comment
This dataset represents the production of 1 kg of liquid linear alkylbenzene (LAB). Usually, LAB are liquid at room temperature - having a melting point in the area of -50 °C and a boiling point in the area of 170°C. LAB is the most common raw material for the production of detergents. LAB is almost entirely used for the production of LAS (linear alkylate sulfonates), the worldwide most important synthetic surfactant.
The material and energy data are based on the ECOSOL study of the European Surfactant Industry, as well as estimations based on industrial data. The process emissions are based on estimations. The water exchanges are approximated based on data from a large chemical factory (Gendorf 2016).
References:
Kocal J. A., Vora B. V. and Imai T. (2001) Production of linear alkylbenzenes. In: Applied Catalysis A: General, 221, pp. 295 - 301.
SRI International (2003) Abstract of the CEH report 'Linear and Branched Alkylbenzenes'. Online document. Download of Mai 14, 2003 from http://ceh.sric.sri.com/Public/Reports/610.5000/Abstract.html.
UOP LLC (2001) UOP Linear Alkylbenzene (LAB) complex. UOP, Des Plaines, USA, Online-Version under: http://www.uop.com
Gendorf (2016) Umwelterklärung 2015, Werk Gendorf Industriepark, www.gendorf.de.

## Included activities start
From the reception of n-paraffins at the factory gate.

## Included activities end
This activity ends with 1 kg of linear alkylbenzene at the factory gate. The dataset includes the input materials, auxiliaries, energy uses, infrastructure and emissions.

## Geography
The data is based on the European LAB production but is assumed to be representative of the production in this geography. Some values are based on data from a large chemical factory located in Germany. These are assumed to be valid for this geography.

## Technology
Several different production routes for the production of linear alkylbenzene can be distinguished:
- Chlorination of paraffins to monochloroparaffin and subsequent alkylation with benzene. As catalyst aluminium chloride is used within this reaction.
- Production of olefins (e.g. by chlorination of paraffins followed by dehydrochlorination, by wax cracking, by ethylene oligomerization etc.). These olefins are in a second step alkylated with benzene in the presence of hydrofluoric acid as catalyst.
- Dehydrogenation of linear paraffins to a mixture of linear olefins and subsequent alkylation with benzene. As catalyst again hydrofluoric acid is used within this reaction.
The last of the different mentioned production ways is by far the most important one. In 2000 this production route accounted for almost 90% of the worldwide LAB production. For this study here, only the latter process route is therefore taken into account and the dataset here represents LAB produced by dehydrogenation and subsequent HF catalysed alkylation.
A simply summary for the reaction is as follows:
n-Paraffin + Benzene + HF -> LAB + HF
Reference:
Kocal J. A., Vora B. V. and Imai T. (2001) Production of linear alkylbenzenes. In: Applied Catalysis A: General, 221, pp. 295 - 301.
Althaus H.-J., Chudacoff M., Hischier R., Jungbluth N., Osses M. and Primas A. (2007) Life Cycle Inventories of Chemicals. ecoinvent report No. 8, v2.0. EMPA Dübendorf, Swiss Centre for Life Cycle Inventories, Dübendorf, CH.

## Time period
Date of published literature. Some values are based on data published by the Gendorf factory that were collected between 2011 and 2015. The time period has been adjusted accordingly. For more details, see the comments of the exchanges.

## Parameters
- Quebec gross domestic product 2011: 3.11e11 USD(2011); name quebecGDP2011; lognormal variance with pedigree 0.0006, pedigree (1,1,1,1,1)
  Quebec Gross domestic product for 2011, expressed in 2011 USD. Source: Institut de la statistique du Québec. Converted from CAD to USD using a yearly average exchange rate of 0.989 CAD/USD (Source: bank of Canada).
- world gross domestic product 2011: 7e13 USD(2011); name worldGDP2011; lognormal variance with pedigree 0.0006, pedigree (1,1,1,1,1)
  World Gross domestic product for 2011, expressed in 2011 USD. Source: World Bank.

## Reference product
- alkylbenzene, linear: 1 kg; name RP; source Häussinger P. 2000; By-product classification allocatable product; CPC 34110: Hydrocarbons and their halogenated, sulphonated, nitrated or nitrosated derivatives; HS2017 290290: Cyclic hydrocarbons; n.e.c. in heading no. 2902
  LAB is the most common raw material for the production of detergents. LAB is almost entirely used for the production of LAS (linear alkylate sulfonates), the worldwide most important synthetic surfactant. The worldwide LAB production is in the order of 2.4 kt.
  Usually, LAB are liquid at room temperature - having a melting point in the area of -50 °C and a boiling point in the area of 170°C.
  Additional references:
  Kocal J. A., Vora B. V. and Imai T. (2001) Production of linear alkylbenzenes. In: Applied Catalysis A: General, 221, pp. 295 - 301.
  SRI International (2003) Abstract of the CEH report 'Linear and Branched Alkylbenzenes'. Online document. Download of Mai 14, 2003 from http://ceh.sric.sri.com/Public/Reports/610.5000/Abstract.html.
  UOP LLC (2001) UOP Linear Alkylbenzene (LAB) complex. UOP, Des Plaines, USA, Online-Version under: http://www.uop.com
  production volume 6e6 kg; name RP_PV
    Estimated value. The Quebec production volume is extrapolated from the global production volume based on reports from the Chemistry industry Association of Canada, Cefic (European Chemical Industry Council), and the American Chemistry Council.
    According to the Chemistry Industry Association of Canada in 2016 Quebec represents the 19% of all chemical industries in Canada, with a values of 10 billion dollars in shipment.
    According to Cefic (2016) the Global sales of chemicals in the year 2015 was 3,534 billion euros. The reported share of sales per regions are: EU28 14.7%; Other Europe (Switzerland, Norway, Turkey, Russia and Ukraine) 2.7%; NAFTA (USA, Canada and Mexico) 16.5%; Latin America 3.8%; China 39.9%; Japan 3.9%; Republic of Korea 3.2%; India 2.2%; Rest of Asia 11.9%; Rest of the World 1.3%. Cefic also reports the USA total sales, 518.7 billion euros of the global 3534 billion euros (14.7%). The same share is reported from the American Chemistry Council (2016), according to this source the USA sales account for 15% of global sales for the year 2016.
    The production volume of Quebec is therefore calculated based on the share of Quebec sales 10 billion Canadian dollars over the global sales of chemicals 3,534 billion euros reported by Cefic. According to this calculation Quebec share of chemicals sales globally is of 0.2%, this also fits with Cefic data according to which NAFTA covers 16.5% of chemicals sales of which 14.7% are attributed to the US alone.
    The worldwide production of linear alkylbenzenes in 2000 was 3 million tonnes (HERA, 2004).
    Reference(s):
    Chemistry Industry Association of Canada 2016. Chemistry Industry Economic Profile 2016. Retrieved from: http://www.canadianchemistry.ca/library/uploads/Statistical_Review_2016_VF.pdf
    Cefic 2016. Facts and figures 2016 of the European chemical industry. Accessible at: http://www.cefic.org/Facts-and-Figures/Chemicals-Industry-Profile/
    American Chemistry Council 2016. Outlook: U.S. Chemical Industry Continues to Outpace Industrial Output; Accounts for More Than One-Half of Construction Spending by Manufacturing Sector. Accessible at: https://www.americanchemistry.com/Media/PressReleasesTranscripts/ACC-news-releases/US-Chemical-Industry-Continues-to-Outpace-Industrial-Output.html
    Human and Environmental Risk Assessment (HERA). 2004. LAS - Linear Alkylbenzene Sulphonate (CAS No. 68411-30-3), Version 2.0. pp. 8-9. Report retreived online from http://wko.at/up/enet/stellung/qualitaetszielstellbeilage2.pdf, 4 July 2017.
  property carbon content, fossil 0.672414
    LAB is produced from paraffin and benzene. Molecular weight of LAB is estimated to be around 232g/mol. LAB was considered a C13 molecule
  property heating value, net 41.22 MJ
    LHV is calculated based on the elemental composition of the substance. Based on the CAS number of the substance (067774-74-7), the chemical formula of the substance is found to be: C17H28, (PubChem 2020).
    Reference: Kim, S., Chen, J., Cheng, T., Gindulyte, A., He, J., He, S., Li, Q., Shoemaker, B. A., Thiessen, P. A., Yu, B., Zaslavsky, L., Zhang, J., & Bolton, E. E. (2019). PubChem 2019 update: improved access to chemical data. Nucleic acids research, 47(D1), D1102–D1109. https://doi.org/10.1093/nar/gky1033
  property price 0.92 EUR2005
    From ICIS (http://www.icis.com/Articles/2004/03/04/560887/chemical-prices.html.). Commodity: 'Linear alkyl benzene (LAB), dlvd'. Year 2004.
  properties: carbon allocation 0.672414 kg, carbon content 0.672414, carbon content, non-fossil 0, dry mass 1 kg, water content 0, water in wet mass 0 kg, wet mass 1 kg

## Inputs from technosphere
- benzene: 0.33 kg; name benzene_input_amount; lognormal variance with pedigree 0.1786, pedigree (4,5,5,5,5)
  Estimated value based on expert judgement.
  properties: carbon content, fossil 0.923077, dry mass 1 kg, heating value, net 42.5 MJ, wet mass 1 kg
- chemical factory, organics: 4e-10 unit; lognormal variance with pedigree 0.31, pedigree (2,3,2,4,3)
  Calculated based on literature data published by the industry. For this activity, no information was readily available concerning infrastructure and land-use. Therefore, the infrastructure is estimated based on data from two chemical factories, the BASF site of Ludwigshafen and the chemical factory in Gendorf (which are both located in Germany), which produce a wide range of chemical substances. Based on this data, the following assumptions are made: the built area amounts to about 4.2 ha, the plant has an average output of 50'000 t/a and a lifespan of fifty years. The estimated infrastructure amount is therefore 4.00 E-10 units per kg of produced chemical.
  References:
  Althaus H.-J., Chudacoff M., Hischier R., Jungbluth N., Osses M. and Primas A. (2007) Life Cycle Inventories of Chemicals. ecoinvent report No. 8, v2.0. EMPA Dübendorf, Swiss Centre for Life Cycle Inventories, Dübendorf, CH.
  Gendorf (2000) Umwelterklärung 2000, Werk Gendorf. Werk Gendorf, Burgkirchen.
- electricity, medium voltage: 0.144 kWh; source Berna, J. L.  1995; lognormal variance with pedigree 0.04, pedigree (4,5,3,5,1)
  Estimation. Based on literature data.
  Uncertainty: e
- heat, district or industrial, natural gas: 1.45 MJ; source Berna, J. L.  1995; lognormal variance with pedigree 0.04, pedigree (4,5,3,5,1)
  Estimation. Based on literature data.
  Uncertainty: e
  properties: heating value, net 1 MJ
- heat, district or industrial, other than natural gas: 3.207 MJ; source Berna, J. L.  1995; lognormal variance with pedigree 0.04, pedigree (4,5,3,5,1)
  Estimation. Based on literature data.
  Uncertainty: e
  properties: heating value, net 1 MJ
- municipal solid waste: -0.0028 kg; name BP_municipal_solid_waste; source Berna, J. L.  1995; lognormal variance with pedigree 0.0208, pedigree (2,5,2,5,1)
  Literature value.
  Uncertainty: d
  production volume; = RP_PV*BP_municipal_solid_waste/ABS(RP)
    Calculated from the production volume of alkylbenzene, linear in proportion to the respective output amounts.
  properties: carbon content, fossil 0.171549, carbon content, non-fossil 0.261655, dry mass 0.771 kg, heating value, net 11.74 MJ, water content 0.297017, wet mass 1 kg
  note on carbon content, fossil: MSW composition in tab 4.1, ecoinvent v2.2 report 13_I. C content referred to 1 kg DM
  note on heating value, net: Value taken from the general comment of the treatment dataset.
- paraffin: 0.77 kg; name paraffin_input_amount; lognormal variance with pedigree 0.1786, pedigree (4,5,5,5,5)
  Estimated value based on expert judgement.
  properties: carbon content, fossil 0.847059, dry mass 1 kg, heating value, net 41.5 MJ, wet mass 1 kg
  note on carbon content, fossil: An average composition of C12H26 (molecular weight of 170 g/mol) was assumed for n-parafins, after ecoinvent v2.2 report 8, part II, pg 398
  note on heating value, net: Indicative value. Reference: Fuels - Higher and Lower Calorific Values, available at: https://www.engineeringtoolbox.com/fuels-higher-calorific-values-d_169.html
- tap water: 0.026 kg; lognormal variance with pedigree 0.0106, pedigree (2,3,2,4,3)
  Calculated based on literature data published by the industry. This value is a 5-year average of data (2011 - 2015) published by the Gendorf factory (Gendorf, 2016, Umwelterklärung, www.gendorf.de), (Gendorf, 2015, Umwelterklärung, www.gendorf.de), (Gendorf, 2014, Umwelterklärung, www.gendorf.de). The amount of tap water per kg of chemical substance produced is calculated using literature data published by the Gendorf factory based in Germany, which produces a wide range of chemical substances. The factory produced 1657400 tonnes of chemical substances in the year 2015 (Gendorf, 2016, Umwelterklärung, www.gendorf.de) and 740000 tonnes of intermediate products. The amount of tap water consumed in the year 2015 was 55100 tonnes (Gendorf, 2016, Umwelterklärung, www.gendorf.de). The resulting amount of tap water is 0.023 kg/kg of chemical product produced. The 5-year average (2011 - 2015, weighted by production volume) is 0.026 kg/kg.
  properties: carbon content, fossil 0.00178991, dry mass 0.000337476 kg, water content 2962.17, wet mass 1 kg
  note on carbon content, fossil: Bicarbonate content is 2.93 mol/m3. CO2 content is 0.1 mol/m3 (ecoinvent v2.2 report 8, Tab 93.1).
- wastewater, average: -2.27712e-6 m3; name BP_wastewater_average; lognormal variance with pedigree 0.0438, pedigree (2,4,1,4,4)
  Calculated based on literature data published by the GENDORF Chemical Park. The factory produced an average of 2462760 tonnes of chemical substances (including intermediates) per year in the years 2015-2019. The average ouput of wastewater going to an external wastewater treatment plant in the years 2015-2019 was 5608 m3 per year. This equals 0.000002277 m3/kg chemical produced.
  References:
  Chemiepark GENDORF, Umwelterklärung 2016, https://www.gendorf.de/Nachbarn/Umweltschutz/Industrie%20und%20Nachhaltigkeit
  Chemiepark GENDORF, Umwelterklärung 2017, https://www.gendorf.de/Nachbarn/Umweltschutz/Industrie%20und%20Nachhaltigkeit
  Chemiepark GENDORF, Umwelterklärung 2020, https://www.gendorf.de/Nachbarn/Umweltschutz/Industrie%20und%20Nachhaltigkeit
  production volume; = RP_PV*BP_wastewater_average/ABS(RP)
    (same comment as for municipal solid waste)
  properties: carbon content, non-fossil 0.194039, dry mass 0.346837 kg, water content 2882.2, wet mass 1000 kg
  note on carbon content, non-fossil: 0.0673 kg TOC/m3 (Tab A.17, ecoinvent v2.2 report 13_I). TOC was considered as Total Carbon.

## Inputs from nature
- Water, cooling, unspecified natural origin [natural resource, in water]: 0.014707 m3; lognormal variance with pedigree 0.044, pedigree (2,4,2,4,4)
  Calculated based on literature data published by the GENDORF Chemical Park. The factory produced an average of 2462760 tonnes of chemical substances (including intermediates) per year in the years 2015-2019. The average amount of cooling water released in the years 2015-2019 was 34408800 t per year. It was assumed that 5% of the cooling water was emitted to air during its use, therefore, to calculate the input of cooling water, the output value reported by GENDORF was scaled up by the factor 1/0.95. This equals 0.014707 m3/kg chemical produced.
  References:
  Chemiepark GENDORF, Umwelterklärung 2016, https://www.gendorf.de/Nachbarn/Umweltschutz/Industrie%20und%20Nachhaltigkeit
  Chemiepark GENDORF, Umwelterklärung 2017, https://www.gendorf.de/Nachbarn/Umweltschutz/Industrie%20und%20Nachhaltigkeit
  Chemiepark GENDORF, Umwelterklärung 2020, https://www.gendorf.de/Nachbarn/Umweltschutz/Industrie%20und%20Nachhaltigkeit
- Water, river [natural resource, in water]: 0.000965426 m3; lognormal variance with pedigree 0.044, pedigree (2,4,2,4,4)
  Calculated based on literature data published by the GENDORF Chemical Park. The factory produced an average of 2462760 tonnes of chemical substances (including intermediates) per year in the years 2015-2019. The average consumption of river water in the years 2015-2019 was 22000820 t per year. However, since the cooling water is modelled as an input, the amount of river water was adjusted to avoid double counting. 55% of the input amount of cooling water was deducted from the amount of river water, as that is the share of river water versus well water. This equals 0.00096543 m3/kg chemical produced.
  References:
  Chemiepark GENDORF, Umwelterklärung 2016, https://www.gendorf.de/Nachbarn/Umweltschutz/Industrie%20und%20Nachhaltigkeit
  Chemiepark GENDORF, Umwelterklärung 2017, https://www.gendorf.de/Nachbarn/Umweltschutz/Industrie%20und%20Nachhaltigkeit
  Chemiepark GENDORF, Umwelterklärung 2020, https://www.gendorf.de/Nachbarn/Umweltschutz/Industrie%20und%20Nachhaltigkeit
- Water, well, in ground [natural resource, in water]: 0.000816522 m3; lognormal variance with pedigree 0.044, pedigree (2,4,2,4,4)
  Calculated based on literature data published by the GENDORF Chemical Park. The factory produced an average of 2462760 tonnes of chemical substances (including intermediates) per year in the years 2015-2019. The average consumption of well water in the years 2015-2019 was 18607480 t per year. However, since the cooling water is modelled as an input, the amount of well water was adjusted to avoid double counting. 45% of the input amount of cooling water was deducted from the amount of well water, as that is the share of well water versus river water. This equals 0.00081652 m3/kg chemical produced.
  References:
  Chemiepark GENDORF, Umwelterklärung 2016, https://www.gendorf.de/Nachbarn/Umweltschutz/Industrie%20und%20Nachhaltigkeit
  Chemiepark GENDORF, Umwelterklärung 2017, https://www.gendorf.de/Nachbarn/Umweltschutz/Industrie%20und%20Nachhaltigkeit
  Chemiepark GENDORF, Umwelterklärung 2020, https://www.gendorf.de/Nachbarn/Umweltschutz/Industrie%20und%20Nachhaltigkeit

## Emissions to nature
- Benzene [air, urban air close to ground]: 0.00066 kg; name benzene_to_air; = benzene_input_amount*0.002; lognormal variance with pedigree 0.33, pedigree (5,5,5,5,5)
  Estimation. The air emissions occurring in the different stages of the production were estimated to a total of 0.2% of the raw material input of benzene.
  Uncertainty: e
- Carbon dioxide, fossil [air, urban air close to ground]: 0.177 kg; lognormal variance with pedigree 0.2, pedigree (5,5,5,5,4)
  Estimation. The remaining amount of unreacted raw materials were assumed to leave the production process with the wastewater. Further it was assumed that this wastewater is treated in an internal wastewater plant with an assumed removal efficiency of 90% for benzene and n-paraffins. The carbon contained in the removed substances was accounted for as CO2 emissions to air.
  Uncertainty: e
- Paraffins [air, urban air close to ground]: 0.00154 kg; name paraffins_to_air; = paraffin_input_amount*0.002; lognormal variance with pedigree 0.33, pedigree (5,5,5,5,5)
  Estimation. The air emissions occurring in the different stages of the production were estimated to a total of 0.2% of the raw material input of paraffin.
  Uncertainty: e
- Water [air, unspecified]: 0.00147008 m3; lognormal variance with pedigree 0.0834, pedigree (2,4,2,4,4)
  Calculated based on literature data published by the GENDORF Chemical Park. The factory produced an average of 2462760 tonnes of chemical substances (including intermediates) per year in the years 2015-2019. To determine the emissions of water to air, the difference of all water inputs (from river, well, tap water and cooling) and outputs (wastewater, emissions to water) was calculated. The average ouput of water to air in the years 2015-2019 was 3620444 m3 per year. This equals 0.00147 m3/kg chemical produced. For more information on the other water exchanges please consult the respective exchange comment.
  References:
  Chemiepark GENDORF, Umwelterklärung 2016, https://www.gendorf.de/Nachbarn/Umweltschutz/Industrie%20und%20Nachhaltigkeit
  Chemiepark GENDORF, Umwelterklärung 2017, https://www.gendorf.de/Nachbarn/Umweltschutz/Industrie%20und%20Nachhaltigkeit
  Chemiepark GENDORF, Umwelterklärung 2020, https://www.gendorf.de/Nachbarn/Umweltschutz/Industrie%20und%20Nachhaltigkeit
- BOD5, Biological Oxygen Demand [water, unspecified]: 0.0312808 kg; lognormal variance with pedigree 0.218, pedigree (4,5,5,5,5)
  Calculated value. The BOD, COD, TOC and BOD5 are calculated based on the amount and type of emissions released to water in the same activity.
- Benzene [water, surface water]: 0.002934 kg; = ((1-(RP/(benzene_input_amount+paraffin_input_amount)))*benzene_input_amount-benzene_to_air)*0.1; lognormal variance with pedigree 0.51, pedigree (5,5,5,5,4)
  Estimation. The remaining amount of unreacted raw materials was assumed to leave the production process with the wastewater. Further it was assumed that this wastewater is treated in an internal wastewater plant with an assumed removal efficiency of 90% for benzene. The carbon contained in the removed substances was accounted as CO2 emissions to air.
  Uncertainty: e
- COD, Chemical Oxygen Demand [water, unspecified]: 0.0312808 kg; lognormal variance with pedigree 0.218, pedigree (4,5,5,5,5)
  (same comment as for BOD5, Biological Oxygen Demand)
- DOC, Dissolved Organic Carbon [water, unspecified]: 0.0085341 kg; lognormal variance with pedigree 0.218, pedigree (4,5,5,5,5)
  (same comment as for BOD5, Biological Oxygen Demand)
- Paraffins [water, surface water]: 0.006846 kg; = ((1-(RP/(benzene_input_amount+paraffin_input_amount)))*paraffin_input_amount-paraffins_to_air)*0.1; lognormal variance with pedigree 0.51, pedigree (5,5,5,5,4)
  Estimation. The remaining amount of unreacted raw materials was assumed to leave the production process with the wastewater. Further it was assumed that this wastewater is treated in an internal wastewater plant with an assumed removal efficiency of 90% for n-paraffins. The carbon contained in the removed substances was accounted as CO2 emissions to air.
  Uncertainty: e
- TOC, Total Organic Carbon [water, unspecified]: 0.0085341 kg; lognormal variance with pedigree 0.218, pedigree (4,5,5,5,5)
  (same comment as for BOD5, Biological Oxygen Demand)
- Water [water, unspecified]: 0.0150391 m3; lognormal variance with pedigree 0.0834, pedigree (2,4,2,4,4)
  Calculated based on literature data published by the GENDORF Chemical Park. The factory produced an average of 2462760 tonnes of chemical substances (including intermediates) per year in the years 2015-2019. The amount of water released back to the environment consists of the sum of the amount of process water treated in the internal WWTP that is then released back to the environment and the amount of cooling water released back to the environment. The average ouput of the internal WWTP in the years 2015-2019 was 2628800 m3 and that of cooling water released back to the environment was 34408800 m3. This gives a yearly average of 37037600 m3 emissions of water to water. This equals 0.01504 m3/kg chemical produced.
  References:
  Chemiepark GENDORF, Umwelterklärung 2016, https://www.gendorf.de/Nachbarn/Umweltschutz/Industrie%20und%20Nachhaltigkeit
  Chemiepark GENDORF, Umwelterklärung 2017, https://www.gendorf.de/Nachbarn/Umweltschutz/Industrie%20und%20Nachhaltigkeit
  Chemiepark GENDORF, Umwelterklärung 2020, https://www.gendorf.de/Nachbarn/Umweltschutz/Industrie%20und%20Nachhaltigkeit
  property carbon content, fossil 0; name C_content_fossil
  property carbon content, non-fossil 0; name C_content_non_fossil
  property dry mass 0 kg; name DM
  property water in wet mass 1000 kg; name WWM
  property wet mass 1000 kg; name WM

## Sampling procedure
Material and energy data out of ECOSOL study of European Surfactant Industry. Process emissions based on estimations. Some values are calculated based on data from a large chemical factory located in Germany. For more details, see the comments of the exchanges.

## Extrapolations
This dataset has been copied from an original dataset covering the geography RER. The uncertainty has been adjusted accordingly.

## Review by Emilia Moreno Ruiz 2017-08-07
This dataset was additionally reviewed in a separate review process by Eric Johnson of Atlantic Consulting as well as Emilia Moreno Ruiz and Gregor Wernet of ecoinvent.
