# thermoforming of plastic sheets

Dataset: EcoSpold 2, unit process
Geography: RoW
Time period: 2012-01-01 to 2023-12-31
Technology level: current
Classification: ISIC rev.4 ecoinvent: 2220:Manufacture of plastics products
Classification: EcoSpold01Categories: plastics/processing
Tags: service
Scenario: Business-as-Usual
System model: Allocation, cut-off by classification
Share of production covered: 2.3 %
Generated by: Jürgen Reinhard
Published in: Quantis 2015
Database: ecoinvent
isCopyrightProtected: true
accessRestrictedTo: 1

## General comment
This service activity represents thermoforming of plastic pellets of 200 microns to 2 mm thickness in plastic packaging for the food industry. The amount of plastic processed is NOT included. The activity refers to an INPUT of 1 kg of plastic sheets, i.e. all inputs and outputs are expressed per kg of raw materials input, i.e. T, where
t (final product)= 0.946 kg / kg of raw material input
Y ( losses being recycled within the process (=internal recycling), closed loop)= 0.261 kg / kg of raw material
t' (losses recycled in external, opened loop)= 0.053 kg / kg of raw material
T (raw materials, exluding internal recycling)= 1 kg / kg of raw material.
That is, an input of 1 kg of plastic sheet yields 0.946 kg of thermoformed plastic containers. Losses caused during production which are recycled internally are not accounted for explicitly. However, the additional energy requirements associated with the internally recycled plastic are considered.
In detail, the activity includes:
- water and energy consumption
- required auxiliaries such like detergents and solvents
- production infrastructure
- direct emissions to air (VOC)
- wastewater treatment of the used auxiliaries
- end of life of the production wastes incinerated and recycled externally

## Included activities start
The activity starts with the arrival of the raw materials, i.e. plastic sheets.

## Included activities end
The activity ends with the production of thermoformed plastic containers. This process contains the auxiliaries and energy demand for the mentioned conversion process of plastics. The processed amount of plastics is NOT included into the dataset. The packaging of raw materials and final product is not considered.

## Geography
information from different French converting companies extrapolated to the GLO

## Technology
current technologies

## Time period
time to which data refer

## Parameters
- fraction, process water, to air: 0.15 dimensionless; name fraction_PW_to_air; lognormal variance with pedigree 0.092025, pedigree (4,4,3,2,4)
  Literature value. In case when no industry/process specific data are available, default evaporation fraction value is used. This value is 15% and is based on literature (Statistics Canada, 2007 & Shaffer, K.H., 2008, Consumptive water use in the Great Lakes Basin, USGS & Shiklomanov, 2003, World Water Resources at the Beginning of the 21st Century) and has been approved by an expert.

## Reference product
- thermoforming of plastic sheets: 1 kg; name Ref; By-product classification allocatable product; CPC 89200: Moulding, pressing, stamping, extruding and similar plastic manufacturing services
  Service activity producing plastic sheets of 200 microns to 2 mm thickness used as packaging for the food industry.
  This activity should be used as follows: If an activity requires 1 kg of plastic sheets (produced by an inline plastic sheets and thermoforming process) the user should list (i) 1/0.946 = 1.0571 kg of the service and 1.0571 kg of the plastic type processed.
  production volume 9.03539e8 kg; name refP; = 3.5E+07/0.037292
    The French production volume was scaled according to the nominal GDP of 2005 (source: United Nations, <http://data.un.org/Glossary.aspx?q=GDP+%28current+US%24%29>, accessed 20130726) to reflect an appropriate share of the global production volume
  property price 0.12971 EUR2005
    Calculated based on inputs: The price of the product has been calculated as a sum of the values of the material and energy inputs for this product. This value is therefore a rough estimation. It may underestimate the real price since there are additional expenses when producing any product. These expences can include for example labour costs, treatment of waste materials and profit for the producer. Please consider carefully whether this level of data quality is acceptable for your application.
  properties: carbon allocation 0 kg, carbon content 0

## Inputs from technosphere
- aluminium scrap, post-consumer: -0.0014713 kg; name BP_amount_3; = alu; lognormal variance with pedigree 0.002425, pedigree (2,3,1,2,2)
  Measured value: represents the disposal of the aluminium mould. Corresponds to the input of aluminium, primary, ingot.
  Uncertainty: Default value taken fromTable 10.3. DQG
  production volume; = refP * (BP_amount_3 / Ref)
    Calculated from production volume of reference product using the relative outputs.
  properties: dry mass 1 kg, price 0.685 EUR2005, wet mass 1 kg
- aluminium, primary, ingot: 0.000140328, 0.00133097 kg (2 suppliers, which the file names only by identifier); sum of these 0.0014713 kg; lognormal variance with pedigree 0.010425, pedigree (2,3,4,2,2)
  Measured value: represent the aluminium required for the compensation of the deterioration of the moulds
  properties: dry mass 1 kg, wet mass 1 kg
- chemical, organic: 0.00014938 kg; name solv; lognormal variance with pedigree 0.010425, pedigree (2,3,4,2,2)
  Measured value, proxy exchange: represents the detergent and solvents used during processing.
  Uncertainty: Default value taken fromTable 10.3. DQG
  properties: carbon content, fossil 0.628, dry mass 1 kg, heating value, net 19.03 MJ, wet mass 1 kg
  note on carbon content, fossil: This dataset is an unweighted average of 20 organic substances (listed in Tab 88.1, ecoinvent v2.2 report 8, part II), being part of the top100 chemicals included in this database. The C-content has also been calculated as an unweighted average of the C content of the substances composing this dataset.
- electricity, medium voltage: 0.000271806, 0.000406865, 0.000128533, 0.00239248, 0.00140421, 0.0129211, 0.00166483, 0.020222, 4.82297e-5, 0.403384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 kWh (47 suppliers, which the file names only by identifier); sum of these 0.71123 kWh; = 0.187+0.52423; lognormal variance with pedigree 0.010425, pedigree (2,3,4,2,2)
  EcoSpold01Location=UCTE
  Measured value: represents the electricity consumption of the entire processing step. Includes the electricity consumption required for internal recycling.
  Uncertainty: Default value taken fromTable 10.3. DQG
- extrusion, plastic film: 8.0156e-7 kg; = pp; lognormal variance with pedigree 0.010425, pedigree (2,3,4,2,2)
  Measured value: represent the working of the polypropylene based auxiliaries consumed during processing.
  Uncertainty: Default value from Table 10.3. DQG
- heat, central or small-scale, natural gas: 1.10442e-8, 0.10585 MJ (2 suppliers, which the file names only by identifier); sum of these 0.10585 MJ; lognormal variance with pedigree 0.0104, pedigree (2,3,4,1,2)
  Measured value: represents the amount of heat required for the buildings.
  Uncertainty: Default value from Table 10.3. DQG
  properties: heating value, net 1 MJ
- iron scrap, unsorted: -7.8115e-7 kg; name BP_amount_4; = steel; lognormal variance with pedigree 0.002425, pedigree (2,3,1,2,2)
  Measured value: represents treatment of steel-based auxiliaries. Corresponds to the input of steel, low-alloyed.
  Uncertainty: Default value taken fromTable 10.3. DQG
  production volume; = refP * (BP_amount_4 / Ref)
    Calculated from production volume of reference product using the relative outputs.
  properties: dry mass 1 kg, price 0.149 EUR2005, wet mass 1 kg
- metal working, average for aluminium product manufacturing: 0.0014713 kg; = alu; lognormal variance with pedigree 0.0092, pedigree (1,3,4,1,1)
  Measured value: represent the working of the aluminium required for the copensation of the deterioration of the moulds
  Uncertainty: Default value from Table 10.3. DQG
- metal working, average for steel product manufacturing: 7.8115e-7 kg; = steel; lognormal variance with pedigree 0.010425, pedigree (2,3,4,2,2)
  Measured value: represent the working of the steel-based auxiliaries
  Uncertainty: Default value from Table 10.3. DQG
- packaging box factory: 1.35143e-9 unit; = 1/014000000/50*0.946; lognormal variance with pedigree 0.341825, pedigree (2,3,5,2,2)
  Measured value: calculated based on the lifetime (50 years) and annual capacity (14000 tons/year) of the packing box factory.
  Uncertainty: Default value from Table 10.3. DQG
- polypropylene, granulate: 8.0156e-7 kg; name pp; lognormal variance with pedigree 0.010425, pedigree (2,3,4,2,2)
  Measured value: represent the amount of polypropylene based auxiliaries consumed during processing.
  Uncertainty: Default value from Table 10.3. DQG
  properties: carbon content, fossil 0.857143, dry mass 1 kg, heating value, net 32.78 MJ, wet mass 1 kg
  note on heating value, net: Value extracted from "treatment of waste polypropylene, open burning"
- spent solvent mixture: -1.35507e-6, -0.000148025 kg (2 suppliers, which the file names only by identifier); sum of these -0.00014938 kg; = solv; lognormal variance with pedigree 0.002425, pedigree (2,3,1,2,2)
  Measured value, proxy exchange: represents the disposal of the detergent/solvent consumed as an auxilliary during the process
  Uncertainty: Default value taken fromTable 10.3. DQG
  production volume; = refP * (BP_amount_5 / Ref)
    Calculated from production volume of reference product using the relative outputs.
  properties: carbon content, fossil 0.571257, dry mass 0.835 kg, heating value, net 21.7 MJ, water content 0.197605, wet mass 1 kg
  note on carbon content, fossil: Tab A.7, ecoinvent v2.2 report 13_I. C content has been calculated after data in the tables, and then referred to 1 kg DM
  note on heating value, net: Value taken from the general comment of the treatment dataset.
- steel, low-alloyed: 7.8115e-7 kg; name steel; lognormal variance with pedigree 0.010425, pedigree (2,3,4,2,2)
  Measured value: represents the amount of steel-based auxiliaries required during processing.
  Uncertainty: Default value taken fromTable 10.3. DQG
  properties: carbon content, fossil 0.005, dry mass 1 kg, wet mass 1 kg
- tap water: 5.59066e-8, 8.52249e-8, 1.59025e-7, 4.28403e-7, 5.15682e-8, 2.14904e-6, 3.83257e-8, 2.45925e-5 kg (8 suppliers, which the file names only by identifier); sum of these 2.756e-5 kg; lognormal variance with pedigree 0.010425, pedigree (2,3,4,2,2)
  Measured value: represent the amount of water for cooling bought from the network.
  Uncertainty: Default value taken fromTable 10.3. DQG
  properties: carbon content, fossil 0.0017899, dry mass 0.00034 kg, water content 2941.18, wet mass 1 kg
- tissue paper: 1.2203e-5 kg; name tp; lognormal variance with pedigree 0.010425, pedigree (2,3,4,2,2)
  Measured value: represent the amount of tissue paper based auxiliaries required during processing.
  Uncertainty: Default value from Table 10.3. DQG
  properties: carbon content, fossil 2.22e-5, carbon content, non-fossil 0.36169, dry mass 0.945 kg, heating value, net 10.22 MJ, water content 0.0582011, wet mass 1 kg
- waste graphical paper: -2.62549e-8, -5.70163e-9, -3.86178e-9, -2.4873e-10, -5.35186e-9, -1.02576e-9, -8.4662e-10, -2.43467e-9, -6.40479e-9, -2.46886e-9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 kg (42 suppliers, which the file names only by identifier); sum of these -1.2203e-5 kg; = tp; lognormal variance with pedigree 0.002425, pedigree (2,3,1,2,2)
  Measured value: represents the treatment of the amount of tissue paper based auxilliaries.
  production volume; = refP * (BP_amount_2 / Ref)
    Calculated from production volume of reference product using the relative outputs.
  properties: carbon content, non-fossil 0.454955, dry mass 0.888 kg, heating value, net 14.12 MJ, water content 0.126126, wet mass 1 kg
- waste plastic, mixture: -1.37356e-5, -2.42178e-6, -1.42857e-6, -9.47834e-6, -8.54355e-7, -8.82215e-7, -2.2865e-6, -8.17228e-7, -9.86579e-7, -9.54177e-6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 kg (42 suppliers, which the file names only by identifier); sum of these -0.052355 kg; = 3.5341E-2+1.7014E-2; lognormal variance with pedigree 0.002425, pedigree (2,3,1,2,2)
  Measured value: represents the total amount of waste plastic, mixture recycled externally.The first value in the mathematical relation reflects the amount of mono materials, the second value the amount of multi layer materials recycled. In case specific recycling activities for both types of materials become available, this exchange flow should be adapted, i.e. split into two by-products.
  Uncertainty: Default value taken fromTable 10.3. DQG
  production volume; = refP*(wpm_r/Ref)
    Calculated from production volume of reference product using the relative outputs.
  properties: carbon content, fossil 0.747344, dry mass 0.847 kg, heating value, net 30.79 MJ, water content 0.180638, wet mass 1 kg
- waste plastic, mixture: -0.0004991 kg; name wpm_i; lognormal variance with pedigree 0.002425, pedigree (2,3,1,2,2)
  Measured value: represents the amount of waste plastic mixture incinerated. Modeled with a direct link to the GLO municipal solid waste incineration
  Uncertainty: Default value taken fromTable 10.3. DQG
  production volume; = refP * (wpm_i / Ref)
    Calculated from production volume of reference product using the relative outputs.
- waste polypropylene: -4.32157e-11, -8.73779e-11, -1.11255e-11, -1.70156e-12, -6.72986e-10, -8.17838e-12, -4.27047e-11, -2.65911e-11, -4.37575e-11, -1.62237e-11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 kg (42 suppliers, which the file names only by identifier); sum of these -8.0156e-7 kg; = pp; lognormal variance with pedigree 0.002425, pedigree (2,3,1,2,2)
  Measured value: represents the treatment of the amount of polyethylene based auxilliaries.
  Uncertainty: Default value taken fromTable 10.3. DQG
  production volume; = refP * (wp / Ref)
    Calculated from production volume of reference product using the relative outputs.
  properties: carbon content, fossil 0.825208, dry mass 0.841 kg, heating value, net 32.78 MJ, water content 0.189061, wet mass 1 kg
  note on heating value, net: Value assumed for all polypropylene products. Source: Phyllis2, database for (treated) biomass, algae, feedstocks for biogas production and biochar, https://phyllis.nl/Biomass/View/1186, ECN.TNO
- wastewater, average: -2.3426e-8 m3; name BP_amount_1; = (tw*(1-fraction_PW_to_air))/UnitConversion(1, 'm3', 'l'); lognormal variance with pedigree 0.002425, pedigree (2,3,1,2,2)
  Measured value: represents the treatment of the tap water required for cooling
  Uncertainty: Default value taken fromTable 10.3. DQG
  production volume; = refP * (BP_amount_1 / Ref)
    Calculated from production volume of reference product using the relative outputs.
  properties: carbon content, non-fossil 0.194039, dry mass 0.346837 kg, water content 2882.2, wet mass 1000 kg
  note on carbon content, non-fossil: 0.0673 kg TOC/m3 (Tab A.17, ecoinvent v2.2 report 13_I). TOC was considered as Total Carbon.

## Emissions to nature
- NMVOC, non-methane volatile organic compounds [air, unspecified]: 0.00010654 kg; lognormal variance with pedigree 0.049825, pedigree (2,3,4,2,2)
  Measured value: emission generated during resin heating
  Uncertainty: Default value from Table 10.3. DQG
- Water [air, unspecified]: 4.134e-9 m3; name water_to_air_unspecified; = (tw*fraction_PW_to_air/1000); lognormal variance with pedigree 0.0487, pedigree (2,2,4,1,1)
  Calculated value based on literature values and expert opinion. See comments in the parametres' comment field.
  property fraction, origin: fresh water 0; name fraction_origin_fresh_water
  property fraction, origin: salt water 0; name fraction_origin_salt_water
  property fraction, origin: unspecified 1; name fraction_origin_unspecified

## Sampling procedure
Survey. Around 60 000 tons of thermoformed products are sold in France per year (excluding FFS process that is not considered here). The survey represents the production volume weighted average of four companies in France covering roughly 2.3% of the GLO market volume of this technology.

## Extrapolations
From the production volume of the four sampled to the production volume of all sheets thermoforming production facilities in France.

## Review by David Cornell 2014-08-14
I am satisfied the requested issues have been addressed and the data file is now satisfactory.
