# antimony production

Dataset: EcoSpold 2, unit process
Geography: CN
Time period: 1994-01-01 to 2023-12-31
Technology level: current
Classification: EcoSpold01Categories: metals/extraction
Classification: ISIC rev.4 ecoinvent: 2420:Manufacture of basic precious and other non-ferrous metals
Synonyms: Sb production
Scenario: Business-as-Usual
System model: Allocation, cut-off by classification
Generated by: Hans-Jörg Althaus
Published in: Classen M. 2009
Database: ecoinvent
isCopyrightProtected: true
accessRestrictedTo: 1

## General comment
This activity represents the production of antimony from concentrated stibnite. The dataset approximates metallic antimony and is not to be used when antimony is used as flame retardant (as an oxide) or when it is a substantial part of the system modelled. Antimony is for example used for applications such as a hardener for lead (e.g. in lead-acid batteries, rolled or extruded lead), as a polymerization catalyst in plastic manufacturing, and flame-retardants in plastics. This dataset covers the production of antimony in China, which produces more than 80% of the global antimony.
Due to lack of information about the production of antimony, this dataset is mainly approximated with data from the smelting process of lead (Classen et al., 2009). This dataset should not be used if its relative importance is high in the product system that is modelled. For more details about the origin of the data, refer to the Sampling Procedure and exchange comments.

## Included activities start
This activity starts with stibnite ore concentrate.

## Included activities end
This activity includes the smelting of the concentrate and ends with antimony.

## Geography
The model represents Antimony production in China. China produces more than 80% of the global Antimony.

## Technology
The data represent a mixture of blast furnace, rotary kiln and electrowinning process. It is approximated from lead smelting. See Classen et al. (2009) part XVI

## Reference product
- antimony: 1 kg; name RP_amount; By-product classification allocatable product; CPC 41603: Bismuth, antimony, manganese, chromium and articles thereof; including waste and scrap of bismuth or manganese; HS2017 811010: Antimony and articles thereof; unwrought antimony, powders; CAS 7440-36-0
  EcoSpold01Location=CN
  production volume 1.16679e8 kg; name RP_PV; = 162000000 * 0.9297 * 0.7747
    Based on the U.S. Geological Survey, Mineral Commodity Summaries, (2021) reporting 162000 t of antimony production in mines for 2019 and the overall production efficiency reported for antimony production reported by Chu et al. of 92.97% resulting in 162 000 000 * 0.9297 = 150611400 kg
    Chu et al report182.58 Gg refined Sb production in China. Factoring in the production efficiency mentioned above, the reported mine activity covering 60% of global Sb mining (USGS), and the 152.1 Gg Sb contained in domestically produced stibnite (Chu et al.) results in
    (182.58/0.9297) / 152.1 * 60 = 0.7747 =77.47%
    Resulting in an annual production volume for China of
    162000000 * 0.9297 * 0.7747 = 116678343.2 kg
  property antimony content 1; name RP_amount_Sb_content
    antimont content on a dry matter basis
  property price 0.91 EUR2005
    Calculated value based on data from United Nations Commodity Trade Statistics Database (comtrade.un.org). UN comtrade category: 261710 Antimony ores and concentrates. Year 2005. Using exchange rate of 1EURO = 1.209 USD. Average of price of import into 5 main markets (EU, US, JP, IN and CN).
  properties: carbon allocation 0 kg, carbon content 0, carbon content, fossil 0, carbon content, non-fossil 0, dry mass 1 kg, water content 0, water in wet mass 0 kg, wet mass 1 kg

## Inputs from technosphere
- antimony slag, desulfurised: -4.24267 kg; name d_slag_amount; = 15.47/263.08 / 2 / 0.00693; source Chu, Jianwen 2019; lognormal variance with pedigree 0.0045, pedigree (2,3,3,3,2)
  The total amount of slag is calculated by the reported antimony flow in slags and further processing of 15.47Gg_Sb/263.8 Gg_Sb=0.0588 by Chu et al.,
  Assuming - due on a lack of data - an equal split of the absolut antimony content between the two slags and Sb concentrations of 0.0111 and 0.00693 for the Water quenched Slag and the desulfurized slag respectively, the amount of slag is calculated as follows:
  15.47/263.08 / 2 / 0.00693 = 4.24266997172577
  production volume; = RP_PV*ABS(d_slag_amount/RP_amount)
    Calculated from production volume of reference product using the relative outputs.
  properties: aluminium content 0.0080446, antimony content 0.00693, calcium content 0.215839, dry mass 1 kg, fluorine content 0.0708, iron content 0.0017485, magnesium content 0.00379921, oxygen content 0.5125, silicon content 0.0138365, sodium content 0.00304161, sulfur content 0.162202, wet mass 1 kg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
  note on aluminium content: The value of 'aluminium content' is documented in literature. Reference available in the respective treatment dataset of residual material landfill for 'antimony slag, desulfurised'.
  note on antimony content: The value of 'antimony content' is documented in literature. Reference available in the respective treatment dataset of residual material landfill for 'antimony slag, desulfurised'.
  note on calcium content: The value of 'calcium content' is documented in literature. Reference available in the respective treatment dataset of residual material landfill for 'antimony slag, desulfurised'.
  note on fluorine content: The value of 'fluorine content' is documented in literature. Reference available in the respective treatment dataset of residual material landfill for 'antimony slag, desulfurised'.
  note on iron content: The value of 'iron content' is documented in literature. Reference available in the respective treatment dataset of residual material landfill for 'antimony slag, desulfurised'.
  note on magnesium content: The value of 'magnesium content' is documented in literature. Reference available in the respective treatment dataset of residual material landfill for 'antimony slag, desulfurised'.
  note on oxygen content: The value of 'oxygen content' is documented in literature. Reference available in the respective treatment dataset of residual material landfill for 'antimony slag, desulfurised'.
  note on silicon content: The value of 'silicon content' is documented in literature. Reference available in the respective treatment dataset of residual material landfill for 'antimony slag, desulfurised'.
  note on sodium content: The value of 'sodium content' is documented in literature. Reference available in the respective treatment dataset of residual material landfill for 'antimony slag, desulfurised'.
  note on sulfur content: The value of 'sulfur content' is documented in literature. Reference available in the respective treatment dataset of residual material landfill for 'antimony slag, desulfurised'.
- antimony slag, water-quenched: -2.6488 kg; name w_slag_amount; = 15.47/263.08 / 2 / 0.0111; source Chu, Jianwen 2019; lognormal variance with pedigree 0.0045, pedigree (2,3,3,3,2)
  The total amount of slag is calculated by the reported antimony flow in slags and further processing of 15.47Gg_Sb/263.8 Gg_Sb=0.0588 by Chu et al.,
  Assuming - due on a lack of data - an equal split of the absolut antimony content between the two slags and Sb concentrations of 0.0111 and 0.00693 for the Water quenched Slag and the desulfurized slag respectively, the amount of slag is calculated as follows:
  15.47/263.08 / 2 / 0.0111 = 2.64880206342879
  production volume; = RP_PV*ABS(w_slag_amount/RP_amount)
    Calculated from production volume of reference product using the relative outputs.
  properties: aluminium content 0.045145, antimony content 0.0111, arsenic content 0.0057, calcium content 0.152946, dry mass 1 kg, iron content 0.152469, magnesium content 0.0123022, oxygen content 0.400936, silicon content 0.18885, sodium content 0.012389, sulfur content 0.0054, wet mass 1 kg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
  note on aluminium content: The value of 'aluminium content' is documented in literature. Reference available in the respective treatment dataset of residual material landfill for 'antimony slag, water quentched'.
  note on antimony content: The value of 'antimony content' is documented in literature. Reference available in the respective treatment dataset of residual material landfill for 'antimony slag, water quentched'.
  note on arsenic content: The value of 'arsenic content' is documented in literature. Reference available in the respective treatment dataset of residual material landfill for 'antimony slag, water quentched'.
  note on calcium content: The value of 'calcium content' is documented in literature. Reference available in the respective treatment dataset of residual material landfill for 'antimony slag, water quentched'.
  note on iron content: The value of 'iron content' is documented in literature. Reference available in the respective treatment dataset of residual material landfill for 'antimony slag, water quentched'.
  note on magnesium content: The value of 'magnesium content' is documented in literature. Reference available in the respective treatment dataset of residual material landfill for 'antimony slag, water quentched'.
  note on oxygen content: The value of 'oxygen content' is documented in literature. Reference available in the respective treatment dataset of residual material landfill for 'antimony slag, water quentched'.
  note on silicon content: The value of 'silicon content' is documented in literature. Reference available in the respective treatment dataset of residual material landfill for 'antimony slag, water quentched'.
  note on sodium content: The value of 'sodium content' is documented in literature. Reference available in the respective treatment dataset of residual material landfill for 'antimony slag, water quentched'.
  note on sulfur content: The value of 'sulfur content' is documented in literature. Reference available in the respective treatment dataset of residual material landfill for 'antimony slag, water quentched'.
- electricity, medium voltage: 0.15271 kWh; lognormal variance with pedigree 0.23, pedigree (5,5,5,5,5)
  This value stems from Classen et al. (2009).
  EcoSpold01Location=CN
- heat, district or industrial, natural gas: 0.5303 MJ; lognormal variance with pedigree 0.22, pedigree (5,5,5,5,5)
  EcoSpold01Location=RER
  This value stems from Classen et al. (2009).
- heat, district or industrial, other than natural gas: 5.65496 MJ; lognormal variance with pedigree 0.22, pedigree (5,5,5,5,5)
  EcoSpold01Location=RER
  This value stems from Classen et al. (2009).
- iron ore concentrate: 0.061479 kg; lognormal variance with pedigree 0.22, pedigree (5,5,5,5,5)
  This value stems from Classen et al. (2009).
  EcoSpold01Location=GLO
  properties: dry mass 1 kg, wet mass 1 kg
- limestone, crushed, washed: 1.97294 kg; lognormal variance with pedigree 0.22, pedigree (5,5,5,5,5)
  This value stems from Classen et al. (2009) and was - together with silica sand - scaled to balance the amount of smelting slag to acoomodate for the reported Sb concentration (on average 0.9%) by Guo et al. (2014)
  properties: carbon content, fossil 0.117257, dry mass 0.998 kg, water content 0.00200401, wet mass 1 kg
  note on carbon content, fossil: Table 3.1, ecoinvent v2.2 report 7, part VII, pg 3. MW CaCO3=100, MW MgCO3=84. C content of limestone is 0.117257 kg/kg DM
- nitrogen, liquid: 0.019976 kg; lognormal variance with pedigree 0.22, pedigree (5,5,5,5,5)
  This value stems from Classen et al. (2009).
  EcoSpold01Location=RER
  properties: dry mass 1 kg, wet mass 1 kg
- oxygen, liquid: 0.20316 kg; lognormal variance with pedigree 0.22, pedigree (5,5,5,5,5)
  This value stems from Classen et al. (2009).
  EcoSpold01Location=RER
  properties: dry mass 1 kg, wet mass 1 kg
- silica sand: 1.85397 kg; lognormal variance with pedigree 0.22, pedigree (5,5,5,5,5)
  This value stems from Classen et al. (2009) and was - together with silica sand - scaled to balance the amount of smelting slag to acoomodate for the reported Sb concentration (on average 0.9%) by Guo et al. (2014)
  EcoSpold01Location=DE
  properties: dry mass 0.99 kg, water content 0.010101, wet mass 1 kg
- stibnite concentrate: 4.009 kg; source Chu, Jianwen 2019; lognormal variance with pedigree 0.0015, pedigree (1,2,2,1,2)
  With a Sb content of 26.83% in the concentrate and the total recovery rate of refined Sb smelting of 92.97% - both reported by Chu et al (2019) - the amount of concentrate equals to 1 / 0.2683 / 0.9297 = 4.009 kg
  properties: antimony content 0.2683, dry mass 1 kg, wet mass 1 kg

## Emissions to nature
- Antimony ion [air, non-urban air or from high stacks]: 2.1883e-6 kg; lognormal variance with pedigree 0.86, pedigree (5,5,5,5,5)
  This value stems from Classen et al. (2009).
- Arsenic ion [air, non-urban air or from high stacks]: 3.9241e-6 kg; lognormal variance with pedigree 0.86, pedigree (5,5,5,5,5)
  This value stems from Classen et al. (2009).
- Cadmium II [air, non-urban air or from high stacks]: 3.1541e-6 kg; lognormal variance with pedigree 0.26, pedigree (5,5,5,5,5)
  This value stems from Classen et al. (2009).
- Carbon dioxide, fossil [air, unspecified]: 0.28456 kg; lognormal variance with pedigree 0.25, pedigree (5,5,5,5,5)
  This value stems from Classen et al. (2009).
- Dioxins, measured as 2,3,7,8-tetrachlorodibenzo-p-dioxin [air, non-urban air or from high stacks]: 4.8354e-11 kg; lognormal variance with pedigree 1.54, pedigree (5,5,5,5,5)
  Values from Zn-production, according to the report by Classen et al. (2009)
- Lead II [air, non-urban air or from high stacks]: 0.00030163 kg; lognormal variance with pedigree 0.86, pedigree (5,5,5,5,5)
  This value stems from Classen et al. (2009).
- Mercury II [air, non-urban air or from high stacks]: 8.0393e-8 kg; lognormal variance with pedigree 0.86, pedigree (5,5,5,5,5)
  This value stems from Classen et al. (2009).
- Particulate Matter, < 2.5 um [air, non-urban air or from high stacks]: 0.00015978 kg; lognormal variance with pedigree 0.52, pedigree (5,5,5,5,5)
  This value stems from Classen et al. (2009).
- Particulate Matter, > 10 um [air, non-urban air or from high stacks]: 4.5658e-5 kg; lognormal variance with pedigree 0.24, pedigree (5,5,5,5,5)
  This value stems from Classen et al. (2009).
- Particulate Matter, > 2.5 um and < 10um [air, non-urban air or from high stacks]: 0.00011413 kg; lognormal variance with pedigree 0.22, pedigree (5,5,5,5,5)
  This value stems from Classen et al. (2009).
- Sulfur dioxide [air, non-urban air or from high stacks]: 0.031932 kg; lognormal variance with pedigree 0.22, pedigree (5,5,5,5,5)
  This value stems from Classen et al. (2009).
- Arsenic ion [water, surface water]: 9.6708e-7 kg; lognormal variance with pedigree 0.87, pedigree (5,5,5,5,5)
  Values from Zn-production, according to the report by Classen et al. (2009)
  Uncertainty: values from Zn-production
- BOD5, Biological Oxygen Demand [water, surface water]: 0.00037587 kg; lognormal variance with pedigree 0.26, pedigree (5,5,5,5,5)
  (same comment as for Arsenic ion)
- COD, Chemical Oxygen Demand [water, surface water]: 0.00056381 kg; lognormal variance with pedigree 0.26, pedigree (5,5,5,5,5)
  (same comment as for Arsenic ion)
- Cadmium II [water, surface water]: 2.5144e-6 kg; lognormal variance with pedigree 0.87, pedigree (5,5,5,5,5)
  (same comment as for Arsenic ion)
- Copper ion [water, surface water]: 4.8354e-6 kg; lognormal variance with pedigree 0.87, pedigree (5,5,5,5,5)
  (same comment as for Arsenic ion)
- DOC, Dissolved Organic Carbon [water, surface water]: 0.00022046 kg; lognormal variance with pedigree 0.26, pedigree (5,5,5,5,5)
  (same comment as for Arsenic ion)
- Lead II [water, surface water]: 1.7407e-5 kg; lognormal variance with pedigree 0.87, pedigree (5,5,5,5,5)
  (same comment as for Arsenic ion)
- Mercury II [water, surface water]: 4.1584e-8 kg; lognormal variance with pedigree 0.87, pedigree (5,5,5,5,5)
  (same comment as for Arsenic ion)
- TOC, Total Organic Carbon [water, surface water]: 0.00022046 kg; lognormal variance with pedigree 0.26, pedigree (5,5,5,5,5)
  (same comment as for Arsenic ion)

## Sampling procedure
Data retreived from:
Classen M., Althaus H.-J., Blaser S., Doka G., Jungbluth N., Tuchschmid M. (2009) Life Cycle Inventories of Metals, Final report ecoinvent data v2.1, 10, Dübendorf, CH, Swiss Centre for LCI, Empa - TSL, 3 - SeparatePublication, CD-ROM

Jianwen Chu, Jiansu Mao, Mengchang He (2019). Anthropogenic antimony flow analysis and evaluation in China. Science of The Total Environment, Volume 683. https://doi.org/10.1016/j.scitotenv.2019.05.293

## Extrapolations
see Geography and Technology.

## Review by Louis Brimacombe 2021-05-28
Electricity medium exchange looks high for a mining/beneficiation operation derived as a proxy from other data ( Mo miniing). When opportunity arises better data should be attained, but for now accepted this is an overestimate.
