# unreinforced concrete production, 15MPa, with cement ZN/D

Dataset: EcoSpold 2, unit process
Geography: CH
Time period: 2020-01-01 to 2023-12-31
Technology level: modern
Classification: EcoSpold01Categories: construction materials/concrete
Classification: ISIC rev.4 ecoinvent: 2395:Manufacture of articles of concrete, cement and plaster
Synonyms: Transportbeton; béton non armé; unbewehrter Beton; ready-mixed concrete
Scenario: Business-as-Usual
System model: Allocation, cut-off by classification
Generated by: Frank Werner
Published in: Werner F. 2014
Database: ecoinvent
isCopyrightProtected: true
accessRestrictedTo: 1

## General comment
This dataset contains the production of unreinforced concrete with cement Susteno (technical abbreviation according to SIA 2049: ZN/D) by Holcim Switzerland from primary aggregates (no input of recycled gravel or sand). This concrete does not contain any reinforcement steel or other metals. It can be used in all exposition classes, except for applications with exposure to frost with or without deicing agents, to abrasion or to chemicals; for concrete with reinforcement, the application shall be very dry, e.g. in buildings with very low humidity.
Density: 2370 kg/m3, content of cement: 200 kg/m3
Exposition class according to SN EN 206: X0
Examples for this exposition class are unreinforced foundations without frost, unreinforced construction elements for indoor use.
This dataset is a copy of the existing data set for the production of unreinforced concrete in Switzerland; the original type of cement has been replaced by the cement Susteno.

## Included activities start
The activity starts with the ingredients for the concrete at the factory gate.

## Included activities end
Includes the whole manufacturing processes to produce ready-mixed concrete, internal processes (transport, etc.) and infrastructure. No administration is included.

## Geography
For some exchanges RER-modules have been used as proxy

## Technology
New development of a resource saving, low carbon concrete by Holcim Switzerland
The cement Susteno is made of processed mixed granulate from demolition projects as a major additive. The cement Susteno reduces the clinker content of the cement and contributes to a closed material cycle.

## Parameters
- fraction, process water, to air: 0.15 dimensionless; name fraction_PW_to_air; lognormal variance with pedigree 0.092025, pedigree (4,4,3,2,4)
  Literature value. In case when no industry/process specific data are available, default evaporation fraction value is used. This value is 15% and is based on literature (Statistics Canada, 2007 & Shaffer, K.H., 2008, Consumptive water use in the Great Lakes Basin, USGS & Shiklomanov, 2003, World Water Resources at the Beginning of the 21st Century) and has been approved by an expert.
- fraction, tap water, to air: 0.15 dimensionless; name fraction_TW_to_air; = fraction_PW_to_air; lognormal variance with pedigree 0.092025, pedigree (4,4,3,2,4)
  Calculated value. See comment in the other parametres present in this dataset. Tap water is considered to be always used as process water, thus process water fractions to air are applied to all tap water input flows to calculate the amount of water consumed in the processes.
- fraction, water, completely softened, to air: 0.15 dimensionless; name fraction_WCS_to_air; = fraction_PW_to_air; lognormal variance with pedigree 0.092025, pedigree (4,4,3,2,4)
  Calculated value. See comment in the other parametres present in this dataset. Water, completely softened is considered to be always used as process water, thus process water fractions to air are applied to all water, completely softened input flows to calculate the amount of water consumed in the processes.

## Reference product
- unreinforced concrete, 15MPa: 1 m3; name m_concrete; By-product classification allocatable product; CPC 37540: Tiles, flagstones, bricks and similar articles, of cement, concrete or artificial stone; HS2017 382450: Mortars and concretes; non-refractory
  production volume 1 m3; name p_concrete
    Dummy value. Anti-trust legislation does not allow to communicate production volumes by individual companies.
  property carbon content, fossil 0
    fossil carbon content on a dry matter basis; cement and gravel. Tab 6.2, ecoinvent v2.2 report 7, part III
  property carbon content, non-fossil 0
    biogene carbon content on a dry matter basis; cement and gravel. Tab 6.2, ecoinvent v2.2 report 7, part III
  property price 185 EUR2005
    Data are not easily available. Therefore, an average price of products supplied by the activities in the same ISIC 3 code has been applied. This price is obtained as '_49 Concrete, asphalt and other mineral products, EU27 virgin, EU27' in the 'EU & DK Input Output Database' (available in SimaPro). The price is assumed to be valid for both RER2003, RER 2004, world 2003 and world 2004. Multiplied by density.
  properties: carbon allocation 0 kg, carbon content 0, dry mass 2190 kg, water content 0.0776256, water in wet mass 170 kg, wet mass 2360 kg

## Inputs from technosphere
- cement, ZN/D, new alternative constituents 36-50%, in conformity with SIA 2049: 200 kg; lognormal variance with pedigree 0.016, pedigree (4,1,3,1,1)
  properties: dry mass 1 kg, wet mass 1 kg
- concrete mixing factory: 4.17e-7 unit; source Werner F. 2014; lognormal variance with pedigree 0.3208, pedigree (2,1,2,1,1)
  This exchange has an activity link directly to the producing activity because the product is primarily consumed in the same geographical area where it is produced.
- diesel, burned in building machine: 0.2 MJ; source Werner F. 2014; lognormal variance with pedigree 0.010825, pedigree (2,1,2,2,1)
  properties: heating value, net 1 MJ
- electricity, medium voltage: 5.4 kWh; source Werner F. 2014; lognormal variance with pedigree 0.0108, pedigree (2,1,2,1,1)
- gravel, round: 1280 kg; source Werner F. 2014; lognormal variance with pedigree 0.0183, pedigree (4,2,2,1,1)
  properties: dry mass 1 kg, wet mass 1 kg
- heat, district or industrial, natural gas: 2.6 MJ; source Werner F. 2014; lognormal variance with pedigree 0.024225, pedigree (3,4,2,2,1)
  properties: heating value, net 1 MJ
- heat, district or industrial, other than natural gas: 2.4 MJ; source Werner F. 2014; lognormal variance with pedigree 0.024225, pedigree (3,4,2,2,1)
  activity link specifies fuel according to survey
  properties: heating value, net 1 MJ
- lubricating oil: 0.02 kg; name lubricating_oil_input; source Werner F. 2014; lognormal variance with pedigree 0.010825, pedigree (2,1,2,2,1)
  properties: carbon content, fossil 0.75, dry mass 1 kg, heating value, net 40.2 MJ, wet mass 1 kg
  note on carbon content, fossil: Lubricating oil is produced from diesel. C-content/dry mass of fats and oils considered 75%, from: ecoinvent v2.2 report, n 15a, pg 40
  note on heating value, net: Literature value, Source: IPCC 2006, 2006 IPCC Guidelines for National Greenhouse Gas Inventories, Prepared by the National Greenhouse Gas Inventories Programme, Eggleston H.S., Buendia L., Miwa K., Ngara T. and Tanabe K. (eds). Published: IGES, Japan
- municipal solid waste: -0.05 kg; name w_solid_waste; = 0.05*m_concrete; source Werner F. 2014; lognormal variance with pedigree 0.0106, pedigree (2,1,1,1,1)
  Unspecified waste according to data collection
  production volume; name PV_solid_waste; = p_concrete*abs(w_solid_waste)
    Calculated from the production volume of concrete, high exacting requirements in proportion to the respective output amounts.
  property heating value, net 11.74 MJ; name w_solid_waste_Net_Heat_Value
  properties: carbon content, fossil 0.171549, carbon content, non-fossil 0.261655, dry mass 0.771 kg, water content 0.297017, wet mass 1 kg
  note on carbon content, fossil: MSW composition in tab 4.1, ecoinvent v2.2 report 13_I. C content referred to 1 kg DM
  note on heating value, net: Value taken from the general comment of the treatment dataset.
- sand: 720 kg; source Werner F. 2014; lognormal variance with pedigree 0.016, pedigree (4,1,3,1,1)
  properties: dry mass 1 kg, wet mass 1 kg
- synthetic rubber: 0.12 kg; name rubber_input; source Werner F. 2014; lognormal variance with pedigree 0.010825, pedigree (2,1,2,2,1)
  properties: carbon content, fossil 0.871949, dry mass 1 kg, heating value, net 26.42 MJ, wet mass 1 kg
  note on carbon content, fossil: EPDM (Ethylene-propene-diene terpolymer) rubber is a terpolymer of ethylene, propene, and a diene with the residual unsaturated portion of the diene in the side chain (ecoinvent v2.2 report 7-part XX & Ullmann). Chemical formula (deduced from Evidences of Solvent-Induced Miscibility in Polychloroprene-co-Ethylene-Propene Diene Terpolymer Blends, Dubey et al., Journal of Applied Polymer Science, 2009, 111:1884–1891): C20H35
- tap water: 170 kg; name tap_water_input; source Werner F. 2014; lognormal variance with pedigree 0.014625, pedigree (3,3,3,2,1)
  properties: carbon content, fossil 0.00178991, dry mass 0.000337476 kg, water content 2962.17, wet mass 1 kg
  note on carbon content, fossil: Bicarbonate content is 2.93 mol/m3. CO2 content is 0.1 mol/m3 (ecoinvent v2.2 report 8, Tab 93.1).
- waste concrete: -5.29 kg; name w_concrete; = 5.29*m_concrete; source Werner F. 2014; lognormal variance with pedigree 0.0106, pedigree (2,1,1,1,1)
  production waste
  production volume; name PV_solid_concrete; = p_concrete*abs(w_concrete)
    (same comment as for municipal solid waste)
  properties: dry mass 0.5 kg, water content 1, wet mass 1 kg
- waste mineral oil: -0.02 kg; name w_lubricating_oil; = lubricating_oil_input; lognormal variance with pedigree 0.008025, pedigree (3,1,1,2,1)
  It's assumed that the lubricating oil must be disposed of after use (the lubricating oil is used to lube the machinery and does not become part of the product). Therefore, same amount as lubricating oil input is used to model the waste.
  production volume; name PV_waste_lubricating_oil; = p_concrete*abs(w_lubricating_oil)/m_concrete
    (same comment as for municipal solid waste)
  properties: carbon content, fossil 0.864444, dry mass 0.9 kg, heating value, net 34.7 MJ, water content 0.111111, wet mass 1 kg
  note on carbon content, fossil: Tab A.6, ecoinvent v2.2 report 13_I. C content has been calculated after data in the tables, and then referred to 1 kg DM
- waste rubber, unspecified: -0.12 kg; name w_rubber; = rubber_input; lognormal variance with pedigree 0.008025, pedigree (3,1,1,2,1)
  It's assumed that the rubber must be disposed of after use. Therefore, same amount as input of rubber is considered.
  production volume; name PV_waste_rubber; = p_concrete*abs(w_rubber)/m_concrete
    (same comment as for municipal solid waste)
  properties: carbon content, fossil 0.853, dry mass 1 kg, heating value, net 27.19 MJ, wet mass 1 kg

## Sampling procedure
Inventory data of corresponding concrete in ecoinvent 3; composition according to standard requirements

## Extrapolations
See geography
