# transport, freight, lorry >32 metric ton, EURO5

Dataset: EcoSpold 2, unit process
Geography: RoW
Time period: 2009-01-01 to 2023-12-31
Technology level: modern
Classification: ISIC rev.4 ecoinvent: 4923:Freight transport by road
Scenario: Business-as-Usual
System model: Allocation, cut-off by classification
Share of production covered: 100 %
Generated by: Andrew Simons
Published in: Keller, M. 2010
Database: ecoinvent
isCopyrightProtected: true
accessRestrictedTo: 1

## General comment
This dataset represents the service of 1tkm freight transport in a lorry of the size class >32 metric tons gross vehicle weight (GVW) and Euro V emissions class. The transport datasets refer to the entire transport life cycle i.e. to the construction, operation, maintenance and end of life of vehicle and road infrastructures. Fuel consumption and emissions are for average European journeys and load factors and not representative of a specific transport scenario. The average load factors are taken from the Tremove model v2.7b (2009) and EcoTransIT (2011) report. These are as follows:
Lorry size class Average load factor GVW
3.5-7.5t 0.98t 4.98t
7.5-16t 3.29t 9.29t
16-32t 5.79t 15.79t
>32t 15.96t 29.96t
The lorry size and load factor determines the GVW and therefore also the fuel consumption and amount of both exhaust and non-exhaust emissions. Non-exhaust emissions are those resulting from tyre, brake and road wear.
Fuel consumption and exhaust emissions are taken from v3.1 of the HBEFA model, using the data for Germany and without applying model weighting. There are a higher number of size categories used in HBEFA than in ecoinvent and so the data are grouped in order to fit the lorry size classes used in ecoinvent. The selective catalytic reduction (SCR) technology is around 3 times more common than that of exhaust gas recovery (EGR) as an emissions reduction measure and so the emission factors given in the dataset are weighted to reflect this. The data for the HBEFA categories SCR* and VI* were disregarded. The exhaust emissions caused by the burning of fuel are either fuel dependent (fuel type and quantity) or Euro class dependent. The latter reflect the emission regulations to which the vehicle complies. Regulated emissions are CO, NOx, particulate matter (PM) and total hydrocarbons (HC). Data from the Emissions Inventory Guidebook (EMEP/EEA, 2013) were used for specific exhaust emissions not covered by the HBEFA model.
Non-exhaust emissions are accounted for as weight dependent by-products and exist as seperate datasets.
For road infrastructure the expenditures and environmental interventions due to construction of roads have been allocated based on the gross tonne kilometer performance. Expenditures due to operation of the road infrastructure, as well as land use have been allocated based on the yearly vehicle kilometer performance. The same assumption on vehicle lifetime performance has been transferred from the ecoinvent v2 datasets of 540 000 km/vehicle. The production, maintenance and disposal of the vehicle are as reported in the ecoinvent (2007) report on transport services.
Main data sources:
De Ceuster, G., et al. (2009) TREMOVE: Final Report. Model code v2.7b, 2009. European Commission, Brussels.
Keller, M. et al. (2010) Handbook emission factors for road transport v3.1, HBEFA. INFRAS, Berne, CH.
Knörr, W. et al. (2011) Ecological Transport Information Tool for Worldwide Transports (EcoTransIT): Methodology and data update. Berlin, Hannover, Heidelberg, DE.
Ntziachristos, L., et al. (2013) EMEP/EEA air pollutant emissions inventory guidebook 2009: Exhaust emissions from road transport. European Environment Agency, Copenhagen, DK.
Spielmann, M., et al. (2007) Transport Services. ecoinvent report No. 14., Swiss Centre for Life Cycle Inventories, Dübendorf, CH.

## Included activities start
From combustion of fuel in the engine. The dataset takes as input the infrastructure of the lorry and road network, the materials and efforts needed for maintenance of these and the fuel consumed in the vehicle for the journey.

## Included activities end
The activity ends with the transport service of 1tkm and the emissions of exhaust and non-exhaust emissions into air, water and soil.

## Geography
This dataset is a copy from the RER geography, which contains the comment:
The data for road infrastructure reflect Swiss conditions. Data for vehicle operation, manufacturing and maintenance represents generic European data. Data for the vehicle disposal reflect the Swiss situation. The environmental interventions due to vehicle transport are modelled by linking the environmental interventions due to vehicle operation with impacts due to vehicle manufacturing, vehicle maintenance, vehicle disposal, road construction, operation and maintenance of roads and road disposal. So-called demand factors are used to link the transport service components to the functional unit of one tonne kilometre [tkm] (Spielmann & Scholz 2005).
References:
Spielmann M. and Scholz R. W. (2005) Life Cycle Inventories for Transport Services - Background Data for Freight Transport. In: Int J LCA, 10(1), pp.

## Technology
Diesel and diesel engine. Lorry transport is further differentiated with respect to vehicle weight and emission technology standard (EURO-standard).
Technology classifications are based on those used widely within the works of the European Environment Agency, particularly in the Emissions Inventory Guidebook.

## Reference product
- transport, freight, lorry >32 metric ton, EURO5: 1 metric ton*km; By-product classification allocatable product; CPC 6511: Road transport services of freight
  production volume 1.74353e12 metric ton*km; name transport_RP_PV; = (319510000000 + 1.20E+11)*(1/0.202442595098182)
    The production volume of GLO transport is calculated based on the production volume of the corresponding regional dataset(s).The GLO transport has either only a RER or an RER and BR correspondent. The scaling is based on the data on total tkm reported by OECD in OECD data for freight transport (accessible at https://data.oecd.org/transport/freight-transport.htm). OECD reports total tkm for 50 locations. The year of the data taken is 2019, data from previous years has been used when data for 2019 was not available. Since BR was not included in the list of countries, the total production volume for the relevant transport in BR has been added to calculate a proxy for GLO. Based on this it was calculated that RER and BR represent 11% and 9% of GLO transport respectively.
    It is estimated, that 10% of this transport is used for transport of goods in need of atmosphere control. And thus this production volume is included in the "transport, freight, lorry ... with refrigeration machine" datasets..
    .
  property price 0.0156631 EUR2005
    Calculated based on inputs: The price of the product has been calculated as a sum of the values of the material and energy inputs for this product. This value is therefore a rough estimation. It may underestimate the real price since there are additional expenses when producing any product. These expences can include for example labour costs, treatment of waste materials and profit for the producer. Please consider carefully whether this level of data quality is acceptable for your application.
  properties: carbon allocation 0 kg, carbon content 0

## Inputs from technosphere
- brake wear emissions, lorry: -1.52616e-5 kg; name brake_emissions; = (8.13e-9*29960)/15.96; source Ntziachristos, L. 2013; lognormal variance with pedigree 0.0021, pedigree (2,2,2,4,1)
  Road freight specific non-exhaust emissions.
  This dataset and the emission factors within it relate to 1kg of brake wear. In order to use the treatment of non-exhaust emissions in a transport dataset the quantity of emissions per km must be calculated. Non-exhaust emissions are considered to be linearly scalable to gross vehicle weight (GVW). For brake wear emissions from lorries the specific quantity is 8.13E-9 kg/kg GVW*km.
  The GVW of the >32t lorries using an average load factor is 29 960kg.
  The value calculated must then be devided by the average load to give the non-exhaust emissions per tkm.
  production volume; = brake_emissions*transport_RP_PV
    Calculated from production volume of reference product using the relative outputs.
  properties: carbon content, fossil 0.149
  note on carbon content, fossil: This amount equates to the amout for organic carbon reported in the Emissions Inventory Guidebook (Ntziachristos et al., 2013).
- diesel, low-sulfur: 0.000314026, 0.0013995, 0.0167108, 0.000699981, 4.64248e-5 kg (5 suppliers, which the file names only by identifier); sum of these 0.0191707 kg; source Keller, M. 2010; lognormal variance with pedigree 0.0419, pedigree (2,2,5,4,1)
  Literature value. Derived from HBEFA database (Keller, 2010).
  properties: carbon content, fossil 0.865, dry mass 1 kg, heating value, net 42.8 MJ, wet mass 1 kg
  note on carbon content, fossil: C-content of diesel low-sulfur is 86.5% (ecoinvent v2.2 report 6_IV, Tab 3.14)
- lorry, 40 metric ton: 9.65e-8 unit; lognormal variance with pedigree 0.312, pedigree (3,1,4,5,1)
  Calculated value based on lifetime vkm (540 000 for all lorry sizes) and average load factors (see Activity Description).
- maintenance, lorry 40 metric ton: 9.65e-8 unit; lognormal variance with pedigree 0.312, pedigree (3,1,4,5,1)
  (same comment as for lorry, 40 metric ton)
- road: 0.00109 m*year; source Spielmann M. 2007; lognormal variance with pedigree 0.312, pedigree (3,1,4,5,1)
  Calculated value based demand factors and underlying assumptions for European road transport services. Values are based on total tkm of all road transport services (RER) and the relative shares of each specific form (i.e. 3.5-7.5t lorry). The value per tkm is then based on the net vehicle weight plus averge load factor (see Activity Description). Transport performance data is derived from TREMOVE (2009).
- road maintenance: 8.09172e-5 m*year; lognormal variance with pedigree 0.312, pedigree (3,1,4,5,1)
  Calculated value based demand factors and underlying assumptions for European road transport services. Values are based on total vkm of all road transport services (RER) and the relative shares of each specific form (e.g. 3.5-7.5t lorry). The value per tkm is then based on the average load factor (see Activity Description). Transport performance data is derived from TREMOVE (2009).
- road wear emissions, lorry: -1.31404e-5 kg; name road_emissions; = (7.0e-9*29960)/15.96; source Ntziachristos, L. 2013; lognormal variance with pedigree 0.0021, pedigree (2,2,2,4,1)
  Road freight specific non-exhaust emissions.
  This dataset and the emission factors within it relate to 1kg of road wear. In order to use the treatment of non-exhaust emissions in a transport dataset the quantity of emissions per km must be calculated. Non-exhaust emissions are considered to be linearly scalable to gross vehicle weight (GVW). For road wear emissions from lorries the specific quantity is 7.0e-9 kg/kg GVW*km.
  The GVW of the >32t lorries using an average load factor is 29 960kg.
  The value calculated must then be devided by the average load to give the non-exhaust emissions per tkm.
  production volume; = road_emissions*transport_RP_PV
    Calculated from production volume of reference product using the relative outputs.
  properties: carbon content, fossil 0.75
  note on carbon content, fossil: The amount of carbon released due to road wear is not given in theEmissions Inventory Guidebook (Ntziachristos et al., 2013). For road wear there are no individual substances reported. Here we assume that 75% of the particle emissions are carbon, fossil in their nature due to the bitumen road surfacing.
- tyre wear emissions, lorry: -0.000151208 kg; name tyre_emissions; = (8.055e-8*29960)/15.96; source Ntziachristos, L. 2013; lognormal variance with pedigree 0.0021, pedigree (2,2,2,4,1)
  Road freight specific non-exhaust emissions.
  This dataset and the emission factors within it relate to 1kg of tyre wear. In order to use the treatment of non-exhaust emissions in a transport dataset the quantity of emissions per km must be calculated. Non-exhaust emissions are considered to be linearly scalable to gross vehicle weight (GVW). For tyre wear emissions from lorries the specific quantity is 8.055E-8 kg/kg GVW*km.
  The GVW of the >32t lorries using an average load factor is 29 960kg.
  The value calculated must then be devided by the average load to give the non-exhaust emissions per tkm.
  production volume; = tyre_emissions*transport_RP_PV
    Calculated from production volume of reference product using the relative outputs.
  properties: carbon content, fossil 0.675

## Emissions to nature
- Acetaldehyde [air, unspecified]: 9.21396e-8 kg; source Ntziachristos, L. 2013; lognormal variance with pedigree 0.0419, pedigree (2,2,5,4,1)
  Literature value. The NMVOC split is provided by the EMEP/EEA (2013) guidebook. All elementary NMVOC exchanges available in the ecoinvent database and quantified in the EMEP/EEA guidebook are provided. Total NMVOC's derived from HBEFA database (Keller, 2010)..
- Acrolein [air, unspecified]: 3.56864e-8 kg; source Ntziachristos, L. 2013; lognormal variance with pedigree 0.0419, pedigree (2,2,5,4,1)
  (same comment as for Acetaldehyde)
- Ammonia [air, unspecified]: 1.8797e-7 kg; source Keller, M. 2010; lognormal variance with pedigree 0.0419, pedigree (2,2,5,4,1)
  Literature value. Derived from HBEFA database (Keller, 2010).
- Arsenic ion [air, unspecified]: 1.91707e-12 kg; source Ntziachristos, L. 2013; lognormal variance with pedigree 0.0419, pedigree (2,2,5,4,1)
  Literature value. Fuel dependant emissions - heavy metal in fuel. Literature value. EMEP/EEA (2013) Tab. 3-100.
- Benzaldehyde [air, unspecified]: 2.76217e-8 kg; source Ntziachristos, L. 2013; lognormal variance with pedigree 0.0419, pedigree (2,2,5,4,1)
  (same comment as for Acetaldehyde)
- Benzene [air, unspecified]: 1.41133e-9 kg; source Ntziachristos, L. 2013; lognormal variance with pedigree 0.0419, pedigree (2,2,5,4,1)
  (same comment as for Acetaldehyde)
- Butane [air, unspecified]: 3.02427e-9 kg; source Ntziachristos, L. 2013; lognormal variance with pedigree 0.0419, pedigree (2,2,5,4,1)
  (same comment as for Acetaldehyde)
- Cadmium II [air, unspecified]: 1.66785e-10 kg; source Ntziachristos, L. 2013; lognormal variance with pedigree 0.7413, pedigree (2,2,5,4,1)
  (same comment as for Arsenic ion)
- Carbon dioxide, fossil [air, unspecified]: 0.0611497 kg; source Keller, M. 2010; lognormal variance with pedigree 0.0419, pedigree (2,2,5,4,1)
  Literature value. Derived from HBEFA database (Keller, 2010).
- Carbon monoxide, fossil [air, unspecified]: 9.09158e-5 kg; source Keller, M. 2010; lognormal variance with pedigree 0.0419, pedigree (2,2,5,4,1)
  Literature value. Derived from HBEFA database (Keller, 2010).
- Chromium III [air, unspecified]: 5.75121e-10 kg; source Ntziachristos, L. 2013; lognormal variance with pedigree 0.7413, pedigree (2,2,5,4,1)
  (same comment as for Arsenic ion)
- Chromium VI [air, unspecified]: 1.15024e-12 kg; source Ntziachristos, L. 2013; lognormal variance with pedigree 0.7413, pedigree (2,2,5,4,1)
  Estimated value. Fuel dependant emissions - heavy metal in fuel. Estimated using the underlying assumption that 0.2% of the emitted Cr is emitted as Cr(IV). Fuel dependant emissions - heavy metal in fuel. Literature value for Cr. EMEP/EEA (2013) Tab. 3-100.
- Copper ion [air, unspecified]: 4.06419e-10 kg; source Ntziachristos, L. 2013; lognormal variance with pedigree 0.7413, pedigree (2,2,5,4,1)
  (same comment as for Arsenic ion)
- Dinitrogen monoxide [air, unspecified]: 3.52132e-6 kg; source Keller, M. 2010; lognormal variance with pedigree 0.0419, pedigree (2,2,5,4,1)
  Literature value. Derived from HBEFA database (Keller, 2010).
- Ethane [air, unspecified]: 6.04855e-10 kg; source Ntziachristos, L. 2013; lognormal variance with pedigree 0.0419, pedigree (2,2,5,4,1)
  (same comment as for Acetaldehyde)
- Formaldehyde [air, unspecified]: 1.69359e-7 kg; source Ntziachristos, L. 2013; lognormal variance with pedigree 0.0419, pedigree (2,2,5,4,1)
  (same comment as for Acetaldehyde)
- Heptane [air, unspecified]: 6.04855e-9 kg; source Ntziachristos, L. 2013; lognormal variance with pedigree 0.0419, pedigree (2,2,5,4,1)
  (same comment as for Acetaldehyde)
- Lead II [air, unspecified]: 9.98794e-10 kg; source Ntziachristos, L. 2013; lognormal variance with pedigree 0.7413, pedigree (2,2,5,4,1)
  (same comment as for Arsenic ion)
- Mercury II [air, unspecified]: 1.01605e-10 kg; source Ntziachristos, L. 2013; lognormal variance with pedigree 0.7413, pedigree (2,2,5,4,1)
  (same comment as for Arsenic ion)
- Methane, fossil [air, unspecified]: 4.95783e-8 kg; source Keller, M. 2010; lognormal variance with pedigree 0.0419, pedigree (2,2,5,4,1)
  Literature value. Derived from HBEFA database (Keller, 2010).
- NMVOC, non-methane volatile organic compounds [air, unspecified]: 1.63775e-6 kg; source Keller, M. 2010; lognormal variance with pedigree 0.0419, pedigree (2,2,5,4,1)
  Literature value. Derived from HBEFA database (Keller, 2010) and emissions inventory guidebook (EMEP/EEA, 2013). Unspecified NMVOC's represent NMVOC's for which no elementary exchange exists in the ecoinvent database. Total NMVOC's are given by the HBEFA database with the split being provided by the EMEP/EEA (2013) guidebook.
- Nickel II [air, unspecified]: 1.68702e-10 kg; source Ntziachristos, L. 2013; lognormal variance with pedigree 0.7413, pedigree (2,2,5,4,1)
  (same comment as for Arsenic ion)
- Nitrogen oxides [air, unspecified]: 0.000163762 kg; source Keller, M. 2010; lognormal variance with pedigree 0.0419, pedigree (2,2,5,4,1)
  Literature value. Derived from HBEFA database (Keller, 2010).
- PAH, polycyclic aromatic hydrocarbons [air, unspecified]: 1.49915e-9 kg; source Ntziachristos, L. 2013; lognormal variance with pedigree 0.7413, pedigree (2,2,5,4,1)
  Literature value. PAH's per kg fuel use provided by the EMEP/EEA (2013) guidebook.
- Particulate Matter, < 2.5 um [air, unspecified]: 1.73982e-6 kg; source Keller, M. 2010; lognormal variance with pedigree 0.0419, pedigree (2,2,5,4,1)
  Literature value. Derived from HBEFA database (Keller, 2010).
- Pentane [air, unspecified]: 1.20971e-9 kg; source Ntziachristos, L. 2013; lognormal variance with pedigree 0.0419, pedigree (2,2,5,4,1)
  (same comment as for Acetaldehyde)
- Propane [air, unspecified]: 2.01618e-9 kg; source Ntziachristos, L. 2013; lognormal variance with pedigree 0.0419, pedigree (2,2,5,4,1)
  (same comment as for Acetaldehyde)
- Selenium IV [air, unspecified]: 1.91707e-12 kg; source Ntziachristos, L. 2013; lognormal variance with pedigree 0.7413, pedigree (2,2,5,4,1)
  (same comment as for Arsenic ion)
- Styrene [air, unspecified]: 1.12906e-8 kg; source Ntziachristos, L. 2013; lognormal variance with pedigree 0.0419, pedigree (2,2,5,4,1)
  (same comment as for Acetaldehyde)
- Sulfur dioxide [air, unspecified]: 3.12467e-7 kg; source Keller, M. 2010; lognormal variance with pedigree 0.0419, pedigree (2,2,5,4,1)
  Literature value. Derived from HBEFA database (Keller, 2010).
- Toluene [air, unspecified]: 2.01618e-10 kg; source Ntziachristos, L. 2013; lognormal variance with pedigree 0.0419, pedigree (2,2,5,4,1)
  (same comment as for Acetaldehyde)
- Zinc II [air, unspecified]: 3.33187e-8 kg; source Ntziachristos, L. 2013; lognormal variance with pedigree 0.7413, pedigree (2,2,5,4,1)
  (same comment as for Arsenic ion)
- m-Xylene [air, unspecified]: 1.97586e-8 kg; source Ntziachristos, L. 2013; lognormal variance with pedigree 0.0419, pedigree (2,2,5,4,1)
  (same comment as for Acetaldehyde)
- o-Xylene [air, unspecified]: 8.06473e-9 kg; source Ntziachristos, L. 2013; lognormal variance with pedigree 0.0419, pedigree (2,2,5,4,1)
  (same comment as for Acetaldehyde)

## Sampling procedure
Literature data.

## Extrapolations
This dataset has been copied from an original dataset covering the geography RER. The uncertainty has been adjusted accordingly.
