# hardwood forestry, azobe, sustainable forest management

Dataset: EcoSpold 2, unit process
Geography: RoW
Time period: 2000-01-01 to 2023-12-31
Technology level: current
Classification: EcoSpold01Categories: wooden materials/extraction
Classification: ISIC rev.4 ecoinvent: 0220:Logging
Synonyms: Ekki; Bongassi; Lophira alata
Scenario: Business-as-Usual
System model: Allocation, cut-off by classification
Generated by: Frank Werner (obsolete)
Published in: Althaus H.J. 2007
Database: ecoinvent
isCopyrightProtected: true
accessRestrictedTo: 1

## General comment
This dataset represents the plantation establishment, management and harvesting of one m3 azobe logs. The dataset covers (close to) sustainable forest management in Central Africa.
The data are collected from a well-documented, legally operating logging company with modern equipment. Emissions from biomass burning are according to literature on best practise.
As inventory data availability on tropical forestry processes and tropical wood is very limited, the inventory should be considered case-specific. Any specific environmental impact from land use change following timber harvesting needs to be considered on a case-specific basis.
This dataset represents the natural growth of one m3 azobe trees in a tropical forest plantation. The dataset stems from two sources from West Africa in Cameroon representing (close to) sustainable forest management in Central Africa.
The data refers to wood 'under bark'. In the dataset, the solar energy uptake is calculated as the upper heating value (24.3 MJ/kg at u=30% ) based on a lower heating value of of Azobe wood of 18.35 MJ/kg. Calculation of the CO2 assimilation is based on a carbon content of 49.4% in the wood including the bark (=9%). The biomass energy equals the gross calorific value including bark. The density of azobe is assumed 1000 kg/m3 (with u=0%).
As LCI data availability on tropical forestry processes and tropical wood is very limited, the dataset should be considered case-specific. Any specific environmental impact from land use change following timber harvesting needs to be considered on a case-specific basis.

## Included activities start
Plantation establishment process starting from azobe tree planting. Natural growth process starting from standing azobe trees at plantation.

## Included activities end
This acitivity ends with harvested azobe tree logs, at forest road. The dataset includes harvesting, hauling operations, fuel used for forest road construction and emissions from burning of branchings. The dataset does not include the branchings left to rot on the ground, land use of forest roads, use of gravel nor the logging impacts on further vegetation or environmental impacts from post-harvest processes (potential forest degradation/deforestation). This activity ends with standing azobe trees before harvesting. The dataset includes the CO2 absorption from air and the land use for the trees to grow (including 9% bark). The dataset does not include land use of the forest road area.

## Technology
The technology of the dataset reflects modern machinery and equipment. Technology involves large modern motorised forestry equipment.
Felling is by hand chainsaw, and cross-cutting takes place in the forest prior to extraction; extraction from the stump to the siding is by bulldozer or wheel-skidder.The typical overall average Azobe yield in littoral forest concessions in Cameroon is about 6 m3/ha (~1/2 tree/ha). Many small trees, often whole populations, are left standing to be harvested in another cycle, 35 – 40 years afterwards; total rotation length can thus be assumed to be 70 to 80 years. The forest area is left to regenerate naturally as part of a policyclical forest management.
The high technological standard and legal operations of this dataset cannot be assumed to be representative for Azobe harvesting.
Azobe (Lophira alata; also know as Ekki or Bongossi) is a large to very large tree, up to over 50 m height and 150 cm diameter, fairly cylindrical almost down to the ground, without buttresses. It prefers sandy to sandy-loam moist soil, in a near fresh water swamps and riverbanks.
The production practise equals natural growth in sustainable forestry.
Natural growth relates to the forest area and CO2 from the atmosphere needed to produce azobe trees.

## Reference product
- sawlog and veneer log, azobe, measured as solid wood under bark: 1 m3; By-product classification allocatable product; CPC 03120: Logs of non-coniferous wood
  Reference product. Azobe logs harvested from (close to) sustainable forest management in Central Africa. Case-specific data for the forestry of ayobe trees.
  production volume 9081.76 m3; = 21426.495/0.7
    Estimated. The global production volume is extrapolated from the CM production volume assuming that CM produces 70% of global production.
    .
  property carbon content, non-fossil 0.494
    C content of dry mass is 0.494 kgC/kg dry wood (ecoinvent v2.2 report 21).
  property heating value, net 14232 MJ
    LHV is calculated based on the Carbon content of the product. More details can be found on the respective documentation.The property is based on a value of 10.95MJ/kg
  property price 174.94 EUR2005
    Reference: FAOSTAT (accessed 20140112). The price is calculated by using data on total world import quantity (m3) and import value (1000 USD), year 2005. 15174881 m3 of Ind Rwd Wir (NC) Tropica was imported in the world in 2005. The import value was 3209966000 USD. The calculated price is thus (3209966000/15174881*0.8)=174.936586454945 Euro.
  properties: carbon allocation 609.877 kg, carbon content 0.494, carbon content, fossil 0, dry mass 1234.57 kg, water content 0.3, water in wet mass 370.37 kg, wet mass 1604.94 kg

## Inputs from technosphere
- diesel, burned in building machine: 551.4 MJ; source ICL/SHR Timber Research 2002; lognormal variance with pedigree 0.052, pedigree (1,1,5,5,1)
  Literature Value.
  properties: heating value, net 1 MJ
- lubricating oil: 0.15834, 0.75166 kg (2 suppliers, which the file names only by identifier); sum of these 0.91 kg; source ICL/SHR Timber Research 2002; lognormal variance with pedigree 0.052, pedigree (1,1,5,5,1)
  Literature Value.
  properties: carbon content, fossil 0.75, dry mass 1 kg, heating value, net 40.2 MJ, wet mass 1 kg
  note on carbon content, fossil: Lubricating oil is produced from diesel. C-content/dry mass of fats and oils considered 75%, from: ecoinvent v2.2 report, n 15a, pg 40
  note on heating value, net: Literature value, Source: IPCC 2006, 2006 IPCC Guidelines for National Greenhouse Gas Inventories, Prepared by the National Greenhouse Gas Inventories Programme, Eggleston H.S., Buendia L., Miwa K., Ngara T. and Tanabe K. (eds). Published: IGES, Japan
- power sawing, without catalytic converter: 0.1 hour; lognormal variance with pedigree 0.056, pedigree (3,4,5,5,1)
  Estimation, Supposed to cover lubricated oil consumption inventoried in ICL/SHR 2002.

## Inputs from nature
- Carbon dioxide, in air [natural resource, in air]: 3940 kg; lognormal variance with pedigree 0.056, pedigree (3,4,5,5,1)
  Calculated Value. Density of dried matter = 1000 kg/m3. C-content = 49.4 %.
- Energy, gross calorific value, in biomass [natural resource, biotic]: 53000 MJ; lognormal variance with pedigree 0.0533532, pedigree (3,4,5,3,1)
- Occupation, forest, extensive [natural resource, land]: 17940 m2*year; source IPCC 2003; lognormal variance with pedigree 0.21, pedigree (5,5,5,5,5)
  Literature Value.
  Total above-ground biomass for African wet tropical forest:
  Reference specification: IPCC 2003, Table 3A.1.2: 310 tonnes d.m./ha
  BEF2:
  Reference specification: IPCC 2003, Table 3A.1.10: 3.4
  Rotation length: 75 years
- Transformation, from forest, extensive [natural resource, land]: 240 m2; source ICL/SHR Timber Research 2002; lognormal variance with pedigree 0.28, pedigree (5,5,5,5,5)
  Literature Value. Excluding forest road.
  Yield = 6 m3/h (excl. bark and forest roads) besides other more valuable commercial species.
  Rotation length = 75 years.
- Transformation, to forest, extensive [natural resource, land]: 240 m2; lognormal variance with pedigree 0.28, pedigree (5,5,5,5,5)
  Estimation. Rotation lenght = 75 years.
- Wood, hard, standing [natural resource, biotic]: 1.09 m3; lognormal variance with pedigree 0.056, pedigree (3,4,5,5,1)
  Calculated Value. Resource correction for branchings.

## Emissions to nature
- Carbon dioxide, non-fossil [air, unspecified]: 1970.8 kg; source ICL/SHR Timber Research 2002; lognormal variance with pedigree 0.056, pedigree (3,4,5,5,1)
  Literature Value. Refers to volume under bark.
- Dinitrogen monoxide [air, non-urban air or from high stacks]: 0.011846 kg; source ICL/SHR Timber Research 2002; lognormal variance with pedigree 0.096, pedigree (3,4,5,5,1)
  Estimation. Calculated based on the given reference. Refers to volume under bark.
- Methane, non-fossil [air, non-urban air or from high stacks]: 1.7231 kg; source ICL/SHR Timber Research 2002; lognormal variance with pedigree 0.096, pedigree (3,4,5,5,1)
  Estimation. Calculated based on the given reference. Refers to volume under bark.
- Particulate Matter, < 2.5 um [air, non-urban air or from high stacks]: 6 kg; source EPA 1995; lognormal variance with pedigree 0.096, pedigree (3,4,5,5,1)
  Estimation. 5 g /kg. Estimated from the given reference.
- Particulate Matter, > 10 um [air, non-urban air or from high stacks]: 4 kg; source EPA 1995; lognormal variance with pedigree 0.096, pedigree (3,4,5,5,1)
  Estimation. 6 g /kg. Estimated from the given reference.
- Particulate Matter, > 2.5 um and < 10um [air, non-urban air or from high stacks]: 5 kg; source EPA 1995; lognormal variance with pedigree 0.096, pedigree (3,4,5,5,1)
  Estimation. 4 g /kg. Estimated from the given reference.

## Sampling procedure
literature

## Extrapolations
This dataset has been copied from an original dataset covering the geography CM. The uncertainty has been adjusted accordingly.

## Review by Hans-Jörg Althaus 2007-09-25
Passed

## Review by Roland Hischier 2011-10-11
Transfer of documentation done.

## Review by Emilia Moreno Ruiz 2013-04-12
PV set to 4

## Review by Emilia Moreno Ruiz 2014-05-21
restructured to fit new sector (CO2 intake and land use merged into the forestry dataset)
