# electricity production, oil

Dataset: EcoSpold 2, unit process
Geography: IN-TN
Time period: 1980-01-01 to 2023-12-31
Technology level: current
Classification: ISIC rev.4 ecoinvent: 3510:Electric power generation, transmission and distribution
Classification: EcoSpold01Categories: oil/power plants
Synonyms: petroleum; heavy fuel oil
Tags: India; oil power; fossil fuels
Scenario: Business-as-Usual
System model: Allocation, cut-off by classification
Generated by: Muhammed Noor Hossain
Published in: Hossain, Muhammed Noor 2016
Database: ecoinvent
isCopyrightProtected: true
accessRestrictedTo: 1

## General comment
This dataset represents the production of high voltage electricity in an average oil power plant in India - Tamil Nadu (a state/union territory in India) in 2012.
This dataset is created as a child of the global dataset, i.e. some of the values are inherited from the global dataset and some are country-specific. Following values are edited, because they are country specific: the annual production volume, input of fuel, thermal efficiency of the power plant, and emission of CO2. Other emissions are, in general, calculated/estimated based on the weighted average of emissions in all datasets in version 2 (which are considered as the global values) multiplied with an efficiency scaling factor. The datasets in version 2 were valid for the following countries: AT, BE, BR, GR, CN, CS, CZ, DE, DK, ES, FI, FR, GB, GR, HR, HU, IE, IT, JP, MK, NL, NO, PT, PL, SE, SI, SK. Weighting was made with electricity production data in those countries based on IEA/OECD 2010. The weighted averages are taken as global values and then scaled with a factor derived from the comparison of the global average efficiency and the efficiency valid for this dataset in order to account for a higher or lower fuel input for the production of 1 kWh, respectively.
Comments:
- sulfur content of the oil is not adapted to local/average conditions.
- CO2 emissions are presented for the combustion and are collected from data provided by CO2 Baseline Database for the Indian Power Sector.
- Extensive comments on emissions can be found in Jungbluth 2007, on which this dataset is based on.
Sources:
CEA. (2014). CO2 Baseline Database for the Indian Power Sector. User Guide, Ministry of Power, Government of India, New Delhi. Retrieved 12 04, 2016, from http://cea.nic.in/reports/others/thermal/tpece/cdm_co2/user_guide_ver10.pdf
IEA/OECD. 2010. Electricity Information 2010. International Energy Agency (IEA), Paris Cedex (FR). Part IV. Detailed OECD Electricity And Heat Data.
[This dataset is meant to replace the following datasets:
- electricity production, oil, IN, 1980 - 2015]

## Included activities start
From the constructed power plant ready to produce electricity and from the fuel ready to be used.

## Included activities end
This activity ends with 1kWh of high voltage electricity produced at the power plant and arrived at the busbar.

This dataset includes all energy use, use of chemicals, emissions to air and water In an oil power plant, water is needed for cooling, feed water for the steam circuit, for the flue gas treatment, or other cleaning. This dataset only considers water use (evaporation) for cooling and steam circuit.

## Technology
Electricity production in a conventional oil power plant with a capacity of 500 MWe.

## Time period
The Annual Production Volume data for the period 01.04.2012 - 31.03.2013.

## Parameters
- average efficiency of oil power plants, country: 0.258047 dimensionless; name efficiency_oil_country; = 3412/ ( net_heat_rate*3.968312); lognormal variance with pedigree 0.0018, pedigree (2,1,1,1,2)
  Calculated value. Efficiency is calculated as 3412 (btu/kWh)/net heat rate (btu/kWh)
- average efficiency of oil power plants, global: 0.37 dimensionless; name efficiency_oil_global; lognormal variance with pedigree 0.003325, pedigree (3,2,1,2,2)
  Literature value/calculated value. Net electrical efficiency based on the lower heating value (LHV).
  For all OECD countries, the IEA Electricity information 2014 provides data for the year 2012 on fuel input (TJ, Net calorific value NCV) and gross electricity production (GWh) as well as heat production (TJ) in tables 8 and 9 for each country for electricity only and Combined Heat and Power (CHP) plants each. Together with the information on own use (see parameter "losses"), the net electrical efficiency based on the NCV is calculated.
  For all non-OECD countries, data from the IEA Energy balances of non-OECD countries 2014 have been used. These tables do not always provide information on how much of the electricity has been produced in electricity only and in CHP plants, but often give the total value only.
  IEA. 2014. Electricity Information 2014. ISBN 978-92-64-21692-1. International Energy Agency (IEA), Paris Cedex (FR).
  IEA/OECD. 2014. Energy balances of non-OECD countries 2014. International Energy Agency (IEA), Paris Cedex (FR).
  nan
- factor: input of MJ for the production of 1 kWh: 8.47657 MJ/kWh; name factor_MJ_kWh; = heavy_fuel_oil*34.64; lognormal variance with pedigree 0.0018, pedigree (2,1,1,1,2)
  Calculated value. Calculated as the product of fuel consumption (0.244701872kg/kWh) and net calorific value of fuel (34.64 MJ/kg).
- fraction, cooling water, to air: 0.0159178 dimensionless; name fraction_CW_to_air; = (WConsumption_EP_oil_recirculatingCS*recirculating_CS_fraction_from_allCS+WConsumption_EP_oil_onceT_andCP_CS*once_through_andCP_CS_fractio_from_allCS)/(WWithdrawal_EP_oil_recirculating_CS*recirculating_CS_fraction_from_allCS+WWithdrawal_EP_oil_onceT_andCP_CS*once_through_andCP_CS_fractio_from_allCS); lognormal variance with pedigree 0.092025, pedigree (4,4,3,2,4)
  Calculated value
  nan
- fraction, process water, to air: 0.15 dimensionless; name fraction_PW_to_air; lognormal variance with pedigree 0.092025, pedigree (4,4,3,2,4)
  Literature value. In case when no industry/process specific data are available, default evaporation fraction value is used. This value is 15% and is based on literature (Statistics Canada, 2007 & Shaffer, K.H., 2008, Consumptive water use in the Great Lakes Basin, USGS & Shiklomanov, 2003, World Water Resources at the Beginning of the 21st Century) and has been approved by an expert.
  nan
- fraction, water, completely softened, to air: 0.15 dimensionless; name fraction_WCS_to_air; = fraction_PW_to_air; lognormal variance with pedigree 0.092025, pedigree (4,4,3,2,4)
  Calculated value. See comment in the other parametres present in this dataset. Water, completely softened is considered to be always used as process water, thus process water fractions to air are applied to all water, completely softened input flows to calculate the amount of water consumed in the processes.
  nan
- fraction, water, decarbonised, to air: 0.0159178 dimensionless; name fraction_WDC_to_air; = fraction_CW_to_air; lognormal variance with pedigree 0.092025, pedigree (4,4,3,2,4)
  Calculated value. See comments in the other parametres present in this dataset. Decarbonised water is considered to be always used as cooling water, thus cooling water fractions to air are applied to all carbonised water input flows to calculate the amount of water consumed in the processes.
  nan
- gross electricity production: 1.30406e9 kWh; name gross_electricity; lognormal variance with pedigree 0.0018, pedigree (2,1,1,1,2)
  Literature and calculated value. Annual production volume data were extracted from the annual thermal electricity generation report of Central Electricity Authority, India (CEA, 2013). The Annual Production Volume is for the time period of 01.04.2012 - 31.03.2013 since CEA documents annual electricity production data for the mentioned time period.
  CEA. (2013). Region Wise, State Wise, Sector Wise, Type Wise, Station Wise, Unit Wise Generation Report For 31-Mar-2013. Central Electricity Authority (CEA). Retrieved from 04 December, 2016 http://cea.nic.in/reports/daily/dgr/2013/March/31/dgr2.pdf
- losses from gross electricity production: 0.035 dimensionless; name losses_gross_net; lognormal variance with pedigree 0.0018, pedigree (2,1,1,1,2)
  Literature value. Own use of electricity plants in this State/Union Territory in 2012. The default loss as described by the CEA CO2 Baseline Database for the Indian Power Sector is applied, which is 3.5%. CEA. (2014). CO2 Baseline Database for the Indian Power Sector. User Guide, Ministry of Power, Government of India, New Delhi. Retrieved 12 04, 2016, from http://cea.nic.in/reports/others/thermal/tpece/cdm_co2/user_guide_ver10.pdf
  Uncertainty: g
- net heat rate: 3332 kcal/kWh; name net_heat_rate; lognormal variance with pedigree 0.0018, pedigree (2,1,1,1,2)
  A measure of the energy input to a system divided by the electricity generated. Literature value. Net heat rate of diesel engine electricity plants in this State/Union Territory in 2012. The default net heat rate as described by the CEA CO2 Baseline Database for the Indian Power Sector is applied, which is 3332 kcal/kWh. CEA. (2014). CO2 Baseline Database for the Indian Power Sector. User Guide, Ministry of Power, Government of India, New Delhi. Retrieved 12 04, 2016, from http://cea.nic.in/reports/others/thermal/tpece/cdm_co2/user_guide_ver10.pdf
- once-through and cooling pond cooling systems as a fraction of all cooling syste: 0.625 dimensionless; name once_through_andCP_CS_fractio_from_allCS; lognormal variance with pedigree 0.092025, pedigree (4,4,3,2,4)
  Calculated as an average of data available for Europe (Floerke, 2008, Future changes of freshwater needs in the electricity production sector) and USA (NERL, 2011, Estimating freshwater needs to meet future thermoelectric generation requirements).
  nan
- recirculating cooling system as a fraction of all cooling systems: 0.375 dimensionless; name recirculating_CS_fraction_from_allCS; lognormal variance with pedigree 0.092025, pedigree (4,4,3,2,4)
  (same comment as for once-through and cooling pond cooling systems as a fraction of all coo)
- relation between the global and the country's efficiency of oil power plants: 1.43385 dimensionless; name relation_global_country; = efficiency_oil_global/ efficiency_oil_country
  This factor brings the amounts of the exchanges in the global dataset into relation with the amounts in the country datasets.
  nan
- water consumption, electricity production from oil, once-T and coolingP CS: 0.0005 m3/kWh; name WConsumption_EP_oil_onceT_andCP_CS; lognormal variance with pedigree 0.092025, pedigree (4,4,3,2,4)
  Estimated based on literature (Scown, 2011, Water Footprint of U.S. Transportation Fuels, SI).
  nan
- water consumption, electricity production from oil, recirculating CS: 0.0018 m3/kWh; name WConsumption_EP_oil_recirculatingCS; lognormal variance with pedigree 0.092025, pedigree (4,4,3,2,4)
  (same comment as for water consumption, electricity production from oil, once-T and cooling)
- water withdrawal, electricity production from oil, once-T and coolingP CS: 0.098 m3/kWh; name WWithdrawal_EP_oil_onceT_andCP_CS; lognormal variance with pedigree 0.092025, pedigree (4,4,3,2,4)
  (same comment as for water consumption, electricity production from oil, once-T and cooling)
- water withdrawal, electricity production from oil, recirculating CS: 0.0021 m3/kWh; name WWithdrawal_EP_oil_recirculating_CS; lognormal variance with pedigree 0.092025, pedigree (4,4,3,2,4)
  (same comment as for water consumption, electricity production from oil, once-T and cooling)

## Reference product
- electricity, high voltage: 1 kWh; name electricity; By-product classification allocatable product; CPC 17100: Electrical energy; HS2017 271600: Electrical energy
  production volume 1.45523e9 kWh; name apv_electricity; = gross_electricity* (1-losses_gross_net)
    Literature and calculated value. Annual production volume data were extracted from the annual thermal electricity generation report of Central Electricity Authority, India (CEA, 2013). The Annual Production Volume is for the time period of 01.04.2012 - 31.03.2013 since CEA documents annual electricity production data for the mentioned time period.
  property price 0.0977 EUR2005
    Temporary price data. Calculated as 90% of purchasers price based on: 94% of the average price (to account for a 6% loss in transformation and transmission) for electricity for industrial consumersin 2005 (excluded taxes). From IEA.
  properties: carbon allocation 0 kg, carbon content 0

## Inputs from technosphere
- ammonia, anhydrous, liquid: 0.000938429 kg; = 0.000654482227803382 * relation_global_country; source Jungbluth, N. 2007, p. Tab. 12.11 p. 228; lognormal variance with pedigree 0.0546, pedigree (2,4,5,5,1)
  Literature value for flue gas treatment.
  IPPC (2001b) Integrated Pollution Prevention and Control (IPPC): Draft Reference Document on Best Available Techniques for Large Combustion Plants. European Commission Directorate- eneral JRC, Joint Research Centre, Seville, Spain, retrieved from: http://eippcb.jrc.es.
  properties: dry mass 1 kg, wet mass 1 kg
- bilge oil: -3.17463e-5 kg; name bilge_oil; = 2.21405798675039E-05 * relation_global_country; source Jungbluth, N. 2007; lognormal variance with pedigree 0.0438, pedigree (2,3,5,5,1)
  Average of literature data
  production volume; = apv_electricity * bilge_oil
    Calculated from the production volume of electricity produced in proportion to the respective output amounts.
  properties: carbon content, fossil 0.84, dry mass 0.1 kg, heating value, net 1.92 MJ, water content 9, wet mass 1 kg
  note on carbon content, fossil: Tab A.6, ecoinvent v2.2 report 13_I. C content has been calculated after data in the tables, and then referred to 1 kg DM
  note on heating value, net: Value taken from the general comment of the treatment dataset.
- fly ash and scrubber sludge: -3.9282e-5 kg; name fly_ash; = 2.73962181380553E-05 * relation_global_country; source Jungbluth, N. 2007, p. Tab. 12.27, p. 238; lognormal variance with pedigree 0.0433, pedigree (2,2,5,5,1)
  Average of literature data
  production volume; = apv_electricity * fly_ash
    (same comment as for bilge oil)
  properties: carbon content, fossil 0.167, dry mass 0.1 kg, water content 9, wet mass 1 kg
- heavy fuel oil: 0.244705 kg; name heavy_fuel_oil; = carbon_dioxide_fossil/(34.64*0.0726); source Central Electricity Authority (CEA) 2014; lognormal variance with pedigree 0.0098, pedigree (2,1,4,1,2)
  Calculated value. In case of oil power plants, CO2 emission data were available. However, the oil consumption data were not available. Hence, we reverse calculated the oil consumption as CO2 emission divided by the product of net calorific value (34.64 MJ/kg) and CO2 emission factor (0.0726 kg/MJ).
  properties: carbon content, fossil 0.849, dry mass 1 kg, heating value, net 41.2 MJ, wet mass 1 kg
- lignite ash: -0.000842998 kg; name lignite_ash; = 0.000587926601413295 * relation_global_country; source Jungbluth, N. 2007; lognormal variance with pedigree 0.0438, pedigree (2,3,5,5,1)
  Average of literature data
  production volume; = apv_electricity * lignite_ash
    (same comment as for bilge oil)
  properties: dry mass 1 kg, heating value, net 21.7 MJ, wet mass 1 kg
  note on heating value, net: Based on literature, page 52, Report 5: Dones, R., Bauer, C., Bolliger, R., Burger, B., faist Emmenegger, M., Frischknecht, R., Heck, T., Jungbluth, N., Röder, A., Tuchschmid, M. (2007) Life Cycle Inventories of Energy Systems: Resulst for current Systems in Switzerland and other UCTE Countries. ecoinvent report No. 5. Paul Scherrer Institut Villigen, Swiss Centre for Life Cycle Inventories, Dübendorf, CH
- limestone, crushed, washed: 0.0204326 kg; = 0.0142502047575074 * relation_global_country; source Jungbluth, N. 2007, p. Tab. 12.11 p. 228; lognormal variance with pedigree 0.0546, pedigree (2,4,5,5,1)
  (same comment as for ammonia, anhydrous, liquid)
  properties: carbon content, fossil 0.117257, dry mass 0.998 kg, water content 0.00200401, wet mass 1 kg
  note on carbon content, fossil: Table 3.1, ecoinvent v2.2 report 7, part VII, pg 3. MW CaCO3=100, MW MgCO3=84. C content of limestone is 0.117257 kg/kg DM
- municipal solid waste: -0.00022353 kg; name municipal_waste; = 0.000155895267385992 * relation_global_country; source Jungbluth, N. 2007; lognormal variance with pedigree 0.0038, pedigree (2,3,1,5,1)
  Average of literature data
  production volume; = apv_electricity * municipal_waste
    (same comment as for bilge oil)
  properties: carbon content, fossil 0.171549, carbon content, non-fossil 0.261655, dry mass 0.771 kg, heating value, net 11.74 MJ, water content 0.297017, wet mass 1 kg
  note on carbon content, fossil: MSW composition in tab 4.1, ecoinvent v2.2 report 13_I. C content referred to 1 kg DM
- oil power plant, 500MW: 1.83496e-11 unit; = 1.27974335560263E-11 * relation_global_country; source Jungbluth, N. 2007; lognormal variance with pedigree 0.3506, pedigree (2,5,5,5,1)
  Estimation based on case study
- residue from cooling tower: -0.000201925 kg; name cooling_tower; = 0.000140826964829544 * relation_global_country; source Jungbluth, N. 2007, p. Tab. 12.27, p. 238; lognormal variance with pedigree 0.0438, pedigree (2,3,5,5,1)
  Average of literature data
  production volume; = apv_electricity * cooling_tower
    (same comment as for bilge oil)
  properties: carbon content, fossil 0.0544233, dry mass 0.7 kg, water content 0.428571, wet mass 1 kg
- waste mineral oil: -0.000813615 kg; name waste_oil; = 0.000567434011587811 * relation_global_country; source Jungbluth, N. 2007; lognormal variance with pedigree 0.0438, pedigree (2,3,5,5,1)
  Average of literature data
  production volume; = apv_electricity *waste_oil
    (same comment as for bilge oil)
  properties: carbon content, fossil 0.864444, dry mass 0.9 kg, heating value, net 34.7 MJ, water content 0.111111, wet mass 1 kg
- water, completely softened: 0.15076 kg; name water_softened_input; = 0.105143225836924 * relation_global_country; source Jungbluth, N. 2007, p. Tab. 12.10 p. 228; lognormal variance with pedigree 0.0439, pedigree (2,2,5,5,2)
  Literature value/estimation. Estimation based on several literature sources:
  Frischknecht R., Bollens U., Bosshart S., Ciot M., Ciseri L., Doka G., Dones R., Gantner U., Hischier R. and Martin A. (1996) Ökoinventare von Energiesystemen: Grundlagen für den ökologischen Vergleich von Energiesystemen und den Einbezug von Energiesystemen in Ökobilanzen für die Schweiz. 3. Gruppe Energie - Stoffe - Umwelt (ESU), Eidgenössische Technische Hochschule Zürich und Sektion Ganzheitliche Systemanalysen, Paul Scherrer Institut, Villigen, Bundesamt für Energie (Hrsg.), Bern, CH, retrieved from: www.energieforschung.ch.
  Powergen (2001) Environment Report 2000. Powergen UK, Coventry, UK, retrieved from: www.pgen.com
  ESB (1997) Environmental Review 1997. Electricity Supply Board, Dublin, IE, retrieved from: www.esb.ie
  EDP (2001) Environmental Report 2000. Electricidade de Portugal, S.A., Lisboa, PT, retrieved from: www.edp.pt
  IPPC (2001b) Integrated Pollution Prevention and Control (IPPC): Draft Reference Document on Best Available Techniques for Large Combustion Plants. European Commission Directorate-General JRC, Joint Research Centre, Seville, Spain, retrieved from: http://eippcb.jrc.es.
  properties: wet mass 1 kg
- water, decarbonised: 0.750963 kg; name water_decarbonised_input; = 0.52373934843876 * relation_global_country; source Jungbluth, N. 2007, p. Tab. 12.10 p. 228; lognormal variance with pedigree 0.0439, pedigree (2,2,5,5,2)
  (same comment as for water, completely softened)
  properties: wet mass 1 kg

## Inputs from nature
- Water, cooling, unspecified natural origin [natural resource, in water]: 0.088886 m3; name water_cooling_UNO_input; = ((recirculating_CS_fraction_from_allCS*WWithdrawal_EP_oil_recirculating_CS)+(once_through_andCP_CS_fractio_from_allCS*WWithdrawal_EP_oil_onceT_andCP_CS))/9.737*(1/efficiency_oil_country*3.6); source Jungbluth, N. 2007, p. Tab. 12.10 p. 228; lognormal variance with pedigree 0.3432, pedigree (2,3,5,5,1)
  (same comment as for water, completely softened)

## Emissions to nature
- Acetaldehyde [air, urban air close to ground]: 3.75808e-6 kg; = 2.62096973868199E-06 * relation_global_country; source Jungbluth, N. 2007; lognormal variance with pedigree 0.132, pedigree (1,1,5,5,1)
  Calculation based on VOC emission. Deviation calculated from ranges
- Acetic acid [air, urban air close to ground]: 1.53451e-5 kg; = 1.07020073585515E-05 * relation_global_country; source Jungbluth, N. 2007; lognormal variance with pedigree 0.132, pedigree (1,1,5,5,1)
  Calculation based on VOC emission. Deviation calculated from ranges
- Acetone [air, urban air close to ground]: 3.75808e-6 kg; = 2.62096973868199E-06 * relation_global_country; source Jungbluth, N. 2007; lognormal variance with pedigree 0.132, pedigree (1,1,5,5,1)
  Calculation based on VOC emission. Deviation calculated from ranges
- Ammonia [air, urban air close to ground]: 1.61422e-6 kg; = 1.12579399262229E-06 * relation_global_country; source Jungbluth, N. 2007, p. p.232; lognormal variance with pedigree 1.0433, pedigree (2,2,5,5,2)
  Literature value/estimation. Compilation from different sources
- Arsenic ion [air, urban air close to ground]: 1.03788e-7 kg; = 7.23838706169984E-08 * relation_global_country; source Jungbluth, N. 2007, p. Tab. 12.23, Tab. 12.24; lognormal variance with pedigree 1.1933, pedigree (2,2,5,5,2)
  Literature data, calculation, estimation. See tab 12.23 with element concentrations in dust (Pacyna 1982, Pacyna 1991); and tab. 12.24 with emission factors of heavy metals in fuel oil S (Richardson 1999, Powergen 2001).
  J.M. Pacyna, "Estimation of Emission Factors of Trace Metals from Oil-Fired Power Plants", Norvegian Institute for Air Research (NILU), Lillestrøm 1982
  J. Pacyna, "Trace Element Emissions from Coal-, and Oil- power Plants in Europe. Methodology of Calculations", Norvegian Institute for Air Research (NILU), Lillestrøm 1982
  J.M. Pacyna, "Emission Factors of Atmospheric Cd, Pb and Zn for Major Source Categories in Europe in 1950 through 1985", Norvegian Institute for Air Research (NILU), Lillestrøm 1991
  Richardson S. (1999) Atmospheric Emission Inventory Guidebook. Second Edition. EMEP: Co-operative Programme for Monitoring and Evaluation of the Long Range Transmission of Air Pollutants in Europe, CORINAIR: The Core Inventory of Air Emissions in Europe, EEA: European Environment Agency, Copenhagen, DK.
  Powergen (2001) Environment Report 2000. Powergen UK, Coventry, UK, retrieved from: www.pgen.com.
- Benzene [air, urban air close to ground]: 7.67267e-7 kg; = 5.35109739033632E-07 * relation_global_country; source Jungbluth, N. 2007; lognormal variance with pedigree 0.1233, pedigree (2,2,5,5,2)
  Calculation based on VOC emission. Deviation calculated from ranges
- Benzo(a)pyrene [air, urban air close to ground]: 2.22707e-10 kg; = 1.55321226102755E-10 * relation_global_country; source Jungbluth, N. 2007; lognormal variance with pedigree 0.3726, pedigree (3,3,5,5,3)
  Literature
- Beryllium II [air, urban air close to ground]: 8.28055e-10 kg; = 5.77505028146857E-10 * relation_global_country; source Jungbluth, N. 2007; lognormal variance with pedigree 0.6946, pedigree (3,3,5,5,1)
  Literature
- Cadmium II [air, urban air close to ground]: 4.96921e-8 kg; = 3.46564315860632E-08 * relation_global_country; source Jungbluth, N. 2007, p. Tab. 12.23, Tab. 12.24; lognormal variance with pedigree 1.2433, pedigree (2,2,5,5,2)
  (same comment as for Arsenic ion)
- Calcium II [air, urban air close to ground]: 4.45414e-7 kg; = 3.1064245220551E-07 * relation_global_country; source Jungbluth, N. 2007, p. Tab. 12.25; lognormal variance with pedigree 0.0926, pedigree (3,3,5,5,3)
  Literature data/calculation. See Tab. 12.25 for details.
- Carbon dioxide, fossil [air, unspecified]: 0.00482326 kg; source Jungbluth, N. 2007, p. Tab. 12.29, Tab. 12.30; lognormal variance with pedigree 0.0606, pedigree (2,5,5,5,1)
  Literature value. CO2 emissions from flue gas treatment with limestone use.
- Carbon dioxide, fossil [air, urban air close to ground]: 0.615399 kg; name carbon_dioxide_fossil; source Central Electricity Authority (CEA) 2014, p. Tab. 12.12, p. 229; lognormal variance with pedigree 0.0098, pedigree (2,1,4,1,2)
  Calculated/Literature value. The emission value is calculated as weighted average (based on the production volume) of CO2 emission from the diesel generator power plants of this particular state/union territory. CO2 emission data from the specific diesel generator power plants is collected from the Central Electricity Authority (CEA) CO2 Baseline Database for the Indian Power Sector.
- Carbon monoxide, fossil [air, urban air close to ground]: 0.000183995 kg; = 0.000128322586737377 * relation_global_country; source Jungbluth, N. 2007, p. Tab. 12.13, p. 229; lognormal variance with pedigree 0.1933, pedigree (2,2,5,5,2)
  Literature value/estimation. Compilation from different sources - see Tab. 12.13 for details.
- Chromium III [air, urban air close to ground]: 1.79342e-7 kg; = 1.25077099991164E-07 * relation_global_country; source Jungbluth, N. 2007, p. Tab. 12.23, Tab. 12.24; lognormal variance with pedigree 1.4613, pedigree (2,2,4,5,2)
  (same comment as for Arsenic ion)
- Chromium VI [air, urban air close to ground]: 4.62058e-9 kg; = 3.22250125169589E-09 * relation_global_country; source Jungbluth, N. 2007, p. Tab. 12.23, Tab. 12.24; lognormal variance with pedigree 2.2846, pedigree (3,3,5,5,1)
  (same comment as for Arsenic ion)
- Cobalt II [air, urban air close to ground]: 5.50388e-7 kg; = 3.83853480105306E-07 * relation_global_country; source Jungbluth, N. 2007, p. Tab. 12.23, Tab. 12.24; lognormal variance with pedigree 1.2433, pedigree (2,2,5,5,2)
  (same comment as for Arsenic ion)
- Copper ion [air, urban air close to ground]: 7.10324e-7 kg; = 4.95396522447329E-07 * relation_global_country; source Jungbluth, N. 2007, p. Tab. 12.23, Tab. 12.24; lognormal variance with pedigree 1.3433, pedigree (2,2,5,5,2)
  (same comment as for Arsenic ion)
- Dinitrogen monoxide [air, urban air close to ground]: 5.98542e-5 kg; = 4.17437183887658E-05 * relation_global_country; source Jungbluth, N. 2007, p. Tab. 12.16 p. 232; lognormal variance with pedigree 0.3833, pedigree (2,2,5,5,2)
  Literature value/estimation. Compilation from different sources - see Tab. 12.16 for details.
- Dioxins, measured as 2,3,7,8-tetrachlorodibenzo-p-dioxin [air, urban air close to ground]: 1.51653e-13 kg; = 1.05766153371863E-13 * relation_global_country; source Jungbluth, N. 2007, p. Tab. 12.22 p. 235; lognormal variance with pedigree 0.3452, pedigree (2,4,5,5,2)
  Measurement made in Great Britain (Powergen 2001) and estimation (see Tab. 12.22)
  Powergen (2001) Environment Report 2000. Powergen UK, Coventry, UK, retrieved from: www.pgen.com.
- Ethanol [air, urban air close to ground]: 7.67267e-6 kg; = 5.35109739033632E-06 * relation_global_country; source Jungbluth, N. 2007; lognormal variance with pedigree 0.1233, pedigree (2,2,5,5,2)
  Calculation based on VOC emission. Deviation calculated from ranges
- Formaldehyde [air, urban air close to ground]: 1.15091e-5 kg; = 8.02669478279528E-06 * relation_global_country; source Jungbluth, N. 2007, p. Tab. 12.19, Tab. 12.20; lognormal variance with pedigree 0.1233, pedigree (2,2,5,5,2)
  Literature/calculation/estimation. Calculation based on VOC emissions in Tab. 12.19 (compilation of different sources) and Veldt 1991.
  C. Veldt, "Default Emission Factors (VOC Profiles), Draft Report, Corinair Inventory Part 7, Commission of the European Community, September 1991
- Hydrocarbons, aliphatic, alkanes, unspecified [air, urban air close to ground]: 1.53451e-5 kg; = 1.07020073585515E-05 * relation_global_country; source Jungbluth, N. 2007; lognormal variance with pedigree 0.1233, pedigree (2,2,5,5,2)
  Calculation based on VOC emission. Deviation calculated from ranges
- Hydrocarbons, aliphatic, unsaturated [air, urban air close to ground]: 7.67267e-7 kg; = 5.35109739033632E-07 * relation_global_country; source Jungbluth, N. 2007; lognormal variance with pedigree 0.1233, pedigree (2,2,5,5,2)
  Calculation based on VOC emission. Deviation calculated from ranges
- Hydrocarbons, aromatic [air, urban air close to ground]: 1.53451e-7 kg; = 1.07020073585515E-07 * relation_global_country; source Jungbluth, N. 2007; lognormal variance with pedigree 0.1233, pedigree (2,2,5,5,2)
  Calculation based on VOC emission. Deviation calculated from ranges
- Hydrochloric acid [air, urban air close to ground]: 6.69606e-7 kg; = 4.6699915314895E-07 * relation_global_country; source Jungbluth, N. 2007, p. Tab. 12.25; lognormal variance with pedigree 0.0912, pedigree (2,3,5,5,3)
  Literature data/calculation. See Tab. 12.25 for details.
- Hydrogen fluoride [air, urban air close to ground]: 4.46899e-7 kg; = 3.11677927046195E-07 * relation_global_country; source Jungbluth, N. 2007, p. Tab. 12.25; lognormal variance with pedigree 0.0912, pedigree (2,3,5,5,3)
  Literature data/calculation. See Tab. 12.25 for details.
- Iron ion [air, urban air close to ground]: 1.0393e-6 kg; = 7.24832388479523E-07 * relation_global_country; source Jungbluth, N. 2007; lognormal variance with pedigree 0.7126, pedigree (3,3,5,5,3)
  Literature
- Lead II [air, urban air close to ground]: 5.17142e-7 kg; = 3.60667186373267E-07 * relation_global_country; source Jungbluth, N. 2007; lognormal variance with pedigree 1.2433, pedigree (2,2,5,5,2)
  Calculation based on particle emission. Deviation calculated from ranges
- Manganese II [air, urban air close to ground]: 1.72979e-7 kg; = 1.20639782314836E-07 * relation_global_country; source Jungbluth, N. 2007, p. Tab. 12.23, Tab. 12.24; lognormal variance with pedigree 1.2433, pedigree (2,2,5,5,2)
  (same comment as for Arsenic ion)
- Mercury II [air, urban air close to ground]: 2.22707e-9 kg; = 1.55321226102755E-09 * relation_global_country; source Jungbluth, N. 2007; lognormal variance with pedigree 1.6633, pedigree (2,2,5,5,2)
  Calculation from ranges
- Methane, fossil [air, urban air close to ground]: 7.67267e-5 kg; = 5.35109739033632E-05 * relation_global_country; source Jungbluth, N. 2007, p. Tab. 12.19, Tab. 12.20; lognormal variance with pedigree 0.1233, pedigree (2,2,5,5,2)
  (same comment as for Formaldehyde)
- Methanol [air, urban air close to ground]: 7.67267e-6 kg; = 5.35109739033632E-06 * relation_global_country; source Jungbluth, N. 2007; lognormal variance with pedigree 0.1233, pedigree (2,2,5,5,2)
  Calculation based on VOC emission. Deviation calculated from ranges
- Molybdenum VI [air, urban air close to ground]: 1.19513e-7 kg; = 8.33512865956363E-08 * relation_global_country; source Jungbluth, N. 2007; lognormal variance with pedigree 1.2433, pedigree (2,2,5,5,2)
  Calculation based on particle emission. Deviation calculated from ranges
- Nickel II [air, urban air close to ground]: 4.24513e-6 kg; = 2.96065189134384E-06 * relation_global_country; source Jungbluth, N. 2007; lognormal variance with pedigree 1.2433, pedigree (2,2,5,5,2)
  Calculation based on particle emission. Deviation calculated from ranges
- Nitrogen oxides [air, urban air close to ground]: 0.00388639 kg; = 0.00271045614138409 * relation_global_country; source Jungbluth, N. 2007, p. Tab. 12.15 p. 231; lognormal variance with pedigree 0.0827, pedigree (2,2,5,5,1)
  Literature value/estimation. Compilation from different sources - see Tab. 12.15 for details.
- PAH, polycyclic aromatic hydrocarbons [air, urban air close to ground]: 2.63285e-8 kg; = 1.83620897840367E-08 * relation_global_country; source Jungbluth, N. 2007, p. Tab. 12.21, p. 235; lognormal variance with pedigree 0.3626, pedigree (2,4,5,5,3)
  Literature value/estimation. Compilation of different emissions from Masclet et al. 1987- see Tab. 12.21 for details.
  P. Masclet, M.A. Bresson, G. Mouvier, "Polycyclic Aromatic Hydrocarbons Emitted by Power Stations, and the Influence of Combustion Conditions", in Fuel Vol. 66, Nr. 4, S. 556-562
- Particulate Matter, < 2.5 um [air, urban air close to ground]: 0.000130948 kg; = 9.13261684426324E-05 * relation_global_country; source Jungbluth, N. 2007, p. Tab. 12.17 / Tab. 12.18; lognormal variance with pedigree 0.3507, pedigree (2,2,5,5,3)
  Literature value/estimation. Compilation from different sources - see Tab. 12.17 fo details. Particle emissions mainly depend on the composition of the fuel, the type of combustion and the combustion conditions.
  Particle size fractions are adopted from Berdowski et al .2002 (see Tab. 12.18).
  Berdowski J., Visschedijk A., Creemers E. and Pulles T. (2002) The Coordinated European Programme on Particulate Matter Emission Inventories, Projections and Guidance (CEPMEIP) Database. TNO-MEP, Apeldoorn, NL, retrieved from: www.air.sk/tno/cepmeip/
- Particulate Matter, > 10 um [air, urban air close to ground]: 9.43003e-5 kg; = 6.57672660175277E-05 * relation_global_country; source Jungbluth, N. 2007, p. Tab. 12.17 / Tab. 12.18; lognormal variance with pedigree 0.0907, pedigree (2,2,5,5,3)
  (same comment as for Particulate Matter, < 2.5 um)
- Particulate Matter, > 2.5 um and < 10um [air, urban air close to ground]: 8.92592e-5 kg; = 6.22514591785016E-05 * relation_global_country; source Jungbluth, N. 2007, p. Tab. 12.17 / Tab. 12.18; lognormal variance with pedigree 0.1707, pedigree (2,2,5,5,3)
  (same comment as for Particulate Matter, < 2.5 um)
- Propane [air, urban air close to ground]: 7.67267e-7 kg; = 5.35109739033632E-07 * relation_global_country; source Jungbluth, N. 2007, p. Tab. 12.19, Tab. 12.20; lognormal variance with pedigree 0.1233, pedigree (2,2,5,5,2)
  (same comment as for Formaldehyde)
- Selenium IV [air, urban air close to ground]: 7.8627e-8 kg; = 5.48363096904992E-08 * relation_global_country; source Jungbluth, N. 2007; lognormal variance with pedigree 1.2433, pedigree (2,2,5,5,2)
  Calculation based on particle emission. Deviation calculated from ranges
- Sodium I [air, urban air close to ground]: 4.45414e-6 kg; = 3.1064245220551E-06 * relation_global_country; source Jungbluth, N. 2007, p. Tab. 12.25; lognormal variance with pedigree 0.1026, pedigree (3,3,5,5,3)
  Literature data/calculation. See Tab. 12.25 for details.
- Sulfur dioxide [air, urban air close to ground]: 0.00641355 kg; = 0.00447296246485209 * relation_global_country; source Jungbluth, N. 2007, p. Tab. 12.14 p. 230; lognormal variance with pedigree 0.0439, pedigree (2,2,5,5,2)
  Literature value/estimation. Compilation from different sources - see Tab. 12.14 for details. Emissions of SO2 are related to the sulfur content of the fuel, the ash, and the desulfurisation methods.
- Vanadium V [air, urban air close to ground]: 1.53629e-5 kg; = 1.07144316567474E-05 * relation_global_country; source Jungbluth, N. 2007; lognormal variance with pedigree 1.4233, pedigree (2,2,5,5,2)
  Calculation based on particle emission. Deviation calculated from ranges
- Water [air, unspecified]: 0.00144944 m3; name water_to_air_unspecified; = (water_softened_input/1000)*fraction_WCS_to_air+(water_decarbonised_input/1000)*fraction_WDC_to_air+water_cooling_UNO_input*fraction_CW_to_air; lognormal variance with pedigree 0.130025, pedigree (4,4,5,2,4)
  Calculated value based on literature values and expert opinion. See comments in the parametres" comment field.
  property fraction, origin: fresh water 0.0259209; name fraction_origin_fresh_water
  property fraction, origin: salt water 0; name fraction_origin_salt_water
  property fraction, origin: unspecified 0.974079; name fraction_origin_unspecified
- Zinc II [air, urban air close to ground]: 3.77409e-7 kg; = 2.63213980145308E-07 * relation_global_country; source Jungbluth, N. 2007; lognormal variance with pedigree 1.2433, pedigree (2,2,5,5,2)
  Calculation based on particle emission. Deviation calculated from ranges
- AOX, Adsorbable Organic Halides [water, surface water]: 9.33292e-8 kg; = 6.50899387734297E-08 * relation_global_country; source Jungbluth, N. 2007, p. Tab. 12.26, p. 238; lognormal variance with pedigree 0.0439, pedigree (2,2,5,5,2)
  Literature data/estimations. See Tab. 12.26 for details: concentration of pollutants in the wastewater of oil power plants and of flue gas treatment as well as in the condensate and feed water preparation. Mean of values for Europe, range of concentrations.
  Slovenské elektrárne (2002) Environment Report 2001, Bratislave, SK, retrieved from: www.seas.sk.
  EDP (2001) Environmental Report 2000. Electricidade de Portugal, S.A., Lisboa, PT, retrieved from: www.edp.pt.
  IPPC (2001b) Integrated Pollution Prevention and Control (IPPC): Draft Reference Document on Best Available Techniques for Large Combustion Plants. European Commission Directorate- General JRC, Joint Research Centre, Seville, Spain, retrieved from: http://eippcb.jrc.es.
- Arsenic ion [water, surface water]: 1.75163e-9 kg; = 1.22162689595615E-09 * relation_global_country; source Jungbluth, N. 2007, p. Tab. 12.26, p. 238; lognormal variance with pedigree 0.0439, pedigree (2,2,5,5,2)
  (same comment as for AOX, Adsorbable Organic Halides)
- BOD5, Biological Oxygen Demand [water, surface water]: 2.57608e-5 kg; = 1.79661764796503E-05 * relation_global_country; source Jungbluth, N. 2007, p. Tab. 12.26, p. 238; lognormal variance with pedigree 0.3233, pedigree (2,2,5,5,2)
  (same comment as for AOX, Adsorbable Organic Halides)
- COD, Chemical Oxygen Demand [water, surface water]: 2.81759e-5 kg; = 1.96505045960835E-05 * relation_global_country; source Jungbluth, N. 2007, p. Tab. 12.26, p. 238; lognormal variance with pedigree 0.5133, pedigree (2,2,5,5,2)
  (same comment as for AOX, Adsorbable Organic Halides)
- Cadmium II [water, surface water]: 4.26248e-9 kg; = 2.97275399353465E-09 * relation_global_country; source Jungbluth, N. 2007, p. Tab. 12.26, p. 238; lognormal variance with pedigree 0.4533, pedigree (2,2,5,5,2)
  (same comment as for AOX, Adsorbable Organic Halides)
- Chloride [water, surface water]: 0.000358392 kg; = 0.000249950716155834 * relation_global_country; source Jungbluth, N. 2007, p. Tab. 12.26, p. 238; lognormal variance with pedigree 0.9233, pedigree (2,2,5,5,2)
  (same comment as for AOX, Adsorbable Organic Halides)
- Chromium III [water, surface water]: 4.46865e-8 kg; = 3.11653979581671E-08 * relation_global_country; source Jungbluth, N. 2007, p. Tab. 12.26, p. 238; lognormal variance with pedigree 0.6633, pedigree (2,2,5,5,2)
  (same comment as for AOX, Adsorbable Organic Halides)
- Cobalt II [water, surface water]: 3.5034e-9 kg; = 2.44335526523885E-09 * relation_global_country; source Jungbluth, N. 2007, p. Tab. 12.26, p. 238; lognormal variance with pedigree 0.0439, pedigree (2,2,5,5,2)
  (same comment as for AOX, Adsorbable Organic Halides)
- Copper ion [water, surface water]: 3.70391e-8 kg; = 2.58319599150767E-08 * relation_global_country; source Jungbluth, N. 2007, p. Tab. 12.26, p. 238; lognormal variance with pedigree 0.7533, pedigree (2,2,5,5,2)
  (same comment as for AOX, Adsorbable Organic Halides)
- DOC, Dissolved Organic Carbon [water, surface water]: 1.45436e-6 kg; = 1.01430469569203E-06 * relation_global_country; source Jungbluth, N. 2007; lognormal variance with pedigree 0.0439, pedigree (2,2,5,5,2)
  Calculated as equal to TOC.
- Fluoride [water, surface water]: 2.97794e-6 kg; = 2.07688744963416E-06 * relation_global_country; source Jungbluth, N. 2007, p. Tab. 12.26, p. 238; lognormal variance with pedigree 0.7933, pedigree (2,2,5,5,2)
  (same comment as for AOX, Adsorbable Organic Halides)
- Hydrocarbons, unspecified [water, surface water]: 5.44112e-7 kg; = 3.79476313314415E-07 * relation_global_country; source Jungbluth, N. 2007, p. Tab. 12.26, p. 238; lognormal variance with pedigree 0.0733, pedigree (2,2,5,5,2)
  (same comment as for AOX, Adsorbable Organic Halides)
- Hypochlorite [water, ocean]: 5.13187e-6 kg; = 3.57908785086596E-06 * relation_global_country; source Jungbluth, N. 2007; lognormal variance with pedigree 0.094, pedigree (3,4,5,5,3)
  Literature
- Hypochlorite [water, surface water]: 5.26113e-6 kg; = 3.66923603392927E-06 * relation_global_country; source Jungbluth, N. 2007; lognormal variance with pedigree 0.104, pedigree (3,4,5,5,3)
  Literature
- Iron ion [water, surface water]: 1.84208e-6 kg; = 1.28470679989333E-06 * relation_global_country; source Jungbluth, N. 2007, p. Tab. 12.26, p. 238; lognormal variance with pedigree 0.2733, pedigree (2,2,5,5,2)
  (same comment as for AOX, Adsorbable Organic Halides)
- Lead II [water, surface water]: 7.31625e-8 kg; = 5.10252130314862E-08 * relation_global_country; source Jungbluth, N. 2007, p. Tab. 12.26, p. 238; lognormal variance with pedigree 0.5333, pedigree (2,2,5,5,2)
  (same comment as for AOX, Adsorbable Organic Halides)
- Manganese II [water, surface water]: 5.25503e-8 kg; = 3.66498257602651E-08 * relation_global_country; source Jungbluth, N. 2007, p. Tab. 12.26, p. 238; lognormal variance with pedigree 0.0439, pedigree (2,2,5,5,2)
  (same comment as for AOX, Adsorbable Organic Halides)
- Mercury II [water, surface water]: 1.83933e-9 kg; = 1.28278935719047E-09 * relation_global_country; source Jungbluth, N. 2007, p. Tab. 12.26, p. 238; lognormal variance with pedigree 0.5933, pedigree (2,2,5,5,2)
  (same comment as for AOX, Adsorbable Organic Halides)
- Nickel II [water, surface water]: 2.60308e-7 kg; = 1.81544893999945E-07 * relation_global_country; source Jungbluth, N. 2007, p. Tab. 12.26, p. 238; lognormal variance with pedigree 0.3733, pedigree (2,2,5,5,2)
  (same comment as for AOX, Adsorbable Organic Halides)
- Nitrogen [water, surface water]: 0.000119757 kg; = 8.3521456053517E-05 * relation_global_country; source Jungbluth, N. 2007, p. Tab. 12.26, p. 238; lognormal variance with pedigree 0.0633, pedigree (2,2,5,5,2)
  (same comment as for AOX, Adsorbable Organic Halides)
- Oils, unspecified [water, surface water]: 8.30991e-7 kg; = 5.79552688181026E-07 * relation_global_country; source Jungbluth, N. 2007, p. Tab. 12.26, p. 238; lognormal variance with pedigree 0.0633, pedigree (2,2,5,5,2)
  (same comment as for AOX, Adsorbable Organic Halides)
- Phosphorus [water, surface water]: 2.71514e-7 kg; = 1.8936030125843E-07 * relation_global_country; source Jungbluth, N. 2007, p. Tab. 12.26, p. 238; lognormal variance with pedigree 0.0439, pedigree (2,2,5,5,2)
  (same comment as for AOX, Adsorbable Organic Halides)
- Sulfate [water, surface water]: 0.0029297 kg; = 0.0020432380627013 * relation_global_country; source Jungbluth, N. 2007, p. Tab. 12.26, p. 238; lognormal variance with pedigree 0.0533, pedigree (2,2,5,5,2)
  (same comment as for AOX, Adsorbable Organic Halides)
- Sulfide [water, surface water]: 7.88262e-7 kg; = 5.49752460070304E-07 * relation_global_country; source Jungbluth, N. 2007, p. Tab. 12.26, p. 238; lognormal variance with pedigree 0.3033, pedigree (2,2,5,5,2)
  (same comment as for AOX, Adsorbable Organic Halides)
- Sulfite [water, surface water]: 2.64504e-5 kg; = 1.84471359144431E-05 * relation_global_country; source Jungbluth, N. 2007, p. Tab. 12.26, p. 238; lognormal variance with pedigree 0.0633, pedigree (2,2,5,5,2)
  (same comment as for AOX, Adsorbable Organic Halides)
- Suspended solids, unspecified [water, surface water]: 3.23151e-5 kg; = 2.25373034350681E-05 * relation_global_country; source Jungbluth, N. 2007, p. Tab. 12.26, p. 238; lognormal variance with pedigree 0.0833, pedigree (2,2,5,5,2)
  (same comment as for AOX, Adsorbable Organic Halides)
- TOC, Total Organic Carbon [water, surface water]: 1.50642e-5 kg; = 1.05061549900062E-05 * relation_global_country; source Jungbluth, N. 2007, p. Tab. 12.26, p. 238; lognormal variance with pedigree 0.0439, pedigree (2,2,5,5,2)
  (same comment as for AOX, Adsorbable Organic Halides)
- Thallium I [water, surface water]: 5.43028e-8 kg; = 3.78720561033709E-08 * relation_global_country; source Jungbluth, N. 2007, p. Tab. 12.26, p. 238; lognormal variance with pedigree 0.0439, pedigree (2,2,5,5,2)
  (same comment as for AOX, Adsorbable Organic Halides)
- Tin ion [water, surface water]: 1.75163e-9 kg; = 1.22162689595615E-09 * relation_global_country; source Jungbluth, N. 2007, p. Tab. 12.26, p. 238; lognormal variance with pedigree 0.0439, pedigree (2,2,5,5,2)
  (same comment as for AOX, Adsorbable Organic Halides)
- Vanadium V [water, surface water]: 5.33619e-7 kg; = 3.72158241611466E-07 * relation_global_country; source Jungbluth, N. 2007, p. Tab. 12.26, p. 238; lognormal variance with pedigree 0.7033, pedigree (2,2,5,5,2)
  (same comment as for AOX, Adsorbable Organic Halides)
- Water [water, unspecified]: 0.0883383 m3; name water_to_water_unspecified; = (water_softened_input/1000)*(1-fraction_WCS_to_air)+(water_decarbonised_input/1000)*(1-fraction_WDC_to_air)+water_cooling_UNO_input*(1-fraction_CW_to_air); lognormal variance with pedigree 0.130025, pedigree (4,4,5,2,4)
  (same comment as for Water)
  property fraction, origin: fresh water 0.0106825; name fraction_origin_fresh_water_Ww
  property fraction, origin: salt water 0; name fraction_origin_salt_water_Ww
  property fraction, origin: unspecified 0.989318; name fraction_origin_unspecified_Ww
- Zinc II [water, surface water]: 9.2623e-8 kg; = 6.4597469671174E-08 * relation_global_country; source Jungbluth, N. 2007, p. Tab. 12.26, p. 238; lognormal variance with pedigree 0.2933, pedigree (2,2,5,5,2)
  (same comment as for AOX, Adsorbable Organic Halides)

## Sampling procedure
The inventory is generated using statistical data, literature data, and modelling.

## Extrapolations
The exchanges - except CO2 emission and heavy fuel oil consumption - in this datasets are a weighted average of the following country oil datasets in the ecoinvent database (weighting with electricity production): AT, BE, BR, GR, CN, CS, CZ, DE, DK, ES, FI, FR, GB, GR, HR, HU, IE, IT, JP, MK, NL, NO, PT, PL, SE, SI, SK. For details see comment for parameter "average efficiency of oil power plants, global". Child exchanges are put into relation to the parent exchanges by means of average efficiency of oil power plants in the country and global average efficiency of oil power plants.

## Review by Karin Treyer 2017-01-06
This dataset has been produced in a project on regionalisation of the Indian electricity mix on a states level.
In general, only key parameters have been adjusted to region-specific conditions, such as the electrical efficiency or power plants own use of electricity (losses from gross to net electricity). Whenever more accurate data will be available on e.g. region-specific emissions from power plants, these should be included in this dataset.
