# electricity production, natural gas, conventional power plant

Dataset: EcoSpold 2, unit process
Geography: AR
Time period: 2012-01-01 to 2023-12-31
Technology level: current
Classification: EcoSpold01Categories: natural gas/power plants
Classification: ISIC rev.4 ecoinvent: 3510:Electric power generation, transmission and distribution
Tags: natural gas power; fossil fuels
Scenario: Business-as-Usual
System model: Allocation, cut-off by classification
Generated by: Alejandro P Arena
Published in: Suppen, N. 2017
Database: ecoinvent
isCopyrightProtected: true
accessRestrictedTo: 1

## General comment
This dataset represents the production of high voltage electricity in a conventional natural gas power plant without CHP (combined heat and power) on Argentina in 2014.
In this category all conventional generation units (steam and gas turbines) consuming natural gas are considered. Gas Turbines and Steam Turbine belonging to combined cycle power plants and cogeneration plants are excluded from this dataset.
During 2014, most of the Steam Power (SP) plants consumed a mix of Natural Gas and Fuel Oil. The percentage of fuel oil is very high, ranging from 5 up to 95 %, with a median value close to 70%. Only one power plant (San Nicolás) consumed Coal, Natural Gas and Fuel Oil.
Gas Turbine power plants (GT) usually consume Natural Gas and Gas Oil. From 43 gas turbines considered in this study, 81 % consumed a mix of Natural Gas and Gas Oil during 2014, and the rest only natural gas. The percentage of Gas Oil consumed ranges from 0,4 % to 64 %, with a median value of 4 %.
An averaged efficiency have been calculated considering the specific consumtion of the gas-consuming generation units and their total amount of electricity produced.
Supporting documentation available at: <http://portalweb.cammesa.com/Memnet1/default.aspx>. Additional information can be obtained from CAMMESA under request
For electricity production with natural gas, four different datasets relying to different power plant types exist:
- conventional power plant with / without CHP
- combined cycle power plant with / without CHP
The total amount of electricity produced with natural gas has therefore been allocated to these four types and is modelled in four different datasets (see parameter gross electricity production for information). The resulting shares worldwide amount to 36% (conventional w/o CHP), 23% (conventional with CHP), 36% (combined cycle w/o CHP), 6% (combined cycle with CHP).
At the moment, these different types are mainly modelled based on different electrical and thermal efficiency values.
The efficiency calculations are based on
(fuel input vs. electricity produced) CAMMESA statistics and own calculation assumptions. Supporting documentation available at: <http://portalweb.cammesa.com/Memnet1/default.aspx>. Additional information can be obtained from CAMMESA under request
Reducing factors such as contaminations of important plant parts, cooling conditions or part load have been taken into account. Even if efficiencies vary with different surrounding temperatures, temperature adjustments would be related to high uncertainties.
Water is used for wet cooling and as feed water in the steam circuit. In this dataset, 100% wet cooling and no once-through cooling is assumed.
EMISSIONS:
Different sources served as basis for assumption of average emissions. Where possible, the most recent sources were taken into account, whereas older sources were taken in order to determine the remaining data gaps. The emissions have been calculated for the former UCTE region* and have been taken over as such for all countries (uncertainty adjusted accordingly). See ecoinvent report 'Erdgas' given as main source for details (Tab. 11.15). In the following a short overview:
- Emissions of NOx, CO, CO2, SO2, particles, N2O and CH4 are mainly taken from CORINAIR 2001, EPA, and a variety of other data sources
- NOx emissions are a major challenge in natural gas power plants. With rising temperature, emissions also rise; band widths of NOx emissions in literature are correspondingly large. There are several methods to diminish these emissions.
- CO is a result of incomplete burning. For economic and technical reasons, plant combustion is optimized and CO emissions are low.
- CO2 and SO2 emissions are dependent on the composition of the used fuel. Due to the low sulfur content of the used natural gas, no desulfurization has to take place.
- Organic compound emissions are estimated on the basis of EPA 1998.
- Particles are assumed to be smaller than 2.5 micro-m
*former UCTE: Union for the Coordination of the Transmission of Electricity, since 2009 replaced by ENTSO-E European Network of Transmission System Operators for Electricity.
Sources:
- CORINAIR 2001. EMEP/CORINAIR 2001: Joint EMEP/CORINAIR Atmospheric Emission Inventory Guidebook, Third Edition. Copenhagen: European Environment Agency, 2001. http://reports.eea.eu.int/technical_report_2001_3/en.
- EPA 1998. US Environmental Protection Agency (1998). Compilation of Air Pollutant Emission Factors, AP-42, Fifth Edition, Volume I: Chapter 1: External Combustion Sources, Natural Gas Combustion - Final Section - Supplement D , July 1998. CHIEF (Clearinghouse for Inventories and Emission Factors). Research Triangle Park, North Carolina. http://www.epa.gov/ttn/chief/ap42/.
- Rentz O., Karl U., Peter H. (2002). Ermittlung und Evaluierung von Emissionsfaktoren für Feuerungsanlagen in Deutschland für die Jahre 1995, 2000 und 2010. Deutsch- Französisches Institut für Umweltforschung, Uni Karsruhe. Endbericht. Im Auftrag des Umweltbundesamtes. Forschungsbericht 299 43 142. Umweltbundesamt. Berlin.
[This dataset is meant to replace the following datasets:]

## Included activities start
From the constructed natural gas power plant ready to produce electricity.

From reception of natural gas and operating materials at power plant/factory gate.

## Included activities end
This activity ends with 1kWh of high voltage electricity produced at the power plant and arrived at the busbar.

- all operation and maintenance activities and materials of the power plants.
- Cooling: In this dataset, 100% once-through cooling system is assumed.
- Water is used for cooling and as feed water in the steam circuit for losses compensation.

This dataset doesn't include
- raw materials extraction, decommissioning and waste treatment as these activities are already included in the infrastructure datasets.
- transformation of the electricity produced.

Decarbonised water for Nox reduction has not been included in this dataset. Decarbonised water is also used in recirculating cooling systems, but in this dataset, 100% once-through cooling system is assumed.

## Technology
Average inforrmation from all conventional natural gas power plants in Argentina. The plant is used for middle load with 5000 hours of operation at full capacity per year. The plant is assumed to operate 180000 hours during its lifetime.

## Time period
The Annual Production Volume is valid for the year 2012.

## Parameters
- efficiency: 0.3502 dimensionless; lognormal variance with pedigree 0.017225, pedigree (4,3,1,2,3)
  Literature value/calculated value/estimation. Net electrical efficiency based on the lower heating value (LHV) (34.7 MJ/m3).
  This figure represents the weithed average of all single power plants which consumed natural gas during 2014 in Argentina, including steam turbines, gas turbines and Diesel engines. Combined power plants and CHP are excluded from this dataset. The calculation of the weighted average efficiency for each technology and fuel type
  was performed considering the specific consumption of every generation unit reported by CAMMESA (available from http://portalweb.cammesa.com/memnet1/revistas/estacional/datos_termicos.html. For some generation units in which the specific consumption is not available, their efficiency was calculated based on the amount of electricity production and of fuel consumption during 2014.
- factor: input of MJ for the production of 1 kWh: 10.2798 MJ/kWh; name factor_MJ_kWh; = 1*3.6/efficiency; lognormal variance with pedigree 0.0532, pedigree (4,4,3,4,4)
  Calculated value from the average efficiency for the country
- fraction, cooling water, to air: 0.00510204 dimensionless; name fraction_CW_to_air; = (WConsumption_EP_NG_onceT_andCP_CS*once_through_andCP_CS_fractio_from_allCS)/(WWithdrawal_EP_NG_onceT_andCP_CS*once_through_andCP_CS_fractio_from_allCS); lognormal variance with pedigree 0.092025, pedigree (4,4,3,2,4)
  Calculated
  nan
- fraction, process water, to air: 0.15 dimensionless; name fraction_PW_to_air; lognormal variance with pedigree 0.092025, pedigree (4,4,3,2,4)
  Literature value. In case when no industry/process specific data are available, default evaporation fraction value is used. This value is 15% and is based on literature (Statistics Canada, 2007 & Shaffer, K.H., 2008, Consumptive water use in the Great Lakes Basin, USGS & Shiklomanov, 2003, World Water Resources at the Beginning of the 21st Century) and has been approved by an expert.
  nan
- fraction, water, completely softened, to air: 0.15 dimensionless; name fraction_WCS_to_air; = fraction_PW_to_air; lognormal variance with pedigree 0.092025, pedigree (4,4,3,2,4)
  Calculated value. See comment in the other parametres present in this dataset. Water, completely softened is considered to be always used as process water, thus process water fractions to air are applied to all water, completely softened input flows to calculate the amount of water consumed in the processes.
  nan
- gross electricity production: 1.60334e10 kWh; name gross_electricity; lognormal variance with pedigree 0.0033, pedigree (3,2,1,1,2)
  Literature value/statistics. Literature value/calculated value/estimation. The gross electricity production was calculated from the net electricity production considering the losses due to auxiliary consumption within the power plant (see the comment for the parameter losses from gross electricity production).. Net electrical efficiency based on the lower heating value (LHV) (34.7 MJ/m3).
  CAMMESA "COMPAÑÍA ADMINISTRADORA DEL MERCADO MAYORISTA ELÉCTRICO SOCIEDAD ANÓNIMA" provides statistics about net energy exchanges through the electric wholesale market. Supporting documentation available at: <http://portalweb.cammesa.com/Memnet1/default.aspx>This figure represents the production of all single power plants which consume natural gas en Argentina, including steam turbines, gas turbines and Diesel engines. Combined power plants and CHP are excluded from this figure..
- losses from gross electricity production: 0.07 dimensionless; name losses_gross_net; lognormal variance with pedigree 0.017225, pedigree (4,3,1,2,3)
  Literature value. Own use of electricity plants in this country in 2012. The default loss as described by the IEA in the electricity statistic is applied, which is 0.07 (IEA electricity information 2014: The difference between gross and net electricity production is generally observed to be about 7% for conventional thermal stations, 1% for hydro stations and 6% for nuclear.)
  IEA. 2014. Electricity Information 2014. ISBN 978-92-64-21692-1. International Energy Agency (IEA), Paris Cedex (FR).
  nan
  Uncertainty: generic IEA value used
- once-through and cooling pond cooling systems as a fraction of all cooling syste: 1 dimensionless; name once_through_andCP_CS_fractio_from_allCS; lognormal variance with pedigree 0.092025, pedigree (4,4,3,2,4)
  In this dataset all the considered power plants are cooled using once- trhough colling systemss
- water consumption, electricity production from NG, once-T and coolingP CS: 0.0005 m3/kWh; name WConsumption_EP_NG_onceT_andCP_CS; lognormal variance with pedigree 0.092025, pedigree (4,4,3,2,4)
  Estimated based on literature (Scown, 2011, Water Footprint of U.S. Transportation Fuels, SI).
  nan
- water withdrawal, electricity production from NG, once-T and coolingP CS: 0.098 m3/kWh; name WWithdrawal_EP_NG_onceT_andCP_CS; lognormal variance with pedigree 0.092025, pedigree (4,4,3,2,4)
  (same comment as for water consumption, electricity production from NG, once-T and coolingP)

## Reference product
- electricity, high voltage: 1 kWh; name electricity; By-product classification allocatable product; CPC 17100: Electrical energy; HS2017 271600: Electrical energy
  production volume 1.42381e10 kWh; name electricity_apv; = gross_electricity* (1-losses_gross_net)
    Statistics/Calculated value. The net electricity production by these power plants burning Natural Gas during 2014 was 14.91 TWh. CAMMESA "COMPAÑÍA ADMINISTRADORA DEL MERCADO MAYORISTA ELÉCTRICO SOCIEDAD ANÓNIMA" provides statistics about net energy exchanges through the electric wholesale market. Supporting documentation available at: <http://portalweb.cammesa.com/Memnet1/default.aspx>
    See comment in the Gross electricity production parameter for more information
  property price 0.0977 EUR2005
    Temporary price data. Calculated as 90% of purchasers price based on: 94% of the average price (to account for a 6% loss in transformation and transmission) for electricity for industrial consumersin 2005 (excluded taxes). From IEA.
  properties: carbon allocation 0 kg, carbon content 0

## Inputs from technosphere
- gas power plant, 100MW electrical: 5.71559e-10 unit; name gas_power_plant; = factor_MJ_kWh*0.0000000000556; source COMPAÑÍA ADMINISTRADORA DEL MERCADO MAYO 2014; lognormal variance with pedigree 0.1707, pedigree (3,3,5,3,3)
  Literature value/calculated value, adapted from the GLO 2008 dataset using the mathematical relation taken from the original dataset and adapted for Argentina with the factor_MJ_kWh.
  The factor_MJ_kWh has been calculated with information retrieved from CAMMESA for the 2014 year:
  CAMMESA "COMPAÑÍA ADMINISTRADORA DEL MERCADO MAYORISTA ELÉCTRICO SOCIEDAD ANÓNIMA" . Supporting documentation available at: <http://portalweb.cammesa.com/Memnet1/default.aspx> Additional information can be obtained from CAMMESA under request
- natural gas, high pressure: 0.295398 m3; name natural_gas; = factor_MJ_kWh/ natural_gas_Net_Heat_Value; source COMPAÑÍA ADMINISTRADORA DEL MERCADO MAYO 2014; lognormal variance with pedigree 0.002, pedigree (1,1,3,1,1)
  Statistics/Calculated value.
  This value has been calculated from national statistics provided by CAMMESA, considering the specific consumption of all single generation units which consume natural gas. This figure was scaled to the Ecoinvent standard heating value or 39 MJ/m3. The actual heating value is 34.7 MJ/m3.
  CAMMESA "COMPAÑÍA ADMINISTRADORA DEL MERCADO MAYORISTA ELÉCTRICO SOCIEDAD ANÓNIMA"
  Supporting documentation available at: <http://portalweb.cammesa.com/Memnet1/default.aspx>
  property heating value, gross 40 MJ; name natural_gas_Gross_Heat_Value
  property heating value, net 34.8 MJ; name natural_gas_Net_Heat_Value
  properties: carbon content, fossil 0.602381, dry mass 0.84 kg, wet mass 0.84 kg
  note on carbon content, fossil: An average C content of 0.506 kg C/ m3 has been assumed (this average has been calculated using data in Tab 3.5, ecoinvent v2.2 report 6_V
  note on heating value, net: Net (lower) heating (calorific) value specific for Argentina.
- water, completely softened: 0.061679 kg; name water_completely_softened; = factor_MJ_kWh*0.006; source COMPAÑÍA ADMINISTRADORA DEL MERCADO MAYO 2014; lognormal variance with pedigree 0.2586, pedigree (4,3,5,1,1)
  Literature value/calculated value, taken from the GLO 2008 dataset and adapted for Argentina with the factor_MJ_kWh in the original mathematical relation.
  The factor_MJ_kWh has been calculated with information retrieved from CAMMESA for the 2014 year:
  CAMMESA "COMPAÑÍA ADMINISTRADORA DEL MERCADO MAYORISTA ELÉCTRICO SOCIEDAD ANÓNIMA" . Supporting documentation available at: <http://portalweb.cammesa.com/Memnet1/default.aspx> Additional information can be obtained from CAMMESA under request
  properties: wet mass 1 kg

## Inputs from nature
- Water, cooling, unspecified natural origin [natural resource, in water]: 0.0959452 m3; name water_cooling_UNO_input; = ((once_through_andCP_CS_fractio_from_allCS*WWithdrawal_EP_NG_onceT_andCP_CS))/10.5*factor_MJ_kWh; source COMPAÑÍA ADMINISTRADORA DEL MERCADO MAYO 2014; lognormal variance with pedigree 0.130025, pedigree (4,4,5,2,4)
  Calculated value.
  Water is used for cooling and as feed water in the steam circuit for compensating losses. This value have been adapted from the GLO 2008 dataset using the factor_MJ_kWh.
  The factor_MJ_kWh has been calculated with information retrieved from CAMMESA for the 2014 year:
  Decarbonised water is used in recirculating cooling systems, but in this dataset, 100% once-through cooling is assumed.
  Decarbonised water is also used in WetDeNOx devices, but according to the information provided by the National Electricity Regulatory Board (Spanish acronym ENRE), which monitors the compliance of the electric generators with current environmental legislation, many of the combined cycle power plant have DryLowNOx devices installed. Therefore decarbonised water has not been included in this dataset.
  Source: CAMMESA "COMPAÑÍA ADMINISTRADORA DEL MERCADO MAYORISTA ELÉCTRICO SOCIEDAD ANÓNIMA" . Supporting documentation available at: <http://portalweb.cammesa.com/Memnet1/default.aspx> Additional information can be obtained from CAMMESA under request
  ENRE, Ente Nacional Regulador de la Electricidad, http://www.enre.gov.ar/web/web.nsf/home?openframeset. Information available under request

## Emissions to nature
All rows: source COMPAÑÍA ADMINISTRADORA DEL MERCADO MAYO 2014
- Acenaphthene [air, non-urban air or from high stacks]: 8.15191e-12 kg; name acenaphthene; = factor_MJ_kWh*0.000000000000793; lognormal variance with pedigree 0.6807, pedigree (3,3,5,3,3)
  (same comment as for gas power plant, 100MW electrical)
- Acetaldehyde [air, non-urban air or from high stacks]: 8.22387e-9 kg; name acetaldehyde; = factor_MJ_kWh*0.0000000008; lognormal variance with pedigree 1.1067, pedigree (4,3,5,3,3)
  (same comment as for gas power plant, 100MW electrical)
- Acetic acid [air, non-urban air or from high stacks]: 1.24386e-6 kg; name acetic_acid; = factor_MJ_kWh*0.000000121; lognormal variance with pedigree 1.1007, pedigree (3,3,5,3,3)
  (same comment as for gas power plant, 100MW electrical)
- Arsenic ion [air, non-urban air or from high stacks]: 4.22501e-10 kg; name arsenic; = factor_MJ_kWh*0.0000000000411; lognormal variance with pedigree 0.066, pedigree (3,5,5,5,3)
  (same comment as for gas power plant, 100MW electrical)
- Benzene [air, non-urban air or from high stacks]: 9.27242e-9 kg; name benzene; = factor_MJ_kWh*0.000000000902; lognormal variance with pedigree 0.6807, pedigree (3,3,5,3,3)
  (same comment as for gas power plant, 100MW electrical)
- Benzo(a)pyrene [air, non-urban air or from high stacks]: 5.43804e-12 kg; name benzo_a_pyrene; = factor_MJ_kWh*0.000000000000529; lognormal variance with pedigree 0.6807, pedigree (3,3,5,3,3)
  (same comment as for gas power plant, 100MW electrical)
- Beryllium II [air, non-urban air or from high stacks]: 2.53912e-11 kg; name beryllium; = factor_MJ_kWh*0.00000000000247; lognormal variance with pedigree 0.066, pedigree (3,5,5,5,3)
  (same comment as for gas power plant, 100MW electrical)
- Butane [air, non-urban air or from high stacks]: 9.51913e-6 kg; name butane; = factor_MJ_kWh*0.000000926; lognormal variance with pedigree 0.6807, pedigree (3,3,5,3,3)
  (same comment as for gas power plant, 100MW electrical)
- Cadmium II [air, non-urban air or from high stacks]: 2.32324e-9 kg; name cadmium; = factor_MJ_kWh*0.000000000226; lognormal variance with pedigree 0.066, pedigree (3,5,5,5,3)
  (same comment as for gas power plant, 100MW electrical)
- Carbon dioxide, fossil [air, non-urban air or from high stacks]: 0.548943 kg; name carbon_dioxide_fossil; = factor_MJ_kWh*0.0534; lognormal variance with pedigree 0.0513, pedigree (3,3,5,3,3)
  (same comment as for gas power plant, 100MW electrical)
- Carbon monoxide, fossil [air, non-urban air or from high stacks]: 0.000205597 kg; name carbon_monoxide_fossil; = factor_MJ_kWh*0.00002; lognormal variance with pedigree 0.3407, pedigree (3,3,5,3,3)
  (same comment as for gas power plant, 100MW electrical)
- Chromium III [air, non-urban air or from high stacks]: 2.95031e-9 kg; name chromium; = factor_MJ_kWh*0.000000000287; lognormal variance with pedigree 0.066, pedigree (3,5,5,5,3)
  (same comment as for gas power plant, 100MW electrical)
- Cobalt II [air, non-urban air or from high stacks]: 1.76813e-10 kg; name cobalt; = factor_MJ_kWh*0.0000000000172; lognormal variance with pedigree 0.066, pedigree (3,5,5,5,3)
  (same comment as for gas power plant, 100MW electrical)
- Dinitrogen monoxide [air, non-urban air or from high stacks]: 1.00434e-5 kg; name dinitrogen_monoxide; = factor_MJ_kWh*0.000000977; lognormal variance with pedigree 0.3407, pedigree (3,3,5,3,3)
  (same comment as for gas power plant, 100MW electrical)
- Dioxins, measured as 2,3,7,8-tetrachlorodibenzo-p-dioxin [air, non-urban air or from high stacks]: 2.98115e-16 kg; name dioxins; = factor_MJ_kWh*2.9E-17; lognormal variance with pedigree 1.1067, pedigree (4,3,5,3,3)
  (same comment as for gas power plant, 100MW electrical)
- Ethane [air, non-urban air or from high stacks]: 1.40834e-5 kg; name ethane; = factor_MJ_kWh*0.00000137; lognormal variance with pedigree 0.6807, pedigree (3,3,5,3,3)
  (same comment as for gas power plant, 100MW electrical)
- Formaldehyde [air, non-urban air or from high stacks]: 3.32039e-7 kg; name formaldehyde; = factor_MJ_kWh*0.0000000323; lognormal variance with pedigree 0.6807, pedigree (3,3,5,3,3)
  (same comment as for gas power plant, 100MW electrical)
- Hexane [air, non-urban air or from high stacks]: 8.15191e-6 kg; name hexane; = factor_MJ_kWh*0.000000793; lognormal variance with pedigree 0.6807, pedigree (3,3,5,3,3)
  (same comment as for gas power plant, 100MW electrical)
- Lead II [air, non-urban air or from high stacks]: 1.05882e-9 kg; name lead; = factor_MJ_kWh*0.000000000103; lognormal variance with pedigree 0.066, pedigree (3,5,5,5,3)
  (same comment as for gas power plant, 100MW electrical)
- Manganese II [air, non-urban air or from high stacks]: 8.02856e-10 kg; name manganese; = factor_MJ_kWh*0.0000000000781; lognormal variance with pedigree 0.066, pedigree (3,5,5,5,3)
  (same comment as for gas power plant, 100MW electrical)
- Mercury II [air, non-urban air or from high stacks]: 7.07253e-10 kg; name mercury; = factor_MJ_kWh*0.0000000000688; lognormal variance with pedigree 0.6807, pedigree (3,3,5,3,3)
  (same comment as for gas power plant, 100MW electrical)
- Methane, fossil [air, non-urban air or from high stacks]: 9.98172e-6 kg; name methane_fossil; = factor_MJ_kWh*0.000000971; lognormal variance with pedigree 0.6807, pedigree (3,3,5,3,3)
  (same comment as for gas power plant, 100MW electrical)
- Nickel II [air, non-urban air or from high stacks]: 4.43061e-9 kg; name nickel; = factor_MJ_kWh*0.000000000431; lognormal variance with pedigree 0.066, pedigree (3,5,5,5,3)
  (same comment as for gas power plant, 100MW electrical)
- Nitrogen oxides [air, non-urban air or from high stacks]: 0.00037727 kg; name nitrogen_oxides; = factor_MJ_kWh*0.0000367; lognormal variance with pedigree 0.3407, pedigree (3,3,5,3,3)
  (same comment as for gas power plant, 100MW electrical)
- PAH, polycyclic aromatic hydrocarbons [air, non-urban air or from high stacks]: 8.22387e-8 kg; name pah; = factor_MJ_kWh*0.000000008; lognormal variance with pedigree 1.1067, pedigree (4,3,5,3,3)
  (same comment as for gas power plant, 100MW electrical)
- Particulate Matter, < 2.5 um [air, non-urban air or from high stacks]: 5.0474e-6 kg; name particulates_lt2_5; = factor_MJ_kWh*0.000000491; lognormal variance with pedigree 0.3407, pedigree (3,3,5,3,3)
  (same comment as for gas power plant, 100MW electrical)
- Pentane [air, non-urban air or from high stacks]: 1.18218e-5 kg; name pentane; = factor_MJ_kWh*0.00000115; lognormal variance with pedigree 0.6807, pedigree (3,3,5,3,3)
  (same comment as for gas power plant, 100MW electrical)
- Propane [air, non-urban air or from high stacks]: 7.24729e-6 kg; name propane; = factor_MJ_kWh*0.000000705; lognormal variance with pedigree 0.6807, pedigree (3,3,5,3,3)
  (same comment as for gas power plant, 100MW electrical)
- Propionic acid [air, non-urban air or from high stacks]: 1.64477e-7 kg; name propionic_acid; = factor_MJ_kWh*0.000000016; lognormal variance with pedigree 1.1067, pedigree (4,3,5,3,3)
  (same comment as for gas power plant, 100MW electrical)
- Selenium IV [air, non-urban air or from high stacks]: 5.0474e-11 kg; name selenium; = factor_MJ_kWh*0.00000000000491; lognormal variance with pedigree 0.6807, pedigree (3,3,5,3,3)
  (same comment as for gas power plant, 100MW electrical)
- Sulfur dioxide [air, non-urban air or from high stacks]: 5.88007e-6 kg; name sulfur_dioxide; = factor_MJ_kWh*0.000000572; lognormal variance with pedigree 0.0517, pedigree (3,3,5,3,3)
  (same comment as for gas power plant, 100MW electrical)
- Toluene [air, non-urban air or from high stacks]: 1.54198e-8 kg; name toluene; = factor_MJ_kWh*0.0000000015; lognormal variance with pedigree 0.6807, pedigree (3,3,5,3,3)
  (same comment as for gas power plant, 100MW electrical)
- Water [air, unspecified]: 0.000498768 m3; name water_to_air_unspecified; = (water_completely_softened/1000)*fraction_WCS_to_air+water_cooling_UNO_input*fraction_CW_to_air; lognormal variance with pedigree 0.130025, pedigree (4,4,5,2,4)
  This value was taken from the GLO 2008 dataset, which was calculated based on literature cited.
  property fraction, origin: fresh water 0.0416136; name fraction_origin_fresh_water
  property fraction, origin: salt water 0; name fraction_origin_salt_water
  property fraction, origin: unspecified 0.958386; name fraction_origin_unspecified
- Water [water, unspecified]: 0.0955081 m3; name water_to_water_unspecified; = (water_completely_softened/1000)*(1-fraction_WCS_to_air)+water_cooling_UNO_input*(1-fraction_CW_to_air); lognormal variance with pedigree 0.130025, pedigree (4,4,5,2,4)
  (same comment as for Water)
  property fraction, origin: fresh water 0.0335624; name fraction_origin_fresh_water_Ww
  property fraction, origin: salt water 0; name fraction_origin_salt_water_Ww
  property fraction, origin: unspecified 0.966438; name fraction_origin_unspecified_Ww

## Sampling procedure
Literature and statistics.
This dataset represents all single power plants which consumed Natural Gas during 2014 in Argentina. The net electricity production by these power plants was 14.91 TWh.

Combined power plants and CHP are excluded from this dataset.

During 2014, most of the Steam Power (SP) plants consumed a mix of Natural Gas and Fuel Oil. The percentage of fuel oil ranged from 5 up to 95 %, with a median value close to 70%. Only one power plant (San Nicolás) consumed Coal, Natural Gas and Fuel Oil.

Gas Turbine power plants (GT) usually consume Natural Gas and Gas Oil. From 43 gas turbines dispatching electricity during the reference year, 81 % consumed both Natural Gas and Gas Oil, and the rest only natural gas. The percentage of Gas Oil consumed ranges from 0,4 % to 64 %, with a median value of 4 %.
The efficiency calculations are based on CAMMESA "COMPAÑÍA ADMINISTRADORA DEL MERCADO MAYORISTA ELÉCTRICO SOCIEDAD ANÓNIMA" Supporting information available from: http://portalweb.cammesa.com/memnet1/revistas/estacional/datos_termicos.html.

## Extrapolations
Exchanges have been extrapolated from the GLO 2008 dataset using the factor_MJ_kWh parameter.

The efficiency is based on CAMMESA statistics and calculated with own assumptions.

Water is used for cooling and as feed water in the steam circuit for compensating losses. Decarbonised water is used in recirculating cooling systems, but in this dataset, 100% once-through cooling is assumed.
Decarbonised water is also used in WetDeNOx devices, but according to the information provided by the National Electricity Regulatory Board (Spanish acronym ENRE), which monitors the compliance of the electric generators with current environmental legislation, many of the generation units have DryLowNOx devices installed. Therefore decarbonised water has not been included in this dataset.
Source: CAMMESA "COMPAÑÍA ADMINISTRADORA DEL MERCADO MAYORISTA ELÉCTRICO SOCIEDAD ANÓNIMA" Supporting documentation available at: <http://portalweb.cammesa.com/Memnet1/default.aspx>

ENRE. http://www.enre.gov.ar/web/web.nsf/home?openframeset. INformation available under request
