# treatment of bottom ash, MSWI, used LCD module, slag compartment

Dataset: EcoSpold 2, unit process
Geography: GLO
Time period: 1994-01-01 to 2023-12-31
Technology level: current
Classification: ISIC rev.4 ecoinvent: 3821:Treatment and disposal of non-hazardous waste
Scenario: Business-as-Usual
System model: Allocation, cut-off by classification
Generated by: Nikolia Stoikou
Database: ecoinvent
isCopyrightProtected: true
accessRestrictedTo: 1

## General comment
The process represents the treatment of controlled landfilling in slag compartment of a waste (bottom ash) that is exclusively generated in another waste treatment. Bottom ash is the by-product that is generated during the municipal solid waste incineration (MSWI) of 'used liquid crystal display module'. Recommended use of this dataset: to be used within the specific chain of treatments for 'used liquid crystal display module'. Share of biogenic carbon in the sludge: 0%.

## Included activities start
The activity starts with the waste being available at the gate of the treatment facility. Collection and transportation of the waste to the treatment plant is not included.

## Included activities end
The activity ends with the waste being treated and waste-specific emissions from the slag compartment landfill are released to water (short-term emissions to surface water and long-term emissions to ground water).

## Geography
Modelling parameters affecting the treatment technology are not specific to this geography.

## Technology
Slag compartment for bottom ash from incineration with base seal and leachate collection system (Landfill type D). Recultivation after closure.

## Reference product
- bottom ash, MSWI, used LCD module: -1 kg; By-product classification Waste; CPC 39320: Ash and residue (except from the manufacture of iron or steel), containing metals or metallic compounds, excep[…]; HS2017 262110: Slag and ash; ash and residues from the incineration of municipal waste
  main reference product of this activity (supply of disposal service).
  production volume 2.52669e8 kg
    calculated in proportion to incinerated waste reference product
  property price 0 EUR2005
    Waste products are assigned a price of zero as they are assumed to require further treatment.
  properties: aluminium content 0.000708835, antimony content 3.12586e-6, arsenic content 4.794e-8, barium content 4.91088e-6, beryllium content 8.61094e-9, boron content 8.83078e-9, bromine content 2.22527e-5, cadmium content 8.65063e-7, calcium content 0.0752633, carbon allocation 0.000257433 kg, carbon content 0.000311324, carbon content, fossil 0.000311324, carbon content, non-fossil 0, chlorine content 0.000214974, chromium content 0.000349773, cobalt content 4.8808e-7, copper content 0.0210248, dry mass 0.826896 kg, fluorine content 5.86169e-6, iron content 0.00282885, lead content 0.00258054, magnesium content 2.19133e-6, manganese content 5.34101e-5, mercury content 3.79965e-9, molybdenum content 5.21995e-7, nickel content 0.00219055, nitrogen content 1.54875e-5, oxygen content 0.466285, phosphorus content 4.84799e-5, potassium content 0.000487378, selenium content 1.31889e-9, silicon content 0.360612, silver content 2.36925e-5, sodium content 0.0647342, strontium content 1.75833e-6, sulfur content 6.8858e-5, thallium content 2.76908e-9, tin content 0.00114691, titanium content 7.49062e-5, vanadium content 6.81732e-9, water content 0.209342, water in wet mass 0.173104 kg, wet mass 1 kg, zinc content 0.000934315

## Inputs from technosphere
- process-specific burdens, slag landfill: 0.00841689, 0.280494, 0.71109 kg (3 suppliers, which the file names only by identifier); sum of these 1 kg
  mass-specific expenditures required for landfilling of bottom ash.
- slag landfill: 1.7778e-9 unit
  slag compartment infrastructure required for landfilling of bottom ash.

## Inputs from nature
- Organic carbon, placed in landfill [inventory indicator, waste]: 0.00012872 kg; lognormal variance with pedigree 0.20563, pedigree (1,1,5,1,1)
  Mass of organic carbon in waste (without inorganic carbon), initially put in slag compartment. The exchange represents a flow that is within the technosphere. This exchange should only be used to apply ecofactors for the Swiss LCIA method of Ecological Scarcity and not any other purpose.
  Uncertainty: Uncertainty calculated from uncertainty of composition of incinerated waste, and incinerator model uncertainty and slag compartment transfer coefficient uncertainty.
- Waste mass, total, placed in landfill [inventory indicator, waste]: 1 kg
  Mass of waste initially put in a slag compartment. The exchange represents a flow that is within the technosphere. This exchange should only be used to apply ecofactors for the Swiss LCIA method of Ecological Scarcity and not any other purpose.

## Emissions to nature
- Non-hazardous waste disposed [inventory indicator, waste]: 1 kg
  Inventory indicator for waste mass disposed. To be used in EN15804 "other data" results.
- Aluminium III [water, ground-, long-term]: 0.00047879 kg; lognormal variance with pedigree 0.71002, pedigree (1,1,5,1,1)
  complement of long-term emissions from incinerator bottom ash in slag compartment
  Uncertainty: Uncertainty calculated from uncertainty of composition of incinerated waste, and incinerator model uncertainty and slag compartment transfer coefficient uncertainty.
- Aluminium III [water, surface water]: 7.7012e-9 kg; lognormal variance with pedigree 1.9237, pedigree (1,1,5,1,1)
  short-term emissions from incinerator bottom ash in slag compartment
  Uncertainty: Uncertainty calculated from uncertainty of composition of incinerated waste, and incinerator model uncertainty and slag compartment transfer coefficient uncertainty.
- Antimony ion [water, ground-, long-term]: 3.7403e-7 kg; lognormal variance with pedigree 1.9155, pedigree (1,1,5,1,1)
  (same comment as for Aluminium III)
- Antimony ion [water, surface water]: 1.743e-9 kg; lognormal variance with pedigree 1.6855, pedigree (1,1,5,1,1)
  (same comment as for Aluminium III)
- Arsenic ion [water, ground-, long-term]: 3.9582e-8 kg; lognormal variance with pedigree 1.8594, pedigree (1,1,5,1,1)
  (same comment as for Aluminium III)
- Arsenic ion [water, surface water]: 5.963e-11 kg; lognormal variance with pedigree 2.4596, pedigree (1,1,5,1,1)
  (same comment as for Aluminium III)
- BOD5, Biological Oxygen Demand [water, ground-, long-term]: 0.00010602 kg; lognormal variance with pedigree 0.20564, pedigree (1,1,5,1,1)
  (same comment as for Aluminium III)
- BOD5, Biological Oxygen Demand [water, surface water]: 3.8267e-7 kg; lognormal variance with pedigree 0.69511, pedigree (1,1,5,1,1)
  (same comment as for Aluminium III)
- Barium II [water, ground-, long-term]: 4.0602e-6 kg; lognormal variance with pedigree 1.3257, pedigree (1,1,5,1,1)
  (same comment as for Aluminium III)
- Barium II [water, surface water]: 6.2243e-10 kg; lognormal variance with pedigree 2.2247, pedigree (1,1,5,1,1)
  (same comment as for Aluminium III)
- Beryllium II [water, ground-, long-term]: 7.1159e-9 kg; lognormal variance with pedigree 1.9503, pedigree (1,1,5,1,1)
  (same comment as for Aluminium III)
- Beryllium II [water, surface water]: 4.4838e-12 kg; lognormal variance with pedigree 2.6634, pedigree (1,1,5,1,1)
  (same comment as for Aluminium III)
- Boron [water, ground-, long-term]: 6.0758e-9 kg; lognormal variance with pedigree 1.9586, pedigree (1,1,5,1,1)
  (same comment as for Aluminium III)
- Boron [water, surface water]: 5.7213e-11 kg; lognormal variance with pedigree 2.344, pedigree (1,1,5,1,1)
  (same comment as for Aluminium III)
- Bromine [water, ground-, long-term]: 1.6561e-12 kg; lognormal variance with pedigree 1.02597, pedigree (1,1,5,1,1)
  (same comment as for Aluminium III)
- Bromine [water, surface water]: 1.8401e-5 kg; lognormal variance with pedigree 0.99767, pedigree (1,1,5,1,1)
  (same comment as for Aluminium III)
- COD, Chemical Oxygen Demand [water, ground-, long-term]: 0.00032412 kg; lognormal variance with pedigree 0.20564, pedigree (1,1,5,1,1)
  (same comment as for Aluminium III)
- COD, Chemical Oxygen Demand [water, surface water]: 1.1699e-6 kg; lognormal variance with pedigree 0.69511, pedigree (1,1,5,1,1)
  (same comment as for Aluminium III)
- Cadmium II [water, ground-, long-term]: 7.1495e-7 kg; lognormal variance with pedigree 1.2922, pedigree (1,1,5,1,1)
  (same comment as for Aluminium III)
- Cadmium II [water, surface water]: 3.6803e-10 kg; lognormal variance with pedigree 2.0317, pedigree (1,1,5,1,1)
  (same comment as for Aluminium III)
- Calcium II [water, ground-, long-term]: 0.061963 kg; lognormal variance with pedigree 0.195, pedigree (1,1,5,1,1)
  (same comment as for Aluminium III)
- Calcium II [water, surface water]: 0.00027155 kg; lognormal variance with pedigree 0.66039, pedigree (1,1,5,1,1)
  (same comment as for Aluminium III)
- Chloride [water, ground-, long-term]: 2.4213e-5 kg; lognormal variance with pedigree 0.65337, pedigree (1,1,5,1,1)
  (same comment as for Aluminium III)
- Chloride [water, surface water]: 0.00015355 kg; lognormal variance with pedigree 0.63462, pedigree (1,1,5,1,1)
  (same comment as for Aluminium III)
- Chromium VI [water, ground-, long-term]: 1.8926e-6 kg; lognormal variance with pedigree 4.1549, pedigree (1,1,5,1,1)
  (same comment as for Aluminium III)
- Chromium VI [water, surface water]: 8.2707e-9 kg; lognormal variance with pedigree 1.9583, pedigree (1,1,5,1,1)
  (same comment as for Aluminium III)
- Cobalt II [water, ground-, long-term]: 4.0354e-7 kg; lognormal variance with pedigree 1.6841, pedigree (1,1,5,1,1)
  (same comment as for Aluminium III)
- Cobalt II [water, surface water]: 5.6149e-11 kg; lognormal variance with pedigree 2.596, pedigree (1,1,5,1,1)
  (same comment as for Aluminium III)
- Copper ion [water, ground-, long-term]: 0.017385 kg; lognormal variance with pedigree 0.28191, pedigree (1,1,5,1,1)
  (same comment as for Aluminium III)
- Copper ion [water, surface water]: 6.036e-7 kg; lognormal variance with pedigree 1.3775, pedigree (1,1,5,1,1)
  (same comment as for Aluminium III)
- DOC, Dissolved Organic Carbon [water, ground-, long-term]: 0.00012825 kg; lognormal variance with pedigree 0.20564, pedigree (1,1,5,1,1)
  (same comment as for Aluminium III)
- DOC, Dissolved Organic Carbon [water, surface water]: 4.6294e-7 kg; lognormal variance with pedigree 0.69511, pedigree (1,1,5,1,1)
  (same comment as for Aluminium III)
- Fluoride [water, ground-, long-term]: 4.5816e-6 kg; lognormal variance with pedigree 1.2781, pedigree (1,1,5,1,1)
  (same comment as for Aluminium III)
- Fluoride [water, surface water]: 2.4178e-8 kg; lognormal variance with pedigree 1.7261, pedigree (1,1,5,1,1)
  (same comment as for Aluminium III)
- Iron ion [water, ground-, long-term]: 0.0012168 kg; lognormal variance with pedigree 0.5717, pedigree (1,1,5,1,1)
  (same comment as for Aluminium III)
- Iron ion [water, surface water]: 1.9572e-8 kg; lognormal variance with pedigree 1.7482, pedigree (1,1,5,1,1)
  (same comment as for Aluminium III)
- Lead II [water, ground-, long-term]: 0.0021338 kg; lognormal variance with pedigree 0.4982, pedigree (1,1,5,1,1)
  (same comment as for Aluminium III)
- Lead II [water, surface water]: 3.895e-8 kg; lognormal variance with pedigree 1.6788, pedigree (1,1,5,1,1)
  (same comment as for Aluminium III)
- Magnesium [water, ground-, long-term]: 1.8051e-6 kg; lognormal variance with pedigree 1.505, pedigree (1,1,5,1,1)
  (same comment as for Aluminium III)
- Magnesium [water, surface water]: 6.8842e-9 kg; lognormal variance with pedigree 1.9876, pedigree (1,1,5,1,1)
  (same comment as for Aluminium III)
- Manganese II [water, ground-, long-term]: 4.4162e-5 kg; lognormal variance with pedigree 1.03617, pedigree (1,1,5,1,1)
  (same comment as for Aluminium III)
- Manganese II [water, surface water]: 2.2604e-9 kg; lognormal variance with pedigree 2.0804, pedigree (1,1,5,1,1)
  (same comment as for Aluminium III)
- Mercury II [water, ground-, long-term]: 3.0596e-9 kg; lognormal variance with pedigree 1.8391, pedigree (1,1,5,1,1)
  (same comment as for Aluminium III)
- Mercury II [water, surface water]: 8.231e-11 kg; lognormal variance with pedigree 2.0932, pedigree (1,1,5,1,1)
  (same comment as for Aluminium III)
- Molybdenum VI [water, ground-, long-term]: 4.1152e-7 kg; lognormal variance with pedigree 1.6729, pedigree (1,1,5,1,1)
  (same comment as for Aluminium III)
- Molybdenum VI [water, surface water]: 2.0111e-8 kg; lognormal variance with pedigree 1.8658, pedigree (1,1,5,1,1)
  (same comment as for Aluminium III)
- Nickel II [water, ground-, long-term]: 0.0018102 kg; lognormal variance with pedigree 0.60264, pedigree (1,1,5,1,1)
  (same comment as for Aluminium III)
- Nickel II [water, surface water]: 1.1406e-6 kg; lognormal variance with pedigree 1.3157, pedigree (1,1,5,1,1)
  (same comment as for Aluminium III)
- Nitrate [water, ground-, long-term]: 4.6005e-5 kg; lognormal variance with pedigree 0.66636, pedigree (1,1,5,1,1)
  (same comment as for Aluminium III)
- Nitrate [water, surface water]: 1.071e-5 kg; lognormal variance with pedigree 0.73315, pedigree (1,1,5,1,1)
  (same comment as for Aluminium III)
- Phosphate [water, ground-, long-term]: 1.6217e-6 kg; lognormal variance with pedigree 5.7747, pedigree (1,1,5,1,1)
  (same comment as for Aluminium III)
- Phosphate [water, surface water]: 2.7073e-9 kg; lognormal variance with pedigree 2.2486, pedigree (1,1,5,1,1)
  (same comment as for Aluminium III)
- Potassium I [water, ground-, long-term]: 0.00035431 kg; lognormal variance with pedigree 0.69207, pedigree (1,1,5,1,1)
  (same comment as for Aluminium III)
- Potassium I [water, surface water]: 4.8704e-5 kg; lognormal variance with pedigree 0.79499, pedigree (1,1,5,1,1)
  (same comment as for Aluminium III)
- Selenium IV [water, ground-, long-term]: 1.0472e-9 kg; lognormal variance with pedigree 1.956, pedigree (1,1,5,1,1)
  (same comment as for Aluminium III)
- Selenium IV [water, surface water]: 1.7344e-11 kg; lognormal variance with pedigree 2.2659, pedigree (1,1,5,1,1)
  (same comment as for Aluminium III)
- Silicon [water, ground-, long-term]: 0.0025514 kg; lognormal variance with pedigree 5.7355, pedigree (1,1,5,1,1)
  (same comment as for Aluminium III)
- Silicon [water, surface water]: 1.1002e-5 kg; lognormal variance with pedigree 1.156, pedigree (1,1,5,1,1)
  (same comment as for Aluminium III)
- Silver I [water, ground-, long-term]: 1.9591e-5 kg; lognormal variance with pedigree 1.1492, pedigree (1,1,5,1,1)
  (same comment as for Aluminium III)
- Silver I [water, surface water]: 6.8019e-10 kg; lognormal variance with pedigree 2.2448, pedigree (1,1,5,1,1)
  (same comment as for Aluminium III)
- Sodium I [water, ground-, long-term]: 0.046996 kg; lognormal variance with pedigree 0.21154, pedigree (1,1,5,1,1)
  (same comment as for Aluminium III)
- Sodium I [water, surface water]: 0.0065324 kg; lognormal variance with pedigree 0.31361, pedigree (1,1,5,1,1)
  (same comment as for Aluminium III)
- Strontium II [water, ground-, long-term]: 1.453e-6 kg; lognormal variance with pedigree 1.5509, pedigree (1,1,5,1,1)
  (same comment as for Aluminium III)
- Strontium II [water, surface water]: 9.1558e-10 kg; lognormal variance with pedigree 2.2639, pedigree (1,1,5,1,1)
  (same comment as for Aluminium III)
- Sulfate [water, ground-, long-term]: 0.00015524 kg; lognormal variance with pedigree 0.98796, pedigree (1,1,5,1,1)
  (same comment as for Aluminium III)
- Sulfate [water, surface water]: 1.5577e-5 kg; lognormal variance with pedigree 1.1158, pedigree (1,1,5,1,1)
  (same comment as for Aluminium III)
- TOC, Total Organic Carbon [water, ground-, long-term]: 0.00012825 kg; lognormal variance with pedigree 0.20564, pedigree (1,1,5,1,1)
  (same comment as for Aluminium III)
- TOC, Total Organic Carbon [water, surface water]: 4.6294e-7 kg; lognormal variance with pedigree 0.69511, pedigree (1,1,5,1,1)
  (same comment as for Aluminium III)
- Thallium I [water, ground-, long-term]: 2.2883e-9 kg; lognormal variance with pedigree 1.9509, pedigree (1,1,5,1,1)
  (same comment as for Aluminium III)
- Thallium I [water, surface water]: 1.4419e-12 kg; lognormal variance with pedigree 2.6639, pedigree (1,1,5,1,1)
  (same comment as for Aluminium III)
- Tin ion [water, ground-, long-term]: 0.00094308 kg; lognormal variance with pedigree 0.57605, pedigree (1,1,5,1,1)
  (same comment as for Aluminium III)
- Tin ion [water, surface water]: 1.5169e-8 kg; lognormal variance with pedigree 1.774, pedigree (1,1,5,1,1)
  (same comment as for Aluminium III)
- Titanium ion [water, ground-, long-term]: 1.8578e-5 kg; lognormal variance with pedigree 1.3863, pedigree (1,1,5,1,1)
  (same comment as for Aluminium III)
- Titanium ion [water, surface water]: 2.9882e-10 kg; lognormal variance with pedigree 2.3793, pedigree (1,1,5,1,1)
  (same comment as for Aluminium III)
- Vanadium V [water, ground-, long-term]: 5.5096e-10 kg; lognormal variance with pedigree 3.3025, pedigree (1,1,5,1,1)
  (same comment as for Aluminium III)
- Vanadium V [water, surface water]: 2.5009e-12 kg; lognormal variance with pedigree 2.7096, pedigree (1,1,5,1,1)
  (same comment as for Aluminium III)
- Zinc II [water, ground-, long-term]: 0.00077256 kg; lognormal variance with pedigree 0.56483, pedigree (1,1,5,1,1)
  (same comment as for Aluminium III)
- Zinc II [water, surface water]: 2.2998e-8 kg; lognormal variance with pedigree 1.6808, pedigree (1,1,5,1,1)
  (same comment as for Aluminium III)
