# textile production, silk

Dataset: EcoSpold 2, unit process
Geography: RoW
Time period: 2016-04-01 to 2023-03-31
Technology level: current
Classification: ISIC rev.4 ecoinvent: 1312:Weaving of textiles
Classification: EcoSpold01Categories: textiles/processing
Scenario: Business-as-Usual
System model: Allocation, cut-off by classification
Generated by: [System]
Published in: Faist Emmenegger, M. 2018
Database: ecoinvent
isCopyrightProtected: true
accessRestrictedTo: 1

## General comment
Inventory refers to 1kg woven silk fabric. This dataset is a copy of Indian dataset.
This dataset covers all relevant input and output flows of the gate to gate unit process with a good overall data quality. The inventory is based on individual industry data and is an aggregate of weaving unit manufacturing various weights of fabric ranging from fine to heavy quality.
This dataset represents the process of weaving 1 kg of silk textile. The process consists of warping (preparing a sheet of lenghhwise, laid out set of warp yarns. There is no sizing involved. The weft yarn is then interlaced through the warp yarns to form a fabric. The woven cloth is rolled on a cloth beam as it is being woven.

## Included activities start
Activity starts with reception of silk yarn for warping

## Included activities end
This activity ends production of with 1 kg silk textile as the final product of the weaving process. Machinery is excluded.

## Technology
Handllom industry. Since this dataset reflects a handloom process, there are no machinery modelled

## Reference product
- textile, silk: 1 kg; By-product classification allocatable product; CPC 26510: Woven fabrics of silk or of silk waste; HS2017 500720: Silk; woven fabrics, containing 85% or more by weight of silk or of silk waste other than noil silk
  production volume 1.64872e8 kg; = 202072830*.95
    The production volume of yarn was scaled with a factor of 95% to obtain the production volume of textile according to the input output ratio of later process. Source:
    International Sericultural Commission (2015) http://inserco.org/en/statistics
  property carbon content, non-fossil 0.3769
    "Carbon content on a dry mass basis. All carbon is assumed to be biogenic due to the nature of the product. Carbon content of cotton is 0.44 kg of non-fossil carbon per kg of dry mass of cotton. Value is calculated based on the the composition of silk which is 64% cellulose. The data uses composition of silk fibers accessed on 10/11/2017 on: http://textilefashionstudy.com/chemical-composition-of-silk-fiber-silk-natural-fiber/
  property dry mass 0.97 kg; name DM
  property heating value, net 11 MJ
    LHV is calculated based on the Carbon content of the product. More details can be found on the respective documentation.
  property price 41.1475 EUR2005
    Estimated value. Fibre2fashion.com reports a value of 54-55USD per kg of Chinese Silk (source: http://www.fibre2fashion.com/industry-article/6905/good-price-for-green-cocoons-is-it-a-boon-or-curse?page=2, accessed 1Feb2018). Range confirmed in a 2015 article from the telegraph online "Luxury of silk woven in Italy to return after decades-long absence", author: Alice Philipson, Rome (Retrieved from: http://www.telegraph.co.uk/news/worldnews/europe/italy/11481509/Luxury-of-silk-woven-in-Italy-to-return-after-decades-long-absence.html, accessed 1Feb2018).
  property water in wet mass 0.03 kg; name WWM
  property wet mass 1 kg; = DM+ WWM
  properties: carbon allocation 0.365593 kg, carbon content 0.3769, carbon content, fossil 0, water content 0.0309278

## Inputs from technosphere
- building, hall: 0.00410256 m2; lognormal variance with pedigree 0.3046, pedigree (2,1,3,5,1)
  square meters of building divided by production per year and life time of the plant
- electricity, low voltage: 0.0332811, 0.180082, 0.00699857, 0.00272109, 0.189946, 0.0452743, 0.00273039, 0.00933122, 0.0037284, 1.67646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 kWh (47 suppliers, which the file names only by identifier); sum of these 4.761 kWh; lognormal variance with pedigree 0.0066, pedigree (1,4,3,5,1)
  sum of electricity used for warping and weaving operations.
- yarn, silk: 1.05 kg; lognormal variance with pedigree 0.0066, pedigree (1,4,3,5,1)
  the yarn that is wasted during the process is recirculated in the process itself so no wastage is considered here
  properties: carbon content, non-fossil 0.465, dry mass 0.97 kg, heating value, net 13.59 MJ, water content 0.0309278, wet mass 1 kg
  note on carbon content, non-fossil: "Carbon content on a dry mass basis. All carbon is assumed to be biogenic due to the nature of the product. Carbon content of cotton is 0.44 kg of non-fossil carbon per kg of dry mass of cotton. Value is calculated based on the the composition of silk which is 64% cellulose. The data uses composition of silk fibers accessed on 10/11/2017 on: http://textilefashionstudy.com/chemical-composition-of-silk-fiber-silk-natural-fiber/

## Sampling procedure
Extrapolated from IN data, uncertainty adjusted accordingly
