# petrol, low-sulfur, import from Europe

Dataset: EcoSpold 2, unit process
Geography: CH
Time period: 2000-01-01 to 2023-12-31
Technology level: old
Classification: ISIC rev.4 ecoinvent: 1920:Manufacture of refined petroleum products
Scenario: Business-as-Usual
System model: Allocation, cut-off by classification
Generated by: Carl Vadenbo
Published in: Jungbluth, N. 2018
Database: ecoinvent
isCopyrightProtected: true
accessRestrictedTo: 1

## General comment
This dataset represents the import of a refined petroleum product (petrol, low-sulfur) from Europe (without Switzerland) into Switzerland. Due to regulatory requirements, the quality of petrol imported is assumed to generally have a low sulfur content.

## Included activities start
This activity starts with the supply of the finished petroleum product from petroleum refinery operation in Europe without Switzerland.

## Included activities end
This activity covers the transport requirements for import of the finished petroleum product to Switzerland. Only transport of the product to Switzerland is considered here, whereas losses and infrastructure requirements during the import activities are omitted.

## Geography
Switzerland

## Reference product
- petrol, low-sulfur: 1 kg; By-product classification allocatable product; CPC 33311: Motor gasoline; HS2017 2710: Petroleum oils and oils from bituminous minerals, not crude; preparations n.e.c, containing by weight 70% or [...]; CAS 86290-81-5
  production volume 1.248e9 kg
    From Swiss energy statistics for 2022 (BFE 2023. Schweizerische Gesamtenergiestatistik 2022, table 21. Available from: https://www.bfe.admin.ch/bfe/de/home/versorgung/statistik-und-geodaten/energiestatistiken/gesamtenergiestatistik.html/)
  property heating value, net 42.5 MJ
    Based on literature, page 611, Report 17: Jungbluth, N., Chudacoff, M., Dauriat, A., Dinkel, F., Doka, G., Faist Emmenegger, M., Gnansounou, E., Kljun, N., Schleiss, K., Spielmann, M., Stettler, C., Sutter, J. 2007: Life Cycle Inventories of Bioenergy. ecoinvent report No. 17, Swiss Centre for Life Cycle Inventories, Dübendorf, CH.
  property price 0.71 EUR2005
    Average calculated from All Grades, Areas and Formulations in USA for 2005. Source: http://www.eia.gov/oil_gas/petroleum/data_publications/wrgp/mogas_history.html
  properties: carbon allocation 0.865 kg, carbon content 0.865, carbon content, fossil 0.865, carbon content, non-fossil 0, dry mass 1 kg, water content 0, water in wet mass 0 kg, wet mass 1 kg

## Inputs from technosphere
- petrol, low-sulfur: 1 kg
  properties: carbon content, fossil 0.865, dry mass 1 kg, heating value, net 42.5 MJ, wet mass 1 kg
  note on heating value, net: Based on literature, page 611, Report 17: Jungbluth, N., Chudacoff, M., Dauriat, A., Dinkel, F., Doka, G., Faist Emmenegger, M., Gnansounou, E., Kljun, N., Schleiss, K., Spielmann, M., Stettler, C., Sutter, J. 2007: Life Cycle Inventories of Bioenergy. ecoinvent report No. 17, Swiss Centre for Life Cycle Inventories, Dübendorf, CH.
- transport, freight train: 0.281 metric ton*km; source Jungbluth, N. 2007; lognormal variance with pedigree 0.1221, pedigree (3,2,1,1,1)
  Amount based on transport requirements for import of mineral oil products from Europe to Switzerland for the year 2016, in Jungbluth & Meili (2018), table 8.1. Reference: Jungbluth, N. & Meili, C. (2018) Life cycle inventories of oil products - final report. ESU-services Ltd. Available from: https://esu-services.ch/data/public-lci-reports/
- transport, freight, inland waterways, barge tanker: 0.263 metric ton*km; source Jungbluth, N. 2007; lognormal variance with pedigree 0.1221, pedigree (3,2,1,1,1)
  (same comment as for transport, freight train)
- transport, freight, lorry, unspecified: 0.044 metric ton*km; source Jungbluth, N. 2007; lognormal variance with pedigree 0.1221, pedigree (3,2,1,1,1)
  (same comment as for transport, freight train)
- transport, pipeline, onshore, petroleum: 0.069 metric ton*km; source Jungbluth, N. 2007; lognormal variance with pedigree 0.1221, pedigree (3,2,1,1,1)
  (same comment as for transport, freight train)

## Sampling procedure
Transport distances were sourced from Jungbluth & Meili (2018) Life cycle inventories of oil products distribution, table 8.1, which where based on estimated distances and modes of transport from the main countries of origin in 2016. The annual gross import (i.e., production volume of the activity) to Switzerland was taken from Swiss energy statistics for 2022 (BFE 2023. Schweizerische Gesamtenergiestatistik 2022, table 21. Available from: https://www.bfe.admin.ch/bfe/de/home/versorgung/statistik-und-geodaten/energiestatistiken/gesamtenergiestatistik.html/)
