# planing, beam, softwood, u=20%

Dataset: EcoSpold 2, unit process
Geography: Europe without Switzerland
Time period: 2011-01-01 to 2023-12-31
Technology level: current
Classification: ISIC rev.4 ecoinvent: 1610:Sawmilling and planing of wood
Tags: Swiss brush-up completed
Scenario: Business-as-Usual
System model: Allocation, cut-off by classification
Generated by: Frank Werner
Published in: BFS 2013
Database: ecoinvent
isCopyrightProtected: true
accessRestrictedTo: 1

## General comment
This dataset represents the planing of one m3 softwood beam that has been air dried or kiln dried to 20% moisture content. The ratio of kiln dried to air dried raw beam input corresponds to the estimated market mix. The planing mill is assumed to be located on the sawmill site. The emissions during the planing are excluded due to lack of data. The suction of the shavings is modeled in a separate activity.
The data was provided by and approved by the Swiss forest industry (Holzindustrie Schweiz HIS).
Within ecoinvent, three products - boards, beams and laths - are distinguished:

## Included activities start
Planing process starting from air dried respectively kiln dried hardwood beam, at sawmill site.

## Included activities end
This activity ends with planed softwood beam, at plant. The dataset includes the planing process at the sawmill site and input of wood. The dataset does not include dust emissions.

## Geography
Represents average Swiss conditions assumed to be represenative for Europe

## Parameters
- moisture content beam: 20 dimensionless; name moisture_beam
  moisture content of beam
- share of beam: 94 dimensionless; name share_beam
  share of beam production per volume
- share of kiln dried wood: 0.8 dimensionless; name share_kiln_dried
  share of kiln dried sawnwood input (as part of input is air dried)
- share of shaving: 6 dimensionless; name share_shaving
  share of shaving production from volume of sawnwood input
- shrinkage ratio (u=30% - 0%): 0.004 dimensionless; name shrinkage_ratio
  shrinkage of volume in % per change (%) in moisture content, relevant between u=30% to 0%
- wood density, apparent: 485.76 kg/m3; name wood_d_apparent_1; = (1+moisture_beam/100)* basic_wood_d
  kg wet matter/wet volume
- wood density, basic: 404.8 kg/m3; name basic_wood_d; = dry_wood_d*(1-moisture_beam*shrinkage_ratio)
  kg oven-dry matter/wet volume
- wood density, dry: 440 kg/m3; name dry_wood_d
  kg oven-dry matter/oven-dry volume

## Reference product
- shavings, softwood, loose, measured as dry mass: 1 kg; name m_shavings; = (beam_raw_u20_kd+beam_raw_u20_ad)* share_shaving/100* basic_wood_d; source BFS 2013; By-product classification allocatable product; CPC 39283: Non-agglomerated wood waste and scrap; HS2017 440140: Wood; for fuel, sawdust and wood waste and scrap, not agglomerated
  calculated as dry mass
  production volume 1.30153e8 kg; = 1671712.03404255/1250*(98570-1250)
    Scaled from the PV estimates of the Swiss sawmilling chain based UNECE data for 2013 for the production volumes of Switzerland (1'250'000 m3) and the production volume of Europe without Switzerland ( 97'570'000 m3 - 1'250'000 m3).
  property heating value, net 12.61 MJ
    LHV is calculated based on the Carbon content of the product. More details can be found on the respective documentation.
  property price 0.113 EUR2005
    Calculated based on data from FAOSTAT (accessed 20140429). The price is calculated by using data on total world import quantity (m3) and import value (1000 USD), year 2005. 40461924 m3 of Chips and Particles was imported in the world in 2005. The import value was 3022227000 USD. The calculated price is thus (3022227000/40461924=74.7*0.8=) 62.2 Euro/m3. It is estimated, that the chips and particles are half hardwood (of density 650 kg/m3) and half softwood (of density 450 kg/m3), thus the remaining mixture has a density of 550 kg/m3. The recalculated price is (1/550*62.2=) 0.11 Euro/kg. Using the same approach the calculated price for 2010 was 0.123 Euro/kg.
  properties: allocation factor 0.0179213, carbon allocation 0.494 kg, carbon content 0.494, carbon content, fossil 0, carbon content, non-fossil 0.494, dry mass 1 kg, true value 2.91973, water content 0.15, water in wet mass 0.15 kg, wet mass 1.15 kg

## Inputs from technosphere
- electricity, medium voltage: 0.00612373 kWh; name elec_medvol; source BFS 2013; lognormal variance with pedigree 0.0337, pedigree (2,1,4,3,1)
  electricity consumed for the planing; the suction of the shavings in covered in a separate dataset; data from Swiss industry
  properties: UVEK_link_1 1779, UVEK_relative_amount_1 1
  note on UVEK_link_1: to be used only in special submissions in coordination with ecoinvent and the Swiss FOEN
- planing mill: 4.91418e-10 unit; name planemill; source BFS 2013; lognormal variance with pedigree 0.5587, pedigree (2,1,4,3,1)
  data taken from ecoinvent 2.2 dataset
  properties: UVEK_link_1 3514, UVEK_relative_amount_1 1
- sawnwood, beam, softwood, raw, dried (u=20%): 0.000590292 m3; name beam_raw_u20_kd; = 1/(1-share_shaving/100)*share_kiln_dried; source BFS 2013; lognormal variance with pedigree 0.0336, pedigree (1,1,4,4,1)
  input of raw sawn wood to be planed; usually processes within the sawmill that produces the raw sawn wood
  property carbon content, non-fossil 0.494; name beam_raw_airdried_C_content_non_fossil
  property dry mass 404.8 kg; name beam_raw_airdried_DM; = basic_wood_d
  property water content 0.2; name beam_raw_airdried_water_content
  property water in wet mass 80.96 kg; name beam_raw_airdried_WWM; = beam_raw_airdried_DM* beam_raw_airdried_water_content
  property wet mass 485.76 kg; name beam_raw_airdried_WM; = beam_raw_airdried_DM*(1+ beam_raw_airdried_water_content)
  properties: heating value, net 5860.46 MJ
- sawnwood, beam, softwood, raw, dried (u=20%): 0.000147573 m3; name beam_raw_u20_ad; = 1/(1-share_shaving/100)*(1-share_kiln_dried); source BFS 2013; lognormal variance with pedigree 0.0336, pedigree (1,1,4,4,1)
  (same comment as for sawnwood, beam, softwood, raw, dried (u=20%))
  properties: carbon content, non-fossil 0.494, dry mass 404.8 kg, heating value, net 5860.46 MJ, water content 0.2, wet mass 485.76 kg

## Inputs from nature
- Carbon dioxide, non-fossil, resource correction [natural resource, in air]: 1.27031 kg

## Sampling procedure
complementary literature and sampling from sawmills; CH data used to approximate European processes
