# anode production, prebake, for aluminium electrolysis

Dataset: EcoSpold 2, unit process
Geography: CA
Time period: 2015-01-01 to 2023-12-31
Technology level: current
Classification: EcoSpold01Categories: metals/extraction
Classification: ISIC rev.4 ecoinvent: 2790:Manufacture of other electrical equipment
Scenario: Business-as-Usual
System model: Allocation, cut-off by classification
Share of production covered: 81 %
Generated by: François Saunier
Published in: International Aluminium Insitute 2015
Database: ecoinvent
isCopyrightProtected: false
accessRestrictedTo: 1

## General comment
Industry average of prebake anodes for use in the Hall-Héroult process using prebake technology.
[This dataset is meant to replace the following datasets:Unable to replace dataset! Dataset not found by activity index entry id 'ff8d249e-0823-4d1c-9ec6-e515314ab7c0'.]
[This dataset is meant to replace the following datasets:
- anode production, prebake, for aluminium electrolysis, RNA, 2015 - 2015]

## Included activities start
The unit process begins with the unloading of process materials to the storage areas on site. The operations associated with this unit process include:
* anode mix preparation, anode block forming and baking;
* rodding of baked anodes;
* maintenance and repair of plant and equipment; and
* treatment of process air, liquids and solids.
The original data also accounts for recovery of spent anode materials (anode butts). However, these are recycled in closed loop and are not explicitly accounted for in the inventory, although inputs and outputs of other flows are influenced by this recycling.
Treatment of scrubber sludges are excluded, as there is no corresponding waste treatment in the ecoinvent database.

## Included activities end
The output of this process is rodded anodes to be transported to electrolysis plants employing prebake technology.

## Geography
Data mostly from global surveys by IAI.

## Reference product
- anode, prebake, for aluminium electrolysis: 1 kg; name anodePrebakeAmount; By-product classification allocatable product; CPC 42950: Wire, rods, tubes, plates, electrodes and similar products, of base metal or of metal carbides, coated or core[…]; HS2017 854519: Carbon electrodes; with or without metal, of a kind used for other than furnaces
  production volume 1.3159e9 kg; name anodePrebakeProductionVolume; = 3209514000*0,41
    Calculated value based on reported data, scaled up to correspond with Annual Production Volume of aluminium using Prebake technology.
  property price 0.15 EUR2005
    Literature value; U.S. Department of Energy (Inert Anode Roadmap, 1998, http://www1.eere.energy.gov/manufacturing/industries_technologies/aluminum/pdfs/inertroad.pdf).
  properties: carbon allocation 0.875012 kg, carbon content 0.875012, carbon content, fossil 0.875012, carbon content, non-fossil 0, dry mass 1 kg, water content 0, water in wet mass 0 kg, wet mass 1 kg

## Inputs from technosphere
- anode factory: 2.5e-10 unit; source Classen M. 2008; lognormal variance with pedigree 0.5, pedigree (5,5,5,5,5)
  EcoSpold01Location=RER
  Rough estimate
  Uncertainty: rough guess
- cast iron: 0.00582 kg; source International Aluminium Insitute 2015; lognormal variance with pedigree 0.009225, pedigree (1,3,4,2,1)
  EcoSpold01Location=RER
  Reported as Steel in IAI report
  Data for CA was not available. North America data is used as proxy. Uncertainty has been adjusted accordingly.
  properties: carbon content, fossil 0.04, dry mass 1 kg, wet mass 1 kg
  note on carbon content, fossil: Cast iron is made by remelting pig iron in small furnaces (e.g. cupola furnaces or electric arc furnaces) and poured into moulds to make castings. It usually contains 2% to 6% carbon (ecoinvent v2.2 report 10_partII). An average content of 4% was considered
- electricity, medium voltage: 0.22 kWh; source International Aluminium Insitute 2015; lognormal variance with pedigree 0.0092, pedigree (1,3,4,1,1)
  EcoSpold01Location=UCTE
- fly ash and scrubber sludge: -4.7e-5 kg; source International Aluminium Institute 2015; lognormal variance with pedigree 0.2106, pedigree (5,5,5,5,5)
  Used as a weak proxy for treatment of scrubber sludges
  Data for CA was not available. North America data is used as proxy. Uncertainty has been adjusted accordingly.
  production volume; = anodePrebakeProductionVolume * (Ref('8fe6d969-b38a-42a7-a75f-2ba76acb36fc') / anodePrebakeAmount)
    Calculated from production volume of reference product using the relative outputs.
  properties: carbon content, fossil 0.167, dry mass 0.1 kg, water content 9, wet mass 1 kg
  note on carbon content, fossil: Tab A.6, ecoinvent v2.2 report 13_I. C content has been calculated after data in the tables, and then referred to 1 kg DM
- heat, district or industrial, natural gas: 1.515 MJ; = Net_Heat_Value_ng*40.4 * m3fuel_use_ng/ fuel_use_ng; source International Aluminium Insitute 2015; lognormal variance with pedigree 0.008, pedigree (1,1,4,1,1)
  Natural gas combustion.
  Uncertainty: No uncertainty added - uncertainty should be based on propagation of the uncertainty of the underlying parameters.
  property Corresponding fuel use 1.04 MJ; name fuel_use_ng
  property fuel input in physical units, m3 0.039 m3; name m3fuel_use_ng
  property heating value, net 1 MJ; name Net_Heat_Value_ng
  note on Corresponding fuel use: Lower heating value of the fuel input related to the heat/electricity output, based on an efficiency of 96%
  note on heating value, net: net (lower) heating (calorific) value. Based on European average as reported in Dones et al. 2007.
- heat, district or industrial, other than natural gas: 0.0283856 MJ; = Net_Heat_Value_LFO*42.7 *kgFuel_Input_LFO_diesel /fuel_use_LFO; source International Aluminium Insitute 2015; lognormal variance with pedigree 0.008, pedigree (1,1,4,1,1)
  Diesel combustion.
  Uncertainty: No uncertainty added - uncertainty should be based on propagation of the uncertainty of the underlying parameters.
  property Corresponding fuel use 1.053 MJ; name fuel_use_LFO
  property fuel input in physical units, kg 0.0007 kg; name kgFuel_Input_LFO_diesel
  property heating value, net 1 MJ; name Net_Heat_Value_LFO
  note on Corresponding fuel use: Lower heating value of the fuel input related to the heat/electricity output
- heat, district or industrial, other than natural gas: 0.911681 MJ; = Net_Heat_Value_HFO*40.0 * kgFuel_Input_HFO /fuel_use_HFO; source International Aluminium Insitute 2015; lognormal variance with pedigree 0.008, pedigree (1,1,4,1,1)
  Heavy oil combustion.
  property Corresponding fuel use 1.053 MJ; name fuel_use_HFO
  property fuel input in physical units, kg 0.024 kg; name kgFuel_Input_HFO
  property heating value, net 1 MJ; name Net_Heat_Value_HFO
- inert waste, for final disposal: -0.0334 kg; name wasteInertAmount; = wasteI_nonspecifiedWasteToLandfillAmou_0 +wasteI_refractoryWasteToRecyclingAmoun_0 +wasteI_refractoryWasteToLandfillAmount_0 +wasteI_nonspecifiedByproductsToRecycli_0; source International Aluminium Insitute 2015
  Amount includes "Byproducts for external recycling", "Refractory material for external recycling", "Refractory (excluding SPL) sent to landfill" and "Other landfilled waste" in IAI report. If it becomes possible to specify byproducts and other landfilled waste, then these should be broken out of this total. Currently, no recycling process exists in ecoinvent for refractory material, and hence these are modelled as sent to landfill.
  EcoSpold01Location=CH
  production volume; = wasteInertAmount* anodePrebakeProductionVolume
    Calculated from the production volume of anode and output of waste per reference flow.
  property amount of non-specified waste to landfill 0.003 kg; name wasteI_nonspecifiedWasteToLandfillAmou_0
  property amount of non-specified waste to recycling 0.011 kg; name wasteI_nonspecifiedByproductsToRecycli_0
  property amount of refractory material sent to landfill 0.0044 kg; name wasteI_refractoryWasteToLandfillAmount_0
  property amount of refractory material sent to recycling 0.015 kg; name wasteI_refractoryWasteToRecyclingAmoun_0
  properties: dry mass 0.995 kg, water content 0.00502513, wet mass 1 kg
- petroleum coke: 0.658 kg; source International Aluminium Insitute 2015; lognormal variance with pedigree 0.0092, pedigree (1,3,4,1,1)
  EcoSpold01Location=RER
  properties: carbon content, fossil 0.885, dry mass 1 kg, heating value, net 35 MJ, wet mass 1 kg
- pitch: 0.147 kg; source International Aluminium Insitute 2015; lognormal variance with pedigree 0.0092, pedigree (1,3,4,1,1)
  EcoSpold01Location=RER
  Reported as Pitch in IAI report
  properties: carbon content, fossil 0.83, dry mass 1 kg, heating value, net 28 MJ, wet mass 1 kg
- refractory, fireclay, packed: 0.0043 kg; source International Aluminium Insitute 2015; lognormal variance with pedigree 0.009225, pedigree (1,3,4,2,1)
  Reported as "Refractory material" in IAI Survey
  Data for CA was not available. North America data is used as proxy. Uncertainty has been adjusted accordingly.
  properties: dry mass 1 kg, wet mass 1 kg
- scrap steel: -0.006 kg; name wasteSteelAmount; source International Aluminium Insitute 2015; lognormal variance with pedigree 0.0007, pedigree (1,2,1,1,1)
  Reported as scrap steel.
  production volume; = wasteSteelAmount* anodePrebakeProductionVolume
    Calculated from the production volume of anode and output of waste per reference flow.
  properties: dry mass 1 kg, wet mass 1 kg
- waste asphalt: -0.013 kg; name wasteCarbonAmount; source International Aluminium Insitute 2015; lognormal variance with pedigree 0.0007, pedigree (1,2,1,1,1)
  Proxy for treatment of waste carbon
  EcoSpold01Location=CH
  production volume; = wasteCarbonAmount*anodePrebakeProductionVolume
    Calculated from the production volume of anode and output of waste per reference flow.
  properties: carbon content, fossil 0.0440796, dry mass 0.999 kg, water content 0.001001, wet mass 1 kg
  note on carbon content, fossil: The waste contains 94.7% inert material (see Tab A.5 for details) 5.3% bitumen (see Tab A.6 for details), ecoinvent v2.2 report 13_I

## Inputs from nature
- Water, cooling, unspecified natural origin [natural resource, in water]: 0.0003 m3; name water_input; source International Aluminium Insitute 2015; lognormal variance with pedigree 0.0098, pedigree (2,3,4,1,1)
  Specified as freshwater in IAI report.

## Emissions to nature
- Benzo(a)pyrene [air, unspecified]: 5e-8 kg; name BaPAmount; source International Aluminium Insitute 2015; lognormal variance with pedigree 0.310025, pedigree (1,4,4,2,1)
  Data for CA was not available. North America data is used as proxy. Uncertainty has been adjusted accordingly.
- Hydrogen fluoride [air, unspecified]: 3.09e-5 kg; source International Aluminium Insitute 2015; lognormal variance with pedigree 0.048625, pedigree (1,3,4,2,1)
  Reported as F in IAI data, sum of particulate F (NAM data) and gaseous F (CA data)
- Nitrogen oxides [air, unspecified]: 0.000206 kg; source International Aluminium Insitute 2015; lognormal variance with pedigree 0.0481, pedigree (1,2,4,1,1)
- PAH, polycyclic aromatic hydrocarbons [air, unspecified]: 7.7e-6 kg; source International Aluminium Insitute 2015; lognormal variance with pedigree 0.0086, pedigree (1,3,4,1,1)
  Uncertainty: Uncertainty calculated from that of underlying variables.
  property total PAH emission to air 5.1e-5 kg; name totalPAH
- Particulate Matter, < 2.5 um [air, unspecified]: 6e-5 kg; name PM_25; source International Aluminium Insitute 2015; lognormal variance with pedigree 0.0092, pedigree (1,3,4,1,1)
  Reported IAI 2015
- Particulate Matter, > 10 um [air, unspecified]: 7.8e-6 kg; = PM_total-(PM_25+PM_25_10); source International Aluminium Insitute 2015; lognormal variance with pedigree 0.0086, pedigree (1,1,4,1,1)
  Calculated value, based on reported IAI 2015
  property ratio pf particulates greater than 10 microns 0.2; name PM_greater_10um; = (4-3.2)/4
  property total particulates 0.0002278 kg; name PM_total
- Particulate Matter, > 2.5 um and < 10um [air, unspecified]: 0.00016 kg; name PM_25_10; source International Aluminium Insitute 2015; lognormal variance with pedigree 0.0092, pedigree (1,3,4,1,1)
  Reported IAI 2015
  property ratio of particulates between 2.5 and 10 microns 0.44; name PM_btw_2_5_and_10um; = (3.2-1.44)/4
- Sulfur dioxide [air, unspecified]: 0.000405 kg; source International Aluminium Insitute 2015; lognormal variance with pedigree 0.0087, pedigree (1,2,4,1,1)
- Water [air, unspecified]: 2e-5 m3; = water_input-water_to_water; source International Aluminium Insitute 2015; lognormal variance with pedigree 0.0086, pedigree (1,1,4,1,1)
  Calculated value
- Fluoride [water, unspecified]: 9e-6 kg; source International Aluminium Insitute 2015; lognormal variance with pedigree 0.010625, pedigree (1,4,4,2,1)
  (same comment as for Benzo(a)pyrene)
- Oils, unspecified [water, unspecified]: 6.1e-5 kg; source International Aluminium Insitute 2015; lognormal variance with pedigree 0.010625, pedigree (1,4,4,2,1)
  (same comment as for Benzo(a)pyrene)
- PAH, polycyclic aromatic hydrocarbons [water, unspecified]: 1e-8 kg; source International Aluminium Insitute 2015; lognormal variance with pedigree 0.010625, pedigree (1,4,4,2,1)
  Reported as PAH (6 Borneff components)
  Data for CA was not available. North America data is used as proxy. Uncertainty has been adjusted accordingly.
- Suspended solids, unspecified [water, unspecified]: 5e-5 kg; source International Aluminium Insitute 2015; lognormal variance with pedigree 0.010625, pedigree (1,4,4,2,1)
  (same comment as for Benzo(a)pyrene)
- Water [water, surface water]: 0.00028 m3; name water_to_water; lognormal variance with pedigree 0.0098, pedigree (2,3,4,1,1)
  Reported as Fresh Water

## Sampling procedure
2015 data is included where available from annual IAI surveys (electricity, fuel, petrol coke & pitch inputs). Other flows are based on a life cycle inventory survey carried out by IAI for its member and non member companies. The survey was conducted in 2016 for 2015 data. Total percent representativeness is based on 2015 LCI data, using 2015 production volumes (it ranges beteween 23% and 81% depending on the data). Energy data collected from IAI annual energy survey covers 45% of this regional production.

## Extrapolations
The infrastructure input was not covered by the IAI survey and uses the rough guess in ecoinvent 2.2.

## Review by Louis Brimacombe 2019-10-01
The mass of input materials does not match product mass outputs but data is accepted for expediency on the understanding that this error requires investigation and review.
