# quicklime production, in pieces, loose

Dataset: EcoSpold 2, unit process
Geography: RoW
Time period: 2000-01-01 to 2023-12-31
Technology level: current
Classification: ISIC rev.4 ecoinvent: 2394:Manufacture of cement, lime and plaster
Classification: EcoSpold01Categories: construction materials/additives
Tags: ConvertedDataset
Scenario: Business-as-Usual
System model: Allocation, cut-off by classification
Share of production covered: 50 %
Generated by: Daniel Kellenberger (obsolete)
Published in: Kellenberger D. 2004
Database: ecoinvent
isCopyrightProtected: true
accessRestrictedTo: 1

## General comment
This dataset represents the production of quicklime.
Infrastructure data are estimated based on a site visit and sketches of the process. The value of the infrastructure is normalized with a annual production capacity of about 75'000tons of product per year. The estimated lifespan of the machines is 25 years. Only measured emissions are taken into account. The distribution of the dust emissions to the different categories of sizes are made based on the information of the CEPMEIP-Database and adapted. This activity describes a pre-product for the milling process, and therefore for module "quicklime, milled, loose, at plant".

## Included activities start
From reception of raw materials, at the plant site.

## Included activities end
This activity ends with the quicklime at kiln gate.
The dataset includes the calcination process. Also included is the electricity consumption for preheating of the heavy fuel oil and one part of the total heating energy for "production" and "administration". Equipment included in the infrastructure: 2 vertical kilns; not included is the use of fireproof bricks since no data are available. Only the measured emissions are included.

## Geography
data are from only one company in Switzerland (KFN), for some exchanges RER-modules have been used as proxy

## Technology
The company KFN works on a technically high level. Two vertical kilns are in use. The fuel for the calcination process is heavy fuel oil.

## Parameters
- Quebec gross domestic product 2011: 3.11e11 USD(2011); name quebecGDP2011; lognormal variance with pedigree 0.0006, pedigree (1,1,1,1,1)
  Quebec Gross domestic product for 2011, expressed in 2011 USD. Source: Institut de la statistique du Québec. Converted from CAD to USD using a yearly average exchange rate of 0.989 CAD/USD (Source: bank of Canada).
- quebec production volume: 7.32e8 kg; name PV_Quebec; lognormal variance with pedigree 0.0006, pedigree (1,1,1,1,1)
  2012 limestone production in Quebec. Primary data from the only producer in Quebec (Canada).
- world gross domestic product 2011: 7e13 USD(2011); name worldGDP2011; lognormal variance with pedigree 0.0006, pedigree (1,1,1,1,1)
  World Gross domestic product for 2011, expressed in 2011 USD. Source: World Bank.

## Reference product
- quicklime, in pieces, loose: 1 kg; By-product classification allocatable product; CPC 37420: Quicklime, slaked lime and hydraulic lime; HS2017 252210: Quicklime; excluding calcium oxide and hydroxide of heading no. 2825; CAS 1305-78-8
  EcoSpold01Location=CH
  production volume 1.6264e11 kg; name PV_world; = PV_Quebec*worldGDP2011/quebecGDP2011
    Gross approximation of World production volume using relative value of Quebec (Canada) GDP to world GDP. See parameters.
  property carbon content, fossil 0
    Tab 3.3, ecoinvent v2.2 report 7, part VII, pg 5. Lump quicklime
  property carbon content, non-fossil 0
    Tab 3.3, ecoinvent v2.2 report 7, part VII, pg 5. Lump quicklime
  property price 0.077 EUR2005
    Calculated value based on data from United Nations Commodity Trade Statistics Database (comtrade.un.org). UN comtrade category: 252210 Quicklime. Year 2005. Using exchange rate of 1EURO = 1.209 USD. Average of price of import into 5 main markets (EU, US, JP, IN and CN).
  properties: carbon allocation 0 kg, carbon content 0, dry mass 0.99 kg, water content 0.010101, water in wet mass 0.01 kg, wet mass 1 kg

## Inputs from technosphere
- coke: 0.000239071, 0.000507329 MJ (2 suppliers, which the file names only by identifier); sum of these 0.0007464 MJ; = 0.168*PV_Quebec/PV_World; lognormal variance with pedigree 0.04, pedigree (1,1,5,1,1)
  This flow is considered as a regional specificity of Quebec. The flow is scaled using the production volumes (Quebec and GLO) to avoid its accounting of this specificity in the other regions
  properties: carbon content, fossil 0.869149, dry mass 0.0328671 kg, heating value, net 28.6 MJ, water content 0.0638298, wet mass 0.034965 kg
- diesel, burned in building machine: 0.0147793 MJ; = diesel_consumption/building_machine_yield; lognormal variance with pedigree 0.04, pedigree (1,1,5,1,1)
  Calculated value. See Exchange properties.
  Diesel is used for on site transportation of material. Extrapolated from "quicklime production, in pieces, loose, Québec, 2012"
  property fuel input in physical units, kg 0.000345836 kg; name diesel_consumption
  property kgFuel_Input 0.0234 kg; name building_machine_yield
  properties: heating value, net 1 MJ
  note on fuel input in physical units, kg: Amount of diesel for on site transportation of 1 kg of limestone. Source: Extrapolation from "quicklime production, in pieces, loose, Québec, 2012". Considering diesel density of 0,84 kg/l (ecoinvent report 1, Table 4.6)
  note on kgFuel_Input: Amount of diesel burned in building machine per MJ. Source: "diesel, burned in building machine, GLO 2001" dataset, ecoinvent v 3.01
- electricity, high voltage: 0.0469 kWh; lognormal variance with pedigree 0.0421, pedigree (1,2,5,5,1)
  activityLink added to better reflect the reality of the supply chain
- electricity, medium voltage: 0.0013205, 0.0263411, 0.000659414, 0.000404384, 8.09369e-5, 1.7379e-5, 0.00183932, 0.00272013, 0.00569875, 0.00781809 kWh (10 suppliers, which the file names only by identifier); sum of these 0.0469 kWh; lognormal variance with pedigree 0.0421, pedigree (1,2,5,5,1)
  EcoSpold01Location=CH
- hard coal: 4.37658e-6, 1.03853e-6, 3.40755e-6, 3.09741e-5, 7.27423e-6, 4.4662e-6, 9.65207e-6, 1.8993e-6 kg (8 suppliers, which the file names only by identifier); sum of these 6.30886e-5 kg; = 0.0142*PV_Quebec/PV_World; lognormal variance with pedigree 0.04, pedigree (1,1,5,1,1)
  (same comment as for coke)
  properties: carbon content, fossil 0.845, dry mass 0.94 kg, heating value, net 27.91 MJ, water content 0.0638298, wet mass 1 kg
  note on carbon content, fossil: C content 75-94% (specified in Tab 1.1, report 6, part VI). A mean content of 0.845 kg C/ kg dry hard coal was considered
  note on heating value, net: Based on the Characterization factor of Hard coal in the CED method
- heat, central or small-scale, other than natural gas: 7.56521e-6, 0.000550795 MJ (2 suppliers, which the file names only by identifier); sum of these 0.00055836 MJ; lognormal variance with pedigree 0.0421, pedigree (1,2,5,5,1)
  EcoSpold01Location=CH
  properties: heating value, net 1 MJ
- heavy fuel oil: 0.000989454, 0.000576172, 0.00292915, 0.0684733, 0.000739144, 0.00379809, 0.0138947 kg (7 suppliers, which the file names only by identifier); sum of these 0.0914 kg; lognormal variance with pedigree 0.0421, pedigree (1,2,5,5,1)
  EcoSpold01Location=CH
  properties: carbon content, fossil 0.849, dry mass 1 kg, heating value, net 41.2 MJ, wet mass 1 kg
- industrial machine, heavy, unspecified: 9.23e-6 kg; lognormal variance with pedigree 0.3706, pedigree (4,3,5,5,1)
  EcoSpold01Location=RER
- light fuel oil: 5.03357e-8, 5.27418e-6, 1.0623e-6, 2.59387e-7, 5.23504e-7, 3.74077e-8, 3.47391e-8 kg (7 suppliers, which the file names only by identifier); sum of these 7.24186e-6 kg; = 0.00163*PV_Quebec/PV_World; lognormal variance with pedigree 0.04, pedigree (1,1,5,1,1)
  (same comment as for coke)
  properties: carbon content, fossil 0.862, dry mass 1 kg, heating value, net 42.6 MJ, wet mass 1 kg
- limestone, crushed, washed: 1.73 kg; lognormal variance with pedigree 0.04, pedigree (1,1,5,1,1)
  EcoSpold01Location=CH
  properties: carbon content, fossil 0.117257, dry mass 0.998 kg, water content 0.00200401, wet mass 1 kg
  note on carbon content, fossil: Table 3.1, ecoinvent v2.2 report 7, part VII, pg 3. MW CaCO3=100, MW MgCO3=84. C content of limestone is 0.117257 kg/kg DM
- natural gas, high pressure: 2.13893e-6, 3.6081e-6, 7.87038e-6, 2.63388e-6, 6.15528e-7, 3.6635e-6, 3.51541e-6, 9.24384e-6, 3.56874e-6, 5.51983e-6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 m3 (38 suppliers, which the file names only by identifier); sum of these 0.000353651 m3; = 0.0796*PV_Quebec/PV_World; lognormal variance with pedigree 0.04, pedigree (1,1,5,1,1)
  (same comment as for coke)
  properties: carbon content, fossil 0.602381, dry mass 0.84 kg, heating value, gross 40 MJ, heating value, net 36 MJ, wet mass 0.84 kg
  note on carbon content, fossil: An average C content of 0.506 kg C/ m3 has been assumed (this average has been calculated using data in Tab 3.5, ecoinvent v2.2 report 6_V
  note on heating value, net: Literature value, Source: Christoph Meili;Niels Jungbluth;Maresa Bussa (2021) Life cycle inventories of crude oil and natural gas extraction. ESU-services Ltd. commissioned by BAFU & VSG, Schaffhausen, Switzerland, http://esu-services.ch/data/public-lci-reports/
- petroleum coke: 8.79686e-6 kg; = 0.00198*PV_Quebec/PV_World; lognormal variance with pedigree 0.04, pedigree (1,1,5,1,1)
  (same comment as for coke)
  properties: carbon content, fossil 0.885, dry mass 1 kg, heating value, net 35 MJ, wet mass 1 kg
- propane: 1.42171e-6 kg; = 0.00032*PV_Quebec/PV_World; lognormal variance with pedigree 0.04, pedigree (1,1,5,1,1)
  (same comment as for coke)
  properties: carbon content, fossil 0.817139, dry mass 1 kg, heating value, net 46.4 MJ, wet mass 1 kg
  note on heating value, net: Indicative value. Reference: Fuels - Higher and Lower Calorific Values, available at: https://www.engineeringtoolbox.com/fuels-higher-calorific-values-d_169.html
- transport, passenger car, large size, diesel, EURO 4: 0.000854637 km; = petrol_input_pickup/kg_petrol_per_km; lognormal variance with pedigree 0.04, pedigree (1,1,5,1,1)
  Calculated value. See Exchange properties.
  On site transportation of employees. Extrapolated from "quicklime production, in pieces, loose, Québec, 2012"
  property fuel input in physical units, kg 6.59412e-5 kg; name petrol_input_pickup
  property kgFuel_input_in_process 0.077157 kg; name kg_petrol_per_km
  note on fuel input in physical units, kg: Amount of petroll for on site transportation of employees, reported for 1 kg of limestone. Source: Extrapolation from "quicklime production, in pieces, loose, Québec, 2012". Considering petrol density of 0,75 kg/l (ecoinvent report 1, Table 4.6)
  note on kgFuel_input_in_process: Literature value: From transport, passenger car, large size, petrol. EURO 4, ecoinvent v3.1
- wood chips, from post-consumer wood, measured as dry mass: 2.24084e-5 kg; = 0.005043689*PV_Quebec/PV_World; lognormal variance with pedigree 0.04, pedigree (1,1,5,1,1)
  (same comment as for coke)
  properties: carbon content, non-fossil 0.494, dry mass 1 kg, heating value, net 9.99 MJ, water content 0.4, wet mass 1.4 kg

## Emissions to nature
- Acetaldehyde [air, non-urban air or from high stacks]: 5.57e-7 kg; lognormal variance with pedigree 0.1306, pedigree (4,4,5,4,4)
  Calculated value. Combustion emission based on values from ecoinvent v3 heat production technologies, considering as inputs the real kiln fuel mix, including natural gas, coal, coke, heavy fuel oil, light fuel oil and biomass (weighted average, provided by questionnaire).
- Acetic acid [air, non-urban air or from high stacks]: 2.23e-6 kg; lognormal variance with pedigree 0.1306, pedigree (4,4,5,4,4)
  (same comment as for Acetaldehyde)
- Acetone [air, non-urban air or from high stacks]: 5.57e-7 kg; lognormal variance with pedigree 0.1306, pedigree (4,4,5,4,4)
  (same comment as for Acetaldehyde)
- Acetylene [air, non-urban air or from high stacks]: 9.28557e-9 kg; = 2.09E-06*PV_Quebec/PV_World; lognormal variance with pedigree 0.04, pedigree (1,1,5,1,1)
  (same comment as for coke)
- Aluminium III [air, non-urban air or from high stacks]: 1.98596e-7 kg; = 4.47E-05*PV_Quebec/PV_World; lognormal variance with pedigree 0.04, pedigree (1,1,5,1,1)
  (same comment as for coke)
- Ammonia [air, non-urban air or from high stacks]: 3.71e-8 kg; lognormal variance with pedigree 0.1306, pedigree (4,4,5,4,4)
  (same comment as for Acetaldehyde)
- Antimony ion [air, non-urban air or from high stacks]: 2.93229e-11 kg; = 6.6E-09*PV_Quebec/PV_World; lognormal variance with pedigree 0.04, pedigree (1,1,5,1,1)
  (same comment as for coke)
- Arsenic ion [air, non-urban air or from high stacks]: 4.82e-8 kg; lognormal variance with pedigree 0.7406, pedigree (4,4,5,4,4)
  (same comment as for Acetaldehyde)
- Barium II [air, non-urban air or from high stacks]: 2.33694e-9 kg; = 5.26E-07*PV_Quebec/PV_World; lognormal variance with pedigree 0.04, pedigree (1,1,5,1,1)
  (same comment as for coke)
- Benzene [air, non-urban air or from high stacks]: 1.07073e-8 kg; = 2.41E-06*PV_Quebec/PV_World; lognormal variance with pedigree 0.04, pedigree (1,1,5,1,1)
  (same comment as for coke)
- Benzo(a)pyrene [air, non-urban air or from high stacks]: 1.04e-10 kg; lognormal variance with pedigree 0.1306, pedigree (4,4,5,4,4)
  (same comment as for Acetaldehyde)
- Beryllium II [air, non-urban air or from high stacks]: 2.33694e-11 kg; = 5.26E-09*PV_Quebec/PV_World; lognormal variance with pedigree 0.04, pedigree (1,1,5,1,1)
  (same comment as for coke)
- Boron [air, non-urban air or from high stacks]: 8.79686e-9 kg; = 1.98E-06*PV_Quebec/PV_World; lognormal variance with pedigree 0.04, pedigree (1,1,5,1,1)
  (same comment as for coke)
- Bromine [air, non-urban air or from high stacks]: 2.03483e-10 kg; = 4.58E-08*PV_Quebec/PV_World; lognormal variance with pedigree 0.04, pedigree (1,1,5,1,1)
  (same comment as for coke)
- Butane [air, non-urban air or from high stacks]: 1.7727e-9 kg; = 3.99E-07*PV_Quebec/PV_World; lognormal variance with pedigree 0.04, pedigree (1,1,5,1,1)
  (same comment as for coke)
- Cadmium II [air, non-urban air or from high stacks]: 2.96339e-11 kg; = 6.67E-09*PV_Quebec/PV_World; lognormal variance with pedigree 0.04, pedigree (1,1,5,1,1)
  (same comment as for coke)
- Calcium II [air, non-urban air or from high stacks]: 4.08e-7 kg; lognormal variance with pedigree 0.1306, pedigree (4,4,5,4,4)
  (same comment as for Acetaldehyde)
- Carbon dioxide, fossil [air, non-urban air or from high stacks]: 1.07792 kg; lognormal variance with pedigree 0.0521, pedigree (1,2,5,5,1)
  Calculated. The CO2-emission is caused partly by the calcination of limestone and partly by the fuel combustion. Heavy fuel oil has carbon content of 0.849 (from the dataset "heavy fuel oil, burned in refinery furnace, CH"). The emissions of fossil CO2 are therefore 0.292209626 per kg of CaO. The emissions for the calcination of limestone are calculted to be 0.785714286.
- Carbon dioxide, non-fossil [air, non-urban air or from high stacks]: 4.53038e-5 kg; = 0.010197*PV_Quebec/PV_World; lognormal variance with pedigree 0.04, pedigree (1,1,5,1,1)
  (same comment as for coke)
- Carbon monoxide, fossil [air, non-urban air or from high stacks]: 0.00477 kg; lognormal variance with pedigree 0.0521, pedigree (1,2,5,5,1)
- Carbon monoxide, non-fossil [air, non-urban air or from high stacks]: 1.88821e-8 kg; = 4.25E-06*PV_Quebec/PV_World; lognormal variance with pedigree 0.04, pedigree (1,1,5,1,1)
  (same comment as for coke)
- Chlorine [air, non-urban air or from high stacks]: 8.30814e-11 kg; = 1.87E-08*PV_Quebec/PV_World; lognormal variance with pedigree 0.04, pedigree (1,1,5,1,1)
  (same comment as for coke)
- Chromium III [air, non-urban air or from high stacks]: 1.84e-8 kg; lognormal variance with pedigree 0.7406, pedigree (4,4,5,4,4)
  (same comment as for Acetaldehyde)
- Chromium VI [air, non-urban air or from high stacks]: 1.86e-10 kg; lognormal variance with pedigree 0.7406, pedigree (4,4,5,4,4)
  (same comment as for Acetaldehyde)
- Cobalt II [air, non-urban air or from high stacks]: 5.95343e-11 kg; = 1.34E-08*PV_Quebec/PV_World; lognormal variance with pedigree 0.04, pedigree (1,1,5,1,1)
  (same comment as for coke)
- Copper ion [air, non-urban air or from high stacks]: 5.94e-8 kg; lognormal variance with pedigree 0.7406, pedigree (4,4,5,4,4)
  (same comment as for Acetaldehyde)
- Dinitrogen monoxide [air, non-urban air or from high stacks]: 2.97e-6 kg; lognormal variance with pedigree 0.1306, pedigree (4,4,5,4,4)
  (same comment as for Acetaldehyde)
- Dioxins, measured as 2,3,7,8-tetrachlorodibenzo-p-dioxin [air, non-urban air or from high stacks]: 1.67e-15 kg; lognormal variance with pedigree 0.1306, pedigree (4,4,5,4,4)
  (same comment as for Acetaldehyde)
- Ethane [air, non-urban air or from high stacks]: 1.22e-7 kg; lognormal variance with pedigree 0.1306, pedigree (4,4,5,4,4)
  (same comment as for Acetaldehyde)
- Ethanol [air, non-urban air or from high stacks]: 1.11e-6 kg; lognormal variance with pedigree 0.1306, pedigree (4,4,5,4,4)
  (same comment as for Acetaldehyde)
- Ethyl benzene [air, non-urban air or from high stacks]: 1.38173e-11 kg; = 3.11E-09*PV_Quebec/PV_World; lognormal variance with pedigree 0.04, pedigree (1,1,5,1,1)
  (same comment as for coke)
- Ethylene [air, non-urban air or from high stacks]: 5.55357e-8 kg; = 1.25E-05*PV_Quebec/PV_World; lognormal variance with pedigree 0.04, pedigree (1,1,5,1,1)
  (same comment as for coke)
- Fluorine [air, non-urban air or from high stacks]: 2.3014e-11 kg; = 5.18E-09*PV_Quebec/PV_World; lognormal variance with pedigree 0.04, pedigree (1,1,5,1,1)
  (same comment as for coke)
- Formaldehyde [air, non-urban air or from high stacks]: 1.67e-6 kg; lognormal variance with pedigree 0.1306, pedigree (4,4,5,4,4)
  (same comment as for Acetaldehyde)
- Hexachlorobenzene [air, non-urban air or from high stacks]: 3.31437e-18 kg; = 7.46E-16*PV_Quebec/PV_World; lognormal variance with pedigree 0.04, pedigree (1,1,5,1,1)
  (same comment as for coke)
- Hydrocarbons, aliphatic, alkanes, unspecified [air, non-urban air or from high stacks]: 2.23e-6 kg; lognormal variance with pedigree 0.3906, pedigree (4,4,5,4,4)
  (same comment as for Acetaldehyde)
- Hydrocarbons, aliphatic, unsaturated [air, non-urban air or from high stacks]: 1.11e-7 kg; lognormal variance with pedigree 0.3906, pedigree (4,4,5,4,4)
  (same comment as for Acetaldehyde)
- Hydrocarbons, aromatic [air, non-urban air or from high stacks]: 5.57e-7 kg; lognormal variance with pedigree 0.3906, pedigree (4,4,5,4,4)
  (same comment as for Acetaldehyde)
- Hydrochloric acid [air, non-urban air or from high stacks]: 5.34e-6 kg; lognormal variance with pedigree 0.1306, pedigree (4,4,5,4,4)
  (same comment as for Acetaldehyde)
- Hydrogen fluoride [air, non-urban air or from high stacks]: 1.78e-7 kg; lognormal variance with pedigree 0.1306, pedigree (4,4,5,4,4)
  (same comment as for Acetaldehyde)
- Iodine [air, non-urban air or from high stacks]: 2.1148e-10 kg; = 4.76E-08*PV_Quebec/PV_World; lognormal variance with pedigree 0.04, pedigree (1,1,5,1,1)
  (same comment as for coke)
- Iron ion [air, non-urban air or from high stacks]: 3.04e-6 kg; lognormal variance with pedigree 0.7406, pedigree (4,4,5,4,4)
  (same comment as for Acetaldehyde)
- Lead II [air, non-urban air or from high stacks]: 5.38e-7 kg; lognormal variance with pedigree 0.7406, pedigree (4,4,5,4,4)
  (same comment as for Acetaldehyde)
- Lead-210 [air, non-urban air or from high stacks]: 8.63158e-7 kBq; = 0.00019428*PV_Quebec/PV_World; lognormal variance with pedigree 0.04, pedigree (1,1,5,1,1)
  (same comment as for coke)
- Magnesium [air, non-urban air or from high stacks]: 7.06414e-8 kg; = 1.59E-05*PV_Quebec/PV_World; lognormal variance with pedigree 0.04, pedigree (1,1,5,1,1)
  (same comment as for coke)
- Manganese II [air, non-urban air or from high stacks]: 4.88714e-10 kg; = 1.1E-07*PV_Quebec/PV_World; lognormal variance with pedigree 0.04, pedigree (1,1,5,1,1)
  (same comment as for coke)
- Mercury II [air, non-urban air or from high stacks]: 5.57e-10 kg; lognormal variance with pedigree 0.7406, pedigree (4,4,5,4,4)
  (same comment as for Acetaldehyde)
- Methane, fossil [air, non-urban air or from high stacks]: 1.11e-5 kg; lognormal variance with pedigree 0.1306, pedigree (4,4,5,4,4)
  (same comment as for Acetaldehyde)
- Methane, non-fossil [air, non-urban air or from high stacks]: 1.84379e-10 kg; = 4.15E-08*PV_Quebec/PV_World; lognormal variance with pedigree 0.04, pedigree (1,1,5,1,1)
  (same comment as for coke)
- Methanol [air, non-urban air or from high stacks]: 1.89e-6 kg; lognormal variance with pedigree 0.1306, pedigree (4,4,5,4,4)
  (same comment as for Acetaldehyde)
- Molybdenum VI [air, non-urban air or from high stacks]: 2.97e-8 kg; lognormal variance with pedigree 0.7406, pedigree (4,4,5,4,4)
  (same comment as for Acetaldehyde)
- NMVOC, non-methane volatile organic compounds [air, non-urban air or from high stacks]: 4.55e-5 kg; lognormal variance with pedigree 0.0521, pedigree (1,2,5,5,1)
- Nickel II [air, non-urban air or from high stacks]: 1.82e-6 kg; lognormal variance with pedigree 0.7406, pedigree (4,4,5,4,4)
  (same comment as for Acetaldehyde)
- Nitrogen oxides [air, non-urban air or from high stacks]: 0.000336 kg; lognormal variance with pedigree 0.0521, pedigree (1,2,5,5,1)
- PAH, polycyclic aromatic hydrocarbons [air, non-urban air or from high stacks]: 2.15e-9 kg; lognormal variance with pedigree 0.3906, pedigree (4,4,5,4,4)
  (same comment as for Acetaldehyde)
- Particulate Matter, < 2.5 um [air, non-urban air or from high stacks]: 1.36e-5 kg; lognormal variance with pedigree 0.0521, pedigree (1,2,5,5,1)
- Particulate Matter, > 10 um [air, non-urban air or from high stacks]: 2.73e-5 kg; lognormal variance with pedigree 0.0526, pedigree (1,3,5,5,1)
- Particulate Matter, > 2.5 um and < 10um [air, non-urban air or from high stacks]: 2.73e-5 kg; lognormal variance with pedigree 0.0521, pedigree (1,2,5,5,1)
- Pentachlorophenol [air, non-urban air or from high stacks]: 3.72756e-15 kg; = 8.39E-13*PV_Quebec/PV_World; lognormal variance with pedigree 0.04, pedigree (1,1,5,1,1)
  (same comment as for coke)
- Pentane [air, non-urban air or from high stacks]: 3.03003e-9 kg; = 6.82E-07*PV_Quebec/PV_World; lognormal variance with pedigree 0.04, pedigree (1,1,5,1,1)
  (same comment as for coke)
- Phosphorus [air, non-urban air or from high stacks]: 1.31064e-9 kg; = 2.95E-07*PV_Quebec/PV_World; lognormal variance with pedigree 0.04, pedigree (1,1,5,1,1)
  (same comment as for coke)
- Polonium-210 [air, non-urban air or from high stacks]: 1.57784e-6 kBq; = 0.00035514*PV_Quebec/PV_World; lognormal variance with pedigree 0.04, pedigree (1,1,5,1,1)
  (same comment as for coke)
- Potassium I [air, non-urban air or from high stacks]: 3.41656e-8 kg; = 7.69E-06*PV_Quebec/PV_World; lognormal variance with pedigree 0.04, pedigree (1,1,5,1,1)
  (same comment as for coke)
- Potassium-40 [air, non-urban air or from high stacks]: 2.50577e-7 kBq; = 5.64E-05*PV_Quebec/PV_World; lognormal variance with pedigree 0.04, pedigree (1,1,5,1,1)
  (same comment as for coke)
- Propane [air, non-urban air or from high stacks]: 1.11e-7 kg; lognormal variance with pedigree 0.1306, pedigree (4,4,5,4,4)
  (same comment as for Acetaldehyde)
- Propionic acid [air, non-urban air or from high stacks]: 5.02043e-11 kg; = 1.13E-08*PV_Quebec/PV_World; lognormal variance with pedigree 0.04, pedigree (1,1,5,1,1)
  (same comment as for coke)
- Propylene [air, non-urban air or from high stacks]: 9.28557e-9 kg; = 2.09E-06*PV_Quebec/PV_World; lognormal variance with pedigree 0.04, pedigree (1,1,5,1,1)
  (same comment as for coke)
- Radium-226 [air, non-urban air or from high stacks]: 2.22587e-7 kBq; = 5.01E-05*PV_Quebec/PV_World; lognormal variance with pedigree 0.04, pedigree (1,1,5,1,1)
  (same comment as for coke)
- Radium-228 [air, non-urban air or from high stacks]: 1.20659e-6 kBq; = 0.00027158*PV_Quebec/PV_World; lognormal variance with pedigree 0.04, pedigree (1,1,5,1,1)
  (same comment as for coke)
- Radon-220 [air, non-urban air or from high stacks]: 1.85711e-8 kBq; = 4.18E-06*PV_Quebec/PV_World; lognormal variance with pedigree 0.04, pedigree (1,1,5,1,1)
  (same comment as for coke)
- Radon-222 [air, non-urban air or from high stacks]: 1.85711e-8 kBq; = 4.18E-06*PV_Quebec/PV_World; lognormal variance with pedigree 0.04, pedigree (1,1,5,1,1)
  (same comment as for coke)
- Scandium [air, non-urban air or from high stacks]: 2.33694e-11 kg; = 5.26E-09*PV_Quebec/PV_World; lognormal variance with pedigree 0.04, pedigree (1,1,5,1,1)
  (same comment as for coke)
- Selenium IV [air, non-urban air or from high stacks]: 4.45e-8 kg; lognormal variance with pedigree 0.7406, pedigree (4,4,5,4,4)
  (same comment as for Acetaldehyde)
- Silicon [air, non-urban air or from high stacks]: 2.93229e-7 kg; = 6.6E-05*PV_Quebec/PV_World; lognormal variance with pedigree 0.04, pedigree (1,1,5,1,1)
  (same comment as for coke)
- Sodium I [air, non-urban air or from high stacks]: 2.78e-6 kg; lognormal variance with pedigree 0.1306, pedigree (4,4,5,4,4)
  (same comment as for Acetaldehyde)
- Strontium II [air, non-urban air or from high stacks]: 3.52763e-9 kg; = 7.94E-07*PV_Quebec/PV_World; lognormal variance with pedigree 0.04, pedigree (1,1,5,1,1)
  (same comment as for coke)
- Sulfur dioxide [air, non-urban air or from high stacks]: 0.000336 kg; lognormal variance with pedigree 0.0521, pedigree (1,2,5,5,1)
- Thallium I [air, non-urban air or from high stacks]: 2.93229e-11 kg; = 6.6E-09*PV_Quebec/PV_World; lognormal variance with pedigree 0.04, pedigree (1,1,5,1,1)
  (same comment as for coke)
- Thorium [air, non-urban air or from high stacks]: 3.52763e-11 kg; = 7.94E-09*PV_Quebec/PV_World; lognormal variance with pedigree 0.04, pedigree (1,1,5,1,1)
  (same comment as for coke)
- Thorium-228 [air, non-urban air or from high stacks]: 1.02186e-7 kBq; = 2.3E-05*PV_Quebec/PV_World; lognormal variance with pedigree 0.04, pedigree (1,1,5,1,1)
  (same comment as for coke)
- Thorium-232 [air, non-urban air or from high stacks]: 6.48657e-8 kBq; = 1.46E-05*PV_Quebec/PV_World; lognormal variance with pedigree 0.04, pedigree (1,1,5,1,1)
  (same comment as for coke)
- Tin ion [air, non-urban air or from high stacks]: 1.17291e-11 kg; = 2.64E-09*PV_Quebec/PV_World; lognormal variance with pedigree 0.04, pedigree (1,1,5,1,1)
  (same comment as for coke)
- Titanium ion [air, non-urban air or from high stacks]: 7.01971e-9 kg; = 1.58E-06*PV_Quebec/PV_World; lognormal variance with pedigree 0.04, pedigree (1,1,5,1,1)
  (same comment as for coke)
- Toluene [air, non-urban air or from high stacks]: 1.11e-7 kg; lognormal variance with pedigree 0.1306, pedigree (4,4,5,4,4)
  (same comment as for Acetaldehyde)
- Uranium [air, non-urban air or from high stacks]: 4.70943e-11 kg; = 1.06E-08*PV_Quebec/PV_World; lognormal variance with pedigree 0.04, pedigree (1,1,5,1,1)
  (same comment as for coke)
- Uranium-238 [air, non-urban air or from high stacks]: 1.85711e-7 kBq; = 4.18E-05*PV_Quebec/PV_World; lognormal variance with pedigree 0.04, pedigree (1,1,5,1,1)
  (same comment as for coke)
- Vanadium V [air, non-urban air or from high stacks]: 3.71e-6 kg; lognormal variance with pedigree 0.7406, pedigree (4,4,5,4,4)
  (same comment as for Acetaldehyde)
- Water [air, non-urban air or from high stacks]: 1.67051e-8 m3; = 3.76E-06*PV_Quebec/PV_World; lognormal variance with pedigree 0.04, pedigree (1,1,5,1,1)
  (same comment as for coke)
- Xylenes, unspecified [air, non-urban air or from high stacks]: 1.85711e-9 kg; = 4.18E-07*PV_Quebec/PV_World; lognormal variance with pedigree 0.04, pedigree (1,1,5,1,1)
  (same comment as for coke)
- Zinc II [air, non-urban air or from high stacks]: 2.04e-7 kg; lognormal variance with pedigree 0.7406, pedigree (4,4,5,4,4)
  (same comment as for Acetaldehyde)
- m-Xylene [air, non-urban air or from high stacks]: 5.50914e-11 kg; = 1.24E-08*PV_Quebec/PV_World; lognormal variance with pedigree 0.04, pedigree (1,1,5,1,1)
  (same comment as for coke)
- Water [water, unspecified]: 9.46329e-8 m3; = 2.13E-05*PV_Quebec/PV_World; lognormal variance with pedigree 0.04, pedigree (1,1,5,1,1)
  (same comment as for coke)

## Sampling procedure
survey

## Extrapolations
data which are only available for RER have been used as proxy for CH This dataset has been copied from an original dataset covering the geography CH. The uncertainty has been adjusted accordingly.

## Review by Roberto Dones 2004-04-14
Passed

## Review by Bo Weidema 2012-09-28
replaced "electricity, high voltage, hydro, run-of-river" with "electricity, high voltage" + activity link to "electricity production, hydro, run-of-river"

## Review by Emilia Moreno Ruiz 2015-09-29
CO2 emissions adjusted
