# ethoxylated alcohol (AE7) production, petrochemical

Dataset: EcoSpold 2, unit process
Geography: RoW
Time period: 1992-01-01 to 2023-12-31
Technology level: modern
Classification: ISIC rev.4 ecoinvent: 2023:Manufacture of soap and detergents, cleaning and polishing preparations, pe
Synonyms: Fatty Alcohol Ethoxylate; alcohol ethoxylate
Scenario: Business-as-Usual
System model: Allocation, cut-off by classification
Share of production covered: 40 %
Generated by: Rainer Zah
Published in: Zah R. 2007
Database: ecoinvent
isCopyrightProtected: true
accessRestrictedTo: 1

## General comment
This dataset represents the production of 1 kg of ethoxylated alcohol with seven polyether units (AE7) from C12-C15 fatty alcohol derived from petrochemicals. AE7 is one type of alcohol ethoxylate (AE).
Alcohol ethoxylates are the largest group within the class of nonionic tensides. The hydrophobic part is formed by fatty alcohols with chain lengths from C9-C18. The hydrophilic part consists of a polyether chain formed by condensation of ethylene oxide to the fatty alcohol. Several hundred different AE are commercially available, differing by alcohol structure and number of polyether units. The generic chemical structure of AE is:
CH3-(CH2)n-CHR-CH2-(O-CH2-CH2)m-OH (n = 5-15, m = 2-100, R = H or n-alkyl)
Because of their structural variety, AE have very different physical and chemical properties. In comparison with other tensides like anionic surfactants, alcohol ethoxylates exhibit a better fat soil removal capacity, especially at low temperatures. AE7 is mainly used in the detergents industry.
AE are produced by the reaction of fatty alcohols with ethylene oxide, leading to a condensation of polyethylene glycolether groups on the alcohol chains. The production of AE is described on the following flow diagram:
The fatty alcohols can be derived from petrochemicals, palm kernel, or coconut oil.
In this dataset, the material and energy inputs are based on literature sources, the water consumption is estimated based on data from a large chemical plant (Gendorf 2016). The production of waste and emissions to water and air are calculated based on literature sources.
References:
Zah R., Hischier R. (2007) Life Cycle Inventories of Detergents. ecoinvent report No. 12. Swiss Centre for Life Cycle Inventories, Dübendorf, 2007.
Gendorf (2016) Umwelterklärung 2015, Werk Gendorf Industriepark, www.gendorf.de.

## Included activities start
From reception of fatty alcohol from petrochemicals, ethylene oxide, and nitrogen at the factory gate.

## Included activities end
This activity ends with 1 kg of ethoxylated alcohol (AE7). The dataset includes the processing of the material inputs, the consumption of energy, the use of infrastructure, the production of waste, and emissions to water and air. The dataset doesn't include water consumption.

## Geography
The data are based on the European ethoxylated alcohols production, but are assumed to be representative of the global production. Some values are based on data from a large chemical factory located in Germany. These are assumed to be valid for this geography.

## Technology
Alcohol ethoxylates (AE) are produced by the reaction of fatty alcohols with ethylene oxide leading to a condensation of polyethylene glycolether groups on the alcohol chains. The fatty alcohols can be derived from petrochemical, palm kernel, or coconut oil. The reaction takes place at temperatures ranging from 150°C to 200°C. The grade of ethoxylation, e.g. the specific number of polyether units condensed to the alcohol chains, is controlled by the concentration of ethylene oxid in the ethoxylation process. The petrochemical route has been designated as modern technology, since it has the best ability to change capacity with changes in demand. This is an average technology for the production of AE representing typical European production mix in the mid 90s.
Reference:
Schul W. (1995) A Life-Cycle Inventory for the Production of Detergent Range Alcohol Ethoxylates in Europe. In: Tenside, Surfactants, Detergents, 32(2), pp. 171-192.
Stalmans M., Berenbold H., Berna J. L., Cavalli L., Dillarstone A., Franke M., Hirsinger F., Janzen D., Kosswig K., Postlethwaite D., Rappert T., Renta C., Scharer D., Schick K.-P., Schul W., Thomas H. and Sloten R. V. (1995) European Life-Cycle Inventory for Detergent Surfactants Production. In: Tenside, Surfactants, Detergents, 32(2), pp. 84-109

## Time period
Date of published literature. Some values are based on data published by the Gendorf factory that were collected between 2011 and 2015. The time period has been adjusted accordingly. For more details, see the comments of the exchanges.

## Reference product
- ethoxylated alcohol (AE7): 1 kg; name RP; By-product classification allocatable product; CPC 35310: Organic surface active agents, except soap; HS2017 340213: Organic surface-active agents; non-ionic (other than soap), whether or not put up for retail sale
  Alcohol Ethoxylates (AE) are molecules with an hydrophobic and an hydrophilic part. The hydrophobic part is formed by fatty alcohols with chain lengths from C9-C18. The hydrophilic part consists of a polyether chain formed by condensation of ethylene oxide to the fatty alcohol. Several hundred different AE are commercially available, differing by alcohol structure and number of polyether units. The generic chemical structure of AE is:
  CH3-(CH2)n-CHR-CH2-(O-CH2-CH2)m-OH
  (n = 5-15, m = 2-100, R = H or n-alkyl)
  AE7 have an average value of seven polyether units (m = 7).
  Alcohol Ethoxylates (AE) are the largest group within the class of nonionic tensides. In comparison with other tensides like anionic surfactants, alcohol ethoxylates exhibit a better fat soil removal capacity, especially at low temperatures.
  production volume 8.3839e6 kg; name RP_PV
    Estimated value. Based on HERA (2009), the global production volume is estimated to be 290000000 kg for the year 2003. Moreover, it is assumed that 50% of ethoxylated alcohols originate from vegetable oil sources whilst the remaining 50% comes from petrochemical origins. In addition, according to HERA (2009), the distribution of AE7 in household products is 7%.
    Reference:
    HERA 2009, Human & Environmental Risk Assessment on ingredients of European household cleaning products, Alcohol Ethoxylates, September 2009.
    FAOSTAT, 2017, Food and Agricultural Organization of the United Nations. Accessible at: http://www.fao.org/faostat/en/#data/QD
  property carbon content, fossil 0.643327
    The generic chemical structure of AE is: CH3-(CH2)n-CHR-CH2-(O-CH2-CH2)m-OH (n = 5-15, m = 2-100, R = H or n-alkyl). AE are produced by the reaction of fatty alcohols with ethylene oxide leading to a condensation of polyethylene glycolether groups on the alcohol chains (ecoinvent report 12-part 4). Fatty alcohols were considered to have an average length of C14. Ethoxylated alcohol (AE7) has an average value of seven polyether units (AE7) (ecoinvent report 12-part 4). The formula that has then been used to calculate the C content of the products is CH3-(CH2)11-CH2-CH2-(O-CH2-CH2)7-OH. In this molecule, all C has a fossile origin, as fatty alcohols are produced from petrochemical oil
  property carbon content, non-fossil 0
    (same comment as for ethoxylated alcohol (AE7))
  property heating value, net 19.49 MJ
    LHV is calculated based on the Carbon content of the product. More details can be found on the respective documentation.
  property price 1.64112 EUR2005
    Calculated based on inputs: The price of the product has been calculated as a sum of the values of the material and energy inputs for this product. This value is therefore a rough estimation. It may underestimate the real price since there are additional expenses when producing any product. These expences can include for example labour costs, treatment of waste materials and profit for the producer. Please consider carefully whether this level of data quality is acceptable for your application.
  properties: carbon allocation 0.643327 kg, carbon content 0.643327, dry mass 1 kg, water content 0, water in wet mass 0 kg, wet mass 1 kg

## Inputs from technosphere
- chemical factory, organics: 4e-10 unit; source Frischknecht R. 2007; lognormal variance with pedigree 0.31, pedigree (2,3,2,4,3)
  Calculated based on literature data published by the industry. For this activity, no information was readily available concerning infrastructure and land-use. Therefore, the infrastructure is estimated based on data from two chemical factories, the BASF site of Ludwigshafen and the chemical factory in Gendorf (which are both located in Germany), which produce a wide range of chemical substances. Based on this data, the following assumptions are made: the built area amounts to about 4.2 ha, the plant has an average output of 50'000 t/a and a lifespan of fifty years. The estimated infrastructure amount is therefore 4.00 E-10 units per kg of produced chemical.
  References:
  Althaus H.-J., Chudacoff M., Hischier R., Jungbluth N., Osses M. and Primas A. (2007) Life Cycle Inventories of Chemicals. ecoinvent report No. 8, v2.0. EMPA Dübendorf, Swiss Centre for Life Cycle Inventories, Dübendorf, CH.
  Gendorf (2000) Umwelterklärung 2000, Werk Gendorf. Werk Gendorf, Burgkirchen.
- electricity, medium voltage: 0.00207373, 0.0413662, 0.0138989, 0.000635046, 0.000127104, 2.72921e-5, 0.0042717 kWh (7 suppliers, which the file names only by identifier); sum of these 0.0624 kWh; source Schul W. 1995; lognormal variance with pedigree 0.0212, pedigree (2,3,4,5,1)
  Literature Value.
- ethylene oxide: 0.556 kg; source Schul W. 1995; lognormal variance with pedigree 0.0212, pedigree (2,3,4,5,1)
  Literature Value.
  properties: carbon content, fossil 0.545455, dry mass 1 kg, heating value, net 27.53 MJ, wet mass 1 kg
  note on carbon content, fossil: The generic chemical structure of AE is: CH3-(CH2)n-CHR-CH2-(O-CH2-CH2)m-OH (n = 5-15, m = 2-100, R = H or n-alkyl). AE are produced by the reaction of fatty alcohols with ethylene oxide leading to a condensation of polyethylene glycolether groups on the alcohol chains (ecoinvent report 12-part 4). Fatty alcohols were considered to have an average length of C14. Ethoxylated alcohol (AE7) has an average value of seven polyether units (AE7) (ecoinvent report 12-part 4). The formula that has then been used to calculate the C content of the products is CH3-(CH2)11-CH2-CH2-(O-CH2-CH2)7-OH. In this molecule, all C has a fossile origin, as fatty alcohols are produced from petrochemical oil C2H4O
- fatty alcohol: 0.416 kg; source Schul W. 1995; lognormal variance with pedigree 0.0212, pedigree (2,3,4,5,1)
  Literature Value.
  properties: carbon content, fossil 0.0408973, carbon content, non-fossil 0.743434, dry mass 1 kg, heating value, net 41.01 MJ, wet mass 1 kg
  note on carbon content, fossil: The generic chemical structure of AE is: CH3-(CH2)n-CHR-CH2-(O-CH2-CH2)m-OH (n = 5-15, m = 2-100, R = H or n-alkyl). AE are produced by the reaction of fatty alcohols with ethylene oxide leading to a condensation of polyethylene glycolether groups on the alcohol chains (ecoinvent report 12-part 4). Fatty alcohols were considered to have an average length of C14. Ethoxylated alcohol (AE7) has an average value of seven polyether units (AE7) (ecoinvent report 12-part 4). The formula that has then been used to calculate the C content of the products is CH3-(CH2)11-CH2-CH2-(O-CH2-CH2)7-OH. In this molecule, all C has a fossile origin, as fatty alcohols are produced from petrochemical oil Fatty alcohols have chain lengths between C6 and C22, their chemical formula is CH3(CH2)nCH2OH (ecoinvent v2.2 report 12, pg 16). As an average, C14 was used. The dataset represents a mix of 27% produced from fatty acid splitting and 73% produced from methyl ester (ecoinvent v2.2 report 12, pg 21). In the methyl esterification, methanol (CH3OH) has a fossil origin
- heat, district or industrial, natural gas: 0.00388006, 0.23612 MJ (2 suppliers, which the file names only by identifier); sum of these 0.24 MJ; source Schul W. 1995; lognormal variance with pedigree 0.0212, pedigree (2,3,4,5,1)
  Literature Value.
  properties: heating value, net 1 MJ
- heat, district or industrial, other than natural gas: 0.459787, 0.000213011 MJ (2 suppliers, which the file names only by identifier); sum of these 0.46 MJ; source Schul W. 1995; lognormal variance with pedigree 0.0212, pedigree (2,3,4,5,1)
  Literature Value.
  properties: heating value, net 1 MJ
- nitrogen, liquid: 0.019 kg; source Schul W. 1995; lognormal variance with pedigree 0.0212, pedigree (2,3,4,5,1)
  Literature Value.
  properties: dry mass 1 kg, wet mass 1 kg
- tap water: 5.28156e-5, 8.05128e-5, 0.000150233, 0.000404717, 4.8717e-5, 0.00203022, 0.0232328 kg (7 suppliers, which the file names only by identifier); sum of these 0.026 kg; lognormal variance with pedigree 0.0106, pedigree (2,3,2,4,3)
  Calculated based on literature data published by the industry. This value is a 5-year average of data (2011 - 2015) published by the Gendorf factory (Gendorf, 2016, Umwelterklärung, www.gendorf.de), (Gendorf, 2015, Umwelterklärung, www.gendorf.de), (Gendorf, 2014, Umwelterklärung, www.gendorf.de). The amount of tap water per kg of chemical substance produced is calculated using literature data published by the Gendorf factory based in Germany, which produces a wide range of chemical substances. The factory produced 1657400 tonnes of chemical substances in the year 2015 (Gendorf, 2016, Umwelterklärung, www.gendorf.de) and 740000 tonnes of intermediate products. The amount of tap water consumed in the year 2015 was 55100 tonnes (Gendorf, 2016, Umwelterklärung, www.gendorf.de). The resulting amount of tap water is 0.023 kg/kg of chemical product produced. The 5-year average (2011 - 2015, weighted by production volume) is 0.026 kg/kg.
  properties: carbon content, fossil 0.00178991, dry mass 0.000337476 kg, water content 2962.17, wet mass 1 kg
  note on carbon content, fossil: Bicarbonate content is 2.93 mol/m3. CO2 content is 0.1 mol/m3 (ecoinvent v2.2 report 8, Tab 93.1).
- wastewater, average: -2.26904e-6, -8.07865e-9 m3 (2 suppliers, which the file names only by identifier); sum of these -2.27712e-6 m3; lognormal variance with pedigree 0.0452, pedigree (2,4,1,5,4)
  Calculated based on literature data published by the GENDORF Chemical Park. The factory produced an average of 2462760 tonnes of chemical substances (including intermediates) per year in the years 2015-2019. The average ouput of wastewater going to an external wastewater treatment plant in the years 2015-2019 was 5608 m3 per year. This equals 0.000002277 m3/kg chemical produced.
  References:
  Chemiepark GENDORF, Umwelterklärung 2016, https://www.gendorf.de/Nachbarn/Umweltschutz/Industrie%20und%20Nachhaltigkeit
  Chemiepark GENDORF, Umwelterklärung 2017, https://www.gendorf.de/Nachbarn/Umweltschutz/Industrie%20und%20Nachhaltigkeit
  Chemiepark GENDORF, Umwelterklärung 2020, https://www.gendorf.de/Nachbarn/Umweltschutz/Industrie%20und%20Nachhaltigkeit
  production volume; = RP_PV*BP_wastewater_average/ABS(RP)
    Calculated from the production volume of ethoxylated alcohol (AE7) in proportion to the respective output amounts.
  properties: carbon content, non-fossil 0.194039, dry mass 0.346837 kg, water content 2882.2, wet mass 1000 kg
  note on carbon content, non-fossil: 0.0673 kg TOC/m3 (Tab A.17, ecoinvent v2.2 report 13_I). TOC was considered as Total Carbon.

## Inputs from nature
- Water, cooling, unspecified natural origin [natural resource, in water]: 0.014707 m3; lognormal variance with pedigree 0.0454, pedigree (2,4,2,5,4)
  Calculated based on literature data published by the GENDORF Chemical Park. The factory produced an average of 2462760 tonnes of chemical substances (including intermediates) per year in the years 2015-2019. The average amount of cooling water released in the years 2015-2019 was 34408800 t per year. It was assumed that 5% of the cooling water was emitted to air during its use, therefore, to calculate the input of cooling water, the output value reported by GENDORF was scaled up by the factor 1/0.95. This equals 0.014707 m3/kg chemical produced.
  References:
  Chemiepark GENDORF, Umwelterklärung 2016, https://www.gendorf.de/Nachbarn/Umweltschutz/Industrie%20und%20Nachhaltigkeit
  Chemiepark GENDORF, Umwelterklärung 2017, https://www.gendorf.de/Nachbarn/Umweltschutz/Industrie%20und%20Nachhaltigkeit
  Chemiepark GENDORF, Umwelterklärung 2020, https://www.gendorf.de/Nachbarn/Umweltschutz/Industrie%20und%20Nachhaltigkeit
- Water, river [natural resource, in water]: 0.000965426 m3; lognormal variance with pedigree 0.0454, pedigree (2,4,2,5,4)
  Calculated based on literature data published by the GENDORF Chemical Park. The factory produced an average of 2462760 tonnes of chemical substances (including intermediates) per year in the years 2015-2019. The average consumption of river water in the years 2015-2019 was 22000820 t per year. However, since the cooling water is modelled as an input, the amount of river water was adjusted to avoid double counting. 55% of the input amount of cooling water was deducted from the amount of river water, as that is the share of river water versus well water. This equals 0.00096543 m3/kg chemical produced.
  References:
  Chemiepark GENDORF, Umwelterklärung 2016, https://www.gendorf.de/Nachbarn/Umweltschutz/Industrie%20und%20Nachhaltigkeit
  Chemiepark GENDORF, Umwelterklärung 2017, https://www.gendorf.de/Nachbarn/Umweltschutz/Industrie%20und%20Nachhaltigkeit
  Chemiepark GENDORF, Umwelterklärung 2020, https://www.gendorf.de/Nachbarn/Umweltschutz/Industrie%20und%20Nachhaltigkeit
- Water, well, in ground [natural resource, in water]: 0.000816522 m3; lognormal variance with pedigree 0.0454, pedigree (2,4,2,5,4)
  Calculated based on literature data published by the GENDORF Chemical Park. The factory produced an average of 2462760 tonnes of chemical substances (including intermediates) per year in the years 2015-2019. The average consumption of well water in the years 2015-2019 was 18607480 t per year. However, since the cooling water is modelled as an input, the amount of well water was adjusted to avoid double counting. 45% of the input amount of cooling water was deducted from the amount of well water, as that is the share of well water versus river water. This equals 0.00081652 m3/kg chemical produced.
  References:
  Chemiepark GENDORF, Umwelterklärung 2016, https://www.gendorf.de/Nachbarn/Umweltschutz/Industrie%20und%20Nachhaltigkeit
  Chemiepark GENDORF, Umwelterklärung 2017, https://www.gendorf.de/Nachbarn/Umweltschutz/Industrie%20und%20Nachhaltigkeit
  Chemiepark GENDORF, Umwelterklärung 2020, https://www.gendorf.de/Nachbarn/Umweltschutz/Industrie%20und%20Nachhaltigkeit

## Emissions to nature
- Aldehydes, unspecified [air, urban air close to ground]: 1.01e-5 kg; source Schul W. 1995; lognormal variance with pedigree 0.1412, pedigree (2,3,4,5,1)
  Calculated Value: calculated by comparing the aggregated emissions of the alcohol ethoxylates with the aggregated emissions of the fatty alcohols and of ethylene oxide.
- Ammonia [air, urban air close to ground]: 4.51e-6 kg; source Schul W. 1995; lognormal variance with pedigree 0.0612, pedigree (2,3,4,5,1)
  (same comment as for Aldehydes, unspecified)
- Carbon dioxide, fossil [air, urban air close to ground]: 0.0213 kg; source Schul W. 1995; lognormal variance with pedigree 0.0212, pedigree (2,3,4,5,1)
  (same comment as for Aldehydes, unspecified)
- Carbon monoxide, fossil [air, urban air close to ground]: 5.18e-5 kg; source Schul W. 1995; lognormal variance with pedigree 0.6612, pedigree (2,3,4,5,1)
  (same comment as for Aldehydes, unspecified)
- NMVOC, non-methane volatile organic compounds [air, urban air close to ground]: 0.00252 kg; source Schul W. 1995; lognormal variance with pedigree 0.0612, pedigree (2,3,4,5,1)
  (same comment as for Aldehydes, unspecified)
- Nitrogen oxides [air, urban air close to ground]: 9.93e-5 kg; source Schul W. 1995; lognormal variance with pedigree 0.0612, pedigree (2,3,4,5,1)
  (same comment as for Aldehydes, unspecified)
- Particulate Matter, > 10 um [air, urban air close to ground]: 8.44e-6 kg; source Schul W. 1995; lognormal variance with pedigree 0.0612, pedigree (2,3,4,5,1)
  (same comment as for Aldehydes, unspecified)
- Sulfur dioxide [air, urban air close to ground]: 0.00015 kg; source Schul W. 1995; lognormal variance with pedigree 0.0212, pedigree (2,3,4,5,1)
  (same comment as for Aldehydes, unspecified)
- Water [air, unspecified]: 0.00147008 m3; lognormal variance with pedigree 0.0848, pedigree (2,4,2,5,4)
  Calculated based on literature data published by the GENDORF Chemical Park. The factory produced an average of 2462760 tonnes of chemical substances (including intermediates) per year in the years 2015-2019. To determine the emissions of water to air, the difference of all water inputs (from river, well, tap water and cooling) and outputs (wastewater, emissions to water) was calculated. The average ouput of water to air in the years 2015-2019 was 3620444 m3 per year. This equals 0.00147 m3/kg chemical produced. For more information on the other water exchanges please consult the respective exchange comment.
  References:
  Chemiepark GENDORF, Umwelterklärung 2016, https://www.gendorf.de/Nachbarn/Umweltschutz/Industrie%20und%20Nachhaltigkeit
  Chemiepark GENDORF, Umwelterklärung 2017, https://www.gendorf.de/Nachbarn/Umweltschutz/Industrie%20und%20Nachhaltigkeit
  Chemiepark GENDORF, Umwelterklärung 2020, https://www.gendorf.de/Nachbarn/Umweltschutz/Industrie%20und%20Nachhaltigkeit
- Acidity, unspecified [water, surface water]: 6e-7 kg; source Schul W. 1995; lognormal variance with pedigree 0.0612, pedigree (2,3,4,5,1)
  (same comment as for Aldehydes, unspecified)
- Aluminium III [water, surface water]: 1.84e-10 kg; source Schul W. 1995; lognormal variance with pedigree 0.0612, pedigree (2,3,4,5,1)
  (same comment as for Aldehydes, unspecified)
- BOD5, Biological Oxygen Demand [water, unspecified]: 2.36665e-6 kg; lognormal variance with pedigree 0.218, pedigree (4,5,5,5,5)
  Calculated value. The BOD, COD, TOC and BOD5 are calculated based on the amount and type of emissions released to water in the same activity.
- COD, Chemical Oxygen Demand [water, unspecified]: 2.36665e-6 kg; lognormal variance with pedigree 0.218, pedigree (4,5,5,5,5)
  (same comment as for BOD5, Biological Oxygen Demand)
- Chloride [water, surface water]: 1.92e-6 kg; source Schul W. 1995; lognormal variance with pedigree 0.0612, pedigree (2,3,4,5,1)
  (same comment as for Aldehydes, unspecified)
- Chromium III [water, surface water]: 3.5e-8 kg; source Schul W. 1995; lognormal variance with pedigree 0.6612, pedigree (2,3,4,5,1)
  (same comment as for Aldehydes, unspecified)
- DOC, Dissolved Organic Carbon [water, unspecified]: 6.44583e-7 kg; lognormal variance with pedigree 0.218, pedigree (4,5,5,5,5)
  (same comment as for BOD5, Biological Oxygen Demand)
- Dissolved solids [water, surface water]: 2.56e-5 kg; source Schul W. 1995; lognormal variance with pedigree 0.0612, pedigree (2,3,4,5,1)
  (same comment as for Aldehydes, unspecified)
- Fluoride [water, surface water]: 2e-8 kg; source Schul W. 1995; lognormal variance with pedigree 0.0612, pedigree (2,3,4,5,1)
  (same comment as for Aldehydes, unspecified)
- Hydrocarbons, unspecified [water, surface water]: 4.48e-8 kg; source Schul W. 1995; lognormal variance with pedigree 0.3212, pedigree (2,3,4,5,1)
  (same comment as for Aldehydes, unspecified)
- Iron ion [water, surface water]: 4.29e-8 kg; source Schul W. 1995; lognormal variance with pedigree 0.6612, pedigree (2,3,4,5,1)
  (same comment as for Aldehydes, unspecified)
- Nickel II [water, surface water]: 1.39e-9 kg; source Schul W. 1995; lognormal variance with pedigree 0.6612, pedigree (2,3,4,5,1)
  (same comment as for Aldehydes, unspecified)
- Oils, unspecified [water, surface water]: 7.93e-7 kg; source Schul W. 1995; lognormal variance with pedigree 0.3212, pedigree (2,3,4,5,1)
  (same comment as for Aldehydes, unspecified)
- Phenol [water, surface water]: 3.17e-9 kg; source Schul W. 1995; lognormal variance with pedigree 0.3212, pedigree (2,3,4,5,1)
  (same comment as for Aldehydes, unspecified)
- Sulfate [water, surface water]: 8.88e-6 kg; source Schul W. 1995; lognormal variance with pedigree 0.0612, pedigree (2,3,4,5,1)
  (same comment as for Aldehydes, unspecified)
- Sulfide [water, surface water]: 2.6e-7 kg; source Schul W. 1995; lognormal variance with pedigree 0.0612, pedigree (2,3,4,5,1)
  (same comment as for Aldehydes, unspecified)
- Suspended solids, unspecified [water, surface water]: 5.6e-6 kg; source Schul W. 1995; lognormal variance with pedigree 0.0612, pedigree (2,3,4,5,1)
  (same comment as for Aldehydes, unspecified)
- TOC, Total Organic Carbon [water, unspecified]: 6.44583e-7 kg; lognormal variance with pedigree 0.218, pedigree (4,5,5,5,5)
  (same comment as for BOD5, Biological Oxygen Demand)
- Water [water, unspecified]: 0.0150391 m3; lognormal variance with pedigree 0.0848, pedigree (2,4,2,5,4)
  Calculated based on literature data published by the GENDORF Chemical Park. The factory produced an average of 2462760 tonnes of chemical substances (including intermediates) per year in the years 2015-2019. The amount of water released back to the environment consists of the sum of the amount of process water treated in the internal WWTP that is then released back to the environment and the amount of cooling water released back to the environment. The average ouput of the internal WWTP in the years 2015-2019 was 2628800 m3 and that of cooling water released back to the environment was 34408800 m3. This gives a yearly average of 37037600 m3 emissions of water to water. This equals 0.01504 m3/kg chemical produced.
  References:
  Chemiepark GENDORF, Umwelterklärung 2016, https://www.gendorf.de/Nachbarn/Umweltschutz/Industrie%20und%20Nachhaltigkeit
  Chemiepark GENDORF, Umwelterklärung 2017, https://www.gendorf.de/Nachbarn/Umweltschutz/Industrie%20und%20Nachhaltigkeit
  Chemiepark GENDORF, Umwelterklärung 2020, https://www.gendorf.de/Nachbarn/Umweltschutz/Industrie%20und%20Nachhaltigkeit
- Zinc II [water, surface water]: 1.88e-8 kg; source Schul W. 1995; lognormal variance with pedigree 0.6612, pedigree (2,3,4,5,1)
  (same comment as for Aldehydes, unspecified)

## Sampling procedure
Data from ECOSOL study of European Surfactant Industry. Some values are calculated based on data from a large chemical factory located in Germany. For more details, see the comments of the exchanges.

## Extrapolations
This dataset has been copied from an original dataset covering the geography RER. The uncertainty has been adjusted accordingly.

## Review by Emilia Moreno Ruiz 2017-08-08
This dataset was additionally reviewed in a separate review process by Eric Johnson of Atlantic Consulting as well as Emilia Moreno Ruiz and Gregor Wernet of ecoinvent.
