# treatment of waste paperboard, unsanitary landfill, very wet infiltration class (1000mm)

Dataset: EcoSpold 2, unit process
Geography: GLO
Time period: 2006-01-01 to 2023-12-31
Technology level: current
Classification: ISIC rev.4 ecoinvent: 3821:Treatment and disposal of non-hazardous waste
Scenario: Business-as-Usual
System model: Allocation, cut-off by classification
Share of production covered: 1 %
Generated by: Nikolia Stoikou
Database: ecoinvent
isCopyrightProtected: true
accessRestrictedTo: 1

## General comment
This dataset represents the activity of waste disposal of 'waste paperboard' in an unsanitary landfill. Recommended use of this dataset: for waste material going to unsanitary landfill in a very wet water infiltration class location, as part of unsorted, unmanaged, unscavenged municipal waste mixture. Inventoried waste consists of fraction: 100% cardboard. Waste composition (wet, in ppmw): gross heating value 15.61 MJ/kg; net heating value 14.21 MJ/kg; H2O 166670; O na; H 98787; C 640480; S 1636.9; N 6258.4; P 425.31; B na; Cl 1999.5; Br 16.085; F 37.789; I na; Ag 1.0092; As 3.0708; Ba 232.91; Cd 0.34562; Co 7.8638; Cr 8.6236; Cu 68.797; Hg 39.61; Mn 56.696; Mo 1.4747; Ni 3.6203; Pb 16.792; Sb 0.37339; Se 54.889; Sn 1.3466; V 3.1424; Zn 58.914; Be 3.9562; Sc 0.92389; Sr 131.11; Ti 26.807; Tl 0.49387; W 1.0665; Si 2204.6; Fe 978.5; Ca 66160; Al 6756.6; K 1750.7; Mg 2016.5; Na 3106.1. Share of carbon in initial waste that is biogenic 100%. Share of metals in waste not oxidised and bulk-recyclable (exclude very small or thin parts) Iron: 0%; Alu: 0%; Copper: 0%. Overall degradability of waste during 100 years: 32.44%. 0.002601 kg waste mass remains in the landfill even after the long term period.

## Included activities start
The activity starts with the waste being available at the gate of the treatment facility. Collection and transportation of the waste to the treatment plant is not included.

## Included activities end
The activity ends with the waste being treated and waste-specific emissions from the landfill are released to air via landfill gas, and to water via leachate.

## Geography
This dataset represents a landfill of 'infiltration class 5 very wet'. Landfill site with mean annual temperature (MAT) of 8 degC, mean annual precipitation (MAP) of 1900 mm/year, and net infiltration of 1000 mm/year. Temperature at site can result in permafrost conditions, which slows down water flow by a factor of (alpha t) 0.999. Total climate adjustments with alpha pt of 0.999. The leachate percolating through the landfill has an average residence time of 3.75 years.
Reference for climatic parameters: Doka, G., 2018, Inventory parameters for regionalised waste disposal mixes

## Technology
This is an inventory for an unsanitary, sub-controlled landfill for municipal solid waste. Ultimate average landfill height is 15 meters. Operation phase duration is 25 years. The total, waste-specific raw landfill gas mass produced in the landfill is 0.233 kg. The total CH4 mass in the raw landfill gas is 0.2015 kg. Percentage of landfill gas directly emitted is 100w%. Leachate of the landfill is not treated, but emitted untreated. Based on average waste composition and chosen climate data the end of carbonate phase is estimated to be reached 1733 years after waste deposition.

## Reference product
- waste paperboard: -1 kg; By-product classification Waste; CPC 39240: Waste and scrap of paper or paperboard; HS2017 470790: Paper or paperboard; waste and scrap, of paper or paperboard n.e.c. in heading no. 4707 and of unsorted was[...]
  main reference product of this activity
  production volume 3.58e9 kg
    Estimated based on the total amount of this waste being treated in the database. The value is then adjusted to reflect the current treatment in the given geography
  property price 0 EUR2005
    Waste products are assigned a price of zero as they are assumed to require further treatment.
  properties: aluminium content 0.00810789, antimony content 4.48068e-7, arsenic content 3.68496e-6, barium content 0.000279494, beryllium content 4.74739e-6, bromine content 1.93019e-5, cadmium content 4.14741e-7, calcium content 0.0793914, carbon allocation 0.640476 kg, carbon content 0.768571, carbon content, fossil 0, carbon content, non-fossil 0.768571, chlorine content 0.00239941, chromium content 1.03483e-5, cobalt content 9.43654e-6, copper content 8.25559e-5, dry mass 0.833333 kg, fluorine content 4.53473e-5, heating value, gross 15.6086 MJ, heating value, net 14.2064 MJ, hydrogen content 0.118545, iron content 0.0011742, lead content 2.01507e-5, magnesium content 0.00241986, manganese content 6.80349e-5, mercury content 4.75321e-5, molybdenum content 1.76966e-6, nickel content 4.34433e-6, nitrogen content 0.00751004, phosphorus content 0.000510375, potassium content 0.00210086, scandium content 1.10866e-6, selenium content 6.58672e-5, silicon content 0.00264546, silver content 1.21105e-6, sodium content 0.00372738, strontium content 0.000157332, sulfur content 0.0019643, thallium content 5.9265e-7, tin content 1.61597e-6, titanium content 3.21686e-5, tungsten content 1.27983e-6, vanadium content 3.77089e-6, water content 0.2, water in wet mass 0.166667 kg, wet mass 1 kg, zinc content 7.06966e-5

## Inputs from technosphere
- diesel, burned in building machine: 0.046738 MJ; lognormal variance with pedigree 0.32902, pedigree (1,1,4,1,1)
  waste distribution and compaction in unsanitary landfill;
  properties: heating value, net 1 MJ
- excavation, skid-steer loader: 0.00031708 m3; lognormal variance with pedigree 0.32902, pedigree (1,1,4,1,1)
  daily cover of waste in unsanitary landfill;

## Inputs from nature
- Organic carbon, placed in landfill [inventory indicator, waste]: 0.64048 kg; lognormal variance with pedigree 0.0140122, pedigree (1,1,4,1,1)
  organic carbon placed in unsanitary landfill (for ecoscarcity LCIA only);
- Waste mass, total, placed in landfill [inventory indicator, waste]: 1 kg; lognormal variance with pedigree 0.008, pedigree (1,1,4,1,1)
  waste mass placed in unsanitary landfill (for ecoscarcity LCIA only);
- Occupation, dump site [natural resource, land]: 0.0023333 m2*year; lognormal variance with pedigree 0.32902, pedigree (1,1,4,1,1)
  for operation phase of unsanitary landfill area;
- Transformation, from pasture, man made [natural resource, land]: 6.6667e-5 m2; lognormal variance with pedigree 0.32902, pedigree (1,1,4,1,1)
  for initial conversion of unsanitary landfill area;
- Transformation, to dump site [natural resource, land]: 6.6667e-5 m2; lognormal variance with pedigree 0.32902, pedigree (1,1,4,1,1)
  conversion to unsanitary landfill area;

## Emissions to nature
- Aluminium III [air, non-urban air or from high stacks]: 2.7359e-8 kg; lognormal variance with pedigree 1.8013, pedigree (1,1,4,1,1)
  landfill gas emission from unsanitary landfill (after 0% capture and utilization);
- Antimony ion [air, non-urban air or from high stacks]: 3.1896e-12 kg; lognormal variance with pedigree 1.9298, pedigree (1,1,4,1,1)
  landfill gas emission from unsanitary landfill (after 0% capture and utilization);
- Arsenic ion [air, non-urban air or from high stacks]: 2.5053e-9 kg; lognormal variance with pedigree 1.9298, pedigree (1,1,4,1,1)
  landfill gas emission from unsanitary landfill (after 0% capture and utilization);
- Barium II [air, non-urban air or from high stacks]: 2.1608e-8 kg; lognormal variance with pedigree 1.8231, pedigree (1,1,4,1,1)
  landfill gas emission from unsanitary landfill (after 0% capture and utilization);
- Beryllium II [air, non-urban air or from high stacks]: 1.8631e-11 kg; lognormal variance with pedigree 1.9298, pedigree (1,1,4,1,1)
  landfill gas emission from unsanitary landfill (after 0% capture and utilization);
- Bromine [air, non-urban air or from high stacks]: 1.8399e-7 kg; lognormal variance with pedigree 1.5616, pedigree (1,1,4,1,1)
  landfill gas emission from unsanitary landfill (after 0% capture and utilization);
- Cadmium II [air, non-urban air or from high stacks]: 1.3137e-10 kg; lognormal variance with pedigree 1.9298, pedigree (1,1,4,1,1)
  landfill gas emission from unsanitary landfill (after 0% capture and utilization);
- Calcium II [air, non-urban air or from high stacks]: 6.9781e-7 kg; lognormal variance with pedigree 1.4206, pedigree (1,1,4,1,1)
  landfill gas emission from unsanitary landfill (after 0% capture and utilization);
- Carbon dioxide, non-fossil [air, non-urban air or from high stacks]: 0.32542 kg; lognormal variance with pedigree 0.053334, pedigree (1,1,4,1,1)
  landfill gas emission from unsanitary landfill (after 0% capture and utilization);
- Chromium III [air, non-urban air or from high stacks]: 7.9624e-12 kg; lognormal variance with pedigree 1.9298, pedigree (1,1,4,1,1)
  landfill gas emission from unsanitary landfill (after 0% capture and utilization);
- Cobalt II [air, non-urban air or from high stacks]: 2.0474e-10 kg; lognormal variance with pedigree 1.9298, pedigree (1,1,4,1,1)
  landfill gas emission from unsanitary landfill (after 0% capture and utilization);
- Copper ion [air, non-urban air or from high stacks]: 3.1188e-11 kg; lognormal variance with pedigree 1.9298, pedigree (1,1,4,1,1)
  landfill gas emission from unsanitary landfill (after 0% capture and utilization);
- Hydrochloric acid [air, non-urban air or from high stacks]: 2.3516e-5 kg; lognormal variance with pedigree 0.92449, pedigree (1,1,4,1,1)
  landfill gas emission from unsanitary landfill (after 0% capture and utilization);
- Hydrogen fluoride [air, non-urban air or from high stacks]: 4.8807e-6 kg; lognormal variance with pedigree 1.2022, pedigree (1,1,4,1,1)
  landfill gas emission from unsanitary landfill (after 0% capture and utilization);
- Iron ion [air, non-urban air or from high stacks]: 1.0887e-9 kg; lognormal variance with pedigree 1.9298, pedigree (1,1,4,1,1)
  landfill gas emission from unsanitary landfill (after 0% capture and utilization);
- Lead II [air, non-urban air or from high stacks]: 1.0686e-11 kg; lognormal variance with pedigree 1.9298, pedigree (1,1,4,1,1)
  landfill gas emission from unsanitary landfill (after 0% capture and utilization);
- Magnesium [air, non-urban air or from high stacks]: 1.008e-7 kg; lognormal variance with pedigree 1.6222, pedigree (1,1,4,1,1)
  landfill gas emission from unsanitary landfill (after 0% capture and utilization);
- Manganese II [air, non-urban air or from high stacks]: 5.2599e-9 kg; lognormal variance with pedigree 1.9298, pedigree (1,1,4,1,1)
  landfill gas emission from unsanitary landfill (after 0% capture and utilization);
- Mercury II [air, non-urban air or from high stacks]: 3.5166e-7 kg; lognormal variance with pedigree 1.472, pedigree (1,1,4,1,1)
  landfill gas emission from unsanitary landfill (after 0% capture and utilization);
- Methane, non-fossil [air, non-urban air or from high stacks]: 0.15031 kg; lognormal variance with pedigree 0.093864, pedigree (1,1,4,1,1)
  landfill gas emission from unsanitary landfill (after 0% capture and utilization);
- Molybdenum VI [air, non-urban air or from high stacks]: 1.2597e-11 kg; lognormal variance with pedigree 1.9298, pedigree (1,1,4,1,1)
  landfill gas emission from unsanitary landfill (after 0% capture and utilization);
- Nickel II [air, non-urban air or from high stacks]: 1.7049e-11 kg; lognormal variance with pedigree 1.9298, pedigree (1,1,4,1,1)
  landfill gas emission from unsanitary landfill (after 0% capture and utilization);
- Nitrogen oxides [air, non-urban air or from high stacks]: 2.7812e-6 kg; lognormal variance with pedigree 0.65821, pedigree (1,1,4,1,1)
  landfill gas emission from unsanitary landfill (after 0% capture and utilization);
- Potassium I [air, non-urban air or from high stacks]: 1.0368e-7 kg; lognormal variance with pedigree 1.6179, pedigree (1,1,4,1,1)
  landfill gas emission from unsanitary landfill (after 0% capture and utilization);
- Scandium [air, non-urban air or from high stacks]: 6.7428e-12 kg; lognormal variance with pedigree 1.9298, pedigree (1,1,4,1,1)
  landfill gas emission from unsanitary landfill (after 0% capture and utilization);
- Selenium IV [air, non-urban air or from high stacks]: 4.6888e-10 kg; lognormal variance with pedigree 1.9298, pedigree (1,1,4,1,1)
  landfill gas emission from unsanitary landfill (after 0% capture and utilization);
- Silicon [air, non-urban air or from high stacks]: 8.9266e-9 kg; lognormal variance with pedigree 1.9298, pedigree (1,1,4,1,1)
  landfill gas emission from unsanitary landfill (after 0% capture and utilization);
- Silver I [air, non-urban air or from high stacks]: 4.5751e-13 kg; lognormal variance with pedigree 1.9298, pedigree (1,1,4,1,1)
  landfill gas emission from unsanitary landfill (after 0% capture and utilization);
- Sodium I [air, non-urban air or from high stacks]: 7.7634e-7 kg; lognormal variance with pedigree 1.3542, pedigree (1,1,4,1,1)
  landfill gas emission from unsanitary landfill (after 0% capture and utilization);
- Strontium II [air, non-urban air or from high stacks]: 6.1744e-10 kg; lognormal variance with pedigree 1.9298, pedigree (1,1,4,1,1)
  landfill gas emission from unsanitary landfill (after 0% capture and utilization);
- Sulfur dioxide [air, non-urban air or from high stacks]: 6.9216e-5 kg; lognormal variance with pedigree 0.87958, pedigree (1,1,4,1,1)
  landfill gas emission from unsanitary landfill (after 0% capture and utilization);
- Thallium I [air, non-urban air or from high stacks]: 2.3258e-12 kg; lognormal variance with pedigree 1.9298, pedigree (1,1,4,1,1)
  landfill gas emission from unsanitary landfill (after 0% capture and utilization);
- Tin ion [air, non-urban air or from high stacks]: 6.4278e-13 kg; lognormal variance with pedigree 1.9298, pedigree (1,1,4,1,1)
  landfill gas emission from unsanitary landfill (after 0% capture and utilization);
- Titanium ion [air, non-urban air or from high stacks]: 1.0855e-10 kg; lognormal variance with pedigree 1.9298, pedigree (1,1,4,1,1)
  landfill gas emission from unsanitary landfill (after 0% capture and utilization);
- Tungsten [air, non-urban air or from high stacks]: 9.1105e-12 kg; lognormal variance with pedigree 1.9298, pedigree (1,1,4,1,1)
  landfill gas emission from unsanitary landfill (after 0% capture and utilization);
- Vanadium V [air, non-urban air or from high stacks]: 2.6843e-11 kg; lognormal variance with pedigree 1.9298, pedigree (1,1,4,1,1)
  landfill gas emission from unsanitary landfill (after 0% capture and utilization);
- Zinc II [air, non-urban air or from high stacks]: 2.0096e-10 kg; lognormal variance with pedigree 1.9298, pedigree (1,1,4,1,1)
  landfill gas emission from unsanitary landfill (after 0% capture and utilization);
- Non-hazardous waste disposed [inventory indicator, waste]: 1 kg; lognormal variance with pedigree 0.008, pedigree (1,1,4,1,1)
  EN15804 waste mass in unsanitary landfill;
- Heat, waste [soil, industrial]: 1.6935 MJ; lognormal variance with pedigree 0.28596, pedigree (1,1,4,1,1)
  from decomposed waste material in unsanitary landfill;
- Aluminium III [water, ground-]: 0.00010943 kg; lognormal variance with pedigree 0.73102, pedigree (1,1,4,1,1)
  uncontrolled emissions in unsanitary landfill in moist climate;
- Aluminium III [water, ground-, long-term]: 0.0066471 kg; lognormal variance with pedigree 0.4229, pedigree (1,1,4,1,1)
  emissions to groundwater in unsanitary landfill;
- Ammonium [water, ground-]: 0.0019321 kg; lognormal variance with pedigree 0.43465, pedigree (1,1,4,1,1)
  uncontrolled emissions in unsanitary landfill in moist climate;
- Ammonium [water, ground-, long-term]: 0.0004867 kg; lognormal variance with pedigree 0.47697, pedigree (1,1,4,1,1)
  emissions to groundwater in unsanitary landfill;
- Antimony ion [water, ground-]: 1.2758e-8 kg; lognormal variance with pedigree 1.9298, pedigree (1,1,4,1,1)
  uncontrolled emissions in unsanitary landfill in moist climate;
- Antimony ion [water, ground-, long-term]: 1.5947e-8 kg; lognormal variance with pedigree 1.9298, pedigree (1,1,4,1,1)
  emissions to groundwater in unsanitary landfill;
- Arsenic ion [water, ground-]: 1.7871e-7 kg; lognormal variance with pedigree 1.6021, pedigree (1,1,4,1,1)
  uncontrolled emissions in unsanitary landfill in moist climate;
- Arsenic ion [water, ground-, long-term]: 2.5048e-7 kg; lognormal variance with pedigree 1.9298, pedigree (1,1,4,1,1)
  emissions to groundwater in unsanitary landfill;
- BOD5, Biological Oxygen Demand [water, ground-]: 0.0015651 kg; lognormal variance with pedigree 0.3854, pedigree (1,1,4,1,1)
  uncontrolled emissions in unsanitary landfill in moist climate;
- BOD5, Biological Oxygen Demand [water, ground-, long-term]: 0.1121 kg; lognormal variance with pedigree 0.01929, pedigree (1,1,4,1,1)
  emissions to groundwater in unsanitary landfill;
- Barium II [water, ground-]: 8.6432e-5 kg; lognormal variance with pedigree 0.88457, pedigree (1,1,4,1,1)
  uncontrolled emissions in unsanitary landfill in moist climate;
- Barium II [water, ground-, long-term]: 0.00014646 kg; lognormal variance with pedigree 0.86346, pedigree (1,1,4,1,1)
  emissions to groundwater in unsanitary landfill;
- Beryllium II [water, ground-]: 7.4524e-8 kg; lognormal variance with pedigree 1.689, pedigree (1,1,4,1,1)
  uncontrolled emissions in unsanitary landfill in moist climate;
- Beryllium II [water, ground-, long-term]: 3.8816e-6 kg; lognormal variance with pedigree 1.3981, pedigree (1,1,4,1,1)
  emissions to groundwater in unsanitary landfill;
- Bromine [water, ground-]: 1.3124e-5 kg; lognormal variance with pedigree 1.2143, pedigree (1,1,4,1,1)
  uncontrolled emissions in unsanitary landfill in moist climate;
- Bromine [water, ground-, long-term]: 2.7765e-6 kg; lognormal variance with pedigree 1.2382, pedigree (1,1,4,1,1)
  emissions to groundwater in unsanitary landfill;
- COD, Chemical Oxygen Demand [water, ground-]: 0.006611 kg; lognormal variance with pedigree 0.3854, pedigree (1,1,4,1,1)
  uncontrolled emissions in unsanitary landfill in moist climate;
- COD, Chemical Oxygen Demand [water, ground-, long-term]: 0.47354 kg; lognormal variance with pedigree 0.01929, pedigree (1,1,4,1,1)
  emissions to groundwater in unsanitary landfill;
- Cadmium II [water, ground-]: 1.9705e-8 kg; lognormal variance with pedigree 1.8872, pedigree (1,1,4,1,1)
  uncontrolled emissions in unsanitary landfill in moist climate;
- Cadmium II [water, ground-, long-term]: 3.2578e-7 kg; lognormal variance with pedigree 1.7145, pedigree (1,1,4,1,1)
  emissions to groundwater in unsanitary landfill;
- Calcium II [water, ground-]: 0.0027913 kg; lognormal variance with pedigree 0.37114, pedigree (1,1,4,1,1)
  uncontrolled emissions in unsanitary landfill in moist climate;
- Calcium II [water, ground-, long-term]: 0.063368 kg; lognormal variance with pedigree 0.16795, pedigree (1,1,4,1,1)
  emissions to groundwater in unsanitary landfill;
- Chloride [water, ground-]: 0.0016315 kg; lognormal variance with pedigree 0.57719, pedigree (1,1,4,1,1)
  uncontrolled emissions in unsanitary landfill in moist climate;
- Chloride [water, ground-, long-term]: 0.00034514 kg; lognormal variance with pedigree 0.60113, pedigree (1,1,4,1,1)
  emissions to groundwater in unsanitary landfill;
- Chromium VI [water, ground-]: 3.185e-8 kg; lognormal variance with pedigree 1.7816, pedigree (1,1,4,1,1)
  uncontrolled emissions in unsanitary landfill in moist climate;
- Chromium VI [water, ground-, long-term]: 1.6675e-8 kg; lognormal variance with pedigree 1.9298, pedigree (1,1,4,1,1)
  emissions to groundwater in unsanitary landfill;
- Cobalt II [water, ground-]: 8.1897e-7 kg; lognormal variance with pedigree 1.4243, pedigree (1,1,4,1,1)
  uncontrolled emissions in unsanitary landfill in moist climate;
- Cobalt II [water, ground-, long-term]: 7.0446e-6 kg; lognormal variance with pedigree 1.3084, pedigree (1,1,4,1,1)
  emissions to groundwater in unsanitary landfill;
- Copper ion [water, ground-]: 1.0916e-7 kg; lognormal variance with pedigree 1.6131, pedigree (1,1,4,1,1)
  uncontrolled emissions in unsanitary landfill in moist climate;
- Copper ion [water, ground-, long-term]: 6.8687e-5 kg; lognormal variance with pedigree 1.0198, pedigree (1,1,4,1,1)
  emissions to groundwater in unsanitary landfill;
- DOC, Dissolved Organic Carbon [water, ground-]: 0.0060444 kg; lognormal variance with pedigree 0.3854, pedigree (1,1,4,1,1)
  uncontrolled emissions in unsanitary landfill in moist climate;
- DOC, Dissolved Organic Carbon [water, ground-, long-term]: 0.43295 kg; lognormal variance with pedigree 0.01929, pedigree (1,1,4,1,1)
  emissions to groundwater in unsanitary landfill;
- Fluoride [water, ground-]: 8.9952e-7 kg; lognormal variance with pedigree 1.3643, pedigree (1,1,4,1,1)
  uncontrolled emissions in unsanitary landfill in moist climate;
- Fluoride [water, ground-, long-term]: 3.2253e-5 kg; lognormal variance with pedigree 1.1013, pedigree (1,1,4,1,1)
  emissions to groundwater in unsanitary landfill;
- Heat, waste [water, ground-, long-term]: 10.551 MJ; lognormal variance with pedigree 0.099649, pedigree (1,1,4,1,1)
  from decomposed waste material in unsanitary landfill;
- Hydrogen sulfide [water, ground-]: 1.4387e-5 kg; lognormal variance with pedigree 0.7057, pedigree (1,1,4,1,1)
  uncontrolled emissions in unsanitary landfill in moist climate;
- Hydrogen sulfide [water, ground-, long-term]: 0.00010233 kg; lognormal variance with pedigree 0.60324, pedigree (1,1,4,1,1)
  emissions to groundwater in unsanitary landfill;
- Iron ion [water, ground-]: 4.3548e-6 kg; lognormal variance with pedigree 1.1314, pedigree (1,1,4,1,1)
  uncontrolled emissions in unsanitary landfill in moist climate;
- Iron ion [water, ground-, long-term]: 0.00097414 kg; lognormal variance with pedigree 0.66845, pedigree (1,1,4,1,1)
  emissions to groundwater in unsanitary landfill;
- Lead II [water, ground-]: 3.2059e-8 kg; lognormal variance with pedigree 1.7769, pedigree (1,1,4,1,1)
  uncontrolled emissions in unsanitary landfill in moist climate;
- Lead II [water, ground-, long-term]: 1.676e-5 kg; lognormal variance with pedigree 1.2073, pedigree (1,1,4,1,1)
  emissions to groundwater in unsanitary landfill;
- Magnesium [water, ground-]: 0.0004032 kg; lognormal variance with pedigree 0.63955, pedigree (1,1,4,1,1)
  uncontrolled emissions in unsanitary landfill in moist climate;
- Magnesium [water, ground-, long-term]: 0.0016133 kg; lognormal variance with pedigree 0.57707, pedigree (1,1,4,1,1)
  emissions to groundwater in unsanitary landfill;
- Manganese II [water, ground-]: 2.1039e-5 kg; lognormal variance with pedigree 1.0725, pedigree (1,1,4,1,1)
  uncontrolled emissions in unsanitary landfill in moist climate;
- Manganese II [water, ground-, long-term]: 3.5651e-5 kg; lognormal variance with pedigree 1.0514, pedigree (1,1,4,1,1)
  emissions to groundwater in unsanitary landfill;
- Mercury II [water, ground-]: 8.7916e-7 kg; lognormal variance with pedigree 1.3658, pedigree (1,1,4,1,1)
  uncontrolled emissions in unsanitary landfill in moist climate;
- Mercury II [water, ground-, long-term]: 3.8379e-5 kg; lognormal variance with pedigree 1.0934, pedigree (1,1,4,1,1)
  emissions to groundwater in unsanitary landfill;
- Molybdenum VI [water, ground-]: 5.0389e-8 kg; lognormal variance with pedigree 1.7525, pedigree (1,1,4,1,1)
  uncontrolled emissions in unsanitary landfill in moist climate;
- Molybdenum VI [water, ground-, long-term]: 2.7572e-7 kg; lognormal variance with pedigree 1.9298, pedigree (1,1,4,1,1)
  emissions to groundwater in unsanitary landfill;
- Nickel II [water, ground-]: 6.8197e-8 kg; lognormal variance with pedigree 1.7006, pedigree (1,1,4,1,1)
  uncontrolled emissions in unsanitary landfill in moist climate;
- Nickel II [water, ground-, long-term]: 3.5521e-6 kg; lognormal variance with pedigree 1.4097, pedigree (1,1,4,1,1)
  emissions to groundwater in unsanitary landfill;
- Nitrate [water, ground-]: 0.0002032 kg; lognormal variance with pedigree 0.43465, pedigree (1,1,4,1,1)
  uncontrolled emissions in unsanitary landfill in moist climate;
- Nitrate [water, ground-, long-term]: 5.1184e-5 kg; lognormal variance with pedigree 0.47697, pedigree (1,1,4,1,1)
  emissions to groundwater in unsanitary landfill;
- Nitrite [water, ground-]: 0.00010516 kg; lognormal variance with pedigree 0.43465, pedigree (1,1,4,1,1)
  uncontrolled emissions in unsanitary landfill in moist climate;
- Nitrite [water, ground-, long-term]: 2.649e-5 kg; lognormal variance with pedigree 0.47697, pedigree (1,1,4,1,1)
  emissions to groundwater in unsanitary landfill;
- Nitrogen, organic bound [water, ground-]: 0.003158 kg; lognormal variance with pedigree 0.43465, pedigree (1,1,4,1,1)
  uncontrolled emissions in unsanitary landfill in moist climate;
- Nitrogen, organic bound [water, ground-, long-term]: 0.00079547 kg; lognormal variance with pedigree 0.47697, pedigree (1,1,4,1,1)
  emissions to groundwater in unsanitary landfill;
- Phosphate [water, ground-]: 2.3614e-5 kg; lognormal variance with pedigree 1.0732, pedigree (1,1,4,1,1)
  uncontrolled emissions in unsanitary landfill in moist climate;
- Phosphate [water, ground-, long-term]: 8.6056e-5 kg; lognormal variance with pedigree 1.9298, pedigree (1,1,4,1,1)
  emissions to groundwater in unsanitary landfill;
- Potassium I [water, ground-]: 0.00041474 kg; lognormal variance with pedigree 0.64612, pedigree (1,1,4,1,1)
  uncontrolled emissions in unsanitary landfill in moist climate;
- Potassium I [water, ground-, long-term]: 0.0013359 kg; lognormal variance with pedigree 0.59594, pedigree (1,1,4,1,1)
  emissions to groundwater in unsanitary landfill;
- Scandium [water, ground-]: 2.6971e-8 kg; lognormal variance with pedigree 1.83, pedigree (1,1,4,1,1)
  uncontrolled emissions in unsanitary landfill in moist climate;
- Scandium [water, ground-, long-term]: 8.9691e-7 kg; lognormal variance with pedigree 1.5878, pedigree (1,1,4,1,1)
  emissions to groundwater in unsanitary landfill;
- Selenium IV [water, ground-]: 1.8755e-6 kg; lognormal variance with pedigree 1.2754, pedigree (1,1,4,1,1)
  uncontrolled emissions in unsanitary landfill in moist climate;
- Selenium IV [water, ground-, long-term]: 7.0056e-6 kg; lognormal variance with pedigree 1.9298, pedigree (1,1,4,1,1)
  emissions to groundwater in unsanitary landfill;
- Silicon [water, ground-]: 3.5707e-5 kg; lognormal variance with pedigree 0.87153, pedigree (1,1,4,1,1)
  uncontrolled emissions in unsanitary landfill in moist climate;
- Silicon [water, ground-, long-term]: 1.9711e-5 kg; lognormal variance with pedigree 1.9298, pedigree (1,1,4,1,1)
  emissions to groundwater in unsanitary landfill;
- Silver I [water, ground-]: 1.6013e-9 kg; lognormal variance with pedigree 1.9298, pedigree (1,1,4,1,1)
  uncontrolled emissions in unsanitary landfill in moist climate;
- Silver I [water, ground-, long-term]: 1.0076e-6 kg; lognormal variance with pedigree 1.5762, pedigree (1,1,4,1,1)
  emissions to groundwater in unsanitary landfill;
- Sodium I [water, ground-]: 0.0031054 kg; lognormal variance with pedigree 0.51973, pedigree (1,1,4,1,1)
  uncontrolled emissions in unsanitary landfill in moist climate;
- Sodium I [water, ground-, long-term]: 3.1061e-12 kg; lognormal variance with pedigree 1.9298, pedigree (1,1,4,1,1)
  emissions to groundwater in unsanitary landfill;
- Strontium II [water, ground-]: 2.4698e-6 kg; lognormal variance with pedigree 1.2249, pedigree (1,1,4,1,1)
  uncontrolled emissions in unsanitary landfill in moist climate;
- Strontium II [water, ground-, long-term]: 0.00012864 kg; lognormal variance with pedigree 0.93402, pedigree (1,1,4,1,1)
  emissions to groundwater in unsanitary landfill;
- Sulfate [water, ground-]: 0.00055192 kg; lognormal variance with pedigree 0.7057, pedigree (1,1,4,1,1)
  uncontrolled emissions in unsanitary landfill in moist climate;
- Sulfate [water, ground-, long-term]: 0.0039255 kg; lognormal variance with pedigree 0.60324, pedigree (1,1,4,1,1)
  emissions to groundwater in unsanitary landfill;
- TOC, Total Organic Carbon [water, ground-]: 0.0060444 kg; lognormal variance with pedigree 0.3854, pedigree (1,1,4,1,1)
  uncontrolled emissions in unsanitary landfill in moist climate;
- TOC, Total Organic Carbon [water, ground-, long-term]: 0.43295 kg; lognormal variance with pedigree 0.01929, pedigree (1,1,4,1,1)
  emissions to groundwater in unsanitary landfill;
- Thallium I [water, ground-]: 9.3033e-9 kg; lognormal variance with pedigree 1.9298, pedigree (1,1,4,1,1)
  uncontrolled emissions in unsanitary landfill in moist climate;
- Thallium I [water, ground-, long-term]: 4.8457e-7 kg; lognormal variance with pedigree 1.6685, pedigree (1,1,4,1,1)
  emissions to groundwater in unsanitary landfill;
- Tin ion [water, ground-]: 2.5711e-9 kg; lognormal variance with pedigree 1.9298, pedigree (1,1,4,1,1)
  uncontrolled emissions in unsanitary landfill in moist climate;
- Tin ion [water, ground-, long-term]: 1.3441e-6 kg; lognormal variance with pedigree 1.5388, pedigree (1,1,4,1,1)
  emissions to groundwater in unsanitary landfill;
- Titanium ion [water, ground-]: 4.3419e-7 kg; lognormal variance with pedigree 1.4533, pedigree (1,1,4,1,1)
  uncontrolled emissions in unsanitary landfill in moist climate;
- Titanium ion [water, ground-, long-term]: 2.6373e-5 kg; lognormal variance with pedigree 1.1452, pedigree (1,1,4,1,1)
  emissions to groundwater in unsanitary landfill;
- Tungsten [water, ground-]: 3.6442e-8 kg; lognormal variance with pedigree 1.7945, pedigree (1,1,4,1,1)
  uncontrolled emissions in unsanitary landfill in moist climate;
- Tungsten [water, ground-, long-term]: 1.7729e-7 kg; lognormal variance with pedigree 1.9298, pedigree (1,1,4,1,1)
  emissions to groundwater in unsanitary landfill;
- Vanadium V [water, ground-]: 1.0737e-7 kg; lognormal variance with pedigree 1.6537, pedigree (1,1,4,1,1)
  uncontrolled emissions in unsanitary landfill in moist climate;
- Vanadium V [water, ground-, long-term]: 4.1572e-7 kg; lognormal variance with pedigree 1.9298, pedigree (1,1,4,1,1)
  emissions to groundwater in unsanitary landfill;
- Zinc II [water, ground-]: 9.043e-7 kg; lognormal variance with pedigree 1.3548, pedigree (1,1,4,1,1)
  uncontrolled emissions in unsanitary landfill in moist climate;
- Zinc II [water, ground-, long-term]: 5.8009e-5 kg; lognormal variance with pedigree 1.0405, pedigree (1,1,4,1,1)
  emissions to groundwater in unsanitary landfill;
