# electricity production, lignite

Dataset: EcoSpold 2, unit process
Geography: RO
Time period: 1980-01-01 to 2023-12-31
Technology level: modern
Classification: ISIC rev.4 ecoinvent: 3510:Electric power generation, transmission and distribution
Classification: EcoSpold01Categories: lignite/power plants
Synonyms: sub-bituminous coal; brown coal
Tags: coal power; lignite power; fossil fuels
Scenario: Business-as-Usual
System model: Allocation, cut-off by classification
Generated by: Karin Treyer
Published in: Röder, A. 2007
Database: ecoinvent
isCopyrightProtected: true
accessRestrictedTo: 1

## General comment
This dataset represents the production of high voltage electricity in an average lignite power plant in Romania in 2012. "Lignite" is used as representant for "brown coal", which includes sub-bituminous coal and lignite according to the definition of the IEA electricity information 2014. (IEA. 2014. Electricity Information 2014. ISBN 978-92-64-21692-1. International Energy Agency (IEA), Paris Cedex (FR).)
All exchanges in this dataset except for emissions of SO2, NOx and particles are production-weighted averages of the figures in the datasets in ecoinvent version two, which are valid for the following 10 countries: AT, BA, CZ, DE, ES, FR, HU, PL, SI, SK. The exception values are production-weighted averages of version 2 countries and the new countries in version 3 (AU, CA, CL, ID, IN, KR, MX, MY, PE, RU, TH, TR, TW, TZ, UA, ZA){{children_only}}
Comments on the inventory data of emissions:
- for the assessment of main characteristics (sulphur and ash content of coal, efficiency of the plant) and CO2 a bottom-up approach has been used. It consists in the collection of information about single plants.
- Halogene emissions have been estimated on the basis of the content of the species in the country-specific coal input mix, assuming average retention rates.
- For CO and particle emissions average values for the former UCTE are included (Union for the Coordination of the Transmission of Electricity, since 2009 replaced by ENTSO-E European Network of Transmission System Operators for Electricity).
- The country specific emissions of N2O depend on the share of DeNOx. - Emissions of trace elements were calculated by means of a formula (CORINAIR) using the ash content in the country-specific coal input mix and average transfer coefficients for coal power plants, taking into account the share of DeSOx installed.
- Emission of uranium and thorium radioactive isotopes were assumed proportional to the corresponding element emitted with particles; the other non-gaseous radioactive isotopes of the uranium and thorium decay chain were assumed proportional to the emitted U-238 or Th-232.
- The emission of gaseous radon and K-40 are taken from the literature.
The module describes the average for the country. The plant is used for middle load with 6000 hours of operation at full capacity per year. The plant is assumed to operate 200000 hours during its lifetime. For the assessment of main characteristics (LHV, sulphur and ash content of coal, efficiency of the plant) and criteria emissions (SOx, NOx, particles, and CO2) a bottom-up approach has been used. It consists on the collection of information about single plants. Base data on all major UCTE power plants in 1993 have been integrated, to the extent possible, with updated information for year 2000 (v1.0) and 2004-2005 (v2.0). The size distribution of particles has been derived from German data. Halogene emissions have been estimated on the basis of the content of the species in the country-specific coal input mix, assuming average retention rates. For CO and VOC-emissions average values for UCTE are included. Two average values for N2O emissions from UCTE plants are considered for the two cases with or without DeNOx; the country specific emission depend therefore on the share of DeNOx. Emissions of trace elements were calculated by means of a formula (CORINAIR) using the ash content in the country-specific coal input mix and average transfer coefficients for coal power plants, taking into account the share of DeSOx installed. Emission of uranium and thorium radioactive isotopes were assumed proportional to the corresponding element emitted with particles; the other non-gaseous radioactive isotopes of the uranium and thorium decay chain were assumed proportional to the emitted U-238 or Th-232. The emission of gaseous radon and K-40 are taken from the literature. The waste heat releases to air and water have been allocated on the basis of the assumed share of river cooled power plants and assumptions on the direct losses to air. The share of the recycled ash is country-specific. For the disposal of the remaining ash, typical country-specific compositions are taken into account in appropriate disposal modules.
[This dataset was already contained in the ecoinvent database version 2. It was not individually updated during the transfer to ecoinvent version 3. Life Cycle Impact Assessment results may still have changed, as they are affected by changes in the supply chain, i.e. in other datasets. This dataset was generated following the ecoinvent quality guidelines for version 2. It may have been subject to central changes described in the ecoinvent version 3 change report (http://www.ecoinvent.org/database/ecoinvent-version-3/reports-of-changes/), and the results of the central updates were reviewed extensively. The changes added e.g. consistent water flows and other information throughout the database. The documentation of this dataset can be found in the ecoinvent reports of version 2, which are still available via the ecoinvent website. The change report linked above covers all central changes that were made during the conversion process.]
[This dataset is meant to replace the following datasets:
- electricity production, hard coal, RO, 1993 - 2005]

## Included activities start
From the constructed lignite power plant ready to produce electricity.

From reception of lignite and operating materials at power plant gate.

## Included activities end
Energy conversion for electricity production. Particle removal is included in this module. DeSOx is described in a different module; it is applied here according to the actual use in the country; SOx emission is the reduced one. There is no information about the use of DeNOx in the country. It is assumed that 25 % of the plants are river cooled, 75 % use cooling tower (average UCTE). The water treatment is described in separate modules. The disposal of non-recycled ashes is modelled separately.

## Technology
POWER PLANT:
Lignite power plant input is a dataset which consists of a mix of 30% 100MW power plant and 70% 500MW power plant. The plants are used for basic load with 6000 hours of operation at full capacity per year. The plants are assumed to operate 200000 hours during its lifetime.
Average installed technology.
- Share of installed capacity with desulfurisation: 20% (rough estimation based on sulfur mass balance
- Average efficiency of desulfurisation installations: 92% (rough estimation based on Dones et al. 2007
- Share of installed capacity with denitrification: 73% (figure based on IEA 2012 )
- Average efficiency of denitrification installations: 80% (estimation based on Dones et al. 2007, p.128. Valid for selective catalytic reaction systems)
- Share of installed capacity with particle filters: 98% (figure based on IEA 2012 )
- Average efficiency of particle filters: 98% (figure based on IEA 2012 )
Sources :
1) Victoria: http://new.dpi.vic.gov.au/energy-future/our-energy-story/energy-in-victoria/resources-in-victoria-map
2) Queensland: http://www.dme.qld.gov.au/Energy/power_stations.cfm
3) New South Wales: http://www.industry.nsw.gov.au/energy/electricity/generation
4) Map of Fossil Fuel Power Stations in Australia, DEWHA, http://www.ga.gov.au/fossil_fuel/
5) IEA 2012. Coal Power Database. International Energy Agency Clean Coal Centre, London
6) Australian National Pollutant Inventory, http://www.npi.gov.au/
7) IEA/OECD. 2010. Electricity Information 2010. International Energy Agency (IEA), Paris Cedex (FR). Part IV. Detailed OECD Electricity And Heat Data.
8) Dones, R., Bauer, C., Röder, A. (2007) Kohle. In: Dones, R. (Ed.) et al., Sachbilanzen von Energiesystemen: Grundlagen für den ökologischen Vergleich von Energiesystemen und den Einbezug von Energiesystemen in Ökobilanzen für die Schweiz. Final report ecoinvent No. 6-VI, Paul Scherrer Institut Villigen, Swiss Centre for Life Cycle Inventories, Dübendorf, CH.

## Time period
The Annual Production Volume is valid for the year 2012.

## Parameters
- efficiency: 0.284 dimensionless; lognormal variance with pedigree 0.003825, pedigree (3,3,1,2,2)
  Literature value/calculated value. Net electrical efficiency based on the lower heating value (LHV).
  For all OECD countries, the IEA Electricity information 2014 provides data for the year 2012 on fuel input (TJ, Net calorific value NCV) and gross electricity production (GWh) as well as heat production (TJ) in tables 8 and 9 for each country for electricity only and Combined Heat and Power (CHP) plants each. Together with the information on own use (see parameter "losses"), the net electrical efficiency based on the NCV is calculated.
  For all non-OECD countries, data from the IEA Energy balances of non-OECD countries 2014 have been used. These tables do not always provide information on how much of the electricity has been produced in electricity only and in CHP plants, but often give the total value only.
  IEA. 2014. Electricity Information 2014. ISBN 978-92-64-21692-1. International Energy Agency (IEA), Paris Cedex (FR).
  IEA/OECD. 2014. Energy balances of non-OECD countries 2014. International Energy Agency (IEA), Paris Cedex (FR).
  output relative to input (requires additional specification)
- factor: input of MJ for the production of 1 kWh: 12.6761 MJ/kWh; name factor_MJ_kWh; = 1*3.6/efficiency; lognormal variance with pedigree 0.0532, pedigree (4,4,3,4,4)
  Calculated value. 3.6 MJ = 1kWh.
  nan
- fraction, cooling water, to air: 0.0251074 dimensionless; name fraction_CW_to_air; lognormal variance with pedigree 0.092025, pedigree (4,4,3,2,4)
  Calculated
  nan
- fraction, process water, to air: 0.15 dimensionless; name fraction_PW_to_air; lognormal variance with pedigree 0.092025, pedigree (4,4,3,2,4)
  Literature value. In case when no industry/process specific data are available, default evaporation fraction value is used. This value is 15% and is based on literature (Statistics Canada, 2007 & Shaffer, K.H., 2008, Consumptive water use in the Great Lakes Basin, USGS & Shiklomanov, 2003, World Water Resources at the Beginning of the 21st Century) and has been approved by an expert.
  nan
- fraction, water, completely softened, to air: 0.15 dimensionless; name fraction_WCS_to_air; = fraction_PW_to_air; lognormal variance with pedigree 0.092025, pedigree (4,4,3,2,4)
  Calculated value. See comment in the other parametres present in this dataset. Water, completely softened is considered to be always used as process water, thus process water fractions to air are applied to all water, completely softened input flows to calculate the amount of water consumed in the processes.
  nan
- fraction, water, decarbonised, to air: 0.0251074 dimensionless; name fraction_WDC_to_air; = fraction_CW_to_air; lognormal variance with pedigree 0.092025, pedigree (4,4,3,2,4)
  Calculated value. See comments in the other parametres present in this dataset. Decarbonised water is considered to be always used as cooling water, thus cooling water fractions to air are applied to all carbonised water input flows to calculate the amount of water consumed in the processes.
  nan
- gross electricity production: 2.29e10 kWh; name gross_electricity; lognormal variance with pedigree 0.001225, pedigree (2,1,1,2,1)
  Literature value/statistics. Taken from the IEA electricity information 2014, table 1.3.
  IEA. 2014. Electricity Information 2014. ISBN 978-92-64-21692-1. International Energy Agency (IEA), Paris Cedex (FR).
  nan
- losses from gross electricity production: 0.07 dimensionless; name gross_net_electricity; lognormal variance with pedigree 0.003525, pedigree (3,2,2,2,2)
  Calculated value. Own use of electricity plants in this country in 2012. For the non-OECD countries, the losses were first calculated for the total electricity sector based on the IEA electricity information 2014, table 1.1 (net electricity = gross electricity minus own use). However, this value can be very low if the share of electricity from fossiles is low in a specific country. Therefore, the default loss as described by the IEA in the electricity statistic is applied, which is 0.07 (IEA electricity information 2014: The difference between gross and net electricity production is generally observed to be about 7% for conventional thermal stations, 1% for hydro stations and 6% for nuclear.)
  IEA. 2014. Electricity Information 2014. ISBN 978-92-64-21692-1. International Energy Agency (IEA), Paris Cedex (FR).
  nan
  Uncertainty: g
- once-through and cooling pond cooling systems as a fraction of all cooling syste: 0.73 dimensionless; name once_through_andCP_CS_fractio_from_allCS; lognormal variance with pedigree 0.092025, pedigree (4,4,3,2,4)
  Calculated as an average of data available for Europe (Floerke, 2008, Future changes of freshwater needs in the electricity production sector) and USA (NERL, 2011, Estimating freshwater needs to meet future thermoelectric generation requirements).
  nan
- recirculating cooling system as a fraction of all cooling systems: 0.27 dimensionless; name recirculating_CS_fraction_from_allCS; lognormal variance with pedigree 0.092025, pedigree (4,4,3,2,4)
  (same comment as for once-through and cooling pond cooling systems as a fraction of all coo)
- water consumption, electricity production from hard coal, once-through and cooli: 0.0014 m3/kWh; name WConsumption_EP_HC_once_through_andCP_CS; lognormal variance with pedigree 0.092025, pedigree (4,4,3,2,4)
  Estimated based on literature (Scown, 2011, Water Footprint of U.S. Transportation Fuels, SI). The amount of water consumed while burning lignite and peat is assumed to be the same as in case of coal.
  nan
- water consumption, electricity production from hard coal, recirculating CS: 0.0018 m3/kWh; name WConsumption_EP_HC_recirculatingCS; lognormal variance with pedigree 0.092025, pedigree (4,4,3,2,4)
  (same comment as for water consumption, electricity production from hard coal, once-through)
- water withdrawal, electricity production from hard coal, once-through and coolin: 0.0815 m3/kWh; name WWithdrawal_EP_HC_once_through_andCP_CS; lognormal variance with pedigree 0.092025, pedigree (4,4,3,2,4)
  Estimated based on literature (Scown, 2011, Water Footprint of U.S. Transportation Fuels, SI). The amount of water withdrawn while burning lignite and peat is assumed to be the same as in case of coal.
  nan
- water withdrawal, electricity production from hard coal, recirculating CS: 0.0021 m3/kWh; name WWithdrawal_EP_HC_recirculating_CS; lognormal variance with pedigree 0.092025, pedigree (4,4,3,2,4)
  (same comment as for water withdrawal, electricity production from hard coal, once-through )

## Reference product
- electricity, high voltage: 1 kWh; name electricity; = 0.0952380952380952 * factor_MJ_kWh; By-product classification allocatable product; CPC 17100: Electrical energy; HS2017 271600: Electrical energy
  Amount was scaled to 1.
  production volume 5.94047e9 kWh; name electricity_apv; = gross_electricity*(1- gross_net_electricity)
    Calculated value
  property price 0.0977 EUR2005
    Temporary price data. Calculated as 90% of purchasers price based on: 94% of the average price (to account for a 6% loss in transformation and transmission) for electricity for industrial consumersin 2005 (excluded taxes). From IEA.
  properties: carbon allocation 0 kg, carbon content 0

## Inputs from technosphere
- SOx retained, in lignite flue gas desulfurisation: 0.0061425 kg; name sox_retained; = 0.000585 * factor_MJ_kWh; source Itten R. 2012; lognormal variance with pedigree 0.01, pedigree (3,1,4,1,1)
  See power plant data base for details
  Amount was scaled to the amount of reference product.
  properties: dry mass 1 kg, wet mass 1 kg
- chlorine, liquid: 0.000105 kg; = 1E-05 * factor_MJ_kWh; lognormal variance with pedigree 0.140025, pedigree (5,4,5,2,3)
  Rough guess
  Amount was scaled to the amount of reference product.
  properties: dry mass 1 kg, wet mass 1 kg
- lignite: 1.26 kg; = 0.12 * factor_MJ_kWh; lognormal variance with pedigree 0.0086, pedigree (2,1,4,1,1)
  (same comment as for SOx retained, in lignite flue gas desulfurisation)
  properties: carbon content, fossil 0.655, dry mass 0.42 kg, heating value, net 8.8 MJ, water content 1.38095, wet mass 1 kg
  note on carbon content, fossil: C content of dry lignite is 58-73% (specified in Tab 1.1, report 6, part VI). A mean content of 0.655 kg C/kg dry lignite was considered.
  note on heating value, net: Based on literature, page 52, Dones R., Bauer C., Bolliger R., Burger B., Faist Emmenegger M., Frischknecht R., Heck T., Jungbluth N., Röder A., Tuchschmid M. (2007) Life Cycle Inventories of Energy Systems: Results for Current Systems in Switzerland and other UCTE Countries. ecoinvent report No. 5. Paul Scherrer Institut Villigen, Swiss Centre for Life Cycle Inventories, Dübendorf, CH.
- lignite ash: -0.12915 kg; name lignite_ash; = 0.0123 * factor_MJ_kWh; source Röder, A. 2007, p. Tab. 9.69, p.165; lognormal variance with pedigree 0.07, pedigree (5,1,1,1,1)
  Calculated from mass balance
  Amount was scaled to the amount of reference product.
  production volume; = lignite_ash/electricity*electricity_apv
    Calculated from the electricity production with lignite in proportion to the respective output amounts.
  properties: dry mass 1 kg, heating value, net 21.7 MJ, wet mass 1 kg
  note on heating value, net: Based on literature, page 52, Report 5: Dones, R., Bauer, C., Bolliger, R., Burger, B., faist Emmenegger, M., Frischknecht, R., Heck, T., Jungbluth, N., Röder, A., Tuchschmid, M. (2007) Life Cycle Inventories of Energy Systems: Resulst for current Systems in Switzerland and other UCTE Countries. ecoinvent report No. 5. Paul Scherrer Institut Villigen, Swiss Centre for Life Cycle Inventories, Dübendorf, CH
- lignite power plant: 1.0206e-11 unit; name lignite_power_plant; = 9.72E-13 * factor_MJ_kWh; source Röder, A. 2007, p. p.99; lognormal variance with pedigree 0.4006, pedigree (5,3,5,5,3)
  Calculated value. At the moment, the lignite power plant input consists out of mix of a 100MWe power plant (30%) and a 500MWe power plant (70%).
  For this calculation, 6000 load hours per year are assumed. It is assumed that a total of 200"000h is reached during the lifetime. A capacity of 500MW is taken for the calculation.
- residue from cooling tower: -5.25e-5 kg; name cooling_tower_residue; = factor_MJ_kWh*0.000005
  Exchange present due to parent child relationship
  production volume; = cooling_tower_residue/electricity*electricity_apv
    Calculated from production volume of reference product using the relative outputs.
  properties: carbon content, fossil 0.0544233, dry mass 0.7 kg, water content 0.428571, wet mass 1 kg
- water, completely softened: 0.063 kg; name water_softened_input; = 0.006 * factor_MJ_kWh; lognormal variance with pedigree 0.084025, pedigree (4,5,5,2,3)
  Estimate based on literature
  Amount was scaled to the amount of reference product.
  estimate based on literature
  Amount was scaled to the amount of reference product.
  properties: wet mass 1 kg
- water, decarbonised: 1.575 kg; name water_decarbonised_input; = 0.15 * factor_MJ_kWh; lognormal variance with pedigree 0.084025, pedigree (4,5,5,2,3)
  (same comment as for water, completely softened)
  properties: wet mass 1 kg

## Inputs from nature
- Water, cooling, unspecified natural origin [natural resource, in water]: 0.0453463 m3; name water_cooling_UNO_input; lognormal variance with pedigree 0.130025, pedigree (4,4,5,2,4)
  Estimate based on literature
  Amount was scaled to the amount of reference product.
  Calculated based on literature data.

## Emissions to nature
- Antimony ion [air, non-urban air or from high stacks]: 9.4185e-9 kg; name antimony; = 8.97E-10 * factor_MJ_kWh; lognormal variance with pedigree 0.738, pedigree (5,1,4,1,1)
  Calculated from trace element balance, input uncertain
  Amount was scaled to the amount of reference product.
- Arsenic ion [air, non-urban air or from high stacks]: 7.224e-8 kg; name arsenic; = 6.88E-09 * factor_MJ_kWh; lognormal variance with pedigree 0.738, pedigree (5,1,4,1,1)
  (same comment as for Antimony ion)
- Barium II [air, non-urban air or from high stacks]: 4.6305e-7 kg; name barium; = 4.41E-08 * factor_MJ_kWh; lognormal variance with pedigree 0.738, pedigree (5,1,4,1,1)
  (same comment as for Antimony ion)
- Benzene [air, non-urban air or from high stacks]: 2.2785e-6 kg; name benzene; = 2.17E-07 * factor_MJ_kWh; lognormal variance with pedigree 0.110025, pedigree (3,5,5,2,1)
  Based on available literature
  Amount was scaled to the amount of reference product.
- Benzo(a)pyrene [air, non-urban air or from high stacks]: 2.1e-12 kg; name benzo_a_pyrene; = 2E-13 * factor_MJ_kWh; lognormal variance with pedigree 0.110025, pedigree (3,5,5,2,1)
  Based on available literature
  Amount was scaled to the amount of reference product.
- Boron [air, non-urban air or from high stacks]: 2.8875e-6 kg; name boron; = 2.75E-07 * factor_MJ_kWh; lognormal variance with pedigree 0.738, pedigree (5,1,4,1,1)
  (same comment as for Antimony ion)
- Bromine [air, non-urban air or from high stacks]: 1.2915e-6 kg; name bromine; = 1.23E-07 * factor_MJ_kWh; lognormal variance with pedigree 0.208, pedigree (5,1,4,1,1)
  (same comment as for Antimony ion)
- Butane [air, non-urban air or from high stacks]: 1.995e-7 kg; name butane; = 1.9E-08 * factor_MJ_kWh; lognormal variance with pedigree 0.110025, pedigree (3,5,5,2,1)
  Based on available literature
  Amount was scaled to the amount of reference product.
- Cadmium II [air, non-urban air or from high stacks]: 2.3205e-8 kg; name cadmium; = 2.21E-09 * factor_MJ_kWh; lognormal variance with pedigree 0.738, pedigree (5,1,4,1,1)
  (same comment as for Antimony ion)
- Carbon dioxide, fossil [air, non-urban air or from high stacks]: 1.1025 kg; name carbon_dioxide_fossil; = 0.105 * factor_MJ_kWh; lognormal variance with pedigree 0.01, pedigree (3,1,4,1,1)
  Literature value/calculated value. Emissions when producing 1kWh of electricity from lignite, based on the value for burning 1MJ of lignite. Weighted average with electricity production data (Itten&Frischknecht 2012) and emission values of 10 countries
  (AT, BA, CZ, DE, ES, FR, HU, PL, SI, SK) (Röder et al. 2007)
  Country emissions values based on literature.
  Source:
  Itten R. and Frischknecht R. (2012) Life Cycle Inventories of Electricity Mixes and Grid. ESU-services Ltd., Uster, Switzerland.
- Carbon monoxide, fossil [air, non-urban air or from high stacks]: 0.00021 kg; name carbon_monoxide_fossil; = 2E-05 * factor_MJ_kWh; lognormal variance with pedigree 0.704025, pedigree (3,4,5,2,1)
  Based on available literature
  Amount was scaled to the amount of reference product.
- Chromium III [air, non-urban air or from high stacks]: 9.261e-8 kg; name chromium; = 8.82E-09 * factor_MJ_kWh; lognormal variance with pedigree 0.738, pedigree (5,1,4,1,1)
  (same comment as for Antimony ion)
- Chromium VI [air, non-urban air or from high stacks]: 1.1445e-8 kg; name chromium_vi; = 1.09E-09 * factor_MJ_kWh; lognormal variance with pedigree 0.488, pedigree (1,1,4,1,1)
  based on range of data
  Amount was scaled to the amount of reference product.
- Cobalt II [air, non-urban air or from high stacks]: 8.106e-9 kg; name cobalt; = 7.72E-10 * factor_MJ_kWh; lognormal variance with pedigree 0.738, pedigree (5,1,4,1,1)
  (same comment as for Antimony ion)
- Copper ion [air, non-urban air or from high stacks]: 2.8035e-7 kg; name copper; = 2.67E-08 * factor_MJ_kWh; lognormal variance with pedigree 0.738, pedigree (5,1,4,1,1)
  (same comment as for Antimony ion)
- Dinitrogen monoxide [air, non-urban air or from high stacks]: 5.25e-6 kg; name dinitrogen_monoxide; = 5E-07 * factor_MJ_kWh; lognormal variance with pedigree 0.104025, pedigree (3,4,5,2,1)
  Based on available literature
  Amount was scaled to the amount of reference product.
- Dioxins, measured as 2,3,7,8-tetrachlorodibenzo-p-dioxin [air, non-urban air or from high stacks]: 7.35e-14 kg; name dioxins; = 7E-15 * factor_MJ_kWh; lognormal variance with pedigree 0.370025, pedigree (3,5,5,2,1)
  Based on available literature
  Amount was scaled to the amount of reference product.
- Ethane [air, non-urban air or from high stacks]: 4.305e-7 kg; name ethane; = 4.1E-08 * factor_MJ_kWh; lognormal variance with pedigree 0.110025, pedigree (3,5,5,2,1)
  Based on available literature
  Amount was scaled to the amount of reference product.
- Formaldehyde [air, non-urban air or from high stacks]: 6.09e-7 kg; name formaldehyde; = 5.8E-08 * factor_MJ_kWh; lognormal variance with pedigree 0.110025, pedigree (3,5,5,2,1)
  Based on available literature
  Amount was scaled to the amount of reference product.
- Hydrocarbons, aliphatic, alkanes, unspecified [air, non-urban air or from high stacks]: 2.2995e-6 kg; name hydrocarbons_al_al_unspec; = 2.19E-07 * factor_MJ_kWh; lognormal variance with pedigree 0.110025, pedigree (3,5,5,2,1)
  Based on available literature
  Amount was scaled to the amount of reference product.
- Hydrocarbons, aliphatic, unsaturated [air, non-urban air or from high stacks]: 2.268e-6 kg; name hydrocarbons_aliphatic_unsaturated; = 2.16E-07 * factor_MJ_kWh; lognormal variance with pedigree 0.110025, pedigree (3,5,5,2,1)
  Based on available literature
  Amount was scaled to the amount of reference product.
- Hydrochloric acid [air, non-urban air or from high stacks]: 2.142e-5 kg; name hydrogen_chloride; = 2.04E-06 * factor_MJ_kWh; lognormal variance with pedigree 0.208, pedigree (5,1,4,1,1)
  (same comment as for Antimony ion)
- Hydrogen fluoride [air, non-urban air or from high stacks]: 2.163e-5 kg; name hydrogen_fluoride; = 2.06E-06 * factor_MJ_kWh; lognormal variance with pedigree 0.208, pedigree (5,1,4,1,1)
  (same comment as for Antimony ion)
- Iodine [air, non-urban air or from high stacks]: 7.98e-7 kg; name iodine; = 7.6E-08 * factor_MJ_kWh; lognormal variance with pedigree 0.208, pedigree (5,1,4,1,1)
  (same comment as for Antimony ion)
- Lead II [air, non-urban air or from high stacks]: 7.1085e-8 kg; name lead; = 6.77E-09 * factor_MJ_kWh; lognormal variance with pedigree 0.738, pedigree (5,1,4,1,1)
  (same comment as for Antimony ion)
- Lead-210 [air, non-urban air or from high stacks]: 0.0002373 kBq; name lead_210; = 2.26E-05 * factor_MJ_kWh; lognormal variance with pedigree 0.388, pedigree (5,1,4,1,1)
  (same comment as for Antimony ion)
- Manganese II [air, non-urban air or from high stacks]: 3.045e-7 kg; name manganese; = 2.9E-08 * factor_MJ_kWh; lognormal variance with pedigree 0.738, pedigree (5,1,4,1,1)
  (same comment as for Antimony ion)
- Mercury II [air, non-urban air or from high stacks]: 1.3335e-7 kg; name mercury; = 1.27E-08 * factor_MJ_kWh; lognormal variance with pedigree 0.738, pedigree (5,1,4,1,1)
  (same comment as for Antimony ion)
- Methane, fossil [air, non-urban air or from high stacks]: 1.05e-5 kg; name methane_fossil; = 1E-06 * factor_MJ_kWh; lognormal variance with pedigree 0.104025, pedigree (3,4,5,2,1)
  Based on available literature
  Amount was scaled to the amount of reference product.
- Molybdenum VI [air, non-urban air or from high stacks]: 5.229e-8 kg; name molybdenum; = 4.98E-09 * factor_MJ_kWh; lognormal variance with pedigree 0.738, pedigree (5,1,4,1,1)
  (same comment as for Antimony ion)
- Nickel II [air, non-urban air or from high stacks]: 3.612e-7 kg; name nickel; = 3.44E-08 * factor_MJ_kWh; lognormal variance with pedigree 0.738, pedigree (5,1,4,1,1)
  (same comment as for Antimony ion)
- Nitrogen oxides [air, non-urban air or from high stacks]: 0.001491 kg; name nitrogen_oxides; = 0.000142 * factor_MJ_kWh; source Itten R. 2012; lognormal variance with pedigree 0.05, pedigree (3,1,4,1,1)
  (same comment as for SOx retained, in lignite flue gas desulfurisation)
- PAH, polycyclic aromatic hydrocarbons [air, non-urban air or from high stacks]: 1.05e-8 kg; name pah; = 1E-09 * factor_MJ_kWh; lognormal variance with pedigree 0.370025, pedigree (3,5,5,2,1)
  Based on available literature
  Amount was scaled to the amount of reference product.
- Particulate Matter, < 2.5 um [air, non-urban air or from high stacks]: 0.00034335 kg; name particulates_lt2_5; = 3.27E-05 * factor_MJ_kWh; source Itten R. 2012; lognormal variance with pedigree 0.388, pedigree (5,1,4,1,1)
  (same comment as for SOx retained, in lignite flue gas desulfurisation)
- Particulate Matter, > 10 um [air, non-urban air or from high stacks]: 7.266e-5 kg; name particulates_gt10; = 6.92E-06 * factor_MJ_kWh; source Itten R. 2012; lognormal variance with pedigree 0.128, pedigree (5,1,4,1,1)
  (same comment as for SOx retained, in lignite flue gas desulfurisation)
- Particulate Matter, > 2.5 um and < 10um [air, non-urban air or from high stacks]: 4.0425e-5 kg; name particulates_2_5_to_10; = 3.85E-06 * factor_MJ_kWh; source Itten R. 2012; lognormal variance with pedigree 0.208, pedigree (5,1,4,1,1)
  (same comment as for SOx retained, in lignite flue gas desulfurisation)
- Pentane [air, non-urban air or from high stacks]: 1.5435e-6 kg; name pentane; = 1.47E-07 * factor_MJ_kWh; lognormal variance with pedigree 0.110025, pedigree (3,5,5,2,1)
  Based on available literature
  Amount was scaled to the amount of reference product.
- Polonium-210 [air, non-urban air or from high stacks]: 0.0004326 kBq; name polonium_210; = 4.12E-05 * factor_MJ_kWh; lognormal variance with pedigree 0.388, pedigree (5,1,4,1,1)
  (same comment as for Antimony ion)
- Potassium-40 [air, non-urban air or from high stacks]: 8.7255e-5 kBq; name potassium_40; = 8.31E-06 * factor_MJ_kWh; lognormal variance with pedigree 0.388, pedigree (5,1,4,1,1)
  (same comment as for Antimony ion)
- Propane [air, non-urban air or from high stacks]: 3.675e-7 kg; name propane; = 3.5E-08 * factor_MJ_kWh; lognormal variance with pedigree 0.110025, pedigree (3,5,5,2,1)
  Based on available literature
  Amount was scaled to the amount of reference product.
- Propylene [air, non-urban air or from high stacks]: 1.68e-7 kg; name propene; = 1.6E-08 * factor_MJ_kWh; lognormal variance with pedigree 0.110025, pedigree (3,5,5,2,1)
  Based on available literature
  Amount was scaled to the amount of reference product.
- Radium-226 [air, non-urban air or from high stacks]: 6.111e-5 kBq; name radium_226; = 5.82E-06 * factor_MJ_kWh; lognormal variance with pedigree 0.388, pedigree (5,1,4,1,1)
  (same comment as for Antimony ion)
- Radium-228 [air, non-urban air or from high stacks]: 3.906e-5 kBq; name radium_228; = 3.72E-06 * factor_MJ_kWh; lognormal variance with pedigree 0.388, pedigree (5,1,4,1,1)
  (same comment as for Antimony ion)
- Radon-220 [air, non-urban air or from high stacks]: 0.0015225 kBq; name radon_220; = 0.000145 * factor_MJ_kWh; lognormal variance with pedigree 0.388, pedigree (5,1,4,1,1)
  (same comment as for Antimony ion)
- Radon-222 [air, non-urban air or from high stacks]: 0.0026985 kBq; name radon_222; = 0.000257 * factor_MJ_kWh; lognormal variance with pedigree 0.388, pedigree (5,1,4,1,1)
  (same comment as for Antimony ion)
- Selenium IV [air, non-urban air or from high stacks]: 2.9295e-7 kg; name selenium; = 2.79E-08 * factor_MJ_kWh; lognormal variance with pedigree 0.738, pedigree (5,1,4,1,1)
  (same comment as for Antimony ion)
- Strontium II [air, non-urban air or from high stacks]: 4.7145e-7 kg; name strontium; = 4.49E-08 * factor_MJ_kWh; lognormal variance with pedigree 0.738, pedigree (5,1,4,1,1)
  (same comment as for Antimony ion)
- Sulfur dioxide [air, non-urban air or from high stacks]: 0.0054075 kg; name sulfur_dioxide; = 0.000515 * factor_MJ_kWh; source Itten R. 2012; lognormal variance with pedigree 0.01, pedigree (3,1,4,1,1)
  (same comment as for SOx retained, in lignite flue gas desulfurisation)
- Thorium-228 [air, non-urban air or from high stacks]: 2.1e-5 kBq; name thorium_228; = 2E-06 * factor_MJ_kWh; lognormal variance with pedigree 0.388, pedigree (5,1,4,1,1)
  (same comment as for Antimony ion)
- Thorium-232 [air, non-urban air or from high stacks]: 3.3075e-5 kBq; name thorium_232; = 3.15E-06 * factor_MJ_kWh; lognormal variance with pedigree 0.388, pedigree (5,1,4,1,1)
  (same comment as for Antimony ion)
- Toluene [air, non-urban air or from high stacks]: 1.1445e-6 kg; name toluene; = 1.09E-07 * factor_MJ_kWh; lognormal variance with pedigree 0.110025, pedigree (3,5,5,2,1)
  Based on available literature
  Amount was scaled to the amount of reference product.
- Uranium-238 [air, non-urban air or from high stacks]: 5.0925e-5 kBq; name uranium_238; = 4.85E-06 * factor_MJ_kWh; lognormal variance with pedigree 0.388, pedigree (5,1,4,1,1)
  (same comment as for Antimony ion)
- Vanadium V [air, non-urban air or from high stacks]: 8.7045e-8 kg; name vanadium; = 8.29E-09 * factor_MJ_kWh; lognormal variance with pedigree 0.738, pedigree (5,1,4,1,1)
  (same comment as for Antimony ion)
- Water [air, unspecified]: 0.00118752 m3; name water_to_air_unspecified; = (water_softened_input/1000)*fraction_WCS_to_air+(water_decarbonised_input/1000)*fraction_WDC_to_air+water_cooling_UNO_input*fraction_CW_to_air; lognormal variance with pedigree 0.130025, pedigree (4,4,5,2,4)
  Calculated value based on literature values and expert opinion. See comments in the parametres" comment field.
  property fraction, origin: fresh water 0.0344187; name fraction_origin_fresh_water
  property fraction, origin: salt water 0; name fraction_origin_salt_water
  property fraction, origin: unspecified 0.965581; name fraction_origin_unspecified
- Xylenes, unspecified [air, non-urban air or from high stacks]: 9.681e-6 kg; name xylene; = 9.22E-07 * factor_MJ_kWh; lognormal variance with pedigree 0.110025, pedigree (3,5,5,2,1)
  Based on available literature
  Amount was scaled to the amount of reference product.
- Zinc II [air, non-urban air or from high stacks]: 5.418e-7 kg; name zinc; = 5.16E-08 * factor_MJ_kWh; lognormal variance with pedigree 0.738, pedigree (5,1,4,1,1)
  (same comment as for Antimony ion)
- Water [water, unspecified]: 0.0457968 m3; name water_to_water_unspecified; = (water_softened_input/1000)*(1-fraction_WCS_to_air)+(water_decarbonised_input/1000)*(1-fraction_WDC_to_air)+water_cooling_UNO_input*(1-fraction_CW_to_air); lognormal variance with pedigree 0.130025, pedigree (4,4,5,2,4)
  (same comment as for Water)
  property fraction, origin: fresh water 0.0289128; name fraction_origin_fresh_water_Ww
  property fraction, origin: salt water 0; name fraction_origin_salt_water_Ww
  property fraction, origin: unspecified 0.971087; name fraction_origin_unspecified_Ww

## Sampling procedure
literature and statistics

## Extrapolations
Most of the exchanges were extrapolated through production-weighted averages of the datasets of the following 10 countries: AT, BA, CZ, DE, ES, FR, HU, PL, SI, SK.

The original data were valid for the burning of 1MJ of lignite. In this dataset, the values are scaled to the net output of 1kWh of electricity, based on the electrical efficiency.
