# inverter production, 0.5kW

Dataset: EcoSpold 2, unit process
Geography: RoW
Time period: 2004-01-01 to 2023-12-31
Technology level: current
Classification: EcoSpold01Categories: photovoltaic/production of components
Classification: ISIC rev.4 ecoinvent: 2790:Manufacture of other electrical equipment
Synonyms: inverse rectifier
Tags: ConvertedDataset
Scenario: Business-as-Usual
System model: Allocation, cut-off by classification
Generated by: Matthias Tuchschmid (obsolete)
Published in: Jungbluth, N. 2007
Database: ecoinvent
isCopyrightProtected: true
accessRestrictedTo: 1

## General comment
Production of an inverter (500W) with an efficiency of 93.5% (total efficiency factor which includes MPP-Tracking) for photovoltaic plant. Total weight about 1.6 kg.
[This dataset was already contained in the ecoinvent database version 2. It was not individually updated during the transfer to ecoinvent version 3. Life Cycle Impact Assessment results may still have changed, as they are affected by changes in the supply chain, i.e. in other datasets. This dataset was generated following the ecoinvent quality guidelines for version 2. It may have been subject to central changes described in the ecoinvent version 3 change report (http://www.ecoinvent.org/database/ecoinvent-version-3/reports-of-changes/), and the results of the central updates were reviewed extensively. The changes added e.g. consistent water flows and other information throughout the database. The documentation of this dataset can be found in the ecoinvent reports of version 2, which are still available via the ecoinvent website. The change report linked above covers all central changes that were made during the conversion process.]

## Included activities end
Materials, packaging and electricity use for the production of an inverse rectifier. Disposal of the product after use.

## Geography
Production in RER.

## Technology
Inverter for a photovoltaic grid-connected system with a capacity of 500Wp.

## Reference product
- inverter, 0.5kW: 1 unit; By-product classification allocatable product; CPC 46220: Parts of electricity distribution or control apparatus; HS2017 853720: Boards, panels, consoles, desks and other bases; for electric control or the distribution of electricity, ([...]
  EcoSpold01Location=RER
  production volume 2.67763 unit
    This is a placeholder value that does not reflect real-world production volumes. This dataset does not currently require a real-world production volume to work in the database framework, and no actual data were collected yet. This has no negative effect on the results of the ecoinvent database.
  property price 23.4592 EUR2005
    Calculated based on inputs: The price of the product has been calculated as a sum of the values of the material and energy inputs for this product. This value is therefore a rough estimation. It may underestimate the real price since there are additional expenses when producing any product. These expences can include for example labour costs, treatment of waste materials and profit for the producer. Please consider carefully whether this level of data quality is acceptable for your application.
  properties: carbon allocation 0 kg, carbon content 0

## Inputs from technosphere
- acrylonitrile-butadiene-styrene copolymer: 0.148 kg; lognormal variance with pedigree 0.0532, pedigree (2,3,5,5,1)
  Literature (de Wild 2006)
  EcoSpold01Location=RER
  Uncertainty: Literature (de Wild 2006)
  properties: carbon content, fossil 0.853081, dry mass 1 kg, heating value, net 35.58 MJ, wet mass 1 kg
  note on carbon content, fossil: ABS is the abbreviation originating from its monomers acrylonitrile, butadiene and styrene. It was assumed that every monomer was present in the same proportion, so the basic ABS monomer was considered (C8H8·C4H6·C3H3N), and the MW=104+54+53=211 g/mol
- aluminium, cast alloy: 0.682 kg; lognormal variance with pedigree 0.0532, pedigree (2,3,5,5,1)
  Literature (de Wild 2006), recycled after use
  EcoSpold01Location=RER
  Uncertainty: Literature (de Wild 2006), recycled after use
  properties: dry mass 1 kg, wet mass 1 kg
- capacitor, electrolyte type, > 2cm height: 0.054 kg; lognormal variance with pedigree 0.0532, pedigree (2,3,5,5,1)
  EcoSpold01Location=GLO
  Literature (de Wild 2006), Calculation
  Uncertainty: Literature (de Wild 2006), Calculation
  properties: carbon content, fossil 0.16971, carbon content, non-fossil 0.0349727, dry mass 1 kg, wet mass 1 kg
  note on carbon content, fossil: Calculated as the addition of C contents in the product composition, and referred to 1 kg capacitors, and then to 1 kg DM
- capacitor, film type, for through-hole mounting: 0.072 kg; lognormal variance with pedigree 0.0532, pedigree (2,3,5,5,1)
  Literature (de Wild 2006), Calculation
  EcoSpold01Location=GLO
  Uncertainty: Literature (de Wild 2006), Calculation
  properties: carbon content, fossil 0.278876, dry mass 1 kg, wet mass 1 kg
- capacitor, tantalum-, for through-hole mounting: 0.0048 kg; lognormal variance with pedigree 0.0532, pedigree (2,3,5,5,1)
  EcoSpold01Location=GLO
  Literature (de Wild 2006), Assumption for Ceramic Multilayer Chip Capacitors
  Uncertainty: Literature (de Wild 2006), Assumption for Ceramic Multilayer Chip Capacitors
  properties: carbon content, fossil 0.181224, dry mass 1 kg, wet mass 1 kg
- copper, cathode: 0.002 kg; lognormal variance with pedigree 0.0532, pedigree (2,3,5,5,1)
  (same comment as for aluminium, cast alloy)
  properties: dry mass 1 kg, wet mass 1 kg
- corrugated board box: 0.347862, 0.0129579, 0.75918 kg (3 suppliers, which the file names only by identifier); sum of these 1.12 kg; lognormal variance with pedigree 0.0546, pedigree (2,4,5,5,1)
  EcoSpold01Location=RER
  Calculation, based on estimated dimension of inverse rectifier
  Uncertainty: Calculation, based on estimated dimension of inverse rectifier
  properties: carbon content, fossil 0.000656085, carbon content, non-fossil 0.432275, dry mass 0.945 kg, heating value, net 12.86 MJ, water content 0.0582011, wet mass 1 kg
  note on carbon content, fossil: Fossil C content was calculated after fossil C contents of chemicals used in the production of board (Tab 10-15 & 10.16 ecoinvent v2.2 report 11_III, part 10)
  note on carbon content, non-fossil: Biogenic C content was calculated after biogenic C contents of chemicals used in the production of board (Tab 10.15 & 10.16, ecoinvent v2.2 report 11_III, part 10).
- diode, glass-, for through-hole mounting: 0.01 kg; lognormal variance with pedigree 0.0532, pedigree (2,3,5,5,1)
  (same comment as for capacitor, film type, for through-hole mounting)
  properties: carbon content, fossil 0.0203273, dry mass 1 kg, wet mass 1 kg
  note on carbon content, fossil: Calculated as the addition of C contents in the product composition
- electric connector, wire clamp: 0.05 kg; lognormal variance with pedigree 0.0532, pedigree (2,3,5,5,1)
  (same comment as for capacitor, film type, for through-hole mounting)
  properties: carbon content, fossil 0.19653, dry mass 1 kg, wet mass 1 kg
- electricity, medium voltage: 0.140907, 2.81078, 0.944414, 0.0431506, 0.00863654, 0.00185446, 0.290257 kWh (7 suppliers, which the file names only by identifier); sum of these 4.24 kWh; lognormal variance with pedigree 0.0632, pedigree (2,3,5,5,1)
  EcoSpold01Location=UCTE
  Literature (Schwarz 1992)
  Uncertainty: Literature (Schwarz 1992)
- fleece, polyethylene: 0.03 kg; lognormal variance with pedigree 0.0632, pedigree (2,3,5,5,1)
  EcoSpold01Location=RER
  Literature (Schwarz 1992)
  Uncertainty: Literature (Schwarz 1992)
  properties: carbon content, fossil 0.857143, dry mass 1 kg, heating value, net 42.47 MJ, wet mass 1 kg
  note on carbon content, fossil: Polyethylene is formed out of a huge amount of ethylene monomers (C2H4) (ecoinvent v2.2 report 11_II). MW=28 g/mol
- inductor, ring core choke type: 0.074 kg; lognormal variance with pedigree 0.0532, pedigree (2,3,5,5,1)
  (same comment as for capacitor, electrolyte type, > 2cm height)
  properties: carbon content, fossil 0.445934, dry mass 1 kg, wet mass 1 kg
  note on carbon content, fossil: Calculated as the addition of C contents in the product composition, and referred to 1 kg DM inductor
- integrated circuit, logic type: 0.006 kg; lognormal variance with pedigree 0.0532, pedigree (2,3,5,5,1)
  (same comment as for capacitor, film type, for through-hole mounting)
  properties: carbon content, fossil 0.221701, dry mass 1 kg, wet mass 1 kg
- metal working factory: 1.0424e-9 unit; lognormal variance with pedigree 0.3546, pedigree (2,4,5,5,1)
  Calculation, based on annual production of electronic component production plant
  EcoSpold01Location=RER
  Uncertainty: Calculation, based on annual production of electronic component production plant
- polycarbonate: 0.068 kg; lognormal variance with pedigree 0.0532, pedigree (2,3,5,5,1)
  EcoSpold01Location=RER
  Literature (de Wild 2006)
  Uncertainty: Literature (de Wild 2006)
  properties: carbon content, fossil 0.755906, dry mass 1 kg, heating value, net 29.57 MJ, wet mass 1 kg
  note on carbon content, fossil: Polycarbonate means here 2,2-bis(4-hydroxyphenyl)propane polycarbonate – also called bisphenol A polycarbonate ( -(O-C6H4-C(CH3)2-C6H4-O-CO)n- (ecoinvent v2.2 report 11_II), C16H14O3, MW=254 g/mol.
- polyethylene, high density, granulate: 0.014 kg; lognormal variance with pedigree 0.0532, pedigree (2,3,5,5,1)
  Literature (de Wild 2006)
  EcoSpold01Location=RER
  Uncertainty: Literature (de Wild 2006)
  properties: carbon content, fossil 0.857143, dry mass 1 kg, heating value, net 42.47 MJ, wet mass 1 kg
- polystyrene foam slab: 0.13 kg; lognormal variance with pedigree 0.0632, pedigree (2,3,5,5,1)
  EcoSpold01Location=RER
  Literature (Schwarz 1992)
  Uncertainty: Literature (Schwarz 1992)
  properties: carbon content, fossil 0.859091, dry mass 1 kg, heating value, net 38.67 MJ, wet mass 1 kg
  note on carbon content, fossil: XPS consists in 91% of polystyrene, 7% of blowing agent and the re-maining 2% are flame retardants (bromine compounds) and other additives (ecoinvent v2.2 report 7, part XIV, pg69). The chemical formula of polystyrene is (C8H8)n. Here, the blowing agent is CO2.
- polyvinylchloride, suspension polymerised: 0.000222726 kg; lognormal variance with pedigree 0.0532, pedigree (2,3,5,5,1)
  Literature (de Wild 2006)
  EcoSpold01Location=RER
  Uncertainty: Literature (de Wild 2006)
  properties: carbon content, fossil 0.387097, dry mass 1 kg, heating value, net 21.5 MJ, wet mass 1 kg
  note on carbon content, fossil: Monomer is vynyl chloride, C2H3Cl (ecoinvent v2.2 report 11_II). MW=62 g/mol
- printed wiring board, for through-hole mounting, Pb containing surface: 0.0298 m2; = 0.0596*0.5; lognormal variance with pedigree 0.0532, pedigree (2,3,5,5,1)
  Literature (de Wild 2006), Calculation
  This original value from production mix has been replaced by 2 flows. Each has 50% share in the production mix.
  Uncertainty: Literature (de Wild 2006), Calculation
  property carbon content, fossil 0.203154; name C_content_fossil
  property carbon content, non-fossil 0; name C_content_non_fossil
  property dry mass 3.08 kg; name DM
  property water content 0; name water_content
  property water in wet mass 0 kg; name WWM
  property wet mass 3.08 kg; name WM
- printed wiring board, for through-hole mounting, Pb free surface: 0.0298 m2; = 0.0596*0.5; lognormal variance with pedigree 0.0532, pedigree (2,3,5,5,1)
  (same comment as for printed wiring board, for through-hole mounting, Pb containing surface)
  properties: carbon content, fossil 0.210221, dry mass 3.08 kg, wet mass 3.08 kg
- resistor, metal film type, through-hole mounting: 0.001 kg; lognormal variance with pedigree 0.0532, pedigree (2,3,5,5,1)
  (same comment as for capacitor, film type, for through-hole mounting)
  properties: carbon content, fossil 0.029003, dry mass 1 kg, wet mass 1 kg
  note on carbon content, fossil: Calculated as the addition of C contents in the product composition, and referred to 1 kg DM resistor.
- section bar extrusion, aluminium: 0.682 kg; lognormal variance with pedigree 0.0532, pedigree (2,3,5,5,1)
  Literature (de Wild 2006)
  EcoSpold01Location=RER
  Uncertainty: Literature (de Wild 2006)
- sheet rolling, steel: 0.078 kg; lognormal variance with pedigree 0.0532, pedigree (2,3,5,5,1)
  EcoSpold01Location=RER
  Literature (de Wild 2006)
  Uncertainty: Literature (de Wild 2006)
- steel, low-alloyed, hot rolled: 0.078 kg; lognormal variance with pedigree 0.0532, pedigree (2,3,5,5,1)
  EcoSpold01Location=RER
  Literature (de Wild 2006), recycled after use
  Uncertainty: Literature (de Wild 2006), recycled after use
  properties: carbon content, fossil 0.005, dry mass 1 kg, wet mass 1 kg
  note on carbon content, fossil: Low alloyed steel composition given in Tab. 3.2 ecoinvent v2.2 report 10_partII. Steel assumed to have a C content of 0.5%
- styrene-acrylonitrile copolymer: 0.002 kg; lognormal variance with pedigree 0.0532, pedigree (2,3,5,5,1)
  Literature (de Wild 2006)
  EcoSpold01Location=RER
  Uncertainty: Literature (de Wild 2006)
  properties: carbon content, fossil 0.856023, dry mass 1 kg, heating value, net 32.54 MJ, wet mass 1 kg
  note on carbon content, fossil: SAN is the abbreviation originating from its monomers styrene (C8H8) and acrylonitrile (C3H3N). The acrylonitrile content in SAN goes from 20 to 35 wt% (ecoinvent v2.2 report 11_II), an average content of 27.5% was considered. MW styrene =104 g/mol, MW acrylonitrile=53 g/mol
- transformer, high voltage use: 0.31 kg; lognormal variance with pedigree 0.0532, pedigree (2,3,5,5,1)
  EcoSpold01Location=GLO
  Literature (de Wild 2006)
  Uncertainty: Literature (de Wild 2006)
  properties: carbon content, fossil 0.262798, dry mass 1 kg, wet mass 1 kg
- transistor, wired, small size, through-hole mounting: 0.008 kg; lognormal variance with pedigree 0.0532, pedigree (2,3,5,5,1)
  (same comment as for capacitor, film type, for through-hole mounting)
  properties: carbon content, fossil 0.080338, dry mass 1 kg, wet mass 1 kg
  note on carbon content, fossil: Calculated as the addition of C contents in the product composition, and referred to 1 kg DM transistor.
- used printed wiring boards: -0.6898 kg; lognormal variance with pedigree 0.0132, pedigree (2,3,1,5,1)
  EcoSpold01Location=GLO
  Calculation, different geographical location
  Uncertainty: Calculation, different geographical location
  production volume
    Calculated from the production volume of inverter, 0.5kW in proportion to the respective output amounts.
  properties: carbon content, fossil 0.193742, carbon content, non-fossil 0.000960142, dry mass 1 kg, wet mass 1 kg
  note on carbon content, fossil: Composition of printed wiring boards used to calculate C content
- waste paperboard, unsorted: -1.12 kg; lognormal variance with pedigree 0.0132, pedigree (2,3,1,5,1)
  Calculation, different geographical location
  EcoSpold01Location=CH
  Uncertainty: Calculation, different geographical location
  production volume
    (same comment as for used printed wiring boards)
  properties: carbon content, non-fossil 0.483259, dry mass 0.804 kg, heating value, net 15.92 MJ, price 0.03924 EUR2005, water content 0.243781, wet mass 1 kg
  note on carbon content, non-fossil: C content was calculated for 1 kg DM, using data in Tab A.3, ecoinvent v2.2 report 13_I.
- waste plastic, industrial electronics: -0.23 kg; lognormal variance with pedigree 0.0132, pedigree (2,3,1,5,1)
  (same comment as for waste paperboard, unsorted)
  production volume
    (same comment as for used printed wiring boards)
  properties: carbon content, fossil 0.81386, dry mass 0.847 kg, heating value, net 34.78 MJ, water content 0.180638, wet mass 1 kg
  note on carbon content, fossil: C content in 1 kg DM was calculated using data in Tab A.2, ecoinvent v2.2 report 13_I
- waste polyethylene: -1.9051e-6, -4.85726e-6, -2.00622e-6, -3.67347e-7, -0.0299174, -8.10491e-7, -7.26959e-5 kg (7 suppliers, which the file names only by identifier); sum of these -0.03 kg; lognormal variance with pedigree 0.0132, pedigree (2,3,1,5,1)
  (same comment as for waste paperboard, unsorted)
  production volume
    (same comment as for used printed wiring boards)
  properties: carbon content, fossil 0.825301, dry mass 0.996 kg, heating value, net 42.47 MJ, water content 0.00401606, wet mass 1 kg
  note on carbon content, fossil: C content in 1 kg DM was calculated using data in Tab A.1, ecoinvent v2.2 report 13_I
  note on heating value, net: Value taken from the general comment of the treatment dataset.
- waste polystyrene: -0.00028112, -3.13422e-6, -1.87833e-5, -7.75819e-6, -7.36713e-6, -1.42055e-6, -0.13168 kg (7 suppliers, which the file names only by identifier); sum of these -0.132 kg; lognormal variance with pedigree 0.0132, pedigree (2,3,1,5,1)
  EcoSpold01Location=CH
  Calculation, different geographical location
  Uncertainty: Calculation, different geographical location
  production volume
    (same comment as for used printed wiring boards)
  properties: carbon content, fossil 0.922579, dry mass 0.998 kg, heating value, net 38.67 MJ, water content 0.00200401, wet mass 1 kg
- wire drawing, copper: 0.002 kg; lognormal variance with pedigree 0.0532, pedigree (2,3,5,5,1)
  EcoSpold01Location=RER
  Literature (de Wild 2006)
  Uncertainty: Literature (de Wild 2006)

## Sampling procedure
Detailed analysis of materials for one product

## Extrapolations
Packaging materials and energy consumption during production has been scaled down from 2500 W-Inverter. This dataset has been copied from an original dataset covering the geography RER. The uncertainty has been adjusted accordingly.

## Review by Christian Bauer 2009-02-15
passed
none
