# argon to generic market for inert gas for discharge lamps

Dataset: EcoSpold 2, unit process
Geography: GLO
Time period: 2012-01-01 to 2023-12-31
Technology level: current
Classification: ISIC rev.4 ecoinvent: 2011:Manufacture of basic chemicals
Classification: EcoSpold01Categories: chemicals/inorganics
Tags: linking activity
Scenario: Business-as-Usual
System model: Allocation, cut-off by classification
Generated by: Tereza Levova
Database: ecoinvent
isCopyrightProtected: true
accessRestrictedTo: 1

## General comment
This is a linking activity. Several different noble gases (or their mixtures) can be used as an inert gas for gas-discharge lamps. This linking activity separate the production volume of argon which is later on used as inert gas in gas-discharge lamps and link it to the generic market for inert gas for discharge lamps.

## Included activities end
This is a linking activity, i.e. nothing is produced in this activity.

## Reference product
- inert gas for discharge lamps: 1 kg; By-product classification allocatable product; CPC 34210: Hydrogen, nitrogen, oxygen, carbon dioxide and rare gases; inorganic oxygen compounds of non-metals n.e.c.; HS2017 850410: Discharge lamps or tubes; ballasts therefor
  Inert gas for discharge lamps, such as argon, neon, krypton, xenon or their mixture.
  production volume 1.5e8 kg; = 7.5E8*0.2
    Calculated value based on literature and an estimate. The production volume of argon in the world is 7.5E+08 kg/year (http://www.lenntech.com/periodic/elements/ar.htm, accessed 20120628). Cross-referenced, i.e. another sources say the production volume is 7E+08 kg/year (http://environmentalchemistry.com/yogi/periodic/Ar.html, accessed 20120628) and 5.61E+08 kg/year (Ullmann's Encyclopedia, data app. 20 years old).
    Argon has several different types of uses (Ullmann's Encyclopedia), thus it is estimated that only 20% of argon produced is used in gas-discharge lamps production.
  property price 6.59 EUR2005
    This is the average of the two gases that at the moment go to generic market of inert gas for discharge lamps: "argon, crude, liquid" and "krypton, gaseous". Other gases could be used for discharge lamps.
  properties: carbon allocation 0 kg, carbon content 0, carbon content, fossil 0, carbon content, non-fossil 0, dry mass 1 kg, water content 0, water in wet mass 0 kg, wet mass 1 kg

## Inputs from technosphere
- argon, crude, liquid: 1 kg
  property carbon content, fossil 0; name C_content_fossil
  property carbon content, non-fossil 0; name C_content_non_fossil
  property dry mass 1 kg; name DM
  property water content 0; name water_content
  property water in wet mass 0 kg; name WWM
  property wet mass 1 kg; name WM

## Review by Bo Weidema 2012-07-02
Passed
