# fava bean production

Dataset: EcoSpold 2, unit process
Geography: CA-AB
Time period: 2020-01-01 to 2023-12-31
Technology level: current
Classification: ISIC rev.4 ecoinvent: 0111:Growing of cereals (except rice), leguminous crops and oil seeds
Scenario: Business-as-Usual
System model: Allocation, cut-off by classification
Generated by: Nicole Bamber
Published in: Food Systems PRISM Lab 2020
Database: ecoinvent
isCopyrightProtected: true
accessRestrictedTo: 1

## General comment
This dataset represents the production of 1 tonne of dried fava bean (<16% moisture) during May-August, 2020, at 2089.05 ha faba bean farms located in the Province of Alberta, Canada. Yield values were averaged over 2018-2020, and farms have an average yield of 4598.52 kg grain (<16% moisture) per ha for these crop cycles. The system boundaries include the production of all crop inputs (e.g. seeds, fertilizers, crop protection products, and fuel) and consider nitrogen credits derived from biological N fixation associated with dried faba bean production. Irrigation is included. The sowing date for the crop is May 2020 and the harvesting date is August 2020. The seeding rate is 55.35 kg/tonne of faba bean production. Fertilizer applied contain nitrogen (as N) 1.40 kg/tonne, phosphate (as P2O5) 2.46 kg/tonne, potash (as K2O) 0.90 kg/tonne, and sulfur (as S) 0.31 kg/tonne. Predominant crop protection applied contain active ingredients of glyphosate 0.066 kg/tonne, bentazon 0.064 kg/tonne, and diquat dibromide 0.048 g/tonne. Machinery is used for tillage, seeding, fertilizer application, rolling, herbicide application, fungicide application, harvest aid application, harvesting, and other with total fuel consumption of 7.12 kg/tonne.

## Included activities start
Starting inputs for this activity include seed, fertilizer, crop protection products and fuel on the farm. This activity begins with soil preparation about 37 weeks after the harvest of the previous crop. The soil is prepared for cultivation in 1st week of May and the sowing of seeds started about 5 days after soil preparation.

## Included activities end
This activity ends with faba bean drying to <16% moisture at farm gate. This takes place in August, 19 weeks after the activity start. The activity includes the infrastructures and use of agricultural machinery.

## Allocation
Physical (mass) allocation; N credits from biological N fixation are included as a system expansion, consistent with the ISO 14044 multifunctionality hierarchy. A negative input was included of ammonia N fertilizer to represent amount of N fixed.

## Geography
Refers to weighted-average production in the Province of Alberta, Canada

## Technology
Production of faba bean includes farm practices from tillage, seeding, fertilizer application, rolling, herbicide application, fungicide application, harvest aid application, harvesting, and other field operations, to aeration and drying.

## Time period
Soil cultivating date for the main crop: May 2020; Harvesting date for the main crop: August 2020. Total time from the date of sowing to the date of harvesting comes to 19 weeks. Yield data were collected and averaged for three crop cycles (2018-2020). All other data were collected for 2020 only.

## Parameters
- LUC_crop_specific: 1 dimensionless
- yield kgha: 4598.52 kg/ha; name yield_kg_ha

## Reference product
- fava bean: 1 kg; By-product classification allocatable product; CPC 01243: Broad beans and horse beans, green; HS2017 070890: Vegetables, leguminous; (other than peas and beans), shelled or unshelled, fresh or chilled
  production volume 9.60657e6 kg
    Production volume for faba bean is provided in kg. Data is for the year 2018-2020.
  property price 1.21196 EUR2005
    Calculated value based on data from United Nations Commodity Trade Statistics Database (comtrade.un.org). UN comtrade category: 071350 - Vegetables, leguminous; broad beans (vicia faba var. major) and horse beans (vicia faba var. equina, vicia faba var. minor), shelled, whether or not skinned or split, dried. A total of 84 countries are considered for the calculations. The price was converted to EUR based on the annual exchange rates published by the European Central Bank (https://sdw.ecb.europa.eu/quickview.do?SERIES_KEY=120.EXR.A.USD.EUR.SP00.A, last accessed on 2022-02-15) and adjusted for inflation relative to 2005 using the producer price index (PPI) of the euro area, published by eurostat (https://appsso.eurostat.ec.europa.eu/nui/show.do?dataset=sts_inpp_a&lang=en, last accessed on 2022-05-04).
  properties: carbon allocation 0.365208 kg, carbon content 0.45651, carbon content, fossil 0, carbon content, non-fossil 0.45651, dry mass 0.8 kg, water content 0.25, water in wet mass 0.2 kg, wet mass 1 kg

## Inputs from technosphere
- ammonium nitrate: 0.0001 kg; lognormal variance with pedigree 0.002, pedigree (2,3,2,1,1)
  geometric standard deviation: 1.05
  properties: dry mass 1 kg, wet mass 1 kg
- ammonium sulfate: 0.0006 kg; lognormal variance with pedigree 0.002, pedigree (2,3,2,1,1)
  geometric standard deviation: 1.35
  properties: dry mass 1 kg, wet mass 1 kg
- application of plant protection product, by field sprayer: 5e-5 ha; lognormal variance with pedigree 0.0014, pedigree (1,3,2,1,1)
  Activity link to local supply of agricultural services. Geometric standard deviation: 1.43
- combine harvesting: 0.00104 ha; lognormal variance with pedigree 0.0014, pedigree (1,3,2,1,1)
  Activity link to local supply of agricultural services. Geometric standard deviation: 1.22
- fava bean seed, for sowing: 0.0554 kg; name favabean_seed_sowing; lognormal variance with pedigree 0.002, pedigree (2,3,2,1,1)
  geometric standard deviation: 1.19
  property carbon content, fossil 0; name favabean_seed_sowing_C_content_fossil
  property carbon content, non-fossil 0.45651; name favabean_seed_sow_C_content_non_fossil_0
  property dry mass 0.87 kg; name favabean_seed_sowing_DM; = favabean_seed_sowing_WM- favabean_seed_sowing_WWM
  property water content 0.149425; name favabean_seed_sowing_water_content; = favabean_seed_sowing_WWM/ favabean_seed_sowing_DM
  property water in wet mass 0.13 kg; name favabean_seed_sowing_WWM
  property wet mass 1 kg; name favabean_seed_sowing_WM
  note on carbon content, non-fossil: biogene carbon content on a dry matter basis; Composition data obtained from Broadbeans (fava beans), mature seeds, raw, in (http://www.nal.usda.gov/fnic/foodcomp/search/). First, composition data were refered to 1 kg dry mass. Then, C-contents were calculated considering a C-content/dry mass of 44% in carbohydrates (including fibres), 53% in proteins and 75% in fats. All data from ecoinvent report, n 15a, pg 40, except C-content in protein, that comes from Determination of protein concentration by total organic carbon analysis, Rouwenhorst et al., 1991, J Biochem and Biophys Methods, 22:119-128.
- glyphosate: 6.6e-5 kg; lognormal variance with pedigree 0.0014, pedigree (1,3,2,1,1)
  geometric standard deviation: 1.21
  properties: carbon content, fossil 0.214286, dry mass 1 kg, wet mass 1 kg
- land use change, annual crop: 0.000186147 ha; = (0.8560*LUC_crop_specific+0.0000*(1-LUC_crop_specific))/yield_kg_ha; lognormal variance with pedigree 0.0088, pedigree (1,3,2,1,1)
  Calculated value. Land use change (LUC) combines land transformation areas calculated with the adapted 'Direct Land Use Change Assessment Tool' version 2014 developed by Blonk Consultants and the carbon losses from soil organic carbon (SOC) and vegetation (VEG) as calculated in ecoinvent v3. See 'WFLDB-Guidelines.pdf', available at <https://ecoquery.ecoinvent.org/File/Reports>.
- monoammonium phosphate: 0.0112 kg; lognormal variance with pedigree 0.002, pedigree (2,3,2,1,1)
  geometric standard deviation: 1.48
  properties: dry mass 1 kg, nitrogen content 0.084, phosphorus content 0.226939, wet mass 1 kg
  note on nitrogen content: Nitrogen content (on a dry matter basis) of monoammonium phosphate is calculated from the molecular formula of the nutrient present in the substance.
  note on phosphorus content: Phosphorus content (on a dry matter basis) of monoammonium phosphate is calculated from the molecular formula of the nutrient present in the substance.
- pesticide, unspecified: 0.00019 kg; lognormal variance with pedigree 0.002, pedigree (1,3,2,1,2)
  geometric standard deviation: 1.05
  properties: carbon content, fossil 0.486978, dry mass 1 kg, wet mass 1 kg
- potassium chloride: 0.0014 kg; lognormal variance with pedigree 0.002, pedigree (2,3,2,1,1)
  geometric standard deviation: 1.54
  properties: dry mass 1 kg, wet mass 1 kg
- sowing: 0.00044 ha; lognormal variance with pedigree 0.0014, pedigree (1,3,2,1,1)
  Activity link to local supply of agricultural services. Geometric standard deviation: 1.32
- sulfur: 3e-6 kg; lognormal variance with pedigree 0.002, pedigree (2,3,2,1,1)
  geometric standard deviation: 1.05
  properties: dry mass 1 kg, wet mass 1 kg
- swath, by rotary windrower: 1e-5 ha; lognormal variance with pedigree 0.0014, pedigree (1,3,2,1,1)
  Activity link to local supply of agricultural services.
- tillage, harrowing, by offset disc harrow: 4e-5 ha; lognormal variance with pedigree 0.0014, pedigree (1,3,2,1,1)
  Activity link to local supply of agricultural services.
- tillage, harrowing, by rotary harrow: 0.00016 ha; lognormal variance with pedigree 0.0014, pedigree (1,3,2,1,1)
  Activity link to local supply of agricultural services.
- tillage, rolling: 0.00025 ha; lognormal variance with pedigree 0.0014, pedigree (1,3,2,1,1)
  Activity link to local supply of agricultural services.
- urea: 0.0003 kg; lognormal variance with pedigree 0.002, pedigree (2,3,2,1,1)
  geometric standard deviation: 1.05
  properties: carbon content, fossil 0.2, dry mass 1 kg, wet mass 1 kg

## Inputs from nature
- Occupation, annual crop, irrigated [natural resource, land]: 0.595 m2*year; lognormal variance with pedigree 0.0028, pedigree (1,3,2,1,1)
  geometric standard deviation: 2.08
- Occupation, annual crop, non-irrigated [natural resource, land]: 1.579 m2*year; lognormal variance with pedigree 0.0028, pedigree (1,3,2,1,1)
  geometric standard deviation: 2.08
- Transformation, from unspecified [natural resource, land]: 2.175 m2; lognormal variance with pedigree 0.0088, pedigree (1,3,2,1,1)
  geometric standard deviation: 2.08
- Transformation, to annual crop, irrigated [natural resource, land]: 0.595 m2; lognormal variance with pedigree 0.0088, pedigree (1,3,2,1,1)
  geometric standard deviation: 2.08
- Transformation, to annual crop, non-irrigated [natural resource, land]: 1.579 m2; lognormal variance with pedigree 0.0088, pedigree (1,3,2,1,1)
  geometric standard deviation: 2.08

## Emissions to nature
- Ammonia [air, non-urban air or from high stacks]: 9.41e-5 kg; lognormal variance with pedigree 0.0108, pedigree (3,3,2,1,1)
  geometric standard deviation: 1.2
- Bentazone [air, non-urban air or from high stacks]: 6.8e-6 kg; lognormal variance with pedigree 0.0408, pedigree (1,3,2,1,1)
  geometric standard deviation: 1.5
- Carbon dioxide, fossil [air, non-urban air or from high stacks]: 0.0004129 kg; lognormal variance with pedigree 0.0014, pedigree (1,3,2,1,1)
  geometric standard deviation: 1.05
- Clethodim [air, non-urban air or from high stacks]: 1e-7 kg; lognormal variance with pedigree 0.0408, pedigree (1,3,2,1,1)
  geometric standard deviation: 1.5
- Dinitrogen monoxide [air, non-urban air or from high stacks]: 9.25e-5 kg; lognormal variance with pedigree 0.0328, pedigree (3,3,2,1,1)
  geometric standard deviation: 1.4
- Diquat dibromide [air, non-urban air or from high stacks]: 5e-6 kg; lognormal variance with pedigree 0.0408, pedigree (1,3,2,1,1)
  geometric standard deviation: 1.5
- Ethalfluralin [air, non-urban air or from high stacks]: 2.1e-6 kg; lognormal variance with pedigree 0.0408, pedigree (1,3,2,1,1)
  geometric standard deviation: 1.5
- Fluxapyroxad [air, non-urban air or from high stacks]: 2e-7 kg; lognormal variance with pedigree 0.0408, pedigree (1,3,2,1,1)
  geometric standard deviation: 1.5
- Glyphosate [air, non-urban air or from high stacks]: 6.6e-6 kg; lognormal variance with pedigree 0.0408, pedigree (1,3,2,1,1)
  geometric standard deviation: 1.5
- Imazamox [air, non-urban air or from high stacks]: 3e-7 kg; lognormal variance with pedigree 0.0408, pedigree (1,3,2,1,1)
  geometric standard deviation: 1.5
- Imazethapyr [air, non-urban air or from high stacks]: 1e-8 kg; lognormal variance with pedigree 0.0408, pedigree (1,3,2,1,1)
  geometric standard deviation: 1.5
- Lambda-cyhalothrin [air, non-urban air or from high stacks]: 2e-8 kg; lognormal variance with pedigree 0.0408, pedigree (1,3,2,1,1)
  geometric standard deviation: 1.5
- Nitrogen oxides [air, non-urban air or from high stacks]: 1.85e-5 kg; lognormal variance with pedigree 0.0358, pedigree (3,3,2,1,1)
  geometric standard deviation: 1.4
- Prothioconazole [air, non-urban air or from high stacks]: 3e-7 kg; lognormal variance with pedigree 0.0408, pedigree (1,3,2,1,1)
  geometric standard deviation: 1.5
- Pyraclostrobin [air, non-urban air or from high stacks]: 3e-7 kg; lognormal variance with pedigree 0.0408, pedigree (1,3,2,1,1)
  geometric standard deviation: 1.5
- Saflufenacil [air, non-urban air or from high stacks]: 1e-6 kg; lognormal variance with pedigree 0.0408, pedigree (1,3,2,1,1)
  geometric standard deviation: 1.5
- Sulfentrazone [air, non-urban air or from high stacks]: 3e-7 kg; lognormal variance with pedigree 0.0408, pedigree (1,3,2,1,1)
  geometric standard deviation: 1.5
- Tribenuron-methyl [air, non-urban air or from high stacks]: 5e-9 kg; lognormal variance with pedigree 0.0408, pedigree (1,3,2,1,1)
  geometric standard deviation: 1.5
- Trifloxystrobin [air, non-urban air or from high stacks]: 2e-7 kg; lognormal variance with pedigree 0.0408, pedigree (1,3,2,1,1)
  geometric standard deviation: 1.5
- Trifluralin [air, non-urban air or from high stacks]: 8e-7 kg; lognormal variance with pedigree 0.0408, pedigree (1,3,2,1,1)
  geometric standard deviation: 1.5
- Bentazone [soil, agricultural]: 5.23e-5 kg; lognormal variance with pedigree 0.0408, pedigree (1,3,2,1,1)
  geometric standard deviation: 1.2
- Boscalid [soil, agricultural]: 1.53e-5 kg; lognormal variance with pedigree 0.0408, pedigree (1,3,2,1,1)
  geometric standard deviation: 1.2
- Cadmium II [soil, agricultural]: -1.11661e-7 kg
- Chromium III [soil, agricultural]: -7.67986e-6 kg
- Clethodim [soil, agricultural]: 8e-7 kg; lognormal variance with pedigree 0.0408, pedigree (1,3,2,1,1)
  geometric standard deviation: 1.2
- Copper ion [soil, agricultural]: -1.08435e-5 kg
- Diquat dibromide [soil, agricultural]: 3.6e-5 kg; lognormal variance with pedigree 0.0408, pedigree (1,3,2,1,1)
  geometric standard deviation: 1.2
- Ethalfluralin [soil, agricultural]: 1.62e-5 kg; lognormal variance with pedigree 0.0408, pedigree (1,3,2,1,1)
  geometric standard deviation: 1.2
- Fluxapyroxad [soil, agricultural]: 1.3e-6 kg; lognormal variance with pedigree 0.0408, pedigree (1,3,2,1,1)
  geometric standard deviation: 1.2
- Glyphosate [soil, agricultural]: 5.03e-5 kg; lognormal variance with pedigree 0.0408, pedigree (1,3,2,1,1)
  geometric standard deviation: 1.2
- Imazamox [soil, agricultural]: 2.4e-6 kg; lognormal variance with pedigree 0.0408, pedigree (1,3,2,1,1)
  geometric standard deviation: 1.2
- Imazethapyr [soil, agricultural]: 9e-8 kg; lognormal variance with pedigree 0.0408, pedigree (1,3,2,1,1)
  geometric standard deviation: 1.2
- Lambda-cyhalothrin [soil, agricultural]: 1.5e-7 kg; lognormal variance with pedigree 0.0408, pedigree (1,3,2,1,1)
  geometric standard deviation: 1.2
- Lead II [soil, agricultural]: -6.994e-7 kg
- Mercury II [soil, agricultural]: -4.37561e-8 kg
- Nickel II [soil, agricultural]: -2.30894e-6 kg
- Nitrate [soil, unspecified]: 0.0109322 kg; lognormal variance with pedigree 0.0358, pedigree (3,3,2,1,1)
  geometric standard deviation: 1.5
- Prothioconazole [soil, agricultural]: 2e-6 kg; lognormal variance with pedigree 0.0408, pedigree (1,3,2,1,1)
  geometric standard deviation: 1.2
- Pyraclostrobin [soil, agricultural]: 2.6e-6 kg; lognormal variance with pedigree 0.0408, pedigree (1,3,2,1,1)
  geometric standard deviation: 1.2
- Saflufenacil [soil, agricultural]: 8e-6 kg; lognormal variance with pedigree 0.0408, pedigree (1,3,2,1,1)
  geometric standard deviation: 1.2
- Sulfentrazone [soil, agricultural]: 2.6e-6 kg; lognormal variance with pedigree 0.0408, pedigree (1,3,2,1,1)
  geometric standard deviation: 1.2
- Tribenuron-methyl [soil, agricultural]: 3.5e-8 kg; lognormal variance with pedigree 0.0408, pedigree (1,3,2,1,1)
  geometric standard deviation: 1.2
- Trifloxystrobin [soil, agricultural]: 1.7e-6 kg; lognormal variance with pedigree 0.0408, pedigree (1,3,2,1,1)
  geometric standard deviation: 1.2
- Trifluralin [soil, agricultural]: 6.2e-6 kg; lognormal variance with pedigree 0.0408, pedigree (1,3,2,1,1)
  geometric standard deviation: 1.2
- Zinc II [soil, agricultural]: -3.27035e-5 kg
- Bentazone [water, ground-]: 5.8e-6 kg; lognormal variance with pedigree 0.0408, pedigree (1,3,2,1,1)
  geometric standard deviation: 1.5
- Cadmium II [water, ground-]: 3.15504e-9 kg; lognormal variance with pedigree 0.08776, pedigree (2,3,2,1,1)
- Cadmium II [water, surface water]: 3.31452e-8 kg; lognormal variance with pedigree 0.08776, pedigree (2,3,2,1,1)
- Chromium III [water, ground-]: 2.15088e-6 kg; lognormal variance with pedigree 0.08776, pedigree (2,3,2,1,1)
- Chromium III [water, surface water]: 5.35146e-6 kg; lognormal variance with pedigree 0.08776, pedigree (2,3,2,1,1)
- Clethodim [water, ground-]: 1e-7 kg; lognormal variance with pedigree 0.0408, pedigree (1,3,2,1,1)
  geometric standard deviation: 1.5
- Copper ion [water, ground-]: 3.76678e-7 kg; lognormal variance with pedigree 0.08776, pedigree (2,3,2,1,1)
- Copper ion [water, surface water]: 4.60297e-6 kg; lognormal variance with pedigree 0.08776, pedigree (2,3,2,1,1)
- Diquat dibromide [water, ground-]: 4e-6 kg; lognormal variance with pedigree 0.0408, pedigree (1,3,2,1,1)
  geometric standard deviation: 1.5
- Ethalfluralin [water, ground-]: 1.8e-6 kg; lognormal variance with pedigree 0.0408, pedigree (1,3,2,1,1)
  geometric standard deviation: 1.5
- Fluxapyroxad [water, ground-]: 1e-7 kg; lognormal variance with pedigree 0.0408, pedigree (1,3,2,1,1)
  geometric standard deviation: 1.5
- Glyphosate [water, ground-]: 5.6e-6 kg; lognormal variance with pedigree 0.0408, pedigree (1,3,2,1,1)
  geometric standard deviation: 1.5
- Imazamox [water, ground-]: 3e-7 kg; lognormal variance with pedigree 0.0408, pedigree (1,3,2,1,1)
  geometric standard deviation: 1.5
- Imazethapyr [water, ground-]: 1e-8 kg; lognormal variance with pedigree 0.0408, pedigree (1,3,2,1,1)
  geometric standard deviation: 1.5
- Lambda-cyhalothrin [water, ground-]: 2e-8 kg; lognormal variance with pedigree 0.0408, pedigree (1,3,2,1,1)
  geometric standard deviation: 1.5
- Lead II [water, ground-]: 2.82599e-9 kg; lognormal variance with pedigree 0.08776, pedigree (2,3,2,1,1)
- Lead II [water, surface water]: 2.01015e-7 kg; lognormal variance with pedigree 0.08776, pedigree (2,3,2,1,1)
- Mercury II [water, ground-]: 5.63733e-11 kg; lognormal variance with pedigree 0.08776, pedigree (2,3,2,1,1)
- Mercury II [water, surface water]: 6.92831e-9 kg; lognormal variance with pedigree 0.08776, pedigree (2,3,2,1,1)
- Nickel II [water, surface water]: 1.3692e-6 kg; lognormal variance with pedigree 0.08776, pedigree (2,3,2,1,1)
- Phosphate [water, ground-]: 1.47e-5 kg; lognormal variance with pedigree 0.0408, pedigree (1,3,2,1,1)
  geometric standard deviation: 1.5
- Phosphate [water, surface water]: 3.97e-5 kg; lognormal variance with pedigree 0.0358, pedigree (3,3,2,1,1)
  geometric standard deviation: 1.5
- Prothioconazole [water, ground-]: 2e-7 kg; lognormal variance with pedigree 0.0408, pedigree (1,3,2,1,1)
  geometric standard deviation: 1.5
- Pyraclostrobin [water, ground-]: 3e-7 kg; lognormal variance with pedigree 0.0408, pedigree (1,3,2,1,1)
  geometric standard deviation: 1.5
- Saflufenacil [water, ground-]: 9e-7 kg; lognormal variance with pedigree 0.0408, pedigree (1,3,2,1,1)
  geometric standard deviation: 1.5
- Sulfentrazone [water, ground-]: 3e-7 kg; lognormal variance with pedigree 0.0408, pedigree (1,3,2,1,1)
  geometric standard deviation: 1.5
- Tribenuron-methyl [water, ground-]: 4e-9 kg; lognormal variance with pedigree 0.0408, pedigree (1,3,2,1,1)
  geometric standard deviation: 1.5
- Trifloxystrobin [water, ground-]: 2e-7 kg; lognormal variance with pedigree 0.0408, pedigree (1,3,2,1,1)
  geometric standard deviation: 1.5
- Trifluralin [water, ground-]: 7e-7 kg; lognormal variance with pedigree 0.0408, pedigree (1,3,2,1,1)
  geometric standard deviation: 1.5
- Zinc II [water, ground-]: 8.24157e-7 kg; lognormal variance with pedigree 0.08776, pedigree (2,3,2,1,1)
- Zinc II [water, surface water]: 2.71114e-6 kg; lognormal variance with pedigree 0.08776, pedigree (2,3,2,1,1)

## Sampling procedure
Site-specific field data were collected via survey from prairie province faba bean producers for crop rotation, seeding rate, machinery and fuel use for field operations (e.g., tillage, harrowing, harvest), farm inputs (e.g., fertilizers, pesticides), and electricity for crop drying. Production weighted averages were calculated for the region. Outliers were removed from reported fuel use data based on visual inspection.

## Extrapolations
Geographical location of each farm was used to identify the Reconciliation Units (soil and climate based provincial divisions) identified by Agriculture and Agri-Food Canada (AAFC) and AAFC Reporting Zone (ecozone) to which each farm belongs. Production-weighted average datasets were calculated for each ecozone.
