# operation, solar collector system, evacuated tube collector, one-family house, for combined system

Dataset: EcoSpold 2, unit process
Geography: RoW
Time period: 2002-01-01 to 2023-12-31
Technology level: current
Classification: ISIC rev.4 ecoinvent: 3530:Steam and air conditioning supply
Classification: EcoSpold01Categories: solar collector systems/systems
Tags: Operation; ConvertedDataset
Scenario: Business-as-Usual
System model: Allocation, cut-off by classification
Generated by: Niels Jungbluth
Published in: Jungbluth, N. 2007
Database: ecoinvent
isCopyrightProtected: true
accessRestrictedTo: 1

## General comment
Use of a solar system excluding the necessary auxiliary heating.
[This dataset was already contained in the ecoinvent database version 2. It was not individually updated during the transfer to ecoinvent version 3. Life Cycle Impact Assessment results may still have changed, as they are affected by changes in the supply chain, i.e. in other datasets. This dataset was generated following the ecoinvent quality guidelines for version 2. It may have been subject to central changes described in the ecoinvent version 3 change report (http://www.ecoinvent.org/database/ecoinvent-version-3/reports-of-changes/), and the results of the central updates were reviewed extensively. The changes added e.g. consistent water flows and other information throughout the database. The documentation of this dataset can be found in the ecoinvent reports of version 2, which are still available via the ecoinvent website. The change report linked above covers all central changes that were made during the conversion process.]

## Included activities end
Delivery of heat with a solar system including maintenance and electricity use for operation. Excluding the necessary auxiliary heating.

## Geography
Solar collector system operated in CH.

## Technology
Operation of a solar system, not including the necessary additional heating.

## Time period
Time of simulation.

## Reference product
- heat, central or small-scale, other than natural gas: 1 MJ; By-product classification allocatable product; CPC 17300: Steam and hot water
  EcoSpold01Location=CH
  production volume 2.87236e8 MJ
    Assumption. The share of heat from solar collectors is globally very small: >0.01% according to IEA statistics for 2009.
    This production volume does not correspond to the heat productio in reality, but reflects the mentioned share distributed on the four solar collector system types modelled in the database.
    See talk pages for further discussion of the modelling of the heat markets.
    http://www.iea.org/stats/electricitydata.asp?COUNTRY_CODE=29
  property price 0.0106 EUR2005
    Average European district heat price from Ecoheatcool and Euroheat 2005-2006, Ecoheat Work package 1: The European heat market. Final report. 10.6 EUR/GJ i s the price of district heat. http://www.solarthermalworld.org/files/Ecoheatcool%20WP1%20Web.pdf?download
  properties: carbon allocation 0 kg, carbon content 0, heating value, net 1 MJ

## Inputs from technosphere
- electricity, low voltage: 0.000366566, 0.00162864, 1.6363e-5, 0.000257318, 0.00534097, 0.00052718, 0.000134603, 3.2837e-6, 0.00121047, 9.10963e-5 kWh (10 suppliers, which the file names only by identifier); sum of these 0.0095765 kWh; lognormal variance with pedigree 0.0512, pedigree (2,5,5,5,1)
  EcoSpold01Location=CH
  Simulation
  Uncertainty: Simulation
- solar collector system, with evacuated tube collector, one-family house, combined system: 2.134e-6 unit; lognormal variance with pedigree 0.3506, pedigree (2,5,5,5,1)
  EcoSpold01Location=CH
  Simulation
  Uncertainty: Simulation

## Inputs from nature
- Energy, solar, converted [natural resource, in air]: 1.1334 MJ; lognormal variance with pedigree 0.0411891, pedigree (2,1,5,1,1)
  Includes losses in the system.

## Sampling procedure
Simulation done by SPF Rapperswil with Polysun 3.3 computer programme.

## Extrapolations
none This dataset has been copied from an original dataset covering the geography CH. The uncertainty has been adjusted accordingly.

## Review by Sebastiano Meier 2007-08-13
passed
none
