# ethanol, from fermentation, to market for ethanol, vehicle grade

Dataset: EcoSpold 2, unit process
Geography: RoW
Time period: 2005-01-01 to 2023-12-31
Technology level: current
Classification: ISIC rev.4 ecoinvent: 2011:Manufacture of basic chemicals
Synonyms: ethyl hydroxide; algrain; Alkohol; alcohol dehydrated; cologne spirit; Ethanol absolute; Denatured alcohol; cologne spirits (alcohol); Anhydrol; ethanol 200 proof; ethyl hydrate; Ethanol; Ethyl alcohol; fermentation alcohol; grain alcohol
Scenario: Business-as-Usual
System model: Allocation, cut-off by classification
Generated by: Sofia Parada Tur
Database: ecoinvent
isCopyrightProtected: true
accessRestrictedTo: 1

## General comment
This activity links the output of the generic market for ethanol, without water, in 99.7% solution state, from fermentation to the niche market for ethanol, without water, in 99.7% solution state, from fermentation, at service station.
The niche market provides ethanol for petrol production.

## Included activities start
Activity starting with the input of ethanol, without water, in 99.7% solution state, from fermentation

## Included activities end
Activity ends with the provision of ethanol, without water, in 99.7% solution state, from fermentation, at service station

## Time period
based on reference year for production volume of ethanol at service station

## Reference product
- ethanol, without water, in 99.7% solution state, from fermentation, vehicle grade: 1 kg; By-product classification allocatable product; CPC 35491: Biodiesel; HS2017 290511: Alcohols; saturated monohydric, methanol (methyl alcohol); CAS 64-17-5
  production volume 2.97863e13 kg; = (1.7E13*(1+1.73E-1)^(2005-2000))*7.89E-1
    UNEP provides the world production volume of ethanol for fuel purpose for the years 2000 and 20007, namely 1.7E13 L and 5.2E13 L. From the 2 values, the growth rate is calculated, namely 1.73E-1. The mass of ethanol is calculated with the density of ethanol, 7.89E-1 kg/L
  property heating value, net 28.1 MJ
    Based on literature, page 275, Report 17: Jungbluth, N., Chudacoff, M., Dauriat, A., Dinkel, F., Doka, G., Faist Emmenegger, M., Gnansounou, E., Kljun, N., Schleiss, K., Spielmann, M., Stettler, C., Sutter, J. 2007: Life Cycle Inventories of Bioenergy. ecoinvent report No. 17, Swiss Centre for Life Cycle Inventories, Dübendorf, CH.
  property price 0.479 EUR2005
    Estimated to be 10% more than in case of ethanol, without water, in 99.7% solution state, from fermentation, at service station
  properties: carbon allocation 0.521739 kg, carbon content 0.521739, carbon content, fossil 0, carbon content, non-fossil 0.521739, dry mass 1 kg, water content 0, water in wet mass 0 kg, wet mass 1 kg

## Inputs from technosphere
- ethanol, without water, in 99.7% solution state, from fermentation: 1 kg
  properties: carbon content, non-fossil 0.521739, dry mass 1 kg, heating value, net 28.1 MJ, wet mass 1 kg
  note on heating value, net: Based on literature, page 275, Report 17: Jungbluth, N., Chudacoff, M., Dauriat, A., Dinkel, F., Doka, G., Faist Emmenegger, M., Gnansounou, E., Kljun, N., Schleiss, K., Spielmann, M., Stettler, C., Sutter, J. 2007: Life Cycle Inventories of Bioenergy. ecoinvent report No. 17, Swiss Centre for Life Cycle Inventories, Dübendorf, CH.

## Review by Bo Weidema 2012-04-13
Process is a simple re-naming of a product in order to supply the service stations.
