# welding, gas, steel

Dataset: EcoSpold 2, unit process
Geography: RER
Time period: 1997-01-01 to 2023-12-31
Technology level: current
Classification: EcoSpold01Categories: metals/processing
Classification: ISIC rev.4 ecoinvent: 2592:Treatment and coating of metals; machining
Tags: ConvertedDataset
Scenario: Business-as-Usual
System model: Allocation, cut-off by classification
Generated by: Hans-Jörg Althaus
Published in: Classen M. 2009
Database: ecoinvent
isCopyrightProtected: true
accessRestrictedTo: 1

## General comment
Based partly on rather rough estimates and on input data of poor quality (acetylene). Not to be used if welding is of importance in the system considered.
[This dataset was already contained in the ecoinvent database version 2. It was not individually updated during the transfer to ecoinvent version 3. Life Cycle Impact Assessment results may still have changed, as they are affected by changes in the supply chain, i.e. in other datasets. This dataset was generated following the ecoinvent quality guidelines for version 2. It may have been subject to central changes described in the ecoinvent version 3 change report (http://www.ecoinvent.org/database/ecoinvent-version-3/reports-of-changes/), and the results of the central updates were reviewed extensively. The changes added e.g. consistent water flows and other information throughout the database. The documentation of this dataset can be found in the ecoinvent reports of version 2, which are still available via the ecoinvent website. The change report linked above covers all central changes that were made during the conversion process.]

## Included activities start
The activity starts with the materials entering the process. The material on which this activity is applied it is not included as input.

## Included activities end
Includes the acetylene welding of non alloyed steel and the transports of the filler rod and the protective gas to the place of use.

## Geography
Data-set is representive for Europe

## Technology
Acetylene welding with a wire consumption of 0.0536 kg/m

## Reference product
- welding, gas, steel: 1 m; By-product classification allocatable product; CPC 88731: Metal treatment and coating services
  EcoSpold01Location=RER
  production volume 1.32237 m
    This is a placeholder value that does not reflect real-world production volumes. This dataset does not currently require a real-world production volume to work in the database framework, and no actual data were collected yet. This has no negative effect on the results of the ecoinvent database. The placeholder value of this activity was scaled according to the nominal GDP of 2005 (source: United Nations, http://data.un.org/Glossary.aspx?q=GDP+%28current+US%24%29, accessed 20130726) to reflect an appropriate share of the global production volume, which is also a placeholder value.
  property price 0.0345862 EUR2005
    Calculated based on inputs: The price of the product has been calculated as a sum of the values of the material and energy inputs for this product. This value is therefore a rough estimation. It may underestimate the real price since there are additional expenses when producing any product. These expences can include for example labour costs, treatment of waste materials and profit for the producer. Please consider carefully whether this level of data quality is acceptable for your application.
  properties: carbon allocation 0 kg, carbon content 0

## Inputs from technosphere
- acetylene: 0.00976 kg; lognormal variance with pedigree 0.156, pedigree (4,5,5,1,4)
  EcoSpold01Location=CH
  properties: carbon content, fossil 0.923077, dry mass 1 kg, heating value, net 51.2 MJ, wet mass 1 kg
  note on carbon content, fossil: C2H2. ecoinvent v2.2 report n 8. Produced from partial oxidation of natural gas
  note on heating value, net: Based on literature, page 25 (Value may refer to HHV), Althaus H.-J., Chudacoff M., Hischier R., Jungbluth N., Osses M. and Primas A. (2007) Life Cycle Inventories of Chemicals. Final report ecoinvent data v2.0 No. 8. EMPA, Swiss Centre for Life Cycle Inventories, Dübendorf, CH, Online-Version under: www.ecoinvent.org.
- oxygen, liquid: 0.0114 kg; lognormal variance with pedigree 0.156, pedigree (4,5,5,1,4)
  EcoSpold01Location=RER
  properties: dry mass 1 kg, wet mass 1 kg
- steel, low-alloyed, hot rolled: 0.0536 kg; lognormal variance with pedigree 0.076, pedigree (4,5,5,1,1)
  EcoSpold01Location=RER
  properties: carbon content, fossil 0.005, dry mass 1 kg, wet mass 1 kg
  note on carbon content, fossil: Low alloyed steel composition given in Tab. 3.2 ecoinvent v2.2 report 10_partII. Steel assumed to have a C content of 0.5%

## Emissions to nature
- Acetylene [air, unspecified]: 9.76e-5 kg; lognormal variance with pedigree 0.5, pedigree (5,5,5,5,5)
- Carbon dioxide, fossil [air, unspecified]: 0.0324 kg; lognormal variance with pedigree 0.1141, pedigree (4,5,5,3,3)
- Carbon monoxide, fossil [air, unspecified]: 0.000203 kg; lognormal variance with pedigree 0.7741, pedigree (4,5,5,3,3)
- Chromium III [air, unspecified]: 2.81e-5 kg; lognormal variance with pedigree 0.7561, pedigree (1,5,5,3,3)
- Chromium VI [air, unspecified]: 3e-8 kg; lognormal variance with pedigree 0.7561, pedigree (1,5,5,3,3)
- Copper ion [air, unspecified]: 2.1e-7 kg; lognormal variance with pedigree 0.1461, pedigree (1,5,5,3,3)
- Iron ion [air, unspecified]: 8.74e-5 kg; lognormal variance with pedigree 0.1461, pedigree (1,5,5,3,3)
- Manganese II [air, unspecified]: 1.12e-5 kg; lognormal variance with pedigree 0.7561, pedigree (1,5,5,3,3)
- Molybdenum VI [air, unspecified]: 2.16e-6 kg; lognormal variance with pedigree 0.7561, pedigree (1,5,5,3,3)
- Nickel II [air, unspecified]: 1.12e-5 kg; lognormal variance with pedigree 0.7561, pedigree (1,5,5,3,3)
- Nitrogen oxides [air, unspecified]: 2e-6 kg; lognormal variance with pedigree 0.1461, pedigree (1,5,5,3,3)
- Ozone [air, unspecified]: 9.06e-6 kg; lognormal variance with pedigree 0.1461, pedigree (1,5,5,3,3)
- Particulate Matter, < 2.5 um [air, unspecified]: 0.000141 kg; lognormal variance with pedigree 0.4241, pedigree (4,5,5,3,3)
- Zinc II [air, unspecified]: 4.2e-7 kg; lognormal variance with pedigree 0.7561, pedigree (1,5,5,3,3)

## Sampling procedure
Literature

## Review by Roland Hischier 2003-06-17
Passed.
