# tap water production, conventional treatment

Dataset: EcoSpold 2, unit process
Geography: ZA
Time period: 2012-01-01 to 2023-12-31
Technology level: current
Classification: ISIC rev.4 ecoinvent: 3600:Water collection, treatment and supply
Classification: EcoSpold01Categories: water supply/production
Synonyms: potable water
Scenario: Business-as-Usual
System model: Allocation, cut-off by classification
Share of production covered: 32 %
Generated by: Laura Rubio
Published in: Gmünder S. 2017
Database: ecoinvent
isCopyrightProtected: true
accessRestrictedTo: 1

## General comment
This dataset represents production of 1 kg of tap water under pressure at facility gate, ready for distribution in network. It represents average operation of conventional treatment for production tap water. Conventional treatment includes coagulation, flocculation and decantation. In some occasions the treatment also includes, chemical application, filtration, pH stabilization and/or softening, which can be present in some plants. Inventory was constructed from reported chemicals, energy inputs and wastes from Rand Water treatment plant, one of the biggest water boards responsible for local water provision and quality in South Africa.

## Included activities start
This activity starts from tap water, under pressure, at tap water treatment plant and fed into tap water distribution network.

## Included activities end
This dataset ends with the production of tap water, at facility gate, under pressure. It includes energy for intake pumping and treatment system, as well as the energy of the pump pressurizing water to the beginning of the network. It includes all chemicals and material added to the water during treatment. It excludes energy for pumping stations and water losses within the network as they are included in the tap water market. Emissions to the environment occurring during the treatment and during the distribution were not considered as they are assumed negligible. Main substance in water that would be released in the environment are assumed to be considered in wastewater processes.

## Geography
Extrapolated data from Rand Water conventional treatment plant in South Africa ( one of the biggest water boards in the country), which accounts for 32% of the total produced tap water in South Africa. The uncertainty was adjusted accordingly.

## Technology
Most Frequent technology in tap water production facility in South Africa

## Time period
The time period is set from 2012 to the year 2017 as it is aconsidering period in which conventional treatment data has not passed through drastic changes.

## Parameters
- unit conversion, days in a year: 365.25 d/year; name days_per_year; lognormal variance with pedigree 0.0006, pedigree (1,1,1,1,1)
  Conversion factor.

## Reference product
- tap water: 1 kg; name tapwater; By-product classification allocatable product; CPC 18000: Natural water; CAS 7732-18-5
  production volume 3.59331e12 kg; name PV_tapwater; = 4149318500000*0.866
    Calculated value based on AQUASTAT total tap water production volume (AQUASTAT, 2010) - <http://www.fao.org/nr/water/aquastat/data/popups/itemDefn.html?id=4251>. Further water treatment technology mix was based on “ Survey of disinfection efficiency of small drinking water treatment plants : Challenges facing small water treatment plants in South Africa” report- Momba, M. N. B., Obi, C. L., & Thompson, P. (2009), which complied data from 181 small conventional treatment plants in varoius parts of the country. Overall the production technology shares, present in the ecoinvent database, are calculated to be as follows; tap water production, conventional treatment (86.6%) followed by underground water with disinfection treatment (13.4%)
  property price 0.000397 EUR2005
    Converted from EU price by using Purchasing Power Parities (0.8458 in 2003 and 0.8426 in 2004)
  properties: carbon allocation 6.08566e-7 kg, carbon content 0.0017899, carbon content, fossil 0.0017899, carbon content, non-fossil 0, dry mass 0.00034 kg, water content 2940.18, water in wet mass 0.99966 kg, wet mass 1 kg

## Inputs from technosphere
- activated silica: 2e-6 kg; lognormal variance with pedigree 0.0032, pedigree (1,3,3,1,1)
  Measured value. Value represents average according to Rand Water conventional treatment plant in South Africa.Retrieved from: http://www.waterwise.co.za/site/water/purification/story-tap-water.html
  properties: dry mass 1 kg, wet mass 1 kg
- chlorine, liquid: 2.06e-6 kg; = 2/1000000*1.03; lognormal variance with pedigree 0.0032, pedigree (1,3,3,1,1)
  (same comment as for activated silica)
  properties: dry mass 1 kg, wet mass 1 kg
- electricity, medium voltage: 0.000427 kWh; source SUNASS 2015; lognormal variance with pedigree 0.0058, pedigree (2,3,3,5,1)
  Measured value copied from "tap water production, conventional treatment, GLO" dataset (accessed 20170920) as it was considered adequate also for this dataset. Average electricity consumption for entire process including pumping for water intake and pumping for distribution at the plant gate. All 9 plant reported electricity use. Values reported varied from 7.32e-4 to 2.74e-4 kWh/kg.
- heat, district or industrial, natural gas: 0.000178498 MJ; source SUNASS 2015; lognormal variance with pedigree 0.004, pedigree (1,1,3,5,1)
  Calculated value.This mathematical function was taken from the "tap water production, conventional treatment, GLO" dataset (accessed 20170920) as it was considered adequate also for this dataset.
  Uncertainty: C
  property Corresponding fuel use 1.11 MJ; name fuel_use
  property fuel input in physical units, m3 4.43e-6 m3; name fuel_input
  property heating value, net 1 MJ; name heating_value
  note on Corresponding fuel use: Lower heating value of the fuel input related to the heat/electricity output
  note on fuel input in physical units, m3: Measured value. Average natural gas consumption in surveyed conventional treatment plants. Note than only 4 of the 9 conventional plants reported using natural gas. Plants not reporting natural gas were attributed an input value of 0 during the calculation of the weighted average.
- iron(III) chloride, without water, in 14% iron solution state: 3e-6 kg; lognormal variance with pedigree 0.0032, pedigree (1,3,3,1,1)
  (same comment as for activated silica)
  properties: dry mass 1 kg, wet mass 1 kg
- lime, hydrated, loose weight: 6.25e-5 kg; lognormal variance with pedigree 0.0032, pedigree (1,3,3,1,1)
  (same comment as for activated silica)
  properties: dry mass 0.997 kg, water content 0.00300903, wet mass 1 kg
- silica sand: 1.49834e-6 kg; lognormal variance with pedigree 0.0072, pedigree (3,3,3,5,1)
  Calculated value taken from: " tap water production, conventional treatment, GLO" as it was also considered adequate. Amount of sand to compensate losses through sand filter washing. Extrapolated to all plant from one reported value. Also includes average use of micro-sand for adjustment for this technology. Note that only 1 of the 9 conventional plants reported using micro-sand. Plants not reporting this consumable were attributed an input value of 0 during the calculation of the weighted average.
  properties: dry mass 0.99 kg, water content 0.010101, wet mass 1 kg
- tap water: 2.1e-5 kg; lognormal variance with pedigree 0.0072, pedigree (3,3,3,5,1)
  Calculated value. This value was taken from the "tap water production, conventional treatment, GLO" dataset (accessed 20170920) as it was considered adequate also for this dataset. Water content of hypochlorite solution, prehydrolysed coagulant and aluminium sulfate.
  properties: carbon content, fossil 0.00178991, dry mass 0.000337476 kg, water content 2962.17, wet mass 1 kg
  note on carbon content, fossil: Bicarbonate content is 2.93 mol/m3. CO2 content is 0.1 mol/m3 (ecoinvent v2.2 report 8, Tab 93.1).
- wastewater, unpolluted: -3.2626e-5 m3; name ww; = waterIn_L+ waterIn_R-tapwater/1000; lognormal variance with pedigree 0.0038, pedigree (2,3,1,5,1)
  Measured value. This value was taken from the "tap water production, conventional treatment, GLO" dataset (accessed 20170920) as it was considered adequate also for this dataset. It represents the average amount of wastewater produced during treatment.
  production volume; = PV_tapwater*(ww/tapwater)
    Calculated from the production volume of tap water, at user in proportion to the respective output amounts.
  properties: carbon content, fossil 0.00178991, carbon content, non-fossil 0.00178991, dry mass 0.337476 kg, water content 2962.17, wet mass 1000 kg
  note on carbon content, fossil: Assumed to be like in tap water. Bicarbonate content is 2.93 mol/m3. CO2 content is 0.1 mol/m3 (ecoinvent v2.2 report 8, Tab 93.1).
- water pump operation, diesel: 1.49144e-5 MJ; = diesel_use*density_diesel*NHV; lognormal variance with pedigree 0.004, pedigree (1,1,3,5,1)
  (same comment as for heat, district or industrial, natural gas)
  property density 0.84 kg/l; name density_diesel
  property fuel input in physical units, L 4.11e-7 l; name diesel_use
  property heating value, net 43.2 MJ; name NHV
  properties: price 0.07 EUR2005
  note on fuel input in physical units, L: Estimated value. Represents diesel volume consumed in a year for routine runs of emergency generators. Value is based on diesel consumption from the underground water without treatment dataset.
  note on heating value, net: Literature. net (lower) heating (calorific) value for diesel in MJ/kg
- water works, capacity 1.1E10l/year: 1.52103e-12 unit; = 1/(Q_av* days_per_year*lifetime*UnitConversion(1, 'm3', 'l')); source SUNASS 2015; lognormal variance with pedigree 0.004, pedigree (1,1,3,5,1)
  Calculated value. This mathematical relation was taken from the "tap water production, conventional treatment, GLO" dataset (accessed 20170920) as it was considered adequate also for this dataset. Amount of water works construction attributed to the production of 1kg of tap water. Value is based on assumed lifetime production of water treatment plant and an assumed typical medium-sized plant of 30,000 m3/day.
  Uncertainty: C
  property lifetime 60 year; name lifetime
  property plant average daily flow rate 30000 m3/d; name Q_av
  note on lifetime: Estimated Value. Expected lifetime of water works as defined in the construction process.
  note on plant average daily flow rate: Fixed values, Flow rate of a conventional water purification plant for a medium-size facility as defined in the water works process.

## Inputs from nature
- Water, lake [natural resource, in water]: 8.83825e-5 m3; name waterIn_L; = tapwater*1.032626* 0.08559 /1000; lognormal variance with pedigree 0.0066, pedigree (3,1,3,5,1)
  Calculated value. It is assumed that the treatment process itselve have 3.3% losses and that 9% of the water is supplied by the lakes and 91% by rivers, similar to the GLO dataset.
- Water, river [natural resource, in water]: 0.000944244 m3; name waterIn_R; = tapwater*1.032626* (1-0.08559) /1000; lognormal variance with pedigree 0.0066, pedigree (3,1,3,5,1)
  (same comment as for Water, lake)

## Sampling procedure
Based on data from Rand Water, one of the biggest water board responsible for local water provision and quality, which accounts for 32% of the total produced tap water in South Africa. Conventional tap production facilities were regionalized in accordance to this company reported data ( Retrieved from http://www.waterwise.co.za/site/water/purification/story-tap-water.html)

## Extrapolations
From 1 conventional water board tap water production facilities in South Africa to all conventional facility in the country. Conventional treatment accounts for 86.6% of the total produced tap water in South Africa (assumed that all the surface water is treated with conventional treatment technology). Data was used for regionalizing chemicals and energy exchanges, the remianing exchanges were copied from the global dataset.The uncertainty has been changed accordingly.

## Review by Philippe Loubet 2017-11-23
The overall quality of this datasets is good.
In the future it would be desirable to base the inventory on several drinking water plants (instead of one).
