# treatment of residues, MSWI-WWT-SLF, waste plastic plaster, residual material landfill

Dataset: EcoSpold 2, unit process
Geography: GLO
Time period: 1994-01-01 to 2023-12-31
Technology level: current
Classification: ISIC rev.4 ecoinvent: 3822:Treatment and disposal of hazardous waste
Scenario: Business-as-Usual
System model: Allocation, cut-off by classification
Generated by: Nikolia Stoikou
Database: ecoinvent
isCopyrightProtected: true
accessRestrictedTo: 1

## General comment
The process represents the treatment of controlled landfilling in residual material landfill of a waste (residues) that is exclusively produced in another waste treatment. Residues are a by-product of municipal solid waste incineration (MSWI) of sewage sludge (with 70% water) that in turn is generated during wastewater treatment (WWT) of leachate from the sanitary landfilling (SLF) of 'waste plastic plaster, for final disposal'. Recommended use of this dataset: to be used within the specific chain of treatments for 'waste plastic plaster, for final disposal'. Share of biogenic carbon in the sludge: 0%.

## Included activities start
The activity starts with the waste being available at the gate of the treatment facility. Collection and transportation of the waste to the treatment plant is not included.

## Included activities end
The activity ends with the waste being treated and waste-specific emissions from the landfill are released to water (short-term emissions to river water and long-term emissions to ground water).

## Geography
Modelling parameters affecting the treatment technology are not specific to this geography.

## Technology
Residual material landfill for polluted, inorganic waste with base seal and leachate collection system (landfill type C). Recultivation after closure.

## Reference product
- residues, MSWI-WWT-SLF, waste plastic plaster: -1 kg; By-product classification Waste; CPC 39320: Ash and residue (except from the manufacture of iron or steel), containing metals or metallic compounds, excep[…]; HS2017 262110: Slag and ash; ash and residues from the incineration of municipal waste
  main reference product of this activity
  production volume 0.138726 kg
    calculated in proportion to incinerated waste reference product
  property price 0 EUR2005
    Waste products are assigned a price of zero as they are assumed to require further treatment.
  properties: arsenic content 2.83439e-5, cadmium content 9.41873e-5, calcium content 0.609531, carbon allocation 0.000123136 kg, carbon content 0.000123136, carbon content, fossil 0.000123136, carbon content, non-fossil 0, chromium content 1.41821e-5, cobalt content 0.000261808, dry mass 1 kg, lead content 1.69941e-5, mercury content 4.08716e-7, molybdenum content 1.45736e-5, nickel content 1.34975e-6, nitrogen content 1.42918e-6, oxygen content 0.321454, silicon content 0.0682004, tin content 2.24575e-5, water content 0, water in wet mass 0 kg, wet mass 1 kg, zinc content 0.000235574

## Inputs from technosphere
- cement, unspecified: 0.4 kg; lognormal variance with pedigree 0.049084, pedigree (1,1,5,1,1)
  cement required for solidification of landfilled residual material
  Uncertainty: Uncertainty calculated from uncertainty of composition of incinerated waste, and incinerator model uncertainty and residual material landfill transfer coefficient uncertainty.
  properties: dry mass 1 kg, wet mass 1 kg
- process-specific burdens, residual material landfill: 0.71109, 0.00841689, 0.280494 kg (3 suppliers, which the file names only by identifier); sum of these 1 kg
  mass-specific expenditures required for landfilling of residual material
- residual material landfill: 2.0833e-9 unit
  residual material landfill infrastructure required for landfilling of residual material
- waste cement, hydrated: -4.81263e-5, -0.998037, -0.00191494 kg (3 suppliers, which the file names only by identifier); sum of these -1 kg
  hydrated cement output for solidification of landfilled residual material
  production volume
    calculated in proportion to incineration residues landfilled
  properties: dry mass 1 kg, wet mass 1 kg

## Inputs from nature
- Organic carbon, placed in landfill [inventory indicator, waste]: 0.00012314 kg; lognormal variance with pedigree 0.43549, pedigree (1,1,5,1,1)
  Mass of organic carbon in waste (without inorganic carbon), initially put in residual material landfill. The exchange represents a flow that is within the technosphere. This exchange should only be used to apply ecofactors for the Swiss LCIA method of Ecological Scarcity and not any other purpose.
  Uncertainty: Uncertainty calculated from uncertainty of composition of incinerated waste, and incinerator model uncertainty and residual material landfill transfer coefficient uncertainty.
- Waste mass, total, placed in landfill [inventory indicator, waste]: 1 kg
  Mass of waste initially put in a residual material landfill. The exchange represents a flow that is within the technosphere. This exchange should only be used to apply ecofactors for the Swiss LCIA method of Ecological Scarcity and not any other purpose.

## Emissions to nature
- Hazardous waste disposed [inventory indicator, waste]: 1 kg
  Inventory indicator for waste mass disposed. To be used in EN15804 "other data" results.
- Arsenic ion [water, ground-, long-term]: 2.8344e-14 kg; lognormal variance with pedigree 1.0468, pedigree (1,1,5,1,1)
  complement of long-term emissions from residual material in residual material landfill
  Uncertainty: Uncertainty calculated from uncertainty of composition of incinerated waste, and incinerator model uncertainty and residual material landfill transfer coefficient uncertainty.
- Arsenic ion [water, surface water]: 2.8344e-5 kg; lognormal variance with pedigree 1.02319, pedigree (1,1,5,1,1)
  short-term emissions from residual material in residual material landfill
  Uncertainty: Uncertainty calculated from uncertainty of composition of incinerated waste, and incinerator model uncertainty and residual material landfill transfer coefficient uncertainty.
- BOD5, Biological Oxygen Demand [water, ground-, long-term]: 6.578e-5 kg; lognormal variance with pedigree 0.48309, pedigree (1,1,5,1,1)
  (same comment as for Arsenic ion)
- BOD5, Biological Oxygen Demand [water, surface water]: 1.0982e-7 kg; lognormal variance with pedigree 1.0785, pedigree (1,1,5,1,1)
  (same comment as for Arsenic ion)
- COD, Chemical Oxygen Demand [water, ground-, long-term]: 0.0002011 kg; lognormal variance with pedigree 0.48309, pedigree (1,1,5,1,1)
  (same comment as for Arsenic ion)
- COD, Chemical Oxygen Demand [water, surface water]: 3.3573e-7 kg; lognormal variance with pedigree 1.0785, pedigree (1,1,5,1,1)
  (same comment as for Arsenic ion)
- Cadmium II [water, ground-, long-term]: 6.3943e-7 kg; lognormal variance with pedigree 7.2878, pedigree (1,1,5,1,1)
  (same comment as for Arsenic ion)
- Cadmium II [water, surface water]: 1.0675e-9 kg; lognormal variance with pedigree 2.3, pedigree (1,1,5,1,1)
  (same comment as for Arsenic ion)
- Calcium II [water, ground-, long-term]: 0.055076 kg; lognormal variance with pedigree 1.5648, pedigree (1,1,5,1,1)
  (same comment as for Arsenic ion)
- Calcium II [water, surface water]: 9.1947e-5 kg; lognormal variance with pedigree 1.02119, pedigree (1,1,5,1,1)
  (same comment as for Arsenic ion)
- Chromium VI [water, ground-, long-term]: 2.693e-6 kg; lognormal variance with pedigree 1.1001, pedigree (1,1,5,1,1)
  (same comment as for Arsenic ion)
- Chromium VI [water, surface water]: 8.5252e-7 kg; lognormal variance with pedigree 1.2612, pedigree (1,1,5,1,1)
  (same comment as for Arsenic ion)
- Cobalt II [water, ground-, long-term]: 4.476e-5 kg; lognormal variance with pedigree 1.3456, pedigree (1,1,5,1,1)
  (same comment as for Arsenic ion)
- Cobalt II [water, surface water]: 7.4724e-8 kg; lognormal variance with pedigree 1.3826, pedigree (1,1,5,1,1)
  (same comment as for Arsenic ion)
- DOC, Dissolved Organic Carbon [water, ground-, long-term]: 7.9577e-5 kg; lognormal variance with pedigree 0.48309, pedigree (1,1,5,1,1)
  (same comment as for Arsenic ion)
- DOC, Dissolved Organic Carbon [water, surface water]: 1.3285e-7 kg; lognormal variance with pedigree 1.0785, pedigree (1,1,5,1,1)
  (same comment as for Arsenic ion)
- Lead II [water, ground-, long-term]: 8.815e-8 kg; lognormal variance with pedigree 8.0844, pedigree (1,1,5,1,1)
  (same comment as for Arsenic ion)
- Lead II [water, surface water]: 1.4716e-10 kg; lognormal variance with pedigree 2.4421, pedigree (1,1,5,1,1)
  (same comment as for Arsenic ion)
- Mercury II [water, ground-, long-term]: 1.9292e-8 kg; lognormal variance with pedigree 3.4037, pedigree (1,1,5,1,1)
  (same comment as for Arsenic ion)
- Mercury II [water, surface water]: 3.2207e-11 kg; lognormal variance with pedigree 2.0601, pedigree (1,1,5,1,1)
  (same comment as for Arsenic ion)
- Molybdenum VI [water, ground-, long-term]: 6.6908e-8 kg; lognormal variance with pedigree 0.8722, pedigree (1,1,5,1,1)
  (same comment as for Arsenic ion)
- Molybdenum VI [water, surface water]: 1.4507e-5 kg; lognormal variance with pedigree 0.8487, pedigree (1,1,5,1,1)
  (same comment as for Arsenic ion)
- Nickel II [water, ground-, long-term]: 4.8866e-7 kg; lognormal variance with pedigree 1.02605, pedigree (1,1,5,1,1)
  (same comment as for Arsenic ion)
- Nickel II [water, surface water]: 8.1579e-10 kg; lognormal variance with pedigree 1.4865, pedigree (1,1,5,1,1)
  (same comment as for Arsenic ion)
- Nitrate [water, ground-, long-term]: 5.1341e-6 kg
  complement of long-term emissions from residual material in residual material landfill
- Nitrate [water, surface water]: 1.1952e-6 kg; lognormal variance with pedigree 0.105426, pedigree (1,1,5,1,1)
  (same comment as for Arsenic ion)
- Silicon [water, ground-, long-term]: 0.068047 kg; lognormal variance with pedigree 0.1797, pedigree (1,1,5,1,1)
  (same comment as for Arsenic ion)
- Silicon [water, surface water]: 0.00015338 kg; lognormal variance with pedigree 0.72841, pedigree (1,1,5,1,1)
  (same comment as for Arsenic ion)
- TOC, Total Organic Carbon [water, ground-, long-term]: 7.9577e-5 kg; lognormal variance with pedigree 0.48309, pedigree (1,1,5,1,1)
  (same comment as for Arsenic ion)
- TOC, Total Organic Carbon [water, surface water]: 1.3285e-7 kg; lognormal variance with pedigree 1.0785, pedigree (1,1,5,1,1)
  (same comment as for Arsenic ion)
- Tin ion [water, ground-, long-term]: 4.2555e-7 kg; lognormal variance with pedigree 5.0465, pedigree (1,1,5,1,1)
  (same comment as for Arsenic ion)
- Tin ion [water, surface water]: 7.1044e-10 kg; lognormal variance with pedigree 2.2221, pedigree (1,1,5,1,1)
  (same comment as for Arsenic ion)
- Zinc II [water, ground-, long-term]: 2.8872e-6 kg; lognormal variance with pedigree 5.7674, pedigree (1,1,5,1,1)
  (same comment as for Arsenic ion)
- Zinc II [water, surface water]: 4.82e-9 kg; lognormal variance with pedigree 2.0891, pedigree (1,1,5,1,1)
  (same comment as for Arsenic ion)
