# treatment of waste polyurethane seal, sorting plant

Dataset: EcoSpold 2, unit process
Geography: CH
Time period: 1994-01-01 to 2023-12-31
Technology level: current
Classification: ISIC rev.4 ecoinvent: 3830:Materials recovery
Classification: EcoSpold01Categories: waste management/building demolition
Synonyms: PU; PUR; diol-diisocyanate copolymer
Tags: ConvertedDataset; Treatment
Scenario: Business-as-Usual
System model: Allocation, cut-off by classification
Generated by: Gabor Doka (obsolete)
Published in: Doka G. 2007
Database: ecoinvent
isCopyrightProtected: true
accessRestrictedTo: 1

## General comment
The waste contains 1kg polyurethane (GSD=100%) Waste density is 1200 kg/m3.
[This dataset was already contained in the ecoinvent database version 2. It was not individually updated during the transfer to ecoinvent version 3. Life Cycle Impact Assessment results may still have changed, as they are affected by changes in the supply chain, i.e. in other datasets. This dataset was generated following the ecoinvent quality guidelines for version 2. It may have been subject to central changes described in the ecoinvent version 3 change report (http://www.ecoinvent.org/database/ecoinvent-version-3/reports-of-changes/), and the results of the central updates were reviewed extensively. The changes added e.g. consistent water flows and other information throughout the database. The documentation of this dataset can be found in the ecoinvent reports of version 2, which are still available via the ecoinvent website. The change report linked above covers all central changes that were made during the conversion process.]

## Included activities end
machines for handling in sorting plant, electricity demand for sorting plant, transport to dismantling facilities, final disposal of waste material,

## Geography
Specific to the technology mix encountered in Switzerland in late 1990ies

## Technology
Building demolition with skid-steer loaders. Dry sorting plant for building wastes with pre-sorting of mixed waste, crushing and manual sorting.

## Reference product
- waste polyurethane seal: -1 kg; name RP; By-product classification Waste; CPC 39270: Waste, parings and scrap of plastics; HS2017 391590: Plastics n.e.c. in heading no. 3915; waste, parings and scrap; CAS 9009-54-5
  production volume 79921.4 kg; name RP_PV; = 533860000/0.330592351639303*0.00841688555967824*0.14*0.15*0.28
    Estimated value. The EU market for sealants in 2012 was of 533.860 thousand tons of sealants, more than 50% of this is constituted by silicon and polyurethane (ASI 2013). The percentage of polyurethane sealant (14%) and polyurethane foam (13%) are taken from Nerlfi et al. (2013).
    The CH production volume is extrapolated from the EU production volume using the nominal GDP of 2005 (source: United Nations, http://data.un.org/Glossary.aspx?q=GDP+%28current+US%24%29, accessed 20130726 and 20130312). Where EU GDP is 33% of the world and the CH GDP is 0.8% of the world.
    As the main application of this material is in the construction sector, the rate of waste production is assumed to be 15% (taken from the estimated value for gypsum (WRAP, n.d).
    The treatment route is taken from Hincapié et al. (2015) for the category of combustible waste (which includes sealants), where 28% is sent to recycling, 64% incineration, and 8% landfill.
    ASI (2013) Market Trends: Sealant Demand Growing in Europe. The construction industry continues to control the demand for sealants. Retrieved from: <http://www.adhesivesmag.com/articles/92423-market-trends-sealant-demand-growing-in-europe>, accessed 9th May 2016
    Steven Nerlfi, Minesh Kusumgar and Michael Growney (2013) The Global Sealants Industry. Paint and Coatings Industry (PCI) (http://www.pcimag.com/articles/97675-the-global-sealants-market, accessed 20160122)
    WRAP (n.d.) International practice in plasterboard recycling: Canada. Retrieved from: http://www.wrap.org.uk/sites/files/wrap/Case%20study%20-%20Plasterboard%20recycling%20in%20Canada.pdf, accessed 3 May 2016
    Ingrid Hincapié, Alejandro Caballero-Guzmán, Bernd Nowack (2015) Nanomaterials in Landfills Module 3: Nanomaterials in Construction Waste. EMPA, Swiss Federal Laboratories for Materials Science and Technology. St. Gallen, Switzerland
  property carbon content, fossil 0.641283
    Tab A.2, ecoinvent v2.2 report 13_I. Then C content was referred to 1 kg DM
  property price 0 EUR2005
    Waste products are assigned a price of zero as they are assumed to require further treatment.
  properties: carbon allocation 0.64 kg, carbon content 0.641283, carbon content, non-fossil 0, dry mass 0.998 kg, heating value, net 30.67 MJ, water content 0.00200401, water in wet mass 0.002 kg, wet mass 1 kg

## Inputs from technosphere
- electricity, low voltage: 0.0037 kWh; lognormal variance with pedigree 0.05, pedigree (1,1,5,1,1)
  demand in sorting plant. Uncertainty from range in literature
- excavation, hydraulic digger: 0.000926 m3; lognormal variance with pedigree 0.05, pedigree (1,1,5,1,1)
  handling in sorting plant. Uncertainty from range in literature
- sorting facility, for construction waste: 1e-10 unit; lognormal variance with pedigree 0.04, pedigree (1,1,5,1,1)
  Uncertainty heeded in exchanges, 1kg = 1kg
  This exchange has an activity link directly to the producing activity because the product is primarily consumed in the same geographical area where it is produced.
- waste polyurethane: -0.85 kg; name waste_polyurethane; lognormal variance with pedigree 0.01, pedigree (1,1,1,1,1)
  disposed masses. Uncertainty calculated from uncertainty in transfer coefficients and uncertainty of waste fractions
  production volume; = waste_polyurethane*RP_PV/ABS(RP)
    Calculated from the production volume of waste polyurethane seal in proportion to the respective output amounts.
  properties: carbon content, fossil 0.641283, dry mass 0.998 kg, heating value, net 30.67 MJ, water content 0.00200401, wet mass 1 kg
  note on carbon content, fossil: C content was calculated for 1 kg DM, using data in Tab A.2, ecoinvent v2.2 report 13_I.
  note on heating value, net: Value taken from the general comment of the treatment dataset.

## Sampling procedure
waste-specific calculation based on literature data

## Review by Niels Jungbluth 2003-05-22
Passed. Calculation for standard deviation 95 of infrastructure, land occupation, transport services and other services can differ from standard Pedigree approach used in this project and figures obtained by this procedure.
