# soda ash, light, crystalline, heptahydrate, to generic market for neutralising agent

Dataset: EcoSpold 2, unit process
Geography: RER
Time period: 1999-01-01 to 2023-12-31
Technology level: current
Classification: EcoSpold01Categories: chemicals/inorganics
Classification: ISIC rev.4 ecoinvent: 2011:Manufacture of basic chemicals
Synonyms: soda ash; sodium carbonate; ash
Scenario: Business-as-Usual
System model: Allocation, cut-off by classification
Generated by: Daria Dellenbach
Database: ecoinvent
isCopyrightProtected: true
accessRestrictedTo: 1

## General comment
This activity links the output of the market for soda ash, light, crystalline, heptahydrate to the generic market for neutralising agent.

## Included activities start
Activity starting with the input of soda ash, light, crystaline, heptahydrate, from Solvay process

## Included activities end
Activity ends with the proper conversion of soda ash to neutralising agent in NaOH-equivalents.

## Geography
based on geographical validity of dataset soda production, solvay process

## Technology
based on techmology validity of dataset soda production, solvay process

## Time period
based on temporal validity of dataset soda production, solvay process

## Reference product
- neutralising agent, sodium hydroxide-equivalent: 1 kg; name neutralising_agent_output; By-product classification allocatable product; CPC 34231: Chemical elements n.e.c.; inorganic acids except phosphoric, nitric and sulphonitric; inorganic oxygen compoun[…]; HS2017 28: Inorganic chemicals; organic and inorganic compounds of precious metals; of rare earth metals, of radio-active [...]
  production volume 4.62116e8 kg; = ((0.02*7.81E10) +(0.01*7.81E10)+ 0.1*(0.1*7.81E10))*1/ soda_ash_input * 0.196
    The total soda ash, light production in 2005 is 7.81E10, based on production volumes in the solvay process. There are two main grades of soda ash, namely dense and light. Because there is no specification as to what pecentage of each type of soda ash is used as a neutralising agent, it is assumed that each of them contributes equally to the neutralising agent market for soda ash.
    The major applications of soda ash as a neutralising agent are in water treatment and the pulp and paper industry. This is stated on a market research by Marianne Wesnæs and Bo Weidema, 2.-0 LCA consultants,( www.lca-net.com, 2006-10-19. URL: http://www.lca-net.com/files/naoh.pdf Retrieved 13.02.2012)
    Other industries where it is used as a neutralising agent is in soap manufacturing and in the food processing industry. In both it is used only partly as neutralising agent, and also for other purposes. (source: Rizwan Mailk (Carnation Exports), Pakistan, 2012; URL: http://rizwan36.en.ec21.com/Soda_Ash_Light--3320168_3320198.html)
    The US geological survey indicates in 2005 that 10% of soda ash is used in soap & detergents, 2% in pulp and paper and 1% in water treatment. Specific uses in the food industry are not indicated, therefore it is not accounted for. In the detergent and soap manufacturing, it is assumed that 10% of the total consumption is actually for neutralising purposes.
    The production volume of sodium hydroxide equivalents is calculated based on the soda ash input.
    This value is multiplied with the share of the GDP in Europe, 19.6% (2015-2019, World bank (2022): GDP, available here: https://data.worldbank.org/indicator/NY.GDP.MKTP.PP.KD, accessed 17-05-2022.)
  property price 0.376 EUR2005
    Calculated value based on data from United Nations Commodity Trade Statistics Database (comtrade.un.org). UN comtrade category: 281511 Sodium hydroxide (caustic soda) solid. Year 2005. Using exchange rate of 1EURO = 1.209 USD. Average of price of import into 5 main markets (EU, US, JP, IN and CN).
  properties: carbon allocation 0 kg, carbon content 0, carbon content, fossil 0, carbon content, non-fossil 0, dry mass 1 kg, water content 0, water in wet mass 0 kg, wet mass 1 kg

## Inputs from technosphere
- soda ash, light: 1.325 kg; name soda_ash_input; = neutralising_agent_output*1.325/1; source FMC corporation 1991; lognormal variance with pedigree 0.0506, pedigree (4,1,5,5,1)
  For neutralisation purposes, soda ash can substitute sodium hydroxide in a ratio 1.325/1
  properties: carbon content, fossil 0.0517241, dry mass 1 kg, heating value, net 3.43 MJ, wet mass 1 kg
