# cyclohexane production, benzene hydrogenation, liquid phase process

Dataset: EcoSpold 2, unit process
Geography: RER
Time period: 1989-01-01 to 2023-12-31
Technology level: current
Classification: ISIC rev.4 ecoinvent: 2011:Manufacture of basic chemicals
Synonyms: Hexanaphthene; Hexamethylene; Cykloheksan; Cyclohexan; Hexahydrobenzene
Scenario: Business-as-Usual
System model: Allocation, cut-off by classification
Generated by: Iasonas Ioannou
Published in: Althaus H.-J. 2007
Database: ecoinvent
isCopyrightProtected: true
accessRestrictedTo: 1

## General comment
This dataset represents the production of 1 kg of cyclohexane by hydrogenation of benzene in a liquid phase process in the presence of Raney nickel catalyst. Cyclohexane (C6H12) is a clear liquid with a pungent petroleum-like odor. It is essentially insoluble in water but miscible in most organic liquids, and is noncorrosive, easily flammable, and considered to be much less toxic than benzene. Over 98 % of the cyclohexane produced is used to make nylon intermediates: adipic acid, caprolactam, and hexamethylenediamine, with the first two consuming ca. 95 % of the cyclohexane used in nylon manufacture. Minor miscellaneous uses, such as solvents and polymer reaction diluents, consume the remainder of the cyclohexane produced (Campbell 2011).
In this dataset, the raw material inputs, and process-specific material exchanges, are modelled with a generic stoichiometry-based tool, using literature or estimated yields. The emissions are modelled with a default value, which is estimated based on losses, unreacted chemicals, among others. At the same time, the energy consumption is based on data from literature sources. Finally, the auxiliary (i.e., cooling water and infrastructure) exchanges are modelled with a default value based on industry data from literature sources. For more information on the calculations refer to the sampling procedure.
References:
Sutter, J. (2007) Life Cycle Inventories of Petrochemical Solvents. ecoinvent report No. 22. Swiss Centre for Life Cycle Inventories, Dübendorf, 2007.
Campbell, M. L. 2011. Cyclohexane. Ullmann's Encyclopedia of Industrial Chemistry.

## Included activities start
The activity starts when the raw materials enter the process.

## Included activities end
The activity ends with cyclohexane being ready for further transformation or transportation at the production site gate. Materials entering the process are included as well as energy uses, infrastructure and emissions.

## Geography
The inventory is modelled for Europe. The main material inputs and outputs of this activity are generated with on a generic stoichiometry-based model, using literature or estimated yields. Furthermore, the source of information for the heat and electricity inputs is literature data for the specific technology. Finally, the main source of information for the values for water (process and cooling), nitrogen, chemical factory is industry data from the GENDORF Chemical Park, which is based in Germany and produced an average of 2462760 tonnes of chemical substances in the years 2015-2019. For more information on the calculations refer to the sampling procedure.
The dataset could also be considered as not geography-specific, and thus, valid for a broader geographical coverage.
References:
Hischier, R. (2005) Establishing Life Cycle Inventories of Chemicals Based on Differing Data Availability (9 pp). The International Journal of Life Cycle Assessment, Volume 10, Issue 1, pp 59-67. 10.1065/lca2004.10.181.7
Chemiepark GENDORF, Umwelterklärung 2016, https://www.gendorf.de/Nachbarn/Umweltschutz/Industrie%20und%20Nachhaltigkeit
Chemiepark GENDORF, Umwelterklärung 2017, https://www.gendorf.de/Nachbarn/Umweltschutz/Industrie%20und%20Nachhaltigkeit
Chemiepark GENDORF, Umwelterklärung 2020, https://www.gendorf.de/Nachbarn/Umweltschutz/Industrie%20und%20Nachhaltigkeit
Chauvel, Alain, Gilles Lefebvre, and L. Castex in "Petrochemical processes. Technical and economical characteristics Vol. 2." (1989)

## Technology
Over 90 % of all cyclohexane is produced commercially by hydrogenation of benzene. A small amount is produced by superfractionation of the naphtha fraction from crude oil. Naturally occurring cyclohexane can be supplemented by fractionating methylcyclopentane from naphtha and isomerizing it to cyclohexane.
Hydrogenation of benzene:
C6H6 + 3H2 --> C6H12
Benzene can be hydrogenated catalytically to cyclohexane in either the liquid or the vapor phase in the presence of hydrogen. Several cyclohexane processes, which use nickel, platinum, or palladium as the catalyst, have been developed. Usually, the catalyst is supported, e.g., on alumina, but at least one commercial process utilizes Raney nickel.
Hydrogenation proceeds readily and is highly exothermic (Δ H500K = – 216.37 kJ/mol). From an equilibrium standpoint, the reaction temperature should not exceed 300 °C. Above this, the equilibrium begins to shift in favor of benzene so that high-purity cyclohexane cannot be produced. As a result of these thermodynamic considerations, temperature control of the reaction is critical to obtaining essentially complete conversion of benzene to cyclohexane.
Temperature control requires economic and efficient heat removal. This has been addressed in a number of ways by commercial processes. The earlier vapor-phase processes used multistage reactors with recycle of cyclohexane as a diluent to provide a heat sink, staged injection of benzene feed between reactors, and interstage steam generators to absorb the exothermic heat of hydrogenation. In the 1970s processes have been developed that use only one reactor or a combination of a liquid-and a vapor phase reactor. The objectives of the later processes were to reduce capital cost and improve energy utilization. However, all of the commercial processes have comparably low capital cost and good energy efficiency.
In the vapor-phase process with multistage reactors in series, the benzene feed is divided and fed to each of the first two reactors. Recycled cyclohexane is introduced to the first reactor along with hydrogen. The recycled cyclohexane enables higher conversion in the reactors by absorbing part of the heat of hydrogenation. Steam generators between the reactors remove the heat of hydrogenation. The outlet temperature of the last reactor is controlled to achieve essentially 100 % conversion of benzene to cyclohexane. The effluent from the last reactor is cooled, and the vapor and liquid are separated. Part of the hydrogen-rich vapor is recycled to the first reactor, and the rest is purged to fuel gas or hydrogen recovery facilities. The liquid from the separator goes to a stabilizer where the overhead gas is sent to fuel gas; the remaining material is cyclohexane product, part of which is recycled to the first reactor.
In the process with liquid- and vapor-phase reactors, benzene and hydrogen are fed to the liquid-phase reactor, which contains a slurry of finely divided Raney nickel. Temperature is maintained at 180 – 190 °C by pumping the slurry through a steam generator and by vaporization in the reactor. Roughly 95 % of the benzene is converted in this reactor. The vapor is fed to a fixed-bed reactor where the conversion of benzene is completed. The effluent from the fixed-bed reactor is processed as described previously for the vapor-phase process.
Benzene hydrogenation is done typically at 20 – 30 MPa. The maximum reactor temperature is limited to ca. 300 °C so that a typical specification of < 500 mg/kg benzene and < 200 mg/kg methylcyclopentane in the product can be achieved. This is necessary because of the thermodynamic equilibrium between cyclohexane – benzene and cyclohexane – methylcyclopentane. Actually, equilibrium strongly favors methylcyclopentane, but the isomerization reaction is slow enough with the catalysts employed to avoid a problem if the temperature is controlled.
The hydrogen content of the makeup hydrogen has no effect on product purity but it does determine the makeup, recycle, and purge gas rates. Streams with as low as 65 vol % hydrogen can be used.
Carbon monoxide and sulfur compounds are catalyst deactivators. Both can be present in the hydrogen from catalytic naphtha reformers or ethylene units, which are typical sources of makeup hydrogen. Therefore, the hydrogen-containing stream is usually passed through a methanator to convert carbon monoxide to methane and water. Prior to methanation, hydrogen-containing gas can be scrubbed with caustic to remove sulfur compounds. Commercial benzene contains less than 1 mg/kg sulfur. In some cases, the recycle gas is also scrubbed with caustic to prevent buildup of hydrogen sulfide from the small amount of sulfur in the benzene. With properly treated hydrogen and specification benzene, a catalyst life in excess of three years can be achieved easily in fixed-bed reactors that use noble-metal catalysts supported on a base. The catalyst in the process that uses Raney nickel in suspension is reported to have a typical life of about six months before it must be replaced.
In this dataset, a yield of 95% was assumed.
Reference:
Campbell, M. L. 2011. Cyclohexane. Ullmann's Encyclopedia of Industrial Chemistry.

## Time period
The time period spans from the earliest year from which at least one of the input values was obtained until 2022, but overall form the most realistic picture of the production. Besides, the activity is partly generated, in terms of material inputs and outputs, based on a generic stoichiometry-based model, using literature or estimated yields, which does not expect to change over time.
The source of information for the heat and electricity inputs is literature data (from 1989) for the specific technology. Finally, the main source of information for the values for water (process and cooling), nitrogen, chemical factory is industry data from the GENDORF Chemical Park. The values are a 5-year average of data from 2015 to 2019 published by the GENDORF Chemical Park, which is based in Germany and produced an average of 2462760 tonnes of chemical substances in the years 2015-2019. The end time period is therefore set based on the years from Gendorf reference.
For more information on the calculations refer to the sampling procedure and in the comments of the exchanges.
References:
Hischier, R. (2005) Establishing Life Cycle Inventories of Chemicals Based on Differing Data Availability (9 pp). The International Journal of Life Cycle Assessment, Volume 10, Issue 1, pp 59-67. 10.1065/lca2004.10.181.7
Chemiepark GENDORF, Umwelterklärung 2016, https://www.gendorf.de/Nachbarn/Umweltschutz/Industrie%20und%20Nachhaltigkeit
Chemiepark GENDORF, Umwelterklärung 2017, https://www.gendorf.de/Nachbarn/Umweltschutz/Industrie%20und%20Nachhaltigkeit
Chemiepark GENDORF, Umwelterklärung 2020, https://www.gendorf.de/Nachbarn/Umweltschutz/Industrie%20und%20Nachhaltigkeit
Chauvel, Alain, Gilles Lefebvre, and L. Castex in "Petrochemical processes. Technical and economical characteristics Vol. 2." (1989)

## Reference product
- cyclohexane: 1 kg; name RP; source Campbell, M. L. 2001; By-product classification allocatable product; CPC 34110: Hydrocarbons and their halogenated, sulphonated, nitrated or nitrosated derivatives; HS2017 290211: Cyclic hydrocarbons; cyclohexane; CAS 110-82-7
  Cyclohexane is a clear liquid with a pungent petroleum-like odor. It is essentially insoluble in water but miscible in most organic liquids, and is noncorrosive, easily flammable, and considered to be much less toxic than benzene. Cyclohexane can exist in two conformations, the chair and boat forms. Transformation from one isomer to the other involves rotation about carbon-carbon single bonds. The energy barriers associated with the transformation are low, but the boat form is estimated to have a potential energy 21 - 25 kJ/mol higher than the chair form. As a result, cyclohexane is almost exclusively in the chair form at room temperature. Stereochemistry has no influence on its use as a raw material for nylon manufacture or in other applications. Over 98 % of the cyclohexane produced is used to make nylon intermediates: adipic acid, caprolactam, and hexamethylenediamine, with the first two consuming ca. 95 % of the cyclohexane used in nylon manufacture. Minor miscellaneous uses, such as solvents and polymer reaction diluents, consume the remainder of the cyclohexane produced.
  production volume 4.85453e8 kg; name RP_PV; = 860000000/0.34 * ( 6495755148669 / 33845583188360 )
    The provided European production volume is an estimated value as described below.
    According to 'Ullmann's encyclopaedia of industrial chemistry', version published in 2011, the United States production volume of cyclohexane in 2000 was approximated to 1'500'000'000 kg and amounted to 34% of the world production.
    In 2019, the United States production volume amounted to 860'000'000 kg, based on: <https://www.statista.com/statistics/974749/us-cyclohexane-production-volume/>, last accessed 25-09-2023.
    Hence, the global cyclohexane production volume was estimated based on the 2019s USA production and the respective world share from 2000.
    The European counterpart is estimated to be 110'504'024 kg, considering the nominal GDP of EU in 2000, equal to 6'495'755'148'669 US$ and in the World, equal to 33'845'583'188'360 US$, available here: <https://api.worldbank.org/v2/en/indicator/NY.GDP.MKTP.CD?downloadformat=excel> , last accessed 23-09.2023.
    References:
    Cave, M., Falkner, K. C., & McClain, C. (2012). Chapter 27 - Occupational and Environmental Hepatotoxicity. In T. D. Boyer, M. P. Manns, & A. J. Sanyal (Eds.), Zakim and Boyer’s Hepatology (Sixth Edition) (pp. 476-492). W.B. Saunders. <https://doi.org/https://doi.org/10.1016/B978-1-4377-0881-3.00027-9>
  property heating value, net 43.22 MJ
    LHV is calculated based on the elemental composition of the substance. Based on the CAS number of the substance (000110-82-7), the chemical formula of the substance is found to be: C6H12, (PubChem 2020). Reference: Kim, S., Chen, J., Cheng, T., Gindulyte, A., He, J., He, S., Li, Q., Shoemaker, B. A., Thiessen, P. A., Yu, B., Zaslavsky, L., Zhang, J., & Bolton, E. E. (2019). PubChem 2019 update: improved access to chemical data. Nucleic acids research, 47(D1), D1102–D1109. https://doi.org/10.1093/nar/gky1033
  property price 0.76 EUR2005
    Calculated value based on data from United Nations Commodity Trade Statistics Database (comtrade.un.org). UN comtrade category: 290211 Cyclohexane. Year 2005. Using exchange rate of 1EURO = 1.209 USD. Average of price of import into 5 main markets (EU, US, JP, IN and CN).
  properties: carbon allocation 0.857143 kg, carbon content 0.857143, carbon content, fossil 0.857143, carbon content, non-fossil 0, dry mass 1 kg, water content 0, water in wet mass 0 kg, wet mass 1 kg

## Inputs from technosphere
- aluminium, cast alloy: 9.92e-6 kg; source Campbell, M. L. 2001; lognormal variance with pedigree 0.0701, pedigree (1,2,5,1,1)
  Estimated value. The catalysit assumed is a Raney nickel (50% Ni and 50% Al), Further references: Faith, W. L., Keyes, D. B., Clark, R. L.: Industrial chemicals. Ed.4 by F. A. Lowenheim, M. K. Moran. Wiley, New York 1975
  Uncertainty: F
  properties: dry mass 1 kg, wet mass 1 kg
- aluminium, wrought alloy: 2.108e-5 kg; source Campbell, M. L. 2001; lognormal variance with pedigree 0.0701, pedigree (1,2,5,1,1)
  (same comment as for aluminium, cast alloy)
  properties: dry mass 1 kg, wet mass 1 kg
- benzene: 0.985403 kg; source Chauvel, A. 1989; lognormal variance with pedigree 0.002, pedigree (2,1,2,1,2)
  Calculated value based on stoichiometric calculations and literature data. For more information on the calculations refer to the sampling procedure.
  Uncertainty: S
  properties: carbon content, fossil 0.923077, dry mass 1 kg, heating value, net 42.5 MJ, wet mass 1 kg
- chemical factory, organics: 4e-10 unit; lognormal variance with pedigree 0.3434, pedigree (2,4,2,4,4)
  Calculated based on literature data published by the industry. For this activity, no information was readily available concerning infrastructure and land-use. Therefore, the infrastructure is estimated based on data from two chemical factories, the BASF site of Ludwigshafen and the chemical factory in Gendorf (which are both located in Germany), which produce a wide range of chemical substances. Based on this data, the following assumptions are made: the built area amounts to about 4.2 ha, the plant has an average output of 50'000 t/a and a lifespan of fifty years. The estimated infrastructure amount is therefore 4.00 E-10 units per kg of produced chemical. References: Althaus H.-J., Chudacoff M., Hischier R., Jungbluth N., Osses M. and Primas A. (2007) Life Cycle Inventories of Chemicals. ecoinvent report No. 8, v2.0. EMPA Dübendorf, Swiss Centre for Life Cycle Inventories, Dübendorf, CH. Gendorf (2000) Umwelterklärung 2000, Werk Gendorf. Werk Gendorf, Burgkirchen.
- electricity, medium voltage: 0.011 kWh; source Chauvel, A. 1989; lognormal variance with pedigree 0.002, pedigree (2,1,2,1,2)
  Value reported by Chauvel, Alain, Gilles Lefebvre, and L. Castex in "Petrochemical processes. Technical and economical characteristics Vol. 2." (1989) for the liquid phase process in presence of Raney nickel catalyst.
  Uncertainty: D
- heat, from steam, in chemical industry: 0.22 MJ; lognormal variance with pedigree 0.002, pedigree (2,1,2,1,2)
  Value reported by Chauvel, Alain, Gilles Lefebvre, and L. Castex in "Petrochemical processes. Technical and economical characteristics Vol. 2." (1989) for the liquid phase process in presence of Raney nickel catalyst. The steam input of 0.08 kg per kg are required at medium pressure, while low pressure steam is go-generated amounting to 0.95 kg per kg that could potentially recovered.
  properties: heating value, net 1 MJ
- hydrogen, gaseous, medium pressure, merchant: 0.0763999 kg; source Wells, M. 1991; lognormal variance with pedigree 0.002, pedigree (2,1,2,1,2)
  (same comment as for benzene)
  properties: dry mass 1 kg, heating value, net 120.21 MJ, wet mass 1 kg
- nickel, class 1: 3.1e-5 kg; source Campbell, M. L. 2001; lognormal variance with pedigree 0.0701, pedigree (1,2,5,1,1)
  (same comment as for aluminium, cast alloy)
  properties: dry mass 1 kg, wet mass 1 kg
- wastewater, average: -5.5895e-8, -2.2241e-6 m3 (2 suppliers, which the file names only by identifier); sum of these -2.28e-6 m3; lognormal variance with pedigree 0.0438, pedigree (2,4,1,4,4)
  Calculated based on literature data published by the GENDORF Chemical Park. The factory produced an average of 2462760 tonnes of chemical substances (including intermediates) per year in the years 2015-2019. The average ouput of wastewater going to an external wastewater treatment plant in the years 2015-2019 was 5608 m3 per year. This equals 0.000002277 m3/kg chemical produced. References: Chemiepark GENDORF, Umwelterklärung 2016, https://www.gendorf.de/Nachbarn/Umweltschutz/Industrie%20und%20Nachhaltigkeit Chemiepark GENDORF, Umwelterklärung 2017, https://www.gendorf.de/Nachbarn/Umweltschutz/Industrie%20und%20Nachhaltigkeit Chemiepark GENDORF, Umwelterklärung 2020, https://www.gendorf.de/Nachbarn/Umweltschutz/Industrie%20und%20Nachhaltigkeit
  production volume; = RP_PV * (WW / RP)
    Calculated from production volume of reference product using the relative outputs.
  properties: carbon content, non-fossil 0.194039, dry mass 0.346837 kg, mass concentration, TOC 0.1091 kg/m3, mass concentration, calcium 0.039453 kg/m3, mass concentration, chlorine 0.030031 kg/m3, mass concentration, hydrogen 0.013365 kg/m3, mass concentration, nitrogen 0.031015 kg/m3, mass concentration, oxygen 0.069824 kg/m3, mass concentration, sodium 0.06456 kg/m3, mass concentration, sulfur 0.015602 kg/m3, water content 2882.2, wet mass 1000 kg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
  note on carbon content, non-fossil: 0.0673 kg TOC/m3 (Tab A.17, ecoinvent v2.2 report 13_I). TOC was considered as Total Carbon.

## Inputs from nature
- Water, cooling, unspecified natural origin [natural resource, in water]: 0.00312176 m3; name CW_u; = 0.891930591 * ( 3.5 / 1000 ); lognormal variance with pedigree 0.044, pedigree (2,4,2,4,4)
  This value is estimated based on the cooling requirements reported by Chauvel, Alain, Gilles Lefebvre, and L. Castex in "Petrochemical processes. Technical and economical characteristics Vol. 2." (1989). The value of cooling water input for the latter process is 0.0035 m3 per kg.
  At the same time, the latter amount was split between the following sources (1) "Water, cooling, unspecified natural origin", (2) "Water, river", and (3) "Water, well. in ground"
- Water, river [natural resource, in water]: 0.000204926 m3; name CW_r; = 0.058550155 * ( 3.5 / 1000 ); lognormal variance with pedigree 0.044, pedigree (2,4,2,4,4)
  (same comment as for Water, cooling, unspecified natural origin)
- Water, well, in ground [natural resource, in water]: 0.000173317 m3; name CW_g; = 0.049519254 * ( 3.5 / 1000 ); lognormal variance with pedigree 0.044, pedigree (2,4,2,4,4)
  (same comment as for Water, cooling, unspecified natural origin)

## Emissions to nature
- Benzene [air, urban air close to ground]: 0.00352634 kg; lognormal variance with pedigree 0.0034, pedigree (3,1,2,1,2)
  Calculated losses, based on the boiling point of a chemical, to water or to air. In addition, unreacted chemicals are assumed to go to wastewater treatment, which has a conversion rate in biological treatment of 95% of carbon into carbon dioxide. The remaining 5% are released as emissions to water.
  Uncertainty: E
- Carbon dioxide, fossil [air, urban air close to ground]: 0.161706 kg; lognormal variance with pedigree 0.0034, pedigree (3,1,2,1,2)
  Calculated based on the carbon content of unreacted chemical substances. The unreacted chemicals are assumed to go to wastewater treatment, which has a conversion rate in biological treatment of 95% of carbon into carbon dioxide. The remaining 5% are released as emissions to water, unspecified.
  Uncertainty: C
- Cyclohexane [air, urban air close to ground]: 0.00364286 kg; lognormal variance with pedigree 0.0034, pedigree (3,1,2,1,2)
  (same comment as for Benzene)
- Hydrogen [air, urban air close to ground]: 0.000572044 kg; lognormal variance with pedigree 0.0034, pedigree (3,1,2,1,2)
  (same comment as for Benzene)
- Water [air, unspecified]: 0.000311629 m3; = 0.089036947 * (CW_u + CW_r + CW_g ); lognormal variance with pedigree 0.0834, pedigree (2,4,2,4,4)
  Calculated value. This output flow is estimated based on the inputs. For more details, see Mathematical Relation.
  property fraction, origin: fresh water 0.0591092; name fraction_origin_fresh_water
  property fraction, origin: salt water 0; name fraction_origin_salt_water
  property fraction, origin: unspecified 0.940891; name fraction_origin_unspecified
- BOD5, Biological Oxygen Demand [water, unspecified]: 0.0092825 kg; lognormal variance with pedigree 0.218, pedigree (4,5,5,5,5)
  Calculated value. The BOD, COD, TOC and BOD5 are calculated based on the amount and type of emissions released to water in the same activity.
- Benzene [water, unspecified]: 0.00245469 kg; lognormal variance with pedigree 0.004, pedigree (3,3,2,1,2)
  Calculated losses, based on the boiling point of a chemical, to water or to air. In addition, unreacted chemicals are assumed to go to wastewater treatment, which has a conversion rate in biological treatment of 95% of carbon into carbon dioxide. The remaining 5% are released as emissions to water.
- COD, Chemical Oxygen Demand [water, unspecified]: 0.0092825 kg; lognormal variance with pedigree 0.218, pedigree (4,5,5,5,5)
  (same comment as for BOD5, Biological Oxygen Demand)
- Cyclohexane [water, unspecified]: 6.78571e-5 kg; lognormal variance with pedigree 0.004, pedigree (3,3,2,1,2)
  (same comment as for Benzene)
- DOC, Dissolved Organic Carbon [water, unspecified]: 0.00232063 kg; lognormal variance with pedigree 0.218, pedigree (4,5,5,5,5)
  (same comment as for BOD5, Biological Oxygen Demand)
- TOC, Total Organic Carbon [water, unspecified]: 0.00232063 kg; lognormal variance with pedigree 0.218, pedigree (4,5,5,5,5)
  (same comment as for BOD5, Biological Oxygen Demand)
- Water [water, unspecified]: 0.00318837 m3; = 0.910963053 * (CW_u + CW_r + CW_g ); lognormal variance with pedigree 0.0834, pedigree (2,4,2,4,4)
  (same comment as for Water)
  property carbon content, fossil 0; name C_content_fossil
  property carbon content, non-fossil 0; name C_content_non_fossil
  property dry mass 0 kg; name DM
  property fraction, origin: fresh water 0.133548; name fraction_origin_fresh_water_Ww
  property fraction, origin: salt water 0; name fraction_origin_salt_water_Ww
  property fraction, origin: unspecified 0.866452; name fraction_origin_unspecified_Ww
  property water in wet mass 1000 kg; name WWM
  property wet mass 1000 kg; name WM

## Sampling procedure
Literature data and stoichiometric calculation. This inventory is partially based on a generic model of the production of chemicals. The data generated by this model have been improved with compound-specific data when available. The model of the production of chemicals is using specific industry or literature data wherever possible and more generic data on chemical production processes to fill compound-specific data gaps when necessary. The basic principles of the model have been published in literature (Hischier, 2005). The model has been updated and extended with newly available data from the chemical industry. In the model, unreacted fractions are treated in a waste treatment process, and emissions reported are after a waste treatment process that is included in the scope of this dataset. For volatile reactants, a small level of evaporation is assumed. Solvents and catalysts are mostly recycled in closed-loop systems within the scope of the dataset and reported flows are for losses from this system.
The source of information for the heat and electricity inputs is literature data (from 1989) for the specific technology. Finally, the main source of information for the values for water (process and cooling), nitrogen, and chemical factory is industry data from the GENDORF Chemical Park. The values are a 5-year average of data from 2015 to 2019 published by the GENDORF Chemical Park, which is based in Germany and produced an average of 2462760 tonnes of chemical substances in the years 2015-2019. For more information refer to the comments of the exchanges.

References:
Hischier, R. (2005) Establishing Life Cycle Inventories of Chemicals Based on Differing Data Availability (9 pp). The International Journal of Life Cycle Assessment, Volume 10, Issue 1, pp 59-67. 10.1065/lca2004.10.181.7
Chemiepark GENDORF, Umwelterklärung 2016, https://www.gendorf.de/Nachbarn/Umweltschutz/Industrie%20und%20Nachhaltigkeit
Chemiepark GENDORF, Umwelterklärung 2017, https://www.gendorf.de/Nachbarn/Umweltschutz/Industrie%20und%20Nachhaltigkeit
Chemiepark GENDORF, Umwelterklärung 2020, https://www.gendorf.de/Nachbarn/Umweltschutz/Industrie%20und%20Nachhaltigkeit
Chauvel, Alain, Gilles Lefebvre, and L. Castex in "Petrochemical processes. Technical and economical characteristics Vol. 2." (1989)
