# inorganic phosphorus, as P2O5 to generic market for organo-mineral phosphorus, as P2O5

Dataset: EcoSpold 2, unit process
Geography: GLO
Time period: 2016-01-01 to 2023-12-31
Technology level: current
Classification: ISIC rev.4 ecoinvent: 0161:Support activities for crop production
Scenario: Business-as-Usual
System model: Allocation, cut-off by classification
Generated by: Avraam Symeonidis
Database: ecoinvent
isCopyrightProtected: true
accessRestrictedTo: 1

## General comment
This is a renaming activity that connects "inorganic phosphorus fertiliser, as P2O5" with "organo-mineral phosphorus fertiliser, as P2O5". It is assumed that in the shortage of "organo-mineral phosphorus fertiliser, as P2O5", a consumer of it will turn its consumption pattern and use an "inorganic phosphorus fertiliser, as P2O5". In theory, the "inorganic phosphorus fertiliser, as P2O5" can substitute the "organo-mineral phosphorus fertiliser, as P2O5" in an equal mass ratio, considering only the nutrient content.
This dataset is meant to be employed only in the consequential system model where it is assumed that inorganic can replace organic fertiliser. The production volume of this activity is set to zero so it does not react with attributional supply chains.

## Included activities start
The activity starts with the reception of inorganic phosphorus fertiliser, as P2O5.

## Included activities end
The activity ends with organo-mineral phosphorus fertiliser, as P2O5 being ready for transportation.

## Technology
Inventory is based on the nutrient content of the fertiliser.

## Reference product
- organo-mineral phosphorus fertiliser, as P2O5: 1 kg; By-product classification allocatable product; CPC 34659: Fertilizers n.e.c.; HS2017 310390: Fertilizers, mineral or chemical; phosphatic, n.e.c. in heading no. 3103
  production volume 0 kg
    Production volume is set on purpose equal to zero so this activity is not interacting in the attributional system model.
  property carbon content, fossil 0
    Carbon content, fossil is calculated based on the chemical formula of the substance.
  property oxygen content 0.563579
    Oxygen content (on a dry matter basis) of organo-mineral phosphorus fertiliser, as P2O5 is calculated from the molecular formula of the substance (Phosphorus).
  property phosphorus content 0.436421
    Phosphorus content (on a dry matter basis) of organo-mineral phosphorus fertiliser, as P2O5 is calculated from the molecular formula of the substance (Phosphorus).
  property price 0.241 EUR2005
    Set equal to the price of the corresponding inorganic fertiliser
  properties: carbon allocation 0 kg, carbon content 0, carbon content, non-fossil 0, dry mass 1 kg, water content 0, water in wet mass 0 kg, wet mass 1 kg

## Inputs from technosphere
- inorganic phosphorus fertiliser, as P2O5: 0.00705417, 0.0156578, 0.135466, 0.00437177, 0.00107363, 0.00152033, 0.00379298, 0.000498192, 0.0024417, 5.82157e-5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 kg (30 suppliers, which the file names only by identifier); sum of these 1 kg; lognormal variance with pedigree 0.0472, pedigree (3,3,3,5,4)
  It is assumed that in the shortage of organo-mineral fertiliser, a consumer of it will turn its consumption pattern and use an inorganic fertiliser. In theory, the inorganic fertiliser, can substitute the organo-mineral fertiliser, in an equal mass ratio, considering only the nutrient content.
  properties: dry mass 1 kg, wet mass 1 kg
