# used nitrate salts, for solar power application to market for nitrate salts, for solar power application

Dataset: EcoSpold 2, unit process
Geography: GLO
Time period: 2015-01-01 to 2023-12-31
Technology level: current
Classification: ISIC rev.4 ecoinvent: 2029:Manufacture of other chemical products n.e.c.
Scenario: Business-as-Usual
System model: Allocation, cut-off by classification
Generated by: Florentine Brunner
Database: ecoinvent
isCopyrightProtected: true
accessRestrictedTo: 1

## General comment
This activity links used nitrate salts, for solar power application to the market for nitrate salts, for solar power application. This activity allows to model the reuse of used nitrate salts discharged from one concentrating solar power (CSP) power plant after the end of its life in a new power plant. First generation CSP plants are considered to be fed with nitrate salts from primary production only. Reuse of salts may be relevant for the construction of second generation CSP plants in the future. The production volume of this activity represents the amount of nitrate salts expected to be liberated from first generation CSP plants.

## Included activities start
This activity starts with input of used nitrate salts, for solar power application, liberated from concentrating solar power (CSP) plants at the end of their lifetime.

## Included activities end
This activity ends with the provision nitrate salts, for solar power application to the market.

## Reference product
- nitrate salts, for solar power application: 1 kg; By-product classification allocatable product; CPC 34280: Hydrogen peroxide; phosphides; carbides; hydrides, nitrides, azides, silicides and borides; HS2017 2850: Hydrides, nitrides, azides, silicides and borides, whether or not chemically defined, other than compounds wh[...]
  production volume 2.07e8 kg
    The production volume of this activity represents the amount of nitrate salts expected to be liberated from first generation CSP plants. Under the assumption that 15% of nitrate salts are lost during operation or dismantling of the plants, the amounts of used nitrate salts liberated from the activities “thermal storage system construction, solar thermal parabolic trough, 50 MW, GLO” and “thermal storage system construction, solar tower power plant, 20 MW” are 2.01E+08 and 5.30E+06, respectively, summing up to 2.07E+08.
  property price 0.715 EUR2005
    Information from personal communication with SQM S.A. (https://www.sqm.com/en/): the average market price for nitrate salts used in solar power application in 2019 is approximately 800USD per metric tonne. See also SQM 2018 Results, http://s1.q4cdn.com/793210788/files/doc_presentations/2018/07/SQM-CorpPres_1Q18_long-final_12jul2018-update.pdf, accessed June 2019. Converted to EUR applying an exchange rate of 1.12 USD/EUR (as of June 2019).
  properties: carbon allocation 0 kg, carbon content 0

## Inputs from technosphere
- used nitrate salts, for solar power application: 1 kg
