# injection moulding

Dataset: EcoSpold 2, unit process
Geography: CA-QC
Time period: 1993-01-01 to 2023-12-31
Technology level: current
Classification: ISIC rev.4 ecoinvent: 2220:Manufacture of plastics products
Classification: EcoSpold01Categories: plastics/processing
Tags: recontextualization
Scenario: Business-as-Usual
System model: Allocation, cut-off by classification
Generated by: Pascal Lesage
Published in: Hischier R. 2007
Database: ecoinvent
isCopyrightProtected: true
accessRestrictedTo: 1

## General comment
1 kg of this process equals 0.994 kg of injection moulded plastics.
[This dataset was already contained in the ecoinvent database version 2. It was not individually updated during the transfer to ecoinvent version 3. Life Cycle Impact Assessment results may still have changed, as they are affected by changes in the supply chain, i.e. in other datasets. This dataset was generated following the ecoinvent quality guidelines for version 2. It may have been subject to central changes described in the ecoinvent version 3 change report (http://www.ecoinvent.org/database/ecoinvent-version-3/reports-of-changes/), and the results of the central updates were reviewed extensively. The changes added e.g. consistent water flows and other information throughout the database. The documentation of this dataset can be found in the ecoinvent reports of version 2, which are still available via the ecoinvent website. The change report linked above covers all central changes that were made during the conversion process.]
Child dataset exchanges identical to GLO dataset. Created to enable linking to regional markets (e.g. for electricity). Data quality indicators adjusted accordingly.

## Included activities end
This process contains the auxillaries and energy demand for the mentioned convertion process of plastics. The converted amount of plastics is NOT included into the dataset.

## Geography
information from different European and Swiss converting companies
Child dataset exchanges identical to GLO dataset. Created to enable linking to regional markets (e.g. for electricity). Data quality indicators adjusted accordingly.

## Technology
present technologies

## Time period
time to which data refer

## Parameters
- Quebec gross domestic product 2011: 3.11e11 USD(2011); name quebecGDP2011; lognormal variance with pedigree 0.0006, pedigree (1,1,1,1,1)
  Quebec Gross domestic product for 2011, expressed in 2011 USD. Source: Institut de la statistique du Québec. Converted from CAD to USD using a yearly average exchange rate of 0.989 CAD/USD (Source: bank of Canada).
- fraction, cooling water, cooling pond system, to air: 0.032 dimensionless; lognormal variance with pedigree 0.0413, pedigree (2,3,1,3,1)
- fraction, cooling water, once-through system, to air: 0.004 dimensionless; lognormal variance with pedigree 0.0413, pedigree (2,3,1,3,1)
- fraction, cooling water, recirculating system, to air: 0.771 dimensionless; lognormal variance with pedigree 0.0413, pedigree (2,3,1,3,1)
- fraction, cooling water, to air: 0.3875 dimensionless; lognormal variance with pedigree 0.092025, pedigree (4,4,3,2,4)
- world gross domestic product 2011: 7e13 USD(2011); name worldGDP2011; lognormal variance with pedigree 0.0006, pedigree (1,1,1,1,1)
  World Gross domestic product for 2011, expressed in 2011 USD. Source: World Bank.

## Reference product
- injection moulding: 1 kg; By-product classification allocatable product; CPC 89200: Moulding, pressing, stamping, extruding and similar plastic manufacturing services
  production volume 0.0177714 kg
    Gross approximation of Quebec production volume using relative value of Quebec GDP to world GDP
  property price 0.565514 EUR2005
    Calculated based on inputs: The price of the product has been calculated as a sum of the values of the material and energy inputs for this product. This value is therefore a rough estimation. It may underestimate the real price since there are additional expenses when producing any product. These expences can include for example labour costs, treatment of waste materials and profit for the producer. Please consider carefully whether this level of data quality is acceptable for your application.
  properties: carbon allocation 0 kg, carbon content 0

## Inputs from technosphere
- EUR-flat pallet: 0.00146 unit; lognormal variance with pedigree 0.0612, pedigree (2,3,5,5,3)
  Typical values, based on a European and a Swiss study
  Uncertainty: t
  properties: carbon content, fossil 0.0311351, carbon content, non-fossil 0.58833, dry mass 18.3333 kg, heating value, net 335.11 MJ, water content 0.2, wet mass 22 kg
  note on carbon content, fossil: C content in components of the pallet (ecoinvent v2.2 report 7_part XVIII)
- chemical, organic: 0.0128 kg; lognormal variance with pedigree 0.0612, pedigree (2,3,5,5,3)
  Typical values, based on a European and a Swiss study
  Uncertainty: t
  properties: carbon content, fossil 0.628, dry mass 1 kg, heating value, net 19.03 MJ, wet mass 1 kg
  note on carbon content, fossil: This dataset is an unweighted average of 20 organic substances (listed in Tab 88.1, ecoinvent v2.2 report 8, part II), being part of the top100 chemicals included in this database. The C-content has also been calculated as an unweighted average of the C content of the substances composing this dataset.
- electricity, medium voltage: 1.48 kWh; lognormal variance with pedigree 0.0612, pedigree (2,3,5,5,3)
  Typical values, based on a European and a Swiss study
  Uncertainty: t
- hazardous waste, for underground deposit: -3.31e-5 kg; lognormal variance with pedigree 0.0214, pedigree (2,3,2,5,3)
  Typical values, based on a European and a Swiss study
  Uncertainty: t
  production volume
    (same comment as for injection moulding)
  properties: carbon content, fossil 0.554667, dry mass 1 kg, wet mass 1 kg
  note on carbon content, fossil: Tab A.6, ecoinvent v2.2 report 13_I, average hazardous waste composition was used, and referred to 0% water mass. No waste-specific emission are currently inventoried for underground deposits. Accordingly, no waste composition must be specified. For generic, average waste to underground deposit deposition in a 200 liter steel drum without cement solidification is assumed (ecoinvent v2.2 report 13_I).
- heat, district or industrial, natural gas: 4.21 MJ; lognormal variance with pedigree 0.0612, pedigree (2,3,5,5,3)
  Typical values, based on a European and a Swiss study
  Uncertainty: t
  properties: heating value, net 1 MJ
- heat, district or industrial, other than natural gas: 0.229 MJ; lognormal variance with pedigree 0.0612, pedigree (2,3,5,5,3)
  Typical values, based on a European and a Swiss study
  Uncertainty: t
  properties: heating value, net 1 MJ
- kaolin: 0.0033264 kg; lognormal variance with pedigree 0.0612, pedigree (2,3,5,5,3)
  Uncertainty: t
  properties: dry mass 1 kg, wet mass 1 kg
- lime: 0.00378 kg; lognormal variance with pedigree 0.0612, pedigree (2,3,5,5,3)
  Uncertainty: t
  properties: carbon content, fossil 0.120005, dry mass 1 kg, wet mass 1 kg
- lubricating oil: 0.00303 kg; lognormal variance with pedigree 0.0612, pedigree (2,3,5,5,3)
  Typical values, based on a European and a Swiss study
  Uncertainty: t
  properties: carbon content, fossil 0.75, dry mass 1 kg, heating value, net 40.2 MJ, wet mass 1 kg
  note on carbon content, fossil: Lubricating oil is produced from diesel. C-content/dry mass of fats and oils considered 75%, from: ecoinvent v2.2 report, n 15a, pg 40
  note on heating value, net: Literature value, Source: IPCC 2006, 2006 IPCC Guidelines for National Greenhouse Gas Inventories, Prepared by the National Greenhouse Gas Inventories Programme, Eggleston H.S., Buendia L., Miwa K., Ngara T. and Tanabe K. (eds). Published: IGES, Japan
- malusil: 0.0004536 kg; lognormal variance with pedigree 0.0612, pedigree (2,3,5,5,3)
  Uncertainty: t
  properties: dry mass 1 kg, wet mass 1 kg
- municipal solid waste: -0.000895 kg; lognormal variance with pedigree 0.0214, pedigree (2,3,2,5,3)
  Typical values, based on a European and a Swiss study
  Uncertainty: t
  production volume
    (same comment as for injection moulding)
  properties: carbon content, fossil 0.171549, carbon content, non-fossil 0.261655, dry mass 0.771 kg, heating value, net 11.74 MJ, water content 0.297017, wet mass 1 kg
  note on carbon content, fossil: MSW composition in tab 4.1, ecoinvent v2.2 report 13_I. C content referred to 1 kg DM
  note on heating value, net: Value taken from the general comment of the treatment dataset.
- packaging box factory: 1.43e-9 unit; lognormal variance with pedigree 0.448, pedigree (4,5,5,5,5)
  Estimation
  Uncertainty: e
- polyethylene, low density, granulate: 0.00169 kg; lognormal variance with pedigree 0.0612, pedigree (2,3,5,5,3)
  Typical values, based on a European and a Swiss study
  Uncertainty: t
  properties: carbon content, fossil 0.857143, dry mass 1 kg, heating value, net 42.47 MJ, wet mass 1 kg
  note on carbon content, fossil: Polyethylene is formed out of a huge amount of ethylene monomers (C2H4) (ecoinvent v2.2 report 11_II). MW=28 g/mol
- polypropylene, granulate: 0.00358 kg; lognormal variance with pedigree 0.0612, pedigree (2,3,5,5,3)
  Typical values, based on a European and a Swiss study
  Uncertainty: t
  properties: carbon content, fossil 0.857143, dry mass 1 kg, heating value, net 32.78 MJ, wet mass 1 kg
  note on carbon content, fossil: Polypropylene is formed by the polymerisation of propylene, C3H6 (ecoinvent v2.2 report 11_II)
  note on heating value, net: Value extracted from "treatment of waste polypropylene, open burning"
- solid bleached and unbleached board carton: 9.94e-5 kg; lognormal variance with pedigree 0.0612, pedigree (2,3,5,5,3)
  Typical values, based on a European and a Swiss study
  Uncertainty: t
  properties: carbon content, fossil 0.0190874, carbon content, non-fossil 0.327779, dry mass 0.945 kg, heating value, net 9.8 MJ, water content 0.0582011, wet mass 1 kg
- solvent, organic: 0.0447 kg; lognormal variance with pedigree 0.0612, pedigree (2,3,5,5,3)
  Typical values, based on a European and a Swiss study
  Uncertainty: t
  properties: carbon content, fossil 0.63072, dry mass 1 kg, heating value, net 19.11 MJ, wet mass 1 kg
  note on carbon content, fossil: Mixture of 15 of the most often used solvents (list in ecoinvent v2.2 report 11-III, pg 293). C content was calculated as an unweighted average of C content of the different solvents
- titanium dioxide: 0.00199 kg; lognormal variance with pedigree 0.0612, pedigree (2,3,5,5,3)
  Typical values, based on a European and a Swiss study
  Uncertainty: t
  properties: dry mass 1 kg, wet mass 1 kg
- waste plastic, mixture: -0.00567 kg; lognormal variance with pedigree 0.0214, pedigree (2,3,2,5,3)
  Typical values, based on a European and a Swiss study
  Uncertainty: t
  production volume
    (same comment as for injection moulding)
  properties: carbon content, fossil 0.747344, dry mass 0.847 kg, heating value, net 30.79 MJ, water content 0.180638, wet mass 1 kg
  note on carbon content, fossil: C content in 1 kg DM was calculated using data in Tab A.2, ecoinvent v2.2 report 13_I

## Inputs from nature
- Water, cooling, unspecified natural origin [natural resource, in water]: 0.011 m3; lognormal variance with pedigree 0.0612, pedigree (2,3,5,5,3)
  Typical values, based on a European and a Swiss study
  Uncertainty: t

## Emissions to nature
- Water [air, unspecified]: 0.0042625 m3; lognormal variance with pedigree 0.0827, pedigree (2,2,5,5,1)
  Calculated value based on literature values and expert opinion. See comments in the parametres" comment field.
- BOD5, Biological Oxygen Demand [water, surface water]: 1.856e-5 kg; lognormal variance with pedigree 0.1012, pedigree (2,3,5,5,3)
  Calculated as 0.5*COD.
  Uncertainty: t
- COD, Chemical Oxygen Demand [water, surface water]: 9.28e-6 kg; lognormal variance with pedigree 0.1012, pedigree (2,3,5,5,3)
  Typical values, based on a European and a Swiss study
  Uncertainty: t
- DOC, Dissolved Organic Carbon [water, surface water]: 3.43704e-6 kg; lognormal variance with pedigree 0.1012, pedigree (2,3,5,5,3)
  Calculated as equal to TOC.
  Uncertainty: t
- Suspended solids, unspecified [water, surface water]: 6.63e-6 kg; lognormal variance with pedigree 0.1012, pedigree (2,3,5,5,3)
  Typical values, based on a European and a Swiss study
  Uncertainty: t
- TOC, Total Organic Carbon [water, surface water]: 3.43704e-6 kg; lognormal variance with pedigree 0.1012, pedigree (2,3,5,5,3)
  Calculated by default as TOC (gC) = COD/2.7 (COD measured in g O2). Should more correctly be calculated from the carbon content of the specified emissions to water.
  Uncertainty: t
- Water [water, unspecified]: 0.0067375 m3; lognormal variance with pedigree 0.0827, pedigree (2,2,5,5,1)
  (same comment as for Water)
  property carbon content, fossil 0; name C_content_fossil
  property carbon content, non-fossil 0; name C_content_non_fossil
  property dry mass 0 kg; name DM
  property water in wet mass 1000 kg; name WWM
  property wet mass 1000 kg; name WM

## Sampling procedure
company data

## Extrapolations
GLO dataset extrapolated from European dataset, which in turn was used to create this child dataset. Exchanges identical to GLO dataset. Created to enable linking to regional markets (e.g. for electricity). Data quality indicators adjusted accordingly.
