# cadmium chloride production, semiconductor-grade

Dataset: EcoSpold 2, unit process
Geography: US
Time period: 2004-01-01 to 2023-12-31
Technology level: current
Classification: EcoSpold01Categories: metals/extraction
Classification: ISIC rev.4 ecoinvent: 2011:Manufacture of basic chemicals
Tags: ConvertedDataset
Scenario: Business-as-Usual
System model: Allocation, cut-off by classification
Share of production covered: 0 %
Generated by: Matthias Tuchschmid (obsolete)
Published in: Classen M. 2009
Database: ecoinvent
isCopyrightProtected: true
accessRestrictedTo: 1

## General comment
This datasets describes the production of high-grade cadmium chloride (99.999%) from cadmium and hydrochloric acid. This purity of cadmium chloride can be used in the production of thin film solar cells.
[This dataset was already contained in the ecoinvent database version 2. It was not individually updated during the transfer to ecoinvent version 3. Life Cycle Impact Assessment results may still have changed, as they are affected by changes in the supply chain, i.e. in other datasets. This dataset was generated following the ecoinvent quality guidelines for version 2. It may have been subject to central changes described in the ecoinvent version 3 change report (http://www.ecoinvent.org/database/ecoinvent-version-3/reports-of-changes/), and the results of the central updates were reviewed extensively. The changes added e.g. consistent water flows and other information throughout the database. The documentation of this dataset can be found in the ecoinvent reports of version 2, which are still available via the ecoinvent website. The change report linked above covers all central changes that were made during the conversion process.]

## Included activities start
The activity starts with the reception of the raw materials at the plant gate.

## Included activities end
The activity ends with the produced cadmium chloride. The energy consumption, emissions and transports are estimated.

## Geography
Production in US

## Technology
Production of cadmium chloride by reaction of cadmium with hydrogen chloride

## Reference product
- cadmium chloride, semiconductor-grade: 1 kg; By-product classification allocatable product; CPC 34250: Salts of oxometallic or peroxometallic acids; colloidal precious metals and compounds thereof; inorganic and o[…]; HS2017 8107: Cadmium; articles thereof, including waste and scrap; CAS 10108-64-2
  EcoSpold01Location=US
  production volume 973.434 kg
    Unknown
    From data in ecoinvent v2 report 10-part X, it has been assumed that all cadmium chloride is used in the production of cadmium sulfide, both semiconductor grade. Production volumes have been calculated using cadmium sulfide semiconductor-grade production volumes, and considering that 1.3353 kg cadmium chloride semiconductor-grade are needed for the production of 1 kg cadmium sulfide semiconductor-grade.
  property price 0.816003 EUR2005
    Calculated based on mollar masses of Cd and Cl; price estimated based on Cl and Cd contents of the product and using 5-year market average prices (2015-2019; USD/kg; USGS [2020]) for Cd and converted to EUR2005 (USD2019/EUR2005 exchange rate: 0.62; Official Data Foundation [2020] and Macrotrends [2020]) and the price for liquid chlorine (0.148 EUR/kg).
    References:
    Official Data Foundation (2020). Inflation Calculator [Online]. Available from: https://www.officialdata.org/us/inflation/2005?endYear=2019&amount=1 [Accessed 28/07/2020]
    USGS (2020). Mineral Commodity Summaries 2020 [Online]. Available from: https://pubs.usgs.gov/periodicals/mcs2020/mcs2020.pdf [Accessed 28/07/2020]
    Macrotrends (2020). Euro Dollar Exchange Rate (EUR USD) - Historical Chart [Online]. Available from: https://www.macrotrends.net/2548/euro-dollar-exchange-rate-historical-chart [Accessed 28/07/2020]
  properties: carbon allocation 0 kg, carbon content 0, carbon content, fossil 0, carbon content, non-fossil 0, dry mass 1 kg, water content 0, water in wet mass 0 kg, wet mass 1 kg

## Inputs from technosphere
- cadmium, semiconductor-grade: 0.64597 kg; name cadmium; lognormal variance with pedigree 0.332, pedigree (5,4,5,1,5)
  Calculated based on formula.
  This product is assumed to be supplied exclusively by the production in the US, therefore a direct activity link to the activity "cadmium production, semiconductor-grade" in the US is used.
  EcoSpold01Location=US
  Uncertainty: calculated based on formula
  properties: dry mass 1 kg, wet mass 1 kg
- chemical factory, organics: 4e-10 unit; lognormal variance with pedigree 0.586, pedigree (4,5,5,1,5)
  EcoSpold01Location=RER
  Assumption
  Uncertainty: assumption
- electricity, medium voltage: 0.042586 kWh; lognormal variance with pedigree 0.332, pedigree (5,4,5,1,5)
  Assumption,
  EcoSpold01Location=US
  Uncertainty: assumption,
- hydrochloric acid, without water, in 30% solution state: 0.41908 kg; lognormal variance with pedigree 0.332, pedigree (5,4,5,1,5)
  Calculated based on formula
  EcoSpold01Location=RER
  Uncertainty: calculated based on formula
  properties: dry mass 1 kg, heating value, net 3.32 MJ, wet mass 1 kg
- transport, freight train: 0.129194 metric ton*km; = cadmium * 200/1000
  The cadmium is assumed to be transported 200 km by rail. This is the standard rail transport distance for the US (see table 4.2, p. 635/926 in Classen et al., 2009).
  References:
  Classen M., Althaus H.-J., Blaser S., Tuchschmid M., Jungbluth N., Doka G., Faist Emmenegger M. and Scharnhorst W. (2009) Life Cycle Inventories of Metals. Final report ecoinvent data v2.1, No 10. EMPA Dübendorf, Swiss Centre for Life Cycle Inventories, Dübendorf, CH, Online-Version under: www.ecoinvent.ch
- transport, freight, lorry, unspecified: 0.064597 metric ton*km; = cadmium * 100/1000
  The cadmium is assumed to be transported 100 km by lorry. This is the standard road transport distance for the US (see table 4.2, p. 635/926 in Classen et al., 2009).
  References:
  Classen M., Althaus H.-J., Blaser S., Tuchschmid M., Jungbluth N., Doka G., Faist Emmenegger M. and Scharnhorst W. (2009) Life Cycle Inventories of Metals. Final report ecoinvent data v2.1, No 10. EMPA Dübendorf, Swiss Centre for Life Cycle Inventories, Dübendorf, CH, Online-Version under: www.ecoinvent.ch

## Emissions to nature
- Cadmium II [air, urban air close to ground]: 3.8758e-6 kg; lognormal variance with pedigree 0.988, pedigree (5,5,5,1,5)
  Estimation
  Uncertainty: estimation
- Hydrogen [air, urban air close to ground]: 0.011465 kg; lognormal variance with pedigree 0.388, pedigree (5,5,5,1,5)
  Estimation
  Uncertainty: estimation

## Sampling procedure
literature and own estimations

## Extrapolations
Cadmium emissions are extrapolated from cadmium purification.

## Review by Hans-Jörg Althaus 2009-01-29
automatic validation in Excel
none
