# manganese production

Dataset: EcoSpold 2, unit process
Geography: RoW
Time period: 2003-01-01 to 2023-12-31
Technology level: current
Classification: ISIC rev.4 ecoinvent: 2420:Manufacture of basic precious and other non-ferrous metals
Classification: EcoSpold01Categories: metals/extraction
Tags: ConvertedDataset
Scenario: Business-as-Usual
System model: Allocation, cut-off by classification
Share of production covered: 0 %
Generated by: Mischa Classen
Published in: Althaus H.-J. 2000
Database: ecoinvent
isCopyrightProtected: true
accessRestrictedTo: 1

## General comment
The module describes the consumption of manganese metal in Europe in 1994. It is designed solely for the use of the metal in special applications like sputtering or as alloying element. This module is explicitly not to be used as alloying element in bulk iron or steel industry. It does not consider secondary sources of manganese. Process data is based on rough estimations, the overall data quality is very poor.
[This dataset was already contained in the ecoinvent database version 2. It was not individually updated during the transfer to ecoinvent version 3. Life Cycle Impact Assessment results may still have changed, as they are affected by changes in the supply chain, i.e. in other datasets. This dataset was generated following the ecoinvent quality guidelines for version 2. It may have been subject to central changes described in the ecoinvent version 3 change report (http://www.ecoinvent.org/database/ecoinvent-version-3/reports-of-changes/), and the results of the central updates were reviewed extensively. The changes added e.g. consistent water flows and other information throughout the database. The documentation of this dataset can be found in the ecoinvent reports of version 2, which are still available via the ecoinvent website. The change report linked above covers all central changes that were made during the conversion process.]

## Included activities start
The activity starts with the reception of the ferromanganese and manganese concentrate at the plant gate.

## Included activities end
The module production by electrolysis from ore and by electrothermic process from ferromanganese and slag. Transportation to Europe is only partially considered.

## Geography
No informations were available on production or consumption mix.

## Technology
The metal is won by electrolysis (assumption: 25%) and electrothermic processes (assumption: 75%). No detailed information available, mainly based on rough estimates.

## Reference product
- manganese: 1 kg; name RP_amount_1; By-product classification allocatable product; CPC 41603: Bismuth, antimony, manganese, chromium and articles thereof; including waste and scrap of bismuth or manganese; HS2017 260200: Manganese ores and concentrates, including ferruginous manganese ores and concentrates with a manganese con[...]; CAS 7439-96-5
  EcoSpold01Location=RER
  production volume 3.91195e9 kg; name RP_PV_1
    Calculated based on literature value. The global production of manganese in 2005 was 1.05E+10 kg (USGS, http://minerals.usgs.gov/minerals/pubs/commodity/manganese/mangamcs07.pdf, accessed 20130321). It is estimated, that 50% is produced by this technology.
  property price 1.24 EUR2005
    Literature value (USGS,http://minerals.usgs.gov/minerals/pubs/commodity/manganese/myb1-2009-manga.pdf, accessed 20160222). The price for manganese ore (48% manganese) is reported to be 6.61 USD/metric ton unit (MTU) = 10kg. The resulting price is (1/0.48*0.661=) 1.38 USD. Cross reference; in 2005 manganese was traded on the markets for 1.5 USD/kg (http://www.infomine.com/investment/metal-prices/manganese/all/, accessed 20160704).
  properties: carbon allocation 0 kg, carbon content 0, carbon content, fossil 0, carbon content, non-fossil 0, dry mass 1 kg, water content 0, water in wet mass 0 kg, wet mass 1 kg

## Inputs from technosphere
- electricity, medium voltage: 0.0874023, 1.74348, 0.585804, 0.0267656, 0.0053571, 0.00115029, 0.180041 kWh (7 suppliers, which the file names only by identifier); sum of these 2.63 kWh; lognormal variance with pedigree 0.2106, pedigree (5,5,5,5,5)
  Based on theoretical values
  EcoSpold01Location=UCTE
  Uncertainty: 2; based on theoretical values
- ferromanganese, high-coal, 74.5% Mn: 1.21 kg; lognormal variance with pedigree 0.13, pedigree (5,5,5,5,1)
  Rough estimate
  EcoSpold01Location=RER
  Uncertainty: 4; rough estimate
  properties: carbon content, fossil 0.075, dry mass 1 kg, heating value, net 2.27 MJ, wet mass 1 kg
  note on carbon content, fossil: Typical composition of ferromanganese, high-carbon is given in Tab. 3.4 ecoinvent v2.2 report 20_part VII
- manganese concentrate: 0.983 kg; lognormal variance with pedigree 0.13, pedigree (5,5,5,5,1)
  EcoSpold01Location=GLO
  Rough estimate
  Uncertainty: 4; rough estimate
  properties: dry mass 1 kg, wet mass 1 kg
- nickel smelter slag: -0.968 kg; name BP_amount_1
  Estimation from dataset author.
  Proxy: "nickel smelter slag, 0% water" is used as a proxy for high silica slag.
  production volume; = RP_PV_1 * (BP_amount_1 / RP_amount_1)
    Calculated from production volume of reference product using the relative outputs.
  property carbon content, fossil 0.00345; name C_content_fossil
  property carbon content, non-fossil 0; name C_content_non_fossil
  property dry mass 1 kg; name DM
  property water content 0; name water_content
  property water in wet mass 0 kg; name WWM
  property wet mass 1 kg; name WM
- non-ferrous metal smelter: 1.06e-14 unit; lognormal variance with pedigree 0.43, pedigree (5,5,5,5,1)
  EcoSpold01Location=GLO

## Sampling procedure
literature

## Extrapolations
see Geography and Technology This dataset has been copied from an original dataset covering the geography RER. The uncertainty has been adjusted accordingly.

## Review by Roland Hischier 2003-07-07
Passed.
