# gas turbine construction, 10MW electrical

Dataset: EcoSpold 2, unit process
Geography: RoW
Time period: 1990-01-01 to 2023-12-31
Technology level: current
Classification: ISIC rev.4 ecoinvent: 2811:Manufacture of engines and turbines, except aircraft, vehicle and cycle eng
Classification: EcoSpold01Categories: natural gas/power plants
Tags: ConvertedDataset
Scenario: Business-as-Usual
System model: Allocation, cut-off by classification
Generated by: Thomas Heck
Published in: Faist Emmenegger, M. 2007
Database: ecoinvent
isCopyrightProtected: true
accessRestrictedTo: 1

## General comment
Average gas turbine 10MWe.
[This dataset was already contained in the ecoinvent database version 2. It was not individually updated during the transfer to ecoinvent version 3. Life Cycle Impact Assessment results may still have changed, as they are affected by changes in the supply chain, i.e. in other datasets. This dataset was generated following the ecoinvent quality guidelines for version 2. It may have been subject to central changes described in the ecoinvent version 3 change report (http://www.ecoinvent.org/database/ecoinvent-version-3/reports-of-changes/), and the results of the central updates were reviewed extensively. The changes added e.g. consistent water flows and other information throughout the database. The documentation of this dataset can be found in the ecoinvent reports of version 2, which are still available via the ecoinvent website. The change report linked above covers all central changes that were made during the conversion process.]

## Included activities end
The module includes the most important materials used for construction. It includes also the energy requirements for construction; transport is implicitly included in energy consumption. (Life time for operation assumed 80'000 h.)

## Geography
Average conditions for European plants.

## Technology
Average installed gas turbine. Estimate of energy per unit of material transferred from gas power plant.

## Reference product
- gas turbine, 10MW electrical: 1 unit; By-product classification allocatable product; CPC 43143: Gas turbines other than turbo-jets and turbo-propellers; HS2017 841182: Turbines; gas-turbines (excluding turbo-jets and turbo-propellers), of a power exceeding 5000kW
  EcoSpold01Location=RER
  production volume 2.67763 unit
    This is a placeholder value that does not reflect real-world production volumes. This dataset does not currently require a real-world production volume to work in the database framework, and no actual data were collected yet. This has no negative effect on the results of the ecoinvent database.
  property price 91465.3 EUR2005
    Calculated based on inputs: The price of the product has been calculated as a sum of the values of the material and energy inputs for this product. This value is therefore a rough estimation. It may underestimate the real price since there are additional expenses when producing any product. These expences can include for example labour costs, treatment of waste materials and profit for the producer. Please consider carefully whether this level of data quality is acceptable for your application.
  properties: carbon allocation 0 kg, carbon content 0

## Inputs from technosphere
- concrete, normal strength: 0.589105, 0.129365, 0.0841446, 2.4947, 1.0473, 1.24152, 44.4139 m3 (7 suppliers, which the file names only by identifier); sum of these 50 m3; lognormal variance with pedigree 0.342, pedigree (1,1,5,5,1)
  basic uncertainty
  EcoSpold01Location=CH
  properties: dry mass 2190 kg, water content 0.086758, wet mass 2380 kg
- copper, cathode: 5000 kg; lognormal variance with pedigree 0.342, pedigree (1,1,5,5,1)
  EcoSpold01Location=RER
  basic uncertainty
  properties: dry mass 1 kg, wet mass 1 kg
- diesel, burned in building machine: 759000 MJ; lognormal variance with pedigree 0.612, pedigree (1,1,5,5,1)
  uncertainty of amount of material and of energy needed; estimate of energy per unit of material transferred from gas power plant.
  EcoSpold01Location=GLO
  properties: heating value, net 1 MJ
- electricity, medium voltage: 1558.62, 31090.9, 10446.5, 477.302, 95.5316, 20.5128, 3210.62 kWh (7 suppliers, which the file names only by identifier); sum of these 46900 kWh; lognormal variance with pedigree 0.612, pedigree (1,1,5,5,1)
  uncertainty of amount of material and of energy needed; estimate of energy per unit of material transferred from gas power plant.
  EcoSpold01Location=UCTE
- heat, district or industrial, other than natural gas: 720716, 333.894 MJ (2 suppliers, which the file names only by identifier); sum of these 721050 MJ; lognormal variance with pedigree 0.612, pedigree (1,1,5,5,1)
  uncertainty of amount of material and of energy needed; estimate of energy per unit of material transferred from gas power plant.
  EcoSpold01Location=RER
  properties: heating value, net 1 MJ
- polyethylene, high density, granulate: 15000 kg; lognormal variance with pedigree 0.342, pedigree (1,1,5,5,1)
  EcoSpold01Location=RER
  basic uncertainty
  properties: carbon content, fossil 0.857143, dry mass 1 kg, heating value, net 42.47 MJ, wet mass 1 kg
  note on carbon content, fossil: Polyethylene is formed out of a huge amount of ethylene monomers (C2H4) (ecoinvent v2.2 report 11_II). MW=28 g/mol
- reinforcing steel: 47500 kg; lognormal variance with pedigree 0.342, pedigree (1,1,5,5,1)
  basic uncertainty
  EcoSpold01Location=RER
  properties: carbon content, fossil 0.004, dry mass 1 kg, wet mass 1 kg
- steel, chromium steel 18/8, hot rolled: 2500 kg; lognormal variance with pedigree 0.342, pedigree (1,1,5,5,1)
  basic uncertainty
  EcoSpold01Location=RER
  properties: carbon content, fossil 0.0008, dry mass 1 kg, wet mass 1 kg
  note on carbon content, fossil: Stainless steel model is the grade 304 steel (18/8 stainless, 18% chromium 8% nickel; max. 0.08% C)

## Inputs from nature
- Occupation, industrial area [natural resource, land]: 15000 m2*year; lognormal variance with pedigree 0.522, pedigree (1,1,5,5,1)
  uncertainty of land use and life time
- Transformation, from unspecified [natural resource, land]: 1000 m2; lognormal variance with pedigree 0.342, pedigree (1,1,5,5,1)
  uncertainty transferred from gas power plants
- Transformation, to industrial area [natural resource, land]: 1000 m2; lognormal variance with pedigree 0.342, pedigree (1,1,5,5,1)
  uncertainty transferred from gas power plants

## Sampling procedure
Literature

## Extrapolations
see Technology/Text This dataset has been copied from an original dataset covering the geography RER. The uncertainty has been adjusted accordingly.

## Review by Michael Spielmann (obsolete) 2003-07-08
passed.
