# fish canning, small fish

Dataset: EcoSpold 2, unit process
Geography: RoW
Time period: 2011-01-01 to 2023-12-31
Technology level: current
Classification: ISIC rev.4 ecoinvent: 1020:Processing and preserving of fish, crustaceans and molluscs
Scenario: Business-as-Usual
System model: Allocation, cut-off by classification
Generated by: Angel Avadí
Published in: Avadí, A. 2018
Database: ecoinvent
isCopyrightProtected: true
accessRestrictedTo: 1

## General comment
The activity represents the canning of small fish in a canning plant. The functional unit is 1000 kg of raw material processed, excluding residues. The total raw material demand of this activity is 1000 kg of preprocessed raw material + the amount of residues generated by preprocessing (gutting, heading, tailing, peeling, filleting, etc). The life cycle inventories were produced based on a sample of 1 Peruvian plant (processing capacity: 461 t/y) and data from other industry representatives. The data applies to small fish such as small pelagics (anchovies, herrings, sardines, mackerels) and small bottom feeders (grouppers, eals, small cods, haddock, bass, snappers). This activity can be used to model fish processing in other geographies.
Users must use this service activity in combination with an activity providing the raw material (fish).
System boundaries of fish processing for Direct Human Consumption (DHC) and relations between activities
Detailed system boundaries of DCH activities in Peru, including provision of fish from dedicated fleet

## Included activities start
From delivery of consumables to the plant, through its Use phase (production), including all upstream activities (e.g. provision of infrastructure, fuels, electricity, chemicals and packaging materials).

## Included activities end
Excludes fishery activities and provision of raw material (fish)

## Geography
Representative of Peru.

## Technology
Small pelagics canning activities of Peruvian fish canning plants, per t of processing capacity. Plants have a lifespan of 40 years.
Process diagram of small fish canning

## Time period
Production figures represent the period 2012. Valid as of 2017.

## Reference product
- fish canning, small fish: 1 kg; name production; source Angel Avadí 2014; By-product classification allocatable product; CPC 21242: Fish, otherwise prepared or preserved; HS2017 160413: Fish preparations; sardines, sardinella and brisling or sprats, prepared or preserved, whole or in pieces ([...]
  Amount of raw material processed, excluding residues. The total raw material demand of this activity is 1000 kg of preprocessed raw material + the amount of residues generated by preprocessing (gutting, heading, tailing, peeling, filleting, etc).
  production volume 1.6416e9 kg; name prod_vol
    Global production of canned small fish assumed to be 1 order of magnitude larger than that of Peru (Peru produced 182 355 t of canned fish in 2013, 51 380 t of which was anchovies)
  property price 0.363082 EUR2005
    Calculated based on inputs: The price of the product has been calculated as a sum of the values of the material and energy inputs for this product. This value is therefore a rough estimation. It may underestimate the real price since there are additional expenses when producing any product. These expences can include for example labour costs, treatment of waste materials and profit for the producer. Please consider carefully whether this level of data quality is acceptable for your application.
  properties: carbon allocation 0 kg, carbon content 0

## Inputs from technosphere
- electricity, medium voltage: 0.000253463 kWh; source Angel Avadí 2014; triangular min 0.000169427, mostLikely 0.000253463, max 0.000337499, pedigree (2,3,4,5,1)
  Electricity use for all production phases from reception/cold storage to final product
  Uncertainty: Data from 1 plant, assumptions for larger plants
- electricity, medium voltage: 1.13089e-5 kWh; source Angel Avadí 2014; triangular min 7.55945e-6, mostLikely 1.13089e-5, max 1.50584e-5, pedigree (2,3,4,5,1)
  (same comment as for electricity, medium voltage)
- electricity, medium voltage: 0.000263527 kWh; source Angel Avadí 2014; triangular min 0.000176155, mostLikely 0.000263527, max 0.0003509, pedigree (2,3,4,5,1)
  (same comment as for electricity, medium voltage)
- electricity, medium voltage: 0.000133608 kWh; source Angel Avadí 2014; triangular min 8.931e-5, mostLikely 0.000133608, max 0.000177906, pedigree (2,3,4,5,1)
  (same comment as for electricity, medium voltage)
- electricity, medium voltage: 0.000163605 kWh; source Angel Avadí 2014; triangular min 0.000109362, mostLikely 0.000163605, max 0.000217848, pedigree (2,3,4,5,1)
  (same comment as for electricity, medium voltage)
- electricity, medium voltage: 9.46808e-5 kWh; source Angel Avadí 2014; triangular min 6.32893e-5, mostLikely 9.46808e-5, max 0.000126072, pedigree (2,3,4,5,1)
  (same comment as for electricity, medium voltage)
- electricity, medium voltage: 0.0104667 kWh; source Angel Avadí 2014; triangular min 0.00699648, mostLikely 0.0104667, max 0.013937, pedigree (2,3,4,5,1)
  (same comment as for electricity, medium voltage)
- electricity, medium voltage: 0.208788 kWh; source Angel Avadí 2014; triangular min 0.139564, mostLikely 0.208788, max 0.278012, pedigree (2,3,4,5,1)
  (same comment as for electricity, medium voltage)
- electricity, medium voltage: 2.34794e-5 kWh; source Angel Avadí 2014; triangular min 1.56948e-5, mostLikely 2.34794e-5, max 3.1264e-5, pedigree (2,3,4,5,1)
  (same comment as for electricity, medium voltage)
- electricity, medium voltage: 0.0701521 kWh; source Angel Avadí 2014; triangular min 0.0468931, mostLikely 0.0701521, max 0.0934111, pedigree (2,3,4,5,1)
  (same comment as for electricity, medium voltage)
- electricity, medium voltage: 0.00104231 kWh; source Angel Avadí 2014; triangular min 0.000696732, mostLikely 0.00104231, max 0.00138789, pedigree (2,3,4,5,1)
  (same comment as for electricity, medium voltage)
- electricity, medium voltage: 0.00320527 kWh; source Angel Avadí 2014; triangular min 0.00214256, mostLikely 0.00320527, max 0.00426799, pedigree (2,3,4,5,1)
  (same comment as for electricity, medium voltage)
- electricity, medium voltage: 0.00035343 kWh; source Angel Avadí 2014; triangular min 0.00023625, mostLikely 0.00035343, max 0.000470609, pedigree (2,3,4,5,1)
  (same comment as for electricity, medium voltage)
- electricity, medium voltage: 7.39537e-5 kWh; source Angel Avadí 2014; triangular min 4.94343e-5, mostLikely 7.39537e-5, max 9.84731e-5, pedigree (2,3,4,5,1)
  (same comment as for electricity, medium voltage)
- electricity, medium voltage: 0.0451951 kWh; source Angel Avadí 2014; triangular min 0.0302106, mostLikely 0.0451951, max 0.0601796, pedigree (2,3,4,5,1)
  (same comment as for electricity, medium voltage)
- electricity, medium voltage: 0.000641532 kWh; source Angel Avadí 2014; triangular min 0.000428832, mostLikely 0.000641532, max 0.000854233, pedigree (2,3,4,5,1)
  (same comment as for electricity, medium voltage)
- electricity, medium voltage: 0.000280546 kWh; source Angel Avadí 2014; triangular min 0.000187531, mostLikely 0.000280546, max 0.000373561, pedigree (2,3,4,5,1)
  (same comment as for electricity, medium voltage)
- electricity, medium voltage: 0.00110964 kWh; source Angel Avadí 2014; triangular min 0.000741738, mostLikely 0.00110964, max 0.00147754, pedigree (2,3,4,5,1)
  (same comment as for electricity, medium voltage)
- electricity, medium voltage: 0.000141796 kWh; source Angel Avadí 2014; triangular min 9.47832e-5, mostLikely 0.000141796, max 0.000188808, pedigree (2,3,4,5,1)
  (same comment as for electricity, medium voltage)
- electricity, medium voltage: 0.000137751 kWh; source Angel Avadí 2014; triangular min 9.20798e-5, mostLikely 0.000137751, max 0.000183423, pedigree (2,3,4,5,1)
  (same comment as for electricity, medium voltage)
- electricity, medium voltage: 0.00334681 kWh; source Angel Avadí 2014; triangular min 0.00223717, mostLikely 0.00334681, max 0.00445645, pedigree (2,3,4,5,1)
  (same comment as for electricity, medium voltage)
- electricity, medium voltage: 0.00016064 kWh; source Angel Avadí 2014; triangular min 0.00010738, mostLikely 0.00016064, max 0.000213901, pedigree (2,3,4,5,1)
  (same comment as for electricity, medium voltage)
- electricity, medium voltage: 5.62435e-5 kWh; source Angel Avadí 2014; triangular min 3.75959e-5, mostLikely 5.62435e-5, max 7.48911e-5, pedigree (2,3,4,5,1)
  (same comment as for electricity, medium voltage)
- electricity, medium voltage: 0.014579 kWh; source Angel Avadí 2014; triangular min 0.00974534, mostLikely 0.014579, max 0.0194127, pedigree (2,3,4,5,1)
  (same comment as for electricity, medium voltage)
- electricity, medium voltage: 0.000200767 kWh; source Angel Avadí 2014; triangular min 0.000134203, mostLikely 0.000200767, max 0.000267332, pedigree (2,3,4,5,1)
  (same comment as for electricity, medium voltage)
- electricity, medium voltage: 0.000184267 kWh; source Angel Avadí 2014; triangular min 0.000123173, mostLikely 0.000184267, max 0.000245361, pedigree (2,3,4,5,1)
  (same comment as for electricity, medium voltage)
- electricity, medium voltage: 1.21803e-5 kWh; source Angel Avadí 2014; triangular min 8.14189e-6, mostLikely 1.21803e-5, max 1.62187e-5, pedigree (2,3,4,5,1)
  (same comment as for electricity, medium voltage)
- electricity, medium voltage: 0.00103311 kWh; source Angel Avadí 2014; triangular min 0.000690585, mostLikely 0.00103311, max 0.00137564, pedigree (2,3,4,5,1)
  (same comment as for electricity, medium voltage)
- electricity, medium voltage: 0.00189977 kWh; source Angel Avadí 2014; triangular min 0.0012699, mostLikely 0.00189977, max 0.00252965, pedigree (2,3,4,5,1)
  (same comment as for electricity, medium voltage)
- electricity, medium voltage: 0.00986207 kWh; source Angel Avadí 2014; triangular min 0.00659229, mostLikely 0.00986207, max 0.0131318, pedigree (2,3,4,5,1)
  (same comment as for electricity, medium voltage)
- electricity, medium voltage: 0.000133209 kWh; source Angel Avadí 2014; triangular min 8.90437e-5, mostLikely 0.000133209, max 0.000177375, pedigree (2,3,4,5,1)
  (same comment as for electricity, medium voltage)
- fish canning plant: 6.51636e-9 unit; = ((production+residues)/1000)/(capacity*lifetime); source Angel Avadí 2014
  One unit of plant represents the installed capacity required to process 1 t of raw material
  property capacity [kg] 7673 kg; name capacity
  property lifetime 40 year; name lifetime
- fish residues: -1 kg; name residues; source Angel Avadí 2014; triangular min -2.28571, mostLikely -0.571429, max -0.142857, pedigree (2,3,1,5,1)
  Residues from fish processing, raw or cooked
  Uncertainty: Data from 1 plant, assumptions for larger plants
  production volume; = prod_vol * residues / production
    Calculated from production volume of reference product using the relative outputs.
  property ash content 0.015 kg; name residues_ash
  property carbon content, non-fossil 0.47385; name residues_C_content_non_fossil; = (1-residues_protein-residues_fat_content-residues_ash)*0.444+residues_protein*0.535+residues_fat_content*0.774
  property dry mass 0.241111 kg; name residues_DM
  property energy content 4.01 MJ; name residues_energy_content
  property fat content 0.061; name residues_fat_content
  property protein content 0.18; name residues_protein
  property water content 0.758889; name residues_water_content
  property water in wet mass 0.182977 kg; name residues_WWM
  property wet mass 0.424088 kg; name residues_WM
  properties: price 0.062025 EUR2005
  note on ash content: Ash content of fish is between 1-2% of the edible portion, http://www.fao.org/wairdocs/tan/x5916e/x5916e01.htm
  note on carbon content, non-fossil: Calculated from C_content = polysaccharids*0.444+protein*0.535+lipids*0.774 and polysaccharids = 1-(protein+lipids+ash)
  note on energy content: Average of 49 fish species, http://www.fao.org/wairdocs/tan/x5916e/x5916e01.htm
- heat, district or industrial, other than natural gas: 4.323 MJ; source Angel Avadí 2014; triangular min 2.58874, mostLikely 3.12688, max 7.25338, pedigree (2,3,4,5,1)
  Industrial heat for cooking/sterilisation
  Uncertainty: Data from 1 plant, assumptions for larger plants
  properties: corresponding fuel use, propane, furnace >100kW 1.05263 MJ, heating value, net 1 MJ
  note on corresponding fuel use, propane, furnace >100kW: Lower heating value of the fuel input related to the heat/electricity output, taken directly from ecoinvent v3.0 dataset "heat production, natural gas, at industrial furnace >100kW, GLO 2000".
- metal working, average for chromium steel product manufacturing: 0.01 kg; source Angel Avadí 2014
  Tinplate can
- operation, reefer, freezing: 2 kg*day; source Angel Avadí 2014; triangular min 1.8, mostLikely 2, max 2.2, pedigree (2,3,4,5,1)
  Proxy for ice use
  Uncertainty: Data from 1 plant, assumptions for larger plants
- scrap tin sheet: -4.79613e-14, -0.153678, -0.00232169 kg (3 suppliers, which the file names only by identifier); sum of these -0.156 kg; = tinplate_can*15.6; source Avadí, A. 2018
  Waste tinplate cans (sheet use times weight of each sheet)
  production volume; = prod_vol * (BP_amount_2 / production)
    Calculated from production volume of reference product using the relative outputs.
  properties: dry mass 1 kg, wet mass 1 kg
- sodium chloride, powder: 0.2 kg; source Angel Avadí 2014; triangular min 0.18, mostLikely 0.2, max 0.22, pedigree (2,3,4,5,1)
  Salt for brine
  Uncertainty: Data from 1 plant, assumptions for larger plants
  properties: dry mass 1 kg, wet mass 1 kg
- tin plated chromium steel sheet, 2 mm: 0.01 m2; name tinplate_can; source Angel Avadí 2014; triangular min 0.0048, mostLikely 0.012, max 0.0132, pedigree (2,3,4,5,1)
  Tinplate can
  Uncertainty: Data from 1 plant, assumptions for larger plants
  properties: dry mass 15.6365 kg, wet mass 15.6365 kg
- vegetable oil, refined: 0.247 kg; source Angel Avadí 2014; triangular min 0.0151418, mostLikely 0.233751, max 0.492107, pedigree (2,3,4,5,1)
  Oil for canned fish
  Uncertainty: Data from 1 plant, assumptions for larger plants
  properties: carbon content, non-fossil 0.768, dry mass 1 kg, heating value, net 38.4 MJ, wet mass 1 kg
  note on heating value, net: Values is approximated from HHV from "vegetable oil, crude". Source: Radovanovic,M.; Zivanovic,T.; Stojiljkovic,D.; Jovanovic,V.; Jerinic,N.; Knezevic,S. et.al. Utilization of sunflower husk as a fuel for industrial boilers - 20 years experience. Proc. 5th Eur. Conf. on Industrial Furnaces&Boilers 2000,vol.2,p.221-233. Available at: https://phyllis.nl/Biomass/View/2152
- wastewater from vegetable oil refinery: -0.006 m3; name BP_amount_1; = (water*.6)/1000; source Avadí, A. 2018
  Proxy for wastewater from fish processing plant. Asumed 40% of the water is either incorporated into the product or lost
  production volume; = prod_vol * (BP_amount_1 / production)
    Calculated from production volume of reference product using the relative outputs.
  properties: carbon content, non-fossil 0.8, dry mass 0.871801 kg, water content 1146.05, wet mass 1000 kg
  note on carbon content, non-fossil: Estimated load for fish processing plant cleansing wastewater. The loading of fish processing wastewater is mainly organic (http://www.dfo-mpo.gc.ca/Library/273700.pdf)
- water, completely softened: 3.27368 kg; source Angel Avadí 2014; triangular min 2.84834, mostLikely 3.48634, max 3.48634, pedigree (2,3,4,5,1)
  Soft water for process
  Uncertainty: Data from 1 plant, assumptions for larger plants
  properties: wet mass 1 kg
- water, completely softened: 4.37334 kg; source Angel Avadí 2014; triangular min 3.80513, mostLikely 4.65744, max 4.65744, pedigree (2,3,4,5,1)
  Soft water for process
  Uncertainty: Data from 1 plant, assumptions for larger plants
- water, completely softened: 2.35299 kg; source Angel Avadí 2014; triangular min 2.04727, mostLikely 2.50584, max 2.50584, pedigree (2,3,4,5,1)
  Soft water for process
  Uncertainty: Data from 1 plant, assumptions for larger plants

## Emissions to nature
- Nitrogen [water, unspecified]: 0.00122 kg; source Angel Avadí 2014; triangular min 0.00089, mostLikely 0.00122, max 0.00155, pedigree (2,3,4,5,1)
  Uncertainty: Data from 1 plant, assumptions for larger plants
- Phosphorus [water, unspecified]: 0.00025 kg; source Angel Avadí 2014; triangular min 0.00012, mostLikely 0.00025, max 0.00038, pedigree (2,3,4,5,1)
  Uncertainty: Data from 1 plant, assumptions for larger plants

## Sampling procedure
Data from 1 canning plant. This plant is representative of the current technology and management, as determined by interviews with many technical, commercial, academic and governmental representatives.
As of 2017 there were 71 active fish canning plants in Peru, with an aggregated processing capacity of 545 000 t/y.

## Extrapolations
Data from anchovies and other small pelagics canning were assumed to represent the canning of other small fish
