# yarn production, cotton, open end spinning

Dataset: EcoSpold 2, unit process
Geography: RoW
Time period: 2015-04-01 to 2023-03-31
Technology level: current
Classification: EcoSpold01Categories: textiles/processing
Classification: ISIC rev.4 ecoinvent: 1311:Preparation and spinning of textile fibres
Scenario: Business-as-Usual
System model: Allocation, cut-off by classification
Generated by: [System]
Published in: Faist Emmenegger, M. 2018
Database: ecoinvent
isCopyrightProtected: true
accessRestrictedTo: 1

## General comment
This dataset represents the process of spinning of 1 kg of cotton yarn by Open end spinning from the raw cotton. Yarn production activity includes Opening, Mixing, Carding, Drawing, combing, roving, spinning and winding. The dataset is based on the Indian data set for open end spinning.
Open end spinning is technology for creating yarn without spindle. In this process the fibrous material is highly drafted to seperate out individual fibres which are subsequently collected into open end of the yarn. This is rotated to twist the fibre into yarn structure to form a continous strand of yarn.
The following processes are used to convert cotton fibre to cotton yarn. The bales are opened and fibres are cleaned of trash and dust and mixed in the blowroom. the fibres then undergo carding and drawing to orient the fibres to prepare for spinning. In the next step the spinning takes place on Open end spinning machines.The yarn is wound on cones and conditioned before packaging.
This dataset was created based on the corresponding dataset from India. Uncertainty has been adapted accordingly.

## Included activities start
The activity starts from opening of bales

## Included activities end
The activity ends with spinning and winding after which yarn is conditioned for packaging.

## Reference product
- yarn, cotton: 1 kg; By-product classification allocatable product; CPC 26360: Cotton yarn (other than sewing thread), containing 85% or more by weight of cotton; HS2017 520710: Cotton yarn; (not sewing thread), containing 85% or more by weight of cotton, put up for retail sale
  production volume 1.9488e9 kg; name PV_Cotton_yarn; = 974400000*3
    The open spinning yarn production volume has been estimated as being 3 times the Indian production. The overall global yarn production (all technologies) is about 15 E+9 kg (The Fibre Year report 2017).
  property heating value, net 12.95 MJ
    LHV is calculated based on the Carbon content of the product. More details can be found on the respective documentation.
  property price 2.265 EUR2005
    Estimated value. Various souces report a value around 3 USD per kg of cotton yarn (YarnsandFibers.com, 2018. Pakistan textile exports hit by rise in prices, retrieved from: http://www.yarnsandfibers.com/news/news-tags/cotton-yarn-prices, accessed 1Feb2018; Alibaba.com, 2018. Retrieved from: https://www.alibaba.com/showroom/100%2525-cotton-yarn-price.html, accessed 1Feb2018). The price was checked also against the values reported from the Indian Ministry of Textile, Price Data for textile, Prices (Month End) for 2018 (retrieved from: http://texmin.nic.in/sites/default/files/monthend_jan2018_1.pdf, accessed 6March 2018).
  properties: carbon allocation 0.4324 kg, carbon content 0.46, carbon content, fossil 0, carbon content, non-fossil 0.46, dry mass 0.94 kg, water content 0.0638298, water in wet mass 0.06 kg, wet mass 1 kg

## Inputs from technosphere
- building, hall: 1.55665e-5 m2; lognormal variance with pedigree 0.3046, pedigree (2,1,3,5,1)
  total building area (square meters) divided by production per year and life time of the plant
- diesel, burned in diesel-electric generating set, 10MW: 0.22295 MJ; lognormal variance with pedigree 0.0146, pedigree (4,4,3,5,1)
  Diesel used for power backup. Forumula includes diesel consumption in kg multiplied with calorific value
  properties: heating value, net 1 MJ
- electricity, low voltage: 0.0115341, 0.0624103, 0.00242547, 0.000943037, 0.0658286, 0.0156905, 0.000946261, 0.00323388, 0.00129214, 0.581003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 kWh (47 suppliers, which the file names only by identifier); sum of these 1.65 kWh; lognormal variance with pedigree 0.0066, pedigree (1,4,3,5,1)
  sum of electricity used for:
  Blowroom, Carding; Breaker Drawing and Compressors; Illumination and air conditioning are not considered here.
- fibre, cotton: 1.05 kg; lognormal variance with pedigree 0.0066, pedigree (1,4,3,5,1)
  waste cotton fibre and fibre noil co-product are resued in the process, hence not included in the inventory
  properties: carbon content, non-fossil 0.46, dry mass 0.94 kg, heating value, net 12.95 MJ, water content 0.0638298, wet mass 1 kg
- lubricating oil: 1.74e-5, 8.26e-5 kg (2 suppliers, which the file names only by identifier); sum of these 0.0001 kg; lognormal variance with pedigree 0.0066, pedigree (1,4,3,5,1)
  This is sum of greese and mobil oil used for lubircating machines
  properties: carbon content, fossil 0.75, dry mass 1 kg, heating value, net 40.2 MJ, wet mass 1 kg
  note on carbon content, fossil: Lubricating oil is produced from diesel. C-content/dry mass of fats and oils considered 75%, from: ecoinvent v2.2 report, n 15a, pg 40
  note on heating value, net: Literature value, Source: IPCC 2006, 2006 IPCC Guidelines for National Greenhouse Gas Inventories, Prepared by the National Greenhouse Gas Inventories Programme, Eggleston H.S., Buendia L., Miwa K., Ngara T. and Tanabe K. (eds). Published: IGES, Japan
- waste mineral oil: -6.79531e-7, -7.18713e-5, -2.74491e-5 kg (3 suppliers, which the file names only by identifier); sum of these -0.0001 kg; lognormal variance with pedigree 0.0046, pedigree (1,4,1,5,1)
  This is produced dues to the use of lubricating oil necessary for the operation of machinery.
  production volume; = PV_Cotton_yarn*bp1
    Calculated based on the amount of yarn.
  properties: carbon content, fossil 0.864444, dry mass 0.9 kg, heating value, net 34.7 MJ, water content 0.111111, wet mass 1 kg
  note on carbon content, fossil: Tab A.6, ecoinvent v2.2 report 13_I. C content has been calculated after data in the tables, and then referred to 1 kg DM
  note on heating value, net: Value taken from the general comment of the treatment dataset.
- waste yarn and waste textile: -0.05 kg; name WY; lognormal variance with pedigree 0.0132, pedigree (4,4,1,5,2)
  This represents the quantum of waste that is ultimately landfilled. Estimates on expert judgement based on company data
  production volume; = PV_cotton_yarn*WY
    Calculated based on the amount of yarn.
  properties: carbon content, non-fossil 0.44455, dry mass 0.97917 kg, heating value, net 13.14 MJ, water content 0.0212731, wet mass 1 kg
- wastewater, average: -6.51434e-5, -0.0108402, -0.0025921, -3.85951e-5 m3 (4 suppliers, which the file names only by identifier); sum of these -0.013536 m3; lognormal variance with pedigree 0.0126, pedigree (4,4,1,5,1)
  considering 80% default wastewater generation
  production volume; = PV_cotton_yarn*WW
    Calculated based on the amount of yarn.
  properties: carbon content, non-fossil 0.194039, dry mass 0.346837 kg, water content 2882.2, wet mass 1000 kg
  note on carbon content, non-fossil: 0.0673 kg TOC/m3 (Tab A.17, ecoinvent v2.2 report 13_I). TOC was considered as Total Carbon.

## Inputs from nature
- Water, well, in ground [natural resource, in water]: 0.01692 m3; name Water; lognormal variance with pedigree 0.0146, pedigree (4,4,3,5,1)
  water is used for humidification

## Emissions to nature
- Water [air, urban air close to ground]: 0.003384 m3; lognormal variance with pedigree 0.0146, pedigree (4,4,3,5,1)
  Considering default value of 20% evaporation rate

## Sampling procedure
Data based in Indian data, uncertainty adjusted accordingly.
