# heat production, light fuel oil, at industrial furnace 1MW

Dataset: EcoSpold 2, unit process
Geography: RoW
Time period: 1991-01-01 to 2023-12-31
Technology level: current
Classification: ISIC rev.4 ecoinvent: 3530:Steam and air conditioning supply
Classification: EcoSpold01Categories: oil/heating systems
Tags: ConvertedDataset
Scenario: Business-as-Usual
System model: Allocation, cut-off by classification
Generated by: Niels Jungbluth
Published in: Jungbluth, N. 2007
Database: ecoinvent
isCopyrightProtected: true
accessRestrictedTo: 1

## General comment
Inventory for the operation of an oil boiler, data related to fuel input.
[This dataset was already contained in the ecoinvent database version 2. It was not individually updated during the transfer to ecoinvent version 3. Life Cycle Impact Assessment results may still have changed, as they are affected by changes in the supply chain, i.e. in other datasets. This dataset was generated following the ecoinvent quality guidelines for version 2. It may have been subject to central changes described in the ecoinvent version 3 change report (http://www.ecoinvent.org/database/ecoinvent-version-3/reports-of-changes/), and the results of the central updates were reviewed extensively. The changes added e.g. consistent water flows and other information throughout the database. The documentation of this dataset can be found in the ecoinvent reports of version 2, which are still available via the ecoinvent website. The change report linked above covers all central changes that were made during the conversion process.]

## Included activities end
Direct air emissions from combustion, including infrastructure, fuel consumption, waste and auxiliary electricity use.

## Geography
Assumption for operation in Europe.

## Technology
Average non-modulating, non-condensing furnace used in 2000.

## Time period
New data for regulated emissions like NOx, particles, other figures are partly based on older literature data.

## Reference product
- heat, district or industrial, other than natural gas: 1 MJ; By-product classification allocatable product; CPC 17300: Steam and hot water
  EcoSpold01Location=RER
  production volume 1.05507e12 MJ
    Assumption. The original value from the global dataset was altered in order to model the correct shares of district/industrial heat producing datasets on the market for heat, district or industrial, other than natural gas according to http://www.iea.org/statistics/statisticssearch/report/?country=WORLD&product=electricityandheat&year=2012. See talk pages for further discussion.
    //Original comment added during dataset update://
    Total heat from oil calculated from IEA Oil statistics for 2007 (http://www.iea.org/stats/oildata.asp?COUNTRY_CODE=29 ; industry and heat plants), using default IEA MJ/kg conversion factors, subtracting the amount used for steam in the chemical industry (1.68EJ), dividing the total evenly between light and heavy oil types, multiplied by conversion efficiency of specific boiler type (0.95), all on a net heat value basis.
  property Corresponding fuel use 1.05022 MJ; name fuel_use; = 0.024653*42.6/1
    Lower heating value of the fuel input related to the heat/electricity output
  property price 0.0106 EUR2005
    Average European district heat price from Ecoheatcool and Euroheat 2005-2006, Ecoheat Work package 1: The European heat market. Final report. 10.6 EUR/GJ i s the price of district heat. http://www.solarthermalworld.org/files/Ecoheatcool%20WP1%20Web.pdf?download
  properties: carbon allocation 0 kg, carbon content 0, heating value, net 1 MJ

## Inputs from technosphere
- chimney: 3.65495e-8 m; lognormal variance with pedigree 0.3546, pedigree (3,3,5,5,1)
  EcoSpold01Location=CH
  Calculated
  Uncertainty: Calculated
- electricity, low voltage: 0.000178179, 1.79016e-6, 2.81515e-5, 0.000584321, 5.76754e-5, 1.4726e-5, 3.59248e-7, 9.96625e-6 kWh (8 suppliers, which the file names only by identifier); sum of these 0.000875168 kWh; lognormal variance with pedigree 0.0446, pedigree (3,3,5,5,1)
  EcoSpold01Location=UCTE
  Literature
  Uncertainty: Literature
- industrial furnace, 1MW, oil: 2.924e-9 unit; lognormal variance with pedigree 0.3546, pedigree (3,3,5,5,1)
  EcoSpold01Location=CH
  Estimation 5000h use per year
  Uncertainty: Estimation 5000h use per year
- light fuel oil: 0.000200809, 0.0210407, 0.00103479, 0.00208846, 0.000149234, 0.000138588 kg (6 suppliers, which the file names only by identifier); sum of these 0.0246526 kg; lognormal variance with pedigree 0.0432, pedigree (2,3,5,5,1)
  Literature
  EcoSpold01Location=RER
  Uncertainty: Literature
  properties: carbon content, fossil 0.862, dry mass 1 kg, heating value, net 42.6 MJ, wet mass 1 kg
- oil storage, 3000l: 3.89863e-8 unit; lognormal variance with pedigree 0.3546, pedigree (3,3,5,5,1)
  EcoSpold01Location=CH
  Calculated
  Uncertainty: Calculated

## Emissions to nature
- Ammonia [air, urban air close to ground]: 1.57895e-7 kg; lognormal variance with pedigree 0.502, pedigree (1,1,5,5,1)
  Literature, calculation from ranges
- Benzene [air, urban air close to ground]: 1.57895e-8 kg; lognormal variance with pedigree 0.8546, pedigree (3,3,5,5,1)
  Literature, basic uncertainty estimated = 6
  Uncertainty: Literature, basic uncertainty estimated = 6
- Benzo(a)pyrene [air, urban air close to ground]: 2.94737e-11 kg; lognormal variance with pedigree 0.8546, pedigree (3,3,5,5,1)
  (same comment as for Benzene)
- Butane [air, urban air close to ground]: 3.31579e-7 kg; lognormal variance with pedigree 0.8546, pedigree (3,3,5,5,1)
  (same comment as for Benzene)
- Carbon dioxide, fossil [air, urban air close to ground]: 0.0778947 kg; lognormal variance with pedigree 0.0446, pedigree (3,3,5,5,1)
  Literature
  Uncertainty: Literature
- Carbon monoxide, fossil [air, urban air close to ground]: 4.21053e-6 kg; lognormal variance with pedigree 0.202, pedigree (1,1,5,5,1)
  Calculation from ranges
- Copper ion [air, urban air close to ground]: 7.36842e-7 kg; lognormal variance with pedigree 0.6946, pedigree (3,3,5,5,1)
  Literature
  Uncertainty: Literature
- Dinitrogen monoxide [air, urban air close to ground]: 6.31579e-7 kg; lognormal variance with pedigree 0.572, pedigree (1,1,5,5,1)
  Calculation from ranges
- Dioxins, measured as 2,3,7,8-tetrachlorodibenzo-p-dioxin [air, urban air close to ground]: 4.73684e-16 kg; lognormal variance with pedigree 0.3546, pedigree (3,3,5,5,1)
  Literature
  Uncertainty: Literature
- Formaldehyde [air, urban air close to ground]: 9.47368e-7 kg; lognormal variance with pedigree 0.8546, pedigree (3,3,5,5,1)
  (same comment as for Benzene)
- Hydrocarbons, aliphatic, alkanes, unspecified [air, urban air close to ground]: 5.05263e-7 kg; lognormal variance with pedigree 0.8546, pedigree (3,3,5,5,1)
  (same comment as for Benzene)
- Hydrocarbons, aromatic [air, urban air close to ground]: 3.15789e-8 kg; lognormal variance with pedigree 0.8546, pedigree (3,3,5,5,1)
  (same comment as for Benzene)
- Hydrochloric acid [air, urban air close to ground]: 9.89474e-8 kg; lognormal variance with pedigree 0.0946, pedigree (3,3,5,5,1)
  Literature
  Uncertainty: Literature
- Hydrogen fluoride [air, urban air close to ground]: 9.47368e-9 kg; lognormal variance with pedigree 0.0946, pedigree (3,3,5,5,1)
  Literature
  Uncertainty: Literature
- Mercury II [air, urban air close to ground]: 5.26316e-10 kg; lognormal variance with pedigree 0.6946, pedigree (3,3,5,5,1)
  Literature
  Uncertainty: Literature
- Methane, fossil [air, urban air close to ground]: 1.05263e-6 kg; lognormal variance with pedigree 0.8546, pedigree (3,3,5,5,1)
  (same comment as for Benzene)
- Nitrogen oxides [air, urban air close to ground]: 5.26316e-5 kg; lognormal variance with pedigree 0.692, pedigree (1,1,5,5,1)
  Calculation from ranges
- PAH, polycyclic aromatic hydrocarbons [air, urban air close to ground]: 6.10526e-10 kg; lognormal variance with pedigree 0.3546, pedigree (3,3,5,5,1)
  Literature
  Uncertainty: Literature
- Particulate Matter, < 2.5 um [air, urban air close to ground]: 1.05263e-7 kg; lognormal variance with pedigree 0.3546, pedigree (3,3,5,5,1)
  Literature
  Uncertainty: Literature
- Pentane [air, urban air close to ground]: 2.21053e-7 kg; lognormal variance with pedigree 0.8546, pedigree (3,3,5,5,1)
  (same comment as for Benzene)
- Propane [air, urban air close to ground]: 2.11579e-8 kg; lognormal variance with pedigree 0.8546, pedigree (3,3,5,5,1)
  (same comment as for Benzene)
- Sulfur dioxide [air, urban air close to ground]: 4.93053e-5 kg; lognormal variance with pedigree 1.242, pedigree (1,1,5,5,1)
  Calculation from ranges
- Toluene [air, urban air close to ground]: 3.15789e-8 kg; lognormal variance with pedigree 0.8546, pedigree (3,3,5,5,1)
  (same comment as for Benzene)
- Zinc II [air, urban air close to ground]: 7.36842e-7 kg; lognormal variance with pedigree 0.6946, pedigree (3,3,5,5,1)
  Literature
  Uncertainty: Literature

## Sampling procedure
Data published in literature based on measurements.

## Extrapolations
none This dataset has been copied from an original dataset covering the geography Europe without Switzerland. The uncertainty has been adjusted accordingly.

## Review by Michael Spielmann (obsolete) 2006-02-16
passed
none

## Review by Emilia Moreno Ruiz 2012-04-16
calculation of fuel use property.
