# sodium nitrate production, technical grade

Dataset: EcoSpold 2, unit process
Geography: CL
Time period: 2015-01-01 to 2023-12-31
Technology level: current
Classification: ISIC rev.4 ecoinvent: 2012:Manufacture of fertilizers and nitrogen compounds
Scenario: Business-as-Usual
System model: Allocation, cut-off by classification
Generated by: Yvonne Baeuerle
Database: ecoinvent
isCopyrightProtected: true
accessRestrictedTo: 1

## General comment
This activity represents the refining process of sodium nitrate, purity 50% to reach a high purity of more than 98%. Sodium nitrate (NaNO3), crystal form used as industrial chemical for industries like glass, explosives, ceramic frits, enamel glazes, metal treatment and odor control for water treatment

## Included activities start
This activity starts with the sodium nitrate at a purity of 50% ready for refining.

## Included activities end
This activity ends with sodium nitrate at a purity of >98% ready for use.

## Geography
The production facilitiy is located in the Atacama Desert in northern Chile where the chemical is produced by the global producer and supplier SQM.

## Technology
SQM continueously improves this process to increase production volume and its efficiency.

## Time period
Process data provided are from 2014/2015 and are valid for today's and near future production at SQM in Chile.

## Reference product
- sodium nitrate, technical grade: 1 kg; By-product classification allocatable product; CPC 34280: Hydrogen peroxide; phosphides; carbides; hydrides, nitrides, azides, silicides and borides; HS2017 285000: Hydrides, nitrides, azides, silicides and borides, whether or not chemically defined, other than compounds [...]; CAS 7631-99-4
  production volume 4.7e7 kg
    Average production volume from 2014/2015/2016 provided by experts from SQM. 50% of the total production is sold as solar salt (70% of solar salt market share).
  property price 0.715 EUR2005
    Information from personal communication with SQM S.A. (https://www.sqm.com/en/): the average market price for nitrate salts used in solar power application in 2019 is approximately 800USD per metric tonne. See also SQM 2018 Results, http://s1.q4cdn.com/793210788/files/doc_presentations/2018/07/SQM-CorpPres_1Q18_long-final_12jul2018-update.pdf, accessed June 2019. Converted to EUR applying an exchange rate of 1.12 USD/EUR (as of June 2019).
  properties: carbon allocation 0 kg, carbon content 0

## Inputs from technosphere
- electricity, medium voltage: 0.05 kWh; lognormal variance with pedigree 0.0026, pedigree (1,1,3,1,1)
  Electricity used for the processes based on plant measurements
- heat, district or industrial, natural gas: 0.52 MJ; lognormal variance with pedigree 0.0026, pedigree (1,1,3,1,1)
  Natural gas burned to provide heat for the refining process
  properties: heating value, net 1 MJ
- heat, district or industrial, other than natural gas: 1.39 MJ; lognormal variance with pedigree 0.0026, pedigree (1,1,3,1,1)
  Bunker burned to provide heat for the refining process
  properties: corresponding fuel use, propane, furnace >100kW 1.05263 MJ, heating value, net 1 MJ
  note on corresponding fuel use, propane, furnace >100kW: Lower heating value of the fuel input related to the heat/electricity output, taken directly from ecoinvent v3.0 dataset "heat production, natural gas, at industrial furnace >100kW, GLO 2000".
- sodium nitrate, unrefined: 2.03 kg; lognormal variance with pedigree 0.0026, pedigree (1,1,3,1,1)
  Refining of sodium nitrate from 50% purity to >98%

## Sampling procedure
Data have been provided by the producer SQM in Chile. SQM is a global producer and supplier of plant nutrients, iodine, lithium and industrial chemicals. The production facilities are located in the Atacama Desert where the chemicals are produced from natural resources via mining, crystalization and refining processes. Initially, some data and process information has been exchanged via questionaires. Further, more specific data were provided via intensive direct contact with experts at SQM.
