# liquid storage tank production, chemicals, organics

Dataset: EcoSpold 2, unit process
Geography: CH
Time period: 1996-01-01 to 2023-12-31
Technology level: current
Classification: EcoSpold01Categories: chemicals/organics
Classification: ISIC rev.4 ecoinvent: 2512:Manufacture of tanks, reservoirs and containers of metal
Tags: ConvertedDataset
Scenario: Business-as-Usual
System model: Allocation, cut-off by classification
Generated by: Alex Primas
Published in: Althaus H.-J. 2007
Database: ecoinvent
isCopyrightProtected: true
accessRestrictedTo: 1

## General comment
The infrastructure module includes 4 tanks with storage capacitiy of 4000 m3 each, totalling to a storage capacitiy of 16000 m3. The life time of the tanks was assumed to be 50 years. This infrastructure module has a high uncertainty and should only be seen as an approximation of the infrastructure for regional storage of liquid chemical.
[This dataset was already contained in the ecoinvent database version 2. It was not individually updated during the transfer to ecoinvent version 3. Life Cycle Impact Assessment results may still have changed, as they are affected by changes in the supply chain, i.e. in other datasets. This dataset was generated following the ecoinvent quality guidelines for version 2. It may have been subject to central changes described in the ecoinvent version 3 change report (http://www.ecoinvent.org/database/ecoinvent-version-3/reports-of-changes/), and the results of the central updates were reviewed extensively. The changes added e.g. consistent water flows and other information throughout the database. The documentation of this dataset can be found in the ecoinvent reports of version 2, which are still available via the ecoinvent website. The change report linked above covers all central changes that were made during the conversion process.]

## Included activities end
Material for construction, transport of material to construction site, no energy use for construction included, dismantling and disposal processes, no contamination assumed for disposal, land use included.

## Geography
Based on weak data valid for Switzerland

## Technology
Most data origins from the storage of fuels, there is high uncertainty in the technological correlation. This may also affect the materials used for the tank wall. Uncertainties occur for the disposal processes for the tanks after use because of approximations with processes for residential buildings.

## Reference product
- liquid storage tank, chemicals, organics: 1 unit; By-product classification allocatable product; CPC 42210: Reservoirs, tanks, vats and similar containers (other than for compressed or liquefied gas), of iron, steel or[…]; HS2017 7309: Reservoirs, tanks, vats and similar containers; for any material (excluding compressed or liquefied gas), of [...]
  Uncertainty not applicable for output
  EcoSpold01Location=CH
  production volume 0.0336675 unit
    This is a placeholder value that does not reflect real-world production volumes. This dataset does not currently require a real-world production volume to work in the database framework, and no actual data were collected yet. This has no negative effect on the results of the ecoinvent database. The placeholder value of this activity was scaled according to the nominal GDP of 2005 (source: United Nations, http://data.un.org/Glossary.aspx?q=GDP+%28current+US%24%29, accessed 20130726) to reflect an appropriate share of the global production volume, which is also a placeholder value.
  property price 382636 EUR2005
    Calculated based on inputs: The price of the product has been calculated as a sum of the values of the material and energy inputs for this product. This value is therefore a rough estimation. It may underestimate the real price since there are additional expenses when producing any product. These expences can include for example labour costs, treatment of waste materials and profit for the producer. Please consider carefully whether this level of data quality is acceptable for your application.
  properties: carbon allocation 0 kg, carbon content 0

## Inputs from technosphere
- alkyd paint, white, without solvent, in 60% solution state: 4000 kg; lognormal variance with pedigree 0.146, pedigree (4,5,5,1,4)
  Estimation based on data for fuel storage
  EcoSpold01Location=RER
  Uncertainty: Estimation based on data for fuel storage
  properties: carbon content, fossil 0.140367, carbon content, non-fossil 0.199629, dry mass 1 kg, heating value, net 10.3 MJ, wet mass 1 kg
  note on carbon content, fossil: C content was calculated as an addition of C content in the raw materials.
- concrete, 30MPa: 855 m3; lognormal variance with pedigree 0.208, pedigree (5,5,5,1,4)
  Estimation based on theoretical calculation
  EcoSpold01Location=CH
  Uncertainty: Estimation based on theoretical calculation
  properties: dry mass 2205 kg, water content 0.0816327, wet mass 2385 kg
- pitch: 110000 kg; lognormal variance with pedigree 0.146, pedigree (4,5,5,1,4)
  EcoSpold01Location=CH
  Estimation based on data for fuel storage
  Uncertainty: Estimation based on data for fuel storage
  properties: carbon content, fossil 0.83, dry mass 1 kg, heating value, net 28 MJ, wet mass 1 kg
- reinforcing steel: 26000 kg; lognormal variance with pedigree 0.14, pedigree (1,1,5,1,1)
  5,5,2,1,4,5; Estimation based on theoretical calculation
  EcoSpold01Location=RER
  properties: carbon content, fossil 0.004, dry mass 1 kg, wet mass 1 kg
- steel, low-alloyed, hot rolled: 416000 kg; lognormal variance with pedigree 0.078, pedigree (3,5,5,1,3)
  EcoSpold01Location=RER
  Based on data for fuel storage
  Uncertainty: Based on data for fuel storage
  properties: carbon content, fossil 0.005, dry mass 1 kg, wet mass 1 kg
  note on carbon content, fossil: Low alloyed steel composition given in Tab. 3.2 ecoinvent v2.2 report 10_partII. Steel assumed to have a C content of 0.5%
- waste bitumen sheet: -110000 kg; lognormal variance with pedigree 0.1062, pedigree (4,5,2,1,4)
  EcoSpold01Location=CH
  Same amount as for material imput
  Uncertainty: Same amount as for material imput
  production volume
    Calculated from the production volume of liquid storage tank, chemicals, organics in proportion to the respective output amounts.
  properties: carbon content, fossil 0.643207, dry mass 0.985 kg, heating value, net 40.2 MJ, water content 0.0152284, wet mass 1 kg
  note on carbon content, fossil: The bitumen sheet is made of 63% bitumen, 24% surface spread and filler (assumed to be pure SiO2), 6% carrier fleece (assumed to be PE) and 7% elastomer (assumed to be PS) (ecoinvent v2.2 report 13_I, pg 40). C content of bitumen, PE and PS from Tab A.6 and A.1 (ecoinvent v2.2 report 13_I, pg 40), respectively. C content of waste also given in the dataset
  note on heating value, net: Literature value, Source: IPCC 2006, 2006 IPCC Guidelines for National Greenhouse Gas Inventories, Prepared by the National Greenhouse Gas Inventories Programme, Eggleston H.S., Buendia L., Miwa K., Ngara T. and Tanabe K. (eds). Published: IGES, Japan
- waste bulk iron, excluding reinforcement: -416000 kg; lognormal variance with pedigree 0.1062, pedigree (4,5,2,1,4)
  Same amount as for material imput
  EcoSpold01Location=CH
  Uncertainty: Same amount as for material imput
  production volume
    (same comment as for waste bitumen sheet)
  properties: dry mass 1 kg, wet mass 1 kg
- waste concrete, not reinforced: -1.45e6 kg; lognormal variance with pedigree 0.1062, pedigree (4,5,2,1,4)
  (same comment as for waste bulk iron, excluding reinforcement)
  production volume
    (same comment as for waste bitumen sheet)
  properties: dry mass 1 kg, wet mass 1 kg
- waste paint on metal: -4000 kg; lognormal variance with pedigree 0.1062, pedigree (4,5,2,1,4)
  (same comment as for waste bulk iron, excluding reinforcement)
  production volume
    (same comment as for waste bitumen sheet)
  properties: carbon content, fossil 0.65, dry mass 1 kg, heating value, net 19.7 MJ, wet mass 1 kg
- waste reinforced concrete: -521000 kg; lognormal variance with pedigree 0.1062, pedigree (4,5,2,1,4)
  (same comment as for waste bulk iron, excluding reinforcement)
  production volume
    (same comment as for waste bitumen sheet)
  properties: dry mass 0.99418 kg, water content 0.00585407, wet mass 1 kg

## Inputs from nature
- Occupation, construction site [natural resource, land]: 4400 m2*year; lognormal variance with pedigree 0.266, pedigree (4,5,5,1,4)
  Based on data for fuel storage and estimates
  Uncertainty: Based on data for fuel storage and estimates
- Occupation, industrial area [natural resource, land]: 110000 m2*year; lognormal variance with pedigree 0.266, pedigree (4,5,5,1,4)
  (same comment as for Occupation, construction site)
- Transformation, from unspecified [natural resource, land]: 2200 m2; lognormal variance with pedigree 0.186, pedigree (4,5,5,1,4)
  Based on data for fuel storage
  Uncertainty: Based on data for fuel storage
- Transformation, to industrial area [natural resource, land]: 2200 m2; lognormal variance with pedigree 0.186, pedigree (4,5,5,1,4)
  Based on data for fuel storage
  Uncertainty: Based on data for fuel storage

## Emissions to nature
- NMVOC, non-methane volatile organic compounds [air, non-urban air or from high stacks]: 2700 kg; lognormal variance with pedigree 0.406, pedigree (4,5,5,1,5)
  Estimated from data for fuel storage tanks
  Uncertainty: Estimated from data for fuel storage tanks

## Sampling procedure
Estimation from literature and from pictures and maps of 3 sites for fuel storage

## Extrapolations
No

## Review by Roland Hischier 2003-08-26
Passed.
