# electricity production, coal, aluminium industry

Dataset: EcoSpold 2, unit process
Geography: RNA
Time period: 2015-01-01 to 2023-12-31
Technology level: current
Classification: EcoSpold01Categories: hard coal/power plants
Classification: ISIC rev.4 ecoinvent: 3510:Electric power generation, transmission and distribution
Tags: electricity, primary aluminium industry; re-labelling activity
Scenario: Business-as-Usual
System model: Allocation, cut-off by classification
Generated by: Lucia Valsasina
Database: ecoinvent
isCopyrightProtected: true
accessRestrictedTo: 1

## General comment
This is a dataset used to create an aluminium industry specific electricity market for 'aluminium production Area 2' (North America) without Quebec. The production volume represents the total amount of electricity from coal used in 'aluminium production Area 2' (North America) without Quebec for aluminium production (electrolysis and ingot casting).
Electricity markets specific to the aluminium-industry are needed in an LCI database because primary aluminium production is very energy intensive, and hence the location of production plants is often determined by access to large amounts of cheap electricity, which often results in an electricity mix that is different from the general grid mix of the countries where the production plants are located.
It is assumed that the production of electricity in general and in aluminium industry specific power plants is identical. Details on actual electricity generation with each technology can be found in the corresponding datasets.
The share of electricity produced using lignite and hard coal is calculated using both (1) estimates of the share of coal electricity coming from each individual grid within North America (using state-specific aluminium production capacity from US Geological Survey http://minerals.usgs.gov/minerals/pubs/commodity/aluminum/ and visual state-to-grid mapping) and (2) ecoinvent v3.2 grid-specific split of coal power plants between hard coal and lignite.
Calculations are detailed in the report 'Calculating grid mixes for the aluminium industry in ecoinvent v3', available on the ecoinvent website.
[This dataset is meant to replace the following datasets:
- electricity production, coal, aluminium industry, IAI Area, North America, without Quebec, 2012 - 2012]

## Included activities start
Re-labelling dataset, not representing a real transformation activity. Conceptually, the activity can be said to start with the production of electricity.

## Included activities end
Re-labelling dataset, not representing a real transformation activity. Conceptually, the activity can be said to end with a given amount of high voltage electricity labelled as specifically used for the production of electricity.

## Geography
North America

## Time period
Production volume updated with 2015 data from IAI

## Reference product
- electricity, high voltage, aluminium industry: 1 kWh; = hard_NPCC+ hard_RFC+ hard_SERC+ hard_TRE+ hard_WECC+lig_NPCC+ lig_RFC+ lig_SERC+ lig_TRE+ lig_WECC; By-product classification allocatable product; CPC 17100: Electrical energy; HS2017 271600: Electrical energy
  Expressed as sum of contributing technologies (inputs) to allow uncertainty analysis: each technology share is uncertain, and in a Monte Carlo analysis will always be normalized by the sum contribution of each technology
  production volume 1.65e10 kWh
    The electricity production volume, which is ultimately used to determine the share of coal-based electricity in the downstream market for aluminium industry specific high voltage electricity, is calculated by multiplying the following data:
    (1) public estimates of the electricity mix used to produce aluminium in the 'aluminium production region 2' (North America), provided by the International Aluminium Institute (IAI), see http://www.world-aluminium.org/statistics/, from which Quebec electricity used in Quebec aluminium production was subtracted (see below). The IAI estimates are based on the subset of aluminium producers that provide information to the IAI.
    (2) primary aluminium production volumes in each of the North American grids defined in ecoinvent, which are based on the NERC Regional Reliability Councils (see comment field) for the US or provinces for Canada. The aluminium production volume data in the USA is based on state-level aluminium production capacity data provided by the USGS (http://minerals.usgs.gov/minerals/pubs/commodity/aluminum/) that was then manually aggregated to grid mix region level. The aluminium production volumes for Canadian provinces was communicated directly by the Aluminium Association of Canada (personnal communication).
    (3) global average electricity requirements, per tonne primary aluminium, for both Söderberg and prebake electrolysis technologies, as well as the Area 2-specific proportion of aluminium produced by each technology.
    (4) electricity compensating line and transformation losses from production to consumption as medium voltage electricity, Losses estimated using country-level ecoinvent v3 data.
    (5) electricity consumed in ingot casting.
    Note that the Quebec electricity subtracted from the Area 2 total is based on the total aluminium production volume in Quebec, the 2012 Quebec aluminium industry specific grid mix (99.98% hydroelectricity and 0.02% natural gas), and the specific electricity consumption associated with aluminium production (weighted average of site-specific data).
  property price 0.0977 EUR2005
    Calculated in temporary price data. 94% of the average price (to account for a 6% loss in transformation and transmission) for electricity for industrial consumersin 2005 (excluded taxes). From IEA.
  properties: carbon allocation 0 kg, carbon content 0

## Inputs from technosphere
All rows: lognormal variance with pedigree 0.0113, pedigree (3,2,4,1,2)
- electricity, high voltage: 0.176069 kWh; name hard_RFC
  Calculated amount (see general comments).
- electricity, high voltage: 0.0392155 kWh; name lig_TRE
  Calculated amount (see general comments).
- electricity, high voltage: 0.206236 kWh; name lig_SERC
  Calculated amount (see general comments).
- electricity, high voltage: 0.00428859 kWh; name hard_NPCC
  Calculated amount (see general comments).
- electricity, high voltage: 0.00471352 kWh; name lig_NPCC
  Calculated amount (see general comments).
- electricity, high voltage: 0.0356801 kWh; name hard_TRE
  Calculated amount (see general comments).
- electricity, high voltage: 0.0727171 kWh; name hard_WECC
  Calculated amount (see general comments).
- electricity, high voltage: 0.187643 kWh; name hard_SERC
  Calculated amount (see general comments).
- electricity, high voltage: 0.0799223 kWh; name lig_WECC
  Calculated amount (see general comments).
- electricity, high voltage: 0.193515 kWh; name lig_RFC
  Calculated amount (see general comments).

## Sampling procedure
International Aluminium Institute (IAI) data used for total electricity used in the production of aluminium that is from coal power plants. USGS, ACC and ecoinvent data used to split coal based electricity production to the respective fuels (lignite, hard coal) and grids - see general comments. The cited 100% representativeness is for IAI data (data based on 100% of regional aluminium production). The percent representativeness of data used to determine coal type (regional grid proxy) is also 100%.

## Extrapolations
Assumed all coal is hard coal, as per grid electricity generation.
