# electricity production, hydro, reservoir, tropical region

Dataset: EcoSpold 2, unit process
Geography: BR-Southern grid
Time period: 2014-01-01 to 2023-12-31
Technology level: modern
Classification: ISIC rev.4 ecoinvent: 3510:Electric power generation, transmission and distribution
Tags: hydro power
Scenario: Business-as-Usual
System model: Allocation, cut-off by classification
Generated by: Henrique Rogerio Antunes de Souza Junior
Published in: Bolliger, R. 2007
Database: ecoinvent
isCopyrightProtected: true
accessRestrictedTo: 1

## General comment
This dataset represents the production of high voltage electricity at grid-connected reservoir hydropower plants on the Brazil-Southern in 2014.
The data about production was obtained in Matrizes Elétricas Estaduais: Ano Referência 2015 and Capacidade Instalada de Geração Elétrica Brasil e Mundo (2014): Ano Referência 2014. MME (2015; 2016).
The data about emissions was obtained in Projeto BALCAR: Emissões de Gases de Efeito Estufa em Reservatórios de Centrais Hidrelétricas. BRASIL (2014).
The data about water was obtained in Relatório de Sustentabilidade 2014. Itaipu Binacional. ITAIPU (2014).
ITAIPU (2014). Relatório de Sustentabilidade 2014. Itaipu Binacional.
BRASIL (2014). Projeto BALCAR: Emissões de Gases de Efeito Estufa em Reservatórios de Centrais Hidrelétricas. Agência Nacional de Energia Elétrica – ANEEL.
MME (2015). Capacidade Instalada de Geração Elétrica Brasil e Mundo (2014): Ano Referência 2014. Edição de 05 de março de 2015. Ministério De Minas E Energia – MME. Secretaria De Planejamento E Desenvolvimento Energético. Núcleo De Estudos Estratégicos De Energia.
MME (2016). Matrizes Elétricas Estaduais: Ano Referência 2015. Edição de 23 de novembro de 2016. Ministério De Minas E Energia – MME. Secretaria De Planejamento E Desenvolvimento Energético. Núcleo De Estudos Estratégicos De Energia.
The original ecoinvent dataset used as a basis was 'electricity production, hydro, reservoir, tropical region, BR, 1990 - 2015' and it has been copied in '12/2017'
[This dataset is meant to replace the following datasets:]

## Included activities start
This dataset starts from the power plant ready to produce electricity, i.e. the reservoir filled with water.
From (potential) energy in water, entering the power plant.

## Included activities end
This activity ends with 1kWh of high voltage electricity produced at the power plant and arrived at the busbar.

This dataset includes
- the area/volume occupied for the barrage, power station, and the lake
- an estimation of emissions of carbon dioxide and methane
- operation and maintenance activities and materials of the power plants, such as lubricating oil or mass of water passing through the turbines.

This dataset doesn't include
- land use for access roads to the reservoir
- raw materials extraction, decommissioning and waste treatment as these activities are already included in the infrastructure datasets
- transformation of the electricity produced.
- dinitrogen oxide emissions

## Time period
The Annual Production Volume is valid for the year 2014.

## Parameters
- gross electricity production: 1.47371e11 kWh; name gross_electricity; = (167715000000*0.87)*(1+losses_gross_net); lognormal variance with pedigree 0.0019, pedigree (2,2,1,1,2)
  The data about production was obtained in Matrizes Elétricas Estaduais: Ano Referência 2015. MME (2016).
  equation: (annual production total * hydro(%)) * 1% losses
  MME (2016). Matrizes Elétricas Estaduais: Ano Referência 2015. Edição de 23 de novembro de 2016. Ministério De Minas E Energia - MME. Secretaria De Planejamento E Desenvolvimento Energético. Núcleo De Estudos Estratégicos De Energia.
- lifetime: 150 year; lognormal variance with pedigree 0.0014, pedigree (2,2,1,3,1)
  Estimation based on experiences.
  nan
- losses from gross electricity production: 0.01 dimensionless; name losses_gross_net; lognormal variance with pedigree 0.003225, pedigree (3,3,1,2,1)
  Literature value. Generic value taken from the IEA Electricity information 2014, part I, p. I.7: 'The difference between gross and net electricity production is generally observed to be about 7% for conventional thermal stations, 1% for hydro stations and 6% for nuclear.'
  IEA/OECD. 2014. Electricity Information 2014. International Energy Agency (IEA), Paris Cedex (FR).
  nan
  Uncertainty: Generic assumption

## Reference product
- electricity, high voltage: 1 kWh; By-product classification allocatable product; CPC 17100: Electrical energy; HS2017 271600: Electrical energy
  production volume 8.61293e10 kWh; name apv_electricity; = gross_electricity*(1-losses_gross_net)
    Data obtained from the reports of the Ministry of Mines and Energy of Brazil (MME, 2016) for the year 2015.
    MME (2016). Matrizes Elétricas Estaduais: Ano Referência 2015. Edição de 23 de novembro de 2016. Ministério De Minas E Energia - MME. Secretaria De Planejamento E Desenvolvimento Energético. Núcleo De Estudos Estratégicos De Energia.
  property price 0.0977 EUR2005
    Temporary price data. Calculated as 90% of purchasers price based on: 94% of the average price (to account for a 6% loss in transformation and transmission) for electricity for industrial consumersin 2005 (excluded taxes). From IEA.
  properties: carbon allocation 0 kg, carbon content 0

## Inputs from technosphere
- hydropower plant, reservoir, non-alpine regions: 4.0404e-13 unit; = 1/(lifetime*16500000000); source Bolliger, R. 2007, p. p.100 Tab. 12.5; lognormal variance with pedigree 0.044, pedigree (1,1,3,5,1)
  Literature value/calculated value. The needed amount of infrastructure per kWh produced is calculated with the lifetime and the annual net energy production (16500GWh/a).
- lubricating oil: 7.56e-6 kg; name lubricating_oil; = 0.000009*0.84; source Vögtlin H. J. 2002, p. p.36 in Bolliger et al.; lognormal variance with pedigree 0.1001, pedigree (4,2,3,5,3)
  There, a consumption of lubricating oil for turbines of 9 liters per GWh is estimated. With an oil density of 0.84 kg/l this amounts to 0.007 g/kWh. The lubricating oil is in a closed loop system (i.e. cannot get into the turbined water system) and is disposed annualy as waste oil in a hazardous waste treatment plant.
  Estimation. Data for a run-of-river power station were overtaken.
  properties: carbon content, fossil 0.75, dry mass 1 kg, heating value, net 40.2 MJ, wet mass 1 kg
  note on carbon content, fossil: Lubricating oil is produced from diesel. C-content/dry mass of fats and oils considered 75%, from: ecoinvent v2.2 report, n 15a, pg 40
  note on heating value, net: Literature value, Source: IPCC 2006, 2006 IPCC Guidelines for National Greenhouse Gas Inventories, Prepared by the National Greenhouse Gas Inventories Programme, Eggleston H.S., Buendia L., Miwa K., Ngara T. and Tanabe K. (eds). Published: IGES, Japan
- waste mineral oil: -7.56e-6 kg; name waste_oil; = lubricating_oil; lognormal variance with pedigree 0.0382, pedigree (4,5,2,5,1)
  calculated value
  production volume; = apv_electricity* waste_oil
    Calculated from the production volume of electricity, high voltage, hydro, reservoir in proportion to the respective output amounts.
  properties: carbon content, fossil 0.864444, dry mass 0.9 kg, heating value, net 34.7 MJ, water content 0.111111, wet mass 1 kg
  note on carbon content, fossil: Tab A.6, ecoinvent v2.2 report 13_I. C content has been calculated after data in the tables, and then referred to 1 kg DM
  note on heating value, net: Value taken from the general comment of the treatment dataset.

## Inputs from nature
- Energy, potential (in hydropower reservoir), converted [natural resource, in water]: 3.79 MJ
  Reflects range average to best performance.
- Occupation, lake, artificial [natural resource, land]: 0.0165589 m2*year; = lifetime *transformation_from_forest; lognormal variance with pedigree 0.074, pedigree (1,1,3,5,1)
  calculated value
- Transformation, from forest, unspecified [natural resource, land]: 0.000110393 m2; name transformation_from_forest; = transformation_to_industrial+transformation_to_lake; lognormal variance with pedigree 0.1813, pedigree (2,2,5,1,2)
  Literature value/calculated value.
  The data for the region were obtained from Scherer L, Pfister S (2016) supporting information (S1 Table), and then the value was calculated by weighted averaging the area relative to the generations of each plant.
  Scherer L, Pfister S (2016) Hydropower's Biogenic Carbon Footprint. PLoS ONE 11(9):e0161947. doi:10.1371/journal.pone.0161947. Available in: <http://journals.plos.org/plosone/article?id=10.1371/journal.pone.0161947> Access in 04-2018.
- Transformation, to industrial area [natural resource, land]: 1.093e-6 m2; name transformation_to_industrial; lognormal variance with pedigree 0.198, pedigree (4,5,5,5,1)
  Estimation. Area for barrage and power station.
  Estimative based on Frischknecht et al. (1996) assuming that 1% of the area covered by the reservoirs is added and assigned to the area covered by buildings and other infrastructures,
  Frischknecht R, Bollens U, Bosshart S, Ciot M, Ciseri L, Doka G, Dones R, Gantner U, Hischier R, Martin A (1996) Ökoinventare von Energiesystemen: Grundlagen für den ökologischen Vergleich von Energiesystemen und den Einbezug von Energiesystemen in Ökobilanzen für die Schweiz. 3. Gruppe Energie - Stoffe - Umwelt (ESU), Eidgenössische Technische Hochschule Zürich und Sektion Ganzheitliche Systemanalysen, Paul Scherrer Institut, Villigen, Bundesamt für Energie (Hrsg.), Bern, CH, retrieved from: www.energieforschung.ch
- Transformation, to lake, artificial [natural resource, land]: 0.0001093 m2; name transformation_to_lake; = 1.0930E-04; lognormal variance with pedigree 0.1813, pedigree (2,2,5,1,2)
  Literature value/calculated value.
  Data of reservoir surface area based on GRanD database (Lehner et al., 2011; Scherer; Pfister, 2016). Assuming a lifetime of 150 years and total energy production based on the installed capacity of each plant (ANEEL, 2018) with the capacity factor of each power plant and the Brazilian average for 2014 (MME, 2015). Values per region estimated based on a weighted average of the surface area and total energy production per power plant. Allocation factors based on the supplementary material (S1 Table) from Scherer and Pfister (2016).
  ANEEL (2018) BIG - Banco de informações de geração. Brazilian Electricity Regulatory Agency. Available in: <http://www.aneel.gov.br/informacoes-tecnicas/-/asset_publisher/CegkWaVJWF5E/content/big-banco-de-informacoes-de-geracao/655808?inheritRedirect=false>
  Lehner B, Reidy Liermann C, Revenga C, Vorosmarty C, Fekete B, Crouzet P, et al. High-Resolution Mapping of the World's Reservoirs and Dams for Sustainable River-Flow Management. Front Ecol Environ. 2011; 9: 494-502
  MME (2015) Capacidade Instalada de Geração Elétrica Brasil e Mundo (2014). March, 2015.
  Scherer L, Pfister S (2016) Hydropower's Biogenic Carbon Footprint. PLoS ONE 11(9):e0161947. doi:10.1371/journal.pone.0161947. Available in: <http://journals.plos.org/plosone/article?id=10.1371/journal.pone.0161947> Access in 04-2018.
- Volume occupied, reservoir [natural resource, in water]: 0.470715 m3*year; = 3.1381E-03*lifetime; lognormal variance with pedigree 0.3413, pedigree (2,2,5,1,2)
  Literature value/calculated value.
  Data of maximum storage capacity of reservoir based on GRanD database (Lehner et al., 2011; Scherer; Pfister, 2016). Assuming a lifetime of 150 years and total energy production based on the installed capacity of each plant (ANEEL, 2018) with the capacity factor of each power plant and the Brazilian average for 2014 (MME, 2015). Values per region estimated based on a weighted average of the reservoir capacity and total energy production per power plant. Allocation factors based on the supplementary material (S1 Table) from Scherer and Pfister (2016).
  ANEEL (2018) BIG - Banco de informações de geração. Brazilian Electricity Regulatory Agency. Available in: <http://www.aneel.gov.br/informacoes-tecnicas/-/asset_publisher/CegkWaVJWF5E/content/big-banco-de-informacoes-de-geracao/655808?inheritRedirect=false>
  Lehner B, Reidy Liermann C, Revenga C, Vorosmarty C, Fekete B, Crouzet P, et al. High-Resolution Mapping of the World's Reservoirs and Dams for Sustainable River-Flow Management. Front Ecol Environ. 2011; 9: 494-502
  MME (2015) Capacidade Instalada de Geração Elétrica Brasil e Mundo (2014). March, 2015.
  Scherer L, Pfister S (2016) Hydropower's Biogenic Carbon Footprint. PLoS ONE 11(9):e0161947. doi:10.1371/journal.pone.0161947. Available in: <http://journals.plos.org/plosone/article?id=10.1371/journal.pone.0161947> Access in 04-2018.
- Water, turbine use, unspecified natural origin [natural resource, in water]: 3.61638 m3; name water_turbine_use_UNO_input; = 276732570500/76522000000; lognormal variance with pedigree 0.0613, pedigree (2,2,5,1,2)
  Literature value/calculated value.
  Only one plant in the southern region have water use estimate (Itaipu-PR), this plant is responsible for 50% of the electricity generation in the southern region. So the data about water was obtained in Relatório de Sustentabilidade 2014. Itaipu Binacional. ITAIPU (2014).
  ITAIPU (2014). Relatório de Sustentabilidade 2014. Itaipu Binacional.
  Souza et al. (2017) ALEC Project: Dataset update for energy production per region in Brazil. ecoinvent call for tender. Project: LCI data collection, datasets creation and submission of LCI datasets related to electricity sectors in Latin America, in the framework of the Sustainable Recycling Industries (SRI) programme.

## Emissions to nature
- Carbon dioxide, from soil or biomass stock [air, non-urban air or from high stacks]: 0.0285 kg; lognormal variance with pedigree 0.0987, pedigree (5,3,5,3,3)
  Literature value/calculated value taken over from global dataset "electricity production, hydro, reservoir, tropical region, GLO". Hertwich 2013 provides an analysis of greenhouse gas emissions from hydropower plants. 55 data points are available for tropical reservoir plants, from which the average CO2 and CH4 emissions are calculated.
  Hertwich, E.G. 2013. Addressing Biogenic Greenhouse Gas Emissions from Hydropower in LCA. Environmental Sciency&Technology, 47, 9604-9611
- Methane, non-fossil [air, non-urban air or from high stacks]: 0.00136 kg; lognormal variance with pedigree 0.0987, pedigree (5,3,5,3,3)
  Literature value/calculated value adopted from the global dataset "electricity production, hydro, reservoir, tropical region, GLO". Hertwich 2013 provides an analysis of greenhouse gas emissions from hydropower plants. 55 data points are available for tropical reservoir plants, from which the average CO2 and CH4 emissions are calculated.
  Hertwich, E.G. 2013. Addressing Biogenic Greenhouse Gas Emissions from Hydropower in LCA. Environmental Sciency&Technology, 47, 9604-9611
- Water [air, unspecified]: 0.0292217 m3; name water_to_air_unspecified; lognormal variance with pedigree 0.0427, pedigree (2,2,3,1,1)
  Calculated value based on literature values and expert opinion. See comments in the parametres' comment field.
  property fraction, origin: fresh water 1; name fraction_origin_fresh_water_Ww
  property fraction, origin: salt water 0; name fraction_origin_salt_water_Ww
  property fraction, origin: unspecified 0; name fraction_origin_unspecified_Ww
- Water [water, unspecified]: 3.58716 m3; name water_to_water_unspecified; = water_turbine_use_UNO_input-water_to_air_unspecified; lognormal variance with pedigree 0.130025, pedigree (4,4,5,2,4)
  (same comment as for Water)
  property fraction, origin: fresh water 1; name fraction_origin_fresh_water
  property fraction, origin: salt water 0; name fraction_origin_salt_water
  property fraction, origin: unspecified 0; name fraction_origin_unspecified

## Sampling procedure
literature and annual reports

## Extrapolations
Some data was extrapolated proportionally to the generation of each region.

Updated data for regionalization of Brazil (2014-2017):
- Annual Production Volume (specific data)
- Transformation, from forest (specific data)
- Transformation, to lake (specific data)
- Volume occupied (specific data)
- Water, turbine use (specific data)

## Review by Christopher Oberschelp 2017-12-19
Dataset now seems to be of good quality with proper documentation. Indiviudal issues might still be spotted by comparison with suitable reference datasets at a later stage. Uncertainty might still need adjustments (as agreed upon with ecoinvent).
