# rape seed production

Dataset: EcoSpold 2, unit process
Geography: AU-WA
Time period: 2011-01-01 to 2023-01-01
Technology level: current
Classification: ISIC rev.4 ecoinvent: 0111:Growing of cereals (except rice), leguminous crops and oil seeds
Scenario: Business-as-Usual
System model: Allocation, cut-off by classification
Generated by: Timothy Grant
Database: ecoinvent
isCopyrightProtected: true
accessRestrictedTo: 1

## General comment
This inventory represents the production of 1 kg of rape seed in AUS-WAS region. It has been developed with support from the Australian Commonwealth Government through the National Landcare Programme Innovation Grant and the Grains Research and Development Corporation (GRDC). The inventory was developed by CSIRO, the Department of Primary Industries NSW and Lifecycles. More detail on inventory development can be found in the Methodology for Developing Life Cycle Inventory' documents located at http://auslci.com.au/index.php/AusAgLCI. ;

## Included activities start
The inventory includes the processes for growing canola (Rape seed) without irrigation on arable land in Western Australia, Australia. Inputs of fertilisers, pesticides as well as the transports to the farm are considered. All tractor operations, fuel supply and machine infrastructure is included. The direct and indirect emissions on the field from nitrogen application and stubble retention are included. Stubble/straw removed from the field is included in the nitrogen balance but allocation to straw product has been ignored as the fraction of stubble removed on average is low 11%,- and the economic value is generally low. The nitrogen balance also includes leaching of N in different parts of the state based on the ratio of evapouration/ precipitation ratio which results in 30% Nitrogen leaching in 1.5% of the state of WA. Inventory refers to the production of 1 kg of seeds. Source inventory refers to 1 ha of crop over 1 year, with an average yield value of 1110 kg (dry matter content = 1043.4 kg), from the end of the previous crop to the point of harvesting of the next crop.

## Included activities end
The system boundary ends at the field gate with all further processes such as transport, storage, packaging are excluded.

## Geography
This inventory refers to an average production in Western Australia, Australia.

## Technology
This dataset represents the current agricultural process from the soil tillage to the harvest of the crop

## Time period
Averge data collected for 2011-2016.

## Reference product
- rape seed: 1 kg; By-product classification allocatable product; CPC 01443: Rape or colza seed; HS2017 120590: Oil seeds; rape or colza seeds, other than low erucic, whether or not broken
  This inventory has been developed with support from the Australian Commonwealth Government through the National Landcare Programme Innovation Grant and the Grains Research and Development Corporation (GRDC). The inventory was developed by CSIRO, the Department of Primary Industries NSW and Lifecycles. More detail on inventory development can be found in the Methodology for Developing Life Cycle Inventory' documents located at http://auslci.com.au/index.php/AusAgLCI. ;
  production volume 1.68935e9 kg
    Australian Bureau of Statistics 2021-22, Agricultural Commodities, Australia, ABS, viewed 17 July 2023, <https://www.abs.gov.au/statistics/industry/agriculture/agricultural-commodities-australia/2021-22>.
  property price 0.51245 EUR2005
    The price was calculated based on data on gross value (AUD) [1] divided by the production quantity [2] of rape seed (Oilseeds - Other oilseeds) for the years 2017-2020 for the Western Australia region in Australia from the Australian Bureau of Statistics (ABS). Data was available per financial year, so that the first year of the financial year was assumed to be the year analysed. References: [1] Value of Agricultural Commodities Produced, Australia; accessed on 24.08.23, available at: https://www.abs.gov.au/statistics/industry/agriculture/value-agricultural-commodities-produced-australia [2] Agricultural Commodities, Australia; accessed on 24.08.2023, available at: https://www.abs.gov.au/statistics/industry/agriculture/agricultural-commodities-australia
    The prices were converted to EUR based on the annual exchange rates published by the European Central Bank (https://sdw.ecb.europa.eu/quickview.do?SERIES_KEY=120.EXR.A.AUD.EUR.SP00.A, last accessed on 2023-06-01) and adjusted for inflation relative to 2005 using the producer price index (PPI) of the euro area, published by eurostat (https://ec.europa.eu/eurostat/databrowser/view/STS_INPP_A__custom_6416181/default/table?lang=en, last accessed on 2023-06-01).
  properties: carbon allocation 0.53956 kg, carbon content 0.574, carbon content, fossil 0, carbon content, non-fossil 0.574, dry mass 0.94 kg, water content 0.0638298, water in wet mass 0.06 kg, wet mass 1 kg

## Inputs from technosphere
- ammonium nitrate: 0.0313514 kg; lognormal variance with pedigree 0.0046, pedigree (1,4,3,1,1)
  mass ammonium nitrate |) divided by kg yield per ha
  properties: dry mass 1 kg, wet mass 1 kg
- application of plant protection product, by field sprayer: 0.0045045 ha; lognormal variance with pedigree 0.0038, pedigree (2,3,3,1,1)
  Surface x number of times ha is processed |) divided by kg yield per ha
  properties: dry mass 1 kg, wet mass 1 kg
- combine harvesting: 0.000900901 ha; lognormal variance with pedigree 0.0046, pedigree (1,4,3,1,1)
  Surface x number of times ha is processed |) divided by kg yield per ha
  properties: dry mass 1 kg, wet mass 1 kg
- fertilising, by broadcaster: 0.00108108 ha; lognormal variance with pedigree 0.0038, pedigree (2,3,3,1,1)
  9.01E-04 units --- Surface x number of times ha is processed |plus| 1.80E-04 units --- Surface x number of times ha is processed |) divided by kg yield per ha
  properties: dry mass 1 kg, wet mass 1 kg
- glyphosate: 0.00126486 kg; lognormal variance with pedigree 0.0052, pedigree (3,3,3,1,1)
  6.16E-04 units --- Mass glyphosate |plus| 6.49E-04 units --- Mass glyphosate |) divided by kg yield per ha
  properties: carbon content, fossil 0.214286, dry mass 1 kg, wet mass 1 kg
- limestone, crushed, for mill: 0.324324 kg; lognormal variance with pedigree 0.043825, pedigree (3,3,5,2,2)
  Mass limestone |) divided by kg yield per ha
  properties: carbon content, fossil 0.117492, dry mass 0.998 kg, water content 0.00200401, wet mass 1 kg
- monoammonium phosphate: 0.0369369 kg; lognormal variance with pedigree 0.0126, pedigree (3,1,3,1,3)
  Mass monoammonium phosphate |) divided by kg yield per ha
  properties: dry mass 1 kg, nitrogen content 0.084, phosphorus content 0.226939, wet mass 1 kg
- pesticide, unspecified: 0.00278111 kg; lognormal variance with pedigree 0.0052, pedigree (3,3,3,1,1)
  8.45E-04 units --- Mass 2,4-D |plus| 5.41E-05 units --- Mass triclopyr |plus| 8.92E-04 units --- Mass atrazine |plus| 3.46E-04 units --- Mass trifluralin |plus| 3.38E-04 units --- Mass paraquat |plus| 5.41E-05 units --- Mass clethodim |plus| 4.50E-05 units --- Mass diflufenican |plus| 1.80E-04 units --- Mass chlorpyrifos |plus| 2.70E-05 units --- Mass alpha-cypermethrin |plus| 2.69E-08 units --- Mass quizalofop-P-ethyl |) divided by kg yield per ha
  properties: carbon content, fossil 0.486978, dry mass 1 kg, wet mass 1 kg
- planting with starter fertiliser, by no till planter: 0.000900901 ha; lognormal variance with pedigree 0.0046, pedigree (1,4,3,1,1)
  Surface x number of times ha is processed |) divided by kg yield per ha
  properties: dry mass 1 kg, wet mass 1 kg
- tillage, cultivating, chiselling: 0.000225225 ha; lognormal variance with pedigree 0.0046, pedigree (3,1,3,1,1)
  4.50E-05 units --- Surface x number of times ha is processed |plus| 1.80E-04 units --- Surface x number of times ha is processed |) divided by kg yield per ha
  properties: dry mass 1 kg, wet mass 1 kg
- transport, tractor and trailer, agricultural: 0.005 metric ton*km; lognormal variance with pedigree 0.124, pedigree (3,1,3,1,1)
  grain collection (Yield/1000)*0.005 metric ton*km |) divided by kg yield per ha
- urea: 0.0514414 kg; lognormal variance with pedigree 0.0126, pedigree (3,1,3,1,3)
  sum of Mass urea |) divided by kg yield per ha
  properties: carbon content, fossil 0.2, dry mass 1 kg, wet mass 1 kg

## Inputs from nature
- Carbon dioxide, in air [natural resource, in air]: 4.36036 kg; lognormal variance with pedigree 0.0412, pedigree (1,3,5,1,1)
  Atmospheric CO2 absorbed by the plant - Yield x (Drymatter content of crop x Carbon content of crop + Plant residue x Dry matter content of residue x Carbon content of residue) x Carbon to Carbon dioxide conversion factor |) divided by kg yield per ha
- Occupation, annual crop, non-irrigated [natural resource, land]: 9.00901 m2*year; lognormal variance with pedigree 0.0047, pedigree (2,2,3,1,1)
  Actual land used for the cropping |) divided by kg yield per ha
- Occupation, cropland fallow (non-use) [natural resource, land]: 0.500901 m2*year; lognormal variance with pedigree 0.006, pedigree (3,1,3,1,1)
  Crop fallow as a part of crop rotation allocated across all crops in the rotation |) divided by kg yield per ha

## Emissions to nature
- 2,4-D [air, non-urban air or from high stacks]: 8.44144e-6 kg; lognormal variance with pedigree 0.044, pedigree (1,4,3,1,1)
  Mass of active ingredient 2,4-D applied x fraction released in air - Primary partitioning from PESTLCI |) divided by kg yield per ha
- Alpha-cypermethrin [air, unspecified]: 2.7027e-7 kg; lognormal variance with pedigree 0.044, pedigree (1,4,3,1,1)
  Mass of active ingredient alpha-cypermethrin applied x fraction released in air - Primary partitioning from PESTLCI |) divided by kg yield per ha
- Ammonia [air, non-urban air or from high stacks]: 0.00459459 kg; lognormal variance with pedigree 0.012, pedigree (1,4,3,1,1)
  Direct emissions from fertilizers. Nitrogen applied per ha x fraction of nitrogen volatilized x N to NH4 coversion factor divided by kg yield per ha
- Antimony ion [air, non-urban air or from high stacks]: 2.27027e-8 kg; lognormal variance with pedigree 0.654, pedigree (1,4,3,1,1)
  emissions from burning residues = yield x quantity of plant residue x fraction of residues remaining at time of burning x dry matter content x burning efficiency x fraction burnt* emission factor from NPI workbook/1000. (pg 13 Environment Australia, Aggregated Emmissions from Prescribed burning and Wildfires.1999) |) divided by kg yield per ha
- Arsenic ion [air, non-urban air or from high stacks]: 1.47748e-9 kg; lognormal variance with pedigree 0.654, pedigree (1,4,3,1,1)
  (same comment as for Antimony ion)
- Atrazine [air, non-urban air or from high stacks]: 8.91892e-6 kg; lognormal variance with pedigree 0.044, pedigree (1,4,3,1,1)
  Mass of active ingredient atrazine applied x fraction released in air - Primary partitioning from PESTLCI |) divided by kg yield per ha
- Butadiene [air, non-urban air or from high stacks]: 2.85586e-6 kg; lognormal variance with pedigree 0.044, pedigree (1,4,3,1,1)
  (same comment as for Antimony ion)
- Cadmium II [air, non-urban air or from high stacks]: 3.05405e-8 kg; lognormal variance with pedigree 0.654, pedigree (1,4,3,1,1)
  (same comment as for Antimony ion)
- Carbon dioxide, fossil [air, non-urban air or from high stacks]: 0.180042 kg; lognormal variance with pedigree 0.0046, pedigree (1,4,3,1,1)
  3.77E-02 units --- Emissions from urea application, Carbon applied with urea x Conversion factor |plus| Emissions from lime application - Carbon applied with lime and dolomite x Emission factor x Conversion factor |) divided by kg yield per ha
- Carbon dioxide, from soil or biomass stock [air, non-urban air or from high stacks]: 2.63068 kg; lognormal variance with pedigree 0.004, pedigree (1,4,3,1,1)
  0.00E+00 units --- Emissions from burning residues - Yield x Quantity of plant residue x Fraction of residues remaining at time of burning x Fry matter content x Burning efficiency x Carbon content x CO2 emission factor x Conversion factor |plus| 2.63E+00 units --- Emissions from burning residues - Residue which is not removed, and not burnt is assumed to degrade to biogenic carbon dioxide. |plus| 0.00E+00 units --- By default land-use change is not included in the inventory due to high uncertainties in the calculation. However a value from the land-use change calculator developed by Blonk consultants has been included and can be switched on by changing the value of DLUC_switch to 1 calculated average LUC emissions if included |) divided by kg yield per ha
- Carbon dioxide, non-fossil [air, non-urban air or from high stacks]: 0.000318919 kg; lognormal variance with pedigree 0.0046, pedigree (1,4,3,1,1)
  (same comment as for Antimony ion)
- Carbon monoxide, from soil or biomass stock [air, non-urban air or from high stacks]: 0.00421622 kg; lognormal variance with pedigree 0.654, pedigree (1,4,3,1,1)
  Emissions from burning residues - Yield x Quantity of plant residue x Fraction of residues remaining at time of burning x Fry matter content x Burning efficiency x Carbon content x CO emission factor x Conversion factor |) divided by kg yield per ha
- Carbon monoxide, non-fossil [air, non-urban air or from high stacks]: 0.00342342 kg; lognormal variance with pedigree 0.654, pedigree (1,4,3,1,1)
  (same comment as for Antimony ion)
- Chlorpyrifos [air, non-urban air or from high stacks]: 1.8018e-6 kg; lognormal variance with pedigree 0.044, pedigree (1,4,3,1,1)
  Mass of active ingredient chlorpyrifos applied x fraction released in air - Primary partitioning from PESTLCI |) divided by kg yield per ha
- Chromium VI [air, non-urban air or from high stacks]: 1.53153e-8 kg; lognormal variance with pedigree 0.654, pedigree (1,4,3,1,1)
  (same comment as for Antimony ion)
- Clethodim [air, non-urban air or from high stacks]: 5.40541e-7 kg; lognormal variance with pedigree 0.044, pedigree (1,4,3,1,1)
  Mass of active ingredient clethodim applied x fraction released in air - Primary partitioning from PESTLCI |) divided by kg yield per ha
- Cobalt II [air, non-urban air or from high stacks]: 5.42342e-9 kg; lognormal variance with pedigree 0.654, pedigree (1,4,3,1,1)
  (same comment as for Antimony ion)
- Copper ion [air, non-urban air or from high stacks]: 1.08108e-8 kg; lognormal variance with pedigree 0.654, pedigree (1,4,3,1,1)
  (same comment as for Antimony ion)
- Diflufenican [air, non-urban air or from high stacks]: 4.5045e-7 kg; lognormal variance with pedigree 0.044, pedigree (1,4,3,1,1)
  Mass of active ingredient diflufenican applied x fraction released in air - Primary partitioning from PESTLCI |) divided by kg yield per ha
- Dinitrogen monoxide [air, non-urban air or from high stacks]: 0.000391568 kg; lognormal variance with pedigree 0.034, pedigree (1,4,3,1,1)
  0.00E+00 units --- Emissions from Mineralisation of N is loss of soil organic matter |plus| 2.99E-05 units --- Direct emissions from fertilizers, Nitrous oxide emissions - Nitrogen applied x Emission factor x Conversion factor |plus| 2.99E-06 units --- Indirect emissions from fertilizers, Nitrous oxide emissions - Nitrogen applied x Fraction of nitrogen volatilized x Emission factor x Conversion factor |plus| 1.19E-05 units --- Fertilizers leaching, Nitrous oxide emissions - Nitrogen applied x fraction of nitrogen available for leaching x fraction of nitrogen leaching x emission factor x conversion factor |plus| 3.41E-04 units --- Emissions from residues - (Yield x Quantity of plant residue x Dry matter content x Nitrogen content x (1-Fraction of residues burnt - Fraction of residues removed) + (Yield x Quantity of plant residue x Residue ratio above/below ground x Dry matter content x Nitrogen content below ground)) x Emission factor x Conversion factor |plus| 6.23E-06 units --- Emissions from burning residues - Yield x Quantity of plant residue x Fraction of residues remaining at time of burning x Fry matter content x Burning efficiency x Nitrogen content above ground x N2O emission factor x Conversion factor |) divided by kg yield per ha
- Lead II [air, non-urban air or from high stacks]: 2.51351e-8 kg; lognormal variance with pedigree 0.654, pedigree (1,4,3,1,1)
  (same comment as for Antimony ion)
- Manganese II [air, non-urban air or from high stacks]: 6.1982e-8 kg; lognormal variance with pedigree 0.654, pedigree (1,4,3,1,1)
  (same comment as for Antimony ion)
- Mercury II [air, non-urban air or from high stacks]: 6.43243e-9 kg; lognormal variance with pedigree 0.654, pedigree (1,4,3,1,1)
  (same comment as for Antimony ion)
- Methane, from soil or biomass stock [air, non-urban air or from high stacks]: 0.000108108 kg; lognormal variance with pedigree 0.012, pedigree (1,4,3,1,1)
  Emissions from burning residues - Yield x Quantity of plant residue x Fraction of residues remaining at time of burning x Fry matter content x Burning efficiency x Carbon content x CH4 emission factor x Conversion factor |) divided by kg yield per ha
- NMVOC, non-methane volatile organic compounds [air, non-urban air or from high stacks]: 0.000245946 kg; lognormal variance with pedigree 5.004, pedigree (1,4,3,1,1)
  Emissions from burning residues - Yield x Quantity of plant residue x Fraction of residues remaining at time of burning x Fry matter content x Burning efficiency x Carbon content x NMVOC emission factor x Conversion factor |) divided by kg yield per ha
- Nickel II [air, non-urban air or from high stacks]: 8.86486e-9 kg; lognormal variance with pedigree 0.654, pedigree (1,4,3,1,1)
  (same comment as for Antimony ion)
- Nitrogen [air, non-urban air or from high stacks]: 0.00227027 kg; lognormal variance with pedigree 0.044, pedigree (1,4,3,1,1)
  Amount calculated from APSIM https://www.apsim.info/ runs for full rotation in region and divided by kg yield per ha.
- Nitrogen oxides [air, non-urban air or from high stacks]: 0.000488288 kg; lognormal variance with pedigree 0.034, pedigree (1,4,3,1,1)
  3.60E-04 units --- Emissions from burning residues - Yield x Quantity of plant residue x Fraction of residues remaining at time of burning x Fry matter content x Burning efficiency x Nitrogen content above ground x NOx emission factor x Conversion factor |plus| 1.28E-04 units --- emissions from burning residues = yield x quantity of plant residue x fraction of residues remaining at time of burning x dry matter content x burning efficiency x fraction burnt* emission factor from NPI workbook/1000. (pg 13 Environment Australia, Aggregated Emmissions from Prescribed burning and Wildfires.1999) |) divided by kg yield per ha
- Paraquat [air, non-urban air or from high stacks]: 3.37838e-6 kg; lognormal variance with pedigree 0.044, pedigree (1,4,3,1,1)
  Mass of active ingredient paraquat applied x fraction released in air - Primary partitioning from PESTLCI |) divided by kg yield per ha
- Particulate Matter, > 2.5 um and < 10um [air, non-urban air or from high stacks]: 0.000492793 kg; lognormal variance with pedigree 0.304, pedigree (1,4,3,1,1)
  (same comment as for Antimony ion)
- Quizalofop-p-ethyl [air, unspecified]: 2.69369e-10 kg; lognormal variance with pedigree 0.044, pedigree (1,4,3,1,1)
  Mass of active ingredient quizalofop-P-ethyl applied x fraction released in air - Primary partitioning from PESTLCI |) divided by kg yield per ha
- Selenium IV [air, non-urban air or from high stacks]: 2.45946e-9 kg; lognormal variance with pedigree 0.654, pedigree (1,4,3,1,1)
  (same comment as for Antimony ion)
- Triclopyr [air, non-urban air or from high stacks]: 5.40541e-7 kg; lognormal variance with pedigree 0.044, pedigree (1,4,3,1,1)
  Mass of active ingredient triclopyr applied x fraction released in air - Primary partitioning from PESTLCI |) divided by kg yield per ha
- Trifluralin [air, non-urban air or from high stacks]: 3.45946e-6 kg; lognormal variance with pedigree 0.044, pedigree (1,4,3,1,1)
  Mass of active ingredient trifluralin applied x fraction released in air - Primary partitioning from PESTLCI |) divided by kg yield per ha
- Zinc II [air, non-urban air or from high stacks]: 4.13514e-8 kg; lognormal variance with pedigree 0.654, pedigree (1,4,3,1,1)
  (same comment as for Antimony ion)
- 2,4-D [soil, agricultural]: 0.000835225 kg; lognormal variance with pedigree 0.037, pedigree (1,4,3,1,1)
  7.78E-04 units --- Mass of active ingredient 2,4-D applied x fraction released off field and redeposited to other agricultural land and fraction reaching soil - Primary partitioning from PestLCI |plus| 5.68E-05 units --- Mass of active ingredient 2,4-D applied x fraction released off field and redeposited to natural land - Primary partitioning from PestLCI |) divided by kg yield per ha
- Alpha-cypermethrin [soil, agricultural]: 2.66847e-5 kg; lognormal variance with pedigree 0.037, pedigree (1,4,3,1,1)
  2.49E-05 units --- Mass of active ingredient alpha-cypermethrin applied x fraction released off field and redeposited to other agricultural land and fraction reaching soil - Primary partitioning from PestLCI |plus| 1.82E-06 units --- Mass of active ingredient alpha-cypermethrin applied x fraction released off field and redeposited to natural land - Primary partitioning from PestLCI |) divided by kg yield per ha
- Atrazine [soil, agricultural]: 0.000881622 kg; lognormal variance with pedigree 0.037, pedigree (1,4,3,1,1)
  8.22E-04 units --- Mass of active ingredient atrazine applied x fraction released off field and redeposited to other agricultural land and fraction reaching soil - Primary partitioning from PestLCI |plus| 6.00E-05 units --- Mass of active ingredient atrazine applied x fraction released off field and redeposited to natural land - Primary partitioning from PestLCI |) divided by kg yield per ha
- Cadmium II [soil, agricultural]: 1.77477e-7 kg; lognormal variance with pedigree 0.044, pedigree (1,4,3,1,1)
  Mass of Cadmium contained in fertilizer x Fraction released in soil |) divided by kg yield per ha
- Chlorpyrifos [soil, agricultural]: 0.000177928 kg; lognormal variance with pedigree 0.037, pedigree (1,4,3,1,1)
  1.66E-04 units --- Mass of active ingredient chlorpyrifos applied x fraction released off field and redeposited to other agricultural land and fraction reaching soil - Primary partitioning from PestLCI |plus| 1.22E-05 units --- Mass of active ingredient chlorpyrifos applied x fraction released off field and redeposited to natural land - Primary partitioning from PestLCI |) divided by kg yield per ha
- Clethodim [soil, agricultural]: 5.34595e-5 kg; lognormal variance with pedigree 0.037, pedigree (1,4,3,1,1)
  4.98E-05 units --- Mass of active ingredient clethodim applied x fraction released off field and redeposited to other agricultural land and fraction reaching soil - Primary partitioning from PestLCI |plus| 3.64E-06 units --- Mass of active ingredient clethodim applied x fraction released off field and redeposited to natural land - Primary partitioning from PestLCI |) divided by kg yield per ha
- Diflufenican [soil, agricultural]: 4.45405e-5 kg; lognormal variance with pedigree 0.037, pedigree (1,4,3,1,1)
  4.15E-05 units --- Mass of active ingredient diflufenican applied x fraction released off field and redeposited to other agricultural land and fraction reaching soil - Primary partitioning from PestLCI |plus| 3.01E-06 units --- Mass of active ingredient diflufenican applied x fraction released off field and redeposited to natural land - Primary partitioning from PestLCI |) divided by kg yield per ha
- Glyphosate [soil, agricultural]: 0.00126486 kg; lognormal variance with pedigree 0.0376, pedigree (3,3,3,1,1)
  (same comment as for glyphosate)
- Lead II [soil, agricultural]: 1.15315e-7 kg; lognormal variance with pedigree 0.044, pedigree (1,4,3,1,1)
  Mass of Lead contained in fertilizer x Fraction released in soil |) divided by kg yield per ha
- Mercury II [soil, agricultural]: 4.13514e-10 kg; lognormal variance with pedigree 0.044, pedigree (1,4,3,1,1)
  Mass of Mercury contained in fertilizer x Fraction released in soil |) divided by kg yield per ha
- Paraquat [soil, agricultural]: 0.000334414 kg; lognormal variance with pedigree 0.037, pedigree (1,4,3,1,1)
  3.12E-04 units --- Mass of active ingredient paraquat applied x fraction released off field and redeposited to other agricultural land and fraction reaching soil - Primary partitioning from PestLCI |plus| 2.27E-05 units --- Mass of active ingredient paraquat applied x fraction released off field and redeposited to natural land - Primary partitioning from PestLCI |) divided by kg yield per ha
- Quizalofop-p-ethyl [soil, agricultural]: 2.65856e-8 kg; lognormal variance with pedigree 0.037, pedigree (1,4,3,1,1)
  2.48E-08 units --- Mass of active ingredient quizalofop-P-ethyl applied x fraction released off field and redeposited to other agricultural land and fraction reaching soil - Primary partitioning from PestLCI |plus| 1.81E-09 units --- Mass of active ingredient quizalofop-P-ethyl applied x fraction released off field and redeposited to natural land - Primary partitioning from PestLCI |) divided by kg yield per ha
- Triclopyr [soil, agricultural]: 5.34595e-5 kg; lognormal variance with pedigree 0.037, pedigree (1,4,3,1,1)
  4.98E-05 units --- Mass of active ingredient triclopyr applied x fraction released off field and redeposited to other agricultural land and fraction reaching soil - Primary partitioning from PestLCI |plus| 3.64E-06 units --- Mass of active ingredient triclopyr applied x fraction released off field and redeposited to natural land - Primary partitioning from PestLCI |) divided by kg yield per ha
- Trifluralin [soil, agricultural]: 0.000342162 kg; lognormal variance with pedigree 0.037, pedigree (1,4,3,1,1)
  3.19E-04 units --- Mass of active ingredient trifluralin applied x fraction released off field and redeposited to other agricultural land and fraction reaching soil - Primary partitioning from PestLCI |plus| 2.32E-05 units --- Mass of active ingredient trifluralin applied x fraction released off field and redeposited to natural land - Primary partitioning from PestLCI |) divided by kg yield per ha
- 2,4-D [water, surface water]: 1.05405e-6 kg; lognormal variance with pedigree 0.044, pedigree (1,4,3,1,1)
  1.05E-06 units --- Mass of active ingredient 2,4-D applied x fraction released off field and redeposited to freshwater - Primary partitioning from PestLCI |plus| 0.00E+00 units --- Mass of active ingredient 2,4-D applied x fraction released off field and redeposited to freshwater - Primary partitioning from PestLCI |) divided by kg yield per ha
- Alpha-cypermethrin [water, surface water]: 3.36036e-8 kg; lognormal variance with pedigree 0.044, pedigree (1,4,3,1,1)
  3.36E-08 units --- Mass of active ingredient alpha-cypermethrin applied x fraction released off field and redeposited to freshwater - Primary partitioning from PestLCI |plus| 0.00E+00 units --- Mass of active ingredient alpha-cypermethrin applied x fraction released off field and redeposited to freshwater - Primary partitioning from PestLCI |) divided by kg yield per ha
- Atrazine [water, surface water]: 1.10811e-6 kg; lognormal variance with pedigree 0.044, pedigree (1,4,3,1,1)
  1.11E-06 units --- Mass of active ingredient atrazine applied x fraction released off field and redeposited to freshwater - Primary partitioning from PestLCI |plus| 0.00E+00 units --- Mass of active ingredient atrazine applied x fraction released off field and redeposited to freshwater - Primary partitioning from PestLCI |) divided by kg yield per ha
- Chlorpyrifos [water, surface water]: 2.24324e-7 kg; lognormal variance with pedigree 0.044, pedigree (1,4,3,1,1)
  2.24E-07 units --- Mass of active ingredient chlorpyrifos applied x fraction released off field and redeposited to freshwater - Primary partitioning from PestLCI |plus| 0.00E+00 units --- Mass of active ingredient chlorpyrifos applied x fraction released off field and redeposited to freshwater - Primary partitioning from PestLCI |) divided by kg yield per ha
- Clethodim [water, surface water]: 6.72072e-8 kg; lognormal variance with pedigree 0.044, pedigree (1,4,3,1,1)
  6.72E-08 units --- Mass of active ingredient clethodim applied x fraction released off field and redeposited to freshwater - Primary partitioning from PestLCI |plus| 0.00E+00 units --- Mass of active ingredient clethodim applied x fraction released off field and redeposited to freshwater - Primary partitioning from PestLCI |) divided by kg yield per ha
- Diflufenican [water, surface water]: 5.55856e-8 kg; lognormal variance with pedigree 0.044, pedigree (1,4,3,1,1)
  5.56E-08 units --- Mass of active ingredient diflufenican applied x fraction released off field and redeposited to freshwater - Primary partitioning from PestLCI |plus| 0.00E+00 units --- Mass of active ingredient diflufenican applied x fraction released off field and redeposited to freshwater - Primary partitioning from PestLCI |) divided by kg yield per ha
- Nitrate [water, ground-]: 0.00442342 kg; lognormal variance with pedigree 0.044, pedigree (1,4,3,1,1)
  Fertilizers leaching, Nitrous oxide emissions - Nitrogen applied x fraction of nitrogen available for leaching x fraction of nitrogen leaching from NIR x (1-nitrogen reemitted to air) x conversion factor divided by kg yield per ha
- Paraquat [water, surface water]: 4.20721e-7 kg; lognormal variance with pedigree 0.044, pedigree (1,4,3,1,1)
  4.21E-07 units --- Mass of active ingredient paraquat applied x fraction released off field and redeposited to freshwater - Primary partitioning from PestLCI |plus| 0.00E+00 units --- Mass of active ingredient paraquat applied x fraction released off field and redeposited to freshwater - Primary partitioning from PestLCI |) divided by kg yield per ha
- Phosphate [water, ground-]: 2.25e-5 kg; lognormal variance with pedigree 0.044, pedigree (1,4,3,1,1)
  2.25E-05 kg - Phosphorus leaching to ground water 0.07kg P per ha.a as phosphate PO4 - Ecoinvent report on agriculture divided by kg yield per ha
- Phosphate [water, surface water]: 1.97e-5 kg; lognormal variance with pedigree 0.044, pedigree (1,4,3,1,1)
  1.97E-05 kg - P run-off to surface waters - Ecoinvent report on agriculture divided by kg yield per ha
- Phosphorus [water, surface water]: 3.17117e-6 kg; lognormal variance with pedigree 0.044, pedigree (1,4,3,1,1)
  P emissions through erosion by water to surface waters ecoinvent report on agriculture |) divided by kg yield per ha
- Quizalofop-p-ethyl [water, surface water]: 3.34234e-11 kg; lognormal variance with pedigree 0.044, pedigree (1,4,3,1,1)
  3.34E-11 units --- Mass of active ingredient quizalofop-P-ethyl applied x fraction released off field and redeposited to freshwater - Primary partitioning from PestLCI |plus| 0.00E+00 units --- Mass of active ingredient quizalofop-P-ethyl applied x fraction released off field and redeposited to freshwater - Primary partitioning from PestLCI |) divided by kg yield per ha
- Triclopyr [water, surface water]: 6.72072e-8 kg; lognormal variance with pedigree 0.044, pedigree (1,4,3,1,1)
  6.72E-08 units --- Mass of active ingredient triclopyr applied x fraction released off field and redeposited to freshwater - Primary partitioning from PestLCI |plus| 0.00E+00 units --- Mass of active ingredient triclopyr applied x fraction released off field and redeposited to freshwater - Primary partitioning from PestLCI |) divided by kg yield per ha
- Trifluralin [water, surface water]: 4.30631e-7 kg; lognormal variance with pedigree 0.044, pedigree (1,4,3,1,1)
  4.31E-07 units --- Mass of active ingredient trifluralin applied x fraction released off field and redeposited to freshwater - Primary partitioning from PestLCI |plus| 0.00E+00 units --- Mass of active ingredient trifluralin applied x fraction released off field and redeposited to freshwater - Primary partitioning from PestLCI |) divided by kg yield per ha

## Sampling procedure
Face-to-face interviews with regional experts
