# polystyrene production, extruded, HFC-134a blown

Dataset: EcoSpold 2, unit process
Geography: CA-QC
Time period: 1994-01-01 to 2023-12-31
Technology level: current
Classification: ISIC rev.4 ecoinvent: 2013:Manufacture of plastics and synthetic rubber in primary forms
Classification: EcoSpold01Categories: insulation materials/production
Synonyms: XPS
Tags: recontextualization
Scenario: Business-as-Usual
System model: Allocation, cut-off by classification
Generated by: Pascal Lesage
Published in: Hischier, R. 2009
Database: ecoinvent
isCopyrightProtected: true
accessRestrictedTo: 1

## General comment
This dataset can be used in the construction building sector. The cutting of the extruded polystyrene blocks is not included in the process. Blowing agent is HFC-134a. Process emissions are 20% (w/w)
[This dataset was already contained in the ecoinvent database version 2. It was not individually updated during the transfer to ecoinvent version 3. Life Cycle Impact Assessment results may still have changed, as they are affected by changes in the supply chain, i.e. in other datasets. This dataset was generated following the ecoinvent quality guidelines for version 2. It may have been subject to central changes described in the ecoinvent version 3 change report (http://www.ecoinvent.org/database/ecoinvent-version-3/reports-of-changes/), and the results of the central updates were reviewed extensively. The changes added e.g. consistent water flows and other information throughout the database. The documentation of this dataset can be found in the ecoinvent reports of version 2, which are still available via the ecoinvent website. The change report linked above covers all central changes that were made during the conversion process.]
Child dataset exchanges identical to GLO dataset. Created to enable linking to regional markets (e.g. for electricity). Data quality indicators adjusted accordingly.

## Included activities end
The dataset describes the production of extruded polystyrene. Included processes are the melting of polystyrene pearls in the extruder, the discharge through a slot die, as well as the cooling with water.

## Geography
Data for leading polystyrene XPS producers in Germany and the USA. Applicable for Europe and North America.
Child dataset exchanges identical to GLO dataset. Created to enable linking to regional markets (e.g. for electricity). Data quality indicators adjusted accordingly.

## Technology
Extrusion process of expandable polystyrene including discharge via slot die. HCF-134a as blowing agents.

## Time period
Technology in 1994 was still using CFC or HCFC as blowing agent. In 2005, already more than 50% of companies in Europe are using CO2 as blowing agent. Though mainly in the USA, HFC-134a and HFC-152a as a blowing agent are still common.

## Parameters
- Quebec gross domestic product 2011: 3.11e11 USD(2011); name quebecGDP2011; lognormal variance with pedigree 0.0006, pedigree (1,1,1,1,1)
  Quebec Gross domestic product for 2011, expressed in 2011 USD. Source: Institut de la statistique du Québec. Converted from CAD to USD using a yearly average exchange rate of 0.989 CAD/USD (Source: bank of Canada).
- fraction, cooling water, cooling pond system, to air: 0.032 dimensionless; lognormal variance with pedigree 0.0413, pedigree (2,3,1,3,1)
- fraction, cooling water, once-through system, to air: 0.004 dimensionless; lognormal variance with pedigree 0.0413, pedigree (2,3,1,3,1)
- fraction, cooling water, recirculating system, to air: 0.771 dimensionless; lognormal variance with pedigree 0.0413, pedigree (2,3,1,3,1)
- fraction, cooling water, to air: 0.3875 dimensionless; lognormal variance with pedigree 0.092025, pedigree (4,4,3,2,4)
- world gross domestic product 2011: 7e13 USD(2011); name worldGDP2011; lognormal variance with pedigree 0.0006, pedigree (1,1,1,1,1)
  World Gross domestic product for 2011, expressed in 2011 USD. Source: World Bank.

## Reference product
- polystyrene, extruded: 1 kg; By-product classification allocatable product; CPC 34720: Polymers of styrene, in primary forms; HS2017 390311: Styrene polymers; expansible polystyrene, in primary forms; CAS 9003-53-6
  production volume 2.15923e6 kg
    Gross approximation of Quebec production volume using relative value of Quebec GDP to world GDP
  property carbon content, fossil 0.852731
    XPS consists in 91% of polystyrene, 7% of blowing agent and the re-maining 2% are flame retardants (bromine compounds) and other additives (ecoinvent v2.2 report 16, part XIV). The chemical formula of polystyrene is (C8H8)n. Here, the blowing agent is HFC-134a (1,1,1,2-Tetrafluoroethane: C2H2F4). HFC-134a emissions are 20% (Tab 4.22, ecoinvent v2.2 report 16, part XIV), that means that HFC-134a contributes 5.6% to the C content of the final product.
  property price 1.29 EUR2005
    Estimated price to be the same as polystyrene, general purpose.
  properties: carbon allocation 0.852731 kg, carbon content 0.852731, carbon content, non-fossil 0, dry mass 1 kg, heating value, net 38.67 MJ, water content 0, water in wet mass 0 kg, wet mass 1 kg

## Inputs from technosphere
- chemical, inorganic: 0.01 kg; lognormal variance with pedigree 0.0546, pedigree (2,4,5,5,1)
  properties: carbon content, fossil 0.003, dry mass 1 kg, wet mass 1 kg
  note on carbon content, fossil: XPS consists in 91% of polystyrene, 7% of blowing agent and the re-maining 2% are flame retardants (bromine compounds) and other additives (ecoinvent v2.2 report 16, part XIV). The chemical formula of polystyrene is (C8H8)n. Here, the blowing agent is HFC-134a (1,1,1,2-Tetrafluoroethane: C2H2F4). HFC-134a emissions are 20% (Tab 4.22, ecoinvent v2.2 report 16, part XIV), that means that HFC-134a contributes 5.6% to the C content of the final product. This dataset is an unweighted average of 20 inorganic substances (listed in Tab 88.1, ecoinvent v2.2 report 8, part II), being part of the top100 chemicals included in this database. The C-content has also been calculated as an unweighted average of the C content of the substances composing this dataset.
- electricity, medium voltage: 1 kWh; lognormal variance with pedigree 0.0546, pedigree (2,4,5,5,1)
- explosives factory: 6.67e-9 unit; lognormal variance with pedigree 0.35, pedigree (5,5,5,5,5)
- fluorspar, 97% purity: 0.005 kg; lognormal variance with pedigree 0.056, pedigree (3,4,5,5,1)
  properties: dry mass 1 kg, wet mass 1 kg
- polystyrene, expandable: 0.92409 kg; lognormal variance with pedigree 0.0546, pedigree (2,4,5,5,1)
  properties: carbon content, fossil 0.923077, dry mass 1 kg, heating value, net 38.67 MJ, wet mass 1 kg
  note on carbon content, fossil: XPS consists in 91% of polystyrene, 7% of blowing agent and the re-maining 2% are flame retardants (bromine compounds) and other additives (ecoinvent v2.2 report 16, part XIV). The chemical formula of polystyrene is (C8H8)n. Here, the blowing agent is HFC-134a (1,1,1,2-Tetrafluoroethane: C2H2F4). HFC-134a emissions are 20% (Tab 4.22, ecoinvent v2.2 report 16, part XIV), that means that HFC-134a contributes 5.6% to the C content of the final product. Chemical formula of polystyrene is (C8H8)n (ecoinvent v2.2 report 11_II)
- refrigerant R134a: 0.07 kg; lognormal variance with pedigree 0.0612, pedigree (2,3,5,5,3)
  properties: carbon content, fossil 0.235294, dry mass 1 kg, heating value, net 9.51 MJ, wet mass 1 kg
  note on carbon content, fossil: XPS consists in 91% of polystyrene, 7% of blowing agent and the re-maining 2% are flame retardants (bromine compounds) and other additives (ecoinvent v2.2 report 16, part XIV). The chemical formula of polystyrene is (C8H8)n. Here, the blowing agent is HFC-134a (1,1,1,2-Tetrafluoroethane: C2H2F4). HFC-134a emissions are 20% (Tab 4.22, ecoinvent v2.2 report 16, part XIV), that means that HFC-134a contributes 5.6% to the C content of the final product. C2H2F4
- sodium chloride, powder: 0.005 kg; lognormal variance with pedigree 0.056, pedigree (3,4,5,5,1)
  properties: dry mass 1 kg, wet mass 1 kg
- waste polystyrene: -0.0001 kg; lognormal variance with pedigree 0.0146, pedigree (2,4,1,5,1)
  production volume
    (same comment as for polystyrene, extruded)
  properties: carbon content, fossil 0.922579, dry mass 0.998 kg, heating value, net 38.67 MJ, water content 0.00200401, wet mass 1 kg
  note on carbon content, fossil: XPS consists in 91% of polystyrene, 7% of blowing agent and the re-maining 2% are flame retardants (bromine compounds) and other additives (ecoinvent v2.2 report 16, part XIV). The chemical formula of polystyrene is (C8H8)n. Here, the blowing agent is HFC-134a (1,1,1,2-Tetrafluoroethane: C2H2F4). HFC-134a emissions are 20% (Tab 4.22, ecoinvent v2.2 report 16, part XIV), that means that HFC-134a contributes 5.6% to the C content of the final product. Chemical formula for polystyrene is (C8H8)n
  note on heating value, net: Value taken from the general comment of the treatment dataset.

## Inputs from nature
- Water, cooling, unspecified natural origin [natural resource, in water]: 0.0197 m3; lognormal variance with pedigree 0.056, pedigree (3,4,5,5,1)

## Emissions to nature
- 1,1,1,2-Tetrafluoroethane [air, non-urban air or from high stacks]: 0.014 kg; lognormal variance with pedigree 0.0432, pedigree (2,3,5,5,1)
- Styrene [air, unspecified]: 9.2409e-5 kg; lognormal variance with pedigree 0.096, pedigree (3,4,5,5,1)
- Water [air, unspecified]: 0.00763375 m3; lognormal variance with pedigree 0.0827, pedigree (2,2,5,5,1)
  Calculated value based on literature values and expert opinion. See comments in the parametres" comment field.
- Water [water, unspecified]: 0.0120663 m3; lognormal variance with pedigree 0.0827, pedigree (2,2,5,5,1)
  (same comment as for Water)
  property carbon content, fossil 0; name C_content_fossil
  property carbon content, non-fossil 0; name C_content_non_fossil
  property dry mass 0 kg; name DM
  property water in wet mass 1000 kg; name WWM
  property wet mass 1000 kg; name WM

## Sampling procedure
Literature, database

## Extrapolations
see Geography. GLO dataset extrapolated from European dataset, which in turn was used to create this child dataset. Exchanges identical to GLO dataset. Created to enable linking to regional markets (e.g. for electricity). Data quality indicators adjusted accordingly.
