# propylene production, from methanol-to-propylene conversion

Dataset: EcoSpold 2, unit process
Geography: CN
Time period: 2020-01-01 to 2023-12-31
Technology level: current
Classification: ISIC rev.4 ecoinvent: 2011:Manufacture of basic chemicals
Scenario: Business-as-Usual
System model: Allocation, cut-off by classification
Generated by: Iasonas Ioannou
Published in: Daniel F. Rodríguez-Vallejo 2020
Database: ecoinvent
isCopyrightProtected: true
accessRestrictedTo: 1

## General comment
This dataset represents the production of propylene via Lurgi's methanol-to-propylene (MTP) process. Namely, this dataset covers the production of 1.00 kg of propylene as reference product, while gasoline (i.e., as C5-C10 hydrocarbons) and ethylene are also co-produced (1.08 and 0.08 kg, respectively) as by-products. This inventory is represented with an excess of electricity as valuable output due to the modularity of the auxiliary services used. Overall, the production of propylene from methanol is a net consumer of electricity. The process includes, feedstock, materials, energy and registers all relevant direct emissions.
Light olefins are crucial building blocks for the chemicals and plastics sector and are predominantly generated through steam cracking of hydrocarbons. The annual production volume of ethylene and propylene are extremely high and constitutes them as the most highly produced petrochemicals. The high production volume of light olefins is driven by a high demand, which in 2007 amounted to 115 and 73 Mt for ethylene and propylene, respectively.
Notably, methanol may be used to cover part of the ethylene and propylene demand. Besides, such pathway may be appealing to decouple the production of light olefins from the petroleum feedstocks, e.g., naphtha.
In this dataset, Lurgi's MTP process is described, which represents the most efficient scheme for maximizing the production of propylene, and for retaining a low coking tendency, while maintaining a very low propane and by-products yield. In this technology, propylene is produced in two steps, where methanol is first converted to dimethyl ether (at almost equilibrium mixture), and subsequently converted to propylene using a ZSM-5 catalyst (zeolite-based) in a fixed-bed reactor. A typical MTP plant may produce, along with propylene, MTP-gasoline, MTP-liquefied petroleum gas (LPG), and small quantities of ethylene.
References:
Olah, G.A. (2005), Beyond Oil and Gas: The Methanol Economy. Angewandte Chemie International Edition, 44: 2636-2639. https://doi.org/10.1002/anie.200462121
Bertau, M., Offermanns, H., Plass, L., Schmidt, F., & Wernicke, H. J. (Eds.). (2014). Methanol: the basic chemical and energy feedstock of the future (Vol. 1). Heidelberg: Springer.

## Included activities start
The activity starts with the raw materials entering the methano-to-propylene facility.

## Included activities end
The activity ends with the final products being ready for further processing or transportation at the production site gate. The dataset includes the consumption of raw materials and energy, estimated catalyst use, emissions to air and water from the process, as well as the infrastructure use.

## Geography
This inventory is modelled for China, where the coal-to- and methanol-to-propylene technology is an important technological pathway to produce propylene.
According to Lv et al (2021), in 2019, 24% of propylene produced in China was supplied from methanol conversion plants.
This activity originates from literature data, based on robust process simulation, for the conversion of methanol to propylene (MTP). Since the specific technology is modelled, the inventory is not linked to any specific geographical region. The material and energy inputs reflect well the production technology and are, therefore, considered to be valid for the chosen geography.
References:
Daniel F. Rodríguez-Vallejo, Gonzalo Guillén-Gosálbez, and Benoît Chachuat ACS Sustainable Chemistry & Engineering 2020 8 (8), 3072-3081 DOI: 10.1021/acssuschemeng.9b05516
2021, Lin Lv, Guobao Song, Xinyue Zhao, Jingwen Chen, Environmental Burdens of China’s Propylene manufacturing: Comparative life-cycle assessment and scenario analysis, Science of the Total Environment, 799
https://www.woodmac.com/news/can-chinas-cto-and-mto-industries-survive-the-threat-of-massive-steam-cracker-investment/, assessed in 2023-10-09.

## Technology
In this dataset, the catalytic conversion of methanol to propylene is based on the work by Rodríguez-Vallejo et al. (2020). First, the methanol feedstock, before being fed into the dimethyl ether (DME) synthesis reactor, is pumped, and heated to the expected operating conditions. Namely, the reaction takes place at 300°C and 1.65 bar, attaining a 90% methanol equilibrium conversion that resembles typical industrial yields and conditions.
Subsequently, the reactor outlet, consisting of a DME and methanol mixture, is fed into the methanol-to-propylene (MTP) reactor, filled with a ZSM-5 catalyst. In the reactor, the mixture is converted mainly to olefins, such as (1) ethylene; (2) propylene; (3) C4 olefins, (4) C5 olefins; and (v) higher hydrocarbons, ranging from C6 to C10 (such as hexene(s), heptane(s), octenes, nonene(s), and decene(s)).
The MTP reactor operates at 425°C and 1.65 bar, that ensures the high methanol/DME conversion to propylene, while the overall reaction scheme is exothermic. The released heat from the latter exothermic reactor is used in a Rankine cycle to generate electricity, which is consumed internally. Any excess of generated electricity is considered as a valuable by-product.
The MTP reactor outlet is then cooled to 40°C, where an aqueous and organic phase is generated, and fed into a flash unit to remove the aqueous phase. The gaseous organic phase is pressurized in a three-stage compression train, with intermediate cooling, at 28.2 bar. The compressed stream is fed into a distillation column where a mixture of C4-C10 hydrocarbons is obtained at the bottom. The top stream consists of ethylene, propylene, and water, and thus, water is removed with a second flash unit prior to the purification and separation of ethylene-propylene. The water-free stream is, finally, fed into a second distillation column where polymer-grade ethylene and propylene are obtained at the top and bottom, respectively. The condenser of the second distillation unit operates at temperatures below ambient (ca. -21°C) and thus, a cooling cycle with a R134a working fluid was considered.
References:
Daniel F. Rodríguez-Vallejo, Gonzalo Guillén-Gosálbez, and Benoît Chachuat ACS Sustainable Chemistry & Engineering 2020 8 (8), 3072-3081 DOI: 10.1021/acssuschemeng.9b05516
Olah, G.A. (2005), Beyond Oil and Gas: The Methanol Economy. Angewandte Chemie International Edition, 44: 2636-2639. https://doi.org/10.1002/anie.200462121
Bertau, M., Offermanns, H., Plass, L., Schmidt, F., & Wernicke, H. J. (Eds.). (2014). Methanol: the basic chemical and energy feedstock of the future (Vol. 1). Heidelberg: Springer.

## Time period
This activity originates from literature data, for conversion of methanol to propylene (MTP) published in 2020 The material and energy inputs reflect well the production technology and not expected to change significantly over the next 5 years.
References:
Daniel F. Rodríguez-Vallejo, Gonzalo Guillén-Gosálbez, and Benoît Chachuat ACS Sustainable Chemistry & Engineering 2020 8 (8), 3072-3081 DOI: 10.1021/acssuschemeng.9b05516

## Parameters
- fraction of cooling water which evaporates to air, once-through cooling system: 0.04 dimensionless; name fraction_CW_OT_to_air

## Reference product
- propylene: 1 kg; name RP_Propylene; By-product classification allocatable product; CPC 33421: Ethylene, propylene, butylene, butadiene; HS2017 290122: Acyclic hydrocarbons; unsaturated, propene (propylene); CAS 115-07-1
  production volume 1.63e9 kg; name RP_PV; = 1.63*1e9
    According to Lv et al (2021), the installed capacity for propylene in 2019 in China was 3.79E10 kg. According to the same publication, 24% of propylene in China are produced from methanol.
    According to Wood Mackenzie, in 2019, the installed capcaity of ethylene from CTO/MTO units reached 5.21E+09 kg, accounting for 21% of China’s total ethylene capacity.
    The latter information was used to identify the production volume of the following activites available in the ecoinvent Database (since v3.10);
    1) light olefins production, from methanol-to-olefins conversion, ethylene-to-propylene ratio of 0.67
    2) light olefins production, from methanol-to-olefins conversion, ethylene-to-propylene ratio of 1.51
    3) propylene production, from methanol-to-propylene conversion
    An average capacity factor of 81% was assumed.
    Reference:
    Lv, L.; Song, G.; Zhao, X.; Chen, J. (2021): Environmental Burdens of China’s Propylene manufacturing: Comparative life-cycle assessment and scenario analysis, Science of the Total Environment, 799, 149451.
    https://www.woodmac.com/news/can-chinas-cto-and-mto-industries-survive-the-threat-of-massive-steam-cracker-investment/, assessed in 2023-10-09.
  property heating value, net 43.22 MJ
    LHV is calculated based on the elemental composition of the substance. Based on the CAS number of the substance (000115-07-1), the chemical formula of the substance is found to be: C3H6, (PubChem 2020).
    Reference: Kim, S., Chen, J., Cheng, T., Gindulyte, A., He, J., He, S., Li, Q., Shoemaker, B. A., Thiessen, P. A., Yu, B., Zaslavsky, L., Zhang, J., & Bolton, E. E. (2019). PubChem 2019 update: improved access to chemical data. Nucleic acids research, 47(D1), D1102–D1109. https://doi.org/10.1093/nar/gky1033
  property price 0.693977 EUR2005
    Calculated value based on data from United Nations Commodity Trade Statistics Database (comtrade.un.org). UN comtrade category: 290122. Propylene. Average price from the year 2015-2019. Average of price of import into 5 main markets (EU, US, MX, CO and CN).
    The prices were converted to EUR based on the annual exchange rates published by the European Central Bank (https://sdw.ecb.europa.eu/quickview.do?SERIES_KEY=120.EXR.A.USD.EUR.SP00.A, last accessed on 2022-02-15) and adjusted for inflation relative to 2005 using the producer price index (PPI) of the euro area, published by eurostat (https://ec.europa.eu/eurostat/databrowser/view/STS_INPP_A__custom_6416181/default/table?lang=en, last accessed on 2022-05-04).
  properties: allocation factor 0.454266, carbon allocation 0.857143 kg, carbon content 0.857143, carbon content, fossil 0.857143, carbon content, non-fossil 0, dry mass 1 kg, true value 0.693977, water content 0, water in wet mass 0 kg, wet mass 1 kg

## Inputs from technosphere
- chemical factory, organics: 3.92486e-10 unit; = (1+0.08+1.08)*4.0e-10; lognormal variance with pedigree 0.3434, pedigree (2,4,2,4,4)
  Calculated based on literature data published by the industry. For this activity, no information was readily available concerning infrastructure and land-use. Therefore, the infrastructure is estimated based on data from two chemical factories, the BASF site of Ludwigshafen and the chemical factory in Gendorf (which are both located in Germany), which produce a wide range of chemical substances. Based on this data, the following assumptions are made: the built area amounts to about 4.2 ha, the plant has an average output of 50'000 t/a and a lifespan of fifty years. The estimated infrastructure amount is therefore 4.00 E-10 units per kg of produced chemical.
- cooling energy, at -25 °C: 0.0266135 MJ; name CryogenicCooling; lognormal variance with pedigree 0.002125, pedigree (2,2,2,2,2)
  Cooling requirements, at temperatures below ambient, for the production of propylene from methanol.
  Calculated value, based on the aggregated cooling energy reported by Rodríguez-Vallejo et al. (2020). Namely, Rodríguez-Vallejo et al. (2020) reported cooling water and cooling below ambient conditions (at -25°C) as an aggregate of 9.49 MJ per kg propylene produced. The cooling energy at below ambient conditions was, here, re-calculated based on the stream table available at the thesis of Rodríguez-Vallejo (2021) and the work requirments reported by Luyben (2019).
  References:
  Rodríguez-Vallejo, Daniel F., Gonzalo Guillén-Gosálbez, and Benoît Chachuat. "What is the true cost of producing propylene from methanol? The role of externalities." ACS Sustainable Chemistry & Engineering 8.8 (2020): 3072-3081.
  Rodriguez Vallejo, Daniel. "Promoting sustainability in chemical process design using process modelling, environmental assessment and decision making." (2021).
  Luyben, William L. "Refrigerant selection for different cryogenic temperatures." Computers & Chemical Engineering 126 (2019): 241-248.
- heat, from steam, in chemical industry: 1.66716 MJ; lognormal variance with pedigree 0.002125, pedigree (2,2,2,2,2)
  Steam requirements for the production of light olefins from methanol.
  Reference:
  Daniel F. Rodríguez-Vallejo, Gonzalo Guillén-Gosálbez, and Benoît Chachuat ACS Sustainable Chemistry & Engineering 2020 8 (8), 3072-3081 DOI: 10.1021/acssuschemeng.9b05516
  properties: heating value, net 1 MJ
- methanol: 1.34372 kg; = 4.93*0.6; lognormal variance with pedigree 0.002125, pedigree (2,2,2,2,2)
  Main raw material for the production of light olefins. According to the operating rates of methanol-to- and coal-to-olefins plants in China, 60% of capacity is covered by coal-based methanol, according to https://infogram.com/methanol_asia_ctotable_october22-1ho16vod7o5yx4n, accessed 15-09-2023. The remaining 40% is covered by the methanol market.
  Reference:
  Lv, L.; Song, G.; Zhao, X.; Chen, J. (2021): Environmental Burdens of China’s Propylene manufacturing: Comparative life-cycle assessment and scenario analysis, Science of the Total Environment, 799, 149451.
  properties: carbon content, fossil 0.375, dry mass 1 kg, heating value, net 20 MJ, wet mass 1 kg
  note on heating value, net: Based on literature, page 533, Report 17: Jungbluth, N., Chudacoff, M., Dauriat, A., Dinkel, F., Doka, G., Faist Emmenegger, M., Gnansounou, E., Kljun, N., Schleiss, K., Spielmann, M., Stettler, C., Sutter, J. 2007: Life Cycle Inventories of Bioenergy. ecoinvent report No. 17, Swiss Centre for Life Cycle Inventories, Dübendorf, CH.
- methanol: 0.895814 kg; = 4.93*(1-0.6); lognormal variance with pedigree 0.002125, pedigree (2,2,2,2,2)
  (same comment as for methanol)
- wastewater, average: -0.00125832 m3; name BP_WW; = 2.77/1000; lognormal variance with pedigree 0.0019, pedigree (2,2,1,1,2)
  Wastewater output, as a result of the conversion of methnaol-to-propylene. "Value reported by Daniel F. Rodríguez-Vallejo, Gonzalo Guillén-Gosálbez, and Benoît Chachuat ACS Sustainable Chemistry & Engineering 2020 8 (8), 3072-3081
  DOI: 10.1021/acssuschemeng.9b05516"
  production volume; = RP_PV * (BP_WW / RP_Propylene)
    Calculated from production volume of reference product using the relative outputs.
  properties: carbon content, non-fossil 0.194039, dry mass 0.346837 kg, mass concentration, TOC 0.1091 kg/m3, mass concentration, calcium 0.039453 kg/m3, mass concentration, chlorine 0.030031 kg/m3, mass concentration, hydrogen 0.013365 kg/m3, mass concentration, nitrogen 0.031015 kg/m3, mass concentration, oxygen 0.069824 kg/m3, mass concentration, sodium 0.06456 kg/m3, mass concentration, sulfur 0.015602 kg/m3, water content 2882.2, wet mass 1000 kg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
  note on carbon content, non-fossil: 0.0673 kg TOC/m3 (Tab A.17, ecoinvent v2.2 report 13_I). TOC was considered as Total Carbon.

## Inputs from nature
- Water, cooling, unspecified natural origin [natural resource, in water]: 0.09309 m3; name CW_IN; = ( ( (9.49 - CryogenicCooling)*1000 ) /(4.184)/(43-32) )/1000; lognormal variance with pedigree 0.002125, pedigree (2,2,2,2,2)
  Calculated value, based on the aggregated cooling energy reported by Rodríguez-Vallejo et al. (2020). Namely, Rodríguez-Vallejo et al. (2020) reported cooling water and cooling below ambient conditions (at -25°C) as an aggregate of 9.49 MJ per kg propylene produced. The cooling energy at below ambient conditions was, here, re-calculated based on the stream table available at the thesis of Rodríguez-Vallejo (2021) and the work by Luyben (2019). Hence, this allows the calculation of the energy removed from cooling water with a given temperature difference, 11°C.
  References:
  Rodríguez-Vallejo, Daniel F., Gonzalo Guillén-Gosálbez, and Benoît Chachuat. "What is the true cost of producing propylene from methanol? The role of externalities." ACS Sustainable Chemistry & Engineering 8.8 (2020): 3072-3081.
  Rodriguez Vallejo, Daniel. "Promoting sustainability in chemical process design using process modelling, environmental assessment and decision making." (2021).
  Luyben, William L. "Refrigerant selection for different cryogenic temperatures." Computers & Chemical Engineering 126 (2019): 241-248.

## Emissions to nature
- Water [air, unspecified]: 0.0037236 m3; = CW_IN*fraction_CW_OT_to_air; lognormal variance with pedigree 0.041525, pedigree (2,2,2,2,2)
  Calculated as a fraction of the input of water. For more details, refer to the mathematical relation and the parameters.
- Water [water, unspecified]: 0.0893664 m3; = CW_IN*(1-fraction_CW_OT_to_air); lognormal variance with pedigree 0.041525, pedigree (2,2,2,2,2)
  (same comment as for Water)

## Sampling procedure
Data obtained from the literature.
References:
Daniel F. Rodríguez-Vallejo, Gonzalo Guillén-Gosálbez, and Benoît Chachuat ACS Sustainable Chemistry & Engineering 2020 8 (8), 3072-3081 DOI: 10.1021/acssuschemeng.9b05516

## Extrapolations
Literature data.
