# iron ore mine operation and beneficiation

Dataset: EcoSpold 2, unit process
Geography: CA-QC
Time period: 2011-01-01 to 2023-12-31
Technology level: current
Classification: ISIC rev.4 ecoinvent: 0710:Mining of iron ores
Classification: EcoSpold01Categories: metals/extraction
Scenario: Business-as-Usual
System model: Allocation, cut-off by classification
Share of production covered: 65 %
Generated by: Catherine Reid
Database: ecoinvent
isCopyrightProtected: true
accessRestrictedTo: 1

## General comment
This dataset represents the production of 1 kg of iron concentrate containing 66.15% of Fe (dry basis) in Quebec in 2011. The concentrate is produced at 4% humidity.
Specific data were collected for one compagny which represents nearly 65% of the Québec's production for the year 2011.
The iron ore is extracted in two open pit mine; the main pit, where 92% of the ore is extracted, is located on the same site as the concentrator and the extra pit, used only when needed, is located 60 km from the concentrator. The ore is then transported by train.
65% of the 2011 production have been used in the production of iron pellet in Québec, the rest has been sold to other part of Canada, United States, Europe and China.

## Included activities start
From the extraction of iron ore.

## Included activities end
This activity ends at the gate of the beneficiation plant.

The dataset includes :
1- Extraction of the iron ore in a open pit mine. The site includes a main pit and extra pit used when needed.
2- Crushing and concentration of the ore. The crushing is done with gyratory crushers and the concentration is realized by separating the silica and the iron by gravity.
3- Waste rocks piles
4- Taillings site and polishing pond (main pit only)
5- Wastewater treatment
6- Tranport of the ore extracted in the extra pit to the concentrator

Note that the solid waste produce on site are buried in the waste rock piles (7.51E-7 m³/kg : 33% domestic waste, 31% wood, 13% cardboard, 3% metals not contaminated with oil, 9% glass/textiles/plastics and 10% construction and demolition waste).

The dataset doesn't include :
1- the wastewater chemicals
2- Some of the waste because of a lack of information and because the end of life of these waste didn't exist in ecoinvent when this data was created. Note that the quantities of these waste have a very low importance.
a) Landfill : sediment sludge or oil settling (1.938E-5 kg/kg), activated carbon (4.309E-8 kg/kg), Labpack HW (water reactive) (2.789E-10 kg/kg), sodium carbonate (7.286E-8 kg/kg), contaminated equipment (2.317E-6 kg/kg), contaminated absorbent (4.28E-5 kg/kg)
b) Recycling : used oil filters (6.095E-6 kg/kg), antifreeze/brake and hydraulic fluid (4.003E-6 kg/kg), lead batteries (1.206E-6 k/kg), activated glass (4.557E-7 kg/kg), batteries/other accumulators (2.45E-7 kg/kg), sikagrout and waste contaminated to mercury (6.251E-7 kg/kg), contaminated containers (4.652E-7 kg/kg), Aerosol cans/lubricant/paint (4.415E-7 kg/kg), empty barrels contaminated with sulfuric acid (1.883E-8 kg/kg) and empty barrels contaminated with toluene (2.101E-7 kg/kg)
c) Physico-chemical treatement : oily water/emulsions (3.775E-6 kg/kg), laboratory acid and base (4.846E-8 kg/kg)
d) Lack of information on the product (not able to add the input) : laboratory product sent to incineration (7.6E-8E-8 kg/kg), flammable solid sent to incineration (5.564E-7 kg/kg)

## Geography
Data relate to the Quebec average

## Technology
Milling and mechanical sorting. Average iron yield is 75%.
Specific data were collected on one of the two production site in Quebec. According to the documentation available, the technologies of the 2 mines seems similar. Uncertainity has been adjusted accordingly.

## Time period
Collected data for Quebec industry for the year 2011

## Parameters
- annual production: 1.43422e10 kg; name annualProduction; lognormal variance with pedigree 0.0007, pedigree (1,2,1,1,1)
  Annual production of the data provider of iron ore 65%.
  Assumption : constant production over the years.
- fraction, process water, to air: 0.095 dimensionless; name fraction_PW_to_air; lognormal variance with pedigree 0.25, pedigree (5,5,5,5,5)
  Literature value (Statistics Canada, 2007 & Shaffer, K.H., 2008, Consumptive water use in the Great Lakes Basin, USGS) (Vionnet, S., Quantis Water Database - Technical Report, 2012).
  Uncertainty: Proxy. The uncertainty has been maximized.
- yield: 0.75 dimensionless; name yield_iron_recovery; lognormal variance with pedigree 0.0141, pedigree (4,2,1,1,1)
  Data estimated by the data provider (source : questionnaire).

## Reference product
- iron ore concentrate: 1 kg; name prod_ironOre65_kg; By-product classification allocatable product; CPC 14100: Iron ores and concentrates, other than roasted iron pyrites; HS2017 260111: Iron ores and concentrates; non-agglomerated
  Measured Value. Reference product given on a dry basis but produce at 4% humidity.
  EcoSpold01Location=GLO
  production volume 3.02246e10 kg; name annualProd_ironOre65; = (35200000000/0.6615)*0.568
    Calculated based on the iron content mined in 2019 in Canada (USGS, 2021). The value is further scaled to represent the Canadian mine production in the region of Quebec, that represents 56.8% of the total production activity.
    Reference:
    USGS (2021) Iron Ore. U.S. Geological Survey, Mineral Commodity Summaries, 2021, https://pubs.usgs.gov/periodicals/mcs2021/mcs2021-iron-ore.pdf (last accessed on 2021-07-22).
    NRCAN, 2021. Iron Ore Facts, Government of Canada, https://www.nrcan.gc.ca/our-natural-resources/minerals-mining/minerals-metals-facts/iron-ore-facts/20517 (last accessed on 2021-07-22).
  property carbon content, fossil 0
    Iron ores are mixtures of up to 400 different minerals. The most important ones are the iron oxides and sulphides (ecoinvent v2.2 report 10_partII)
  property carbon content, non-fossil 0
    (same comment as for iron ore concentrate)
  property input 0 l; name prod_ironOre65_kg_input
  property iron content 0.6615; name prod_ironOre65_kg_Fe_content
    Measured Value. Iron content on a dry matter basis.
  property price 0.0467 EUR2005
    Calculated based on literature value (UN Commodity Trade Statistics Database) using data on trade value and net weight (kg) for 5 reference countries/regions (EU-27, USA, JP, CN and IN) which weighted (by net weight) average is assumed to be a good approximation of the global price. The UN classification; 2601 Iron ores and concentrates, roasted iron pyrites (accessed 20140508). Data for the year 2005.
  properties: carbon allocation 0 kg, carbon content 0, dry mass 1 kg, water content 0, water in wet mass 0 kg, wet mass 1 kg

## Inputs from technosphere
- ammonium nitrate: 0.00249115 kg; name input_ammoniumNitrate_asN; = (input_ammoniumNitrate*N_content_ammoniumNitrate)*2.85731828339295; lognormal variance with pedigree 0.008, pedigree (1,1,4,1,1)
  The exchange has been updated from 'ammonium nitrate, as N' into 'ammonium nitrate' and therefore its amount has been scaled (multiplied) from 0.0009 kg by 2.8573 kg of 'ammonium nitrate' per kg of 'ammonium nitrate, as N'. Original comment of the exchange is: Calculated Value. Use as an explosive (Anfor).
  Uncertainty: Calculated variable. Uncertainty will be determined from propagation of uncertainty factors of underlying variables.
  property N content 0.35; name N_content_ammoniumNitrate
  property fuel input, fraction 0.06; name fractionFuel_input_ammoniumNitrate
  property input_kg 0.002491 kg; name input_ammoniumNitrate
  properties: dry mass 1 kg, wet mass 1 kg
  note on fuel input, fraction: Estimation : the explosive Anfo is made of about 94 percent of ammonium nitrate and 6 percent of diesel. http://en.wikipedia.org/wiki/ANFO
  note on input_kg: Measured Value given by data provider (source : questionnaire).
- diesel, burned in building machine: 0.0989784 MJ; = ((fuel_input_diesel*density_diesel_buildingmachine*1000)-(input_ammoniumNitrate*fractionFuel_input_ammoniumNitrate))*Net_heat_value_diesel_buildingmachine*42.8; lognormal variance with pedigree 0.008, pedigree (1,1,4,1,1)
  Calculated Value using the total consumption of the plant and substract the amount used for the explosive. Reported in m³.
  Uncertainty: Calculated variable. Uncertainty will be determined from propagation of uncertainty factors of underlying variables.
  property density 0.84 kg/l; name density_diesel_buildingmachine
  property fuel input in physical units, m3 2.931e-6 m3; name fuel_input_diesel
  property heating value, net 1 MJ; name Net_heat_value_diesel_buildingmachine
  note on density: Density value. Value Taken from Table 5.1 of report "Overview and methodology, Data quality guideline for the ecoinvent database version 3" (ecoinvent report No. 1 (v3), 2011)
  note on fuel input in physical units, m3: Measured Value given by data provider (source : questionnaire). Total fuel input in m³ (used in the machinery and for the explosive preparation).
  note on heating value, net: Net (lower) heating (calorific) value. Value Taken from Table 5.1 of report "Overview and methodology, Data quality guideline for the ecoinvent database version 3" (ecoinvent report No. 1 (v3), 2011)
- diesel, low-sulfur: 0.00014946 kg; = (input_ammoniumNitrate*fractionFuel_input_ammoniumNitrate); lognormal variance with pedigree 0.008, pedigree (1,1,4,1,1)
  Calculated Value based on this estimation : the explosive Anfo is made of about 94 percent of ammonium nitrate and 6 percent of diesel.
  Assumption : diesel low sulfur.
  Uncertainty: Calculated variable. Uncertainty will be determined from propagation of uncertainty factors of underlying variables.
  properties: carbon content, fossil 0.865, dry mass 1 kg, heating value, net 42.8 MJ, wet mass 1 kg
- electricity, high voltage: 0.03992 kWh; lognormal variance with pedigree 0.0087, pedigree (1,2,4,1,1)
  Measured Value given by data provider (source : questionnaire). Reported as 161 kV mainly and 44 kV. The high voltage is between 44 kV and 315 kV in Quebec
  Souce: http://www.hydroquebec.com/transenergie/fr/commerce/pdf/characteristics-and-target-values-of-voltage.pdf
- hazardous waste, for incineration: -8.953e-5 kg; name hazardousWaste; lognormal variance with pedigree 0.0007, pedigree (1,2,1,1,1)
  Measured Value given by data provider (source : questionnaire). Reported as diesel sent to incineration.
  production volume; = annualProd_ironOre65*hazardousWaste/prod_ironOre65_kg
    Calculated from production volume of reference product using the relative outputs.
  properties: carbon content, fossil 0.554667, dry mass 0.75 kg, heating value, net 17 MJ, water content 0.333333, wet mass 1 kg
  note on carbon content, fossil: Tab A.6, ecoinvent v2.2 report 13_I. C content has been calculated after data in the tables, and then referred to 1 kg DM
  note on heating value, net: Value taken from the general comment of the treatment dataset.
- heat, district or industrial, other than natural gas: 0.0247127 MJ; = fuel_input_HFO*density_HFO*1000*Net_heat_value_HFO*41.2/fuel_use_HFO; lognormal variance with pedigree 0.008, pedigree (1,1,4,1,1)
  Calculated Value. Calculation is based on reported fuel input (in m3), the Net Heating Value of the fuel and efficiency (1/Fuel_use).
  Uncertainty: Calculated variable. Uncertainty will be determined from propagation of uncertainty factors of underlying variables.
  property Corresponding fuel use 1.133 MJ; name fuel_use_HFO
  property density 1 kg/l; name density_HFO
  property fuel input in physical units, m3 6.796e-7 m3; name fuel_input_HFO
  property heating value, net 1 MJ; name Net_heat_value_HFO
  note on Corresponding fuel use: Lower heating value of the fuel input related to the heat/electricity output Source : heat production, heavy fuel oil, at industrial furnace 1MW, GLO
  note on fuel input in physical units, m3: Measured Value given by data provider (source : questionnaire). Fuel input in m³.
- lubricating oil: 5.0456e-5 kg; = wasteMineralOil+(used_oil_burned_onsite*lubricant_density); lognormal variance with pedigree 0.0487, pedigree (5,2,4,1,1)
  Estimation based on the amount of lubricant burned on site and with the amount of used oil sent to incineration plant.
  property density 0.9 kg/l; name lubricant_density
  property input 5.159e-5 l; name used_oil_burned_onsite
  properties: carbon content, fossil 0.75, dry mass 1 kg, heating value, net 40.2 MJ, wet mass 1 kg
  note on carbon content, fossil: Lubricating oil is produced from diesel. C-content/dry mass of fats and oils considered 75%, from: ecoinvent v2.2 report, n 15a, pg 40
  note on density: Estimations taken directly from http://www.engineeringtoolbox.com/liquids-densities-d_743.html.
  note on heating value, net: Literature value, Source: IPCC 2006, 2006 IPCC Guidelines for National Greenhouse Gas Inventories, Prepared by the National Greenhouse Gas Inventories Programme, Eggleston H.S., Buendia L., Miwa K., Ngara T. and Tanabe K. (eds). Published: IGES, Japan
- mine infrastructure, iron: 3.23331e-13 unit; = 1/(yearly_output*lifetime); lognormal variance with pedigree 0.008, pedigree (1,1,4,1,1)
  Estimation based on the ecoinvent iron mine operation, crude ore, 46%, GLO dataset (ecoinvent v3).
  Uncertainty: Calculated variable. Uncertainty will be determined from propagation of uncertainty factors of underlying variables.
  property yearly output 4.61612e10 kg; name yearly_output
- solvent, organic: 2.189e-6 kg; = spentSolventMixture; lognormal variance with pedigree 0.008, pedigree (1,1,4,1,1)
  Estimation based on the amount of waste solvent.
  Uncertainty: Calculated variable. Uncertainty will be determined from propagation of uncertainty factors of underlying variables.
  properties: carbon content, fossil 0.63072, dry mass 1 kg, heating value, net 19.11 MJ, wet mass 1 kg
- spent solvent mixture: -2.189e-6 kg; name spentSolventMixture; lognormal variance with pedigree 0.0007, pedigree (1,2,1,1,1)
  Measured Value given by data provider (source : questionnaire). Reported as non-halogenated organic solvents sent to incineration.
  production volume; = annualProd_ironOre65*spentSolventMixture/prod_ironOre65_kg
    Calculated from production volume of reference product using the relative outputs.
  properties: carbon content, fossil 0.571257, dry mass 0.835 kg, heating value, net 21.7 MJ, water content 0.197605, wet mass 1 kg
  note on carbon content, fossil: Tab A.7, ecoinvent v2.2 report 13_I. C content has been calculated after data in the tables, and then referred to 1 kg DM
- transport, freight train: 0.0159 metric ton*km; = (ore_extraPit/1000)*distance_extraPit; lognormal variance with pedigree 0.008, pedigree (1,1,4,1,1)
  Calculated Value.Transport of the ore from the extra pit to the concentrator.
  Uncertainty: Calculated variable. Uncertainty will be determined from propagation of uncertainty factors of underlying variables.
  property distance 60 km; name distance_extraPit
  property input_kg 0.265 kg; name ore_extraPit
  note on input_kg: Measured Value given by data provider (source : questionnaire). Ore transported from the extra pit to the concentrator on a distance of 60 km (empty return).
- waste mineral oil: -4.025e-6 kg; name wasteMineralOil; lognormal variance with pedigree 0.0007, pedigree (1,2,1,1,1)
  Measured Value given by data provider (source : questionnaire). Reported as waste oil with BPC concentration less or equal to 3 mg/kg and waste grease sent to incineration.
  production volume; = annualProd_ironOre65*wasteMineralOil/prod_ironOre65_kg
    Calculated from production volume of reference product using the relative outputs.
  properties: carbon content, fossil 0.864444, dry mass 0.9 kg, heating value, net 34.7 MJ, water content 0.111111, wet mass 1 kg

## Inputs from nature
- Iron [natural resource, in ground]: 0.882 kg; = prod_ironOre65_kg_Fe_content/yield_iron_recovery; lognormal variance with pedigree 0.008, pedigree (1,1,4,1,1)
  46% Fe in siderite; 25% Fe in ore; Calculated Value. Reported as ore containing 31% of iron.
  3.22 kg of ore are extracted per kg of iron ore beneficated to 66.15% Fe.
  Uncertainty: Calculated variable. Uncertainty will be determined from propagation of uncertainty factors of underlying variables.
- Occupation, mineral extraction site [natural resource, land]: 0.00514217 m2*year; = (surfaceSite*lifetime)/(annualProduction*lifetime); lognormal variance with pedigree 0.008, pedigree (1,1,4,1,1)
  Calculated Value. See exchange properties for details.
  Uncertainty: Calculated variable. Uncertainty will be determined from propagation of uncertainty factors of underlying variables.
  property lifetime 67 year; name lifetime
- Transformation, from forest, unspecified [natural resource, land]: 7.67488e-5 m2; = surfaceSite/(annualProduction*lifetime); lognormal variance with pedigree 0.008, pedigree (1,1,4,1,1)
  (same comment as for Occupation, mineral extraction site)
  property Surface 7.375e7 m2; name surfaceSite
- Transformation, to mineral extraction site [natural resource, land]: 7.67488e-5 m2; = surfaceSite/(annualProduction*lifetime); lognormal variance with pedigree 0.008, pedigree (1,1,4,1,1)
  (same comment as for Occupation, mineral extraction site)
- Water, lake [natural resource, in water]: 0.0006621 m3; name water_UNO_input; lognormal variance with pedigree 0.0087, pedigree (1,2,4,1,1)
  Measured Value given by data provider (source : questionnaire).

## Emissions to nature
- Arsenic ion [air, non-urban air or from high stacks]: 5.684e-19 kg; lognormal variance with pedigree 0.86, pedigree (5,5,5,5,5)
  Estimation based on the amount of waste oil burned on site (4.4644E-5 kg/kg) and the dataset treatment of waste mineral oil, hazardous waste incineration GLO (ecoinvent v3).
  Uncertainty: Rough estimation
- Cadmium II [air, non-urban air or from high stacks]: 2.046e-15 kg; lognormal variance with pedigree 0.86, pedigree (5,5,5,5,5)
  (same comment as for Arsenic ion)
- Carbon dioxide, fossil [air, non-urban air or from high stacks]: 0.0005947 kg; lognormal variance with pedigree 0.0093, pedigree (2,2,4,1,1)
  Measured Value given by data provider (source : questionnaire). Emissions related to explosive (Anfor) for the main pit and extra pit and the emissions related to the combustion of waste oil on site (4.4644E-5 kg/kg).
- Carbon monoxide, fossil [air, non-urban air or from high stacks]: 8.471e-5 kg; lognormal variance with pedigree 0.6587, pedigree (2,2,4,1,1)
  Measured Value given by data provider (source : questionnaire). Emissions related to explosive (Anfor) for the main pit and extra pit.
  The combustion of waste oil on site is also generating carbon monoxide. The estimation based on the amount of waste oil burned on site (4.4644E-5 kg/kg) and the dataset treatment of waste mineral oil, hazardous waste incineration GLO (ecoinvent v3) is very small in comparaison to the above mentionned measured value (5.608E-10 kg/kg).
- Chromium III [air, non-urban air or from high stacks]: 3.845e-17 kg; lognormal variance with pedigree 0.86, pedigree (5,5,5,5,5)
  (same comment as for Arsenic ion)
- Copper ion [air, non-urban air or from high stacks]: 3.25e-12 kg; lognormal variance with pedigree 0.86, pedigree (5,5,5,5,5)
  (same comment as for Arsenic ion)
- Dinitrogen monoxide [air, non-urban air or from high stacks]: 3.302e-9 kg; lognormal variance with pedigree 0.0487, pedigree (2,2,4,1,1)
  Measured Value given by data provider (source : questionnaire). Emissions related to the combustion of waste oil on site (4.4644E-5 kg/kg).
- Lead II [air, non-urban air or from high stacks]: 3.171e-13 kg; lognormal variance with pedigree 0.86, pedigree (5,5,5,5,5)
  (same comment as for Arsenic ion)
- Mercury II [air, non-urban air or from high stacks]: 1.925e-21 kg; lognormal variance with pedigree 0.86, pedigree (5,5,5,5,5)
  (same comment as for Arsenic ion)
- Methane, fossil [air, non-urban air or from high stacks]: 6.191e-9 kg; lognormal variance with pedigree 0.0487, pedigree (2,2,4,1,1)
  (same comment as for Dinitrogen monoxide)
- Nickel II [air, non-urban air or from high stacks]: 1.04e-13 kg; lognormal variance with pedigree 0.86, pedigree (5,5,5,5,5)
  (same comment as for Arsenic ion)
- Nitrogen oxides [air, non-urban air or from high stacks]: 1.993e-5 kg; lognormal variance with pedigree 0.0487, pedigree (2,2,4,1,1)
  Measured Value given by data provider (source : questionnaire). Emissions related to explosive (Anfor) for the main pit and extra pit.
- Particulate Matter, < 2.5 um [air, non-urban air or from high stacks]: 4.343e-6 kg; lognormal variance with pedigree 0.3087, pedigree (2,2,4,1,1)
  Measured Value given by data provider (source : questionnaire). Emissions related to stationnary sources (process), material transfer activities, fugitive sources (tailings) and road dust.
- Particulate Matter, > 10 um [air, non-urban air or from high stacks]: 7.854e-5 kg; lognormal variance with pedigree 0.0487, pedigree (2,2,4,1,1)
  (same comment as for Particulate Matter, < 2.5 um)
- Particulate Matter, > 2.5 um and < 10um [air, non-urban air or from high stacks]: 2.904e-5 kg; lognormal variance with pedigree 0.1287, pedigree (2,2,4,1,1)
  (same comment as for Particulate Matter, < 2.5 um)
- Phosphorus [air, non-urban air or from high stacks]: 2.438e-11 kg; lognormal variance with pedigree 0.25, pedigree (5,5,5,5,5)
  (same comment as for Arsenic ion)
- Sulfur dioxide [air, non-urban air or from high stacks]: 2.491e-6 kg; lognormal variance with pedigree 0.0093, pedigree (2,2,4,1,1)
  (same comment as for Nitrogen oxides)
- Thallium I [air, non-urban air or from high stacks]: 2.786e-14 kg; lognormal variance with pedigree 0.86, pedigree (5,5,5,5,5)
  (same comment as for Arsenic ion)
- Water [air, unspecified]: 6.28995e-5 m3; name water_to_air_unspecified; = (water_UNO_input*fraction_PW_to_air); lognormal variance with pedigree 0.0487, pedigree (2,2,4,1,1)
  Calculated value based on literature values and expert opinion. See comments in the parametres' comment field.
- Zinc II [air, non-urban air or from high stacks]: 2.21e-11 kg; lognormal variance with pedigree 0.86, pedigree (5,5,5,5,5)
  (same comment as for Arsenic ion)
- Ammonium [water, surface water]: 4.549e-6 kg; lognormal variance with pedigree 0.0487, pedigree (2,2,4,1,1)
  Measured Value given by data provider (source : questionnaire). Emissions in the final effluent.
- Arsenic ion [water, surface water]: 1.958e-9 kg; lognormal variance with pedigree 0.6587, pedigree (2,2,4,1,1)
  (same comment as for Ammonium)
- BOD5, Biological Oxygen Demand [water, surface water]: 8.6867e-5 kg; lognormal variance with pedigree 0.106, pedigree (4,5,5,5,3)
  Estimation based on iron ore beneficiation to 65% Fe GLO dataset (ecoinvent v3).
- COD, Chemical Oxygen Demand [water, surface water]: 8.6867e-5 kg; lognormal variance with pedigree 0.106, pedigree (4,5,5,5,3)
  Estimation based on iron ore beneficiation to 65% Fe GLO dataset (ecoinvent v3).
- Cadmium II [water, surface water]: 1.948e-9 kg; lognormal variance with pedigree 0.6587, pedigree (2,2,4,1,1)
  (same comment as for Ammonium)
- Copper ion [water, surface water]: 1.086e-8 kg; lognormal variance with pedigree 0.6587, pedigree (2,2,4,1,1)
  (same comment as for Ammonium)
- Cyanide [water, surface water]: 5.7911e-7 kg; lognormal variance with pedigree 0.106, pedigree (4,5,5,5,3)
  Estimation based on iron ore beneficiation to 65% Fe GLO dataset (ecoinvent v3).
- DOC, Dissolved Organic Carbon [water, surface water]: 3.136e-6 kg; lognormal variance with pedigree 0.106, pedigree (4,5,5,5,3)
  Estimation based on iron ore beneficiation to 65% Fe GLO dataset (ecoinvent v3).
- Hydrocarbons, unspecified [water, surface water]: 2.689e-8 kg; lognormal variance with pedigree 0.0487, pedigree (2,2,4,1,1)
  (same comment as for Ammonium)
- Iron ion [water, surface water]: 1.04e-6 kg; lognormal variance with pedigree 0.6587, pedigree (2,2,4,1,1)
  (same comment as for Ammonium)
- Lead II [water, surface water]: 1.958e-9 kg; lognormal variance with pedigree 0.6587, pedigree (2,2,4,1,1)
  (same comment as for Ammonium)
- Mercury II [water, surface water]: 4.472e-11 kg; lognormal variance with pedigree 0.6587, pedigree (2,2,4,1,1)
  (same comment as for Ammonium)
- Nickel II [water, surface water]: 5.246e-8 kg; lognormal variance with pedigree 0.6587, pedigree (2,2,4,1,1)
  (same comment as for Ammonium)
- Nitrate [water, surface water]: 2.929e-5 kg; lognormal variance with pedigree 0.0487, pedigree (2,2,4,1,1)
  (same comment as for Ammonium)
- Suspended solids, unspecified [water, surface water]: 3.198e-5 kg; lognormal variance with pedigree 0.0487, pedigree (2,2,4,1,1)
  (same comment as for Ammonium)
- TOC, Total Organic Carbon [water, surface water]: 3.136e-6 kg; lognormal variance with pedigree 0.106, pedigree (4,5,5,5,3)
  Estimation based on iron ore beneficiation to 65% Fe GLO dataset (ecoinvent v3).
- Water [water, unspecified]: 0.0005992 m3; name water_to_water_unspecified; = water_UNO_input*(1-fraction_PW_to_air); lognormal variance with pedigree 0.0487, pedigree (2,2,4,1,1)
  (same comment as for Water)
  property carbon content, fossil 0; name C_content_fossil
  property carbon content, non-fossil 0; name C_content_non_fossil
  property dry mass 0 kg; name DM
  property water in wet mass 1000 kg; name WWM
  property wet mass 1000 kg; name WM
- Zinc II [water, surface water]: 3.884e-8 kg; lognormal variance with pedigree 0.6587, pedigree (2,2,4,1,1)
  (same comment as for Ammonium)

## Extrapolations
Extrapolations were made from the GLO dataset for some water emissions (DOC, BOD5, TOC, COD and cyanide) and for the mine infrastructure and recultivation.
Specific data were collected on one of the two production site in Quebec. According to the documentation available, the technologies of the 2 mines seems similar. Uncertainity has been adjusted accordingly.

## Review by Hans-Jörg Althaus 2013-12-05
ok
