# borehole heat exchanger production, 150m

Dataset: EcoSpold 2, unit process
Geography: RoW
Time period: 1990-01-01 to 2023-12-31
Technology level: current
Classification: EcoSpold01Categories: heat pumps/production of components
Classification: ISIC rev.4 ecoinvent: 2819:Manufacture of other general-purpose machinery
Tags: ConvertedDataset
Scenario: Business-as-Usual
System model: Allocation, cut-off by classification
Share of production covered: 0 %
Generated by: Thomas Heck
Published in: Heck, T. 2007
Database: ecoinvent
isCopyrightProtected: true
accessRestrictedTo: 1

## General comment
Average infrastructure.
[This dataset was already contained in the ecoinvent database version 2. It was not individually updated during the transfer to ecoinvent version 3. Life Cycle Impact Assessment results may still have changed, as they are affected by changes in the supply chain, i.e. in other datasets. This dataset was generated following the ecoinvent quality guidelines for version 2. It may have been subject to central changes described in the ecoinvent version 3 change report (http://www.ecoinvent.org/database/ecoinvent-version-3/reports-of-changes/), and the results of the central updates were reviewed extensively. The changes added e.g. consistent water flows and other information throughout the database. The documentation of this dataset can be found in the ecoinvent reports of version 2, which are still available via the ecoinvent website. The change report linked above covers all central changes that were made during the conversion process.]

## Included activities end
The module includes the most important materials, energy, water, and transport for production and drilling.

## Technology
Polyethylene tube; propylene glycol assumed for brine.

## Parameters
- fraction, process water, to air: 0.15 dimensionless; name fraction_PW_to_air; lognormal variance with pedigree 0.092025, pedigree (4,4,3,2,4)

## Reference product
- borehole heat exchanger, 150m: 1 unit; By-product classification allocatable product; CPC 43911: Producer gas or water gas generators; acetylene gas generators and similar water process gas generators; disti[…]; HS2017 841950: Heat exchange units; not used for domestic purposes
  EcoSpold01Location=CH
  production volume 3.96633 unit
    This is a placeholder value that does not reflect real-world production volumes. This dataset does not currently require a real-world production volume to work in the database framework, and no actual data were collected yet. This has no negative effect on the results of the ecoinvent database.
  property price 1420 EUR2005
    EU27 I/O database-68 Electronic machinery (4.02 EURO2003/kg dry soilds) in the 'EU & DK Input Output Database' (available in SimaPro); 356 kg
  properties: carbon allocation 0 kg, carbon content 0

## Inputs from technosphere
- activated bentonite: 8 kg; lognormal variance with pedigree 0.188, pedigree (4,5,5,5,1)
  Basic uncertainty:2
  EcoSpold01Location=DE
  properties: dry mass 1 kg, wet mass 1 kg
- cement, unspecified: 1.63812, 0.71196, 0.0183955, 0.43387, 2.70385, 0.0848707, 0.0620365, 0.0336221, 0.0668239, 0.102162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 kg (11 suppliers, which the file names only by identifier); sum of these 33 kg; lognormal variance with pedigree 0.188, pedigree (4,5,5,5,1)
  Basic uncertainty:2
  EcoSpold01Location=CH
  properties: dry mass 1 kg, wet mass 1 kg
- diesel, burned in building machine: 17700 MJ; lognormal variance with pedigree 0.1246, pedigree (3,3,5,5,4)
  Basic uncertainty:1.05
  EcoSpold01Location=GLO
  properties: heating value, net 1 MJ
- ethylene glycol: 102 kg; lognormal variance with pedigree 0.188, pedigree (4,5,5,5,1)
  EcoSpold01Location=RER
  Basic uncertainty:2
  properties: carbon content, fossil 0.387097, dry mass 1 kg, heating value, net 23.44 MJ, wet mass 1 kg
- heat carrier liquid, 40% C3H8O2: -0.3 m3; lognormal variance with pedigree 0.15, pedigree (4,5,3,5,1)
  EcoSpold01Location=CH
  Basic uncertainty:2
  production volume
    Calculated from the production volume of borehole heat exchanger, 150m in proportion to the respective output amounts.
  properties: carbon content, fossil 3, dry mass 6.31366 kg, price 1.08656 EUR2005, water content 157.387, wet mass 1000 kg
  note on carbon content, fossil: The composition of the product was used to estimate its carbon content: 40% (w/v) C3H8O2.
- inert waste, for final disposal: -2500 kg; lognormal variance with pedigree 0.15, pedigree (4,5,3,5,1)
  Basic uncertainty:2
  EcoSpold01Location=CH
  production volume
    (same comment as for heat carrier liquid, 40% C3H8O2)
  properties: dry mass 0.995 kg, water content 0.00502513, wet mass 1 kg
- polyethylene, low density, granulate: 180 kg; lognormal variance with pedigree 0.188, pedigree (4,5,5,5,1)
  Basic uncertainty:2
  EcoSpold01Location=RER
  properties: carbon content, fossil 0.857143, dry mass 1 kg, heating value, net 42.47 MJ, wet mass 1 kg
  note on carbon content, fossil: Polyethylene is formed out of a huge amount of ethylene monomers (C2H4) (ecoinvent v2.2 report 11_II). MW=28 g/mol
- reinforcing steel: 33 kg; lognormal variance with pedigree 0.188, pedigree (4,5,5,5,1)
  EcoSpold01Location=RER
  Basic uncertainty:2
  properties: carbon content, fossil 0.004, dry mass 1 kg, wet mass 1 kg

## Inputs from nature
- Water, unspecified natural origin [natural resource, in water]: 10.2 m3; name water_UNO_input; lognormal variance with pedigree 0.188, pedigree (4,5,5,5,1)
  Estimation.

## Emissions to nature
- Water [air, unspecified]: 1.53 m3; name water_to_air_unspecified; lognormal variance with pedigree 0.0827, pedigree (2,2,5,5,1)
  Calculated value based on literature values and expert opinion. See comments in the parametres' comment field.
  property fraction, origin: fresh water 0; name fraction_origin_fresh_water
  property fraction, origin: salt water 0; name fraction_origin_salt_water
  property fraction, origin: unspecified 1; name fraction_origin_unspecified
- Water [water, unspecified]: 8.67 m3; name water_to_water_unspecified; lognormal variance with pedigree 0.0827, pedigree (2,2,5,5,1)
  (same comment as for Water)
  property carbon content, fossil 0; name C_content_fossil
  property carbon content, non-fossil 0; name C_content_non_fossil
  property dry mass 0 kg; name DM
  property fraction, origin: fresh water 0; name fraction_origin_fresh_water_Ww
  property fraction, origin: salt water 0; name fraction_origin_salt_water_Ww
  property fraction, origin: unspecified 1; name fraction_origin_unspecified_Ww
  property water in wet mass 1000 kg; name WWM
  property wet mass 1000 kg; name WM

## Sampling procedure
Literature, manufacturer information

## Extrapolations
none This dataset has been copied from an original dataset covering the geography CH. The uncertainty has been adjusted accordingly.

## Review by Gerald Rebitzer (obsolete) 2004-06-09
prepared
