# maize grain production

Dataset: EcoSpold 2, unit process
Geography: CA-QC
Time period: 2010-01-01 to 2023-12-31
Technology level: current
Classification: ISIC rev.4 ecoinvent: 0111:Growing of cereals (except rice), leguminous crops and oil seeds
Synonyms: corn; Zea mays L.
Scenario: Business-as-Usual
System model: Allocation, cut-off by classification
Share of production covered: 100 %
Generated by: Dominique Maxime
Database: ecoinvent
isCopyrightProtected: true
accessRestrictedTo: 1

## General comment
This dataset represents the production of 1 kg of maize grain (wet mass) in the region of Québec. The 2010-2012 average yield is 8900 kg/ha at a moisture content at storage (i.e. dried grain) of 14%. The production considered is a rather intensive production of grains mostly marketed for animal feed.

## Included activities start
This activity starts with soil cultivation after the harvest of the previous crop.

## Included activities end
This activity ends after harvest and drying of grains at the farm gate.
The dataset includes the inputs of seeds, mineral and organic fertilisers, pesticides and all machine operations and corresponding machine infrastructure and sheds. Machine operations are: soil cultivation, transport of seeds, fertilisers and pesticides to the field (15 km), sowing, fertilisation, weed control, pest and pathogen control, combine-harvesting, transport from field to farm or local drying centre and drying of grains. Direct field emissions are also included.
No irrigation is involved for maize grain production in Québec. Use of car, van, or pick-up for servicing people (e.g. from farm to field) is excluded from the activities.

## Geography
The inventory is modelled for the central region (e.g. Montérégie) of Québec (Canada).

## Time period
Time of publications

## Parameters
- fraction, process water to water, to surface water: 0.2 dimensionless; name fraction_PWtoW_to_surface_water; lognormal variance with pedigree 0.0892, pedigree (4,3,1,4,4)
  For agricultural crop dataset, distinction is made between irrigation water and process water. Process water is the water that comes with manure or pesticide application. A fraction of the process water input evaporates to the air and the remaining is considered emitted to surface water and ground water.
  This value is a proxy, taken from ecoinvent v3.0 dataset 'potato production, US 2006'. 'Literature value (Döll, 2011) cross referenced with expert opinion.' as cited in original dataset.
- fraction, process water, to air: 0.6165 dimensionless; name fraction_PW_to_air; lognormal variance with pedigree 0.0413, pedigree (2,2,1,4,1)
  For agricultural crop dataset, distinction is made between irrigation water and process water. Process water is the water that comes with manure or pesticide application. A fraction of the process water input evaporates to the air and the remaining is considered emitted to surface water and ground water.
  By default, the same value as for irrigation is assumed: this is a Canada-wide value taken from database (Vionnet, S., Quantis Water Database - Technical report, 2012). Note that it might be lower in Quebec due to the more humid climate in Western Canada than in Eastern Canada.
- water content at harvest: 0.25 kg/kg; name harvest_wc; lognormal variance with pedigree 0.01, pedigree (1,1,1,1,1)
  Grain water content at harvest (wet mass basis). See supporting documentation '01 crop production - Québec.pdf' available on ecoinvent reports web page (https://ecoquery.ecoinvent.org/File/Reports).
- yield, agriculture: 8.9 metric ton/ha; name yield_agriculture; lognormal variance with pedigree 0.0081, pedigree (1,2,1,1,1)
  Amount (wet mass) of harvested and dried grains (14% water content) per hectare of cultivated land. See supporting documentation '01 crop production - Québec.pdf' available on ecoinvent reports web page (https://ecoquery.ecoinvent.org/File/Reports).

## Reference product
- maize grain: 1 kg; name REF_PRODUCT; By-product classification allocatable product; CPC 01122: Maize (corn), other; HS2017 100590: Cereals; maize (corn), other than seed
  production volume 3.34667e9 kg
    Maize grain production, 2010-2012 yearly average.
  property carbon content, non-fossil 0.46957; name REF_PRODUCT_C_content_non_fossil
    biogene carbon content on a dry matter basis
    Composition data obtained from Corn Grain Whole, in (http://beefmagazine.com/images/2009%20feed%20table.pdf). First, composition data were refered to 1 kg dry mass. Then, C-contents were calculated considering a C-content/dry mass of 46% in carbohydrates (including fibres), 53% in proteins and 75% in fats. All data from 'Evolutionary and Biochemical Aspects', A.D. Kay and T. Vrede (in Global Ecology, 2010, Elsevier B.V., S.E. Jørgensen Ed.). Finally, C-content in kg was multiplied by kg dry mass in the exchange. The figure is applicable to the Québec context.
  property dry mass 0.86 kg; name REF_PRODUCT_DM
  property price 0.12 EUR2005
    Literature value. Based on SAFEX price of R 2,025 per tonne (average yellow and white). Source: SAGIS, 2018. Retrieved from: http://www.sagis.org.za/safex_historic.html, accessed 28May2018.
  property water in wet mass 0.14 kg; name REF_PRODUCT_WWM
  properties: carbon allocation 0.40383 kg, carbon content 0.46957, carbon content, fossil 0, water content 0.162791, wet mass 1 kg

## Inputs from technosphere
- [thio]carbamate-compound: 1.5618e-7 kg; lognormal variance with pedigree 0.0414, pedigree (1,2,5,3,2)
  Carbaryl (9,1011E-08 kg) and pyraclostrobin (6,5169E-08 kg). Pyraclostrobin is derived from carbamate but it might not belong to this chemical class. See supporting documentation '01 crop production - Québec.pdf' available on ecoinvent reports web page (https://ecoquery.ecoinvent.org/File/Reports).
  properties: carbon content, fossil 0.626349, dry mass 1 kg, wet mass 1 kg
- ammonia, anhydrous, liquid: 0.000785905 kg; lognormal variance with pedigree 0.0099, pedigree (2,2,4,1,2)
  Amount is determined from the mineral nutrient actually used for the crop (CECPA, 2011) and from the overall mineral fertilizers sales, by type of fertilizer, in Québec for agriculture (APNC, 2010). See details for disaggregation in supporting documentation '01 crop production - Québec.pdf' available on ecoinvent reports web page (https://ecoquery.ecoinvent.org/File/Reports).
  properties: dry mass 1 kg, wet mass 1 kg
- ammonium nitrate: 0.0112019 kg; lognormal variance with pedigree 0.0099, pedigree (2,2,4,1,2)
  The exchange has been updated from 'ammonium nitrate, as N' into 'ammonium nitrate' and therefore its amount has been scaled (multiplied) from 0.0039 kg by 2.8573 kg of 'ammonium nitrate' per kg of 'ammonium nitrate, as N'. Original comment of the exchange is: Amount is determined from the mineral nutrient actually used for the crop (CECPA, 2011) and from the overall mineral fertilizers sales, by type of fertilizer, in Québec for agriculture (APNC, 2010). See details for disaggregation in supporting documentation '01 crop production - Québec.pdf' available on ecoinvent reports web page (https://ecoquery.ecoinvent.org/File/Reports).
  properties: dry mass 1 kg, wet mass 1 kg
- ammonium sulfate: 0.000547423 kg; lognormal variance with pedigree 0.0099, pedigree (2,2,4,1,2)
  (same comment as for ammonia, anhydrous, liquid)
  properties: dry mass 1 kg, wet mass 1 kg
- application of plant protection product, by field sprayer: 0.0001 ha; lognormal variance with pedigree 0.0099, pedigree (2,2,4,1,2)
  89% of cropand area receives plant protection products in average. See supporting documentation '01 crop production - Québec.pdf' available on ecoinvent reports web page (https://ecoquery.ecoinvent.org/File/Reports).
- atrazine: 6.1011e-5 kg; lognormal variance with pedigree 0.0414, pedigree (1,2,5,3,2)
  See supporting documentation '01 crop production - Québec.pdf' available on ecoinvent reports web page (https://ecoquery.ecoinvent.org/File/Reports).
  properties: carbon content, fossil 0.446512, dry mass 1 kg, wet mass 1 kg
- benzoic-compound: 1.0225e-5 kg; lognormal variance with pedigree 0.0414, pedigree (1,2,5,3,2)
  Dicamba. See supporting documentation '01 crop production - Québec.pdf' available on ecoinvent reports web page (https://ecoquery.ecoinvent.org/File/Reports).
  properties: carbon content, fossil 0.405853, dry mass 1 kg, wet mass 1 kg
  note on carbon content, fossil: C content estimated after the pesticides Dicamba (C8H6Cl2O3) and Clopyralid (C6H3Cl2NO2) (Tab 1.5, Sutter 2010), classified in ecoinvent v2.2 report 15a, Tab 10.3 as benzoic compounds
- combine harvesting: 0.00011072 ha; lognormal variance with pedigree 0.0099, pedigree (2,2,4,1,2)
  (same comment as for atrazine)
- dimethenamide: 7.0787e-6 kg; lognormal variance with pedigree 0.0414, pedigree (1,2,5,3,2)
  (same comment as for atrazine)
  properties: carbon content, fossil 0.521739, dry mass 1 kg, wet mass 1 kg
- drying of maize grain: 0.146667 l; name EVAP_WATER; = REF_PRODUCT * (REF_PRODUCT_WWM - harvest_wc) / (harvest_wc - 1); lognormal variance with pedigree 0.008, pedigree (1,1,4,1,1)
  Calculated from average moisture content of grains at harvest (see Exchange Properties and Parameters).
- fertilising, by broadcaster: 0.00011236 ha; lognormal variance with pedigree 0.0099, pedigree (2,2,4,1,2)
  (same comment as for atrazine)
- glyphosate: 7.191e-5 kg; lognormal variance with pedigree 0.0414, pedigree (1,2,5,3,2)
  (same comment as for atrazine)
  properties: carbon content, fossil 0.214286, dry mass 1 kg, wet mass 1 kg
- inorganic nitrogen fertiliser, as N: 0.00515274 kg; lognormal variance with pedigree 0.0099, pedigree (2,2,4,1,2)
  (same comment as for ammonia, anhydrous, liquid)
  properties: dry mass 1 kg, wet mass 1 kg
- inorganic phosphorus fertiliser, as P2O5: 0.0047191 kg; lognormal variance with pedigree 0.0099, pedigree (2,2,4,1,2)
  Amount is determined from the mineral nutrient actually used for the crop (CECPA, 2011) and from the overall mineral fertilizers sales, by type of fertilizer, in Québec for agriculture (APNC, 2010). See details for disaggregation in supporting documentation '01 crop production - Québec.pdf' available on ecoinvent reports web page (https://ecoquery.ecoinvent.org/File/Reports).
  Mono- and di-ammonium phosphate (MAP and DAP), as P2O5. The concommitant supply of nitrogen by DAP is accounted for in total N requirements. See supporting documentation '01 crop production - Québec.pdf' available on ecoinvent reports web page (https://ecoquery.ecoinvent.org/File/Reports).
  properties: dry mass 1 kg, wet mass 1 kg
- lime: 0.0206775 kg; name LIME_CaCO3; lognormal variance with pedigree 0.0099, pedigree (2,2,4,1,2)
  as CaCO3. CECPA (2011). Étude sur les coûts de production des céréales, du maïs-grain et des oléagineux en 2009 au Québec. [Centre d’Études sur les Coûts de Production en Agriculture], Juillet 2011, 112 p. [in French]. Available at: http://www.cecpa.qc.ca/contenuFichiers/files/etudesAnalyses/etude-complete-cereales-mais-grain-oleagineux-en-2009-quebec_20130501133424.pdf
  properties: carbon content, fossil 0.120005, dry mass 1 kg, wet mass 1 kg
- liquid manure spreading, by vacuum tanker: 0.000689344 m3; lognormal variance with pedigree 0.0099, pedigree (2,2,4,1,2)
  Calculated from liquid manure input rate and crop yield.
- maize seed, for sowing: 0.00341573 kg; name SEED; = (1 / (yield_agriculture * UnitConversion(1, 'metric ton', 'kg'))) * SEED_nber_per_ha * SEED_mass_per_seed; lognormal variance with pedigree 0.008, pedigree (1,1,4,1,1)
  Calculated value. See Exchange Properties.
  property carbon content, non-fossil 0.46957; name SEED_C_content_non_fossil; = REF_PRODUCT_C_content_non_fossil
  property dry mass 0.86 kg; name SEED_DM; = SEED_WM - SEED_WWM
  property mass per seed 0.00038 kg; name SEED_mass_per_seed
  property seeds per hectare 80000 unit; name SEED_nber_per_ha
  property water content 0.162791; name SEED_water_content; = SEED_WWM / SEED_DM
  property water in wet mass 0.14 kg; name SEED_WWM; = REF_PRODUCT_WWM
  property wet mass 1 kg; name SEED_WM
  note on mass per seed: 0,380 kg/1000 seeds. See supporting documentation '01 crop production - Québec.pdf' available on ecoinvent reports web page (https://ecoquery.ecoinvent.org/File/Reports).
  note on seeds per hectare: 80000 seeds/ha. See supporting documentation '01 crop production - Québec.pdf' available on ecoinvent reports web page (https://ecoquery.ecoinvent.org/File/Reports).
- manure, liquid, cattle: 0.30748 kg; name MANURE_LIQUID_CATTLE; lognormal variance with pedigree 0.0099, pedigree (2,2,4,1,2)
  Amount of 0.30748 kg of manure, liquid, cattle is needed when producing 1kg of maize grain.
  Amount is determined from the organic nutrient actually used for the crop (CECPA, 2011) and from data about organic fertilizer production, by type, in Québec (MAPAQ, 2013). See details for disaggregation in supporting documentation '01 crop production - Québec.pdf' available on ecoinvent reports web page (https://ecoquery.ecoinvent.org/File/Reports).
  property water in wet mass 0.925 kg; name MANURE_LIQUID_CATTLE_WWM
  properties: carbon content, non-fossil 0.68, dry mass 0.075 kg, nitrogen content 0.03681, water content 12.333, wet mass 1 kg
  note on nitrogen content: Total N content on a dry matter basis. Weighted average of beef cattle liquid manure (0.0425 kg N/kg dm) and dairy cattle liquid manure (0.03611 kg N/kg dm) considering that N supply in central and peripherical agricultural regions is for 89% from dairy and 11% from beef cattle (MAPAQ, 2013). N content from Parent and Gagné (2013).
- manure, liquid, swine: 0.38186 kg; name MANURE_LIQUID_SWINE; lognormal variance with pedigree 0.0099, pedigree (2,2,4,1,2)
  Amount of 0.38186 kg of manure, liquid, swine is needed when producing 1kg of maize grain.
  Amount is determined from the organic nutrient actually used for the crop (CECPA, 2011) and from data about organic fertilizer production, by type, in Québec (MAPAQ, 2013). See details for disaggregation in supporting documentation '01 crop production - Québec.pdf' available on ecoinvent reports web page (https://ecoquery.ecoinvent.org/File/Reports).
  property water in wet mass 0.95 kg; name MANURE_LIQUID_SWINE_WWM
  properties: carbon content, non-fossil 0.64, dry mass 0.05 kg, nitrogen content 0.1, water content 19, wet mass 1 kg
- manure, solid, cattle: 0.091234 kg; name MANURE_SOLID_CATTLE; lognormal variance with pedigree 0.0099, pedigree (2,2,4,1,2)
  Amount of 0.091234 kg of manure, solid, cattle is needed when producing 1kg of maize grain.
  Amount is determined from the organic nutrient actually used for the crop (CECPA, 2011) and from data about organic fertilizer production, by type, in Québec (MAPAQ, 2013). See details for disaggregation in supporting documentation '01 crop production - Québec.pdf' available on ecoinvent reports web page (https://ecoquery.ecoinvent.org/File/Reports).
  property water in wet mass 0.78 kg; name MANURE_SOLID_CATTLE_WWM
  properties: carbon content, non-fossil 0.441, dry mass 0.22 kg, nitrogen content 0.02734, water content 3.5454, wet mass 1 kg
  note on nitrogen content: Total N content on a dry matter basis. Weighted average of beef cattle solid manure (0.02639 kg N/kg dm) and dairy cattle solid manure (0.02789 kg N/kg dm) considering that N supply in central and peripherical agricultural regions is about 63% from dairy and 37% from beef cattle (MAPAQ, 2013). N content from Parent and Gagné (2013).
- metolachlor: 4.8539e-5 kg; lognormal variance with pedigree 0.0414, pedigree (1,2,5,3,2)
  (same comment as for atrazine)
  properties: carbon content, fossil 0.633803, dry mass 1 kg, wet mass 1 kg
- packaging, for fertilisers: 0.0951211 kg; lognormal variance with pedigree 0.0592, pedigree (4,3,4,5,4)
  Total amount of active substance/s of fertilisers needed for the production of 'maize grain' is calculated to be circa 4.76E-02 kg. Fertiliser/s used in this dataset is/are: 'ammonia, liquid', 'ammonium nitrate, as N', 'ammonium sulfate, as N', 'lime', 'nitrogen fertiliser, as N', 'phosphate fertiliser, as P2O5', 'potassium chloride, as K2O', 'potassium sulfate, as K2O', 'urea, as N'. The total amount of active substance/s is doubled in order to account for the packaging of the dilluted product of fertiliser/s that is/are applied. Therefore, 9.51E-02 kg of packaging for fertilisers is justified with this exchange.
  properties: carbon content, fossil 0.825301, dry mass 1 kg, heating value, net 25.01 MJ, price 0.0642 EUR2005, wet mass 1 kg
  note on carbon content, fossil: Considering a chemical formula (C2H4)n for polyethylene, carbon content-fossil is calculated to be 0.856286 kg of Carbon per kg of dry mass.
- packaging, for pesticides: 0.00042652 kg; lognormal variance with pedigree 0.0592, pedigree (4,3,4,5,4)
  Total amount of active substance/s of pesticides needed for the production of maize grain is calculated to be circa 2.13E-04 kg. Pesticide/s used in this dataset is/are: '[thio]carbamate-compound', 'atrazine', 'benzoic-compound', 'dimethenamide', 'glyphosate', 'metolachlor', 'pendimethalin', 'pesticide, unspecified', 'pyrethroid-compound'. The total amount of active substance/s is doubled in order to account for the packaging of the dilluted product of pesticide/s that is/are applied. Therefore, 4.27E-04 kg of packaging for pesticides is justified with this exchange.
  properties: carbon content, fossil 0.85714, dry mass 1 kg, heating value, net 25.97 MJ, price 0.0642 EUR2005, wet mass 1 kg
- pendimethalin: 5.7303e-6 kg; lognormal variance with pedigree 0.0414, pedigree (1,2,5,3,2)
  (same comment as for atrazine)
  properties: carbon content, fossil 0.55516, dry mass 1 kg, wet mass 1 kg
- pesticide, unspecified: 8.54705e-6 kg; lognormal variance with pedigree 0.0414, pedigree (1,2,5,3,2)
  8,5393E-06 kg herbicide, unspecified; 3,2584E-09 kg insecticide, unspecified, and 4,4944E-09 fungicide, unspecified. They account for 4%, 2% and 6% of herbicides, insecticides and fungicides inputs, respectively. See supporting documentation '01 crop production - Québec.pdf' available on ecoinvent reports web page (https://ecoquery.ecoinvent.org/File/Reports).
  properties: carbon content, fossil 0.486978, dry mass 1 kg, wet mass 1 kg
  note on carbon content, fossil: Mean of C content in all pesticides whose formula has been documented in Sutter 2010
- potassium chloride: 0.00454753 kg; lognormal variance with pedigree 0.0099, pedigree (2,2,4,1,2)
  The exchange has been updated from 'potassium chloride, as K2O' into 'potassium chloride' and therefore its amount has been scaled (multiplied) from 0.0029 kg by 1.5829 kg of 'potassium chloride' per kg of 'potassium chloride, as K2O'. Original comment of the exchange is: Amount is determined from the mineral nutrient used for the crop and from the overall mineral fertilizers sales, by type of fertilizer, in Québec for agriculture (APNC, 2010). See details for disaggregation in supporting documentation '01 crop production - Québec.pdf' available on ecoinvent reports web page (https://ecoquery.ecoinvent.org/File/Reports).
  The potash domestic market in Canada is supplied almost exclusively by domestic production and Quebec resellers of potassium chloride have a preferential trade agreement for supplying fertilizer from Canadian producers. Hence, potassium chloride used in quebec does not rely on the global market and a direct link to Canadian potassium chloride is used. Sources: 1) personnal communication with Gilles Lavoie from the Quebec Professional Association in Crop Nutrition and the Coop Fédérée Inc. (2013); 2) Temple Scott Associates inc. (2013). Fertilizer report for the Canadian Fertilizer Industry. April 5, 2013, 10 p. http://www.cfi.ca/_documents/Fertilizer%20Industry%20Report-%20FINAL.pdf
  properties: dry mass 1 kg, wet mass 1 kg
- potassium sulfate: 0.000505327 kg; lognormal variance with pedigree 0.0099, pedigree (2,2,4,1,2)
  The exchange has been updated from 'potassium sulfate, as K2O' into 'potassium sulfate' and therefore its amount has been scaled (multiplied) from 0.0003 kg by 1.85 kg of 'potassium sulfate' per kg of 'potassium sulfate, as K2O'.
  properties: dry mass 1 kg, wet mass 1 kg
- poultry manure, fresh: 0.027871 kg; lognormal variance with pedigree 0.0099, pedigree (2,2,4,1,2)
  Amount of 0.027871 kg of manure, solid, cattle is needed when producing 1kg of maize grain.
  Amount is determined from the organic nutrient actually used for the crop (CECPA, 2011) and from data about organic fertilizer production, by type, in Québec (MAPAQ, 2013). See details for disaggregation in supporting documentation '01 crop production - Québec.pdf' available on ecoinvent reports web page (https://ecoquery.ecoinvent.org/File/Reports).
  properties: carbon content, non-fossil 0.33389, dry mass 0.38 kg, nitrogen content 0.04044, water content 1.63158, wet mass 1 kg
- pyrethroid-compound: 6.2921e-8 kg; lognormal variance with pedigree 0.0414, pedigree (1,2,5,3,2)
  Tefluthrin. See supporting documentation '01 crop production - Québec.pdf' available on ecoinvent reports web page (https://ecoquery.ecoinvent.org/File/Reports).
  properties: carbon content, fossil 0.623, dry mass 1 kg, wet mass 1 kg
  note on carbon content, fossil: C content of pyrethroid-compounds was calculated as an unweigthed average of C content of the substances: cypermethrin, alpha-cypermethrin,beta-cyfluthrin, lambdacyhalothrin. Those substances are classified as pyrethroid-compounds in Tab 2.25, Sutter 2010
- solid manure loading and spreading, by hydraulic loader and spreader: 0.119104 kg; lognormal variance with pedigree 0.0099, pedigree (2,2,4,1,2)
  Calculated from solid manure input rate and crop yield.
- sowing: 0.00011251 ha; lognormal variance with pedigree 0.0099, pedigree (2,2,4,1,2)
  (same comment as for atrazine)
- tillage, ploughing: 0.0001136 ha; lognormal variance with pedigree 0.0099, pedigree (2,2,4,1,2)
  (same comment as for atrazine)
- tillage, rotary cultivator: 0.00016333 ha; lognormal variance with pedigree 0.0099, pedigree (2,2,4,1,2)
  2 passes. See supporting documentation '01 crop production - Quebec.pdf' available on ecoinvent reports web page (https://ecoquery.ecoinvent.org/File/Reports).
- transport, tractor and trailer, agricultural: 0.0283998 metric ton*km; lognormal variance with pedigree 0.1293, pedigree (2,2,4,1,2)
  Transport of harvested material from field to road and from road to farm or local drying centre, and transport of inputs from farm to field (assuming 15 km). See supporting documentation '01 crop production - Québec.pdf' available on ecoinvent reports web page (https://ecoquery.ecoinvent.org/File/Reports).
- urea: 0.018461 kg; name UREA_N; lognormal variance with pedigree 0.0099, pedigree (2,2,4,1,2)
  The exchange has been updated from 'urea, as N' into 'urea' and therefore its amount has been scaled (multiplied) from 0.0086 kg by 2.1438 kg of 'urea' per kg of 'urea, as N'. Original comment of the exchange is: Amount is determined from the mineral nutrient actually used for the crop (CECPA, 2011) and from the overall mineral fertilizers sales, by type of fertilizer, in Québec for agriculture (APNC, 2010). See details for disaggregation in supporting documentation '01 crop production - Québec.pdf' available on ecoinvent reports web page (https://ecoquery.ecoinvent.org/File/Reports).
  properties: carbon content, fossil 0.2, dry mass 1 kg, wet mass 1 kg

## Inputs from nature
- Carbon dioxide, in air [natural resource, in air]: 1.47565 kg; = 44/12 * (REF_PRODUCT_C_content_non_fossil * REF_PRODUCT * REF_PRODUCT_DM - SEED_C_content_non_fossil * SEED * REF_PRODUCT_DM); lognormal variance with pedigree 0.008, pedigree (1,1,4,1,1)
  Calculated value, see chapter 'CO2 binding' in '01 crop production-direct field emissions natural resources v1.2.pdf' available on ecoinvent reports web page (https://ecoquery.ecoinvent.org/File/Reports). The 44/12 ratio is the stoichiometric mass ratio of carbon dioxide to carbon.
- Energy, gross calorific value, in biomass [natural resource, biotic]: 15.91 MJ; lognormal variance with pedigree 0.1313, pedigree (3,3,4,3,5)
  Estimated to be the same as in case of 'maize grain production'/ GLO.
- Occupation, annual crop, non-irrigated, intensive [natural resource, land]: 0.902247 m2*year; = OCCUP_period * (1 / (yield_agriculture * UnitConversion(1, 'metric ton', 'kg'))) * UnitConversion(1, 'ha', 'm2'); lognormal variance with pedigree 0.008, pedigree (1,1,4,1,1)
  Calculated value. See Exchange Properties and Parameters.
  property occupation period 0.803 year; name OCCUP_period
- Transformation, from annual crop, non-irrigated, intensive [natural resource, land]: 1.1236 m2; = (1 / (yield_agriculture * UnitConversion(1, 'metric ton', 'kg'))) * UnitConversion(1, 'ha', 'm2'); lognormal variance with pedigree 0.008, pedigree (1,1,4,1,1)
  Calculated value. See Parameters.
- Transformation, to annual crop, non-irrigated, intensive [natural resource, land]: 1.1236 m2; = (1 / (yield_agriculture * UnitConversion(1, 'metric ton', 'kg')))*UnitConversion(1, 'ha', 'm2'); lognormal variance with pedigree 0.008, pedigree (1,1,4,1,1)
  Calculated value. See Parameters.

## Emissions to nature
- Ammonia [air, non-urban air or from high stacks]: 0.00377186 kg; lognormal variance with pedigree 0.0173, pedigree (2,2,4,1,2)
  NH3 from mineral fertilisers are calculated with the emission factors published in the EMEP guidelines from the European Environment Agency (EEA, 2013). NH3 from manure are calculated according to the caracteristics of every manure, and to Quebec figures for period and method of maqnure application, and delay before incorporation of manure into the soil (Parent et Gagné, 2010; 2013). See supporting documentation '01 crop production - Québec.pdf' available on ecoinvent reports web page (https://ecoquery.ecoinvent.org/File/Reports).
- Atrazine [air, non-urban air or from high stacks]: 3.6912e-7 kg; source Dijkman, T.J. 2012; lognormal variance with pedigree 0.0813, pedigree (2,2,5,1,2)
  Modelled with PestLCI 2.0. See supporting documentation '01 crop production - Québec.pdf' available on ecoinvent reports web page (https://ecoquery.ecoinvent.org/File/Reports).
- Carbaryl [air, non-urban air or from high stacks]: 1.7292e-8 kg; source Dijkman, T.J. 2012; lognormal variance with pedigree 0.0813, pedigree (2,2,5,1,2)
  (same comment as for Atrazine)
- Carbon dioxide, fossil [air, non-urban air or from high stacks]: 0.0226266 kg; = UREA_N*0.466461632733939*1.571 +LIME_CaCO3*0.44; lognormal variance with pedigree 0.008, pedigree (1,1,4,1,1)
  Carbon dioxide emissions from limestone and urea application calculated from C content (IPCC, 2006). Emission factors are EF=1.57 kg CO2/kg N for urea, and EF=0.44 kg CO2/kg CaCO3 for limestone. See supporting documentation '01 crop production - Quebec.pdf' available on ecoinvent reports web page (https://ecoquery.ecoinvent.org/File/Reports).
- Dicamba [air, non-urban air or from high stacks]: 9.6112e-7 kg; source Dijkman, T.J. 2012; lognormal variance with pedigree 0.0813, pedigree (2,2,5,1,2)
  (same comment as for Atrazine)
- Dimethenamide [air, non-urban air or from high stacks]: 6.0169e-8 kg; source Dijkman, T.J. 2012; lognormal variance with pedigree 0.0813, pedigree (2,2,5,1,2)
  (same comment as for Atrazine)
- Dinitrogen monoxide [air, non-urban air or from high stacks]: 0.000999866 kg; name N2O; source Rochette, P. 2008; lognormal variance with pedigree 0.0393, pedigree (2,2,4,1,2)
  Direct and indirect N2O emissions from all sources of N input (fertilizers, above- and below-ground crop residues). Modelled with Québec conditions using the Tier 2 approach (IPCC 2006; Rochette et al. 2008; Little et al. 2008, 2013). See supporting documentation '01 crop production - Quebec.pdf' available on ecoinvent reports web page (https://ecoquery.ecoinvent.org/File/Reports).
- Glyphosate [air, non-urban air or from high stacks]: 2.5888e-7 kg; source Dijkman, T.J. 2012; lognormal variance with pedigree 0.0813, pedigree (2,2,5,1,2)
  (same comment as for Atrazine)
- Metolachlor [air, non-urban air or from high stacks]: 2.8638e-7 kg; source Dijkman, T.J. 2012; lognormal variance with pedigree 0.0813, pedigree (2,2,5,1,2)
  (same comment as for Atrazine)
- Nitrogen oxides [air, non-urban air or from high stacks]: 0.000759131 kg; lognormal variance with pedigree 0.0173, pedigree (2,2,4,1,2)
  Calculated with an emission factor (EF=0.012 kg NO-N/kg N ) from total N application less NH3-N lost through volatilization. Conversion from NO-N to NO2 with factor=46/14. See supporting documentation '01 crop production - Quebec.pdf' available on ecoinvent reports web page (https://ecoquery.ecoinvent.org/File/Reports).
  property emission ratio 0.21 kg/kg; name NOx_to_N2O
- Pendimethalin [air, non-urban air or from high stacks]: 3.3236e-7 kg; source Dijkman, T.J. 2012; lognormal variance with pedigree 0.0813, pedigree (2,2,5,1,2)
  (same comment as for Atrazine)
- Pyraclostrobin [air, non-urban air or from high stacks]: 2.411e-10 kg; source Dijkman, T.J. 2012; lognormal variance with pedigree 0.0813, pedigree (2,2,5,1,2)
  (same comment as for Atrazine)
- Tefluthrin [air, non-urban air or from high stacks]: 1.5416e-8 kg; source Dijkman, T.J. 2012; lognormal variance with pedigree 0.0813, pedigree (2,2,5,1,2)
  (same comment as for Atrazine)
- Water [air, non-urban air or from high stacks]: 0.000442862 m3; = ((MANURE_LIQUID_CATTLE* MANURE_LIQUID_CATTLE_WWM) + (MANURE_LIQUID_SWINE* MANURE_LIQUID_SWINE_WWM) + (MANURE_SOLID_CATTLE* MANURE_SOLID_CATTLE_WWM))* fraction_PW_to_air* UnitConversion(1, 'l', 'm3')
  Calculated value; See Parameters. Water emitted from: irrigated water (if any), process water.
- Water [air, unspecified]: 0.146667 m3; = EVAP_WATER; lognormal variance with pedigree 0.008, pedigree (1,1,4,1,1)
  Calculated value. Evaporated water from the drying of the grains.
- Atrazine [soil, agricultural]: 5.856e-5 kg; lognormal variance with pedigree 0.0743, pedigree (2,2,5,1,2)
  (same comment as for Atrazine)
- Cadmium II [soil, agricultural]: -6.8235e-8 kg
  Calculated value. See supporting documentation '01 crop production - Québec.pdf' available on ecoinvent reports web page (https://ecoquery.ecoinvent.org/File/Reports).
- Carbaryl [soil, agricultural]: 7.3475e-8 kg; lognormal variance with pedigree 0.0743, pedigree (2,2,5,1,2)
  (same comment as for Atrazine)
- Chromium III [soil, agricultural]: -1.5719e-6 kg
  (same comment as for Cadmium II)
- Copper ion [soil, agricultural]: 8.217e-6 kg; lognormal variance with pedigree 0.0887, pedigree (5,2,4,1,2)
  (same comment as for Cadmium II)
- Dicamba [soil, agricultural]: 9.0429e-6 kg; lognormal variance with pedigree 0.0743, pedigree (2,2,5,1,2)
  (same comment as for Atrazine)
- Dimethenamide [soil, agricultural]: 6.997e-6 kg; lognormal variance with pedigree 0.0743, pedigree (2,2,5,1,2)
  (same comment as for Atrazine)
- Fungicides, unspecified [soil, agricultural]: 4.4944e-9 kg; lognormal variance with pedigree 0.0446, pedigree (2,2,5,1,2)
  No possible elementary flow. Because of lack of information on the active ingredient, assumed entirely emitted to soil.
- Glyphosate [soil, agricultural]: 6.9557e-5 kg; lognormal variance with pedigree 0.0743, pedigree (2,2,5,1,2)
  (same comment as for Atrazine)
- Herbicides, unspecified [soil, agricultural]: 8.5393e-6 kg; lognormal variance with pedigree 0.0446, pedigree (2,2,5,1,2)
  (same comment as for Fungicides, unspecified)
- Insecticides, unspecified [soil, agricultural]: 3.2584e-9 kg; lognormal variance with pedigree 0.0446, pedigree (2,2,5,1,2)
  (same comment as for Fungicides, unspecified)
- Lead II [soil, agricultural]: -2.3505e-6 kg
  (same comment as for Cadmium II)
- Metolachlor [soil, agricultural]: 4.8167e-5 kg; lognormal variance with pedigree 0.0743, pedigree (2,2,5,1,2)
  (same comment as for Atrazine)
- Nickel II [soil, agricultural]: -8.3843e-6 kg
  (same comment as for Cadmium II)
- Pendimethalin [soil, agricultural]: 5.3687e-6 kg; lognormal variance with pedigree 0.0743, pedigree (2,2,5,1,2)
  (same comment as for Atrazine)
- Pyraclostrobin [soil, agricultural]: 6.4924e-8 kg; lognormal variance with pedigree 0.0743, pedigree (2,2,5,1,2)
  (same comment as for Atrazine)
- Tefluthrin [soil, agricultural]: 4.7506e-8 kg; lognormal variance with pedigree 0.0743, pedigree (2,2,5,1,2)
  (same comment as for Atrazine)
- Zinc II [soil, agricultural]: -8.8096e-6 kg
  (same comment as for Cadmium II)
- Atrazine [water, ground-]: 2.0744e-6 kg; source Dijkman, T.J. 2012; lognormal variance with pedigree 0.0813, pedigree (2,2,5,1,2)
  (same comment as for Atrazine)
- Atrazine [water, surface water]: 8.023e-9 kg; source Dijkman, T.J. 2012; lognormal variance with pedigree 0.0813, pedigree (2,2,5,1,2)
  (same comment as for Atrazine)
- Cadmium II [water, surface water]: 1.6463e-7 kg; lognormal variance with pedigree 0.0887, pedigree (5,2,4,1,2)
  (same comment as for Cadmium II)
- Carbaryl [water, ground-]: 2.4118e-10 kg; source Dijkman, T.J. 2012; lognormal variance with pedigree 0.0813, pedigree (2,2,5,1,2)
  (same comment as for Atrazine)
- Carbaryl [water, surface water]: 3.0034e-12 kg; source Dijkman, T.J. 2012; lognormal variance with pedigree 0.0813, pedigree (2,2,5,1,2)
  (same comment as for Atrazine)
- Chromium III [water, surface water]: 7.2997e-6 kg; lognormal variance with pedigree 0.0887, pedigree (5,2,4,1,2)
  (same comment as for Cadmium II)
- Copper ion [water, surface water]: 5.3668e-6 kg; lognormal variance with pedigree 0.0887, pedigree (5,2,4,1,2)
  (same comment as for Cadmium II)
- Dicamba [water, ground-]: 2.1983e-7 kg; source Dijkman, T.J. 2012; lognormal variance with pedigree 0.0813, pedigree (2,2,5,1,2)
  (same comment as for Atrazine)
- Dicamba [water, surface water]: 8.7933e-10 kg; source Dijkman, T.J. 2012; lognormal variance with pedigree 0.0813, pedigree (2,2,5,1,2)
  (same comment as for Atrazine)
- Dimethenamide [water, ground-]: 2.1236e-8 kg; source Dijkman, T.J. 2012; lognormal variance with pedigree 0.0813, pedigree (2,2,5,1,2)
  (same comment as for Atrazine)
- Dimethenamide [water, surface water]: 2.6545e-10 kg; source Dijkman, T.J. 2012; lognormal variance with pedigree 0.0813, pedigree (2,2,5,1,2)
  (same comment as for Atrazine)
- Glyphosate [water, ground-]: 2.0854e-6 kg; source Dijkman, T.J. 2012; lognormal variance with pedigree 0.0813, pedigree (2,2,5,1,2)
  (same comment as for Atrazine)
- Glyphosate [water, surface water]: 9.3124e-9 kg; source Dijkman, T.J. 2012; lognormal variance with pedigree 0.0813, pedigree (2,2,5,1,2)
  (same comment as for Atrazine)
- Lead II [water, surface water]: 2.4898e-6 kg; lognormal variance with pedigree 0.0887, pedigree (5,2,4,1,2)
  (same comment as for Cadmium II)
- Metolachlor [water, ground-]: 8.4944e-8 kg; source Dijkman, T.J. 2012; lognormal variance with pedigree 0.0813, pedigree (2,2,5,1,2)
  (same comment as for Atrazine)
- Metolachlor [water, surface water]: 1.1649e-9 kg; source Dijkman, T.J. 2012; lognormal variance with pedigree 0.0813, pedigree (2,2,5,1,2)
  (same comment as for Atrazine)
- Nickel II [water, surface water]: 9.1312e-6 kg; lognormal variance with pedigree 0.0887, pedigree (5,2,4,1,2)
  (same comment as for Cadmium II)
- Nitrate [water, ground-]: 0.0237396 kg; lognormal variance with pedigree 0.0493, pedigree (2,2,4,1,2)
  Modelled with the 'SQCB-NO3 model' described in '01 crop production-direct field emissions natural resources v1.2.pdf' available on ecoinvent reports web page (https://ecoquery.ecoinvent.org/File/Reports). Québec average conditions are considered for the SQCB-NO3 model input parameters (see supporting documentation '01 crop production - Québec.pdf' available on ecoinvent reports web page (https://ecoquery.ecoinvent.org/File/Reports)).
- Pendimethalin [water, ground-]: 2.9225e-8 kg; source Dijkman, T.J. 2012; lognormal variance with pedigree 0.0813, pedigree (2,2,5,1,2)
  (same comment as for Atrazine)
- Pendimethalin [water, surface water]: 4.8994e-11 kg; source Dijkman, T.J. 2012; lognormal variance with pedigree 0.0813, pedigree (2,2,5,1,2)
  (same comment as for Atrazine)
- Phosphate [water, surface water]: 0.00013927 kg; source Michaud, A.R. 2008; lognormal variance with pedigree 0.0493, pedigree (2,2,4,1,2)
  Modelled with Québec conditions with the 'ODEP model' (Michaud et al., 2008). See supporting documentation '01 crop production - Quebec.pdf' available on ecoinvent reports web page (https://ecoquery.ecoinvent.org/File/Reports).
  property carbon content, fossil 0; name C_content_fossil
  property carbon content, non-fossil 0; name C_content_non_fossil
  property dry mass 1 kg; name DM
  property water content 0; name water_content
  property water in wet mass 0 kg; name WWM
  property wet mass 1 kg; name WM
- Phosphorus [water, surface water]: 0.00016341 kg; source Michaud, A.R. 2008; lognormal variance with pedigree 0.0493, pedigree (2,2,4,1,2)
  (same comment as for Phosphate)
- Pyraclostrobin [water, ground-]: 2.9652e-12 kg; source Dijkman, T.J. 2012; lognormal variance with pedigree 0.0813, pedigree (2,2,5,1,2)
  (same comment as for Atrazine)
- Pyraclostrobin [water, surface water]: 4.7899e-14 kg; source Dijkman, T.J. 2012; lognormal variance with pedigree 0.0813, pedigree (2,2,5,1,2)
  (same comment as for Atrazine)
- Tefluthrin [water, ground-]: 7.5506e-14 kg; source Dijkman, T.J. 2012; lognormal variance with pedigree 0.0813, pedigree (2,2,5,1,2)
  (same comment as for Atrazine)
- Tefluthrin [water, surface water]: 1.2584e-15 kg; source Dijkman, T.J. 2012; lognormal variance with pedigree 0.0813, pedigree (2,2,5,1,2)
  (same comment as for Atrazine)
- Water [water, ground-]: 0.000220389 m3; = ((MANURE_LIQUID_CATTLE* MANURE_LIQUID_CATTLE_WWM) + (MANURE_LIQUID_SWINE* MANURE_LIQUID_SWINE_WWM) + (MANURE_SOLID_CATTLE* MANURE_SOLID_CATTLE_WWM))* (1-fraction_PW_to_air)*(1- fraction_PWtoW_to_surface_water)* UnitConversion(1, 'l', 'm3')
  (same comment as for Water)
- Water [water, surface water]: 5.50973e-5 m3; = ((MANURE_LIQUID_CATTLE* MANURE_LIQUID_CATTLE_WWM) + (MANURE_LIQUID_SWINE* MANURE_LIQUID_SWINE_WWM) + (MANURE_SOLID_CATTLE* MANURE_SOLID_CATTLE_WWM))* (1-fraction_PW_to_air)*fraction_PWtoW_to_surface_water* UnitConversion(1, 'l', 'm3')
  (same comment as for Water)
- Zinc II [water, surface water]: 3.0089e-5 kg; lognormal variance with pedigree 0.0887, pedigree (5,2,4,1,2)
  (same comment as for Cadmium II)

## Sampling procedure
Literature and statistics data, opinions of experts in the field of agricultural production and agroeconomists.

## Extrapolations
Transports are modelled with standard distances. Machine usage is modelled with Québec diesel consumptions and field works (Beauregard, 2013) and Swiss machines. Mineral fertilizer types are extrapolated from overall mineral fertilizers sales in Québec (APNC 2011). Organic fertilizer types are extrapolated from animal manure supply data, per region in Québec, communicated by the Ministry of Agriculture (MAPAQ). Data about agricultural management practices are from BPR (2008. Suivi 2007 du Portrait agroenvironnemental des fermes du Québec). Emissions are calculated with standard methods according to ecoinvent documentation (Nemecek and Schnetzer, 2011. '01 crop production-direct field emissions natural resources' v1.2, August 2011, available at https://ecoquery.ecoinvent.org/File/Reports) and the World Food LCA Database guidelines (Nemecek et al. 2014, available at http://www.quantis-intl.com/microsites/wfldb/), except for : 1) pesticides emitted fractions (modelled using PestLCI 2.0, a global model, considering Québec average conditions for model input parameters, and considering that the degradation/uptake fraction calculated by PestLCI is actually emitted to soil - see the supporting documentation '01 crop production - Québec.pdf' for rationale), 2) phosphorus and phosphate emissions (modelled using ODEP, a Québec model, considering geospatialized weighted average conditions for soil, hydrology, and agricultural management practices), and 3) ammonia emissions from organic fertilizers which are calculated according to Québec conditions and agricultural management practices (coefficients are taken from Parent et Gagné (2010 and 2013 update). Furthermore, an IPCC Tier 2 approach is used for N2O emissions using regional and ecodistrict-based emission factors (Rochette et al., 2008). Due to lack of comprehensive data on pesticides use for Québec, data from a 2008 survey in the neighbouring province of Ontario are used (OMAFRA, 2008). Uncertainty in terms of the variance of the logtransformed data is the default value as provided by the Data Quality Guidelines for ecoinvent v3 (available at http://www.ecoinvent.org/support/documents-and-files/). Details on modelling and calculations are reported in the supporting documentation '01 crop production - Québec.pdf' available on ecoinvent reports web page (<https://ecoquery.ecoinvent.org/File/Reports>).

## Review by Emilia Moreno Ruiz 2015-10-13
activity links to CA-QC machinery added
