# tuna, capture by purse seiner and landing whole, frozen

Dataset: EcoSpold 2, unit process
Geography: RoW
Time period: 2012-01-01 to 2023-12-31
Technology level: current
Classification: ISIC rev.4 ecoinvent: 0311:Marine fishing
Scenario: Business-as-Usual
System model: Allocation, cut-off by classification
Generated by: Angel Avadí
Published in: Avadí, A. 2018
Database: ecoinvent
isCopyrightProtected: false
accessRestrictedTo: 1

## General comment
This activity represents capture and landing of Pacific tunas by purse seining. The life cycle inventories were produced for one of the largest Ecuadorean tuna fishing and processing companies, featuring a vertically-integrated tuna fleet. Data from a 13-vessel fleet owned and operated by the company were extrapolated to characterise the whole Ecuadorian tuna fleet of 107 purse seiners. The Ecuadorian tuna fleet operates in the EPO, roughly corresponding to the FAO catch zone 87. This fleet represented in 2008 roughly 44 % of the Eastern Pacific Ocean (EPO) purse seiner fleet and 17 % of the global tuna purse seiner fleet. In 2013, the Ecuadorian fleet represented 38 % of the EPO tuna fleet and landed 42 % of that year’s 554,000-t captures in the EPO. It targets three main tuna species: yellowfin (Thunnus albacares), skipjack (Katsuwonus pelamis) and bigeye (Thunnus obesus). The resulting inventory is representative of the Ecuadorian tuna fishery, and of global tuna fisheries using purse seining.
System boundaries and relation between activities

## Included activities start
From vessel use and maintenance phases, including all upstream activities

## Geography
Tuna is captured both in Ecuador’s exclusive economic zone, which includes the Galapagos Islands, and in international Eastern Pacific Ocean waters (26 and 74 % of captures, respectively).

## Technology
Current technology deployed in Ecuador includes helicopter spotters used by some of the largest vessels, purse seining based on three types of sets: non-associated with other species (35 %), using fish aggregation devices (FADs, 60 %) and associated with dolphins (5 %); and freezing on-board. Fuel used by spotters is included in the inventory.

## Time period
Data corresponds to the landings-weighted average of annual opperation for 2012 and 2013.

## Parameters
- annual landings per vessel: 2.328e6 kg; name landings_vessel_year; triangular min 762000, mostLikely 2.328e6, max 4.9e6, pedigree (1,4,1,1,1)
  Average annual landings per individual vessel
  Uncertainty: Based on 25 datapoints from 13 vessels in 2012-2013. Avadí et al (2015) Life cycle assessment of Ecuadorian processed tuna
- light ship weight: 510000 kg; name Weight_vessel
  Weight of the vessel without any load or fishing tackle
- marine fuel use efficiency: 691.9 kg; name FUE; triangular min 409.2, mostLikely 691.9, max 1163.8, pedigree (2,4,1,1,1)
  Amount of marine fuel consumed per landed unit of fish
  Uncertainty: Based on 25 datapoints from 13 vessels in 2012-2013. Expressed in kg/t. Avadí et al (2015) Life cycle assessment of Ecuadorian processed tuna
- net calorific value: 42.7 MJ/kg; name net_cal_value; triangular min 41.4, mostLikely 42.7, max 43.3, pedigree (3,5,3,5,5)
  Net calorific value of marine diesel oil (MDO)
  Uncertainty: Most likely value from Wild (2005) Determination of energy cost of electrical energy on board sea-going vessels: "The net calorific value of marine diesel oil (MDO) and marine gas oil (MGO) is 42,700 kJ/kg". Uncertainty data from 2006 IPCC Guidelines for National Greenhouse Gas Inventories, Vol 1, Table 1.2 Default net calorific values (NCVs) and lower and upper limits of the 95 percent confidence intervals (data for Gas/Diesel Oil)

## Reference product
- landed tuna, frozen, EPO: 1 kg; name landed; source Angel Avadí 2015; By-product classification allocatable product; CPC 21215: Tunas, skipjack or stripe-bellied bonito, frozen; HS2017 030345: Fish; frozen, Atlantic and Pacific bluefin tunas (Thunnus thynnus, Thunnus orientalis), excluding fillets, [...]
  Eastern Pacific Ocean (EPO)
  production volume 3.21762e8 kg; name prod_vol
    Total EPO captures in 2013, as reported in IATTC (2014) Fishery report 2014: EPO Tunas and billfishes fishery. Inter-American Tropical Tuna Commission (IATTC), Fisheries and Resources Monitoring System - FIRMS
  property ash content 0.015 kg; name landed_ash
    http://frida.fooddata.dk/ShowFood.php?foodid=713
  property carbon content, non-fossil 0.468522; name landed_C_content_non_fossil; = (1-landed_protein-landed_fat_content-landed_ash)*0.444+landed_protein*0.535+landed_fat_content*0.774
    Calculated from C_content = polysaccharids*0.444+protein*0.535+lipids*0.774 and polysaccharids = 1-(protein+lipids+ash)
  property dry mass 0.58548 kg; name landed_DM
  property energy content 5.811 MJ; name landed_energy_content
    http://www.fao.org/wairdocs/tan/x5916e/x5916e01.htm
  property fat content 0.025; name landed_fat_content
    http://www.fao.org/wairdocs/tan/x5916e/x5916e01.htm
  property price 2.14214 EUR2005
    Calculated value based on data from United Nations Commodity Trade Statistics Database (comtrade.un.org). UN comtrade category: 30349 Fish; frozen, tuna, n.e.c. in item no. 0303.4, excluding fillets, livers, roes, and other fish meat of heading 0304. Year 2014. Using exchange rate of 1EURO = 1.209 USD. Average of price of import into 4 main markets (EU, US, IN and CN).
  property protein content 0.252; name landed_protein
    http://www.fao.org/wairdocs/tan/x5916e/x5916e01.htm
  property water content 0.708; name landed_water_content
  property water in wet mass 0.41452 kg; name landed_WWM
  property wet mass 1 kg; name landed_WM
  properties: allocation factor 0.979592, carbon allocation 0.27431 kg, carbon content 0.468522, true value 2056.46

## Inputs from technosphere
- antifouling paint emissions: -0.000244898 kg; name antif; source Pierre Fréon 2014; triangular min -0.0002818, mostLikely -0.000241543, max -0.00021135, pedigree (1,4,1,5,1)
  Mass of solids from antifouling paint
  Uncertainty: Monthly data for 12 vessels over 2012-2013, for paint, plus estimations on emissions and assumptions on the paint ingredients
  production volume; = ABS(prod_vol*antif/landed)
    Calculated from production volume of reference product using the relative outputs.
  property dry mass 1 kg; name antif_DM
  property water content 0; name antif_water_content
  property water in wet mass 0 kg; name antif_WWM
  property wet mass 1 kg; name antif_WM
- carbon dioxide, liquid: 1.06468e-5 kg; source Angel Avadí 2015; triangular min 8.8723e-6, mostLikely 1.06468e-5, max 1.24212e-5, pedigree (1,4,4,5,1)
  Refrigeration gas
  Uncertainty: Monthly data for 3 vessels over 2012-2013
  properties: carbon content, fossil 0.272727, dry mass 1 kg, heating value, net 8.27 MJ, wet mass 1 kg
- carbon dioxide, liquid: 5.05777e-5 kg; source Angel Avadí 2015; triangular min 4.21481e-5, mostLikely 5.05777e-5, max 5.90074e-5, pedigree (1,4,4,5,1)
  Refrigeration gas
  Uncertainty: Monthly data for 3 vessels over 2012-2013
- chlorodifluoromethane: 7.65306e-8 kg; source Angel Avadí 2015; triangular min 5.40216e-8, mostLikely 8.10324e-8, max 9.45378e-8, pedigree (1,4,4,5,1)
  Refrigeration gas (freon, liquid)
  Uncertainty: Monthly data for 3 vessels over 2012-2013
  properties: carbon content, fossil 0.139535, dry mass 1 kg, heating value, net 5.61 MJ, wet mass 1 kg
- chlorodifluoromethane: 5.35714e-7 kg; source Angel Avadí 2015; triangular min 3.78151e-7, mostLikely 5.67227e-7, max 6.61765e-7, pedigree (1,4,4,5,1)
  Refrigeration gas (freon, liquid)
  Uncertainty: Monthly data for 3 vessels over 2012-2013
- diesel, burned in fishing vessel: 30.1471 MJ; = FUE*net_cal_value; source Angel Avadí 2015
  Combustion of diesel in marine engines. Average diesel use and combustion used for all energy needs onboard.
- lubricating oil: 0.00194596 kg; source Angel Avadí 2015; triangular min 0.00190095, mostLikely 0.00194714, max 0.00198978, pedigree (1,4,4,5,1)
  Lubricating oil for vessel engine
  Uncertainty: Monthly data for 12 vessels over 2012-2013
  properties: carbon content, fossil 0.75, dry mass 1 kg, heating value, net 40.2 MJ, wet mass 1 kg
  note on carbon content, fossil: Lubricating oil is produced from diesel. C-content/dry mass of fats and oils considered 75%, from: ecoinvent v2.2 report, n 15a, pg 40
  note on heating value, net: Literature value, Source: IPCC 2006, 2006 IPCC Guidelines for National Greenhouse Gas Inventories, Prepared by the National Greenhouse Gas Inventories Programme, Eggleston H.S., Buendia L., Miwa K., Ngara T. and Tanabe K. (eds). Published: IGES, Japan
- lubricating oil: 0.00923771 kg; source Angel Avadí 2015; triangular min 0.00902406, mostLikely 0.00924334, max 0.00944575, pedigree (1,4,4,5,1)
  Lubricating oil for vessel engine
  Uncertainty: Monthly data for 12 vessels over 2012-2013
- operation, reefer, freezing: 0.50102 kg*day; source Avadí, A. 2018; triangular min 0.495234, mostLikely 0.501361, max 0.506466, pedigree (3,3,4,1,1)
  Ecuadorian tuna purse seiners spend 1-3 months offshore before returning to port. The proportion of kg fish to be frozen per day is calculated for 30, 45 and 90 days.
  Uncertainty: Assuming a fishing trip duration between 30 and 90 days: 10.7 to 32 kg fish per day over the trip, accumulated over the trip duration and divided per day.
- purse seiner maintenance, steel: 0.00638694 kg; = Weight_vessel/(landings_vessel_year*lifetime)*1000; source Angel Avadí 2015
  Maintenance of a purse seiner, per 1000 kg of light ship weight (LSW) over 35 years lifetime. Regressions based on mainly primary data were created to relate the weight of each inventory item to a purse seiner's LSW. The list of inventory items (granularity) contribute >95% of environmental impacts, as described in the reference publication. Uncertainty data for annual landings per vessel described in the parameter definition
- purse seiner, steel: 0.00638694 kg; = Weight_vessel/(landings_vessel_year*lifetime)*1000; source Angel Avadí 2015
  Construction of a purse seiner, per 1000 kg of light ship weight (LSW). Regressions based on mainly primary data were created to relate the weight of each inventory item to a purse seiner's LSW. The list of inventory items (granularity) contribute >95% of environmental impacts, as described in the reference publication. Lifespan: 35 years; uncertainty data for annual landings per vessel described in the parameter definition
  property lifetime 35 year; name lifetime
  properties: lifetime capacity [h] 56000 hour
- waste mineral oil: -7.59965e-5, -0.00803786, -0.00306982 kg (3 suppliers, which the file names only by identifier); sum of these -0.0111837 kg; = oil; source Avadí, A. 2018
  Spent oil, treated onshore
  production volume; = ABS(prod_vol*oil/landed)
    Calculated from production volume of reference product using the relative outputs.
  properties: carbon content, fossil 0.864444, dry mass 0.9 kg, heating value, net 34.7 MJ, water content 0.111111, wet mass 1 kg
  note on carbon content, fossil: Tab A.6, ecoinvent v2.2 report 13_I. C content has been calculated after data in the tables, and then referred to 1 kg DM
  note on heating value, net: Value taken from the general comment of the treatment dataset.

## Inputs from nature
- Fish, pelagic, in ocean [natural resource, biotic]: 1.02041 kg; = landed+bycatch; source Angel Avadí 2015
  Fish biomass extracted from the ocean
  property ash content 0.015 kg; name fishp_ash
  property fat content 0.07; name fishp_fat
  property protein content 0.179; name fishp_protein

## Sampling procedure
13 vessels out of 107, over two years of operations. Sample belongs to a single company, representative of national operations. Extrapolated from Ecuadorian data, uncertainty adjusted accordingly
