# chlorodifluoromethane production

Dataset: EcoSpold 2, unit process
Geography: RoW
Time period: 1999-01-01 to 2023-12-31
Technology level: current
Classification: EcoSpold01Categories: chemicals/organics
Classification: ISIC rev.4 ecoinvent: 2011:Manufacture of basic chemicals
Synonyms: Fluorocarbon 22; Algeon 22; Freon 22; Freon R-22; HCFC-22; Isotron 22; R-22; Halocarbon 22; Fisherbrand histo freeze(TM)-22; Chlorodifluoromethane; Difluorochloromethane; Monochlorodifluoromethane; chlorodifluoromethane (R-22); Refrigerant R22
Tags: ConvertedDataset
Scenario: Business-as-Usual
System model: Allocation, cut-off by classification
Generated by: Niels Jungbluth
Published in: Althaus H.-J. 2007
Database: ecoinvent
isCopyrightProtected: true
accessRestrictedTo: 1

## General comment
Inventory for a chemical. Emissions of HFC-23 are much higher in the world wide average.
[This dataset was already contained in the ecoinvent database version 2. It was not individually updated during the transfer to ecoinvent version 3. Life Cycle Impact Assessment results may still have changed, as they are affected by changes in the supply chain, i.e. in other datasets. This dataset was generated following the ecoinvent quality guidelines for version 2. It may have been subject to central changes described in the ecoinvent version 3 change report (http://www.ecoinvent.org/database/ecoinvent-version-3/reports-of-changes/), and the results of the central updates were reviewed extensively. The changes added e.g. consistent water flows and other information throughout the database. The documentation of this dataset can be found in the ecoinvent reports of version 2, which are still available via the ecoinvent website. The change report linked above covers all central changes that were made during the conversion process.]

## Included activities end
Gate to gate inventory for the production in the Netherlands, estimation for infrastructure and not including by-products.

## Geography
Plant e.g. in NL

## Technology
Chemical processing

## Time period
Publication date

## Parameters
- fraction, process water, to air: 0.205 dimensionless; name fraction_PW_to_air; lognormal variance with pedigree 0.092025, pedigree (4,4,3,2,4)
- fraction, tap water, to air: 0.205 dimensionless; name fraction_TW_to_air; lognormal variance with pedigree 0.092025, pedigree (4,4,3,2,4)

## Reference product
- chlorodifluoromethane: 1 kg; By-product classification allocatable product; CPC 34110: Hydrocarbons and their halogenated, sulphonated, nitrated or nitrosated derivatives; HS2017 290379: Halogenated derivatives of acyclic hydrocarbons containing two or more different halogens; n.e.c. in item n[...]; CAS 75-45-6
  EcoSpold01Location=NL
  production volume 6.09875e8 kg
    Table 4 in B. R. Miller, M. Rigby, L. J. M. Kuijpers, P. B. Krummel, L. P. Steele, M. Leist, P. J. Fraser, A. McCulloch (2010): HFC-23 (CHF3) emission trend response to HCFC-22 (CHClF2) production and recent HFC-23 emission abatement measures. Atmospheric Chemisrry and Physics 10:7875–7890.
  property heating value, net 5.61 MJ
    LHV is calculated based on the elemental composition of the substance. Based on the CAS number of the substance (000075-45-6), the chemical formula of the substance is found to be: CHClF2, (PubChem 2020).
    Reference: Kim, S., Chen, J., Cheng, T., Gindulyte, A., He, J., He, S., Li, Q., Shoemaker, B. A., Thiessen, P. A., Yu, B., Zaslavsky, L., Zhang, J., & Bolton, E. E. (2019). PubChem 2019 update: improved access to chemical data. Nucleic acids research, 47(D1), D1102–D1109. https://doi.org/10.1093/nar/gky1033
  properties: carbon allocation 0.139535 kg, carbon content 0.139535, carbon content, fossil 0.139535, carbon content, non-fossil 0, dry mass 1 kg, price 1.57 EUR2005, water content 0, water in wet mass 0 kg, wet mass 1 kg

## Inputs from technosphere
- chemical factory, organics: 4e-10 unit; lognormal variance with pedigree 0.63, pedigree (5,5,5,5,5)
  EcoSpold01Location=RER
  Generic estimation
  Uncertainty: Generic estimation
- chloroform: 1.6 kg; lognormal variance with pedigree 0.0546, pedigree (3,3,5,5,1)
  Estimation based on literature values
  EcoSpold01Location=RER
  Uncertainty: Estimation based on literature values
  properties: carbon content, fossil 0.101695, dry mass 1 kg, heating value, net 4.06 MJ, wet mass 1 kg
- electricity, medium voltage: 0.000188339, 0.000281923, 8.90623e-5, 0.000972999, 0.00895323, 0.00115358, 0.0140122, 3.34191e-5, 0.279511, 0.0939149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 kWh (47 suppliers, which the file names only by identifier); sum of these 0.5 kWh; lognormal variance with pedigree 0.0546, pedigree (3,3,5,5,1)
  EcoSpold01Location=NL
  Literature 1998
  Uncertainty: Literature 1998
- heat, district or industrial, natural gas: 0.0307078, 1.86871, 0.00057749 MJ (3 suppliers, which the file names only by identifier); sum of these 1.9 MJ; lognormal variance with pedigree 0.0546, pedigree (3,3,5,5,1)
  EcoSpold01Location=RER
  Literature 1998
  Uncertainty: Literature 1998
  properties: heating value, net 1 MJ
- hydrogen fluoride: 0.55 kg; lognormal variance with pedigree 0.0546, pedigree (3,3,5,5,1)
  EcoSpold01Location=GLO
  Estimation based on literature values
  Uncertainty: Estimation based on literature values
  properties: dry mass 1 kg, heating value, net 6.06 MJ, wet mass 1 kg
- refinery sludge: -2.07956e-5, -0.0043792 kg (2 suppliers, which the file names only by identifier); sum of these -0.0044 kg; lognormal variance with pedigree 0.0208, pedigree (4,3,2,5,1)
  EcoSpold01Location=CH
  Chemical wastes, literature 1994
  Uncertainty: Chemical wastes, literature 1994
  production volume
    Calculated from the production volume of chlorodifluoromethane in proportion to the respective output amounts.
  properties: carbon content, fossil 0.767857, dry mass 0.105 kg, heating value, net 2.45 MJ, water content 8.52381, wet mass 1 kg
  note on carbon content, fossil: Tab A.6, ecoinvent v2.2 report 13_I. C content has been calculated after data in the tables, and then referred to 1 kg DM
  note on heating value, net: Value taken from the general comment of the treatment dataset.
- sodium hydroxide, without water, in 50% solution state: 0.0616 kg; lognormal variance with pedigree 0.062, pedigree (3,5,5,5,1)
  Calculation in literature
  EcoSpold01Location=RER
  Uncertainty: Calculation in literature
  properties: dry mass 1 kg, heating value, net 3.03 MJ, wet mass 1 kg
- sulfuric acid: 0.213 kg; lognormal variance with pedigree 0.062, pedigree (3,5,5,5,1)
  EcoSpold01Location=RER
  Calculation in literature
  Uncertainty: Calculation in literature
  properties: dry mass 1 kg, wet mass 1 kg
- tap water: 0.0019332, 0.002947, 0.00549896, 0.0148138, 0.00178318, 0.0743117, 0.00132527, 0.850387 kg (8 suppliers, which the file names only by identifier); sum of these 0.953 kg; lognormal variance with pedigree 0.062, pedigree (3,5,5,5,1)
  EcoSpold01Location=RER
  Calculation in literature
  Uncertainty: Calculation in literature
  properties: carbon content, fossil 0.00178991, dry mass 0.000337476 kg, water content 2962.17, wet mass 1 kg
  note on carbon content, fossil: Bicarbonate content is 2.93 mol/m3. CO2 content is 0.1 mol/m3 (ecoinvent v2.2 report 8, Tab 93.1).

## Emissions to nature
- Chlorodifluoromethane [air, urban air close to ground]: 0.0038 kg; lognormal variance with pedigree 0.096, pedigree (3,4,5,5,1)
  Range 0.38-5% of product, estimation for European plant.
  Uncertainty: Range 0.38-5% of product, estimation for European plant.
- Chloroform [air, urban air close to ground]: 0.0001 kg; lognormal variance with pedigree 0.0946, pedigree (3,3,5,5,1)
  Literature 1994
  Uncertainty: Literature 1994
- Dichlorodifluoromethane [air, urban air close to ground]: 0.00082 kg; lognormal variance with pedigree 0.0946, pedigree (3,3,5,5,1)
  Literature 1994
  Uncertainty: Literature 1994
- Dichlorofluoromethane [air, urban air close to ground]: 1.1e-5 kg; lognormal variance with pedigree 0.0946, pedigree (3,3,5,5,1)
  Data for European plant.
  Uncertainty: Data for European plant.
- Hydrochloric acid [air, urban air close to ground]: 0.0056 kg; lognormal variance with pedigree 0.102, pedigree (3,5,5,5,1)
  Calculation in literature
  Uncertainty: Calculation in literature
- Hydrogen fluoride [air, urban air close to ground]: 0.0031 kg; lognormal variance with pedigree 0.102, pedigree (3,5,5,5,1)
  Calculation in literature
  Uncertainty: Calculation in literature
- Trichlorofluoromethane [air, urban air close to ground]: 1.15e-5 kg; lognormal variance with pedigree 0.0946, pedigree (3,3,5,5,1)
  Literature 1994
  Uncertainty: Literature 1994
- Trifluoromethane [air, urban air close to ground]: 0.0035 kg; lognormal variance with pedigree 0.096, pedigree (3,4,5,5,1)
  Range 0.35-1.5% of product, estimation for European plant.
  Uncertainty: Range 0.35-1.5% of product, estimation for European plant.
- Water [air, unspecified]: 0.000195365 m3; name water_to_air_unspecified; lognormal variance with pedigree 0.0827, pedigree (2,2,5,5,1)
  Calculated value based on literature values and expert opinion. See comments in the parametres' comment field.
  property fraction, origin: fresh water 1; name fraction_origin_fresh_water
  property fraction, origin: salt water 0; name fraction_origin_salt_water
  property fraction, origin: unspecified 0; name fraction_origin_unspecified
- Antimony ion [water, surface water]: 3.6e-5 kg; lognormal variance with pedigree 0.7046, pedigree (3,3,5,5,1)
  Literature 1994
  Uncertainty: Literature 1994
- Chloride [water, surface water]: 0.0983 kg; lognormal variance with pedigree 0.712, pedigree (3,5,5,5,1)
  Calculation in literature
  Uncertainty: Calculation in literature
- Chloroform [water, surface water]: 1.1e-5 kg; lognormal variance with pedigree 0.3646, pedigree (3,3,5,5,1)
  Literature 1994
  Uncertainty: Literature 1994
- Hydrocarbons, unspecified [water, surface water]: 1e-6 kg; lognormal variance with pedigree 0.3646, pedigree (3,3,5,5,1)
  Literature 1994
  Uncertainty: Literature 1994
- Sodium I [water, surface water]: 0.0646 kg; lognormal variance with pedigree 0.712, pedigree (3,5,5,5,1)
  Calculation in literature
  Uncertainty: Calculation in literature
- Sulfate [water, surface water]: 0.278 kg; lognormal variance with pedigree 0.712, pedigree (3,5,5,5,1)
  Calculation in literature
  Uncertainty: Calculation in literature
- Water [water, unspecified]: 0.000757635 m3; name water_to_water_unspecified; lognormal variance with pedigree 0.0827, pedigree (2,2,5,5,1)
  (same comment as for Water)
  property carbon content, fossil 0; name C_content_fossil
  property carbon content, non-fossil 0; name C_content_non_fossil
  property dry mass 0 kg; name DM
  property fraction, origin: fresh water 1; name fraction_origin_fresh_water_Ww
  property fraction, origin: salt water 0; name fraction_origin_salt_water_Ww
  property fraction, origin: unspecified 0; name fraction_origin_unspecified_Ww
  property water in wet mass 1000 kg; name WWM
  property wet mass 1000 kg; name WM
- Zinc II [water, surface water]: 4.3e-6 kg; lognormal variance with pedigree 0.7046, pedigree (3,3,5,5,1)
  Literature 1994
  Uncertainty: Literature 1994

## Sampling procedure
Literature, company information, stoichiometric calculations, assumptions.

## Extrapolations
none This dataset has been copied from an original dataset covering the geography NL. The uncertainty has been adjusted accordingly.

## Review by Roland Hischier 2003-05-28
Passed.
