# combine harvesting, sweet corn

Dataset: EcoSpold 2, unit process
Geography: US
Time period: 2021-01-01 to 2023-12-31
Technology level: current
Classification: ISIC rev.4 ecoinvent: 0161:Support activities for crop production
Synonyms: sweet corn harvesting
Scenario: Business-as-Usual
System model: Allocation, cut-off by classification
Generated by: Juanita Barrera
Database: ecoinvent
isCopyrightProtected: true
accessRestrictedTo: 1

## General comment
This dataset models the service of combine harvesting for one hectare of sweet corn. The functional unit (FU) is one ha harvested with an operation time equal to 0.25 h/FU.

## Included activities start
The activity starts from the agricultural field foreseen to be processed.

## Included activities end
The dataset includes the diesel fuel consumption and the amount of agricultural machinery and of the shed attributed to harvesting. It was also taken into consideration the amount of emissions to the air from combustion and the emission to the soil from tyre abrasion during the work process. The following activities were considered part of the work process: preliminary work at the farm, such as attaching the adequate machine to the tractor; field work (for a parcel of land of 1 ha surface); and concluding work, like uncoupling the machine. The overlapping during the field work is considered. The dataset doesn't include the grain production, straw treatment, dust other than from combustion and noise. This activity ends with the delivery of harvesting by combined harvester.

## Geography
The inventory is extrapolated from the geography of Brazil. Data quality indicators are+ adjusted accordingly.

## Technology
Fuel consumption and emissions per kg diesel have been extrapolated to the US, but others inputs were taken from the original values.

## Reference product
- combine harvesting, sweet corn: 1 ha; By-product classification allocatable product; CPC 86119: Other support services to crop production
  production volume 333736 ha
    The amount od sweet corn is cosidered as one percent of the total corn planted in the United States (https://www.iowacorn.org/media-page/corn-facts). Corn estimation area based on FAOSTAT 2020
  property price 93.1081 EUR2005
    The price is from the year 2020. Price information has been directly provided by the data provider based on the following reference: University of Minnesota, Machinery cost estimates, W.F. Lazarus, 2020. The prices were adjusted for inflation relative to 2005 using the producer price index (PPI) of the euro area, published by eurostat (https://ec.europa.eu/eurostat/databrowser/view/STS_INPP_A__custom_6416181/default/table?lang=en, last accessed on 2023-06-01).
  properties: carbon allocation 0 kg, carbon content 0

## Inputs from technosphere
- diesel: 13.371 kg; lognormal variance with pedigree 0.0028, pedigree (1,4,2,1,1)
  combine chopping corn data - UMN Farm Machinery Economic Cost Estimation Spreadsheet (MACHDATA.XLSM) Lazarus, 2021
  properties: carbon content, fossil 0.865, dry mass 1 kg, heating value, net 42.8 MJ, wet mass 1 kg
- harvester: 6.3 kg; lognormal variance with pedigree 0.3042, pedigree (1,4,2,5,1)
  proxy from "combine harvesting, BR"
- shed: 0.00858 m2; lognormal variance with pedigree 0.3042, pedigree (1,4,2,5,1)
  proxy from "combine harvesting, BR"

## Emissions to nature
- Ammonia [air, non-urban air or from high stacks]: 0.00026742 kg; lognormal variance with pedigree 0.058325, pedigree (1,2,2,2,3)
  adapted from "combine harvesting, BR" to match the diesel consumption
- Benzene [air, non-urban air or from high stacks]: 9.76084e-5 kg; lognormal variance with pedigree 0.058325, pedigree (1,2,2,2,3)
  adapted from "combine harvesting, BR" to match the diesel consumption
- Benzo(a)pyrene [air, non-urban air or from high stacks]: 4.02468e-7 kg; lognormal variance with pedigree 0.658325, pedigree (1,2,2,2,3)
  adapted from "combine harvesting, BR" to match the diesel consumption
- Cadmium II [air, non-urban air or from high stacks]: 1.3371e-7 kg; lognormal variance with pedigree 0.658325, pedigree (1,2,2,2,3)
  adapted from "combine harvesting, BR" to match the diesel consumption
- Carbon dioxide, fossil [air, non-urban air or from high stacks]: 41.3165 kg; lognormal variance with pedigree 0.018325, pedigree (1,2,2,2,3)
  adapted from "combine harvesting, BR" to match the diesel consumption
- Carbon monoxide, fossil [air, non-urban air or from high stacks]: 0.128495 kg; lognormal variance with pedigree 0.652225, pedigree (1,4,2,2,1)
  adapted from "combine harvesting, BR" to match the diesel consumption
- Chromium III [air, non-urban air or from high stacks]: 6.69888e-7 kg; lognormal variance with pedigree 0.658325, pedigree (1,2,2,2,3)
  adapted from "combine harvesting, BR" to match the diesel consumption
- Copper ion [air, non-urban air or from high stacks]: 2.27307e-5 kg; lognormal variance with pedigree 0.658325, pedigree (1,2,2,2,3)
  adapted from "combine harvesting, BR" to match the diesel consumption
- Dinitrogen monoxide [air, non-urban air or from high stacks]: 0.00160452 kg; lognormal variance with pedigree 0.058325, pedigree (1,2,2,2,3)
  adapted from "combine harvesting, BR" to match the diesel consumption
- Methane, fossil [air, non-urban air or from high stacks]: 0.00172486 kg; lognormal variance with pedigree 0.058325, pedigree (1,2,2,2,3)
  adapted from "combine harvesting, BR" to match the diesel consumption
- NMVOC, non-methane volatile organic compounds [air, non-urban air or from high stacks]: 0.0581639 kg; lognormal variance with pedigree 0.042225, pedigree (1,4,2,2,1)
  adapted from "combine harvesting, BR" to match the diesel consumption
- Nickel II [air, non-urban air or from high stacks]: 9.34634e-7 kg; lognormal variance with pedigree 0.658325, pedigree (1,2,2,2,3)
  adapted from "combine harvesting, BR" to match the diesel consumption
- Nitrogen oxides [air, non-urban air or from high stacks]: 0.681922 kg; lognormal variance with pedigree 0.042225, pedigree (1,4,2,2,1)
  adapted from "combine harvesting, BR" to match the diesel consumption
- PAH, polycyclic aromatic hydrocarbons [air, non-urban air or from high stacks]: 4.39907e-5 kg; lognormal variance with pedigree 0.318325, pedigree (1,2,2,2,3)
  adapted from "combine harvesting, BR" to match the diesel consumption
- Particulate Matter, < 2.5 um [air, non-urban air or from high stacks]: 0.0597685 kg; lognormal variance with pedigree 0.318325, pedigree (1,2,2,2,3)
  adapted from "combine harvesting, BR" to match the diesel consumption
- Selenium IV [air, non-urban air or from high stacks]: 1.3371e-7 kg; lognormal variance with pedigree 0.058325, pedigree (1,2,2,2,3)
  adapted from "combine harvesting, BR" to match the diesel consumption
- Sulfur dioxide [air, non-urban air or from high stacks]: 0.0135047 kg; lognormal variance with pedigree 0.018325, pedigree (1,2,2,2,3)
  adapted from "combine harvesting, BR" to match the diesel consumption
- Zinc II [air, non-urban air or from high stacks]: 1.3371e-5 kg; lognormal variance with pedigree 0.658325, pedigree (1,2,2,2,3)
  adapted from "combine harvesting, BR" to match the diesel consumption
- Cadmium II [soil, agricultural]: 8.82e-7 kg; lognormal variance with pedigree 0.0442, pedigree (1,4,2,5,1)
  proxy from "combine harvesting, BR"
- Lead II [soil, agricultural]: 3.78e-6 kg; lognormal variance with pedigree 0.0442, pedigree (1,4,2,5,1)
  proxy from "combine harvesting, BR"
- Zinc II [soil, agricultural]: 0.00238 kg; lognormal variance with pedigree 0.0442, pedigree (1,4,2,5,1)
  proxy from "combine harvesting, BR"

## Extrapolations
The dataset is modeled for agricultural production system in US. Data Quality indicators are adjusted accordingly.
