# iron(II) chloride production

Dataset: EcoSpold 2, unit process
Geography: GLO
Time period: 2013-01-01 to 2023-12-31
Technology level: current
Classification: ISIC rev.4 ecoinvent: 2011:Manufacture of basic chemicals
Classification: EcoSpold01Categories: metals/extraction
Synonyms: ferrous chloride; spent pickling acid
Scenario: Business-as-Usual
System model: Allocation, cut-off by classification
Generated by: Jean-Francois Menard
Database: ecoinvent
isCopyrightProtected: true
accessRestrictedTo: 1

## General comment
This dataset represents the production of iron(II) chloride, a by-product of steel and iron manufacturing. It is a copy of the ecoinvent v3.0 dataset "iron sulfate production, GLO 1993", the uncertainty has been adjusted accordingly.
Iron(II) chloride is used as the main iron input in the production of iron(III) chloride in the region of Québec.
[This dataset was already contained in the ecoinvent database version 2. It was not individually updated during the transfer to ecoinvent version 3. Life Cycle Impact Assessment results may still have changed, as they are affected by changes in the supply chain, i.e. in other datasets. This dataset was generated following the ecoinvent quality guidelines for version 2. It may have been subject to central changes described in the ecoinvent version 3 change report (http://www.ecoinvent.org/database/ecoinvent-version-3/reports-of-changes/), and the results of the central updates were reviewed extensively. The changes added e.g. consistent water flows and other information throughout the database. The documentation of this dataset can be found in the ecoinvent reports of version 2, which are still available via the ecoinvent website. The change report linked above covers all central changes that were made during the conversion process.]

## Included activities start
The activity starts with the reception of the raw materials at the production plant gates.

## Included activities end
The activity ends with the iron(II) chloride production. The dataset is a "Rough estimation of the electricity use for purification of the by-product. No data for infrastructure and emissions." as cited in original dataset.

## Geography
"Investigation for CH." as cited in the original dataset.

## Technology
"Chemical product for waste water treatment." as cited in original dataset.

## Time period
Proxy dataset, no reference year.

## Reference product
- iron(II) chloride: 1 kg; By-product classification allocatable product; CPC 34240: Phosphates of triammonium; salts and peroxysalts of inorganic acids and metals n.e.c.; HS2017 282739: Chlorides; other than of ammonium, calcium, magnesium, aluminium and nickel; CAS 7758-94-3
  production volume 4 kg
    This is a placeholder value that does not reflect real-world production volumes. This dataset does not currently require a real-world production volume to work in the database framework, and no actual data were collected yet. This has no negative effect on the results of the ecoinvent database.
  property price 0.33 EUR2005
    Calculated value based on data from United Nations Commodity Trade Statistics Database (comtrade.un.org). UN comtrade category: 282733 Iron chlorides. Year 2005. Using exchange rate of 1EURO = 1.209 USD. Average of price of import into 5 main markets (EU, US, JP, IN and CN).
  properties: carbon allocation 0 kg, carbon content 0, carbon content, fossil 0, carbon content, non-fossil 0, dry mass 1 kg, water content 0, water in wet mass 0 kg, wet mass 1 kg

## Inputs from technosphere
- chemical factory, organics: 4e-10 unit; lognormal variance with pedigree 0.53, pedigree (5,5,5,5,5)
  EcoSpold01Location=RER
  Rough estimation
  Uncertainty: No data collected, the uncertainty has been maximized.
- electricity, medium voltage: 0.222 kWh; lognormal variance with pedigree 0.22, pedigree (5,5,5,5,5)
  Literature
  EcoSpold01Location=UCTE
  Uncertainty: No data collected, the uncertainty has been maximized.

## Sampling procedure
"Diploma thesis for a waste water treatment plant." as cited in original dataset.

## Extrapolations
"From single data to European situation. This dataset has been copied from an original dataset covering the geography RER. The uncertainty has been adjusted accordingly." as cited in original dataset.
