# transmission network construction, electricity, high voltage direct current land cable

Dataset: EcoSpold 2, unit process
Geography: RoW
Time period: 1998-01-01 to 2023-12-31
Technology level: current
Classification: ISIC rev.4 ecoinvent: 4220:Construction of utility projects
Synonyms: HVDC land cable
Scenario: Business-as-Usual
System model: Allocation, cut-off by classification
Generated by: Heidi Hottenroth
Published in: Jorge, R. 2012
Database: ecoinvent
isCopyrightProtected: true
accessRestrictedTo: 1

## General comment
This dataset represents the construction and decommissioning of 1 km transmission network high voltage direct current land cable. The service life of the network was assumed to be 40 years. For this period also maintenance is considered as a service. The voltage level is assumed to be 400 kV. Default value for power losses at 50 % load sum up to 8.06E6 kWh/km. Different from the literature source recycling was modelled according to the cut-off approach.
The inventory was modelled according to Jorge, R., Hawkins, T.R., Hertwich, E.G. (2012): Life cycle assessment of electricity transmission and distribution - part 1: power lines and cables. Int J Life Cycle Assess 17: 9-15, supplementary material

## Included activities start
The activity starts with cable production according to material composition (energy requirements for cable production not included) and cable laying. Maintenance is included as a service. Substations are not included.

## Included activities end
This activity ends with the decommissioning of transmission network according to material composition.

## Geography
The scope of the underlying literature source is Europe. Uncertainty was adjusted accordingly.

## Time period
Time frame of the underlying literature sources

## Parameters
- lifetime: 40 year

## Reference product
- transmission network, electricity, high voltage direct current land cable: 1 km; name RP; By-product classification allocatable product; CPC 53242: Long-distance communication and power lines (cables)
  high voltage direct current land cable (Cu conductor 400 kV)
  production volume 251 km; name PV_RP
    calculated according to data from https://en.wikipedia.org/wiki/List_of_HVDC_projects retrieved on 09.10.2020
    Length of land cables in Europe in the years 1992-2012
  property lifetime 40 year; name RP_lifetime
  properties: carbon allocation 0 kg, carbon content 0, price 105790 EUR2005

## Inputs from technosphere
- copper scrap, sorted, pressed: -13230 kg; name BP_copper_recycling; = Cu*0.9; lognormal variance with pedigree 0.0152, pedigree (3,3,3,5,3)
  Proxy for copper generated through dismantling of the transmission network. 90 % Recycling is assumed by the original source. Based on the amount of the corresponding material inputs.
  production volume; = abs(BP_copper_recycling/RP)*PV_RP
    Calculated from production volume of reference product using the relative outputs.
  properties: dry mass 1 kg, price 2.84 EUR2005, wet mass 1 kg
- copper, cathode: 14700 kg; name Cu; lognormal variance with pedigree 0.0132, pedigree (3,3,4,5,1)
  Literature Value. for cable
  properties: copper content 1, dry mass 1 kg, wet mass 1 kg
- diesel, burned in agricultural machinery: 374000 MJ; = 500*20*37.4; lognormal variance with pedigree 0.0132, pedigree (3,3,4,5,1)
  Calculated Value. 500 h with 20 l/h; assumed heating value diesel 37.4 MJ/l
- iron scrap, unsorted: -3060 kg; name BP_iron_scrap; = steel*0.9; lognormal variance with pedigree 0.0152, pedigree (3,3,3,5,3)
  Proxy for steel generated through dismantling of the transmission network. 90 % Recycling is assumed by the original source. Based on the amount of the corresponding material inputs.
  production volume; = abs(BP_iron_scrap/RP)*PV_RP
    Calculated from production volume of reference product using the relative outputs.
  properties: dry mass 1 kg, price 0.149 EUR2005, wet mass 1 kg
- kraft paper: 5000 kg; name paper; lognormal variance with pedigree 0.0132, pedigree (3,3,4,5,1)
  Literature Value. paper; for cable
  properties: carbon content, fossil 9.3e-6, carbon content, non-fossil 0.428894, dry mass 0.945 kg, water content 0.0582011, wet mass 1 kg
- lead: 14200 kg; lognormal variance with pedigree 0.0132, pedigree (3,3,4,5,1)
  Literature Value. for cable
  properties: dry mass 1 kg, wet mass 1 kg
- lubricating oil: 3900 kg; name oil; lognormal variance with pedigree 0.0132, pedigree (3,3,4,5,1)
  Literature Value. Insulation oil for cable
  properties: carbon content, fossil 0.75, dry mass 1 kg, wet mass 1 kg
  note on carbon content, fossil: Lubricating oil is produced from diesel. C-content/dry mass of fats and oils considered 75%, from: ecoinvent v2.2 report, n 15a, pg 40
- maintenance, transmission network, electricity, high voltage direct current land cable: 40 km*year; = lifetime; lognormal variance with pedigree 0.0192, pedigree (4,3,4,5,1)
  Literature Value.
- polyethylene, high density, granulate: 1000 kg; name HDPE; lognormal variance with pedigree 0.0458, pedigree (3,3,5,5,2)
  Literature Value. polyethylene (assumption: high density) for cable trace. Processing unknwon
  properties: carbon content, fossil 0.857143, dry mass 1 kg, wet mass 1 kg
  note on carbon content, fossil: Polyethylene is formed out of a huge amount of ethylene monomers (C2H4) (ecoinvent v2.2 report 11_II). MW=28 g/mol
- polyethylene, low density, granulate: 2600 kg; name LDPE; lognormal variance with pedigree 0.0132, pedigree (3,3,4,5,1)
  Literature Value. polyethylene (assumption: low density) for cable (cover). Processing unknown
  properties: carbon content, fossil 0.857143, dry mass 1 kg, wet mass 1 kg
- sand: 24212.7, 1.57566e6, 125.701 kg (3 suppliers, which the file names only by identifier); sum of these 1.6e6 kg; lognormal variance with pedigree 0.0132, pedigree (3,3,4,5,1)
  Literature Value. for cable trace
  properties: dry mass 1 kg, wet mass 1 kg
- scrap copper: -1470 kg; name BP_copper_waste; = Cu*0.1; lognormal variance with pedigree 0.0152, pedigree (3,3,3,5,3)
  Waste generated through dismantling of the transmission network. Based on the amount of the corresponding material inputs.
  production volume; = abs(BP_copper_waste/RP)*PV_RP
    Calculated from production volume of reference product using the relative outputs.
  properties: dry mass 1 kg, wet mass 1 kg
- scrap steel: -340 kg; name BP_steel; = steel*0.1; lognormal variance with pedigree 0.0152, pedigree (3,3,3,5,3)
  (same comment as for scrap copper)
  production volume; = abs(BP_steel/RP)*PV_RP
    Calculated from production volume of reference product using the relative outputs.
  properties: dry mass 1 kg, wet mass 1 kg
- steel, low-alloyed: 3400 kg; name steel; lognormal variance with pedigree 0.0132, pedigree (3,3,4,5,1)
  Literature Value. steel; for cable
  properties: carbon content, fossil 0.005, dry mass 1 kg, wet mass 1 kg
- waste mineral oil: -3900 kg; name BP_oil; = oil; lognormal variance with pedigree 0.0152, pedigree (3,3,3,5,3)
  (same comment as for scrap copper)
  production volume; = abs(BP_oil/RP)*PV_RP
    Calculated from production volume of reference product using the relative outputs.
  properties: carbon content, fossil 0.864444, dry mass 0.9 kg, water content 0.111111, wet mass 1 kg
  note on carbon content, fossil: Tab A.6, ecoinvent v2.2 report 13_I. C content has been calculated after data in the tables, and then referred to 1 kg DM
- waste paper, unsorted: -5000 kg; name BP_paper; = paper; lognormal variance with pedigree 0.0152, pedigree (3,3,3,5,3)
  (same comment as for scrap copper)
  production volume; = abs(BP_paper/RP)*PV_RP
    Calculated from production volume of reference product using the relative outputs.
  properties: price 0.093 EUR2005
- waste wire plastic: -3600 kg; name BP_wire_plastic; = LDPE + HDPE; lognormal variance with pedigree 0.0152, pedigree (3,3,3,5,3)
  (same comment as for scrap copper)
  production volume; = abs(BP_wire_plastic/RP)*PV_RP
    Calculated from production volume of reference product using the relative outputs.
  properties: carbon content, fossil 0.549508, dry mass 0.9645 kg, heating value, net 25.95 MJ, water content 0.0368066, wet mass 1 kg
  note on heating value, net: Value taken from the general comment of the treatment dataset.
- wire drawing, copper: 14700 kg; = Cu; lognormal variance with pedigree 0.2106, pedigree (5,5,5,5,5)
  Calculated Value. Represents the processing of the copper.

## Inputs from nature
- Occupation, construction site [natural resource, land]: 38 m2*year; = 1000*1*0,038; lognormal variance with pedigree 0.25, pedigree (5,5,5,5,5)
  Estimated Value. Occupation during construction time.

## Sampling procedure
LCI data on resource use and emissions for production of materials, installation, maintenance, and end of life were provided by the Danish utility company Energinet.dk. No data referring to cable manufacturing (assembly of components) were available, and hence this process was not included.

## Extrapolations
The dataset is extrapolated from the respective regional dataset with uncertainty adjusted.
