# polyethylene terephthalate production, granulate, amorphous, recycled

Dataset: EcoSpold 2, unit process
Geography: RoW
Time period: 2010-01-01 to 2023-12-31
Technology level: current
Classification: ISIC rev.4 ecoinvent: 3830:Materials recovery
Scenario: Business-as-Usual
System model: Allocation, cut-off by classification
Generated by: Thomas Kägi
Published in: Kägi T. 2017
Database: ecoinvent
isCopyrightProtected: true
accessRestrictedTo: 1

## General comment
This dataset was built as a weighted average of regional datasets of the same activityName. Weights are based on production volumes.
Europe without Switzerland: production volume = 2e+09 kg/year, weight = 0.7634
US: production volume = 8e+08 kg/year, weight = 0.229
CH: production volume = 2e+07 kg/year, weight = 0.007634

## Included activities start
Service is starting with the receipt of bales of sorted waste PET

## Included activities end
This module includes all processes of the production of recycled PET granulate, amorphous up to the factory gate. Machinery infrastructure is excluded

## Allocation
economic allocation should be used: 99.5 % is allocated to recycled PET granulate, 0.5% to waste PE

## Geography
This dataset is a weighted average built from the following geographies: Europe without Switzerland, US, CH.

## Reference product
- polyethylene terephthalate, granulate, amorphous, recycled: 1 kg; By-product classification allocatable product; CPC 34710: Polymers of ethylene, in primary forms; HS2017 390120: Ethylene polymers; in primary forms, polyethylene having a specific gravity of 0.94 or more; CAS 25038-59-9
  production volume 2.35e8 kg; name APV_RP
    Global production volume (PV) estimated based on WRF (2016) 'The New Plastics Economy - Rethinking the future of plastics': According to figure 4 in WRF (2016), the annual global production of plastic packaging material amounted to 78 milon tonnes in 2013. 14% was collected for recycling, of which 2% entered closed-loop recycling, 8% cascaded recycling, and 4% process losses.
    PVs of by-products/waste are scaled according to their relationship with the reference product.
  property heating value, net 22.95 MJ
    Assumed equal to "polyethylene terephthalate, granulate, amorphous"
  properties: carbon allocation 0.625 kg, carbon content 0.625, carbon content, fossil 0.625, carbon content, non-fossil 0, dry mass 1 kg, price 0.84 EUR2005, water content 0, water in wet mass 0 kg, wet mass 1 kg

## Inputs from technosphere
- chemical, organic: 0.00668702 kg; lognormal variance with pedigree 0.2106, pedigree (5,5,5,5,5)
  properties: carbon content, fossil 0.628, dry mass 1 kg, heating value, net 19.03 MJ, wet mass 1 kg
  note on carbon content, fossil: This dataset is an unweighted average of 20 organic substances (listed in Tab 88.1, ecoinvent v2.2 report 8, part II), being part of the top100 chemicals included in this database. The C-content has also been calculated as an unweighted average of the C content of the substances composing this dataset.
- electricity, low voltage: 0.00237385, 0.0304914, 0.0373303, 0.774838, 0.0764804, 0.00047638, 0.0132157 kWh (7 suppliers, which the file names only by identifier); sum of these 0.935206 kWh; lognormal variance with pedigree 0.0912, pedigree (5,5,5,5,2)
- extrusion, plastic film: 4.76336e-7 kg; lognormal variance with pedigree 0.0106, pedigree (1,1,4,5,1)
- heat, district or industrial, natural gas: 0.0435555, 2.65056 MJ (2 suppliers, which the file names only by identifier); sum of these 2.69411 MJ; lognormal variance with pedigree 0.0912, pedigree (5,5,5,5,2)
  properties: heating value, net 1 MJ
- heat, district or industrial, other than natural gas: 0.0528915, 2.45037e-5 MJ (2 suppliers, which the file names only by identifier); sum of these 0.052916 MJ; lognormal variance with pedigree 0.0106, pedigree (1,1,4,5,1)
  properties: heating value, net 1 MJ
- municipal solid waste: -0.000384718, -4.56835e-5, -0.000284323, -0.217057, -3.19675e-5, -1.0261e-5, -2.31927e-5, -0.000965519 kg (8 suppliers, which the file names only by identifier); sum of these -0.218803 kg; lognormal variance with pedigree 0.0514, pedigree (5,5,2,5,2)
  production volume; = APV_RP *BP_amount_2
    PVs of by-products/waste are scaled according to their relationship with the reference product.
  properties: carbon content, fossil 0.171549, carbon content, non-fossil 0.261655, dry mass 0.771 kg, heating value, net 11.74 MJ, water content 0.297017, wet mass 1 kg
  note on carbon content, fossil: MSW composition in tab 4.1, ecoinvent v2.2 report 13_I. C content referred to 1 kg DM
  note on heating value, net: Value taken from the general comment of the treatment dataset.
- polypropylene, granulate: 4.76336e-7 kg; lognormal variance with pedigree 0.0106, pedigree (1,1,4,5,1)
  properties: carbon content, fossil 0.857143, dry mass 1 kg, heating value, net 32.78 MJ, wet mass 1 kg
  note on heating value, net: Value extracted from "treatment of waste polypropylene, open burning"
- propane, burned in building machine: 2.79847e-5 MJ; lognormal variance with pedigree 0.1306, pedigree (5,5,5,5,4)
  properties: heating value, net 1 MJ
- soap: 2.29008e-6 kg; lognormal variance with pedigree 0.0186, pedigree (1,1,4,5,3)
  properties: carbon content, non-fossil 0.692237, dry mass 0.87 kg, heating value, net 17.93 MJ, water content 0.149425, wet mass 1 kg
- sodium hydroxide, without water, in 50% solution state: 0.0236374 kg; lognormal variance with pedigree 0.0912, pedigree (5,5,5,5,2)
  properties: dry mass 1 kg, heating value, net 3.03 MJ, wet mass 1 kg
- steel, low-alloyed: 2.29008e-8 kg; lognormal variance with pedigree 0.0106, pedigree (1,1,4,5,1)
  properties: carbon content, fossil 0.005, dry mass 1 kg, wet mass 1 kg
- sulfuric acid: 8.39695e-6 kg; lognormal variance with pedigree 0.0106, pedigree (1,1,4,5,1)
  properties: dry mass 1 kg, wet mass 1 kg
- waste polyethylene terephthalate, for recycling, sorted: 1.24973 kg; lognormal variance with pedigree 0.0912, pedigree (5,5,5,5,2)
  properties: carbon content, fossil 0.624, dry mass 0.986 kg, heating value, net 22.95 MJ, water content 0.0141988, wet mass 1 kg
- waste polyethylene, for recycling, sorted: -0.000931298 kg; name BP_amount_3; lognormal variance with pedigree 0.0026, pedigree (1,1,1,5,1)
  production volume; = APV_RP* BP_amount_3
    (same comment as for municipal solid waste)
  properties: heating value, net 42.47 MJ, price 0.035 EUR2005
- waste preparation facility: 2e-9 unit; lognormal variance with pedigree 0.1712, pedigree (4,3,5,5,5)
  properties: lifetime 50 year, lifetime capacity [kg] 5e8 kg
- wastewater, average: -0.000423766, -1.50877e-6 m3 (2 suppliers, which the file names only by identifier); sum of these -0.000425275 m3; lognormal variance with pedigree 0.0514, pedigree (5,5,2,5,2)
  production volume; = APV_RP* BP_amount_1
    (same comment as for municipal solid waste)
  properties: carbon content, non-fossil 0.194039, dry mass 0.346837 kg, water content 2882.2, wet mass 1000 kg
  note on carbon content, non-fossil: 0.0673 kg TOC/m3 (Tab A.17, ecoinvent v2.2 report 13_I). TOC was considered as Total Carbon.
- wire drawing, steel: 2.29008e-8 kg; lognormal variance with pedigree 0.0106, pedigree (1,1,4,5,1)

## Inputs from nature
- Water, cooling, unspecified natural origin [natural resource, in water]: 3.35878e-5 m3; lognormal variance with pedigree 0.0106, pedigree (1,1,4,5,1)
- Water, unspecified natural origin [natural resource, in water]: 0.000391695 m3; lognormal variance with pedigree 0.0912, pedigree (5,5,5,5,2)

## Emissions to nature
- Particulate Matter, > 2.5 um and < 10um [air, unspecified]: 3.9e-5 kg; lognormal variance with pedigree 0.0912, pedigree (5,5,5,5,2)
- VOC, volatile organic compounds [air, unspecified]: 3.7e-5 kg; lognormal variance with pedigree 0.0912, pedigree (5,5,5,5,2)

## Sampling procedure
Uncertainty estimation according to the pedigree matrix
