# shavings, hardwood, measured as dry mass to generic market for residual wood, dry

Dataset: EcoSpold 2, unit process
Geography: Europe without Switzerland
Time period: 2014-01-01 to 2023-12-31
Technology level: current
Classification: ISIC rev.4 ecoinvent: 1621:Manufacture of veneer sheets and wood-based panels
Scenario: Business-as-Usual
System model: Allocation, cut-off by classification
Generated by: Nora Minas
Database: ecoinvent
isCopyrightProtected: true
accessRestrictedTo: 1

## General comment
This activity is linking the more specific market for shaving, hardwood, to the more generic market for residual wood, dry.It makes accesible the specific product shaving, hardwood through the more generic product of residual wood, dry.

## Included activities start
Entry of the specific product "shaving, hardwood, measured as dry mass"

## Included activities end
Delivery of the generic product "residual wood, dry"

## Reference product
- residual wood, dry: 1 m3; name residual_wood_dry; By-product classification allocatable product; CPC 39283: Non-agglomerated wood waste and scrap; HS2017 440140: Wood; for fuel, sawdust and wood waste and scrap, not agglomerated
  production volume 78727.3 m3; = 4.33E+08*0.1/ residual_wood_dry_DM
    4.33E+08 kg is the rough Production Volumes of shaving, hardwood produced out of planing in Europe without Switzerland. It is considered that 10% of this volume is consumed as the more generic product "residual wood, dry". The Dry Mass of this product is used to calculate the Production Volumes in m3.
  property dry mass 550 kg; name residual_wood_dry_DM
  property heating value, net 8030.06 MJ
    LHV is calculated based on the Carbon content of the product. More details can be found on the respective documentation.The property is based on a value of 12.7MJ/kg
  property price 26.9 EUR2005
    Temporary price data. Calculated as 90% of purchasers price based on: 2004 prices for World Import/Export (USD/cubicmeter) from FaoStat (http://faostat.fao.org/site/626/default.aspx#ancor, [accessed 10th June 2010]) Commodity: 'Chips and Particles' assuming this is for air-dry chips (10% water on a dry matter basis at 650 kg/m3) and no price difference for water content (i.e. assuming air-drying).
  properties: carbon allocation 271.7 kg, carbon content 0.494, carbon content, fossil 0, carbon content, non-fossil 0.494, water content 0.15, water in wet mass 82.5 kg, wet mass 632.5 kg

## Inputs from technosphere
- shavings, hardwood, measured as dry mass: 550 kg; = residual_wood_dry_DM* residual_wood_dry
  Calculated using the Dry Mass of the reference product
  properties: carbon content, non-fossil 0.494, dry mass 1 kg, heating value, net 13.38 MJ, water content 0.1, wet mass 1.1 kg
