# lithium brine inspissation

Dataset: EcoSpold 2, unit process
Geography: GLO
Time period: 2009-01-01 to 2023-12-31
Technology level: current
Classification: ISIC rev.4 ecoinvent: 2011:Manufacture of basic chemicals
Classification: EcoSpold01Categories: chemicals/inorganics
Tags: ConvertedDataset
Scenario: Business-as-Usual
System model: Allocation, cut-off by classification
Generated by: Dominic Notter
Published in: Anna Stamp 2012
Database: ecoinvent
isCopyrightProtected: true
accessRestrictedTo: 1

## General comment
Concentrated lithium brine is base material for lithium carbonate.
[This dataset was already contained in the ecoinvent database version 2. It was not individually updated during the transfer to ecoinvent version 3. Life Cycle Impact Assessment results may still have changed, as they are affected by changes in the supply chain, i.e. in other datasets. This dataset was generated following the ecoinvent quality guidelines for version 2. It may have been subject to central changes described in the ecoinvent version 3 change report (http://www.ecoinvent.org/database/ecoinvent-version-3/reports-of-changes/), and the results of the central updates were reviewed extensively. The changes added e.g. consistent water flows and other information throughout the database. The documentation of this dataset can be found in the ecoinvent reports of version 2, which are still available via the ecoinvent website. The change report linked above covers all central changes that were made during the conversion process.]

## Included activities end
This dataset includes the inspissation of lithium containing brine to a concentrated lithium brine by sun energy in the desert of Atacama (Chile)

## Geography
Production site is in Chile, all data originate from an environmental survey about the plant in Chile. This dataset can be used globally, as this plant produces 70% of the Li2CO3 worldwide. Brasil electricity mix is used as proxy.

## Technology
The inspissation of the brine takes place in the desert of Atacama. The required energy for the inspissation is provided by the sun.

## Reference product
- lithium brine, 6.7 % Li: 1 kg; By-product classification allocatable product; CPC 34220: Zinc oxide; zinc peroxide; chromium oxides and hydroxides; manganese oxides; iron oxides and hydroxides; earth[…]; HS2017 283691: Carbonates; lithium carbonate
  EcoSpold01Location=GLO
  production volume 2.07612e8 kg
    Unknown
    Calculated from total Lithium extraction (USGS: 21500000 kg) minus Li in spodumene (7.59E6 kg Li)
  property price 0.00611918 EUR2005
    Calculated based on inputs: The price of the product has been calculated as a sum of the values of the material and energy inputs for this product. This value is therefore a rough estimation. It may underestimate the real price since there are additional expenses when producing any product. These expences can include for example labour costs, treatment of waste materials and profit for the producer. Please consider carefully whether this level of data quality is acceptable for your application.
  properties: carbon allocation 0 kg, carbon content 0, carbon content, fossil 0, carbon content, non-fossil 0, dry mass 1 kg, water content 0, water in wet mass 0 kg, wet mass 1 kg

## Inputs from technosphere
- diesel, burned in building machine: 0.115 MJ; lognormal variance with pedigree 0.0408, pedigree (2,2,5,3,1)
  EcoSpold01Location=GLO
  Personal communication of SQM, 2010 (operational data 2009)
  properties: heating value, net 1 MJ
- electricity, low voltage: 0.00714 kWh
  Personal communication of SQM, 2010 (operational data 2009)

## Inputs from nature
- Lithium [natural resource, in ground]: 0.0667 kg; lognormal variance with pedigree 0.0408, pedigree (2,2,5,3,1)
  0.15% Li in brine; own estimation, based on a assumed efficiency of the extraction of 90%
- Occupation, mineral extraction site [natural resource, land]: 0.0171 m2*year
  Personal communication of SQM, 2010 (operational data 2009)
- Transformation, from unspecified [natural resource, land]: 0.000341 m2
  Personal communication of SQM, 2010 (operational data 2009)
- Transformation, to mineral extraction site [natural resource, land]: 0.000341 m2
  Personal communication of SQM, 2010 (operational data 2009)

## Emissions to nature
- Heat, waste [air, non-urban air or from high stacks]: 0.0257 MJ
  calculated from electricity consumption

## Sampling procedure
ecoinvental survey

## Extrapolations
see Geography

## Review by Christian Bauer 2010-02-08
passed
