# electric bicycle production

Dataset: EcoSpold 2, unit process
Geography: RER
Time period: 2000-01-01 to 2023-12-31
Technology level: current
Classification: EcoSpold01Categories: transport systems/road
Classification: ISIC rev.4 ecoinvent: 3091:Manufacture of motorcycles
Synonyms: e-Bike
Tags: ConvertedDataset
Scenario: Business-as-Usual
System model: Allocation, cut-off by classification
Generated by: Marianne Leuenberger
Published in: M. Leuenberger 2010
Database: ecoinvent
isCopyrightProtected: true
accessRestrictedTo: 1

## General comment
The data set reflects a e-bike of 24kg including additionals (e.g. carriers, lights). The frame material is Aluminium and the battery contains LiMn2O4-cells.
[This dataset was already contained in the ecoinvent database version 2. It was not individually updated during the transfer to ecoinvent version 3. Life Cycle Impact Assessment results may still have changed, as they are affected by changes in the supply chain, i.e. in other datasets. This dataset was generated following the ecoinvent quality guidelines for version 2. It may have been subject to central changes described in the ecoinvent version 3 change report (http://www.ecoinvent.org/database/ecoinvent-version-3/reports-of-changes/), and the results of the central updates were reviewed extensively. The changes added e.g. consistent water flows and other information throughout the database. The documentation of this dataset can be found in the ecoinvent reports of version 2, which are still available via the ecoinvent website. The change report linked above covers all central changes that were made during the conversion process.]

## Included activities end
This data set includes the material use for the manufacturing of an average bicycle with an additional electric motor. Manufacturing of the bike parts is assumed to take place in China. Transport to Europe included.

## Geography
Data cover manufacturing in China and retail in Europe

## Technology
Electric bicycle with electric motor at wheel-hub and LiMn2O4 battery pack, 100Wh/kg-

## Parameters
- fraction, process water, to air: 0.15 dimensionless; name fraction_PW_to_air; lognormal variance with pedigree 0.092025, pedigree (4,4,3,2,4)
  Literature value. In case when no industry/process specific data are available, default evaporation fraction value is used. This value is 15% and is based on literature (Statistics Canada, 2007 & Shaffer, K.H., 2008, Consumptive water use in the Great Lakes Basin, USGS & Shiklomanov, 2003, World Water Resources at the Beginning of the 21st Century) and has been approved by an expert.
- fraction, tap water, to air: 0.15 dimensionless; name fraction_TW_to_air; = fraction_PW_to_air; lognormal variance with pedigree 0.092025, pedigree (4,4,3,2,4)
  Calculated value. See comment in the other parametres present in this dataset. Tap water is considered to be always used as process water, thus process water fractions to air are applied to all tap water input flows to calculate the amount of water consumed in the processes.

## Reference product
- electric bicycle: 1 unit; By-product classification allocatable product; CPC 49913: Motorcycles and cycles fitted with an auxiliary motor, other than those with reciprocating internal combustion[…]; HS2017 871160: Motorcycles (including mopeds) and cycles; fitted with auxiliary motor, with electric motor for propulsion,[...]
  EcoSpold01Location=RER
  production volume 1.32237 unit
    This is a placeholder value that does not reflect real-world production volumes. This dataset does not currently require a real-world production volume to work in the database framework, and no actual data were collected yet. This has no negative effect on the results of the ecoinvent database. The placeholder value of this activity was scaled according to the nominal GDP of 2005 (source: United Nations, http://data.un.org/Glossary.aspx?q=GDP+%28current+US%24%29, accessed 20130726) to reflect an appropriate share of the global production volume, which is also a placeholder value.
  property price 2167 EUR2005
    Calculated based on literature values and estimates. The purchaser's price of an electric bicycle is app. 3250 Euro (estimated based on producer's information; http://www.stoeckli.ch/ch-de/produkte/bike-velo/elektrobike?cat=90, accessed 20130726) for electric bicycle which weight 25.8 kg. The purchaser's price is thus (1/25.8*3250=) 126 Euro/kg. The producer's price is calculated as 2/3 of the purchaser's price (based on the information on bicycles) (2/3*126=) 84euro/kg.
  properties: carbon allocation 0 kg, carbon content 0

## Inputs from technosphere
- aluminium, cast alloy: 2.4104 kg; lognormal variance with pedigree 0.0406, pedigree (2,1,5,1,1)
  Factsheets Bicycle parts manufacturere: Shimano, DT Swiss
  EcoSpold01Location=RER
  Uncertainty: Factsheets Bicycle parts manufacturere: Shimano, DT Swiss
  properties: dry mass 1 kg, wet mass 1 kg
- aluminium, wrought alloy: 5.1221 kg; lognormal variance with pedigree 0.0406, pedigree (2,1,5,1,1)
  EcoSpold01Location=RER
  Factsheets Bicycle parts manufacturere: Shimano, DT Swiss
  Uncertainty: Factsheets Bicycle parts manufacturere: Shimano, DT Swiss
  properties: dry mass 1 kg, wet mass 1 kg
- battery, Li-ion, LiMn2O4, rechargeable, prismatic: 2.6 kg; lognormal variance with pedigree 0.0406, pedigree (2,1,5,1,1)
  EcoSpold01Location=GLO
  Literature, Biketec
  Uncertainty: Literature, Biketec
  properties: carbon content, fossil 0.328011, dry mass 1 kg, wet mass 1 kg
  note on carbon content, fossil: Calculated as the addition of C contents in the product composition
- chromium steel removed by turning, average, conventional: 0.159 kg; lognormal variance with pedigree 0.128, pedigree (4,1,5,1,4)
  Assumption
  EcoSpold01Location=RER
  Uncertainty: Assumption
  properties: carbon content, fossil 0.0008, dry mass 1 kg, wet mass 1 kg
- electric motor, vehicle: 4.4 kg; lognormal variance with pedigree 0.0406, pedigree (2,1,5,1,1)
  EcoSpold01Location=RER
  Literature, Biketec
  Uncertainty: Literature, Biketec
  properties: carbon content, fossil 0.00375, dry mass 1 kg, wet mass 1 kg
- electricity, medium voltage: 6.8902 kWh; lognormal variance with pedigree 0.13, pedigree (4,4,5,1,4)
  Extrapolation from passenger car manufacture using weight ratio, thereof 25%
  EcoSpold01Location=CN
  Uncertainty: Extrapolation from passenger car manufacture using weight ratio, thereof 25%
- heat, district or industrial, natural gas: 13.5802 MJ; lognormal variance with pedigree 0.13, pedigree (4,4,5,1,4)
  Extrapolation from passenger car manufacture; weight ratio
  EcoSpold01Location=RER
  Uncertainty: Extrapolation from passenger car manufacture; weight ratio
  properties: heating value, net 1 MJ
- heat, district or industrial, other than natural gas: 0.192698 MJ; lognormal variance with pedigree 0.13, pedigree (4,4,5,1,4)
  Extrapolation from passenger car manufacture using weight ratio, thereof 25%
  EcoSpold01Location=RER
  Uncertainty: Extrapolation from passenger car manufacture using weight ratio, thereof 25%
  properties: heating value, net 1 MJ
- injection moulding: 1.9575 kg; lognormal variance with pedigree 0.128, pedigree (4,1,5,1,4)
  EcoSpold01Location=RER
  Assumption
  Uncertainty: Assumption
- municipal solid waste: -4.5 kg; lognormal variance with pedigree 0.0012, pedigree (2,3,1,1,1)
  EcoSpold01Location=CH
  Assumption based on: Cherry, C.R. 2009, 4.5 kg solid waste per bicycle
  Uncertainty: Assumption based on: Cherry, C.R. 2009, 4.5 kg solid waste per bicycle
  production volume
    Calculated from the production volume of electric bicycle in proportion to the respective output amounts.
  properties: carbon content, fossil 0.171549, carbon content, non-fossil 0.261655, dry mass 0.771 kg, heating value, net 11.74 MJ, water content 0.297017, wet mass 1 kg
  note on carbon content, fossil: MSW composition in tab 4.1, ecoinvent v2.2 report 13_I. C content referred to 1 kg DM
  note on heating value, net: Value taken from the general comment of the treatment dataset.
- polyethylene, high density, granulate: 1.9575 kg; lognormal variance with pedigree 0.0406, pedigree (2,1,5,1,1)
  EcoSpold01Location=RER
  Literature, Shimano/Selle Italia
  Uncertainty: Literature, Shimano/Selle Italia
  properties: carbon content, fossil 0.857143, dry mass 1 kg, heating value, net 42.47 MJ, wet mass 1 kg
  note on carbon content, fossil: Polyethylene is formed out of a huge amount of ethylene monomers (C2H4) (ecoinvent v2.2 report 11_II). MW=28 g/mol
- polyurethane, flexible foam: 0.03 kg; lognormal variance with pedigree 0.0406, pedigree (2,1,5,1,1)
  EcoSpold01Location=RER
  Literature, Selle Italia
  Uncertainty: Literature, Selle Italia
  properties: carbon content, fossil 0.633827, dry mass 1 kg, heating value, net 30.67 MJ, wet mass 1 kg
  note on carbon content, fossil: Polyurethanes (PUR) is the collective name for an extensive group of polymers with very different compositions and correspondingly varied property profiles, though their molecule chain contains all a urethane group (-NH-CO-O-). All PURs are built on a common principle : they are produced by the diisocyanate polyaddition process, that links polyols and (di)isocyanates. In this dataset, an example of typical polyurethane mixture is described (Ullmann, Polyurethanes, Dieterich et al. & ecoinvent v2 report 11_II). C content was calculated as an addition of C contents in its components.
- powder coat, aluminium sheet: 0.35 m2; lognormal variance with pedigree 0.128, pedigree (4,1,5,1,4)
  EcoSpold01Location=RER
  Assumption: pipe diamter: 4cm, pipe length: 3m
  Uncertainty: Assumption: pipe diamter: 4cm, pipe length: 3m
- road vehicle factory: 1.3227e-9 unit; lognormal variance with pedigree 0.3406, pedigree (2,1,5,1,1)
  Extrapolation for bicycle plant: 25% of weight ratio
  EcoSpold01Location=RER
  Uncertainty: Extrapolation for bicycle plant: 25% of weight ratio
- section bar extrusion, aluminium: 3.7663 kg; lognormal variance with pedigree 0.128, pedigree (4,1,5,1,4)
  Assumption for pipe drawing
  EcoSpold01Location=RER
  Uncertainty: Assumption for pipe drawing
- steel, chromium steel 18/8, hot rolled: 1.59 kg; lognormal variance with pedigree 0.0406, pedigree (2,1,5,1,1)
  (same comment as for aluminium, wrought alloy)
  properties: carbon content, fossil 0.0008, dry mass 1 kg, wet mass 1 kg
  note on carbon content, fossil: Stainless steel model is the grade 304 steel (18/8 stainless, 18% chromium 8% nickel; max. 0.08% C)
- steel, low-alloyed, hot rolled: 4.9025 kg; lognormal variance with pedigree 0.0406, pedigree (2,1,5,1,1)
  (same comment as for aluminium, cast alloy)
  properties: carbon content, fossil 0.005, dry mass 1 kg, wet mass 1 kg
  note on carbon content, fossil: Low alloyed steel composition given in Tab. 3.2 ecoinvent v2.2 report 10_partII. Steel assumed to have a C content of 0.5%
- synthetic rubber: 0.5625 kg; lognormal variance with pedigree 0.0406, pedigree (2,1,5,1,1)
  EcoSpold01Location=RER
  Literature, Schwalbe
  Uncertainty: Literature, Schwalbe
  properties: carbon content, fossil 0.871949, dry mass 1 kg, heating value, net 26.42 MJ, wet mass 1 kg
  note on carbon content, fossil: EPDM (Ethylene-propene-diene terpolymer) rubber is a terpolymer of ethylene, propene, and a diene with the residual unsaturated portion of the diene in the side chain (ecoinvent v2.2 report 7-part XX & Ullmann). Chemical formula (deduced from Evidences of Solvent-Induced Miscibility in Polychloroprene-co-Ethylene-Propene Diene Terpolymer Blends, Dubey et al., Journal of Applied Polymer Science, 2009, 111:1884–1891): C20H35
- tap water: 0.744 kg; name tap_water_input; lognormal variance with pedigree 0.0412, pedigree (2,3,5,1,1)
  Assumption based on: Cherry, C.R. 2009, 1488 liters waste water for all production phases (incl. Battery manufacturing --> 50%)
  EcoSpold01Location=RER
  Uncertainty: Assumption based on: Cherry, C.R. 2009, 1488 liters waste water for all production phases (incl. Battery manufacturing --> 50%)
  properties: carbon content, fossil 0.00178991, dry mass 0.000337476 kg, water content 2962.17, wet mass 1 kg
  note on carbon content, fossil: Bicarbonate content is 2.93 mol/m3. CO2 content is 0.1 mol/m3 (ecoinvent v2.2 report 8, Tab 93.1).
- wastewater, average: -1.82394e-5, -0.000725761 m3 (2 suppliers, which the file names only by identifier); sum of these -0.000744 m3; lognormal variance with pedigree 0.0012, pedigree (2,3,1,1,1)
  EcoSpold01Location=CH
  Assumption based on: Cherry, C.R. 2009, 1488 liters waste water for all production phases (incl. Battery manufacturing --> 50%)
  Uncertainty: Assumption based on: Cherry, C.R. 2009, 1488 liters waste water for all production phases (incl. Battery manufacturing --> 50%)
  production volume
    (same comment as for municipal solid waste)
  properties: carbon content, non-fossil 0.194039, dry mass 0.346837 kg, water content 2882.2, wet mass 1000 kg
  note on carbon content, non-fossil: 0.0673 kg TOC/m3 (Tab A.17, ecoinvent v2.2 report 13_I). TOC was considered as Total Carbon.
- welding, arc, aluminium: 0.75 m; lognormal variance with pedigree 0.128, pedigree (4,1,5,1,4)
  EcoSpold01Location=RER
  Assumption: pipe diameter: 4cm --> 0.125 m per joint, 6 joints per bike
  Uncertainty: Assumption: pipe diameter: 4cm --> 0.125 m per joint, 6 joints per bike
- wire drawing, steel: 0.3375 kg; lognormal variance with pedigree 0.128, pedigree (4,1,5,1,4)
  EcoSpold01Location=RER
  Assumption
  Uncertainty: Assumption

## Emissions to nature
- Water [air, unspecified]: 0.0001116 m3; name water_to_air_unspecified; = (tap_water_input/1000*fraction_TW_to_air); lognormal variance with pedigree 0.0807, pedigree (2,2,5,1,1)
  Calculated value based on literature values and expert opinion. See comments in the parametres' comment field.
  property fraction, origin: fresh water 1; name fraction_origin_fresh_water
  property fraction, origin: salt water 0; name fraction_origin_salt_water
  property fraction, origin: unspecified 0; name fraction_origin_unspecified

## Sampling procedure
Literature

## Extrapolations
Electric motor and battery extrapolated from BEV, Manufacturing plant is extrapolated from passenger car plant, electricity consumption extrapolated according to weight ratio from passenger car

## Review by Christian Bauer 2010-02-07
26.01.2010
passed
C:\Dokumente und Einstellungen\Marianne\Eigene Dateien\Projekte\277_Mobitool\Review\[Ecospold_Bike-v1.1.xls]X-Process
