# treatment of residue from mechanical treatment, industrial device, municipal incineration FAE

Dataset: EcoSpold 2, unit process
Geography: CH
Time period: 2006-01-01 to 2023-12-31
Technology level: current
Classification: ISIC rev.4 ecoinvent: 3821:Treatment and disposal of non-hazardous waste
Synonyms: part of Waste Electrical and Electronic Equipment (WEEE)
Scenario: Business-as-Usual
System model: Allocation, cut-off by classification
Generated by: Nikolia Stoikou
Database: ecoinvent
isCopyrightProtected: true
accessRestrictedTo: 1

## General comment
The process represents the treatment of 'residue from mechanical treatment, industrial device' in a municipal solid waste incinerator (MSWI). Recommended use of this dataset: Only for incineration of shredder residues generated in the recycling (mechanical treatment) of industrial electronicsInventoried waste contains several fractions: 1.54% rubber; 37.7% Plastics from electronic consumer goods; 37.7% Plastics from electronic industrial goods; 22.4% MSWI iron scrap; 0.0742% Alu in MSW; 0.0767% Glass; 0.596% wiring copper; 0.0136% Pb in ASR inert; 0.00693% silver; . Waste composition (wet, in ppmw): gross heating value 27.76 MJ/kg; net heating value 26.61 MJ/kg; H2O 6923; O 66293; H 57376; C 626570; S 490.55; N 10017; P 555.61; B na; Cl 5261.7; Br 4145.6; F 188.3; I na; Ag 69.307; As 5.6489; Ba 133.31; Cd 114.15; Co 22.202; Cr 308.3; Cu 11402; Hg 0.64022; Mn 542.24; Mo 2.2596; Ni 612.61; Pb 332.45; Sb 3658.7; Se 1.4759; Sn 302.82; V 56.507; Zn 622.94; Be 0.35141; Sc na; Sr 62.199; Ti 3372; Tl 0.28113; W na; Si 9434.4; Fe 183630; Ca 2399.8; Al 4830.6; K 88.123; Mg na; Na 154.54. Share of carbon in initial waste input that is biogenic 0%.Share of metals in waste not oxidised and bulk-recyclable (exclude very small or thin parts) Iron: 99.37%; Alu: 16.4%; Copper: 53.52%.Recovery of metal scrap from bottom ash to recycling: 105.82g iron scrap, 0.229g aluminium scrap, 1.8476g copper scrap. From this waste, the FLUWA process in the technology mix recovers 0.000705kg (DM) of a hydroxide sludge to be recycled in zinc furnaces. Net energy production: 3.34MJ/kg electric energy and 6.62MJ/kg thermal energy.

## Included activities start
The activity starts with the waste being available at the gate of the treatment facility. Collection and transportation of the waste to the treatment plant is not included.

## Included activities end
The activity ends with the waste being treated and waste-specific emissions from the incineration process and auxiliary material consumption for flue gas cleaning are released to the environment (air and water). Infrastructure and waste-specific energy demands for Municipal Solid Waste Incineration (MSWI) and net energy generation are included.

## Geography
Modelling parameters affecting the treatment technology are specific to this geography and to the technology mix encountered in Switzerland in 2012.

## Technology
The waste is treated in the incineration plant with flue gas cleaning. Incineration is the controlled combustion of a waste and it includes fly ash extraction (FAE). Auxiliary material consumption for this step of air pollution control (APC) are included in the process. Air polution control includes electrostatic precipitator for fly ash (ESP), wet flue gas scrubber and 25% SNCR , 42.77% SCR-high dust , 32.68% SCR-low dust -DeNOx facilities and 0% without DeNOx (weighted according to mass of burnt waste). Efficiency of iron scrap separation from slag : 58%. Efficiency of aluminium scrap separation from slag : 31%. Efficiency of copper scrap separation from slag : 31%. The technology mix for this dataset includes a filter ash treatment (FLUWA) of a share of 46.22%. Gross electric efficiency technology mix 15.84% and Gross thermal efficiency technology mix 28.51%

## Reference product
- heat, for reuse in municipal waste incineration only: 1 MJ; By-product classification allocatable product; CPC 17300: Steam and hot water
  net useful heat generated from this waste and used in internal MSWI plant energy redistribution.
  production volume 1.82349e7 MJ
    calculated in proportion to incinerated waste input
  property price 0.0106 EUR2005
    Average European district heat price from Ecoheatcool and Euroheat 2005-2006, Ecoheat Work package 1: The European heat market. Final report. 10.6 EUR/GJ i s the price of district heat. http://www.solarthermalworld.org/files/Ecoheatcool%20WP1%20Web.pdf?download
  properties: carbon allocation 0 kg, carbon content 0, exergy 0.1842 MJ, true value relation 0.1842
