# carrot seed production, Swiss integrated production, at farm

Dataset: EcoSpold 2, unit process
Geography: CH
Time period: 2000-01-01 to 2023-12-31
Technology level: current
Classification: ISIC rev.4 ecoinvent: 0113:Growing of vegetables and melons, roots and tubers
Tags: WFLDB
Scenario: Business-as-Usual
System model: Allocation, cut-off by classification
Generated by: Patrik Mouron
Published in: Nemecek T. 2015
Database: ecoinvent
isCopyrightProtected: true
accessRestrictedTo: 1

## General comment
This dataset represents the production of 1 kg of carrot seed (fresh matter) at farm. The yield is 1000 kg/ha at a moisture content at storage of 10%.
This process is identical to the ecoinvent process 'grass seed production, Swiss integrated production, at farm' which is used as a proxy for carrot seed production at farm. This dataset refers to an average situation; for specific situations exchanges might differ substantially due to site specific parameters

## Included activities start
This activity assumes co-production of grass seeds and forage on an intensive temporary meadow during one year. Included in the dataset are (a) those operations which can be explicitly attributed to seed production and (b) other inputs and the emissions with a share of 50% of the burden of the whole production system, attributing the other 50% to forage production. The activity starts with the soil cultivation and sowing after the harvest of the previous crop. The inputs of seeds, mineral fertilisers and pesticides are considered. Farm manure as an organic fertiliser is only accounted for in terms of direct field emissions; all pre-processes are included in the animal production systems.

## Included activities end
The dataset includes all machine operations and corresponding machine infrastructure and sheds. Machine operations are: soil cultivation, sowing, fertilisation, pest control, harvest, transport from field to regional processing center (10 km) and drying of seeds. This activity ends after drying of the seeds at the regional processing center.

## Technology
Integrated production

## Time period
Time period referring to the data source: 2000-2000. Based on expert opinion data is considered to be valid at least up to 2012.

## Reference product
- carrot seed, Swiss integrated production, at farm: 1 kg; By-product classification allocatable product; CPC 01260: Vegetable seeds, except beet seeds; HS2017 070610: Vegetables, root; carrots and turnips, fresh or chilled
  Reference flow: Yield = 1000 kg/ha
  production volume 6128.16 kg
    Source: FAOSTAT. Average, 2009-2012. Calculation method: crop production volume [kg] / crop productivity [kg/ha] * seeding density [kg/ha] = kg
  property carbon content, non-fossil 0.523
    calculation: C-content of components according to ecoinvent report No. 15a. Source of composition: https://ndb.nal.usda.gov/ndb/search/. Unspecific seed used as proxy.
  property price 0.372778 EUR2005
    Calculated based on inputs: The price of the product has been calculated as a sum of the values of the material and energy inputs for this product. This value is therefore a rough estimation. It may underestimate the real price since there are additional expenses when producing any product. These expences can include for example labour costs, treatment of waste materials and profit for the producer. Please consider carefully whether this level of data quality is acceptable for your application.
  properties: carbon allocation 0.491495 kg, carbon content 0.523, carbon content, fossil 0, dry mass 0.939761 kg, water content 0.0641, water in wet mass 0.0602387 kg, wet mass 1 kg

## Inputs from technosphere
- ammonium nitrate: 0.285732 kg; lognormal variance with pedigree 0.0133563, pedigree (2,1,4,1,1)
  The exchange has been updated from 'ammonium nitrate, as N' into 'ammonium nitrate' and therefore its amount has been scaled (multiplied) from 0.1 kg by 2.8573 kg of 'ammonium nitrate' per kg of 'ammonium nitrate, as N'. Original comment of the exchange is: Extrapolated from Ecoinvent v2.2 process 'Grass seed IP, at regional storehouse/CH U'. Corresponds to 0.1 kg/ha
  properties: dry mass 1 kg, wet mass 1 kg
- application of plant protection product, by field sprayer: 0.001 ha; lognormal variance with pedigree 0.0133563, pedigree (2,1,4,1,1)
  Extrapolated from Ecoinvent v2.2 process 'Grass seed IP, at regional storehouse/CH U'
- benzimidazole-compound: 0.002 kg; lognormal variance with pedigree 0.0133563, pedigree (2,1,4,1,1)
  Extrapolated from Ecoinvent v2.2 process 'Grass seed IP, at regional storehouse/CH U'
  properties: carbon content, fossil 0.529668, dry mass 1 kg, wet mass 1 kg
- carrot seed, for sowing: 0.016 kg; lognormal variance with pedigree 0.0133563, pedigree (2,1,4,1,1)
  Extrapolated from Ecoinvent v2.2 process 'Grass seed IP, at regional storehouse/CH U'. Sowing density: 16kg/ha.
  properties: carbon content, non-fossil 0.523, dry mass 0.939761 kg, water content 0.0641, wet mass 1 kg
  note on carbon content, non-fossil: calculation: C-content of components according to ecoinvent report No. 15a. Source of composition: https://ndb.nal.usda.gov/ndb/search/. Unspecific seed used as proxy.
- combine harvesting: 0.001 ha; lognormal variance with pedigree 0.0133563, pedigree (2,1,4,1,1)
  Extrapolated from Ecoinvent v2.2 process 'Grass seed IP, at regional storehouse/CH U'
- drying of bread grain, seed and legumes: 0.366295 l; lognormal variance with pedigree 0.0133563, pedigree (2,1,4,1,1)
  Extrapolated from Ecoinvent v2.2 process 'Grass seed IP, at regional storehouse/CH U'
- fertilising, by broadcaster: 0.0015 ha; lognormal variance with pedigree 0.0133563, pedigree (2,1,4,1,1)
  Extrapolated from Ecoinvent v2.2 process 'Grass seed IP, at regional storehouse/CH U'
- inorganic phosphorus fertiliser, as P2O5: 0.0425 kg; lognormal variance with pedigree 0.0133563, pedigree (2,1,4,1,1)
  Extrapolated from Ecoinvent v2.2 process 'Grass seed IP, at regional storehouse/CH U'. Corresponds to 0.0425 kg/ha
  properties: dry mass 1 kg, wet mass 1 kg
- packaging, for fertilisers: 0.51 kg; lognormal variance with pedigree 0.0592, pedigree (4,3,4,5,4)
  Total amount of active substance/s of fertilisers needed for the production of 'carrot seed, Swiss integrated production, at farm' is calculated to be circa 2.55E-01 kg. Fertiliser/s used in this dataset is/are: 'ammonium nitrate, as N', 'phosphate fertiliser, as P2O5', 'potassium chloride, as K2O'. The total amount of active substance/s is doubled in order to account for the packaging of the dilluted product of fertiliser/s that is/are applied. Therefore, 5.10E-01 kg of packaging for fertilisers is justified with this exchange.
  properties: carbon content, fossil 0.825301, dry mass 1 kg, heating value, net 25.01 MJ, price 0.0642 EUR2005, wet mass 1 kg
  note on carbon content, fossil: Considering a chemical formula (C2H4)n for polyethylene, carbon content-fossil is calculated to be 0.856286 kg of Carbon per kg of dry mass.
- packaging, for pesticides: 0.004 kg; lognormal variance with pedigree 0.0592, pedigree (4,3,4,5,4)
  Total amount of active substance/s of pesticides needed for the production of carrot seed, Swiss integrated production, at farm is calculated to be circa 2.00E-03 kg. Pesticide/s used in this dataset is/are: 'benzimidazole-compound'. The total amount of active substance/s is doubled in order to account for the packaging of the dilluted product of pesticide/s that is/are applied. Therefore, 4.00E-03 kg of packaging for pesticides is justified with this exchange.
  properties: carbon content, fossil 0.85714, dry mass 1 kg, heating value, net 25.97 MJ, price 0.0642 EUR2005, wet mass 1 kg
- potassium chloride: 0.178076 kg; lognormal variance with pedigree 0.0133563, pedigree (2,1,4,1,1)
  The exchange has been updated from 'potassium chloride, as K2O' into 'potassium chloride' and therefore its amount has been scaled (multiplied) from 0.1125 kg by 1.5829 kg of 'potassium chloride' per kg of 'potassium chloride, as K2O'. Original comment of the exchange is: Extrapolated from Ecoinvent v2.2 process 'Grass seed IP, at regional storehouse/CH U'. Corresponds to 0.113 kg/ha
  properties: dry mass 1 kg, wet mass 1 kg
- sowing: 0.001 ha; lognormal variance with pedigree 0.0133563, pedigree (2,1,4,1,1)
  Extrapolated from Ecoinvent v2.2 process 'Grass seed IP, at regional storehouse/CH U'
- tillage, harrowing, by spring tine harrow: 0.0005 ha; lognormal variance with pedigree 0.0133563, pedigree (2,1,4,1,1)
  Extrapolated from Ecoinvent v2.2 process 'Grass seed IP, at regional storehouse/CH U'
- tillage, ploughing: 0.0005 ha; lognormal variance with pedigree 0.0133563, pedigree (2,1,4,1,1)
  Extrapolated from Ecoinvent v2.2 process 'Grass seed IP, at regional storehouse/CH U'
- transport, tractor and trailer, agricultural: 0.01 metric ton*km; lognormal variance with pedigree 0.0133563, pedigree (2,1,4,1,1)
  Extrapolated from Ecoinvent v2.2 process 'Grass seed IP, at regional storehouse/CH U'. Corresponds to 10tkm/ha.

## Inputs from nature
- Carbon dioxide, in air [natural resource, in air]: 1.3727 kg; lognormal variance with pedigree 0.356838, pedigree (2,1,4,1,1)
  Extrapolated from Ecoinvent v2.2 process 'Grass seed IP, at regional storehouse/CH U'. CO2 uptake by biomass.
- Energy, gross calorific value, in biomass [natural resource, biotic]: 16.038 MJ; lognormal variance with pedigree 0.356838, pedigree (2,1,4,1,1)
  Extrapolated from Ecoinvent v2.2 process 'Grass seed IP, at regional storehouse/CH U'. Gross energy content is related to MJ/kg dry matter of product. Source: ecoinvent data.
- Occupation, annual crop, non-irrigated [natural resource, land]: 5 m2*year; lognormal variance with pedigree 0.0200616, pedigree (2,1,4,1,1)
  Extrapolated from Ecoinvent v2.2 process 'Grass seed IP, at regional storehouse/CH U'. Related to the duration from harvest date of previous crop to harvest date of main crop.
- Transformation, from annual crop, non-irrigated [natural resource, land]: 3.55 m2; lognormal variance with pedigree 0.0442144, pedigree (2,1,4,1,1)
  Extrapolated from Ecoinvent v2.2 process 'Grass seed IP, at regional storehouse/CH U'. 10000 m2 divided by the life time of the crop.
- Transformation, from pasture, man made [natural resource, land]: 1.45 m2; lognormal variance with pedigree 0.0442144, pedigree (2,1,4,1,1)
  (same comment as for Transformation, from annual crop, non-irrigated)
- Transformation, to annual crop, non-irrigated [natural resource, land]: 5 m2; lognormal variance with pedigree 0.0442144, pedigree (2,1,4,1,1)
  (same comment as for Transformation, from annual crop, non-irrigated)

## Emissions to nature
- Ammonia [air, non-urban air or from high stacks]: 0.0012143 kg; source EEA 2013; lognormal variance with pedigree 0.0446216, pedigree (2,1,4,1,1)
  Extrapolated from Ecoinvent v2.2 process 'Grass seed IP, at regional storehouse/CH U'
- Dinitrogen monoxide [air, non-urban air or from high stacks]: 0.0010114 kg; lognormal variance with pedigree 0.124564, pedigree (2,1,4,1,1)
  Extrapolated from Ecoinvent v2.2 process 'Grass seed IP, at regional storehouse/CH U'
- Nitrogen oxides [air, non-urban air or from high stacks]: 0.00021238 kg; source EEA 2013; lognormal variance with pedigree 0.124564, pedigree (2,1,4,1,1)
  Extrapolated from Ecoinvent v2.2 process 'Grass seed IP, at regional storehouse/CH U'
- Cadmium II [soil, agricultural]: 2.0452e-6 kg; lognormal variance with pedigree 0.207866, pedigree (2,2,5,1,1)
  Extrapolated from Ecoinvent v2.2 process 'Grass seed IP, at regional storehouse/CH U'
- Chromium III [soil, agricultural]: -9.681e-7 kg
  Extrapolated from Ecoinvent v2.2 process 'Grass seed IP, at regional storehouse/CH U'
- Copper ion [soil, agricultural]: -1.6447e-5 kg
  Extrapolated from Ecoinvent v2.2 process 'Grass seed IP, at regional storehouse/CH U'
- Ethofumesate [soil, agricultural]: 0.002 kg; lognormal variance with pedigree 0.0857992, pedigree (2,2,5,1,1)
  Extrapolated from Ecoinvent v2.2 process 'Grass seed IP, at regional storehouse/CH U'
- Lead II [soil, agricultural]: 4.3724e-7 kg; lognormal variance with pedigree 0.207866, pedigree (2,2,5,1,1)
  Extrapolated from Ecoinvent v2.2 process 'Grass seed IP, at regional storehouse/CH U'
- Nickel II [soil, agricultural]: 4.5789e-7 kg; lognormal variance with pedigree 0.207866, pedigree (2,2,5,1,1)
  Extrapolated from Ecoinvent v2.2 process 'Grass seed IP, at regional storehouse/CH U'
- Zinc II [soil, agricultural]: -2.2536e-5 kg
  Extrapolated from Ecoinvent v2.2 process 'Grass seed IP, at regional storehouse/CH U'
- Cadmium II [water, ground-]: 2.1838e-8 kg; lognormal variance with pedigree 0.356838, pedigree (2,1,4,1,1)
  Extrapolated from Ecoinvent v2.2 process 'Grass seed IP, at regional storehouse/CH U'
- Cadmium II [water, surface water]: 2.7994e-8 kg; lognormal variance with pedigree 0.356838, pedigree (2,1,4,1,1)
  Extrapolated from Ecoinvent v2.2 process 'Grass seed IP, at regional storehouse/CH U'
- Chromium III [water, ground-]: 9.2926e-6 kg; lognormal variance with pedigree 0.356838, pedigree (2,1,4,1,1)
  Extrapolated from Ecoinvent v2.2 process 'Grass seed IP, at regional storehouse/CH U'
- Chromium III [water, surface water]: 2.1821e-6 kg; lognormal variance with pedigree 0.356838, pedigree (2,1,4,1,1)
  Extrapolated from Ecoinvent v2.2 process 'Grass seed IP, at regional storehouse/CH U'
- Copper ion [water, ground-]: 1.3697e-6 kg; lognormal variance with pedigree 0.356838, pedigree (2,1,4,1,1)
  Extrapolated from Ecoinvent v2.2 process 'Grass seed IP, at regional storehouse/CH U'
- Copper ion [water, surface water]: 1.4443e-6 kg; lognormal variance with pedigree 0.356838, pedigree (2,1,4,1,1)
  Extrapolated from Ecoinvent v2.2 process 'Grass seed IP, at regional storehouse/CH U'
- Lead II [water, ground-]: 2.958e-8 kg; lognormal variance with pedigree 0.356838, pedigree (2,1,4,1,1)
  Extrapolated from Ecoinvent v2.2 process 'Grass seed IP, at regional storehouse/CH U'
- Lead II [water, surface water]: 2.5157e-7 kg; lognormal variance with pedigree 0.356838, pedigree (2,1,4,1,1)
  Extrapolated from Ecoinvent v2.2 process 'Grass seed IP, at regional storehouse/CH U'
- Nickel II [water, surface water]: 1.4491e-6 kg; lognormal variance with pedigree 0.356838, pedigree (2,1,4,1,1)
  Extrapolated from Ecoinvent v2.2 process 'Grass seed IP, at regional storehouse/CH U'
- Nitrate [water, ground-]: 0.0037357 kg; lognormal variance with pedigree 0.175766, pedigree (2,1,4,1,1)
  Extrapolated from Ecoinvent v2.2 process 'Grass seed IP, at regional storehouse/CH U'
- Phosphate [water, ground-]: 0.00011664 kg; source Prasuhn V.  2006; lognormal variance with pedigree 0.175766, pedigree (2,1,4,1,1)
  Extrapolated from Ecoinvent v2.2 process 'Grass seed IP, at regional storehouse/CH U'
- Phosphate [water, surface water]: 0.00011664 kg; source Prasuhn V.  2006; lognormal variance with pedigree 0.175766, pedigree (2,1,4,1,1)
  Extrapolated from Ecoinvent v2.2 process 'Grass seed IP, at regional storehouse/CH U'
- Phosphorus [water, surface water]: 9.8528e-5 kg; source Prasuhn V.  2006; lognormal variance with pedigree 0.175766, pedigree (2,1,4,1,1)
  Extrapolated from Ecoinvent v2.2 process 'Grass seed IP, at regional storehouse/CH U'
- Zinc II [water, ground-]: 6.2012e-6 kg; lognormal variance with pedigree 0.356838, pedigree (2,1,4,1,1)
  Extrapolated from Ecoinvent v2.2 process 'Grass seed IP, at regional storehouse/CH U'
- Zinc II [water, surface water]: 2.518e-6 kg; lognormal variance with pedigree 0.356838, pedigree (2,1,4,1,1)
  Extrapolated from Ecoinvent v2.2 process 'Grass seed IP, at regional storehouse/CH U'

## Sampling procedure
Data derived from literature, recommendations and expert information

## Extrapolations
Production of imported seed is approximated by seed produced in Switzerland.
