# tap water production, underground water with chemical treatment

Dataset: EcoSpold 2, unit process
Geography: CA-QC
Time period: 2012-01-01 to 2023-12-31
Technology level: current
Classification: ISIC rev.4 ecoinvent: 3600:Water collection, treatment and supply
Classification: EcoSpold01Categories: water supply/production
Synonyms: potable water
Tags: single enterprise data
Scenario: Business-as-Usual
System model: Allocation, cut-off by classification
Share of production covered: 18 %
Generated by: Marylène Dussault
Database: ecoinvent
isCopyrightProtected: true
accessRestrictedTo: 1

## General comment
This dataset represents production of 1 kg of tap water under pressure at facility gate, ready for distribution in network. It represents average operation of tap water from underground water with chemical treatments. Water is pumped from aquifer, chemically enhanced (e.g. corosion inhibitor, ph, chloration, etc.) and pressurized for distribution. Inventory was constructed from reported energy inputs and wastes from a single plant located in Québec assumed to represent 8% of total production of tap water from this technology.

## Included activities start
From the intake pumping of raw surface water into the water treatment plant.

## Included activities end
This dataset ends with the production of tap water, at facility gate, under pressure. It includes energy for intake pumping, lighting and heating of the building as well as the energy of the pump pressurizing water to the beginning of the network. Infrastructure for the facility is estimated. It excludes energy for pumping stations and water losses within the network which is included in the tap water market. Emissions to the environment occurring during the treatment and during the distribution were not considered as they are assumed negligible. Main substance in water that would be released in the environment are assumed to be considered in wastewater processes.

## Time period
Time of publication.

## Reference product
- tap water: 1 kg; name tapwater; By-product classification allocatable product; CPC 18000: Natural water; CAS 7732-18-5
  production volume 1.24e11 kg; name PV_tapwater
    Calculated value. Estimated value based on extrapolated from literature data on share of surface water vs underground water and share of disinfection treatment and other water treatment (pH adjustment, alkalinity, corosion inhibitor) to tap water production from groundwater in Quebec.
  property price 0.000397 EUR2005
    Converted from EU price by using Purchasing Power Parities (0.8458 in 2003 and 0.8426 in 2004)
  properties: carbon allocation 6.08566e-7 kg, carbon content 0.0017899, carbon content, fossil 0.0017899, carbon content, non-fossil 0, dry mass 0.00034 kg, water content 2940.18, water in wet mass 0.99966 kg, wet mass 1 kg

## Inputs from technosphere
- diesel, burned in building machine: 5.29805e-5 MJ; = diesel_use*density_diesel*NHV*43.2; lognormal variance with pedigree 0.008, pedigree (1,1,4,1,1)
  Calculated value.
  Uncertainty: Calculated variable. Uncertainty will be determined from propagation of uncertainty factors of underlying variables.
  property density 0.84 kg/l; name density_diesel
  property fuel input in physical units, L 1.46e-6 l; name diesel_use
  property heating value, net 1 MJ; name NHV
  note on fuel input in physical units, L: Measured value. Average of diesel volume consumed in a year for emergency generators (both for emergency and routine maintenance runs).
  note on heating value, net: Literature. net (lower) heating (calorific) value for diesel in MJ/kg
- electricity, medium voltage: 0.000841 kWh; lognormal variance with pedigree 0.0098, pedigree (2,3,4,1,1)
  Measured value. Average electricity consumption for entire process including pumping for water intake and pumping for distribution at the plant gate. All plants (2) reported electricity use.
  EcoSpold01Location=UCTE
- pump station: 2.0568e-11 unit; lognormal variance with pedigree 0.0506, pedigree (5,4,4,1,1)
  Approximated process. Used to represent facility pumping both intake and at facility gate. Value taken directly from ecoinvent V2.2 tap water, at user module.
- sodium hydroxide, without water, in 50% solution state: 5.9524e-6 kg; lognormal variance with pedigree 0.0112, pedigree (2,4,4,1,1)
  Measured value. Average use of sodium hydroxide (dry basis) for adjustement in surveyed underground water with chemical treatment plants. Input of exchange "water", based on NaOH concentration, was added accordingly. Note that 1 plants reported using this substance.
  properties: dry mass 1 kg, heating value, net 3.03 MJ, wet mass 1 kg
- sodium hypochlorite, without water, in 15% solution state: 1.2e-6 kg; lognormal variance with pedigree 0.0112, pedigree (2,4,4,1,1)
  Measured value. Average use of hypochlorite (dry basis) for disinfection in surveyed underground water with chemical treatment plants. Reported concentration of solution is 12% (w/w), input of exchange "water" was added accordingly. Note the 1 plants reported using this substance.
  properties: dry mass 1 kg, wet mass 1 kg
- sodium pyrophosphate: 8.12435e-7 kg; name tetrasodiumpyrophosphate; lognormal variance with pedigree 0.0112, pedigree (2,4,4,1,1)
  Measured value. Average use of tetrasodium pyrophosphate reported in surveyed underground water with chemical treatment plants. Note than 1 plant reported using this substance.
- sodium silicate, solid: 8.54444e-7 kg; lognormal variance with pedigree 0.0112, pedigree (2,4,4,1,1)
  Measured value. Average use of chemical reported in surveyed underground water with chemical treatment plants. Note than 1 plant reported using this substance.
  properties: dry mass 1 kg, wet mass 1 kg
- sodium tripolyphosphate: 7.91365e-7 kg; lognormal variance with pedigree 0.0112, pedigree (2,4,4,1,1)
  (same comment as for sodium silicate, solid)
  properties: dry mass 1 kg, wet mass 1 kg
- tap water: 2.41269e-5 kg; lognormal variance with pedigree 0.0112, pedigree (3,3,4,1,1)
  Calculated value. Water content of hypochlorite solution, sodium hydroxide, sodium silicate solution, pyrophosphate solution and zinc polyphosphate solution.
  properties: carbon content, fossil 0.00178991, dry mass 0.000337476 kg, water content 2962.17, wet mass 1 kg
  note on carbon content, fossil: Bicarbonate content is 2.93 mol/m3. CO2 content is 0.1 mol/m3 (ecoinvent v2.2 report 8, Tab 93.1).

## Inputs from nature
- Water, well, in ground [natural resource, in water]: 0.001 m3; name waterIn
  Measured value. Data provider reported that no loss occurs thoughout water treatment.

## Sampling procedure
Based on data collected from selected plants chosen either for their technological specificities or their production representativeness. A survey campaign was conducted in summer 2013 with 2012 as a reference year. All technologies combined, 16 distinct tap water production plants participated.

## Extrapolations
From a single municipal groundwater treatment plant for tap water production to all tap water production from underground water with chemical treatment in the region. This technology is assumed to represents 9.2% of all tap water volume produced in Quebec.
