# chlor-alkali electrolysis, mercury cell

Dataset: EcoSpold 2, unit process
Geography: GLO
Time period: 2000-01-01 to 2023-12-31
Technology level: old
Classification: ISIC rev.4 ecoinvent: 2011:Manufacture of basic chemicals
Synonyms: Chlor; Molecular chlorine; Chlore; Bertholite; Cloro
Scenario: Business-as-Usual
System model: Allocation, cut-off by classification
Generated by: Roland Hischier
Published in: Althaus H.-J. 2007
Database: ecoinvent
isCopyrightProtected: true
accessRestrictedTo: 1

## General comment
This dataset represents the production of chlorine and sodium hydroxide (NaOH) by means of chlor-alkali electrolysis using a mercury cell. The chlor-alkali process is the main technology for the production of chlorine and sodium hydroxide. In this process, chlorine and sodium hydroxide are produced by electrolysis of a salt solution using either a mercury cell, diaphragm cell or membrane cell.
Chlorine is largely used in the synthesis of chlorinated organic compounds. PVC and isocyanates are the main drivers of chlor-alkali production in the EU-27 and EFTA countries (Euro Chlor 2013). These products are used in a wide range of applications, such as construction materials, plastics, clothing and pesticides.
Sodium hydroxide is a white odorless pellet or solid that is very soluble. Sodium hydroxide is used for the synthesis of other chemicals, and is used in the metal industry, the pulp and paper sector, the textile industry and in other various sectors.
This dataset is mainly based on a document concerning the best available techniques in the chlor-alkali manufacturing industry (European Commission 2001).
References:
Althaus H.-J., Chudacoff M., Hischier R., Jungbluth N., Osses M. and Primas A. (2007) Life Cycle Inventories of Chemicals. Final report ecoinvent data v2.0 No. 8. Swiss Centre for Life Cycle Inventories, Dübendorf, CH.
European Commission (2001) Integrated Pollution Prevention and Control (IPPC) - Reference Document on Best Available Techniques in the Chlor-Alkali Manufacturing Industry. Institute for Prospective Technological Studies, Sevilla.
Euro Chlor (2013) An Eco-profile and Environmental Product Declaration of the European Chlor-Alkali Industry, Chlorine (The chlor-alkali process).

## Included activities start
The activity starts when the raw materials enter the process.

## Included activities end
This activity ends with the production of gaseous chlorine and sodium hydroxide. Besides the electrolysis process in a mercury cell, the following process steps are included in this process: brine production, brine purification, brine resaturation as well as the final handling of the electrolysis products, without the chlorine liquefaction.

## Geography
European average values. The inventory is assumed to be representative of the global production.

## Technology
The mercury cell process comprises an electrolysis cell and a decomposer. Purified and saturated brine (25-28 wt.-% NaCl in water) is fed to the electrolysis cell on top of a film of mercury (Hg) flowing down the inclined base of the cell. The base of the cell is connected to the negative pole of a direct current supply forming the cathode of the cell. Anodes consisting of titanium coated with oxides of ruthenium and titanium are placed in the brine without touching the mercury film. At the anodes, chlorine gas is formed which is collected and directed to further processing. Due to a high overpotential of hydrogen at the mercury electrode, no gaseous hydrogen is formed; instead, sodium is produced and dissolved in the mercury as an amalgam (mercury alloy). The liquid amalgam is removed from the electrolytic cell and fed to a decomposer, where it reacts with demineralised water in the presence of a graphite-based catalyst to form sodium hydroxide solution and hydrogen. The sodium-free mercury is recirculated back into the cell. Cooling of hydrogen is essential to remove any water and mercury. The sodium hydroxide solution is very pure, almost free from chloride contamination and has usually a concentration of 50 %. Further treatment comprises cooling and removal of catalyst and mercury traces by centrifuges or filters. Advantages of the mercury cell process are the high quality of chlorine and the high concentration and purity of sodium hydroxide solution produced. The consumption of electric energy for electrolysis is, however, higher than for the other techniques and a high purity of the feed brine is required. Inherently, the use of mercury gives rise to environmental releases of mercury.
References:
Euro Chlor (2013) An Eco-profile and Environmental Product Declaration of the European Chlor-Alkali Industry, Chlorine (The chlor-alkali process).

## Parameters
- fraction, cooling water, cooling pond system, to air: 0.032 dimensionless; name fraction_CW_CP_to_air; lognormal variance with pedigree 0.0413, pedigree (2,3,1,3,1)
  Calculated based on literature value (Scown, C.D., 2011, Water Footprint of U.S. Transportation Fuels and supplying information of the article) (Vionnet, S., Quantis Water Database - Technical Report, 2012).
- fraction, cooling water, once-through system, to air: 0.004 dimensionless; name fraction_CW_OT_to_air; lognormal variance with pedigree 0.0413, pedigree (2,3,1,3,1)
  (same comment as for fraction, cooling water, cooling pond system, to air)
- fraction, cooling water, recirculating system, to air: 0.771 dimensionless; name fraction_CW_R_to_air; lognormal variance with pedigree 0.0413, pedigree (2,3,1,3,1)
  (same comment as for fraction, cooling water, cooling pond system, to air)
- fraction, cooling water, to air: 0.3875 dimensionless; name fraction_CW_to_air; = (0.5*fraction_CW_OT_to_air)+(0.5*fraction_CW_R_to_air); lognormal variance with pedigree 0.092025, pedigree (4,4,3,2,4)
  Calculated value based on literature value (see comments of the other parametres present in this dataset) and expert opinion. In the case when no industry/literature data are available about the type of cooling or directly fraction, cooling water, to air specific for the process a default assumption is applied. It is assumed that the once-through cooling system is used in 50% of all cases and recirculating system is used in another 50% of all cases.
- fraction, process water, to air: 0.205 dimensionless; name fraction_PW_to_air; lognormal variance with pedigree 0.092025, pedigree (4,4,3,2,4)
  Literature value (Statistics Canada, 2007 & Shaffer, K.H., 2008, Consumptive water use in the Great Lakes Basin, USGS) (Vionnet, S., Quantis Water Database - Technical Report, 2012).

## Reference product
- chlorine, gaseous: 1 kg; name RP; By-product classification allocatable product; CPC 34231: Chemical elements n.e.c.; inorganic acids except phosphoric, nitric and sulphonitric; inorganic oxygen compoun[…]; HS2017 280110: Chlorine; CAS 7782-50-5
  Chlorine is largely used in the synthesis of chlorinated organic compounds. PVC and isocyanates are the main drivers of chlor-alkali production in the EU-27 and EFTA countries (Euro Chlor 2013). These products are used in a wide range of applications, such as construction materials, plastics, clothing and pesticides.
  References:
  Euro Chlor (2013) An Eco-profile and Environmental Product Declaration of the European Chlor-Alkali Industry, Chlorine (The chlor-alkali process).
  production volume 2.04393e9 kg; name RP_PV; = 97.33e9*0.021
    Based on statista, the Global market volume of chlorine in 2022 is 97.33 million metric tonnes.
    Based on the World Chlorine Council, 2% of the Global chlorine is produced by mercury cells in 2019.
    References:
    Statista (2023): Market volume of chlorine worldwide from 2015-2022, with a forecast for 2023 to 2030, available here: https://www.statista.com/statistics/1310477/chlorine-market-volume-worldwide/, last accessed 14-08-2023.
    World Chlorine Council (2021): Chlor-Alkali Manufacturing Processes, available here: https://www.eurochlor.org/wp-content/uploads/2021/09/WCC-CA-Manufacturing-Processes-brochure.pdf, last accessed 14-08-2023.
  property price 0.141 EUR2005
    Global average price for gaseous chlorine derived from the global average price of liquid chlorine by substracting the cost of inputs (0.07 KWh of electricity, medium voltage) needed for the liquefaction (0.007EUR/kg of liquid chlorine at an electricity price of 0.1EUR/kWh). The price for liquid chlorine (0.148 EUR/kg) was calculated as weighted average of the European (238Eur/tonne), US (223EUR/tonne) and the Chinese (84EUR/tonne) (Tecnon OrbiCHem, 2016) price according to the region's market shares (Europe 15%, US 20%, China 45%) scaled to 100% (ruschlor.ru, 2014).
    Reference(s):
    Tecnon OrbiCHem. 2016. Chem-Netfacts, Chemical insight an foresight - on a single page, Chlorine, 1 April 2016, document requested at http://www.orbichem.com/Chem-Netfacts.aspx?P_ID=208, 6 October 2017;
    ruschlor.ru. 2014. International Outlook for the Future of the Chinese Chlor-Alkali Industry retrieved from http://ruschlor.ru/english/images/stories/Pekin%20/Otchet_Engl/_.doc, 6 October 2017
  properties: allocation factor 0.343767, carbon allocation 0 kg, carbon content 0, carbon content, fossil 0, carbon content, non-fossil 0, dry mass 1 kg, true value 0.141, water content 0, water in wet mass 0 kg, wet mass 1 kg

## Inputs from technosphere
- barite: 0.00120318 kg; lognormal variance with pedigree 0.0526, pedigree (1,3,5,5,1)
  EC IPPC study 2002
  Uncertainty: E
  properties: dry mass 1 kg, wet mass 1 kg
- calcium chloride: 0.00137096, 0.00474809 kg (2 suppliers, which the file names only by identifier); sum of these 0.00611905 kg; lognormal variance with pedigree 0.0526, pedigree (1,3,5,5,1)
  EC IPPC study 2002
  Uncertainty: E
  properties: dry mass 1 kg, wet mass 1 kg
- carbon tetrachloride: 8.59417e-7, 2.57825e-6 kg (2 suppliers, which the file names only by identifier); sum of these 3.43767e-6 kg; lognormal variance with pedigree 0.0526, pedigree (1,3,5,5,1)
  EC IPPC study 2002
  Uncertainty: E
  properties: carbon content, fossil 0.0789474, dry mass 1 kg, heating value, net 2.37 MJ, wet mass 1 kg
- chemical factory, organics: 1.37507e-10 unit; lognormal variance with pedigree 0.3498, pedigree (2,3,5,4,3)
  Calculated based on literature data published by the industry. For this activity, no information was readily available concerning infrastructure and land-use. Therefore, the infrastructure is estimated based on data from two chemical factories, the BASF site of Ludwigshafen and the chemical factory in Gendorf (which are both located in Germany), which produce a wide range of chemical substances. Based on this data, the following assumptions are made: the built area amounts to about 4.2 ha, the plant has an average output of 50'000 t/a and a lifespan of fifty years. The estimated infrastructure amount is therefore 4.00 E-10 units per kg of produced chemical.
  References:
  Althaus H.-J., Chudacoff M., Hischier R., Jungbluth N., Osses M. and Primas A. (2007) Life Cycle Inventories of Chemicals. ecoinvent report No. 8, v2.0. EMPA Dübendorf, Swiss Centre for Life Cycle Inventories, Dübendorf, CH.
  Gendorf (2000) Umwelterklärung 2000, Werk Gendorf. Werk Gendorf, Burgkirchen.
- electricity, medium voltage: 1.22381 kWh; lognormal variance with pedigree 0.0526, pedigree (1,3,5,5,1)
  EC IPPC study 2002
  Uncertainty: E
- hydrochloric acid, without water, in 30% solution state: 0.00154334, 0.00705082 kg (2 suppliers, which the file names only by identifier); sum of these 0.00859417 kg; lognormal variance with pedigree 0.0526, pedigree (1,3,5,5,1)
  EC IPPC study 2002
  Uncertainty: E
  properties: dry mass 1 kg, heating value, net 3.32 MJ, wet mass 1 kg
- mercury: 2.32042e-6 kg; lognormal variance with pedigree 0.0526, pedigree (1,3,5,5,1)
  EC IPPC study 2002
  Uncertainty: E
  properties: dry mass 1 kg, wet mass 1 kg
- sludge, NaCl electrolysis Hg: -0.00422711, -0.00103251 kg (2 suppliers, which the file names only by identifier); sum of these -0.00525963 kg; lognormal variance with pedigree 0.0126, pedigree (1,3,1,5,1)
  EC IPPC study 2002
  Uncertainty: E
  production volume; = RP_PV*BP_sludge_NaCl_electrolysis_Hg/ABS(RP)
    Calculated from the production volume of chlorine, gaseous in proportion to the respective output amounts.
  properties: dry mass 1 kg, wet mass 1 kg
- soda ash, light: 0.00323063, 0.000722688 kg (2 suppliers, which the file names only by identifier); sum of these 0.00395332 kg; lognormal variance with pedigree 0.0526, pedigree (1,3,5,5,1)
  EC IPPC study 2002
  Uncertainty: E
  properties: carbon content, fossil 0.0517241, dry mass 1 kg, heating value, net 3.43 MJ, wet mass 1 kg
- sodium chloride, powder: 0.601592 kg; lognormal variance with pedigree 0.0526, pedigree (1,3,5,5,1)
  EC IPPC study 2002
  Uncertainty: E
  properties: dry mass 1 kg, wet mass 1 kg
- sodium hydroxide, without water, in 50% solution state: 0.000183492, 0.00187911 kg (2 suppliers, which the file names only by identifier); sum of these 0.0020626 kg; lognormal variance with pedigree 0.0526, pedigree (1,3,5,5,1)
  EC IPPC study 2002
  Uncertainty: E
  properties: dry mass 1 kg, heating value, net 3.03 MJ, wet mass 1 kg
- spent activated carbon with mercury: -9.96923e-5 kg; name BP_spent_activated_carbon_with_mercury; lognormal variance with pedigree 0.0126, pedigree (1,3,1,5,1)
  EC IPPC study 2002
  Uncertainty: E
  production volume; = RP_PV*BP_spent_activated_carbon_with_mercury/ABS(RP)
    (same comment as for sludge, NaCl electrolysis Hg)
  properties: carbon content, fossil 0.6, dry mass 1 kg, heating value, net 18.18 MJ, wet mass 1 kg
  note on carbon content, fossil: The spent carbon contains 0.1 to 50 w% (sic) mercury (ecoinvent v2.2 report 13_I, pg 56). Activated coal was considered to be charcoal, and to have a C content of 0.8 (Tab 15.1, ecoinvent v2.2 report 9-part 15). Na average Hg content of 25% was assumed.
- sulfite: 2.3012e-5, 1.13647e-5 kg (2 suppliers, which the file names only by identifier); sum of these 3.43767e-5 kg; lognormal variance with pedigree 0.0526, pedigree (1,3,5,5,1)
  EC IPPC study 2002
  Uncertainty: E
  properties: dry mass 1 kg, wet mass 1 kg
- sulfuric acid: 0.00262051, 0.000342754 kg (2 suppliers, which the file names only by identifier); sum of these 0.00296327 kg; lognormal variance with pedigree 0.0526, pedigree (1,3,5,5,1)
  Data from survey in literature (Ayres 1997)
  Uncertainty: D
  properties: dry mass 1 kg, wet mass 1 kg

## Inputs from nature
- Water, cooling, unspecified natural origin [natural resource, in water]: 0.0343767 m3; name water_cooling_UNO_input; lognormal variance with pedigree 0.1306, pedigree (2,5,5,5,4)
  estimate based on literature source
  Uncertainty: e
- Water, unspecified natural origin [natural resource, in water]: 0.000653157 m3; name water_UNO_input; lognormal variance with pedigree 0.0526, pedigree (1,3,5,5,1)
  EC IPPC study 2002
  Uncertainty: E

## Emissions to nature
- Carbon dioxide, fossil [air, urban air close to ground]: 0.00106568 kg; lognormal variance with pedigree 0.0526, pedigree (1,3,5,5,1)
  EC IPPC study 2002
  Uncertainty: E
- Carbon tetrachloride [air, urban air close to ground]: 7.73475e-7 kg; lognormal variance with pedigree 0.1826, pedigree (1,3,5,5,1)
  EC IPPC study 2002
  Uncertainty: E
- Chlorine [air, urban air close to ground]: 2.75013e-6 kg; lognormal variance with pedigree 0.1026, pedigree (1,3,5,5,1)
  EC IPPC study 2002
  Uncertainty: E
- Hydrogen [air, urban air close to ground]: 0.000189072 kg; lognormal variance with pedigree 0.1026, pedigree (1,3,5,5,1)
  EC IPPC study 2002
  Uncertainty: E
- Mercury II [air, urban air close to ground]: 3.95332e-7 kg; lognormal variance with pedigree 0.1026, pedigree (1,3,5,5,1)
  EC IPPC study 2002
  Uncertainty: E
- Water [air, unspecified]: 0.0134549 m3; = (water_cooling_UNO_input*fraction_CW_to_air)+(water_UNO_input*fraction_PW_to_air); lognormal variance with pedigree 0.0827, pedigree (2,2,5,5,1)
  Calculated as a fraction of the input of water. For more details, refer to the mathematical relation and the parameters.
  property fraction, origin: fresh water 0; name fraction_origin_fresh_water
  property fraction, origin: salt water 0; name fraction_origin_salt_water
  property fraction, origin: unspecified 1; name fraction_origin_unspecified
- BOD5, Biological Oxygen Demand [water, unspecified]: 1.08508e-7 kg; lognormal variance with pedigree 0.218, pedigree (4,5,5,5,5)
  Calculated value. The BOD, COD, TOC and BOD5 are calculated based on the amount and type of emissions released to water in the same activity.
- Bromate [water, surface water]: 9.45358e-5 kg; lognormal variance with pedigree 0.1026, pedigree (1,3,5,5,1)
  EC IPPC study 2002
  Uncertainty: E
- COD, Chemical Oxygen Demand [water, unspecified]: 1.08508e-7 kg; lognormal variance with pedigree 0.218, pedigree (4,5,5,5,5)
  (same comment as for BOD5, Biological Oxygen Demand)
- Chlorate [water, surface water]: 0.00072191 kg; lognormal variance with pedigree 0.1026, pedigree (1,3,5,5,1)
  EC IPPC study 2002
  Uncertainty: E
- Chloride [water, surface water]: 0.0051565 kg; lognormal variance with pedigree 0.1026, pedigree (1,3,5,5,1)
  EC IPPC study 2002
  Uncertainty: E
- Chlorinated solvents, unspecified [water, surface water]: 2.0626e-7 kg; lognormal variance with pedigree 0.3626, pedigree (1,3,5,5,1)
  EC IPPC study 2002
  Uncertainty: E
- DOC, Dissolved Organic Carbon [water, unspecified]: 3.76765e-8 kg; lognormal variance with pedigree 0.218, pedigree (4,5,5,5,5)
  (same comment as for BOD5, Biological Oxygen Demand)
- Mercury II [water, surface water]: 1.13443e-7 kg; lognormal variance with pedigree 0.1026, pedigree (1,3,5,5,1)
  EC IPPC study 2002
  Uncertainty: E
- Sulfate [water, surface water]: 0.00271576 kg; lognormal variance with pedigree 0.1026, pedigree (1,3,5,5,1)
  EC IPPC study 2002
  Uncertainty: E
- TOC, Total Organic Carbon [water, unspecified]: 3.76765e-8 kg; lognormal variance with pedigree 0.218, pedigree (4,5,5,5,5)
  (same comment as for BOD5, Biological Oxygen Demand)
- Water [water, unspecified]: 0.021575 m3; = water_cooling_UNO_input*(1-fraction_CW_to_air)+water_UNO_input*(1-fraction_PW_to_air); lognormal variance with pedigree 0.0827, pedigree (2,2,5,5,1)
  (same comment as for Water)
  property carbon content, fossil 0; name C_content_fossil
  property carbon content, non-fossil 0; name C_content_non_fossil
  property dry mass 0 kg; name DM
  property fraction, origin: fresh water 0; name fraction_origin_fresh_water_Ww
  property fraction, origin: salt water 0; name fraction_origin_salt_water_Ww
  property fraction, origin: unspecified 1; name fraction_origin_unspecified_Ww
  property water in wet mass 1000 kg; name WWM
  property wet mass 1000 kg; name WM

## Sampling procedure
Average values from the ranges indicated in the 'Reference Document on Best Available Techniques in the Chlor-Alkali Manufacturing Industry' published by the European Commission, IPPC (2001).

## Extrapolations
This dataset has been copied from an original dataset covering the geography RER. The uncertainty has been adjusted accordingly.

## Review by Gregor Wernet 2017-08-04
This dataset was additionally reviewed in a separate review process by Eric Johnson of Atlantic Consulting as well as Emilia Moreno Ruiz and Gregor Wernet of ecoinvent.
