# soybean production, organic

Dataset: EcoSpold 2, unit process
Geography: CH
Time period: 1996-01-01 to 2023-12-31
Technology level: current
Classification: ISIC rev.4 ecoinvent: 0111:Growing of cereals (except rice), leguminous crops and oil seeds
Synonyms: Glycine max
Scenario: Business-as-Usual
System model: Allocation, cut-off by classification
Share of production covered: 97 %
Generated by: Thomas Nemecek
Published in: Nemecek, T. 2007
Database: ecoinvent
isCopyrightProtected: true
accessRestrictedTo: 1

## General comment
This dataset represents the production of 1 kg of soy beans (fresh matter). The yield is 2806 kg/ha at a moisture content at storage of 11%.
[This dataset was already contained in the ecoinvent database version 2. It was not individually updated during the transfer to ecoinvent version 3. Life Cycle Impact Assessment results may still have changed, as they are affected by changes in the supply chain, i.e. in other datasets. This dataset was generated following the ecoinvent quality guidelines for version 2. It may have been subject to central changes described in the ecoinvent version 3 change report (http://www.ecoinvent.org/database/ecoinvent-version-3/reports-of-changes/), and the results of the central updates were reviewed extensively. The changes added e.g. consistent water flows and other information throughout the database. The documentation of this dataset can be found in the ecoinvent reports of version 2, which are still available via the ecoinvent website. The change report linked above covers all central changes that were made during the conversion process.]

## Included activities start
This activity starts after the harvest of the previous crop. The input of seeds is considered. Farm manure as an organic fertiliser is only accounted for in terms of direct field emissions; all pre-processes are included in the animal production systems.

## Included activities end
The dataset includes all machine operations and corresponding machine infrastructure and sheds. Machine operations are: soil cultivation, sowing, fertilisation, weed control, combine-harvest, transport from field to regional processing centre (10 km) and drying of beans. Further, direct field emissions are included. The cultivation of green manure during winter before sowing beans is also included. This activity ends after drying of beans at the regional processing centre.

## Geography
Refers to an average production in the Swiss lowlands.

## Technology
Organic production

## Time period
The yield data have been collected for the years 1996-2003.

## Parameters
- fraction, irrigation water to surface water: 0.2 dimensionless; name fraction_IW_to_surface_water; lognormal variance with pedigree 0.0886, pedigree (4,3,1,1,4)
  Literature value (Döll, 2011) cross referenced with expert opinion.
- fraction, irrigation water, to air: 0.3353 dimensionless; name fraction_IW_to_air; lognormal variance with pedigree 0.0409, pedigree (2,2,2,1,1)
  Literature value (Siebert, 2010) (Vionnet, S., Quantis Water Database - Technical Report, 2012).
- fraction, irrigation water, to ground water: 0.8 dimensionless; name fraction_IW_to_ground_water; lognormal variance with pedigree 0.0886, pedigree (4,3,1,1,4)
  Literature value (Döll, 2011) cross referenced with expert opinion.

## Reference product
- soybean, organic: 1 kg; name REF_PRODUCT; By-product classification allocatable product; CPC 01412: Soya beans, other; HS2017 120110: Soya beans; seed, whether or not broken
  production volume 106628 kg
    CH prod of soy beans: 7300t in 2004.
    38 ha according to Willer H, Yussefi M (Eds.) (2010). The World of Organic Agriculture. Statistics and Emerging Trends 2007. FiBL, IFOAM ; 2806 kg/ha at 11% water on a wet mass basis
  property carbon content, fossil 0; name REF_PRODUCT_C_content_fossil
    fossil carbon content on a dry matter basis
  property carbon content, non-fossil 0.435955; name REF_PRODUCT_C_content_non_fossil
    biogene carbon content on a dry matter basis
  property dry mass 0.89 kg; name REF_PRODUCT_DM
  property energy content 20.4522 MJ; name REF_PRODUCT_energy_content
    See chapter 'Product Properties' in '01_crop production - yields & inputs CH & Europe_v1.0.pdf', section 'AGRICULTURAL PRODUCTION IN SWITZERLAND' - pdf-document on the dedicated talk page of ecoinvent (www.ecoinvent.org/documentation)
  property price 0.24 EUR2005
    Calculated value based on data from United Nations Commodity Trade Statistics Database (comtrade.un.org). UN comtrade category: 120100 Soya beans. Year 2005. Using exchange rate of 1EURO = 1.209 USD. Average of price of import into 5 main markets (EU, US, JP, IN and CN).
  property water content 0.123596; name REF_PRODUCT_water_content; = (1-REF_PRODUCT_DM)/REF_PRODUCT_DM
  property water in wet mass 0.11 kg; name REF_PRODUCT_WWM; = 1-REF_PRODUCT_DM
  property wet mass 1 kg; name REF_PRODUCT_WM
  properties: carbon allocation 0.388 kg, carbon content 0.435955

## Inputs from technosphere
- combine harvesting: 0.00035636 ha; lognormal variance with pedigree 0.0406, pedigree (2,1,5,1,1)
  See chapter 'Yields and Inputs of Arable Crop Production' in '01_crop production - yields & inputs CH & Europe_v1.0.pdf', section 'AGRICULTURAL PRODUCTION IN SWITZERLAND' - pdf-document on the dedicated talk page of ecoinvent (www.ecoinvent.org/documentation)
  This exchange has an activity link directly to the producing activity because the product is primarily consumed in the same geographical area where it is produced.
- drying of bread grain, seed and legumes: 0.059524 l; lognormal variance with pedigree 0.0406, pedigree (2,1,5,1,1)
  (same comment as for combine harvesting)
- green manure, organic, until March: 0.00035636 ha; lognormal variance with pedigree 0.0406, pedigree (2,1,5,1,1)
  See chapter 'Yields and Inputs of Arable Crop Production' in '01_crop production - yields & inputs CH & Europe_v1.0.pdf', section 'AGRICULTURAL PRODUCTION IN SWITZERLAND' - pdf-document on the dedicated talk page of ecoinvent (www.ecoinvent.org/documentation)
  See chapter 'Yields and Inputs of Arable Crop Production' in '01_crop production - yields & inputs CH & Europe_v1.0.pdf', section 'AGRICULTURAL PRODUCTION IN SWITZERLAND' - pdf-document on the dedicated talk page of ecoinvent (www.ecoinvent.org/documentation)
- hoeing: 0.00035636 ha; lognormal variance with pedigree 0.0406, pedigree (2,1,5,1,1)
  (same comment as for combine harvesting)
- irrigation: 0.152475 m3; name water_irrigation_input; source Siebert, S. 2010; lognormal variance with pedigree 0.0427, pedigree (2,2,5,1,1)
  Calculated based on literature values (Döll, 2010) and partially modelled at ETH (Pfister, S.).
  property carbon content, fossil 0; name C_content_fossil
  property carbon content, non-fossil 0; name C_content_non_fossil
  property dry mass 0.11 kg; name DM
  property water content 9089.91; name water_content
  property water in wet mass 999.89 kg; name WWM
  property wet mass 1000 kg; name WM
- liquid manure spreading, by vacuum tanker: 0.0013837 m3; lognormal variance with pedigree 0.0406, pedigree (2,1,5,1,1)
  (same comment as for combine harvesting)
- solid manure loading and spreading, by hydraulic loader and spreader: 0.96858 kg; lognormal variance with pedigree 0.0406, pedigree (2,1,5,1,1)
  (same comment as for combine harvesting)
- sowing: 0.00035636 ha; lognormal variance with pedigree 0.0406, pedigree (2,1,5,1,1)
  (same comment as for combine harvesting)
- soybean seed, organic, for sowing: 0.042763 kg; name SEED; lognormal variance with pedigree 0.0406, pedigree (2,1,5,1,1)
  See chapter 'Yields and Inputs of Arable Crop Production' in '01_crop production - yields & inputs CH & Europe_v1.0.pdf', section 'AGRICULTURAL PRODUCTION IN SWITZERLAND' - pdf-document on the dedicated talk page of ecoinvent (www.ecoinvent.org/documentation)
  property carbon content, non-fossil 0.435955; name SEED_C_content_non_fossil
  property dry mass 0.89 kg; name SEED_DM
  property energy content 20.4522 MJ; name SEED_energy_content
  property water content 0.123596; name soybean_seed_org_sowing_water_content
  property water in wet mass 0.11 kg; name soybean_seed_org_sowing_WWM
  property wet mass 1 kg; name soybean_seed_org_sowing_WM
  note on carbon content, non-fossil: biogene carbon content on a dry matter basis; In ecoinvent report n 17, pg 125: C content of soybeans=0.388kg/kg fresh matter
  note on energy content: See chapter 'Product Properties' in '01_crop production - yields & inputs CH & Europe_v1.0.pdf', section 'AGRICULTURAL PRODUCTION IN SWITZERLAND' - pdf-document on the dedicated talk page of ecoinvent (www.ecoinvent.org/documentation)
- tillage, currying, by weeder: 0.00035636 ha; lognormal variance with pedigree 0.0406, pedigree (2,1,5,1,1)
  (same comment as for combine harvesting)
- tillage, harrowing, by spring tine harrow: 0.00071272 ha; lognormal variance with pedigree 0.0406, pedigree (2,1,5,1,1)
  (same comment as for combine harvesting)
- tillage, ploughing: 0.00035636 ha; lognormal variance with pedigree 0.0406, pedigree (2,1,5,1,1)
  (same comment as for combine harvesting)
- transport, tractor and trailer, agricultural: 0.010595 metric ton*km; lognormal variance with pedigree 0.0406, pedigree (2,1,5,1,1)
  (same comment as for green manure, organic, until March)

## Inputs from nature
- Carbon dioxide, in air [natural resource, in air]: 1.36183 kg; = 44/12 * (REF_PRODUCT_C_content_non_fossil * REF_PRODUCT * REF_PRODUCT_DM - SEED_C_content_non_fossil * SEED * SEED_DM); lognormal variance with pedigree 0.0406, pedigree (2,1,5,1,1)
  Modelled,see chapter 'CO2 binding' in '01_crop production_direct field emissions and natural resources_v1.0.pdf' - pdf-document on the dedicated talk page of ecoinvent (www.ecoinvent.org/documentation)
- Energy, gross calorific value, in biomass [natural resource, biotic]: 19.578 MJ; lognormal variance with pedigree 0.0411891, pedigree (2,1,5,1,1)
- Occupation, annual crop, non-irrigated, extensive [natural resource, land]: 1.6234 m2*year; lognormal variance with pedigree 0.0406, pedigree (2,1,5,1,1)
  Modelled, see chapter 'Land use' in '01_crop production_direct field emissions and natural resources_v1.0.pdf' - pdf-document on the dedicated talk page of ecoinvent (www.ecoinvent.org/documentation)
- Transformation, from annual crop, non-irrigated, extensive [natural resource, land]: 3.5636 m2; lognormal variance with pedigree 0.0506, pedigree (2,1,5,1,1)
  (same comment as for Occupation, annual crop, non-irrigated, extensive)
- Transformation, to annual crop, non-irrigated, extensive [natural resource, land]: 3.5636 m2; lognormal variance with pedigree 0.0506, pedigree (2,1,5,1,1)
  (same comment as for Occupation, annual crop, non-irrigated, extensive)

## Emissions to nature
- Ammonia [air, non-urban air or from high stacks]: 0.00127488 kg; lognormal variance with pedigree 0.0507, pedigree (2,2,5,1,1)
  Modelled with the 'AGRAMMON model' described in '01_crop production_direct field emissions and natural resources_v1.0.pdf' - pdf-document on the dedicated talk page of ecoinvent (www.ecoinvent.org/documentation)
- Dinitrogen monoxide [air, non-urban air or from high stacks]: 0.000772 kg; name N2O; lognormal variance with pedigree 0.0707, pedigree (2,2,5,1,1)
  Modelled, see chapter 'Emissions of N2O to the air' in '01_crop production_direct field emissions and natural resources_v1.0.pdf' - pdf-document on the dedicated talk page of ecoinvent (www.ecoinvent.org/documentation)
- Nitrogen oxides [air, non-urban air or from high stacks]: 0.00016212 kg; = 0.21 * N2O; lognormal variance with pedigree 0.0707, pedigree (2,2,5,1,1)
  Modelled, see chapter 'Emissions of NOx to the air' in '01_crop production_direct field emissions and natural resources_v1.0.pdf' - pdf-document on the dedicated talk page of ecoinvent (www.ecoinvent.org/documentation)
- Water [air, unspecified]: 0.0511248 m3; name water_to_air_unspecified; = (water_irrigation_input*fraction_IW_to_air); lognormal variance with pedigree 0.0807, pedigree (2,2,5,1,1)
  Calculated value based on literature values and expert opinion. See comments in the parametres' comment field.
  property fraction, origin: fresh water 1; name fraction_origin_fresh_water
  property fraction, origin: salt water 0; name fraction_origin_salt_water
  property fraction, origin: unspecified 0; name fraction_origin_unspecified
- Cadmium II [soil, agricultural]: 3.1525e-8 kg; lognormal variance with pedigree 0.0807, pedigree (2,2,5,1,1)
  Modelled, see chapter 'Emissions of heavy metals to agricultural soil, surface water and ground water' in '01_crop production_direct field emissions and natural resources_v1.0.pdf' - pdf-document on the dedicated talk page of ecoinvent (www.ecoinvent.org/documentation)
- Chromium III [soil, agricultural]: -2.9381e-6 kg
  (same comment as for Cadmium II)
- Copper ion [soil, agricultural]: -6.9791e-6 kg
  (same comment as for Cadmium II)
- Lead II [soil, agricultural]: 7.3089e-7 kg; lognormal variance with pedigree 0.0807, pedigree (2,2,5,1,1)
  (same comment as for Cadmium II)
- Mercury II [soil, agricultural]: 8.7218e-8 kg; lognormal variance with pedigree 0.0807, pedigree (2,2,5,1,1)
  (same comment as for Cadmium II)
- Nickel II [soil, agricultural]: -9.8029e-7 kg
  (same comment as for Cadmium II)
- Zinc II [soil, agricultural]: 4.6088e-6 kg; lognormal variance with pedigree 0.0807, pedigree (2,2,5,1,1)
  (same comment as for Cadmium II)
- Cadmium II [water, ground-]: 2.6628e-9 kg; lognormal variance with pedigree 0.1307, pedigree (2,2,5,1,1)
  (same comment as for Cadmium II)
- Cadmium II [water, surface water]: 1.931e-9 kg; lognormal variance with pedigree 0.1307, pedigree (2,2,5,1,1)
  (same comment as for Cadmium II)
- Chromium III [water, ground-]: 3.1373e-6 kg; lognormal variance with pedigree 0.1307, pedigree (2,2,5,1,1)
  (same comment as for Cadmium II)
- Chromium III [water, surface water]: 5.388e-7 kg; lognormal variance with pedigree 0.1307, pedigree (2,2,5,1,1)
  (same comment as for Cadmium II)
- Copper ion [water, ground-]: 1.136e-6 kg; lognormal variance with pedigree 0.1307, pedigree (2,2,5,1,1)
  (same comment as for Cadmium II)
- Copper ion [water, surface water]: 9.5822e-7 kg; lognormal variance with pedigree 0.1307, pedigree (2,2,5,1,1)
  (same comment as for Cadmium II)
- Lead II [water, ground-]: 2.5129e-8 kg; lognormal variance with pedigree 0.1307, pedigree (2,2,5,1,1)
  (same comment as for Cadmium II)
- Lead II [water, surface water]: 1.2338e-7 kg; lognormal variance with pedigree 0.1307, pedigree (2,2,5,1,1)
  (same comment as for Cadmium II)
- Mercury II [water, ground-]: 3.3846e-9 kg; lognormal variance with pedigree 0.1307, pedigree (2,2,5,1,1)
  (same comment as for Cadmium II)
- Mercury II [water, surface water]: 3.3033e-9 kg; lognormal variance with pedigree 0.1307, pedigree (2,2,5,1,1)
  (same comment as for Cadmium II)
- Nickel II [water, surface water]: 4.2948e-7 kg; lognormal variance with pedigree 0.1307, pedigree (2,2,5,1,1)
  (same comment as for Cadmium II)
- Nitrate [water, ground-]: 0.0338401 kg; lognormal variance with pedigree 0.0807, pedigree (2,2,5,1,1)
  Modelled with the 'SALCA-NO3 model' described in '01_crop production_direct field emissions and natural resources_v1.0.pdf' - pdf-document on the dedicated talk page of ecoinvent (www.ecoinvent.org/documentation)
- Phosphate [water, ground-]: 3.9323e-5 kg; lognormal variance with pedigree 0.0807, pedigree (2,2,5,1,1)
  Modelled, see chapter 'Emissions of phosphorous to the water' in '01_crop production_direct field emissions and natural resources_v1.0.pdf' - pdf-document on the dedicated talk page of ecoinvent (www.ecoinvent.org/documentation)
- Phosphate [water, surface water]: 0.00012965 kg; lognormal variance with pedigree 0.0807, pedigree (2,2,5,1,1)
  (same comment as for Phosphate)
- Phosphorus [water, surface water]: 5.1145e-5 kg; lognormal variance with pedigree 0.0807, pedigree (2,2,5,1,1)
  (same comment as for Phosphate)
- Water [water, ground-]: 0.08108 m3; name water_to_water_ground; = water_irrigation_input*(1-fraction_IW_to_air)*fraction_IW_to_ground_water; lognormal variance with pedigree 0.1286, pedigree (4,3,5,1,4)
  Calculated value. See the parameters and their comments to understand the calculation.
  property fraction, origin: fresh water 1; name fraction_origin_fresh_water_Wgw
  property fraction, origin: salt water 0; name fraction_origin_salt_water_Wgw
  property fraction, origin: unspecified 0; name fraction_origin_unspecified_Wgw
- Water [water, surface water]: 0.02027 m3; name water_to_water_surface; = water_irrigation_input*(1-fraction_IW_to_air)*fraction_IW_to_surface_water; lognormal variance with pedigree 0.1286, pedigree (4,3,5,1,4)
  Calculated value. See the parameters and their comments to understand the calculation.
  property fraction, origin: fresh water 1; name fraction_origin_fresh_water_Wsw
  property fraction, origin: salt water 0; name fraction_origin_salt_water_Wsw
- Zinc II [water, ground-]: 5.899e-6 kg; lognormal variance with pedigree 0.1307, pedigree (2,2,5,1,1)
  (same comment as for Cadmium II)
- Zinc II [water, surface water]: 1.3395e-6 kg; lognormal variance with pedigree 0.1307, pedigree (2,2,5,1,1)
  (same comment as for Cadmium II)

## Sampling procedure
Data were compiled from statistics, pilot network, fertilising recommendations, documents from extension services, information provided by retailers and expert knowledge. The production data were verified and adjusted by a group of experts.

## Review by Hans-Jörg Althaus 2009-01-22
passed
none
