# natural gas, burned in gas turbine

Dataset: EcoSpold 2, unit process
Geography: RO
Time period: 2021-01-01 to 2023-12-31
Technology level: current
Classification: ISIC rev.4 ecoinvent: 3510:Electric power generation, transmission and distribution
Scenario: Business-as-Usual
System model: Allocation, cut-off by classification
Generated by: Maresa Bussa
Published in: Bussa, M. 2023
Database: ecoinvent
isCopyrightProtected: true
accessRestrictedTo: 1

## General comment
This dataset represents the combustion of natural gas in a gas turbine [MJ fuel input] with the specific gas supply in Romania.
This activity represents burning of natural gas (supplied at high pressure) for the purpose of supplying energy to processes in the liquefaction/evaporation, (transport) transmission, and distribution of natural gas. As described in Bussa et al. (2023, section 4.2.2), this activity is intended to replace the three different datasets related to natural gas 'burned in' (in gas turbine, for compressor station, and in gas motor for storage) from previous studies by Schori and Frischknecht (2012) and Faist Emmenegger et al. (2007).
Reference(s):
Bussa, M., N. Jungbluth, Ch. Meili (2023) Life cycle inventories for long-distance transport and distribution of natural gas. ESU-services Ltd. Schaffhausen, Switzerland. Available from: http://esu-services.ch/data/public-lci-reports/

## Included activities start
This activity starts with the input of natural gas, at high pressure.

## Included activities end
The module includes fuel input, infrastructure (gas turbine), and emissions to air.

## Geography
Romania

## Technology
Average installed gas turbine with 10MWe.

## Time period
Data steem from the mid 1990s.

## Reference product
- natural gas, burned in gas turbine: 1 MJ; By-product classification allocatable product; CPC 17100: Electrical energy
  Output
  production volume 1 MJ
    Output, as described in Bussa et al. 2023
  property price 0.004622 EUR2005
    Calculated based on inputs: The price of the product has been calculated as a sum of the values of the material and energy inputs for this product. This value is therefore a rough estimation. It may underestimate the real price since there are additional expenses when producing any product. These expences can include for example labour costs, treatment of waste materials and profit for the producer. Please consider carefully whether this level of data quality is acceptable for your application.
  properties: carbon allocation 0 kg, carbon content 0

## Inputs from technosphere
- gas turbine, 10MW electrical: 1.15e-10 unit; lognormal variance with pedigree 0.178595, pedigree (4,5,5,5,5)
  Infrastructure estimation, as described in Bussa et al. 2023
- natural gas, high pressure: 0.0194444 m3; = 0.7*0.0277777777777778; lognormal variance with pedigree 0.00869512, pedigree (4,2,1,1,1)
  Input of natural gas linked directly to domestic supply, with the shares of offshore and onshore production according to Meili et al. (2023) section 4.1.
  properties: carbon content, fossil 0.741, dry mass 0.735 kg, heating value, gross 40 MJ, heating value, net 36 MJ, wet mass 0.735 kg
  note on heating value, gross: At standard conditions; based on Meili et al. (2022) section 5.2
- natural gas, high pressure: 0.00833333 m3; = 0.3*0.0277777777777778; lognormal variance with pedigree 0.00869512, pedigree (4,2,1,1,1)
  (same comment as for natural gas, high pressure)

## Inputs from nature
- Oxygen [natural resource, in air]: 0.040822 kg; = (2*15.999)/(1*12.011+2*15.999)*CO2_amount+(1*15.999)/(1*12.011+1*15.999)*CO_amount+(1*15.999)/(2*14.007+1*15.999)*N2O_amount+(1.5*15.999)/(1*14.007+1.5*15.999)*NOx_amount+(2*15.999)/(1*32.06+2*15.999)*SO2_amount; lognormal variance with pedigree 0.1361, pedigree (5,5,5,3,3)
  Input of oxygen from air, balanced stoichiometrically against emissions of CO, CO2, N2O, NOx, and SO2.

## Emissions to nature
- Carbon dioxide, fossil [air, urban air close to ground]: 0.056 kg; name CO2_amount; lognormal variance with pedigree 0.656773, pedigree (2,3,4,1,1)
  Calculated based on leakage and average gas composition, as described in Bussa et al. 2023
- Carbon monoxide, fossil [air, urban air close to ground]: 4e-5 kg; name CO_amount; lognormal variance with pedigree 0.1372, pedigree (5,5,5,3,3)
  Rough estimate, as described in Bussa et al. 2023
- Dinitrogen monoxide [air, urban air close to ground]: 1e-6 kg; name N2O_amount; lognormal variance with pedigree 0.1372, pedigree (5,5,5,3,3)
  Rough estimate, as described in Bussa et al. 2023
- Dioxins, measured as 2,3,7,8-tetrachlorodibenzo-p-dioxin [air, urban air close to ground]: 2.9e-17 kg; lognormal variance with pedigree 0.0966951, pedigree (5,5,5,3,3)
  Rough estimate, as described in Bussa et al. 2023
- Heat, waste [air, urban air close to ground]: 1.1 MJ; lognormal variance with pedigree 0.397837, pedigree (5,5,5,3,3)
  Rough estimate, as described in Bussa et al. 2023
- Mercury II [air, urban air close to ground]: 3e-11 kg; lognormal variance with pedigree 0.0503005, pedigree (2,3,4,1,1)
  Calculated based on leakage and average gas composition, as described in Bussa et al. 2023
- Methane, fossil [air, urban air close to ground]: 4.5e-6 kg; lognormal variance with pedigree 0.0503005, pedigree (2,3,4,1,1)
  Calculated based on leakage and average gas composition, as described in Bussa et al. 2023
- NMVOC, non-methane volatile organic compounds [air, urban air close to ground]: 1e-6 kg; lognormal variance with pedigree 0.00979512, pedigree (2,3,4,1,1)
  Calculated based on leakage and average gas composition, as described in Bussa et al. 2023
- Nitrogen oxides [air, urban air close to ground]: 0.00013 kg; name NOx_amount; lognormal variance with pedigree 0.0966951, pedigree (5,5,5,3,3)
  Rough estimate, as described in Bussa et al. 2023
- Sulfur dioxide [air, urban air close to ground]: 5.5e-7 kg; name SO2_amount; lognormal variance with pedigree 0.397837, pedigree (5,5,5,3,3)
  Rough estimate, as described in Bussa et al. 2023

## Sampling procedure
Literature. The emissions are based on generic estimates.

## Extrapolations
A default inventory, based on generic estimates, is assumed representative for all geographies.
