# treatment of waste glass, open burning

Dataset: EcoSpold 2, unit process
Geography: GLO
Time period: 2006-01-01 to 2023-12-31
Technology level: current
Classification: ISIC rev.4 ecoinvent: 3821:Treatment and disposal of non-hazardous waste
Scenario: Business-as-Usual
System model: Allocation, cut-off by classification
Generated by: Nikolia Stoikou
Database: ecoinvent
isCopyrightProtected: true
accessRestrictedTo: 1

## General comment
This dataset represents the activity of waste disposal of 'waste glass' in uncontrolled, open burning. Recommended use of this dataset: uncontrolled disposal of glass waste going to open burning as part of mixed municipal waste stream. Inventoried waste consists of fraction: 100% Glass. Waste composition (wet, in ppmw): gross heating value 0.1423 MJ/kg; net heating value 0.04602 MJ/kg; H2O 20000; O 483070; H na; C na; S na; N na; P na; B na; Cl 195.89; Br na; F na; I na; Ag na; As na; Ba na; Cd na; Co na; Cr 303.63; Cu 7.8356; Hg na; Mn na; Mo na; Ni na; Pb 38.688; Sb na; Se na; Sn na; V na; Zn 3.9178; Be na; Sc na; Sr na; Ti na; Tl na; W na; Si 359090; Fe na; Ca 72818; Al na; K na; Mg na; Na 64472. Share of carbon in waste that is biogenic 60.4%. Recycling rates for metallic iron = 0% for metallic aluminium = 0% for metallic copper = 0% . A mass of 0.958kg residues are left on ground.

## Included activities start
The activity starts with the waste being available at the location (gate) of the uncontrolled disposal. Collection and transportation of the waste to the uncontrolled disposal location is not included.

## Included activities end
The activity ends with the waste being disposed, in an uncontrolled manner and waste-specific emissions from open burning are released to the environment (air and soil).

## Geography
Modelling parameters representing a generic open burning process, not geographical specific.

## Technology
This is an inventory for open burning of solid waste, representing an informal and uncontrolled burning. No flue gas treatment. Suitable for informal recycling or disposal. Based on Municipal waste incineration without any pollution control. Residues (minus any actually recycled metals) are left on site. Assumption of share of thermal NOx to total NOx in average waste burning process is 30%. Contribution from thermal NOx is 810mg per kg waste. Recycling rates for metallic iron = 0% for metallic aluminium = 0% for metallic copper = 0%.

## Time period
This dataset represents a generic open burning without any temporal distinction.

## Reference product
- waste glass: -1 kg; By-product classification Waste; CPC 37111: Glass in the mass, in balls (except microspheres), rods or tubes, unworked; waste and scrap of glass; HS2017 700100: Glass; cullet and other waste and scrap of glass, glass in the mass
  main reference product of this activity
  production volume 9.4516e9 kg
    Estimated based on the total amount of this waste being treated in the database. The value is then adjusted to reflect the current treatment in the given geography
  property price 0 EUR2005
    Waste products are assigned a price of zero as they are assumed to require further treatment.
  properties: calcium content 0.0743039, carbon allocation 0 kg, carbon content 0, carbon content, fossil 0, carbon content, non-fossil 0, chlorine content 0.000199888, chromium content 0.000309826, copper content 7.99551e-6, dry mass 0.98 kg, heating value, gross 0.142256 MJ, heating value, net 0.046024 MJ, lead content 3.94778e-5, oxygen content 0.492929, silicon content 0.366418, sodium content 0.0657874, water content 0.0204082, water in wet mass 0.02 kg, wet mass 1 kg, zinc content 3.99776e-6

## Inputs from nature
- Waste mass, total, placed in landfill [inventory indicator, waste]: 0.97779 kg; lognormal variance with pedigree 0.020814, pedigree (1,1,4,1,1)
  waste mass placed in landfill (for ecoscarcity LCIA only). Counted here are only burned resides remaining on ground.
  Uncertainty: Uncertainty calculated depending on waste input and uncertainty of transfer coefficents in incineration model.

## Emissions to nature
- Acetaldehyde [air, non-urban air or from high stacks]: 0.0004284 kg; lognormal variance with pedigree 0.0491, pedigree (1,1,4,1,1)
  Process-specific (constant) emissions to air from open burning.
  Uncertainty: uncertainty generic estimate
- Benzene [air, non-urban air or from high stacks]: 0.00097975 kg; lognormal variance with pedigree 0.0491, pedigree (1,1,4,1,1)
  (same comment as for Acetaldehyde)
- Carbon monoxide, fossil [air, non-urban air or from high stacks]: 0.01517 kg; lognormal variance with pedigree 0.65557, pedigree (1,1,4,1,1)
  (same comment as for Acetaldehyde)
- Carbon monoxide, non-fossil [air, non-urban air or from high stacks]: 0.02343 kg; lognormal variance with pedigree 0.65557, pedigree (1,1,4,1,1)
  (same comment as for Acetaldehyde)
- Dinitrogen monoxide [air, non-urban air or from high stacks]: 0.00011625 kg; lognormal variance with pedigree 0.0491, pedigree (1,1,4,1,1)
  Emissions to air from open burning.
  Uncertainty: Uncertainty calculated depending on waste input and uncertainty of transfer coefficents in incineration model.
- Ethyl benzene [air, non-urban air or from high stacks]: 0.00032746 kg; lognormal variance with pedigree 0.0491, pedigree (1,1,4,1,1)
  (same comment as for Acetaldehyde)
- Formaldehyde [air, non-urban air or from high stacks]: 0.00044365 kg; lognormal variance with pedigree 0.0491, pedigree (1,1,4,1,1)
  (same comment as for Acetaldehyde)
- Heat, waste [air, non-urban air or from high stacks]: 0.14226 MJ; lognormal variance with pedigree 0.057793, pedigree (1,1,4,1,1)
  Waste heat generated during combustion from the upper heating value of this waste.
  Uncertainty: uncertainty is calculated from uncertainties in waste composition.
- Methane, fossil [air, non-urban air or from high stacks]: 0.0023187 kg; lognormal variance with pedigree 0.0491, pedigree (1,1,4,1,1)
  (same comment as for Acetaldehyde)
- Methane, non-fossil [air, non-urban air or from high stacks]: 0.0035813 kg; lognormal variance with pedigree 0.0491, pedigree (1,1,4,1,1)
  (same comment as for Acetaldehyde)
- Nitrogen oxides [air, non-urban air or from high stacks]: 0.00081 kg; lognormal variance with pedigree 0.41149, pedigree (1,1,4,1,1)
  (same comment as for Dinitrogen monoxide)
- PAH, polycyclic aromatic hydrocarbons [air, non-urban air or from high stacks]: 0.0003443 kg; lognormal variance with pedigree 0.30974, pedigree (1,1,4,1,1)
  (same comment as for Acetaldehyde)
- Phenol [air, non-urban air or from high stacks]: 1.4799e-5 kg; lognormal variance with pedigree 0.0491, pedigree (1,1,4,1,1)
  (same comment as for Acetaldehyde)
- Polychlorinated biphenyls [air, non-urban air or from high stacks]: 1.1189e-7 kg; lognormal variance with pedigree 0.0491, pedigree (1,1,4,1,1)
  (same comment as for Acetaldehyde)
- Styrene [air, non-urban air or from high stacks]: 0.0005275 kg; lognormal variance with pedigree 0.0491, pedigree (1,1,4,1,1)
  (same comment as for Acetaldehyde)
- Toluene [air, non-urban air or from high stacks]: 0.000372 kg; lognormal variance with pedigree 0.0491, pedigree (1,1,4,1,1)
  (same comment as for Acetaldehyde)
- Water [air, non-urban air or from high stacks]: 2e-5 m3; lognormal variance with pedigree 0.29451, pedigree (1,1,4,1,1)
  water vapour from waste humidity, hydrogen oxidation.
  Uncertainty: Uncertainty calculated from uncertainty in waste composition and the uncertainty of fraction to air.
- Non-hazardous waste disposed [inventory indicator, waste]: 1 kg; lognormal variance with pedigree 0.008, pedigree (1,1,4,1,1)
  EN15804 waste mass in open burning.
  Uncertainty: Uncertainty is not adjusted, as this is the refence product
- Calcium II [soil, industrial]: 0.072818 kg; lognormal variance with pedigree 0.15856, pedigree (1,1,4,1,1)
  Emissions from open burning to residues left on ground.
  Uncertainty: Uncertainty calculated depending on waste input and uncertainty of transfer coefficents in incineration model.
- Chloride [soil, industrial]: 0.00019589 kg; lognormal variance with pedigree 0.8806, pedigree (1,1,4,1,1)
  (same comment as for Calcium II)
- Chromium III [soil, industrial]: 0.00030363 kg; lognormal variance with pedigree 0.82246, pedigree (1,1,4,1,1)
  (same comment as for Calcium II)
- Copper ion [soil, industrial]: 7.8356e-6 kg; lognormal variance with pedigree 1.3081, pedigree (1,1,4,1,1)
  (same comment as for Calcium II)
- Lead II [soil, industrial]: 3.8688e-5 kg; lognormal variance with pedigree 1.0964, pedigree (1,1,4,1,1)
  (same comment as for Calcium II)
- Silicon [soil, industrial]: 0.35909 kg; lognormal variance with pedigree 0.036908, pedigree (1,1,4,1,1)
  (same comment as for Calcium II)
- Sodium I [soil, industrial]: 0.064472 kg; lognormal variance with pedigree 0.1703, pedigree (1,1,4,1,1)
  (same comment as for Calcium II)
- Zinc II [soil, industrial]: 3.9178e-6 kg; lognormal variance with pedigree 1.3993, pedigree (1,1,4,1,1)
  (same comment as for Calcium II)
