# thermal storage system construction, solar thermal parabolic trough, 50 MW

Dataset: EcoSpold 2, unit process
Geography: RoW
Time period: 2010-01-01 to 2023-01-01
Technology level: current
Classification: ISIC rev.4 ecoinvent: 4220:Construction of utility projects
Tags: Concentrated Solar Power; CSP
Scenario: Business-as-Usual
System model: Allocation, cut-off by classification
Generated by: Karin Treyer
Published in: Telsnig, Thomas 2015
Database: ecoinvent
isCopyrightProtected: true
accessRestrictedTo: 1

## General comment
This activity represents the construction of a hot and cold two stage nitrate salt thermal storage system for a 50 MW solar thermal parabolic trough power plant. The main components in this activity are nitrogen pressure vessels, storage tanks, pumps, pipes, electrical wiring and insulation and finally concrete and paint works. The storage tanks are designed for 3-6 hour storage time. The heat storage capacity as calculated for the present CSP plant design amounts to 1100 MW.
This dataset is entirely based on the detailed life cycle inventory as presented in the dissertation report by
Telsnig, Thomas. 2015. Standortabhängige Analyse und Bewertung solarthermischer Kraftwerke am Beispiel Südafrikas. Forschungsbericht. Band 123. ISSN 0938-1228. Institut für Energiewirtschaft und Rationelle Energieanwendung, Universität Stuttgart, Germany.

## Included activities start
The activities start with preparation of the molten salt made of NaNO3 and KNO3 60% and 40% by weight mixture respectively. The thermal storage capacity is designed at 1100MWh for a 50MW parabolic trough limited storage case.

## Included activities end
The activity concludes with the decommissioning of the plant with the construction materials sent for recycling and disposal according to their treatment methods.

## Geography
This dataset has been extrapolated from a dataset modelled for the location Upington, South Africa. Uncertainty has not been adjusted as it is assumed that the modelled 50 MW parabolic trough power plant would be very similar in other parts of the world.

## Technology
Nitrogen storage vessel - Horizontal, cylindrical tank, ASTM A 516, Grade 70, carbon steel, 14 ft diameter,51ft long, 35 psig design pressure, 0.25 inch wall thickness, 27000 lb vessel mass
Cold storage tank - Vertical cylindrical tank, self supporting roof, atmospheric pressure 102 ft diameter x 46 ft height, ASTM A 516, Grade 70, carbon steel, 710000 lb approx. Weight.
Hot storage tank - Vertical cylindrical tank, self supporting roof, atmospheric pressure 104 ft diameter x 46 ft height, ASTM A 516, Grade 70, carbon steel, 750000 lb approx. Weight
Oil-to-salt Heat Exchangers - Straight shell, U-tube, 424000ft² heat transfer aera each, carbon steel shell, tubes tubessheet and channel 170000lb empty weight each
Nitrogen-to-air Heat Exchangers - Finned tube, forced draft heat exchanger, 50 ft² bare tube area, 650ft² finned tube area, 0.75 bhp electric fan
Cold Salt Pumps - Extended Shaft turbine pump, 2 stages, 14000gpm, 3705 lb/sec, 192ft total developed head, 1750 bhp motor variable speed drive
Hot Salt Pumps - Extended Shaft turbine pump, 2 stages, 14400gpm, 3705 lb/sec, 200ft total developed head, 1750 bhp motor variable speed drive
Spare Pump and motor (without variable speed drive) - Extended Shaft turbine pump, 2 stages, 14400gpm, 3705 lb/sec, 200ft total developed head, 1750 bhp motor
Piping: Carbon steel pipes of Grade B
Valves: Carbon steel valves

## Reference product
- thermal storage system, solar thermal parabolic trough, 50 MW: 1 unit; name RP_amount_1; By-product classification allocatable product; CPC 54262: General construction services of power plants
  Reference product unit for thermal storage system for a 50MW solar thermal parabolic trough plant
  production volume 7 unit; name RP_PV_1
    Data about concentrating solar power plants in operation, construction and development globally are available from SolarPACES (https://solarpaces.nrel.gov/, accessed April 2019). On average 8 parabolic through concentrating solar power plants per year went in operation worldwide between 2010 and 2019. This includes plants with an installed capacity other than 50MW and is used as approximate annual production volume for this dataset.
  property capacity [MW] 1100 MW
    Thermal heat storage capacity as calculated for the present CSP plant design.
  property lifetime 30 year
    The economic lifetime of the plant is assumed to be 30 years.
  property price 5.2e7 EUR2005
    Telsnig 2015: Investment cost for the thermal storage system of a 50MW CSP solar thermal parabolic trough plant in South Africa (EUR2010) with limited storage capacity (see Table 4-4 in Telsnig, 2015).
    Reference(s): Telsnig, Thomas. 2015. Standortabhängige Analyse und Bewertung solarthermischer Kraftwerke am Beispiel Südafrikas. Forschungsbericht. Band 123. ISSN 0938-1228. Institut für Energiewirtschaft und Rationelle Energieanwendung, Universität Stuttgart, Germany.
  properties: allocation factor 0.742977, carbon allocation 0 kg, carbon content 0, true value 5.2e7

## Inputs from technosphere
- alkyd paint, white, without solvent, in 60% solution state: 738.894, 155.651 kg (2 suppliers, which the file names only by identifier); sum of these 894.545 kg; lognormal variance with pedigree 0.0197, pedigree (4,4,4,3,2)
  Used to prevent rust and paint the outer regions of iron nd steel rods especially structural steel components
  properties: carbon content, fossil 0.140367, carbon content, non-fossil 0.199629, dry mass 1 kg, heating value, net 10.3 MJ, wet mass 1 kg
  note on carbon content, fossil: C content was calculated as an addition of C content in the raw materials.
- aluminium, wrought alloy: 37.1489 kg; name aluminiumcast; lognormal variance with pedigree 0.0197, pedigree (4,4,4,3,2)
  Used in coatings of connector tubes
  properties: dry mass 1 kg, wet mass 1 kg
- cast iron: 22242.5 kg; name castiron; lognormal variance with pedigree 0.0197, pedigree (4,4,4,3,2)
  Used in pumps, compressors and valves
  properties: carbon content, fossil 0.04, dry mass 1 kg, wet mass 1 kg
  note on carbon content, fossil: Cast iron is made by remelting pig iron in small furnaces (e.g. cupola furnaces or electric arc furnaces) and poured into moulds to make castings. It usually contains 2% to 6% carbon (ecoinvent v2.2 report 10_partII). An average content of 4% was considered
- concrete, normal strength: 15.1088, 3.31783, 5.24413, 2.88171, 63.9817, 26.8602, 31.8414, 1139.09 m3 (8 suppliers, which the file names only by identifier); sum of these 1288.32 m3; lognormal variance with pedigree 0.0197, pedigree (4,4,4,3,2)
  Construction and foundation of the plants
  properties: dry mass 2190 kg, water content 0.086758, wet mass 2380 kg
- control cabinet, heat and power co-generation unit, 160kW electrical: 2.22893 unit; lognormal variance with pedigree 0.0197, pedigree (4,4,4,3,2)
  480 V motor control center
- copper, cathode: 7304.21 kg; name copper; lognormal variance with pedigree 0.0197, pedigree (4,4,4,3,2)
  Copper supplied for field wiring
  properties: dry mass 1 kg, wet mass 1 kg
- diesel, burned in diesel-electric generating set, 18.5kW: 8.42754e6 MJ; lognormal variance with pedigree 0.0453, pedigree (3,4,5,3,2)
  Used to melt the salt before it is sent to thermal storage tank
- drawing of pipe, steel: 164746 kg; lognormal variance with pedigree 0.0197, pedigree (4,4,4,3,2)
  Process done to draw pipes made of steel. The value 0.08 is the mass ratio of the amount of steel used for drawing pipes versus the total amount of reinforced steel present in the system.
- excavation, hydraulic digger: 3021.69 m3; lognormal variance with pedigree 0.0197, pedigree (4,4,4,3,2)
  Used in excavation and backfill compaction
- expanded perlite: 415229 kg; name expandedperilite; lognormal variance with pedigree 0.0197, pedigree (4,4,4,3,2)
  Used as an insulation material
  properties: dry mass 1 kg, wet mass 1 kg
- extrusion, plastic pipes: 13.3736 kg; lognormal variance with pedigree 0.0197, pedigree (4,4,4,3,2)
  Process done to create plastic pipes from polymer materials
- foam glass: 90423.3 kg; name foamglass; lognormal variance with pedigree 0.0197, pedigree (4,4,4,3,2)
  Used in insulation of tank foundation
  properties: dry mass 1 kg, wet mass 1 kg
- glass fibre: 6.6868 kg; name glassfibre; lognormal variance with pedigree 0.0197, pedigree (4,4,4,3,2)
  Used in laying down of fiber optic cables
  properties: dry mass 1 kg, wet mass 1 kg
- hazardous waste, for incineration: -2.20875e6, -1.06218e6, -27764.7 kg (3 suppliers, which the file names only by identifier); sum of these -3.29869e6 kg; = nitratesalts*0.15; lognormal variance with pedigree 0.0137, pedigree (4,4,3,3,2)
  Nitrate salt discharge at the end of the power plant lifetime. For a lack of available data, it was assumed that 15% of nitrate salts are lost during operation or discharge. This estimate is considered conservative. However, at the point of dataset creation the end of the lifetime of first generation CSP plants lies at least 30 years into the future. Therefore, the fate of nitrate salts used in these plants remains uncertain. It is currently assumed that they can be reused in future plants
  It is indicated by Bradshaw et al. (2002) that nitrate salts which cannot be recovered or reused need to be treated as hazardous waste.
  Reference(s):
  W. BRADSHAW, ROBERT & B. DAWSON, DANIEL & DE LA ROSA, WILFREDO & GILBERT, ROCKWELL & H. GOODS, STEVEN & Hale, Mary Jane & JACOBS, PETER & A. JONES, SCOTT & Kolb, Gregory & Pacheco, James & R. PRAIRIE, MICHAEL & E. REILLY, HUGH & Showalter, Steve & vant-hull, Lorin. (2002). Final Test and Evaluation Results from the Solar Two Project. 10.2172/793226.
  production volume; = RP_PV_1 * (BP_amount_2 / RP_amount_1)
    Calculated from production volume of reference product using the relative outputs.
  properties: carbon content, fossil 0.554667, dry mass 0.75 kg, heating value, net 17 MJ, water content 0.333333, wet mass 1 kg
  note on carbon content, fossil: Tab A.6, ecoinvent v2.2 report 13_I. C content has been calculated after data in the tables, and then referred to 1 kg DM
  note on heating value, net: Value taken from the general comment of the treatment dataset.
- injection moulding: 5.94382 kg; lognormal variance with pedigree 0.0197, pedigree (4,4,4,3,2)
  Process to obtain polystyrene
- iron-nickel-chromium alloy: 31021.5 kg; name ironnickelchromealloy; lognormal variance with pedigree 0.0197, pedigree (4,4,4,3,2)
  Different dimensions of pipes and spare cables that are used by several major components
  properties: dry mass 1 kg, wet mass 1 kg
- nitrate salts, for solar power application: 2.19913e7 kg; name nitratesalts; lognormal variance with pedigree 0.0197, pedigree (4,4,4,3,2)
  Used as molten salt with 60% (by weight) contribution of technical grade sodium nitrate, and 40% (by weight) technical grade potassium nitrate.
- particleboard, cement bonded: 0.34058, 0.402397 m3 (2 suppliers, which the file names only by identifier); sum of these 0.742977 m3; lognormal variance with pedigree 0.0197, pedigree (4,4,4,3,2)
  Used in pumps to ensure no leaks occur
  properties: carbon content, fossil 0.0240148, carbon content, non-fossil 0.139276, dry mass 1176.78 kg, heating value, net 5765.37 MJ, water content 0.0197355, wet mass 1200 kg
- polyethylene, high density, granulate: 13.3736 kg; name polyethylene; lognormal variance with pedigree 0.0197, pedigree (4,4,4,3,2)
  Polymer material used for making high density plastic pipes. Added separately. Not found in the original data
  properties: carbon content, fossil 0.857143, dry mass 1 kg, heating value, net 42.47 MJ, wet mass 1 kg
  note on carbon content, fossil: Polyethylene is formed out of a huge amount of ethylene monomers (C2H4) (ecoinvent v2.2 report 11_II). MW=28 g/mol
- polystyrene, high impact: 5.94382 kg; name polystyrene; lognormal variance with pedigree 0.0197, pedigree (4,4,4,3,2)
  Used as adsobers. Polystyrene materials have high temperature range resistance.
  properties: carbon content, fossil 0.923077, dry mass 1 kg, heating value, net 38.67 MJ, wet mass 1 kg
- refractory, basic, packed: 304049 kg; name refractory; lognormal variance with pedigree 0.0197, pedigree (4,4,4,3,2)
  Refractory brick, with mortar (tank perimeter foundation)
  properties: dry mass 1 kg, wet mass 1 kg
- reinforcing steel: 1.90572e6 kg; name steel; lognormal variance with pedigree 0.0197, pedigree (4,4,4,3,2)
  Used in construction of the 2 storage tanks hot and cold, heat exhanger, pumps etc
  properties: carbon content, fossil 0.004, dry mass 1 kg, wet mass 1 kg
- sand: 1056.32, 12.6476, 68740.9, 5.48392 kg (4 suppliers, which the file names only by identifier); sum of these 69815.3 kg; lognormal variance with pedigree 0.0197, pedigree (4,4,4,3,2)
  Sand (tank foundation) end of life is neglected
  properties: dry mass 1 kg, wet mass 1 kg
- scrap aluminium: -24.8121, -11.7839, -0.552874 kg (3 suppliers, which the file names only by identifier); sum of these -37.1489 kg; = aluminiumcast; lognormal variance with pedigree 0.0137, pedigree (4,4,3,3,2)
  Disposal of scrap aluminium
  production volume; = RP_PV_1 * (BP_amount_10 / RP_amount_1)
    Calculated from production volume of reference product using the relative outputs.
  properties: dry mass 1 kg, wet mass 1 kg
- scrap copper: -4878.55, -2316.95, -108.706 kg (3 suppliers, which the file names only by identifier); sum of these -7304.21 kg; = copper; lognormal variance with pedigree 0.0137, pedigree (4,4,3,3,2)
  Disposal of scrap copper
  production volume; = RP_PV_1 * (BP_amount_13 / RP_amount_1)
    Calculated from production volume of reference product using the relative outputs.
  properties: dry mass 1 kg, wet mass 1 kg
- sheet rolling, aluminium: 37.1489 kg; lognormal variance with pedigree 0.0197, pedigree (4,4,4,3,2)
  Aluminium used in tubes
- sheet rolling, chromium steel: 37.8918 kg; lognormal variance with pedigree 0.0197, pedigree (4,4,4,3,2)
  Process done to create tubes. 0.0008 represents the ratio of chrome steel used for sheet rolling from the total amount of chrome steel available.
- sheet rolling, steel: 213.234 kg; lognormal variance with pedigree 0.0197, pedigree (4,4,4,3,2)
  Process done to create tubes. 0.01 represents the ratio of low-alloyed steel used for sheet rolling from the total amount of low-alloyed steel available
- silicone product: 1757.06, 3576.03 kg (2 suppliers, which the file names only by identifier); sum of these 5333.09 kg; lognormal variance with pedigree 0.0197, pedigree (4,4,4,3,2)
  Used in pumps to prevent leakage
  properties: carbon content, fossil 0.324324, dry mass 1 kg, heating value, net 9.83 MJ, wet mass 1 kg
- steel, chromium steel 18/8, hot rolled: 42606 kg; name chromesteel; lognormal variance with pedigree 0.0197, pedigree (4,4,4,3,2)
  Used in the 2 stage nitrogen compressor and cold, hot salt, spare pumps as an integral material on them
  properties: carbon content, fossil 0.0008, dry mass 1 kg, wet mass 1 kg
  note on carbon content, fossil: Stainless steel model is the grade 304 steel (18/8 stainless, 18% chromium 8% nickel; max. 0.08% C)
- steel, low-alloyed: 20991.3 kg; name lowsteel; lognormal variance with pedigree 0.0197, pedigree (4,4,4,3,2)
  Material composition of pumps, compressors etc
  properties: carbon content, fossil 0.005, dry mass 1 kg, wet mass 1 kg
- stone wool: 103957 kg; name mwool; lognormal variance with pedigree 0.0197, pedigree (4,4,4,3,2)
  properties: carbon content, fossil 0.015401, dry mass 1 kg, wet mass 1 kg
  note on carbon content, fossil: The chemical composition of the glass fibres used in the rock wool production is similar to the composition of naturally cooled volcano basalt and has a composition listed in Tab. 3.1 and 3.2 in ecoinvent v2.2 report 16, part XIV. Rock wool contains: a minimum of 96% mineral fibres,between 0.5 and 3.0 weight percent of phenolic resin depending on the specific product characteristics, and about 0.2 percent mineral oil (ecoinvent v2.2 report 16, part XIV). An average composition of 1.8% phenolic resin, 0.2% mineral oil, and 98% mineral fibres has been assumed and used to calculate C content of the rock wool
- synthetic rubber: 2.22893 kg; name rubber; lognormal variance with pedigree 0.0197, pedigree (4,4,4,3,2)
  Material composition of pumps, compressors etc
  properties: carbon content, fossil 0.871949, dry mass 1 kg, heating value, net 26.42 MJ, wet mass 1 kg
  note on carbon content, fossil: EPDM (Ethylene-propene-diene terpolymer) rubber is a terpolymer of ethylene, propene, and a diene with the residual unsaturated portion of the diene in the side chain (ecoinvent v2.2 report 7-part XX & Ullmann). Chemical formula (deduced from Evidences of Solvent-Induced Miscibility in Polychloroprene-co-Ethylene-Propene Diene Terpolymer Blends, Dubey et al., Journal of Applied Polymer Science, 2009, 111:1884–1891): C20H35
- tap water: 95.7776, 146.005, 733.928, 88.3452, 3681.67, 42131.2, 31460.4 kg (7 suppliers, which the file names only by identifier); sum of these 78337.3 kg; lognormal variance with pedigree 0.0197, pedigree (4,4,4,3,2)
  Used in the manufacturing process of pumps
  properties: carbon content, fossil 0.00178991, dry mass 0.000337476 kg, water content 2962.17, wet mass 1 kg
  note on carbon content, fossil: Bicarbonate content is 2.93 mol/m3. CO2 content is 0.1 mol/m3 (ecoinvent v2.2 report 8, Tab 93.1).
- tin plated chromium steel sheet, 2 mm: 74.2977 m2; lognormal variance with pedigree 0.0197, pedigree (4,4,4,3,2)
  Used in deck plate for structural steel components
  properties: dry mass 15.6365 kg, wet mass 15.6365 kg
- transformer, high voltage use: 12919.6 kg; lognormal variance with pedigree 0.0197, pedigree (4,4,4,3,2)
  Transformer setup including substations and primary power distribution sources. Since the transformer data are already accounted for in ecoinvent. The end of life is neglected.
  properties: carbon content, fossil 0.262798, dry mass 1 kg, wet mass 1 kg
- waste concrete: -242808, -3.30992e6, -858.474 kg (3 suppliers, which the file names only by identifier); sum of these -3.55359e6 kg; = (concrete*2200)+refractory+expandedperilite; lognormal variance with pedigree 0.0137, pedigree (4,4,3,3,2)
  Disposal of concrete. The density is assumed to be 2200kg/m3.
  production volume; = RP_PV_1 * (BP_amount_8 / RP_amount_1)
    Calculated from production volume of reference product using the relative outputs.
  properties: dry mass 0.5 kg, water content 1, wet mass 1 kg
- waste glass: -29.7849, -90169, -0.256124, -2.74521, -227.767, -0.0622795, -0.388938 kg (7 suppliers, which the file names only by identifier); sum of these -90430 kg; = (foamglass+glassfibre); lognormal variance with pedigree 0.0137, pedigree (4,4,3,3,2)
  Disposal of the waste glass
  production volume; = RP_PV_1 * (BP_amount_5 / RP_amount_1)
    Calculated from production volume of reference product using the relative outputs.
  properties: dry mass 1 kg, heating value, net 0.05 MJ, wet mass 1 kg
  note on heating value, net: Value extracted from "treatment of waste glass, open dump, very wet infiltration class (1000mm)"
- waste mineral wool: -343.835, -30132.6, -73481 kg (3 suppliers, which the file names only by identifier); sum of these -103957 kg; = mwool; lognormal variance with pedigree 0.0137, pedigree (4,4,3,3,2)
  Rock wool used in instrumentation aspect send for final disposal
  production volume; = RP_PV_1 * (BP_amount_7 / RP_amount_1)
    Calculated from production volume of reference product using the relative outputs.
  properties: dry mass 1 kg, wet mass 1 kg
- waste paint: -96.7981, -797.379, -0.367759 kg (3 suppliers, which the file names only by identifier); sum of these -894.545 kg; = paint; lognormal variance with pedigree 0.0137, pedigree (4,4,3,3,2)
  Disposal of waste paint
  production volume; = RP_PV_1 * (BP_amount_12 / RP_amount_1)
    Calculated from production volume of reference product using the relative outputs.
  properties: carbon content, fossil 0.65, dry mass 1 kg, heating value, net 19.7 MJ, wet mass 1 kg
- waste polyethylene: -0.0388333, -0.00215915, -0.000891806, -0.000163293, -13.2989, -0.00036028, -0.0323148 kg (7 suppliers, which the file names only by identifier); sum of these -13.3736 kg; = polyethylene; lognormal variance with pedigree 0.0137, pedigree (4,4,3,3,2)
  Disposal of polyethylene
  production volume; = RP_PV_1 * (BP_amount_4 / RP_amount_1)
    Calculated from production volume of reference product using the relative outputs.
  properties: carbon content, fossil 0.825301, dry mass 0.996 kg, heating value, net 42.47 MJ, water content 0.00401606, wet mass 1 kg
  note on carbon content, fossil: C content in 1 kg DM was calculated using data in Tab A.1, ecoinvent v2.2 report 13_I
- waste polystyrene: -0.0126256, -0.000140764, -0.000843595, -0.000348435, -6.37997e-5, -5.91401, -0.0157826 kg (7 suppliers, which the file names only by identifier); sum of these -5.94382 kg; = polystyrene; lognormal variance with pedigree 0.0137, pedigree (4,4,3,3,2)
  Disposal of polymer material
  production volume; = RP_PV_1 * (BP_amount_9 / RP_amount_1)
    Calculated from production volume of reference product using the relative outputs.
  properties: carbon content, fossil 0.922579, dry mass 0.998 kg, heating value, net 38.67 MJ, water content 0.00200401, wet mass 1 kg
- waste reinforcement steel: -2.02118e6, -1403.42 kg (2 suppliers, which the file names only by identifier); sum of these -2.02258e6 kg; = (steel+castiron+lowsteel+chromesteel+ironnickelchromealloy); lognormal variance with pedigree 0.0137, pedigree (4,4,3,3,2)
  All steel masses combined. Treatment of reinforced steel is used as a proxy for all steel types.
  production volume; = RP_PV_1 * (BP_amount_6 / RP_amount_1)
    Calculated from production volume of reference product using the relative outputs.
  properties: dry mass 1 kg, wet mass 1 kg
- waste rubber, unspecified: -0.0355745, -1.34594, -0.84742 kg (3 suppliers, which the file names only by identifier); sum of these -2.22893 kg; = rubber; lognormal variance with pedigree 0.0137, pedigree (4,4,3,3,2)
  Disposal of waste rubber
  production volume; = RP_PV_1 * (BP_amount_11 / RP_amount_1)
    Calculated from production volume of reference product using the relative outputs.
  properties: carbon content, fossil 0.853, dry mass 1 kg, heating value, net 27.19 MJ, wet mass 1 kg
- wastewater, average: -0.377006, -62.7356, -15.0014, -0.223363 m3 (4 suppliers, which the file names only by identifier); sum of these -78.3373 m3; = water/1000; lognormal variance with pedigree 0.0137, pedigree (4,4,3,3,2)
  Wastewater from manufacturing process of the pumps. As the composition of this water is not known, average wastewater is chosen as first assumption.
  production volume; = RP_PV_1 * (BP_amount_3 / RP_amount_1)
    Calculated from production volume of reference product using the relative outputs.
  properties: carbon content, non-fossil 0.194039, dry mass 0.346837 kg, water content 2882.2, wet mass 1000 kg
  note on carbon content, non-fossil: 0.0673 kg TOC/m3 (Tab A.17, ecoinvent v2.2 report 13_I). TOC was considered as Total Carbon.
- welding, arc, steel: 750.407 m; lognormal variance with pedigree 0.0197, pedigree (4,4,4,3,2)
  Steel subjected to arc welding
- wire drawing, copper: 7304.21 kg; = copper; lognormal variance with pedigree 0.0197, pedigree (4,4,4,3,2)
  Copper used in field wiring, ground networks etc

## Sampling procedure
This dataset is entirely based on the detailed life cycle inventory as presented in the dissertation report by
Telsnig, Thomas. 2015. Standortabhängige Analyse und Bewertung solarthermischer Kraftwerke am Beispiel Südafrikas. Forschungsbericht. Band 123. ISSN 0938-1228. Institut für Energiewirtschaft und Rationelle Energieanwendung, Universität Stuttgart, Germany. Further, data in Telsnig 2015 are not shown explicitely for the downscaled 50 MW parabolic trough power plant. This gap is filled in the ecoinvent report.

## Extrapolations
This dataset has been extrapolated from a dataset modelled for the location Upington, South Africa.
The original data modelling a 250 MW power plant have been scaled down with parameter specific linear and non-linear equations to represent a 50 MW plant design.
Uncertainty has not been adjusted as it is assumed that the modelled 50 MW parabolic trough plant would be very similar in other parts of the world.

## Review by Christopher Oberschelp 2017-03-06
Very detailed and well-structured dataset with in-depth documentation. Key exchanges have been found reasonable. Comparison of impacts with other technologies might now help to spot any unusual or unexpected exchanges.
