# fatty alcohol sulfate production, palm oil

Dataset: EcoSpold 2, unit process
Geography: RoW
Time period: 1992-01-01 to 2023-12-31
Technology level: modern
Classification: EcoSpold01Categories: washing agents/tensides
Classification: ISIC rev.4 ecoinvent: 2023:Manufacture of soap and detergents, cleaning and polishing preparations, pe
Tags: ConvertedDataset
Scenario: Business-as-Usual
System model: Allocation, cut-off by classification
Share of production covered: 60 %
Generated by: Rainer Zah
Published in: Zah R. 2007
Database: ecoinvent
isCopyrightProtected: true
accessRestrictedTo: 1

## General comment
This dataset represents the production of 1 kg of fatty alcohol sulfate (FAS) from fatty alcohol produced from palm oil.
The dataset consider the production of FAS with short chain lengths of C16-C18. Material and energy inputs are from literature sources. Transport and infrastructure are estimated from a large chemical plant.
General flow diagram for the production of FAS:
[This dataset was already contained in the ecoinvent database version 2. It was not individually updated during the transfer to ecoinvent version 3. Life Cycle Impact Assessment results may still have changed, as they are affected by changes in the supply chain, i.e. in other datasets. This dataset was generated following the ecoinvent quality guidelines for version 2. It may have been subject to central changes described in the ecoinvent version 3 change report (http://www.ecoinvent.org/database/ecoinvent-version-3/reports-of-changes/), and the results of the central updates were reviewed extensively. The changes added e.g. consistent water flows and other information throughout the database. The documentation of this dataset can be found in the ecoinvent reports of version 2, which are still available via the ecoinvent website. The change report linked above covers all central changes that were made during the conversion process.]

## Included activities start
From reception of fatty alcohol fron palm oil, SO3, and NaOH at the factory gate.

## Included activities end
This activity ends with 1 kg of fatty alcohol sulfate.The dataset includes material and energy input, transport, infrastructure, production of waste (landfill) and emissions to air and water. The dataset doesn't include water consumption.

## Geography
Data based on the European fatty alcohol sulfonate production

## Technology
Fatty alcohols are the starting product for manufacturing fatty alcohol sulfate (FAS). They can be produced oleochemically or petrochemically. FAS are obtained by sulphonation of the alcohols. A thin film of alcohol is brought together with a mixture of SO3 and dry air inside a vertical tube. The heat produced by the reaction is removed using coolants outside the tube. SO3 itself is produced through a catalytic oxidisation of SO2, which derives from the combustion of sulphur or as a secondary product. After sulphonation, sodium hydroxide is applied to neutralize the acid that has been formed.
This is an average technology for the production of FAS with short chain lengh (C12-C15), representing typical European production mix in the mid 90s.
Reference:
Hirsinger F., Schick K.-P., (1995) A Life-Cycle Inventory for the Production of Alcohol Suplphates in Europe. In Tenside, Surfactants, Detergents, 32 (2), pp.128-139
//Comment added during dataset update:// the palm oil route has been designated as modern, since it has the good ability to change capacity with changes in demand compared to most other oleochemical raw materials.

## Time period
data of published literature

## Reference product
- fatty alcohol sulfate: 1 kg; source Hirsinger F. 1995; By-product classification allocatable product; CPC 35310: Organic surface active agents, except soap; HS2017 3823: Industrial monocarboxylic fatty acids; acid oils from refining; industrial fatty alcohols
  EcoSpold01Location=RER
  Fatty alcohol sulfates (FAS) belong to the group of anionic surfactants and have been used as detergents already since the 1930s. They are synthesized by sulfation to an acid form followed by a neutralization with sodium hydroxide. The generic chemical structure of FAS is:
  R-CH2-O-SO3-Na
  FAS generally exhibit good detergency, wetting and foaming properties. However, the exact properties of FAS are determined by molecular structure and chain length of the alcohol and the type of cation. Products with a chain length of C12-C15, that are derived form coconut oil, palm kernel oil and petrochemical sources, have good foaming power and show good low temperature detergency. At higher temperatures, chain lengths of C16-C18, derived from palm oil, are more effective.
  FAS are mainly used as surfactants in washing powders, especially in gentle washing powders. FAS are also used in toiletry and cosmetic formulations such as shampoos, toothpastes and cosmetic lotions
  production volume 1.57628e7 kg
    Total production volume of fatty alcohol sulfate is from year 2000 (Soap, Perfumery, and Cosmetics. November 2000, p. 51). 4% of this is assumed to be sourced from palm oil.
  property carbon content, non-fossil 0.569832
    FAS are synthesized by sulfation to an acid form followed by a neu-tralization with sodium hydroxide. The generic chemical structure of FAS is: R-CH2-O-SO3-Na. Chain length of FAS derived form palm oil is C16-C18 (ecoinvent report 12). An average length of C17 has been used. MW of the molecule has been estimated considering R as C16H(2*16+1); MW R=225 g/mol. MW of FAS (133+225)= 358 g/mol
  property heating value, net 15.89 MJ
    LHV is calculated based on the Carbon content of the product. More details can be found on the respective documentation.
  property price 1.02 EUR2005
    Calculated value based on data from United Nations Commodity Trade Statistics Database (comtrade.un.org). UN comtrade category: 382370 Industrial fatty alcohol Year 2005. Using exchange rate of 1EURO = 1.209 USD. Average of price of import into 5 main markets (EU, US, JP, IN and CN).
  properties: carbon allocation 0.569832 kg, carbon content 0.569832, carbon content, fossil 0, dry mass 1 kg, water content 0, water in wet mass 0 kg, wet mass 1 kg

## Inputs from technosphere
- chemical factory, organics: 4e-10 unit; lognormal variance with pedigree 0.3632, pedigree (2,3,5,5,1)
  Literature source.
  EcoSpold01Location=RER
- electricity, medium voltage: 0.00545382, 0.108792, 0.0365536, 0.00167015, 0.000334278, 7.1777e-5, 0.0112344 kWh (7 suppliers, which the file names only by identifier); sum of these 0.16411 kWh; source Dall'Acqua S. 1999; lognormal variance with pedigree 0.0632, pedigree (2,3,5,5,1)
  EcoSpold01Location=UCTE
  Literature source.
- fatty alcohol: 0.698 kg; source Dall'Acqua S. 1999; lognormal variance with pedigree 0.0632, pedigree (2,3,5,5,1)
  EcoSpold01Location=RER
  Literature source.
  properties: carbon content, fossil 0.0408973, carbon content, non-fossil 0.743434, dry mass 1 kg, heating value, net 41.01 MJ, wet mass 1 kg
  note on carbon content, fossil: Fatty alcohols have chain lengths between C6 and C22, their chemical formula is CH3(CH2)nCH2OH (ecoinvent v2.2 report 12, pg 16). As an average, C14 was used. The dataset represents a mix of 27% produced from fatty acid splitting and 73% produced from methyl ester (ecoinvent v2.2 report 12, pg 21). In the methyl esterification, methanol (CH3OH) has a fossil origin
  note on carbon content, non-fossil: FAS are synthesized by sulfation to an acid form followed by a neu-tralization with sodium hydroxide. The generic chemical structure of FAS is: R-CH2-O-SO3-Na. Chain length of FAS derived form palm oil is C16-C18 (ecoinvent report 12). An average length of C17 has been used. MW of the molecule has been estimated considering R as C16H(2*16+1); MW R=225 g/mol. MW of FAS (133+225)= 358 g/mol Fatty alcohols have chain lengths between C6 and C22, their chemical formula is CH3(CH2)nCH2OH (ecoinvent v2.2 report 12, pg 16). As an average, C14 was used. The dataset represents a mix of 27% produced from fatty acid splitting and 73% produced from methyl ester (ecoinvent v2.2 report 12, pg 21). In the methyl esterification, methanol (CH3OH) has a fossil origin
- heat, district or industrial, natural gas: 0.0229764, 1.39822 MJ (2 suppliers, which the file names only by identifier); sum of these 1.4212 MJ; lognormal variance with pedigree 0.0632, pedigree (2,3,5,5,1)
  properties: heating value, net 1 MJ
- heat, district or industrial, other than natural gas: 0.792887, 0.00036733 MJ (2 suppliers, which the file names only by identifier); sum of these 0.793254 MJ; lognormal variance with pedigree 0.0632, pedigree (2,3,5,5,1)
  properties: heating value, net 1 MJ
- inert waste, for final disposal: -0.00062 kg; source Dall'Acqua S. 1999; lognormal variance with pedigree 0.0252, pedigree (2,3,3,5,1)
  EcoSpold01Location=CH
  Literature Value.
  production volume
    Calculated from the production volume of fatty alcohol sulfate in proportion to the respective output amounts.
  properties: dry mass 0.995 kg, water content 0.00502513, wet mass 1 kg
- sodium hydroxide, without water, in 50% solution state: 0.144 kg; source Dall'Acqua S. 1999; lognormal variance with pedigree 0.0632, pedigree (2,3,5,5,1)
  EcoSpold01Location=RER
  Literature source.
  properties: dry mass 1 kg, heating value, net 3.03 MJ, wet mass 1 kg
- sulfur: 0.113 kg; source Dall'Acqua S. 1999; lognormal variance with pedigree 0.0632, pedigree (2,3,5,5,1)
  EcoSpold01Location=RER
  Literature source.
  properties: dry mass 1 kg, wet mass 1 kg

## Emissions to nature
- Carbon dioxide, non-fossil [air, urban air close to ground]: 0.0311 kg; lognormal variance with pedigree 0.0632, pedigree (2,3,5,5,1)
  Calculated Value: emissions have been assessed by comparing the aggregated emissions of the four different types of fatty alcohol sulfate production from literature sources.
- Carbon monoxide, fossil [air, urban air close to ground]: 6.24e-6 kg; lognormal variance with pedigree 0.7032, pedigree (2,3,5,5,1)
  (same comment as for Carbon dioxide, non-fossil)
- Methane, fossil [air, urban air close to ground]: 0.00105 kg; source Hirsinger F. 1995; lognormal variance with pedigree 0.0632, pedigree (2,3,5,5,1)
  (same comment as for Carbon dioxide, non-fossil)
- NMVOC, non-methane volatile organic compounds [air, urban air close to ground]: 3.62e-7 kg; source Hirsinger F. 1995; lognormal variance with pedigree 0.0932, pedigree (2,3,5,5,1)
  (same comment as for Carbon dioxide, non-fossil)
- Nitrogen oxides [air, urban air close to ground]: 0.000108 kg; source Hirsinger F. 1995; lognormal variance with pedigree 0.0932, pedigree (2,3,5,5,1)
  (same comment as for Carbon dioxide, non-fossil)
- Particulate Matter, > 10 um [air, urban air close to ground]: 0.000156 kg; source Hirsinger F. 1995; lognormal variance with pedigree 0.0932, pedigree (2,3,5,5,1)
  (same comment as for Carbon dioxide, non-fossil)
- Sulfur dioxide [air, urban air close to ground]: 0.00011 kg; source Hirsinger F. 1995; lognormal variance with pedigree 0.0632, pedigree (2,3,5,5,1)
  (same comment as for Carbon dioxide, non-fossil)
- BOD5, Biological Oxygen Demand [water, surface water]: 1.59e-5 kg; lognormal variance with pedigree 0.0932, pedigree (2,3,5,5,1)
  (same comment as for Carbon dioxide, non-fossil)
- COD, Chemical Oxygen Demand [water, surface water]: 0.000886 kg; lognormal variance with pedigree 0.0932, pedigree (2,3,5,5,1)
  (same comment as for Carbon dioxide, non-fossil)
- Chromium III [water, surface water]: 2.43e-6 kg; lognormal variance with pedigree 0.7032, pedigree (2,3,5,5,1)
  (same comment as for Carbon dioxide, non-fossil)
- DOC, Dissolved Organic Carbon [water, surface water]: 0.000328148 kg; lognormal variance with pedigree 0.0932, pedigree (2,3,5,5,1)
  Calculated Value: calculation by default as DOC (gC) = COD/2.7 (COD measured in g O2).
- Dissolved solids [water, surface water]: 0.00302 kg; lognormal variance with pedigree 0.0932, pedigree (2,3,5,5,1)
  (same comment as for Carbon dioxide, non-fossil)
- Nitrogen [water, surface water]: 4.14e-6 kg; source Hirsinger F. 1995; lognormal variance with pedigree 0.7032, pedigree (2,3,5,5,1)
  (same comment as for Carbon dioxide, non-fossil)
- Oils, unspecified [water, surface water]: 5.36e-7 kg; source Hirsinger F. 1995; lognormal variance with pedigree 0.3632, pedigree (2,3,5,5,1)
  (same comment as for Carbon dioxide, non-fossil)
- Sulfate [water, surface water]: 0.00106 kg; source Hirsinger F. 1995; lognormal variance with pedigree 0.0932, pedigree (2,3,5,5,1)
  (same comment as for Carbon dioxide, non-fossil)
- TOC, Total Organic Carbon [water, surface water]: 0.000328148 kg; lognormal variance with pedigree 0.0932, pedigree (2,3,5,5,1)
  Calculated Value: calculation by default as TOC (gC) = COD/2.7 (COD measured in g O2).
- Zinc II [water, surface water]: 1.1e-7 kg; source Hirsinger F. 1995; lognormal variance with pedigree 0.7032, pedigree (2,3,5,5,1)
  (same comment as for Carbon dioxide, non-fossil)

## Sampling procedure
data out of ECOSOL study of European Surfactant Industry. Common translation rules used, reported in Chemical report (Althaus et al. 2003).

## Extrapolations
see technology This dataset has been copied from an original dataset covering the geography RER. The uncertainty has been adjusted accordingly.

## Review by Heiko Kunst 2003-07-04
Passed.

## Review by Emilia Moreno Ruiz 2018-03-15
Links added to connect specific suppliers to consumers (re. type of fatty alcohol).
