# mango production, conditioned, heat treatment

Dataset: EcoSpold 2, unit process
Geography: RoW
Time period: 2016-01-01 to 2023-01-31
Technology level: current
Classification: ISIC rev.4 ecoinvent: 0163:Post-harvest crop activities
Synonyms: packing house mango; mango heat treatment
Scenario: Business-as-Usual
System model: Allocation, cut-off by classification
Share of production covered: 100 %
Generated by: Jade Müller Carneiro
Published in: Folegatti-Matsuura M. 2018
Database: ecoinvent
isCopyrightProtected: true
accessRestrictedTo: 1

## General comment
This dataset represents the post-harvest phase of the mango produced in the San Francisco valley, Northeast of Brazil and consumed in several countries. The processes included are: washing of the mango, heat treatment, application of wax and fungicides. The heat treatment is required in a few markets, such as US, Chile, Argentina and Japan. It is considered a loss of 5% of the mangoes - those that do not comply with quality requirements and are discarded. Effluent from washing and phytosanitary treatments is disposed in soil without treatment, and it is assumed that all inputs of detergents and chemicals are released in the effluent.
Products and suppliers: https://www.agro.bayer.com.br/produtos/serenade http://www.grupotopclean.com.br/uploads/Fispq-Hidrosan.pdf http://www.equinox-products.com/images/InlineChlorinator/ChlorinePelletsMSDS.pdf https://www.lamotte-oils.de/en/products/product-range/a/si/p/carnauba-wax.html http://www.aamtech.com.au/pdf/msds/Septone%20Mango%20Wash.pdf http://www.portaldistribuidora.com/fichas/INDEBA/Primmax%20DGA.pdf https://www.ultracleansystems.com/trays-detergents-accessories/ultra-clean-systems-detergents/ http://www.mercoclean.com.br/produtos/alimentos-e-bebidas/produtos-especificos/letah-gel/ http://www.echeverriasa.cl/Fichas/FT-FICHAS/FT-TECSA%20CLOR.pdf
http://www2.amazonas.com.br/segmentos/embalagens/produtos/hot-melt-hotmelt http://www.internationalpaper.com/products/south-america/corrugated-packaging/product-detail/produce-packaging http://www.madeireirabaggio.com.br/ http://www.arckpack.com.br/

## Included activities start
The activity starts when the harvested mangoes are brought to the packing house.

## Included activities end
The dataset includes inputs of chemical products, packaging material, water, electricity and the production of the infrastruture and industrial machines. Are not included in the dataset the inputs of packaging material used in the finished product (conditioned mangoes), however this has been accounted as the following (per quilogram of packed mango): Cardboard used in the boxes 2.30E-04 kg ; Eucalyptus wood in the form of pallets 7.44E-04kg; Plastic tape 3.25E-08kg, and Hotmelt adhesive (EVA) 7.67E-04 kg. Also, the wax used for coating the mangoes has not been added to the exchanges, since the LCI of Carnauba wax from Brazil is not yet available on the database, which corresponds to 8.33E-03kg of Carnauba wax per kg of packed mango.

## Geography
The inventory is modelled for the San Francisco valley, states of Pernambuco and Bahia, Brazil, the main producer region, and extrapolated at country level.

## Parameters
- amount mangowash: 2.23e-5 kg; name mangowash
  Mangowash used for cleaning the fruits. (http://www.aamtech.com.au/pdf/msds/Septone%20Mango%20Wash.pdf)
- detergent Na alkyl s: 8.81e-5 kg; name deterg_na_s
  detergent - Sodium alkylbenzene sulfonate (http://www.portaldistribuidora.com/fichas/INDEBA/Primmax%20DGA.pdf)
- disinfectant ClO2: 0.055 kg; name disinf_clo2
  total amount of chlorine dioxide disinfectant (http://www.echeverriasa.cl/Fichas/FT-FICHAS/FT-TECSA%20CLOR.pdf)
- disinfectant calcium cl: 7.33e-6 kg; name disinf_ca_cl
  disinfectant calcium hypochloride (http://www.equinox-products.com/images/InlineChlorinator/ChlorinePelletsMSDS.pdf)
- disinfectant troclosene sodium: 1.13e-5 kg; name disinf_t_s
  Troclosene sodium (or Sodium dichloroisocyanurate) disinfectant. Total amount. http://www.grupotopclean.com.br/uploads/Fispq-Hidrosan.pdf
- emission factor CO2: 63100 dimensionless; name EF_CO2_LPG
  According to table 1.4 IPCC - V.4: Energy, emission factor for CO2 from LPG boilers.
- emission factor N2O: 4 dimensionless; name EF_N2O_LPG
  According to table 2.7 IPCC - V.4: Energy, emission factor for N2O releases from LPG boilers.
- emission factor methane from gas: 0.9 dimensionless; name EF_CH4_LPG
  According to table 2.7 IPCC - V.4: Energy, emission factor for methane releases from LPG boilers.
- net calorific value: 47.8 MJ/kg; name LPG_net_cal_value
  Net calorific value for Liquified petroleum gas, according to IPCC (2006) Vol 4 - Energy.
- water for washing: 0.000262 m3; name water_wash
  Water used for washing the mangoes, for the functional unit (1kg of packed mango)
- water heat treatment: 0.000992 m3; name water_heat_t
  Water used for the heat treatment, for the functional unit (1kg of packed mango)
- water wax treatment: 1.13e-6 m3; name water_wax
  Water consumed in the process of wax and fungicides application.

## Reference product
- mango, conditioned: 1 kg; name REF_PRODUCT; By-product classification allocatable product; CPC 86111: Post-harvest crop services; HS2017 080450: Fruit, edible; guavas, mangoes and mangosteens, fresh or dried
  Final product - mango after quality control (discart of 5%) and wax and fungicide application. Average Packed fruits (years 2012 to 2016) is 8,98E+06 kg per year, according to producers in the packing house visited. However, 39% of this ammount goes to the countries that require the heat water tretment and (100-39)= 61% to the markets that do nor require heat treatment.
  production volume 1.63115e10 kg; name PV_mango_heat_treat_GLO; = 43000000000*0.39
    According to FAOSTAT (2014) the amount of mango produced worldwide in 2013 was 43 million tonnes. It was considered that 61% of the fruit undergoes wax treatment and the remaining 39% undergoes heat treatment; These shares were calculated according to data provided by local producers in Brazil on the production and exports of mango for the year of 2016. Markets such as the US, Chile and Japan require additional phytosanitary treatment, thus the product that is destined to these countries has to go through wax treatment and heat treatment, whilst for the local markets and exports to the EU, only the wax treatment is required.
  property carbon content, fossil 0; name REF_PRODUCT_C_content_fossil
    fossil carbon content on a dry matter basis
  property carbon content, non-fossil 0.42; name REF_PRODUCT_C_content_non_fossil
    biogene carbon content on a dry matter basis
  property dry mass 0.2 kg; name REF_PRODUCT_DM
  property price 0.770537 EUR2005
    Literature value. Price from FAOSTAT data Producer Prices - Annual (retrieved from: http://www.fao.org/faostat/en/#data/PP, accessed 15Feb2018). Data from 2005.
  property water content 4; name REF_PRODUCT_water_content
  property water in wet mass 0.8 kg; name REF_PRODUCT_WWM
  property wet mass 1 kg; name REF_PRODUCT_WM
  properties: carbon allocation 0.084 kg, carbon content 0.42

## Inputs from technosphere
- alkylbenzene sulfonate, linear, petrochemical: 3.76e-6 kg; lognormal variance with pedigree 0.0086, pedigree (3,4,3,5,1)
  Linear Sodium Alkyl Benzene Sulfonic Acid, active ingredient from detergent Primax DGA, label available from: http://www.portaldistribuidora.com/fichas/INDEBA/Primmax%20DGA.pdf
  properties: carbon content, fossil 0.407018, dry mass 1 kg, heating value, net 28.88 MJ, wet mass 1 kg
  note on carbon content, fossil: European LAS is a mixture of differ-ent homologues (C10-C13 alkyl chains) including all positional isomers with the exception of 1-alkyl substituted ones. The typical homologue distribution is 15%, 30%, 30% and 25% for C10, C11, C12 and C13 with an average alkyl chain of C11.6 and an average molecular weight of 342 as the sodium salt (ecoinvent v2.2 report 12)
- biowaste: -0.00861684, -0.0104238, -0.0309594 kg (3 suppliers, which the file names only by identifier); sum of these -0.05 kg; lognormal variance with pedigree 0.0446, pedigree (5,4,1,5,1)
  Mangoes that are discarded for not complying with quality requirements (5% of harvested mango)
  production volume; = PV_mango_heat_treat_GLO * (waste_mango / REF_PRODUCT)
    Calculated from production volume of reference product using the relative outputs.
  properties: carbon content, non-fossil 0.1624, dry mass 0.4 kg, heating value, net 4.29 MJ, water content 1.5, wet mass 1 kg
  note on heating value, net: Value taken from the general comment of the treatment dataset.
- building, hall: 2.22717e-5 m2; lognormal variance with pedigree 0.346, pedigree (5,4,3,5,1)
  Infrastructure of the packing house. It was considered the same area of 6000m2 explained on the input of area (occupation, industrial area) - see comments.
- calcium chloride: 1.06647e-6, 3.69353e-6 kg (2 suppliers, which the file names only by identifier); sum of these 4.76e-6 kg; lognormal variance with pedigree 0.0072, pedigree (2,4,3,5,1)
  Calcium hypochloride 65% (http://www.equinox-products.com/images/InlineChlorinator/ChlorinePelletsMSDS.pdf)
  properties: dry mass 1 kg, wet mass 1 kg
- chlorine dioxide: 0.00053592, 0.00254408 kg (2 suppliers, which the file names only by identifier); sum of these 0.00308 kg; lognormal variance with pedigree 0.0072, pedigree (2,4,3,5,1)
  Disinfectant 5% chlorine dioxide (http://www.echeverriasa.cl/Fichas/FT-FICHAS/FT-TECSA%20CLOR.pdf)
  properties: dry mass 1 kg, wet mass 1 kg
- electricity, medium voltage: 3.7721e-5, 1.68302e-6, 3.92188e-5, 1.98838e-5, 2.43481e-5, 1.40906e-5, 0.00155769, 0.0310724, 3.49427e-6, 0.0104402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 kWh (31 suppliers, which the file names only by identifier); sum of these 0.0543 kWh; lognormal variance with pedigree 0.0072, pedigree (2,4,3,5,1)
  Consumption of electricity in the packing house, according to electricity bills provided by producers.
- enzymes: 0.000155 kg; lognormal variance with pedigree 0.0466, pedigree (5,4,3,5,1)
  Detergent, Ultra Clean, as enzymes.
- ethanol, without water, in 99.7% solution state, from ethylene: 5.38266e-7, 2.41734e-7 kg (2 suppliers, which the file names only by identifier); sum of these 7.8e-7 kg; lognormal variance with pedigree 0.0086, pedigree (3,4,3,5,1)
  Hand sanitiser 70% ethanol (http://www.mercoclean.com.br/produtos/alimentos-e-bebidas/produtos-especificos/letah-gel/)
  properties: carbon content, fossil 0.521739, dry mass 1 kg, heating value, net 28.1 MJ, wet mass 1 kg
  note on heating value, net: Based on literature, page 275, Report 17: Jungbluth, N., Chudacoff, M., Dauriat, A., Dinkel, F., Doka, G., Faist Emmenegger, M., Gnansounou, E., Kljun, N., Schleiss, K., Spielmann, M., Stettler, C., Sutter, J. 2007: Life Cycle Inventories of Bioenergy. ecoinvent report No. 17, Swiss Centre for Life Cycle Inventories, Dübendorf, CH.
- industrial machine, heavy, unspecified: 4.2977e-7, 8.7023e-7 kg (2 suppliers, which the file names only by identifier); sum of these 1.3e-6 kg; lognormal variance with pedigree 0.0466, pedigree (5,4,3,5,1)
  Total quantity of steel in the machines used. For 20,000 fruits/hour the equipment weight is 1500 kg of steel (http://www.cemag.com.br/s_produtos_detalhes.asp?id=48). The inventoried packaging unit process 8,980,000 kg of mango/year, resulting in 4,677 fruits/hour. Considering that mangos are packed all year long and that the equipment last 30 years, the ammount of 11,7 kg of steel/year is consumed.
- liquefied petroleum gas: 2.52578e-5, 7.61467e-5, 0.00211369, 1.69485e-5, 0.000861547, 0.00360566, 1.07498e-5 kg (7 suppliers, which the file names only by identifier); sum of these 0.00671 kg; lognormal variance with pedigree 0.0466, pedigree (5,4,3,5,1)
  LGP used to heat the water used in the heat treatment, according to the producers.
  properties: carbon content, fossil 0.821863, dry mass 1 kg, heating value, net 45.5 MJ, wet mass 1 kg
  note on heating value, net: Indicative value. Reference: Fuels - Higher and Lower Calorific Values, available at: https://www.engineeringtoolbox.com/fuels-higher-calorific-values-d_169.html
- mango: 1.05 kg; lognormal variance with pedigree 0.0066, pedigree (1,4,3,5,1)
  5% of all mangos that enter in the packing house are not selected, according to quality criteria and become waste
  properties: carbon content, non-fossil 0.42, dry mass 0.2 kg, water content 4, wet mass 1 kg
- pesticide, unspecified: 4.11e-7 kg; lognormal variance with pedigree 0.0072, pedigree (2,4,3,5,1)
  Fungicide, as Bacillus subtilis linhagem QST 713 (1,37 % m/v), from using the commercial product Serenade, label available from: https://www.agro.bayer.com.br/produtos/serenade
  properties: carbon content, fossil 0.486978, dry mass 1 kg, wet mass 1 kg
- sodium chloride, powder: 7.33e-6 kg; lognormal variance with pedigree 0.0086, pedigree (3,4,3,5,1)
  Disinfectant, Hidrosan plus, as Troclosene sodium (65%) plus amount of the active ingredient troclosene sodium(sodium dichloroisocyanurate) used from detergent Mangowash
  properties: dry mass 1 kg, wet mass 1 kg
- sodium metasilicate pentahydrate, 58% active substance, powder: 7.72127e-6, 3.81321e-6 kg (2 suppliers, which the file names only by identifier); sum of these 1.15345e-5 kg; lognormal variance with pedigree 0.0072, pedigree (2,4,3,5,1)
  Used as a proxy for sodium metasilicate (kg) used in the form of mangowash, detergent.
  properties: dry mass 1 kg, heating value, net 5.71 MJ, wet mass 1 kg
- sodium percarbonate, powder: 4.42994e-6, 8.97006e-6 kg (2 suppliers, which the file names only by identifier); sum of these 1.34e-5 kg; lognormal variance with pedigree 0.0072, pedigree (2,4,3,5,1)
  Quantity of SODIUM CARBONATE in Mangowash detergent.
  properties: carbon content, fossil 0.0902256, dry mass 1 kg, heating value, net 4.63 MJ, wet mass 1 kg
- tap water: 1.54366e-6, 2.35317e-6, 4.3909e-6, 1.42387e-6, 5.93377e-5, 0.000679031, 0.000507049 kg (7 suppliers, which the file names only by identifier); sum of these 0.00125513 kg; = water_wash+ water_heat_t+ water_wax; lognormal variance with pedigree 0.0146, pedigree (4,4,3,5,1)
  The water consumption in the packing house is composed by the water used for washing, wax application and heat water treatment of the mangoes, according to measurements in the packing house and to information given by producers.
  properties: carbon content, fossil 0.00178991, dry mass 0.000337476 kg, water content 2962.17, wet mass 1 kg
  note on carbon content, fossil: Bicarbonate content is 2.93 mol/m3. CO2 content is 0.1 mol/m3 (ecoinvent v2.2 report 8, Tab 93.1).

## Inputs from nature
- Occupation, industrial area [natural resource, land]: 2.22717e-6 m2*year; name area_packing_house; lognormal variance with pedigree 0.046, pedigree (1,4,3,5,1)
  Mango packing house uses a total of 600m2 of area; however this area is used for water heat treatment and wax treatment as well, conditioning a total of 8980ton of mangoes per year.

## Emissions to nature
- Carbon dioxide, fossil [air, non-urban air or from high stacks]: 0.0202386 kg; lognormal variance with pedigree 0.0466, pedigree (5,4,3,5,1)
  Carbon dioxide emission from combustion of LPG on boilers used for the water heat treatment, according to IPCC (2006) Vol.4 - Energy.
- Dinitrogen monoxide [air, non-urban air or from high stacks]: 1.28295e-6 kg; lognormal variance with pedigree 0.0466, pedigree (5,4,3,5,1)
  Dinitrogen monoxide emission from combustion of LPG on boilers used for the water heat treatment, according to IPCC (2006) Vol.4 - Energy..
- Methane, fossil [air, non-urban air or from high stacks]: 2.88664e-7 kg; lognormal variance with pedigree 0.0466, pedigree (5,4,3,5,1)
  Methane emission from combustion of LPG on boilers used for the water heat treatment, according to IPCC (2006) Vol.4 - Energy.
- Calcium II [water, surface water]: 1.33e-6 kg; lognormal variance with pedigree 0.06, pedigree (4,5,3,5,1)
  Emission of calcium to water from the effluent of the packing house. It was assumed that all products used in washing and other processes are released in the effluent.
- Carbonate [water, surface water]: 7e-6 kg; lognormal variance with pedigree 0.086, pedigree (5,4,3,5,1)
  Emission of carbonate to water from the effluent of the packing house. It was assumed that all products used in washing and other processes are released in the effluent.
- Chlorine [water, surface water]: 1.09e-5 kg; lognormal variance with pedigree 0.086, pedigree (5,4,3,5,1)
  Emission of chlorine to water from the effluent of the packing house. It was assumed that all products used in washing and other processes are released in the effluent.
- Nitrogen [water, surface water]: 1.57e-6 kg; lognormal variance with pedigree 0.086, pedigree (5,4,3,5,1)
  Emission of nitrogen to water from the effluent of the packing house. It was assumed that all products used in washing and other processes are released in the effluent.
- Sodium I [water, unspecified]: 4.99e-6 kg; lognormal variance with pedigree 0.086, pedigree (5,4,3,5,1)
  Emission of sodium to water from the effluent of the packing house. It was assumed that all products used in washing and other processes are released in the effluent.
- Sulfur [water, surface water]: 3.43e-7 kg; lognormal variance with pedigree 0.086, pedigree (5,4,3,5,1)
  Emission of sulfur to water from the effluent of the packing house. It was assumed that all products used in washing and other processes are released in the effluent.
- Water [water, surface water]: 0.00125513 m3; = water_conditioning; lognormal variance with pedigree 0.086, pedigree (5,4,3,5,1)
  Amount of water that leaves the packing-house as effluent.

## Sampling procedure
Data regarding inputs where given by the local producers; some measurements where made in the packing house, regarding water flows during the washes. Electricity spendings where taking from energy bills at the packaging unit.

## Extrapolations
Exchange properties such as carbon content, water content, dry mass and wet mass are based on ecoinvent database.

## Review by Jens Lansche 2017-11-12
All review comments considered.
