# natural gas, high pressure, import from BO

Dataset: EcoSpold 2, unit process
Geography: BR
Time period: 2018-01-01 to 2023-12-31
Technology level: current
Classification: ISIC rev.4 ecoinvent: 4930:Transport via pipeline
Scenario: Business-as-Usual
System model: Allocation, cut-off by classification
Share of production covered: 100 %
Generated by: F. Valebona; T. B. Rocha; F. L. Motta
Database: ecoinvent
isCopyrightProtected: true
accessRestrictedTo: 1

## General comment
This dataset describes the transport needed for the export of Bolivian natural gas (expressed in tkm). Gas losses and emissions during seasonal storage are extrapolated from the ‘natural gas, high pressure, import from NO’ dataset for The Netherlands, valid for the year of 2012, available in database version 3.6. The GASBOL onshore pipeline distance is 557 km for the export on the Bolivian side, i.e., the length of the Bolivian pipeline section (MME, 2018).
[MME 2018]
Ministry of Mines and Energy (2019). Monthly Bulletin of the Natural Gas Industry. December 2018. Edition number 142. Available at: http://www.mme.gov.br/web/guest/secretarias/petroleo-gas-natural-ebiocombustiveis/publicacoes/boletim-mensal-de-acompanhamento-da-industria-de-gas-natural. Accessed in: 10/06/2020.
Characteristics are based on the ecoinvent report v2 'Erdgas' from 2007: HV; 44.21 MJ/m-3; density, 0.84 kg/m-3, 0.719 kg CH4/m-3, 0.013 kg CO2/m-3

## Included activities start
'exit gate' of natural gas production field

## Included activities end
'entry gate' of natural gas national market (i.e., at the BO-BR border)

## Geography
Brazil.

## Time period
Pipeline distance and production are updated to the year of 2018. Gas losses and emissions during seasonal storage are extrapolated from the ‘natural gas, high pressure, import from NO’ dataset for The Netherlands, valid for the year of 2012, available in database version 3.6. Data is assumed to be valid from 2018 to 2021.

## Reference product
- natural gas, high pressure: 1 m3; By-product classification allocatable product; CPC 12020: Natural gas, liquefied or in the gaseous state; HS2017 271121: Petroleum gases and other gaseous hydrocarbons; in gaseous state, natural gas; CAS 8006-14-2
  production volume 8.07128e9 m3
    m3 imported in 2018 from BO to BR according to the statistical yearbook published by the Petroleum, Gas and Biofuels National Agency (ANP, 2019). The share of natural gas sources for the Brazilian market is 14% imported from Bolivia, 14% from Brazilian onshore fields, 57% from Brazilian offshore fields and 7% from LNG imported from several countries.
    Reference:
    [ANP 2019]
    Agência Nacional do Petróleo, Gás Natural e Biocombustíveis (2019). Anuário Estatístico 2019. Available at: www.anp.gov.br/publicacoes/anuario-estatistico/5237-anuario-estatistico-2019. Accessed in 04/06/2020.
  property heating value, gross 40 MJ
    At standard conditions; based on Meili et al. (2022) section 5.2
  property heating value, net 36 MJ
    At standard conditions; based on Meili et al. (2022) section 5.2
  property price 0.16673 EUR2005
    Calculated value based on data from the United Nations Commodity Trade Statistics Database (http://data.un.org/Data.aspx?q=natural+gas&d=ComTrade&f=_l1Code%3a28%3bcmdCode%3a271121; accessed 12 October 2023). UN Comtrade category: 271121 - Natural gas in gaseous state. An average for 2019-2021 was used and adjusted for inflation to the year 2005. The average price of imports and exports into the four main markets (EU, US, JP, and CN) was determined. Density of natural gas of 0.735 kg/m³ for unit conversion was used.
  properties: amount in multioutput activity_m3 0 m3, carbon allocation 0.544635 kg, carbon content 0.741, carbon content, fossil 0.741, carbon content, non-fossil 0, dry mass 0.735 kg, water content 0, water in wet mass 0 kg, wet mass 0.735 kg

## Inputs from technosphere
- natural gas, burned in gas turbine: 0.0612 MJ; source Faist Emmenegger, M. 2007; lognormal variance with pedigree 0.036, pedigree (4,1,4,5,3)
  Data from german industrial expert for 2001, standard technology. Extrapolated from the ‘natural gas, high pressure, import from NO’ dataset for The Netherlands, valid for the year of 2012, available in database version 3.6. The uncertainties were adjusted accordingly.
- natural gas, high pressure: 1.0001 m3; source Faist Emmenegger, M. 2007; lognormal variance with pedigree 0.036, pedigree (4,1,4,5,3)
  Average losses of storage included (0.01%). Extrapolated from the ‘natural gas, high pressure, import from NO’ dataset for The Netherlands, valid for the year of 2012, available in database version 3.6. The uncertainties were adjusted accordingly.
  properties: carbon content, fossil 0.741, dry mass 0.735 kg, heating value, gross 40 MJ, heating value, net 36 MJ, wet mass 0.735 kg
  note on heating value, gross: At standard conditions; based on Meili et al. (2022) section 5.2
- transport, pipeline, onshore, long distance, natural gas: 0.46788 metric ton*km; source Brazilian Ministry of Mines and Energy  2018; lognormal variance with pedigree 0.1208, pedigree (2,1,2,1,1)
  The distance of the GASBOL pipeline (Bolivian section: 557 km), which connects Bolivian production fields to the Brazilian border, is reported in the Monthly Bulletin of the Natural Gas Industry (MME, 2018).
  Density of natural gas: 0.84 kg/m³.
  Reference:
  [MME 2018]
  Ministry of Mines and Energy (2019). Monthly Bulletin of the Natural Gas Industry. December 2018. Edition number 142. Available at: http://www.mme.gov.br/web/guest/secretarias/petroleo-gas-natural-ebiocombustiveis/publicacoes/boletim-mensal-de-acompanhamento-da-industria-de-gas-natural. Accessed in: 10/06/2020.
  .

## Emissions to nature
All rows: source Faist Emmenegger, M. 2007
- Butane [air, non-urban air or from high stacks]: 6e-7 kg; lognormal variance with pedigree 0.1386, pedigree (2,1,4,5,3)
  Calculated based on average losses and norwegian gas composition. Extrapolated from the ‘natural gas, high pressure, import from NO’ dataset for The Netherlands, valid for the year of 2012, available in database version 3.6. The uncertainties were adjusted accordingly.
- Carbon dioxide, fossil [air, non-urban air or from high stacks]: 1.3e-6 kg; lognormal variance with pedigree 0.0186, pedigree (2,1,4,5,3)
  (same comment as for Butane)
- Ethane [air, non-urban air or from high stacks]: 7.4e-6 kg; lognormal variance with pedigree 0.1386, pedigree (2,1,4,5,3)
  (same comment as for Butane)
- Mercury II [air, non-urban air or from high stacks]: 1e-12 kg; lognormal variance with pedigree 0.0586, pedigree (2,1,4,5,3)
  (same comment as for Butane)
- Methane, fossil [air, non-urban air or from high stacks]: 7.19e-5 kg; lognormal variance with pedigree 0.1386, pedigree (2,1,4,5,3)
  (same comment as for Butane)
- NMVOC, non-methane volatile organic compounds [air, non-urban air or from high stacks]: 2e-7 kg; lognormal variance with pedigree 0.148, pedigree (3,5,4,5,3)
  (same comment as for Butane)
- Propane [air, non-urban air or from high stacks]: 1.9e-6 kg; lognormal variance with pedigree 0.1386, pedigree (2,1,4,5,3)
  (same comment as for Butane)

## Sampling procedure
The distance of the GASBOL pipeline, which connects Bolivian production fields to the Brazilian boarder, is reported in the Monthly Bulletin of the Natural Gas Industry (MME, 2018).
Reference:
[MME 2018]
Ministry of Mines and Energy (2019). Monthly Bulletin of the Natural Gas Industry. December 2018. Edition number 142. Available at: http://www.mme.gov.br/web/guest/secretarias/petroleo-gas-natural-ebiocombustiveis/publicacoes/boletim-mensal-de-acompanhamento-da-industria-de-gas-natural. Accessed in: 10/06/2020.

## Extrapolations
Gas losses and emissions during seasonal storage are extrapolated from the ‘natural gas, high pressure, import from NO’ dataset for The Netherlands, valid for the year of 2012, available in database version 3.6. The uncertainties were adjusted accordingly.
