# nuclear waste storage construction, final repository for low level radioactive waste

Dataset: EcoSpold 2, unit process
Geography: RoW
Time period: 1985-01-01 to 2023-12-31
Technology level: current
Classification: EcoSpold01Categories: nuclear power/waste treatment
Classification: ISIC rev.4 ecoinvent: 4290:Construction of other civil engineering projects
Synonyms: Low and intermediate level long-lived radioactive waste; Geological repository
Tags: ConvertedDataset
Scenario: Business-as-Usual
System model: Allocation, cut-off by classification
Generated by: Roberto Dones
Published in: Dones, R. 2007
Database: ecoinvent
isCopyrightProtected: true
accessRestrictedTo: 1

## General comment
This module uses a mix of the previous inventory of an early design of a Swiss LAW repository and extrapolations using as a basis the current preliminary design of a Swiss SF, HLW, and ILW repository. No new design of a Swiss LAW repository has been designed yet. The module refers to the 100000 m3 LAW waste scenario. The early design consisted of a mined cavern system with horizontal access tunnels in an alpine region. After input of the waste, the remaining empty space of the tunnels is backfilled with concrete. To finally seal the repository, the access tunnels will also be refilled using the previously mined rock. Twenty percent of extracted rock is assumed to be disposed of in an inert material depository. The land use and reception building are assumed equal to the repository SF, HLW, and ILW. The use of industrial machines is estimated with the same assumptions as for repository SF, HLW, and ILW, with weight of tracks scaled down by the total lenght of the tunnels (4200 m). The total electricity supplied from the grid for the construction has been assumed equal to the total for the construction of the Swiss SF, HLW, and ILW repository, because the total mined volume is about the same and no information on the hosting rock is available. For completion the energy consumption for the past test drilling has also been included.
[This dataset was already contained in the ecoinvent database version 2. It was not individually updated during the transfer to ecoinvent version 3. Life Cycle Impact Assessment results may still have changed, as they are affected by changes in the supply chain, i.e. in other datasets. This dataset was generated following the ecoinvent quality guidelines for version 2. It may have been subject to central changes described in the ecoinvent version 3 change report (http://www.ecoinvent.org/database/ecoinvent-version-3/reports-of-changes/), and the results of the central updates were reviewed extensively. The changes added e.g. consistent water flows and other information throughout the database. The documentation of this dataset can be found in the ecoinvent reports of version 2, which are still available via the ecoinvent website. The change report linked above covers all central changes that were made during the conversion process.]

## Included activities end
This module includes the material and energy requirements as well as transports for mining and refilling of shafts and tunnels of a repository for intermediate and long-lived low radioactive waste in the Swiss context. Also included is wastewater from mining and disposal of part of the mined rock. Land use of the entrance area and buildings are accounted for.

## Geography
Swiss conditions.

## Technology
Currently available knowledge.

## Parameters
- fraction, process water, to air: 0.15 dimensionless; name fraction_PW_to_air; lognormal variance with pedigree 0.092025, pedigree (4,4,3,2,4)
  Literature value. In case when no industry/process specific data are available, default evaporation fraction value is used. This value is 15% and is based on literature (Statistics Canada, 2007 & Shaffer, K.H., 2008, Consumptive water use in the Great Lakes Basin, USGS & Shiklomanov, 2003, World Water Resources at the Beginning of the 21st Century) and has been approved by an expert.

## Reference product
- nuclear waste storage, final repository for low level radioactive waste: 1 unit; By-product classification allocatable product; CPC 54290: General construction services of other civil engineering works
  EcoSpold01Location=CH
  production volume 3.96633 unit
    This is a placeholder value that does not reflect real-world production volumes. This dataset does not currently require a real-world production volume to work in the database framework, and no actual data were collected yet. This has no negative effect on the results of the ecoinvent database.
  property price 1.03699e8 EUR2005
    The production volume of this product is small compared to other products supplied by the activities within the same ISIC 3 category. Therefore, an average price of products supplied by the activities in the same ISIC 3 code has been applied.This price is obtained as '_66 Machinery and equipment n.e.c., EU27' in the 'EU & DK Input Output Database' (available in SimaPro; 5.71 EUR/ kg DS). Weight is calculated from existing ecoinvent documentation from ecoinvent v.2.2. (From information in the dataset nuclear waste storage construction, final repository for low level radioactive waste; about 18300000 kg) Concrete is excluded from weight calculation.
  properties: carbon allocation 0 kg, carbon content 0

## Inputs from technosphere
- building, multi-storey: 130000 m3; lognormal variance with pedigree 0.162, pedigree (1,1,5,5,1)
  EcoSpold01Location=RER
  own assumption
- concrete, normal strength: 1022.74, 224.59, 146.083, 195.068, 4331.04, 1818.21, 2155.4, 77106.9 m3 (8 suppliers, which the file names only by identifier); sum of these 87000 m3; lognormal variance with pedigree 0.162, pedigree (1,1,5,5,1)
  own assumption
  EcoSpold01Location=CH
  properties: dry mass 2190 kg, water content 0.086758, wet mass 2380 kg
- diesel, burned in building machine: 1.5e7 MJ; lognormal variance with pedigree 0.162, pedigree (1,1,5,5,1)
  own assumption
  EcoSpold01Location=GLO
  properties: heating value, net 1 MJ
- electricity, medium voltage: 2.06429e6, 4.1178e7, 1.38357e7, 632157, 126525, 27167.9, 2.87533e6, 4.25226e6, 8.90863e6 kWh (9 suppliers, which the file names only by identifier); sum of these 7.39e7 kWh; lognormal variance with pedigree 0.162, pedigree (1,1,5,5,1)
  EcoSpold01Location=CH
  own assumption
- industrial machine, heavy, unspecified: 1.6e6 kg; lognormal variance with pedigree 0.082, pedigree (1,1,5,5,1)
  EcoSpold01Location=RER
  own assumption
- inert waste, for final disposal: -3e8 kg; lognormal variance with pedigree 0.122, pedigree (1,1,1,5,1)
  own assumption
  EcoSpold01Location=CH
  production volume
    Calculated from the production volume of nuclear waste storage, final repository for low level radioactive waste in proportion to the respective output amounts.
  properties: dry mass 0.995 kg, water content 0.00502513, wet mass 1 kg
- reinforcing steel: 1.67e7 kg; lognormal variance with pedigree 0.162, pedigree (1,1,5,5,1)
  own assumption
  EcoSpold01Location=RER
  properties: carbon content, fossil 0.004, dry mass 1 kg, wet mass 1 kg
- wastewater, unpolluted: -110000 m3; lognormal variance with pedigree 0.122, pedigree (1,1,1,5,1)
  EcoSpold01Location=CH
  own assumption
  production volume
    (same comment as for inert waste, for final disposal)
  properties: carbon content, fossil 0.00178991, carbon content, non-fossil 0.00178991, dry mass 0.337476 kg, water content 2962.17, wet mass 1000 kg
  note on carbon content, fossil: Assumed to be like in tap water. Bicarbonate content is 2.93 mol/m3. CO2 content is 0.1 mol/m3 (ecoinvent v2.2 report 8, Tab 93.1).

## Inputs from nature
- Occupation, industrial area [natural resource, land]: 910000 m2*year; lognormal variance with pedigree 0.342, pedigree (1,1,5,5,1)
  own assumption, time factor
- Transformation, from industrial area [natural resource, land]: 32500 m2; lognormal variance with pedigree 0.162, pedigree (1,1,5,5,1)
  own assumption
- Transformation, from unspecified [natural resource, land]: 32500 m2; lognormal variance with pedigree 0.162, pedigree (1,1,5,5,1)
  own assumption
- Transformation, to industrial area [natural resource, land]: 32500 m2; lognormal variance with pedigree 0.162, pedigree (1,1,5,5,1)
  own assumption
- Transformation, to unspecified [natural resource, land]: 32500 m2; lognormal variance with pedigree 0.162, pedigree (1,1,5,5,1)
  own assumption
- Water, unspecified natural origin [natural resource, in water]: 129412 m3; name water_UNO_input; lognormal variance with pedigree 0.090625, pedigree (4,4,5,2,4)
  Estimated value. The amount of unspecified water is equal to the amount of wastewater plus losses (water to air).

## Emissions to nature
- Methane, fossil [air, non-urban air or from high stacks]: 1.6e6 kg; lognormal variance with pedigree 0.522, pedigree (1,1,5,5,1)
  own assumption
- Water [air, unspecified]: 19411.8 m3; name water_to_air_unspecified; = water_UNO_input*fraction_PW_to_air; lognormal variance with pedigree 0.130025, pedigree (4,4,5,2,4)
  Calculated value based on literature values and expert opinion. See comments in the parametres' comment field.
  property fraction, origin: fresh water 0; name fraction_origin_fresh_water
  property fraction, origin: salt water 0; name fraction_origin_salt_water
  property fraction, origin: unspecified 1; name fraction_origin_unspecified

## Sampling procedure
Literature

## Extrapolations
none This dataset has been copied from an original dataset covering the geography CH. The uncertainty has been adjusted accordingly.

## Review by Roberto Dones 2004-04-02
Corrected for v1.1
