# treatment of slag from metallurgical grade silicon production, inert material landfill

Dataset: EcoSpold 2, unit process
Geography: CH
Time period: 1995-01-01 to 2023-12-31
Technology level: current
Classification: ISIC rev.4 ecoinvent: 3821:Treatment and disposal of non-hazardous waste
Scenario: Business-as-Usual
System model: Allocation, cut-off by classification
Generated by: Gabor Doka (obsolete)
Published in: Doka G. 2007
Database: ecoinvent
isCopyrightProtected: true
accessRestrictedTo: 1

## General comment
This dataset represents the activity of waste disposal of 'slag from metallurgical grade silicon production' in an inert material landfill.

## Included activities start
The activity starts with the waste being available at the gate of the treatment facility. Collection and transportation of the waste to the treatment plant is not included.

## Included activities end
The activity ends with the waste being treated and no direct emissions from inert material landfill (leachate) are inventoried, as they are considered negligible. The dataset contains only exchanges to process-specific burdens (energy, land use) and infrastructure.

## Geography
Modelling parameters affecting the treatment technology are specific to this geography and to the technology mix encountered in Switzerland in 2000.

## Technology
Inert material landfill with leachate collection system and renaturation after closure. 50% of the sites is equipped with a base seal.

## Reference product
- slag from metallurgical grade silicon production: -1 kg; By-product classification Waste; CPC 39310: Slag, dross, scalings and other waste from the manufacture of iron or steel; HS2017 261900: Slag, dross; (other than granulated slag), scalings and other waste from the manufacture of iron or steel
  production volume 481260 kg
    Estimated based on the total amount of this waste being generated in the database and scaled based on the GDP of Switzerland
  property heating value, net 2.72 MJ
    LHV is calculated based on the Carbon content of the product. More details can be found on the respective documentation.
  property price 0 EUR2005
    Waste products are assigned a price of zero as they are assumed to require further treatment.
  properties: carbon allocation 0.0898657 kg, carbon content 0.0898657, carbon content, fossil 0.0898657, carbon content, non-fossil 0, dry mass 1 kg, water content 0, water in wet mass 0 kg, wet mass 1 kg

## Inputs from technosphere
- inert material landfill: 1.48e-9 unit; lognormal variance with pedigree 0.04, pedigree (1,1,5,1,1)
  landfill infrastructure per kg waste, uncerteinty heeded in module. This exchange has an activity link directly to the producing activity because the product is primarily consumed in the same geographical area where it is produced.
- process-specific burdens, inert material landfill: 1 kg; lognormal variance with pedigree 0.04, pedigree (1,1,5,1,1)
  process-specific burdens per kg waste, uncerteinty heeded in module.;activityLink introduced to establish a direct link to the corresponding regional supply of this product

## Review by Niels Jungbluth 2003-05-28
Passed.
