# glass wool mat production

Dataset: EcoSpold 2, unit process
Geography: CA-QC
Time period: 1993-01-01 to 2023-12-31
Technology level: current
Classification: ISIC rev.4 ecoinvent: 2399:Manufacture of other non-metallic mineral products n.e.c.
Classification: EcoSpold01Categories: insulation materials/production
Tags: recontextualization
Scenario: Business-as-Usual
System model: Allocation, cut-off by classification
Generated by: Pascal Lesage
Published in: Kellenberger D. 2004
Database: ecoinvent
isCopyrightProtected: true
accessRestrictedTo: 1

## General comment
This module can be used for all different kind of glass wool mats. The density of the glass wool mat used as basis for the study is 40 kg/m3.
The original dataset from ecoinvent v2 has been ammended with CO2 and NOx emissions.
Child dataset exchanges identical to GLO dataset. Created to enable linking to regional markets (e.g. for electricity). Data quality indicators adjusted accordingly.

## Included activities start
Included processes: melting, fibre forming & collecting, hardening & curing and internal processes (workshop, etc.). Additionally, energy carrier for furnace, packing and infrastructure are included.

## Included activities end
The activity ends with the product being ready to be shipped.

## Geography
Data are only from one company in Switzerland (Isover SA).
Child dataset exchanges identical to GLO dataset. Created to enable linking to regional markets (e.g. for electricity). Data quality indicators adjusted accordingly.

## Technology
The company worked on a very high technical level but the data refer to the situation before 1995. The energy for the melting process is mainly electricity and from natural gas. The amount of waste glass used as raw material is about 65%.

## Parameters
- Quebec gross domestic product 2011: 3.11e11 USD(2011); name quebecGDP2011; lognormal variance with pedigree 0.0006, pedigree (1,1,1,1,1)
  Quebec Gross domestic product for 2011, expressed in 2011 USD. Source: Institut de la statistique du Québec. Converted from CAD to USD using a yearly average exchange rate of 0.989 CAD/USD (Source: bank of Canada).
- world gross domestic product 2011: 7e13 USD(2011); name worldGDP2011; lognormal variance with pedigree 0.0006, pedigree (1,1,1,1,1)
  World Gross domestic product for 2011, expressed in 2011 USD. Source: World Bank.

## Reference product
- glass wool mat: 1 kg; name RP_amount_1; By-product classification allocatable product; CPC 37116: Glass mirrors; multiple walled insulating units of glass; HS2017 701911: Glass fibres; (including glass wool), chopped strands, of a length of not more than 50mm
  production volume 3.4521e7 kg; name PV_glass
    Gross approximation of Quebec production volume using relative value of Quebec GDP to world GDP
  property carbon content, fossil 0.0107327
    A share of 16 w-% for the binders is taken into account. The binder used in this study is a mixture of phenol, formaldehyde and urea resins (ecoinvent v2.2 report 16_part XIV), and the C content was calculated as a weigthed average of phenol, formaldehyde and urea C content.
  property heating value, net 0 MJ
    Non combustible products are assumed to have an LHV equal to zero (0).
  properties: carbon allocation 0.0107327 kg, carbon content 0.0107327, carbon content, non-fossil 0, dry mass 1 kg, price 1.77 EUR2005, water content 0, water in wet mass 0 kg, wet mass 1 kg

## Inputs from technosphere
- acrylic dispersion, with water, in 58% solution state: 5.7e-6 kg; lognormal variance with pedigree 0.0546, pedigree (2,4,5,5,1)
  properties: carbon content, fossil 0.342442, dry mass 0.59 kg, heating value, net 16.66 MJ, water content 0.70041, wet mass 1 kg
  note on carbon content, fossil: The carbon content was calculated from the carbon content of the inputs.
- acrylic varnish, with water, in 53% solution state: 0.0035 kg; lognormal variance with pedigree 0.0546, pedigree (2,4,5,5,1)
  properties: carbon content, fossil 0.2066, dry mass 0.53 kg, heating value, net 20.44 MJ, water content 0.883983, wet mass 1 kg
- ammonia, anhydrous, liquid: 0.00247 kg; lognormal variance with pedigree 0.0546, pedigree (2,4,5,5,1)
  properties: dry mass 1 kg, wet mass 1 kg
- ammonium sulfate: 0.000803 kg; lognormal variance with pedigree 0.0546, pedigree (2,4,5,5,1)
  properties: dry mass 1 kg, wet mass 1 kg
- average incineration residue: -0.0139 kg; name BP_amount_1; lognormal variance with pedigree 0.652, pedigree (1,1,1,5,1)
  estimated
  production volume
    (same comment as for glass wool mat)
  properties: carbon content, fossil 0.0325466, carbon content, non-fossil 0.0511208, dry mass 1 kg, wet mass 1 kg
  note on carbon content, fossil: Tab A.1, ecoinvent v2.2 report 13_I. It is considered that 61.1% of the C has a biogenic origin
- calcium nitrate: 0.00337265 kg; name Ca_nitrate; = (0.000576*(164+72)/28)*0.694696577; lognormal variance with pedigree 0.0546, pedigree (2,4,5,5,1)
  The exchange has been updated from "calcium nitrate" into "calcium nitrate" and therefore its amount has been scaled (multiplied) from 0.0049 kg by 0.6947 kg of "calcium nitrate" per kg of "calcium nitrate". Original comment of the exchange is: calculated from the original input measured as N (molar masses N2
  properties: dry mass 1 kg, wet mass 1 kg
- chemical, organic: 5.74e-5 kg; lognormal variance with pedigree 0.0546, pedigree (2,4,5,5,1)
  properties: carbon content, fossil 0.628, dry mass 1 kg, heating value, net 19.03 MJ, wet mass 1 kg
  note on carbon content, fossil: This dataset is an unweighted average of 20 organic substances (listed in Tab 88.1, ecoinvent v2.2 report 8, part II), being part of the top100 chemicals included in this database. The C-content has also been calculated as an unweighted average of the C content of the substances composing this dataset.
- corrugated board box: 0.0114 kg; lognormal variance with pedigree 0.0546, pedigree (2,4,5,5,1)
  properties: carbon content, fossil 0.000656085, carbon content, non-fossil 0.432275, dry mass 0.945 kg, heating value, net 12.86 MJ, water content 0.0582011, wet mass 1 kg
  note on carbon content, fossil: Fossil C content was calculated after fossil C contents of chemicals used in the production of board (Tab 10-15 & 10.16 ecoinvent v2.2 report 11_III, part 10)
  note on carbon content, non-fossil: Biogenic C content was calculated after biogenic C contents of chemicals used in the production of board (Tab 10.15 & 10.16, ecoinvent v2.2 report 11_III, part 10).
- diesel, burned in building machine: 0.054 MJ; lognormal variance with pedigree 0.0546, pedigree (2,4,5,5,1)
  properties: heating value, net 1 MJ
- dolomite: 0.00293 kg; lognormal variance with pedigree 0.0546, pedigree (2,4,5,5,1)
  properties: carbon content, fossil 0.130435, dry mass 1 kg, heating value, net 3.95 MJ, wet mass 1 kg
- electricity, medium voltage: 2.32 kWh; lognormal variance with pedigree 0.0546, pedigree (2,4,5,5,1)
- feldspar: 0.136 kg; lognormal variance with pedigree 0.0546, pedigree (2,4,5,5,1)
  properties: dry mass 1 kg, wet mass 1 kg
- fluorspar, 97% purity: 0.022 kg; lognormal variance with pedigree 0.0546, pedigree (2,4,5,5,1)
  properties: dry mass 1 kg, wet mass 1 kg
- formaldehyde: 0.0921 kg; lognormal variance with pedigree 0.0546, pedigree (2,4,5,5,1)
  properties: carbon content, fossil 0.4, dry mass 1 kg, heating value, net 20.19 MJ, wet mass 1 kg
- glass cullet, sorted: 0.797 kg
  properties: dry mass 1 kg, wet mass 1 kg
- heat, district or industrial, natural gas: 6.597 MJ; lognormal variance with pedigree 0.0546, pedigree (2,4,5,5,1)
  properties: heating value, net 1 MJ
- lime, packed: 0.00964 kg; name lime; lognormal variance with pedigree 0.0546, pedigree (2,4,5,5,1)
  properties: carbon content, fossil 0.117492, dry mass 0.998 kg, water content 0.00200401, wet mass 1 kg
  note on carbon content, fossil: Table 3.1, ecoinvent v2.2 report 7, part VII, pg 3. MW CaCO3=100, MW MgCO3=84
- lubricating oil: 0.0111 kg; lognormal variance with pedigree 0.0546, pedigree (2,4,5,5,1)
  properties: carbon content, fossil 0.75, dry mass 1 kg, heating value, net 40.2 MJ, wet mass 1 kg
  note on carbon content, fossil: Lubricating oil is produced from diesel. C-content/dry mass of fats and oils considered 75%, from: ecoinvent v2.2 report, n 15a, pg 40
  note on heating value, net: Literature value, Source: IPCC 2006, 2006 IPCC Guidelines for National Greenhouse Gas Inventories, Prepared by the National Greenhouse Gas Inventories Programme, Eggleston H.S., Buendia L., Miwa K., Ngara T. and Tanabe K. (eds). Published: IGES, Japan
- manganese: 0.00262 kg; lognormal variance with pedigree 0.0546, pedigree (2,4,5,5,1)
  properties: dry mass 1 kg, wet mass 1 kg
- molybdenum: 1.25e-5 kg; lognormal variance with pedigree 0.0546, pedigree (2,4,5,5,1)
  properties: dry mass 1 kg, wet mass 1 kg
- municipal solid waste: -0.00849 kg; name BP_amount_3; lognormal variance with pedigree 0.0148, pedigree (2,4,2,5,1)
  production volume
    (same comment as for glass wool mat)
  properties: carbon content, fossil 0.171549, carbon content, non-fossil 0.261655, dry mass 0.771 kg, heating value, net 11.74 MJ, water content 0.297017, wet mass 1 kg
  note on carbon content, fossil: MSW composition in tab 4.1, ecoinvent v2.2 report 13_I. C content referred to 1 kg DM
  note on heating value, net: Value taken from the general comment of the treatment dataset.
- municipal waste collection service by 21 metric ton lorry: 0.000783 metric ton*km; lognormal variance with pedigree 0.1746, pedigree (2,4,5,5,1)
- packaging film, low density polyethylene: 0.0132 kg; lognormal variance with pedigree 0.0546, pedigree (2,4,5,5,1)
  properties: carbon content, fossil 0.857143, dry mass 1 kg, heating value, net 42.47 MJ, wet mass 1 kg
  note on carbon content, fossil: Polyethylene is formed out of a huge amount of ethylene monomers (C2H4) (ecoinvent v2.2 report 11_II). MW=28 g/mol
- phenol: 0.0294 kg; lognormal variance with pedigree 0.0546, pedigree (2,4,5,5,1)
  properties: carbon content, fossil 0.765957, dry mass 1 kg, heating value, net 30.93 MJ, wet mass 1 kg
- refractory, fireclay, packed: 0.00229 kg; lognormal variance with pedigree 0.0546, pedigree (2,4,5,5,1)
  properties: dry mass 1 kg, wet mass 1 kg
- rosin size, for paper production: 0.000344 kg; lognormal variance with pedigree 0.0546, pedigree (2,4,5,5,1)
  properties: carbon content, non-fossil 0.515474, dry mass 1 kg, heating value, net 15.62 MJ, wet mass 1 kg
  note on carbon content, non-fossil: Mixture of rosin size (approximated by soap) (75%) and alkali (shown as sodium hydroxide) (25%). (ecoinvent v2.2 report 11-III, pg 299).
- silica sand: 0.11 kg; lognormal variance with pedigree 0.0546, pedigree (2,4,5,5,1)
  properties: dry mass 0.99 kg, water content 0.010101, wet mass 1 kg
- silicone product: 0.0297 kg; lognormal variance with pedigree 0.0546, pedigree (2,4,5,5,1)
  properties: carbon content, fossil 0.324324, dry mass 1 kg, heating value, net 9.83 MJ, wet mass 1 kg
  note on carbon content, fossil: The term silicones is used for compounds in which silicon atoms are linked via oxygen atoms, each silicon atom bearing one or several organic groups. In industrially important silicones, these groups are usually methyl or phenyl (ecoinvent v2.2 report 8_part71 & Ullmann). The chemical formula was considered to be [Si(CH3)2O]n (Ullmann).
- soda ash, light: 0.0836 kg; name soda; lognormal variance with pedigree 0.0546, pedigree (2,4,5,5,1)
  properties: carbon content, fossil 0.0517241, dry mass 1 kg, heating value, net 3.43 MJ, wet mass 1 kg
- sodium borates: 0.0576 kg; lognormal variance with pedigree 0.0546, pedigree (2,4,5,5,1)
  properties: dry mass 1 kg, wet mass 1 kg
- sodium hydroxide, without water, in 50% solution state: 0.0035 kg; lognormal variance with pedigree 0.0546, pedigree (2,4,5,5,1)
  properties: dry mass 1 kg, heating value, net 3.03 MJ, wet mass 1 kg
- solvent, organic: 1.15e-5 kg; lognormal variance with pedigree 0.0546, pedigree (2,4,5,5,1)
  properties: carbon content, fossil 0.63072, dry mass 1 kg, heating value, net 19.11 MJ, wet mass 1 kg
  note on carbon content, fossil: Mixture of 15 of the most often used solvents (list in ecoinvent v2.2 report 11-III, pg 293). C content was calculated as an unweighted average of C content of the different solvents
- stone wool factory: 4.43e-10 unit; lognormal variance with pedigree 0.3546, pedigree (2,4,5,5,1)
- sulfuric acid: 0.00206 kg; lognormal variance with pedigree 0.0546, pedigree (2,4,5,5,1)
  properties: dry mass 1 kg, wet mass 1 kg
- tap water: 5.74 kg; lognormal variance with pedigree 0.0546, pedigree (2,4,5,5,1)
  properties: carbon content, fossil 0.00178991, dry mass 0.000337476 kg, water content 2962.17, wet mass 1 kg
  note on carbon content, fossil: Bicarbonate content is 2.93 mol/m3. CO2 content is 0.1 mol/m3 (ecoinvent v2.2 report 8, Tab 93.1).
- urea: 0.0827506 kg; lognormal variance with pedigree 0.0546, pedigree (2,4,5,5,1)
  The exchange has been updated from "urea, as N" into "urea" and therefore its amount has been scaled (multiplied) from 0.0386 kg by 2.1438 kg of "urea" per kg of "urea, as N".
  properties: carbon content, fossil 0.2, dry mass 1 kg, wet mass 1 kg
- waste mineral oil: -0.00281 kg; name BP_amount_6; lognormal variance with pedigree 0.652, pedigree (1,1,1,5,1)
  estimated
  production volume
    (same comment as for glass wool mat)
  properties: carbon content, fossil 0.864444, dry mass 0.9 kg, heating value, net 34.7 MJ, water content 0.111111, wet mass 1 kg
  note on carbon content, fossil: Tab A.6, ecoinvent v2.2 report 13_I. C content has been calculated after data in the tables, and then referred to 1 kg DM
- waste paperboard: -0.00106 kg; name BP_amount_4; lognormal variance with pedigree 0.0148, pedigree (2,4,2,5,1)
  production volume
    (same comment as for glass wool mat)
  properties: carbon content, non-fossil 0.483259, dry mass 0.804 kg, heating value, net 15.92 MJ, water content 0.243781, wet mass 1 kg
  note on carbon content, non-fossil: C content was calculated for 1 kg DM, using data in Tab A.3, ecoinvent v2.2 report 13_I.
- waste polyethylene: -0.000677 kg; name BP_amount_2; lognormal variance with pedigree 0.0148, pedigree (2,4,2,5,1)
  production volume
    (same comment as for glass wool mat)
  properties: carbon content, fossil 0.825301, dry mass 0.996 kg, heating value, net 42.47 MJ, water content 0.00401606, wet mass 1 kg
  note on carbon content, fossil: C content in 1 kg DM was calculated using data in Tab A.1, ecoinvent v2.2 report 13_I
- wastewater, average: -0.00152 m3; name BP_amount_5; lognormal variance with pedigree 0.0148, pedigree (2,4,2,5,1)
  production volume
    (same comment as for glass wool mat)
  properties: carbon content, non-fossil 0.194039, dry mass 0.346837 kg, water content 2882.2, wet mass 1000 kg
  note on carbon content, non-fossil: 0.0673 kg TOC/m3 (Tab A.17, ecoinvent v2.2 report 13_I). TOC was considered as Total Carbon.

## Emissions to nature
- Ammonia [air, unspecified]: 0.00146 kg; lognormal variance with pedigree 0.164, pedigree (1,4,5,5,1)
- Carbon dioxide, fossil [air, non-urban air or from high stacks]: 0.0401427 kg; = soda*44/106+lime*44/100+dolomite*88/215
  Stoichiometric emission of CO2 (molar mass 44) from soda (Na2CO3; molar mass 106), lime (CaCO3; molar mass 100) and dolomite (CaMg(CO3)2; molar mass 215)
- Fluorine [air, unspecified]: 9e-5 kg; lognormal variance with pedigree 0.164, pedigree (1,4,5,5,1)
- Formaldehyde [air, unspecified]: 0.00046 kg; lognormal variance with pedigree 0.164, pedigree (1,4,5,5,1)
- Nitrogen oxides [air, non-urban air or from high stacks]: 0.00189198 kg; = Ca_nitrate*92/164
  Calculated stoichiometrically
- Phenol [air, unspecified]: 0.00026 kg; lognormal variance with pedigree 0.164, pedigree (1,4,5,5,1)

## Sampling procedure
literature and environmental report

## Extrapolations
see Geography and Technology The original data is for geography CH, which was extrapolated to GLO. This child dataset exchanges identical to GLO dataset. Created to enable linking to regional markets (e.g. for electricity). Data quality indicators adjusted accordingly.
