# batch dyeing, fibre, cotton

Dataset: EcoSpold 2, unit process
Geography: BD
Time period: 2017-01-01 to 2023-12-31
Technology level: current
Classification: ISIC rev.4 ecoinvent: 1313:Finishing of textiles
Scenario: Business-as-Usual
System model: Allocation, cut-off by classification
Generated by: Mireille Faist Emmenegger
Published in: Faist Emmenegger, M. 2018
Database: ecoinvent
isCopyrightProtected: true
accessRestrictedTo: 1

## General comment
Inventory refers to 1 kg batch dyed fibre in Bangladesh in 2017. This dataset covers all relevant input and output flows for dyeing a 550 gsm woven textile to Turquise greenish light. (shade 88-106). Drying is not included.
This process follows the sequence of loading, neutralisation, bio-polish, reactive dying, neutralisation, soaping, and softening of 1 kg fibre. Importantly, bleaching is not part of this dataset. That is covered in a separate dataset as a service. Electricity, greige fibre, dyes, acetic acid, soda ash, sodium sulfate, and other chemicals are considered as the inputs to the activity.
Data were collected from the representative mills in Bangladesh. The mills were chosen to provide data based on their technical representation of the current state of business and their willingness to participate.

## Included activities start
The activity starts with the loading of fibre. However, this is a service dataset. That means that the loaded fibre is not considered as an input of this process.

## Included activities end
This activity delivers the service of dyeing 1 kg fibre. It has to be used with 1kg of bleached fibre. The activity ends with wet fibre.

## Geography
Bangladesh

## Reference product
- batch dyeing, fibre, cotton: 1 kg; name RP_amount_1; By-product classification allocatable product; CPC 97150: Dyeing and colouring services
  production volume 1.47344e9 kg; name RP_PV_1
    Literature Value. The annual woven and knit fabric dyeing capacity data from Bangladesh Textile Mills Association (BTMA).
  property price 0.729209 EUR2005
    Calculated based on inputs: The price of the product has been calculated as a sum of the values of the material and energy inputs for this product. This value is therefore a rough estimation. It may underestimate the real price since there are additional expenses when producing any product. These expences can include for example labour costs, treatment of waste materials and profit for the producer. Please consider carefully whether this level of data quality is acceptable for your application.
  properties: carbon allocation 0.46 kg, carbon content 0.46, carbon content, fossil 0, carbon content, non-fossil 0.46, dry mass 1 kg, water content 0, water in wet mass 0 kg, wet mass 1 kg

## Inputs from technosphere
- acetic acid, without water, in 98% solution state: 0.0168002 kg; lognormal variance with pedigree 0.0106, pedigree (4,1,3,1,1)
  Industry data.
  properties: carbon content, fossil 0.400016, dry mass 1 kg, heating value, net 14.6 MJ, wet mass 1 kg
  note on heating value, net: Based on literature, page 10, Althaus H.-J., Chudacoff M., Hischier R., Jungbluth N., Osses M. and Primas A. (2007) Life Cycle Inventories of Chemicals. Final report ecoinvent data v2.0 No. 8. EMPA, Swiss Centre for Life Cycle Inventories, Dübendorf, CH, Online-Version under: www.ecoinvent.org.
- building, hall, steel construction: 3.52e-6 m2; lognormal variance with pedigree 0.0106, pedigree (4,1,3,1,1)
  Industry data.
- chemical, inorganic: 0.0589238 kg; lognormal variance with pedigree 0.0106, pedigree (4,1,3,1,1)
  Industry data.
  properties: carbon content, fossil 0.003, dry mass 1 kg, wet mass 1 kg
  note on carbon content, fossil: This dataset is an unweighted average of 20 inorganic substances (listed in Tab 88.1, ecoinvent v2.2 report 8, part II), being part of the top100 chemicals included in this database. The C-content has also been calculated as an unweighted average of the C content of the substances composing this dataset.
- electricity, medium voltage: 0.2574 kWh; lognormal variance with pedigree 0.0106, pedigree (4,1,3,1,1)
  Industry data.
- heat, district or industrial, natural gas: 0.913 MJ; lognormal variance with pedigree 0.0106, pedigree (4,1,3,1,1)
  Industry data.
  properties: heating value, net 1 MJ
- soda ash, light: 0.060201 kg; lognormal variance with pedigree 0.0106, pedigree (4,1,3,1,1)
  Industry data.
  properties: carbon content, fossil 0.0517241, dry mass 1 kg, heating value, net 3.43 MJ, wet mass 1 kg
- sodium sulfate, anhydrite: 0.12 kg; lognormal variance with pedigree 0.0106, pedigree (4,1,3,1,1)
  Industry data.
  properties: dry mass 1 kg, wet mass 1 kg
- wastewater from textile production: -0.07 m3; name wastewater
  (same comment as for batch dyeing, fibre, cotton)
  production volume; = RP_PV_1 * (wastewater / RP_amount_1)
    Calculated from production volume of reference product using the relative outputs.

## Inputs from nature
- Water, well, in ground [natural resource, in water]: 0.07 m3; lognormal variance with pedigree 0.0106, pedigree (4,1,3,1,1)
  Industry data.

## Sampling procedure
Industry data. Representative mills in Bangladesh. The mills were chosen to provide data based on their technical representation of the current state of business and their willingness to participate.
