# forging, steel, large open die

Dataset: EcoSpold 2, unit process
Geography: RoW
Time period: 2011-01-01 to 2023-12-31
Technology level: current
Classification: ISIC rev.4 ecoinvent: 2410:Manufacture of basic iron and steel
Classification: EcoSpold01Categories: metals/processing
Synonyms: Open die forging
Scenario: Business-as-Usual
System model: Allocation, cut-off by classification
Share of production covered: 2 %
Generated by: Marylène Dussault
Database: ecoinvent
isCopyrightProtected: true
accessRestrictedTo: 1

## General comment
This dataset represents the service of forging steel in large open die press cylindrical or block shapes. The forged pieces weigh from 2 to 25 tonnes. It includes heat treatment, machining and final inspection. Production of metal in final piece is excluded. Input and output steel associated with losses are included and are on average 24% final forged piece.This dataset is based on forging and machining activity of an integrated forge working with variety of steel alloys.

## Included activities start
Starts with the delivery of material and energy inputs on site.

## Included activities end
This activity ends with the machined cylindrical or block steel shapes.
The dataset includes: the forging proceses (including heating oven and open die forging (5 kt and 2 kt presses), scarfing, and heat treatment); the machining processes (including cutting, milling and turning); and finally non-destructive testing (NDT). This dataset excludes: hot top and metal residues in canals that are internally recycled and reprensents less that 1% of production materials. It also excludes oily wastewater (approx. 1ml/kg - 5%-95% oil emulsion in water).

## Geography
Dataset is extrapolated from the dataset of the Québec region, as to represent the global production.

## Technology
This dataset is based on the average technique of the Québec region.

## Parameters
- amount of oily wastewater_emulsion: 0.0009522 kg; name oily_ww; lognormal variance with pedigree 0.0166, pedigree (2,4,1,1,3)
  Measured value. Reported as oily wastewater and emulsion. Oil concentration and wastewater density is unknown. Density assumed equal to that of water (1 kg/L).
- mineral oil, amount: 0.0003944 l; name mineral_oil; lognormal variance with pedigree 0.0032, pedigree (2,4,1,1,1)
  Measured value. Reported volume of mineral oil and cutting fluids in liters.
- mineral oil, density: 0.8 kg/l; name dens_mine_oil; lognormal variance with pedigree 0.0032, pedigree (3,1,1,1,2)
  Mineral oil density.
- unit conversion L to m3: 1000 l/m3; name l_m3
  Conversion of volume units, between litres and m3

## Reference product
- forging, steel: 1 kg; name forging; By-product classification allocatable product; CPC 88601: Basic iron and steel manufacturing services
  production volume 3.9524e9 kg; name PV_forging
    Literature value. Based on partial world forging steel production compilation(Jürgen, A. 2012).
  property price 0.270607 EUR2005
    Calculated based on inputs: The price of the product has been calculated as a sum of the values of the material and energy inputs for this product. This value is therefore a rough estimation. It may underestimate the real price since there are additional expenses when producing any product. These expences can include for example labour costs, treatment of waste materials and profit for the producer. Please consider carefully whether this level of data quality is acceptable for your application.
  properties: carbon allocation 0 kg, carbon content 0

## Inputs from technosphere
- average incineration residue: -1.07324e-8, -0.000222989 kg (2 suppliers, which the file names only by identifier); sum of these -0.000223 kg; lognormal variance with pedigree 0.2106, pedigree (5,5,5,5,5)
  Approximated process. . Unknown quantity. Taken directly from ecoinvent v3.0 dataset "hot rolling, steel, GLO 2002".
  EcoSpold01Location=CH
  Uncertainty: No data available, the uncertainty has been maximized.
  production volume; = PV_forging * incinerationResidue
    Calculated from production volume of reference product using the relative outputs.
  properties: carbon content, fossil 1, dry mass 1 kg, wet mass 1 kg
  note on carbon content, fossil: Tab A.1, ecoinvent v2.2 report 13_I. It is considered that 61.1% of the C has a biogenic origin
- diesel, burned in building machine: 0.0144227 MJ; = Lfuel_input*diesel_density*Net_Heat_Value*36.3; lognormal variance with pedigree 0.008, pedigree (1,1,4,1,1)
  Calculated based on reported fuel input (in kg) and Net Heating Value of the fuel.
  Uncertainty: Calculated variable. Uncertainty will be determined from propagation of uncertainty factors of underlying variables. Uncertainty of actual relation between variables not accounted for at this time, although this could be included in a future update.
  property density 0.84 kg/l; name diesel_density
  property fuel input in physical units, L 0.000473 l; name lfuel_input
  property heating value, net 1 MJ; name Net_Heat_Value_1
  note on density: Density value. Value Taken from Table 5.1 of report "Overview and methodology, Data quality guideline for the ecoinvent database version 3" (ecoinvent report No. 1 (v3), 2011)
  note on heating value, net: Net (lower) heating (calorific) value. Value Taken from Table 5.1 of report "Overview and methodology, Data quality guideline for the ecoinvent database version 3" (ecoinvent report No. 1 (v3), 2011)
- electricity, low voltage: 0.0134276, 0.0596584, 0.000599389, 0.00942579, 0.195644, 0.0193111, 0.0443456, 0.00493061, 0.000120285, 0.00333693 kWh (10 suppliers, which the file names only by identifier); sum of these 0.3508 kWh; lognormal variance with pedigree 0.0112, pedigree (2,4,4,1,1)
  Measured value. Usage of electricity low voltage ranging from at 600V and 120V.
- glycerine: 6.72125e-5, 1.18875e-5 kg (2 suppliers, which the file names only by identifier); sum of these 7.91e-5 kg; lognormal variance with pedigree 0.0092, pedigree (2,1,4,1,1)
  Measured value. Used for non-destructive testing.
  properties: carbon content, non-fossil 0.391304, dry mass 1 kg, heating value, net 18 MJ, wet mass 1 kg
  note on heating value, net: Based on literature, Report 17: Jungbluth, N., Chudacoff, M., Dauriat, A., Dinkel, F., Doka, G., Faist Emmenegger, M., Gnansounou, E., Kljun, N., Schleiss, K., Spielmann, M., Stettler, C., Sutter, J. 2007: Life Cycle Inventories of Bioenergy. ecoinvent report No. 17, Swiss Centre for Life Cycle Inventories, Dübendorf, CH.
- hazardous waste, for incineration: -5.2964e-5, -2.54702e-5, -6.65776e-7 kg (3 suppliers, which the file names only by identifier); sum of these -7.91e-5 kg; = glycerine
  Approximated process. . Used to represent the treatment of used glycerine. Assumes no losses.
  production volume; = PV_forging * (waste_glycerine / forging)
    Calculated from production volume of reference product using the relative outputs.
  properties: carbon content, fossil 0.554667, dry mass 0.75 kg, heating value, net 17 MJ, water content 0.333333, wet mass 1 kg
  note on carbon content, fossil: Tab A.6, ecoinvent v2.2 report 13_I. C content has been calculated after data in the tables, and then referred to 1 kg DM
  note on heating value, net: Value taken from the general comment of the treatment dataset.
- heat, district or industrial, natural gas: 2.76675, 7.48554 MJ (2 suppliers, which the file names only by identifier); sum of these 10.2523 MJ; = m3fuel_input*Net_Heat_Value*36.3/fuel_use; lognormal variance with pedigree 0.008, pedigree (1,1,4,1,1)
  Calculated based on reported fuel input (in kg), the Net Heating Value of the fuel and assumed equipment efficiency (1/Fuel_use). The gas is burned in forging furnaces and thermal treatment furnaces whose power and efficiencies are not known,
  EcoSpold01Location=RER
  Uncertainty: Calculated variable. Uncertainty will be determined from propagation of uncertainty factors of underlying variables. Uncertainty of actual relation between variables not accounted for at this time, although this could be included in a future update.
  properties: Corresponding fuel use 1.11 MJ, fuel input in m3 0.3135 m3, heating value, net 1 MJ
  note on Corresponding fuel use: Lower heating value of the fuel input related to the heat/electricity output
  note on fuel input in m3: Measured value. Natural gas input for furnace, boiler, forge and other equipment related to thermal treatments.
  note on heating value, net: net (lower) heating (calorific) value in MJ/m3 from generic data (source: ecoinvent).
- iron scrap, unsorted: -0.180687 kg; name scrap_steel; = steel_loss- (mill_scale* mill_scale_Fe_content); lognormal variance with pedigree 0.0006, pedigree (1,1,1,1,1)
  Calculated value. Represents the remaining of the steel losses once the Fe output as mill scale is removed.
  Uncertainty: Calculated variable. Uncertainty will be determined from propagation of uncertainty factors of underlying variables. Uncertainty of actual relation between variables not accounted for at this time, although this could be included in a future update.
  production volume; = PV_forging / forging * scrap_steel
    Calculated from production volume of reference product using the relative outputs.
  property iron content 0.715; name mill_scale_Fe_content
  properties: dry mass 1 kg, price 0.149 EUR2005, wet mass 1 kg
  note on iron content: Iron content on a dry matter basis of mill scale, taken from http://www.europeanrecycle.com/subpagine.asp?id=91.
- lubricating oil: 0.000285149, 0.00135364 kg (2 suppliers, which the file names only by identifier); sum of these 0.00163879 kg; = dens_hydrOil*hydrOil+dens_mine_oil* mineral_oil; lognormal variance with pedigree 0.008, pedigree (1,1,4,1,1)
  EcoSpold01Location=RER
  Calculated value. Reported in volume as cutting oil and oil for hydraulic press. It also represents mineral oil and cutting fluid.
  Uncertainty: Calculated variable. Uncertainty will be determined from propagation of uncertainty factors of underlying variables. Uncertainty of actual relation between variables not accounted for at this time, although this could be included in a future update.
  properties: carbon content, fossil 0.75, density 0.87 kg/l, dry mass 1 kg, heating value, net 40.2 MJ, hydraulic oil input 0.001521 l, wet mass 1 kg
  note on carbon content, fossil: Lubricating oil is produced from diesel. C-content/dry mass of fats and oils considered 75%, from: ecoinvent v2.2 report, n 15a, pg 40
  note on density: Litterature value. Density for hydraulic oil, but not the same as modeled
  note on heating value, net: Literature value, Source: IPCC 2006, 2006 IPCC Guidelines for National Greenhouse Gas Inventories, Prepared by the National Greenhouse Gas Inventories Programme, Eggleston H.S., Buendia L., Miwa K., Ngara T. and Tanabe K. (eds). Published: IGES, Japan
- municipal solid waste: -2.34389e-12, -1.20362e-13, -1.42924e-14, -9.08101e-14, -6.79081e-11, -1.00013e-14, -3.21024e-15, -7.25602e-15, -3.0207e-13 kg (9 suppliers, which the file names only by identifier); sum of these -7.08e-11 kg; lognormal variance with pedigree 0.2106, pedigree (5,5,5,5,5)
  (same comment as for average incineration residue)
  production volume; = PV_forging / forging * solidWaste
    Calculated from production volume of reference product using the relative outputs.
  properties: carbon content, fossil 0.171549, carbon content, non-fossil 0.261655, dry mass 0.771 kg, heating value, net 11.74 MJ, water content 0.297017, wet mass 1 kg
  note on carbon content, fossil: MSW composition in tab 4.1, ecoinvent v2.2 report 13_I. C content referred to 1 kg DM
- oxygen, liquid: 0.00286362, 0.0104364 kg (2 suppliers, which the file names only by identifier); sum of these 0.0133 kg; lognormal variance with pedigree 0.0112, pedigree (2,4,4,1,1)
  Calculated value. Main use mainly for combustion in decarburising and cutting equipments. Value was calculated from difference between total consumption in facility and oxygen used in the steel alloy production section of the facility.Value was validated with data provider.
  EcoSpold01Location=RER
  properties: dry mass 1 kg, wet mass 1 kg
- propane, burned in building machine: 0.030124 MJ; = Lpropane_input*propane_density*NHV_propane*46.46; lognormal variance with pedigree 0.008, pedigree (1,1,4,1,1)
  Calculated based on reported fuel input (in kg) and Net Heating Value of the fuel. Reported propane use is for cutting and forklift operations.
  Uncertainty: Calculated variable. Uncertainty will be determined from propagation of uncertainty factors of underlying variables. Uncertainty of actual relation between variables not accounted for at this time, although this could be included in a future update.
  property density 0.515 kg/l; name propane_density
  property fuel input in physical units, L 0.001259 l; name Lpropane_input
  property heating value, net 1 MJ; name NHV_propane
  note on density: Litterature value. Propane density at 15°C.Taken from http://www.cfbp.fr/proprietes-des-gpl/caracteristiques-generales-et-physico-chimiques-n305
  note on heating value, net: net (lower) heating (calorific) value in MJ/kg. Taken directly from ecoinvent v3.0 dataset "propane burned in building machine, GLO 2013".
- rolling mill: 1.62e-9 unit; lognormal variance with pedigree 0.51, pedigree (5,5,5,5,5)
  Approximated process. . Taken directly from ecoinvent v3.0 dataset "hot rolling, steel, GLO 2002". Note: production facility is more than 70 years old.
  EcoSpold01Location=RER
  Uncertainty: No data available, the uncertainty has been maximized.
- scrap steel: -0.0600793, -0.0287143, -3.63801e-5 kg (3 suppliers, which the file names only by identifier); sum of these -0.08883 kg; lognormal variance with pedigree 0.0112, pedigree (2,4,1,1,3)
  Approximated process. . Reported as mill scale, which is composed of ferrous oxides. Average mill scale has an iron content ranging from 68% to 75% w/w (from http://www.europeanrecycle.com/subpagine.asp?id=91). Mill scale amount is a measured value.
  production volume; = PV_forging * (mill_scale/ forging)
    Calculated from production volume of reference product using the relative outputs.
  properties: dry mass 1 kg, wet mass 1 kg
- sludge from steel rolling: -0.000348934, -0.00140276 kg (2 suppliers, which the file names only by identifier); sum of these -0.00175169 kg; lognormal variance with pedigree 0.0112, pedigree (2,4,1,1,3)
  EcoSpold01Location=CH
  Approximated process. Reported as forging scaling mud. Measured value.
  production volume; = PV_forging / forging * sludge
    Calculated from production volume of reference product using the relative outputs.
  properties: carbon content, fossil 0.0123943, dry mass 0.8 kg, water content 0.25, wet mass 1 kg
- spent solvent mixture: -5.1726e-7, -2.20783e-5, -5.65045e-5 kg (3 suppliers, which the file names only by identifier); sum of these -7.91e-5 kg; = glycerine
  (same comment as for hazardous waste, for incineration)
  production volume; = PV_forging * (g / forging)
    Calculated from production volume of reference product using the relative outputs.
  properties: carbon content, fossil 0.571257, dry mass 0.835 kg, heating value, net 21.7 MJ, water content 0.197605, wet mass 1 kg
  note on carbon content, fossil: Tab A.7, ecoinvent v2.2 report 13_I. C content has been calculated after data in the tables, and then referred to 1 kg DM
- steel, low-alloyed: 0.2442 kg; name steel_loss; lognormal variance with pedigree 0.0192, pedigree (2,4,4,1,3)
  Calculated value. Losses based on steel ingot input and output of forged steel.
  properties: carbon content, fossil 0.005, dry mass 1 kg, wet mass 1 kg
- waste mineral oil: -2.97582e-6, -0.000314741, -0.000120206 kg (3 suppliers, which the file names only by identifier); sum of these -0.000437923 kg; lognormal variance with pedigree 0.0112, pedigree (4,4,1,1,2)
  Calculated value. Separated oil from sludge. Based on data provider estimate.
  production volume; = PV_forging * (waste_oil / forging)
    Calculated from production volume of reference product using the relative outputs.
  properties: carbon content, fossil 0.864444, dry mass 0.9 kg, heating value, net 34.7 MJ, water content 0.111111, wet mass 1 kg

## Inputs from nature
- Water, river [natural resource, in water]: 0.010469 m3; name waterRiver; lognormal variance with pedigree 0.0192, pedigree (2,4,4,1,3)
  Measured value. Extracted from river for cooling.

## Emissions to nature
- Chloride [water, unspecified]: 0.000198908 kg; lognormal variance with pedigree 0.06, pedigree (3,4,4,1,3)
  Calculated value. Concentration of substance in water is calculated as the sum of direct measurements on equipment and on calculated emissions from published standards (e.g. EPA). Flow value is calculated from concentration and volume of water used for cooling.
- Chromium VI [water, unspecified]: 2.09376e-7 kg; lognormal variance with pedigree 0.06, pedigree (3,4,4,1,3)
  (same comment as for Chloride)
- Water [water, surface water]: 0.010469 m3; = waterRiver; lognormal variance with pedigree 0.008, pedigree (1,1,4,1,1)
  Calculated value. Based on river water input for cooling.
  Uncertainty: Calculated variable. Uncertainty will be determined from propagation of uncertainty factors of underlying variables. Uncertainty of actual relation between variables not accounted for at this time, although this could be included in a future update.

## Sampling procedure
Primary data collected from one large open-die forge in Québec.

## Extrapolations
This dataset is based on primary data from Quebec region and technology and is extrapolate for the world. Uncertainty was change accordingly. Some of the flows in this dataset have been directly copied from the ecoinvent 3.0 dataset "hot rolling, steel, GLO, 2002", the uncertainty has been adjusted accordingly.

## Review by Hans-Jörg Althaus 2014-01-14
ok
