# tetraethyl orthosilicate production

Dataset: EcoSpold 2, unit process
Geography: GLO
Time period: 2013-01-01 to 2023-12-31
Technology level: current
Classification: ISIC rev.4 ecoinvent: 2011:Manufacture of basic chemicals
Synonyms: ethyl silicate
Scenario: Business-as-Usual
System model: Allocation, cut-off by classification
Generated by: Jean-Francois Menard
Database: ecoinvent
isCopyrightProtected: true
accessRestrictedTo: 1

## General comment
This dataset represents the production of tetraethyl orthosilicate by alcoholysis (with ethanol) of silicon tetrachloride.

## Included activities start
Starts with the delivery of material and energy inputs on site.

## Included activities end
This activity ends with the production of tetraethyl orthosilicate. This datasets includes raw materials, energy uses, infrastructure and emissions (direct and after wastewater treatment).

## Technology
Reaction of ethanol with silicon tetrachloride: 4 C2H6O (MW 46,0684) + SiCl4 (MW 169,898) => Si[OC2H5]4 (MW 208,328) + 4 HCl (MW 36,4609)

## Parameters
- carbon atomic weight: 12.011 g/mol; name carbon_mol_weight
  Taken from http://chem.sis.nlm.nih.gov/chemidplus/chemidheavy.jsp
- carbon dioxide molecular weight: 44.009 g/mol; name CO2_mol_weight
  Taken from http://chem.sis.nlm.nih.gov/chemidplus/chemidheavy.jsp
- carbon-to-ethanol molar ratio: 2 dimensionless; name C_to_ethanol
  Based on stoichiometry.
- chemical reaction yield: 0.95 dimensionless; name yield; lognormal variance with pedigree 0.0486, pedigree (5,5,1,1,1)
  Assumption
- direct emission rate from process: 0.002 dimensionless; name emissions; lognormal variance with pedigree 0.0486, pedigree (5,5,1,1,1)
  Assumption on fugitive emissions.
- efficiency: 0.96 dimensionless; name WWT_efficiency; lognormal variance with pedigree 0.0486, pedigree (5,5,1,1,1)
  Wastewater treatment efficiency for ethanol degradation, assumption.
- ethanol-to-tetraethyl orthosilicate chemical reaction molar ratio: 4 dimensionless; name ethanol_to_tetraethyl
  Chemical reaction molar ratio based on stoichiometry
- fraction, cooling water, to air: 0.3875 dimensionless; name cooling_water_air; lognormal variance with pedigree 0.092025, pedigree (4,4,3,2,4)
  "Based on literature values and expert opinion", as cited in ecoinvent v3.0 dataset "ethyl acetate production, GLO, 2006".
- hydrogen chloride chlorine content: 0.97326 dimensionless; name Cl_to_HCl
  Taken from http://chem.sis.nlm.nih.gov/chemidplus/rn/7782-50-5.
- hydrogen chloride hydrogen content: 0.02674 dimensionless; name H_to_HCl; = 1-Cl_to_HCl
  Calculated value.
- hydrogen chloride molecular weight: 36.4609 g/mol; name HCl_mol_weight
  Taken from http://chem.sis.nlm.nih.gov/chemidplus/rn/7647-01-0.
- hydrogen chloride-to-silicon tetrachloride hydrolization reaction molar ratio: 4 dimensionless; name HCl_to_SiCL4
  Hydrolysis chemical reaction molar ratio based on stoichiometry
- hydrogen chloride-to-tetraethyl orthosilicatechemical reaction molar ratio: 4 dimensionless; name HCl_to_tetraethyl
  Chemical reaction molar ratio based on stoichiometry
- oxygen molecular weight: 31.998 g/mol; name oxygen_mol_weight
  Taken from http://chem.sis.nlm.nih.gov/chemidplus/chemidheavy.jsp
- oxygen-to-ethanol chemical reaction molar ratio: 3.5 dimensionless; name O2_to_ethanol
  Complete oxidation chemical reaction molar ratio based on stoichiometry
- silicon tetrachloride-to-tetraethyl orthosilicate chemical reaction molar ratio: 1 dimensionless; name silicon_to_tetraethyl
  Chemical reaction molar ratio based on stoichiometry

## Reference product
- tetraethyl orthosilicate: 1 kg; name RefProd; By-product classification allocatable product; CPC 34270: Cyanides, cyanide oxides and complex cyanides; fulminates, cyanates and thiocyanates; silicates; borates; perb[…]; HS2017 293190: Organo-inorganic compounds; other than tetramethyl lead, tetraethyl lead, tributyltin compounds, and other [...]; CAS 78-10-4
  Formula: SiC8H20O4
  production volume 4 kg
    This is a placeholder value that does not reflect real-world production volumes. This dataset does not currenlty require a real-world production volume to work in the database framework and no actual data were collected yet. This has no negative effect on the results of the ecoinvent database.
  property carbon content, fossil 0.46123; name RefProd_C_content_fossil
    fossil carbon content on a dry matter basis. SiC8H20O4
  property carbon content, non-fossil 0; name RefProd_C_content_non_fossil
    biogene carbon content on a dry matter basis
  property dry mass 1 kg; name RefProd_DM
  property heating value, net 25.61 MJ
    LHV is calculated based on the elemental composition of the substance. Based on the CAS number of the substance (000078-10-4), the chemical formula of the substance is found to be: C8H20O4Si, (PubChem 2020).
    Reference: Kim, S., Chen, J., Cheng, T., Gindulyte, A., He, J., He, S., Li, Q., Shoemaker, B. A., Thiessen, P. A., Yu, B., Zaslavsky, L., Zhang, J., & Bolton, E. E. (2019). PubChem 2019 update: improved access to chemical data. Nucleic acids research, 47(D1), D1102–D1109. https://doi.org/10.1093/nar/gky1033
  property molecular weight 208.328 g/mol; name RefProd_mol_weight
    Taken from http://chem.sis.nlm.nih.gov/chemidplus/rn/78-10-4
  property price 12.4687 EUR2005
    Calculated based on inputs: The price of the product has been calculated as a sum of the values of the material and energy inputs for this product. This value is therefore a rough estimation. It may underestimate the real price since there are additional expenses when producing any product. These expences can include for example labour costs, treatment of waste materials and profit for the producer. Please consider carefully whether this level of data quality is acceptable for your application.
  property water content 0; name RefProd_water_content
  property water in wet mass 0 kg; name RefProd_WWM
  property wet mass 1 kg; name RefProd_WM
  properties: carbon allocation 0.46123 kg, carbon content 0.46123

## Inputs from technosphere
- chemical factory, organics: 4e-10 unit; lognormal variance with pedigree 0.3526, pedigree (2,4,4,5,4)
  Calculated based on literature data published by the industry. For this activity, no information was readily available concerning infrastructure and land-use. Therefore, the infrastructure is estimated based on data from two chemical factories, the BASF site of Ludwigshafen and the chemical factory in Gendorf (which are both located in Germany), which produce a wide range of chemical substances. Based on this data, the following assumptions are made: the built area amounts to about 4.2 ha, the plant has an average output of 50'000 t/a and a lifespan of fifty years. The estimated infrastructure amount is therefore 4.00 E-10 units per kg of produced chemical.
  References:
  Althaus H.-J., Chudacoff M., Hischier R., Jungbluth N., Osses M. and Primas A. (2007) Life Cycle Inventories of Chemicals. ecoinvent report No. 8, v2.0. EMPA Dübendorf, Swiss Centre for Life Cycle Inventories, Dübendorf, CH.
  Gendorf (2000) Umwelterklärung 2000, Werk Gendorf. Werk Gendorf, Burgkirchen.
  Uncertainty: The uncertainty could not be determined, it has then been maximized.
- electricity, medium voltage: 0.399063 kWh; source Hischier R. 2005; lognormal variance with pedigree 0.0532, pedigree (2,4,4,5,4)
  Calculated based on literature data published by the GENDORF Chemical Park. The factory produced an average of 2462760 tonnes of chemical substances (including intermediates) per year in the years 2015-2019. The average consumption of electricity in the years 2015-2019 was 982796751 kWh per year. This equals 0.39906 kWh/kg chemical produced.
  References:
  Chemiepark GENDORF, Umwelterklärung 2016, https://www.gendorf.de/Nachbarn/Umweltschutz/Industrie%20und%20Nachhaltigkeit
  Chemiepark GENDORF, Umwelterklärung 2017, https://www.gendorf.de/Nachbarn/Umweltschutz/Industrie%20und%20Nachhaltigkeit
  Chemiepark GENDORF, Umwelterklärung 2020, https://www.gendorf.de/Nachbarn/Umweltschutz/Industrie%20und%20Nachhaltigkeit
  Uncertainty: Uncertainty has been maximized.
- ethanol, without water, in 99.7% solution state, from ethylene: 0.642532, 0.288559 kg (2 suppliers, which the file names only by identifier); sum of these 0.93109 kg; = (RefProd/RefProd_mol_weight*ethanol_to_tetraethyl*ethanol_mol_weight)/yield; lognormal variance with pedigree 0.008, pedigree (1,1,4,1,1)
  Stoichiometric calculation.
  Uncertainty: Calculated variable. Uncertainty will be determined from propagation of uncertainty factors of underlying variables. Uncertainty of actual relation between variables not accounted for at this time, although this could be included in a future update.
  properties: carbon content, fossil 0.52144, dry mass 1 kg, heating value, net 28.1 MJ, molecular weight 46.0684 g/mol, wet mass 1 kg
  note on heating value, net: Based on literature, page 275, Report 17: Jungbluth, N., Chudacoff, M., Dauriat, A., Dinkel, F., Doka, G., Faist Emmenegger, M., Gnansounou, E., Kljun, N., Schleiss, K., Spielmann, M., Stettler, C., Sutter, J. 2007: Life Cycle Inventories of Bioenergy. ecoinvent report No. 17, Swiss Centre for Life Cycle Inventories, Dübendorf, CH.
- heat, district or industrial, natural gas: 1.88647 MJ; lognormal variance with pedigree 0.0532, pedigree (2,4,4,5,4)
  Calculated based on literature data published by the GENDORF Chemical Park. The factory produced an average of 2462760 tonnes of chemical substances (including intermediates) per year in the years 2015-2019. The average consumption of natural gas in the years 2015-2019 was 4645920000 MJ per year. This equals 1.8865 MJ/kg chemical produced.
  References:
  Chemiepark GENDORF, Umwelterklärung 2016, https://www.gendorf.de/Nachbarn/Umweltschutz/Industrie%20und%20Nachhaltigkeit
  Chemiepark GENDORF, Umwelterklärung 2017, https://www.gendorf.de/Nachbarn/Umweltschutz/Industrie%20und%20Nachhaltigkeit
  Chemiepark GENDORF, Umwelterklärung 2020, https://www.gendorf.de/Nachbarn/Umweltschutz/Industrie%20und%20Nachhaltigkeit
  properties: heating value, net 1 MJ
- heat, from steam, in chemical industry: 0.176662, 0.0311477 MJ (2 suppliers, which the file names only by identifier); sum of these 0.20781 MJ; source Hischier R. 2005; lognormal variance with pedigree 0.0532, pedigree (2,4,4,5,4)
  Calculated based on literature data published by the GENDORF Chemical Park. The factory produced an average of 2462760 tonnes of chemical substances (including intermediates) per year in the years 2015-2019. The average consumption of steam (internal and external sources) in the years 2015-2019 was 511785800 MJ per year. This equals 0.2078 MJ/kg chemical produced.
  References:
  Chemiepark GENDORF, Umwelterklärung 2016, https://www.gendorf.de/Nachbarn/Umweltschutz/Industrie%20und%20Nachhaltigkeit
  Chemiepark GENDORF, Umwelterklärung 2017, https://www.gendorf.de/Nachbarn/Umweltschutz/Industrie%20und%20Nachhaltigkeit
  Chemiepark GENDORF, Umwelterklärung 2020, https://www.gendorf.de/Nachbarn/Umweltschutz/Industrie%20und%20Nachhaltigkeit
  Uncertainty: The uncertainty could not be determined, it has then been maximized.
  properties: heating value, net 1 MJ
- silicon tetrachloride: 0.0325593, 0.825895 kg (2 suppliers, which the file names only by identifier); sum of these 0.858454 kg; = (RefProd/RefProd_mol_weight*silicon_to_tetraethyl*silicon_mol_weight)/yield; lognormal variance with pedigree 0.008, pedigree (1,1,4,1,1)
  (same comment as for ethanol, without water, in 99.7% solution state, from ethylene)
  properties: dry mass 1 kg, molecular weight 169.898 g/mol, wet mass 1 kg
  note on molecular weight: Taken from http://chem.sis.nlm.nih.gov/chemidplus/rn/10026-04-7
- sodium hydroxide, without water, in 50% solution state: 0.00411444, 0.0421352 kg (2 suppliers, which the file names only by identifier); sum of these 0.0462497 kg; = (RefProd/RefProd_mol_weight*HCl_to_tetraethyl*HCl_mol_weight + (silicon*(1-yield-emissions)*(HCl_to_SiCl4*HCl_mol_weight/silicon_mol_weight)))*H_to_HCl*NaOH_to_OH; lognormal variance with pedigree 0.008, pedigree (1,1,4,1,1)
  Stoichiometric calculation. All hydrogen chloride produced from the chemical reaction and all unreacted and unemitted to air silicon tetrachloride are assumed in water where the second readily hydrolyzes to silicon dioxide and hydrogen chloride. All the hydrogen chloride hydrolyzes to hydrogen ions (H+) and chloride (Cl-). The hydrogen ions are then assumed to be neutralyzed with sodium hydroxide prior to emission to surface waters.
  Uncertainty: Calculated variable. Uncertainty will be determined from propagation of uncertainty factors of underlying variables. Uncertainty of actual relation between variables not accounted for at this time, although this could be included in a future update.
  properties: dry mass 1 kg, heating value, net 3.03 MJ, sodium content 0.574795, sodium hydroxide-to-hydroxide mass ratio 2.3518, wet mass 1 kg
  note on sodium hydroxide-to-hydroxide mass ratio: Taken from http://chem.sis.nlm.nih.gov/chemidplus/rn/1310-73-2
- wastewater, average: -1.09589e-8, -1.82361e-6, -4.36062e-7, -6.49273e-9 m3 (4 suppliers, which the file names only by identifier); sum of these -2.27712e-6 m3; lognormal variance with pedigree 0.0452, pedigree (2,4,1,5,4)
  Calculated based on literature data published by the GENDORF Chemical Park. The factory produced an average of 2462760 tonnes of chemical substances (including intermediates) per year in the years 2015-2019. The average ouput of wastewater going to an external wastewater treatment plant in the years 2015-2019 was 5608 m3 per year. This equals 0.000002277 m3/kg chemical produced.
  References:
  Chemiepark GENDORF, Umwelterklärung 2016, https://www.gendorf.de/Nachbarn/Umweltschutz/Industrie%20und%20Nachhaltigkeit
  Chemiepark GENDORF, Umwelterklärung 2017, https://www.gendorf.de/Nachbarn/Umweltschutz/Industrie%20und%20Nachhaltigkeit
  Chemiepark GENDORF, Umwelterklärung 2020, https://www.gendorf.de/Nachbarn/Umweltschutz/Industrie%20und%20Nachhaltigkeit
  properties: carbon content, non-fossil 0.194039, dry mass 0.346837 kg, mass concentration, TOC 0.1091 kg/m3, mass concentration, calcium 0.039453 kg/m3, mass concentration, chlorine 0.030031 kg/m3, mass concentration, hydrogen 0.013365 kg/m3, mass concentration, nitrogen 0.031015 kg/m3, mass concentration, oxygen 0.069824 kg/m3, mass concentration, sodium 0.06456 kg/m3, mass concentration, sulfur 0.015602 kg/m3, water content 2882.2, wet mass 1000 kg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
  note on carbon content, non-fossil: 0.0673 kg TOC/m3 (Tab A.17, ecoinvent v2.2 report 13_I). TOC was considered as Total Carbon.

## Inputs from nature
- Water, cooling, unspecified natural origin [natural resource, in water]: 0.014707 m3; source Gendorf 2000; lognormal variance with pedigree 0.0532, pedigree (2,4,4,5,4)
  Calculated based on literature data published by the GENDORF Chemical Park. The factory produced an average of 2462760 tonnes of chemical substances (including intermediates) per year in the years 2015-2019. The average amount of cooling water released in the years 2015-2019 was 34408800 t per year. It was assumed that 5% of the cooling water was emitted to air during its use, therefore, to calculate the input of cooling water, the output value reported by GENDORF was scaled up by the factor 1/0.95. This equals 0.014707 m3/kg chemical produced.
  References:
  Chemiepark GENDORF, Umwelterklärung 2016, https://www.gendorf.de/Nachbarn/Umweltschutz/Industrie%20und%20Nachhaltigkeit
  Chemiepark GENDORF, Umwelterklärung 2017, https://www.gendorf.de/Nachbarn/Umweltschutz/Industrie%20und%20Nachhaltigkeit
  Chemiepark GENDORF, Umwelterklärung 2020, https://www.gendorf.de/Nachbarn/Umweltschutz/Industrie%20und%20Nachhaltigkeit
  Uncertainty: The uncertainty could not be determined, it has then been maximized.
- Water, river [natural resource, in water]: 0.000965426 m3; lognormal variance with pedigree 0.0532, pedigree (2,4,4,5,4)
  Calculated based on literature data published by the GENDORF Chemical Park. The factory produced an average of 2462760 tonnes of chemical substances (including intermediates) per year in the years 2015-2019. The average consumption of river water in the years 2015-2019 was 22000820 t per year. However, since the cooling water is modelled as an input, the amount of river water was adjusted to avoid double counting. 55% of the input amount of cooling water was deducted from the amount of river water, as that is the share of river water versus well water. This equals 0.00096543 m3/kg chemical produced.
  References:
  Chemiepark GENDORF, Umwelterklärung 2016, https://www.gendorf.de/Nachbarn/Umweltschutz/Industrie%20und%20Nachhaltigkeit
  Chemiepark GENDORF, Umwelterklärung 2017, https://www.gendorf.de/Nachbarn/Umweltschutz/Industrie%20und%20Nachhaltigkeit
  Chemiepark GENDORF, Umwelterklärung 2020, https://www.gendorf.de/Nachbarn/Umweltschutz/Industrie%20und%20Nachhaltigkeit
- Water, well, in ground [natural resource, in water]: 0.000816522 m3; lognormal variance with pedigree 0.0532, pedigree (2,4,4,5,4)
  Calculated based on literature data published by the GENDORF Chemical Park. The factory produced an average of 2462760 tonnes of chemical substances (including intermediates) per year in the years 2015-2019. The average consumption of well water in the years 2015-2019 was 18607480 t per year. However, since the cooling water is modelled as an input, the amount of well water was adjusted to avoid double counting. 45% of the input amount of cooling water was deducted from the amount of well water, as that is the share of well water versus river water. This equals 0.00081652 m3/kg chemical produced.
  References:
  Chemiepark GENDORF, Umwelterklärung 2016, https://www.gendorf.de/Nachbarn/Umweltschutz/Industrie%20und%20Nachhaltigkeit
  Chemiepark GENDORF, Umwelterklärung 2017, https://www.gendorf.de/Nachbarn/Umweltschutz/Industrie%20und%20Nachhaltigkeit
  Chemiepark GENDORF, Umwelterklärung 2020, https://www.gendorf.de/Nachbarn/Umweltschutz/Industrie%20und%20Nachhaltigkeit

## Emissions to nature
- Carbon dioxide, fossil [air, urban air close to ground]: 0.0819734 kg; = ethanol*(1-yield-emissions)*WWT_efficiency*(2*CO2_mol_weight/ethanol_mol_weight); lognormal variance with pedigree 0.008, pedigree (1,1,4,1,1)
  Stoichiometric calculation, after unreacted and unemitted ethanol has been degraded during wastewater treatment.
  Uncertainty: Calculated variable. Uncertainty will be determined from propagation of uncertainty factors of underlying variables. Uncertainty of actual relation between variables not accounted for at this time, although this could be included in a future update.
- Ethanol [air, urban air close to ground]: 0.00186218 kg; = ethanol*emissions; lognormal variance with pedigree 0.008, pedigree (1,1,4,1,1)
  Stoichiometric calculation and assumed direct emission factor due to fugitive emissions.
  Uncertainty: Calculated variable. Uncertainty will be determined from propagation of uncertainty factors of underlying variables. Uncertainty of actual relation between variables not accounted for at this time, although this could be included in a future update.
- Silicon tetrachloride [air, urban air close to ground]: 0.00171691 kg; = silicon*emissions; lognormal variance with pedigree 0.008, pedigree (1,1,4,1,1)
  (same comment as for Ethanol)
- Water [air, unspecified]: 0.00147008 m3; lognormal variance with pedigree 0.0926, pedigree (2,4,4,5,4)
  Calculated based on literature data published by the GENDORF Chemical Park. The factory produced an average of 2462760 tonnes of chemical substances (including intermediates) per year in the years 2015-2019. To determine the emissions of water to air, the difference of all water inputs (from river, well, tap water and cooling) and outputs (wastewater, emissions to water) was calculated. The average ouput of water to air in the years 2015-2019 was 3620444 m3 per year. This equals 0.00147 m3/kg chemical produced. For more information on the other water exchanges please consult the respective exchange comment.
  References:
  Chemiepark GENDORF, Umwelterklärung 2016, https://www.gendorf.de/Nachbarn/Umweltschutz/Industrie%20und%20Nachhaltigkeit
  Chemiepark GENDORF, Umwelterklärung 2017, https://www.gendorf.de/Nachbarn/Umweltschutz/Industrie%20und%20Nachhaltigkeit
  Chemiepark GENDORF, Umwelterklärung 2020, https://www.gendorf.de/Nachbarn/Umweltschutz/Industrie%20und%20Nachhaltigkeit
  Uncertainty: Calculated variable. Uncertainty will be determined from propagation of uncertainty factors of underlying variables. Uncertainty of actual relation between variables not accounted for at this time, although this could be included in a future update.
- BOD5, Biological Oxygen Demand [water, surface water]: 0.00434591 kg; = COD; lognormal variance with pedigree 0.008, pedigree (1,1,4,1,1)
  Calculated from default formula given in Section 5.9.7 of report "Overview and methodology, Data quality guideline for the ecoinvent database version 3" (ecoinvent report No. 1 (v3), 2011), BOD5 (in g O2) = COD (in g O2).
  Uncertainty: Calculated variable. Uncertainty will be determined from propagation of uncertainty factors of underlying variables. Uncertainty of actual relation between variables not accounted for at this time, although this could be included in a future update.
- COD, Chemical Oxygen Demand [water, surface water]: 0.00434591 kg; name COD; = ethanol*(1-yield-emissions)*(1-WWT_efficiency)*(O2_to_ethanol*oxygen_mol_weight/ethanol_mol_weight); lognormal variance with pedigree 0.008, pedigree (1,1,4,1,1)
  Stoichiometric calculation, calculated from emission of ethanol to water.
  Uncertainty: Calculated variable. Uncertainty will be determined from propagation of uncertainty factors of underlying variables. Uncertainty of actual relation between variables not accounted for at this time, although this could be included in a future update.
- Chloride [water, surface water]: 0.715773 kg; = (RefProd/RefProd_mol_weight*HCl_to_tetraethyl*HCl_mol_weight + (silicon*(1-yield-emissions)*(HCl_to_SiCl4*HCl_mol_weight/silicon_mol_weight)))*Cl_to_HCl; lognormal variance with pedigree 0.008, pedigree (1,1,4,1,1)
  Stoichiometric calculation. All hydrogen chloride produced from the chemical reaction and all unreacted and unemitted to air silicon tetrachloride are assumed in water where the second readily hydrolyzes to silicon dioxide and hydrogen chloride. All the hydrogen chloride hydrolyzes to hydrogen ions (H+) and chloride (Cl-).
  Uncertainty: Calculated variable. Uncertainty will be determined from propagation of uncertainty factors of underlying variables. Uncertainty of actual relation between variables not accounted for at this time, although this could be included in a future update.
- DOC, Dissolved Organic Carbon [water, surface water]: 0.000932179 kg; = TOC; lognormal variance with pedigree 0.008, pedigree (1,1,4,1,1)
  Calculated from default formula given in in Section 5.9.7 of report "Overview and methodology, Data quality guideline for the ecoinvent database version 3" (ecoinvent report No. 1 (v3), 2011), DOC = TOC.
  Uncertainty: Calculated variable. Uncertainty will be determined from propagation of uncertainty factors of underlying variables. Uncertainty of actual relation between variables not accounted for at this time, although this could be included in a future update.
- Ethanol [water, surface water]: 0.00178769 kg; = ethanol*(1-yield-emissions)*(1-WWT_efficiency); lognormal variance with pedigree 0.008, pedigree (1,1,4,1,1)
  Stoichiometric calculation, unreacted, unemitted to air and undegraded.
  Uncertainty: Calculated variable. Uncertainty will be determined from propagation of uncertainty factors of underlying variables. Uncertainty of actual relation between variables not accounted for at this time, although this could be included in a future update.
- Silicon dioxide [water, surface water]: 0.0145723 kg; = silicon*(1-yield-emissions)*SiO2_mol_weight/silicon_mol_weight; lognormal variance with pedigree 0.008, pedigree (1,1,4,1,1)
  Stoichiometric calculation, all unreacted and unemitted to air silicon tetrachloride is assumed in water where it readily hydrolyzes to silicon dioxide and hydrogen chloride.
  Uncertainty: Calculated variable. Uncertainty will be determined from propagation of uncertainty factors of underlying variables. Uncertainty of actual relation between variables not accounted for at this time, although this could be included in a future update.
  property molecular weight 60.084 g/mol; name SiO2_mol_weight
- Sodium I [water, surface water]: 0.00127859 kg; = silicon*(1-yield-emissions)*(HCl_to_SiCl4*HCl_mol_weight/silicon_mol_weight)*H_to_HCl*NaOH_to_OH*Na_content; lognormal variance with pedigree 0.008, pedigree (1,1,4,1,1)
  (same comment as for sodium hydroxide, without water, in 50% solution state)
- TOC, Total Organic Carbon [water, surface water]: 0.000932179 kg; name TOC; = ethanol*(1-yield-emissions)*(1-WWT_efficiency)*(C_to_ethanol*carbon_mol_weight/ethanol_mol_weight); lognormal variance with pedigree 0.008, pedigree (1,1,4,1,1)
  (same comment as for COD, Chemical Oxygen Demand)
- Water [water, unspecified]: 0.0150391 m3; lognormal variance with pedigree 0.0926, pedigree (2,4,4,5,4)
  Calculated based on literature data published by the GENDORF Chemical Park. The factory produced an average of 2462760 tonnes of chemical substances (including intermediates) per year in the years 2015-2019. The amount of water released back to the environment consists of the sum of the amount of process water treated in the internal WWTP that is then released back to the environment and the amount of cooling water released back to the environment. The average ouput of the internal WWTP in the years 2015-2019 was 2628800 m3 and that of cooling water released back to the environment was 34408800 m3. This gives a yearly average of 37037600 m3 emissions of water to water. This equals 0.01504 m3/kg chemical produced.
  References:
  Chemiepark GENDORF, Umwelterklärung 2016, https://www.gendorf.de/Nachbarn/Umweltschutz/Industrie%20und%20Nachhaltigkeit
  Chemiepark GENDORF, Umwelterklärung 2017, https://www.gendorf.de/Nachbarn/Umweltschutz/Industrie%20und%20Nachhaltigkeit
  Chemiepark GENDORF, Umwelterklärung 2020, https://www.gendorf.de/Nachbarn/Umweltschutz/Industrie%20und%20Nachhaltigkeit
  Uncertainty: Calculated variable. Uncertainty will be determined from propagation of uncertainty factors of underlying variables. Uncertainty of actual relation between variables not accounted for at this time, although this could be included in a future update.

## Sampling procedure
Raw materials are modelled with a stoichiometric calculation and 95% yield assumption. Energy consumptions are modelled with data from literature. The emissions are estimated. Infrastructures are calculated with standard values.

## Extrapolations
Some exchanges and exchange amounts were extrapolated from the ecoinvent v3.0 dataset "ethyl acetate production, GLO, 2006", also an esterification reaction based chemical production dataset.
