# treatment of damaged clay roof tile, glazed, open dump

Dataset: EcoSpold 2, unit process
Geography: EC
Time period: 2022-01-01 to 2023-12-31
Technology level: current
Classification: ISIC rev.4 ecoinvent: 3821:Treatment and disposal of non-hazardous waste
Scenario: Business-as-Usual
System model: Allocation, cut-off by classification
Share of production covered: 1 %
Generated by: Nikolia Stoikou
Database: ecoinvent
isCopyrightProtected: true
accessRestrictedTo: 1

## General comment
This dataset represents the activity of waste disposal of 'damaged clay roof tile, glazed' in an open dump. Recommended use of this dataset: uncontrolled disposal of the waste through dumping. Inventoried waste consists of fraction: glazed clay roof tiles contain clay (98.79%), lead oxide (0.97%) and silica sand (0.24%) . Waste composition (wet, in ppmw): H2O na; O 497460; H na; C 1880.2; S 0.22404; N na; P na; B na; Cl na; Br na; F na; I na; Ag na; As na; Ba 0.12042; Cd na; Co na; Cr 0.87338; Cu na; Hg na; Mn na; Mo na; Ni na; Pb 8980.4; Sb na; Se na; Sn na; V na; Zn 0.077078; Be na; Sc na; Sr na; Ti 1.2793; Tl na; W na; Si 349710; Fe 38387; Ca 6063.7; Al 73527; K 12596; Mg 7917.8; Na 3468. Share of carbon in initial waste that is biogenic 0%. Share of metals in waste not oxidised and bulk-recyclable (exclude very small or thin parts) Iron: 0%; Alu: 0%; Copper: 0%. Overall degradability of waste during 100 years: 0%. 0.3481 kg waste mass remains in the landfill even after the long term period.
Reference for elemental composition of waste:
ÇÖĞÜRCÜ, M.T. and Mehmet, U.Z.U.N., 2021. The Taguchi optimization of mechanical and durability properties of accelerator added concrete. Politeknik Dergisi, pp.1-1.
ŠVEDA, M. and SOKOLÁŘ, R., 2013. The effect of firing temperature on the irreversible expansion, water absorption and pore structure of a brick body during freeze-thaw cycles. Materials Science, 19(4), pp.465-470.

## Included activities start
The activity starts with the waste being available at the location (gate) of the uncontrolled disposal. Collection and transportation of the waste to the treatment plant is not included.

## Included activities end
The activity ends with the waste being disposed, in an uncontrolled manner and waste-specific emissions from open dump are released to air via gas and to water via leachate.

## Geography
This dataset represents an open dump location with mean annual temperature (MAT) of 21.39 degC, mean annual precipitation (MAP) of 2274 mm/year, and net infiltration of 1287 mm/year. This infiltration was soft capped from a value of 1338.3 mm/year. The implied surface runoff of water is therefore 51.288 mm/year. The leachate percolating through the landfill has an average residence time of 1.36 years.
Reference for climatic parameters:
World Bank, 2022. Average precipitation in depth (mm per year), World Bank Group Available at: https://data.worldbank.org/indicator/AG.LND.PRCP.MM?end=2019&start=2019
World Bank, 2021. Observed Climatology of Mean-Temperature 1991-2020 Ecuador, Climate Change Knowledge Portal for Development Practisioners and Policy Makers, The World Bank Group Available at: https://climateknowledgeportal.worldbank.org/country/ecuador/climate-data-historical
undata, 2020. Actual evapotranspiration, United Nations Statistics Division Available at: http://data.un.org/Data.aspx?d=ENV&f=variableID%3a7
World Bank, 2022. Surface area (sq.km), World Bank Group Available at: https://data.worldbank.org/indicator/AG.SRF.TOTL.K2)

## Technology
This is an inventory for an open, uncontrolled waste dump for municipal solid waste. Ultimate average landfill height is 7 meters. Operation phase duration is 15 years. Percentage of landfill gas directly emitted is 100w%. A Methane Correction Factor (MCF) for landfill air emissions of 0.7057 is employed. Leachate of the landfill is not treated, but emitted untreated. Based on average waste composition and chosen climate data the end of carbonate phase is estimated to be reached 691 years after waste deposition.

## Reference product
- damaged clay roof tile, glazed: -1 kg; By-product classification Waste; CPC 39: Wastes or scraps
  main reference product of this activity
  production volume 545000 kg
    Estimated based on the total amount of this waste being generated in the database for the geography of Ecuador.
  property price 0 EUR2005
    Waste products are assigned a price of zero as they are assumed to require further treatment.
  properties: aluminium content 0.073527, barium content 1.20422e-7, calcium content 0.0060637, carbon allocation 0.00188025 kg, carbon content 0.00188025, carbon content, fossil 0.00188025, carbon content, non-fossil 0, chromium content 8.73377e-7, dry mass 1 kg, heating value, gross 0 MJ, heating value, net 0 MJ, iron content 0.038387, lead content 0.00898039, magnesium content 0.00791783, oxygen content 0.497463, potassium content 0.0125962, silicon content 0.349714, sodium content 0.00346803, sulfur content 2.24037e-7, titanium content 1.27932e-6, water content 0, water in wet mass 0 kg, wet mass 1 kg, zinc content 7.70777e-8

## Inputs from nature
- Organic carbon, placed in landfill [inventory indicator, waste]: 0.0018802 kg; lognormal variance with pedigree 0.576, pedigree (1,1,2,1,1)
  organic carbon placed in open dump (for ecoscarcity LCIA only);
- Waste mass, total, placed in landfill [inventory indicator, waste]: 1 kg; lognormal variance with pedigree 0.0002, pedigree (1,1,2,1,1)
  waste mass placed in open dump (for ecoscarcity LCIA only);
- Occupation, dump site [natural resource, land]: 0.0035714 m2*year; lognormal variance with pedigree 0.32122, pedigree (1,1,2,1,1)
  for operation phase of open dump area;
- Transformation, from pasture, man made [natural resource, land]: 0.00014286 m2; lognormal variance with pedigree 0.32122, pedigree (1,1,2,1,1)
  for initial conversion of open dump;
- Transformation, to dump site [natural resource, land]: 0.00014286 m2; lognormal variance with pedigree 0.32122, pedigree (1,1,2,1,1)
  conversion to open dump area;

## Emissions to nature
- Non-hazardous waste disposed [inventory indicator, waste]: 1 kg; lognormal variance with pedigree 0.0002, pedigree (1,1,2,1,1)
  EN15804 waste mass in sanitary landfill;
- Aluminium III [water, ground-, long-term]: 0.073527 kg; lognormal variance with pedigree 0.14984, pedigree (1,1,2,1,1)
  emissions to groundwater in open dump;
- BOD5, Biological Oxygen Demand [water, ground-, long-term]: 0.00048685 kg; lognormal variance with pedigree 0.576, pedigree (1,1,2,1,1)
  emissions to groundwater in open dump;
- Barium II [water, ground-, long-term]: 1.2042e-7 kg; lognormal variance with pedigree 1.8406, pedigree (1,1,2,1,1)
  emissions to groundwater in open dump;
- COD, Chemical Oxygen Demand [water, ground-, long-term]: 0.0020565 kg; lognormal variance with pedigree 0.576, pedigree (1,1,2,1,1)
  emissions to groundwater in open dump;
- Calcium II [water, ground-, long-term]: 0.0060637 kg; lognormal variance with pedigree 0.42835, pedigree (1,1,2,1,1)
  emissions to groundwater in open dump;
- Chromium VI [water, ground-, long-term]: 8.7034e-10 kg; lognormal variance with pedigree 1.922, pedigree (1,1,2,1,1)
  emissions to groundwater in open dump;
- DOC, Dissolved Organic Carbon [water, ground-, long-term]: 0.0018802 kg; lognormal variance with pedigree 0.576, pedigree (1,1,2,1,1)
  emissions to groundwater in open dump;
- Hydrogen sulfide [water, ground-, long-term]: 1.6319e-8 kg; lognormal variance with pedigree 1.7618, pedigree (1,1,2,1,1)
  emissions to groundwater in open dump;
- Iron ion [water, ground-, long-term]: 0.038387 kg; lognormal variance with pedigree 0.2152, pedigree (1,1,2,1,1)
  emissions to groundwater in open dump;
- Lead II [water, ground-, long-term]: 0.0089804 kg; lognormal variance with pedigree 0.38051, pedigree (1,1,2,1,1)
  emissions to groundwater in open dump;
- Magnesium [water, ground-, long-term]: 0.0079178 kg; lognormal variance with pedigree 0.39574, pedigree (1,1,2,1,1)
  emissions to groundwater in open dump;
- Potassium I [water, ground-, long-term]: 0.012596 kg; lognormal variance with pedigree 0.34019, pedigree (1,1,2,1,1)
  emissions to groundwater in open dump;
- Silicon [water, ground-, long-term]: 0.0016311 kg; lognormal variance with pedigree 1.922, pedigree (1,1,2,1,1)
  emissions to groundwater in open dump;
- Sodium I [water, ground-, long-term]: 0.003468 kg; lognormal variance with pedigree 0.498, pedigree (1,1,2,1,1)
  emissions to groundwater in open dump;
- Sulfate [water, ground-, long-term]: 6.2603e-7 kg; lognormal variance with pedigree 1.7618, pedigree (1,1,2,1,1)
  emissions to groundwater in open dump;
- TOC, Total Organic Carbon [water, ground-, long-term]: 0.0018802 kg; lognormal variance with pedigree 0.576, pedigree (1,1,2,1,1)
  emissions to groundwater in open dump;
- Titanium ion [water, ground-, long-term]: 1.2793e-6 kg; lognormal variance with pedigree 1.5377, pedigree (1,1,2,1,1)
  emissions to groundwater in open dump;
- Zinc II [water, ground-, long-term]: 7.7078e-8 kg; lognormal variance with pedigree 1.922, pedigree (1,1,2,1,1)
  emissions to groundwater in open dump;
