# polyethylene, high density, granulate, recycled to generic market for high density PE granulate

Dataset: EcoSpold 2, unit process
Geography: CH
Time period: 2014-01-01 to 2023-12-31
Technology level: current
Classification: ISIC rev.4 ecoinvent: 2013:Manufacture of plastics and synthetic rubber in primary forms
Scenario: Business-as-Usual
System model: Allocation, cut-off by classification
Generated by: Thomas Kägi
Database: ecoinvent
isCopyrightProtected: true
accessRestrictedTo: 1

## General comment
This is a renaming activity linking recycled polyethylene (PE), high density (HD), granulate to the generic market for HD-PE granulate.
The transport distances are taken for commodity class NTS 08 (Chemicals, chemical products, and man-made fibers; rubber and plastic products; nuclear fuel)
from a model based on statistics on transport of goods in Switzerland (Valsasina, 2016, Default transport data per commodity group for Switzerland, ecoinvent, www.ecoinvent.org).

## Reference product
- polyethylene, high density, granulate: 1 kg; By-product classification allocatable product; CPC 34710: Polymers of ethylene, in primary forms; HS2017 390120: Ethylene polymers; in primary forms, polyethylene having a specific gravity of 0.94 or more; CAS 9002-88-4
  production volume 0.001 kg
    Recycled granulates assumed to represent negligible share of oveall global market for granulate (about 2% closed-loop recycling for plastic packaging material according WRF 2016), hence production volume here set to low arbitrarily amount to link the recycled product to the generic market.
  property carbon content, fossil 0.857143
    Polyethylene is formed out of a huge amount of ethylene monomers (C2H4) (ecoinvent v2.2 report 11_II). MW=28 g/mol
  property price 0.739 EUR2005
    From UN data (http://data.un.org/Data.aspx?q=polyethylene&d=ComTrade&f=_l1Code%3a40%3bcmdCode%3a390120); Polyethylene HDPE has gravity >0.94 from http://www.dynalabcorp.com/technical_info_hd_polyethylene.asp.
  properties: carbon allocation 0.857143 kg, carbon content 0.857143, carbon content, non-fossil 0, dry mass 1 kg, heating value, net 42.47 MJ, water content 0, water in wet mass 0 kg, wet mass 1 kg

## Inputs from technosphere
- polyethylene, high density, granulate, recycled: 1 kg
  properties: carbon content, fossil 0.857, dry mass 1 kg, heating value, net 42.47 MJ, wet mass 1 kg
