# photovoltaic laminate production, a-Si

Dataset: EcoSpold 2, unit process
Geography: RoW
Time period: 1997-01-01 to 2023-12-31
Technology level: current
Classification: EcoSpold01Categories: photovoltaic/production of components
Classification: ISIC rev.4 ecoinvent: 2610:Manufacture of electronic components and boards
Synonyms: Solarmodul; amorphous silicon; PV-module
Tags: ConvertedDataset
Scenario: Business-as-Usual
System model: Allocation, cut-off by classification
Share of production covered: 100 %
Generated by: Niels Jungbluth
Published in: Jungbluth, N. 2007
Database: ecoinvent
isCopyrightProtected: true
accessRestrictedTo: 1

## General comment
Production of photovoltaic thin film laminates. Deposition of nine thin-film layers on the triple-junction cell. The laminates ASR128 produced at United Solar have a size of 2.3 m2. The weight is 2.7 kg per m2. The rated nominal power is about 128Wp per laminate. The efficiency is estimated here for newer products with 6.45% at the beginning of the life time. Degradation has to be taken into account with achieved yields.
[This dataset was already contained in the ecoinvent database version 2. It was not individually updated during the transfer to ecoinvent version 3. Life Cycle Impact Assessment results may still have changed, as they are affected by changes in the supply chain, i.e. in other datasets. This dataset was generated following the ecoinvent quality guidelines for version 2. It may have been subject to central changes described in the ecoinvent version 3 change report (http://www.ecoinvent.org/database/ecoinvent-version-3/reports-of-changes/), and the results of the central updates were reviewed extensively. The changes added e.g. consistent water flows and other information throughout the database. The documentation of this dataset can be found in the ecoinvent reports of version 2, which are still available via the ecoinvent website. The change report linked above covers all central changes that were made during the conversion process.]

## Included activities end
Electricity and heat use, materials, transport of materials, disposal of wastes and the product. Data for direct air and water emissions were not available. It can be expected that small amount of NMVOC will be emitted from the lamination process.

## Geography
Data for United Solar in the United States.

## Technology
Production technology of thin film a-Si cells. The modules contain triple junction cells, which are made in a continuous roll-to-roll deposition on stainless steel. The cell is deposited using a vapour-deposition process at low temperatures.

## Time period
Data refer to 2005. Some are extrapolated from older information.

## Parameters
- fraction, process water, to air: 0.15 dimensionless; name fraction_PW_to_air; lognormal variance with pedigree 0.092025, pedigree (4,4,3,2,4)
  Literature value. In case when no industry/process specific data are available, default evaporation fraction value is used. This value is 15% and is based on literature (Statistics Canada, 2007 & Shaffer, K.H., 2008, Consumptive water use in the Great Lakes Basin, USGS & Shiklomanov, 2003, World Water Resources at the Beginning of the 21st Century) and has been approved by an expert.
- fraction, tap water, to air: 0.15 dimensionless; name fraction_TW_to_air; = fraction_PW_to_air; lognormal variance with pedigree 0.092025, pedigree (4,4,3,2,4)
  Calculated value. See comment in the other parametres present in this dataset. Tap water is considered to be always used as process water, thus process water fractions to air are applied to all tap water input flows to calculate the amount of water consumed in the processes.

## Reference product
- photovoltaic laminate, a-Si: 1 m2; By-product classification allocatable product; CPC 47150: Diodes, transistors and similar semi-conductor devices; photosensitive semi-conductor devices; light emitting […]; HS2017 854140: Electrical apparatus; photosensitive, including photovoltaic cells, whether or not assembled in modules or [...]
  EcoSpold01Location=US
  production volume 1.12125e6 m2
    128 W/2.3 m2 (from Tab 9.10, ecoinvent v2 report 6_XII). Total production worldwide of panels is 1500MW in 2005. Tab 12.6 (ecoinvent v2 report 6_XII) gives the share of the different types of photovoltaic cells, that was assumed as the share of the different panels. From information in ecoinvent v2 report 6_XII, laminate were treated as panels.
  property price 279 EUR2005
    Calculated based on literature (EPIA - European Photovoltaic Industry association, Solar Photovoltaics competing in the energy sector On the road to competitiveness, 2011, http://www.epia.org/publications/epiapublications.html). The price of PV laminate is 5 EUR/Wp. The rated nominal power of a laminate which has a size of 2.3m2 is 128Wp. Thus (1/2.3*128=) 55Wp is the power of 1m2. The price of 1m2 of such a laminate is then (55*5=) 278 EUR/m2.
  properties: carbon allocation 0 kg, carbon content 0

## Inputs from technosphere
- aluminium alloy, AlMg3: 0.014311 kg; lognormal variance with pedigree 0.0446, pedigree (3,3,5,5,1)
  Pacca 2006
  EcoSpold01Location=RER
  Uncertainty: Pacca 2006
  properties: dry mass 1 kg, wet mass 1 kg
- brazing solder, cadmium free: 0.0026204 kg; lognormal variance with pedigree 0.0446, pedigree (3,3,5,5,1)
  Solder lead
  EcoSpold01Location=RER
  Uncertainty: Solder lead
  properties: dry mass 1 kg, wet mass 1 kg
- cadmium telluride, semiconductor-grade: 0.00089368 kg; lognormal variance with pedigree 0.064, pedigree (3,4,5,5,3)
  Cadmium stannate (Cd2SnO4), amount less than 0.05%
  EcoSpold01Location=US
  Uncertainty: Cadmium stannate (Cd2SnO4), amount less than 0.05%
  properties: dry mass 1 kg, wet mass 1 kg
- copper, cathode: 0.066842 kg; lognormal variance with pedigree 0.0446, pedigree (3,3,5,5,1)
  EcoSpold01Location=RER
  Busbar and wire
  Uncertainty: Busbar and wire
  properties: dry mass 1 kg, wet mass 1 kg
- electricity, medium voltage: 1.61373, 32.1903, 0.49418, 6.96805, 0.0989095, 0.0212381, 2.24775, 3.32415, 1.26169 kWh (9 suppliers, which the file names only by identifier); sum of these 48.22 kWh; lognormal variance with pedigree 0.0446, pedigree (3,3,5,5,1)
  EcoSpold01Location=US
  Pacca 2006
  Uncertainty: Pacca 2006
- glass fibre reinforced plastic, polyamide, injection moulded: 0.035768 kg; lognormal variance with pedigree 0.0446, pedigree (3,3,5,5,1)
  EcoSpold01Location=RER
  Pacca 2006
  Uncertainty: Pacca 2006
  properties: carbon content, fossil 0.446018, dry mass 1 kg, wet mass 1 kg
  note on carbon content, fossil: Polyamide resin assimilate to Nylon 66 (ecoinvent v2.2 report 7_XIII). Nylon 66 is derived from hexamethylene diamine and adipic acid and has the following structure: -(HN-(CH2)6-NH-CO-(CH2)4-CO)n- (ecoinvent v2.2 report 11_II), C12H22N2O2. MW=226 g/mol. Here Nylon 66 is – mainly for improved stiffness and stability – modified with glass fibres. The glass fibre content in the product is assumed of 30%. (ecoinvent v2.2 report 11_II)
- heat, district or industrial, other than natural gas: 5.59541 MJ; lognormal variance with pedigree 0.0446, pedigree (3,3,5,5,1)
  EcoSpold01Location=RER
  Pacca 2006
  Uncertainty: Pacca 2006
  properties: heating value, net 1 MJ
- hydrogen, gaseous, medium pressure, merchant: 0.0054625, 0.0163875 kg (2 suppliers, which the file names only by identifier); sum of these 0.02185 kg; lognormal variance with pedigree 0.0446, pedigree (3,3,5,5,1)
  Pacca 2006
  EcoSpold01Location=RER
  Uncertainty: Pacca 2006
  properties: dry mass 1 kg, heating value, net 120.21 MJ, wet mass 1 kg
- indium: 0.00089368 kg; lognormal variance with pedigree 0.064, pedigree (3,4,5,5,3)
  Indium tin oxide, amount less than 0.05%
  EcoSpold01Location=RER
  Uncertainty: Indium tin oxide, amount less than 0.05%
  properties: dry mass 1 kg, wet mass 1 kg
- municipal solid waste: -0.000991927, -5.09368e-5, -6.04852e-6, -3.84306e-5, -3.76445e-5, -0.0287385, -4.23252e-6, -1.35856e-6, -3.07073e-6, -0.000127835 kg (10 suppliers, which the file names only by identifier); sum of these -0.03 kg; lognormal variance with pedigree 0.004, pedigree (1,4,1,5,1)
  EcoSpold01Location=CH
  Alsema (personal communication) 2007, production waste
  Uncertainty: Alsema (personal communication) 2007, production waste
  production volume
    Calculated from the production volume of photovoltaic laminate, a-Si in proportion to the respective output amounts.
  properties: carbon content, fossil 0.171549, carbon content, non-fossil 0.261655, dry mass 0.771 kg, heating value, net 11.74 MJ, water content 0.297017, wet mass 1 kg
  note on carbon content, fossil: MSW composition in tab 4.1, ecoinvent v2.2 report 13_I. C content referred to 1 kg DM
  note on heating value, net: Value taken from the general comment of the treatment dataset.
- oxygen, liquid: 0.000104481, 0.000380779 kg (2 suppliers, which the file names only by identifier); sum of these 0.00048526 kg; lognormal variance with pedigree 0.0446, pedigree (3,3,5,5,1)
  Pacca 2006
  EcoSpold01Location=RER
  Uncertainty: Pacca 2006
  properties: dry mass 1 kg, wet mass 1 kg
- packaging film, low density polyethylene: 0.3099 kg; lognormal variance with pedigree 0.0446, pedigree (3,3,5,5,1)
  EcoSpold01Location=RER
  Madico, window film
  Uncertainty: Madico, window film
  properties: carbon content, fossil 0.857143, dry mass 1 kg, heating value, net 42.47 MJ, wet mass 1 kg
  note on carbon content, fossil: Polyethylene is formed out of a huge amount of ethylene monomers (C2H4) (ecoinvent v2.2 report 11_II). MW=28 g/mol
- phosphoric acid, fertiliser grade, without water, in 70% solution state: 2.32391e-6, 7.26701e-5 kg (2 suppliers, which the file names only by identifier); sum of these 7.4994e-5 kg; lognormal variance with pedigree 0.0446, pedigree (3,3,5,5,1)
  Phosphine (H3P)
  EcoSpold01Location=US
  Uncertainty: Phosphine (H3P)
  properties: dry mass 1 kg, wet mass 1 kg
- photovoltaic panel factory: 4e-6 unit; lognormal variance with pedigree 0.344, pedigree (1,4,5,5,1)
  Assumption
  EcoSpold01Location=GLO
  Uncertainty: Assumption
- polyethylene, high density, granulate: 1.0988 kg; lognormal variance with pedigree 0.0446, pedigree (3,3,5,5,1)
  EcoSpold01Location=RER
  Pacca 2006
  Uncertainty: Pacca 2006
  properties: carbon content, fossil 0.857143, dry mass 1 kg, heating value, net 42.47 MJ, wet mass 1 kg
- polyethylene, low density, granulate: 0.018435 kg; lognormal variance with pedigree 0.0446, pedigree (3,3,5,5,1)
  EcoSpold01Location=RER
  Pacca 2006
  Uncertainty: Pacca 2006
  properties: carbon content, fossil 0.857143, dry mass 1 kg, heating value, net 42.47 MJ, wet mass 1 kg
- polyvinylfluoride, film: 0.12306 kg; lognormal variance with pedigree 0.0446, pedigree (3,3,5,5,1)
  EcoSpold01Location=US
  Pacca 2006
  Uncertainty: Pacca 2006
  properties: carbon content, fossil 0.521739, dry mass 1 kg, heating value, net 23.7 MJ, wet mass 1 kg
- silicon tetrahydride: 0.0035777 kg; lognormal variance with pedigree 0.0446, pedigree (3,3,5,5,1)
  Pacca 2006
  EcoSpold01Location=RER
  Uncertainty: Pacca 2006
  properties: dry mass 1 kg, heating value, net 15.09 MJ, wet mass 1 kg
- soft solder, Sn97Cu3: 0.00320846, 0.00649674 kg (2 suppliers, which the file names only by identifier); sum of these 0.0097052 kg; lognormal variance with pedigree 0.0446, pedigree (3,3,5,5,1)
  EcoSpold01Location=RER
  Solder tin
  Uncertainty: Solder tin
  properties: dry mass 1 kg, wet mass 1 kg
- steel, low-alloyed, hot rolled: 0.96357 kg; lognormal variance with pedigree 0.0446, pedigree (3,3,5,5,1)
  Pacca 2006
  Uncertainty: Pacca 2006
  properties: carbon content, fossil 0.005, dry mass 1 kg, wet mass 1 kg
  note on carbon content, fossil: Low alloyed steel composition given in Tab. 3.2 ecoinvent v2.2 report 10_partII. Steel assumed to have a C content of 0.5%
- synthetic rubber: 0.067574 kg; lognormal variance with pedigree 0.0446, pedigree (3,3,5,5,1)
  Duraseal, coating of cables and rubber wire insulation
  EcoSpold01Location=RER
  Uncertainty: Duraseal, coating of cables and rubber wire insulation
  properties: carbon content, fossil 0.871949, dry mass 1 kg, heating value, net 26.42 MJ, wet mass 1 kg
  note on carbon content, fossil: EPDM (Ethylene-propene-diene terpolymer) rubber is a terpolymer of ethylene, propene, and a diene with the residual unsaturated portion of the diene in the side chain (ecoinvent v2.2 report 7-part XX & Ullmann). Chemical formula (deduced from Evidences of Solvent-Induced Miscibility in Polychloroprene-co-Ethylene-Propene Diene Terpolymer Blends, Dubey et al., Journal of Applied Polymer Science, 2009, 111:1884–1891): C20H35
- tap water: 39.672 kg; name tap_water_input; lognormal variance with pedigree 0.0446, pedigree (3,3,5,5,1)
  Pacca 2006
  EcoSpold01Location=RER
  Uncertainty: Pacca 2006
  properties: carbon content, fossil 0.00178991, dry mass 0.000337476 kg, water content 2962.17, wet mass 1 kg
  note on carbon content, fossil: Bicarbonate content is 2.93 mol/m3. CO2 content is 0.1 mol/m3 (ecoinvent v2.2 report 8, Tab 93.1).
- waste plastic, mixture: -9.06232e-5, -0.00374961, -8.60552e-5, -0.338187, -0.00328375, -0.000219408, -3.66107e-5, -1.65934e-5 kg (8 suppliers, which the file names only by identifier); sum of these -0.34567 kg; lognormal variance with pedigree 0.0208, pedigree (4,3,2,5,1)
  Calculation for end of life disposal
  EcoSpold01Location=CH
  Uncertainty: Calculation for end of life disposal
  production volume
    (same comment as for municipal solid waste)
  properties: carbon content, fossil 0.747344, dry mass 0.847 kg, heating value, net 30.79 MJ, water content 0.180638, wet mass 1 kg
  note on carbon content, fossil: C content in 1 kg DM was calculated using data in Tab A.2, ecoinvent v2.2 report 13_I
- waste polyvinylfluoride: -0.121229, -0.00183146 kg (2 suppliers, which the file names only by identifier); sum of these -0.12306 kg; lognormal variance with pedigree 0.0208, pedigree (4,3,2,5,1)
  EcoSpold01Location=CH
  Calculation for end of life disposal
  Uncertainty: Calculation for end of life disposal
  production volume
    (same comment as for municipal solid waste)
  properties: carbon content, fossil 0.571142, dry mass 0.998 kg, heating value, net 27.89 MJ, water content 0.00200401, wet mass 1 kg
- waste rubber, unspecified: -0.0010785, -0.0408045, -0.025691 kg (3 suppliers, which the file names only by identifier); sum of these -0.067574 kg; lognormal variance with pedigree 0.0208, pedigree (4,3,2,5,1)
  (same comment as for waste plastic, mixture)
  production volume
    (same comment as for municipal solid waste)
  properties: carbon content, fossil 0.853, dry mass 1 kg, heating value, net 27.19 MJ, wet mass 1 kg
- wastewater from glass production: -0.000190926, -0.0394811 m3 (2 suppliers, which the file names only by identifier); sum of these -0.039672 m3; lognormal variance with pedigree 0.0208, pedigree (4,3,2,5,1)
  EcoSpold01Location=CH
  Calculation with water use
  Uncertainty: Calculation with water use
  production volume
    (same comment as for municipal solid waste)
  properties: carbon content, fossil 0.0455242, dry mass 1.09356 kg, water content 913.443, wet mass 1000 kg
  note on carbon content, fossil: COD= 0.115 kg/m3 (Tab A.18, ecoinvent v2.2 report 13_I). COD was converted to TOC, using conversion factors in Tab 4.10 (ecoinvent v2.2 report 13_IV). TOC was considered as Total Carbon.
- wire drawing, copper: 0.066842 kg; lognormal variance with pedigree 0.0606, pedigree (4,3,5,5,1)
  EcoSpold01Location=RER
  Assumption
  Uncertainty: Assumption

## Sampling procedure
Literature data based on producer information.

## Extrapolations
Data for disposal derived from own assumptions. This dataset has been copied from an original dataset covering the geography US. The uncertainty has been adjusted accordingly.

## Review by Roberto Dones 2007-08-23
Passed.
none
