# bell pepper production, open field

Dataset: EcoSpold 2, unit process
Geography: RoW
Time period: 2015-01-01 to 2023-12-31
Technology level: current
Classification: ISIC rev.4 ecoinvent: 0128:Growing of spices, aromatic, drug and pharmaceutical crops
Scenario: Business-as-Usual
System model: Allocation, cut-off by classification
Generated by: Franziska Stössel
Database: ecoinvent
isCopyrightProtected: false
accessRestrictedTo: 1

## General comment
This dataset represents the production of 1 kg of fresh bell peppers in an irrigated open field.
The LCA study, from which this LCI has been derived, contains detailed descriptions of the system boundaries and the data sources used (Stoessel et al. 2012). The publication is published and freely available with comprehensive supporting information:
http://pubs.acs.org/doi/pdf/10.1021/es2030577
Franziska Stoessel, Ronnie Juraske, Stephan Pfister, Stefanie Hellweg. (2012) Life Cycle Inventory and Carbon and Water FoodPrint of Fruits and Vegetables: Application to a Swiss Retailer. Environmental Science & Technology 6(46) 3253-3262.
This activity was adapted to include the global average land use change (LUC) emissions according 2nd edition of the Quantis-modified tool developed by Blonk Consultants 'WFLDB-adapted-Blonk 2014 direct-land-use-change-assessment-tool_2015-05-18a.xlsx', tab. 'Country & land use unknown'. The size of the emission depends on (i) the relative crop expansion in all countries of the crop during the last 20 years and (ii) the corresponding, country specific land transformations. The current results are based on the average FAOSTAT data (harvested area) of 2009-2011 and 1989-1991. The weighted average is used which takes into account relative difference in crop expansion into primary forest, secondary forest, grassland, perennial and annual land.
[This dataset is meant to replace the following datasets:]

## Included activities start
This activity starts about four weeks after the harvest of the previous crop. The soil is prepared for cultivation in mid- September and sowing was done about five months after soil preparation. Thereafter the crop is mature for harvesting in about 5 months.

## Included activities end
The activity ends with the harvesting of the mature Capsicum from the Capsicum plant

## Technology
Cultivation of Capsicum follows conventional production standards

## Time period
Soil cultivating date for the main crop: 15-September, 2015; Harvesting date main crop: 16-July, 2016. The soil cultivation, sowing and harvesting dates are taken as the middle date of the week or fortnight told to the data collector by the farmer. Total time from date of sowing to date of harvesting comes to 153 days. The data is collected for one crop cycle. The cycle of one year is considered for entry in ecoeditor.

## Parameters
- fraction, irrigation water to surface water: 0.2 dimensionless; name fraction_IW_to_surface_water; lognormal variance with pedigree 0.0886, pedigree (4,3,1,1,4)
  Literature value (Doll, 2011) cross referenced with expert opinion.
- fraction, irrigation water, to air: 0.586986 dimensionless; name fraction_IW_to_air; lognormal variance with pedigree 0.0409, pedigree (2,2,2,1,1)
  Literature value (Siebert, 2010) (Vionnet, S., Quantis Water Database - Technical Report, 2012).
- fraction, irrigation water, to ground water: 0.8 dimensionless; name fraction_IW_to_ground_water; lognormal variance with pedigree 0.0886, pedigree (4,3,1,1,4)
  Literature value (Doll, 2011) cross referenced with expert opinion.

## Reference product
- bell pepper: 1 kg; source Stoessel, Franziska; 2012; By-product classification allocatable product; CPC 01231: Chillies and peppers, green (Capsicum spp. and Pimenta spp.); HS2017 090411: Spices; pepper (of the genus piper), neither crushed nor ground
  production volume 3.04961e10 kg
    in kg / year (2010) including chillies and peppers for drying and fresh consumption
  property price 0.687623 EUR2005
    Literature value. Price from FAOSTAT data Producer Prices - Annual (retrieved from: http://www.fao.org/faostat/en/#data/PP, accessed 15Feb2018). Data from 2005.
  properties: carbon allocation 0.00262334 kg, carbon content 0.0369484, carbon content, fossil 0, carbon content, non-fossil 0.0369484, dry mass 0.071 kg, water content 13.0845, water in wet mass 0.929 kg, wet mass 1 kg

## Inputs from technosphere
- [thio]carbamate-compound: 0.000110443 kg; lognormal variance with pedigree 0.1346, pedigree (4,4,3,5,5)
  properties: carbon content, fossil 0.626349, dry mass 1 kg, wet mass 1 kg
- application of plant protection product, by field sprayer: 2.87685e-5 ha; lognormal variance with pedigree 0.06, pedigree (4,4,3,5,4)
- benzimidazole-compound: 1.46056e-5 kg; lognormal variance with pedigree 0.06, pedigree (4,4,3,5,4)
  properties: carbon content, fossil 0.529668, dry mass 1 kg, wet mass 1 kg
- borax, anhydrous, powder: 4.36544e-5 kg; lognormal variance with pedigree 0.047, pedigree (4,4,3,5,1)
  properties: dry mass 1 kg, wet mass 1 kg
- chlorothalonil: 1.64313e-5 kg; lognormal variance with pedigree 0.06, pedigree (4,4,3,5,4)
  properties: carbon content, fossil 0.360902, dry mass 1 kg, wet mass 1 kg
- compost: 14.8069 kg; lognormal variance with pedigree 0.0546, pedigree (4,4,3,5,4)
  properties: cadmium content 3.6e-7, carbon content, non-fossil 0.183645, chromium content 2.23e-5, copper content 5.77e-5, dry mass 0.5 kg, lead content 4.9e-5, mercury content 1.2e-7, nickel content 1.63e-5, nitrogen content 0.014, phosphorus content 0.0035, potassium content 0.01, water content 1, wet mass 1 kg, zinc content 0.000184
- cyclic N-compound: 3.49587e-5 kg; lognormal variance with pedigree 0.087, pedigree (4,4,3,5,4)
  properties: carbon content, fossil 0.641962, dry mass 1 kg, wet mass 1 kg
- inorganic nitrogen fertiliser, as N: 3.72021e-7, 8.72972e-5, 1.03555e-5, 0.000111201, 2.54362e-5, 1.07719e-5, 9.92796e-5, 9.32273e-6, 6.54035e-5, 6.69082e-6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 kg (29 suppliers, which the file names only by identifier); sum of these 0.0102864 kg; lognormal variance with pedigree 0.144, pedigree (4,4,3,5,4)
  properties: dry mass 1 kg, wet mass 1 kg
- inorganic phosphorus fertiliser, as P2O5: 0.000136684, 0.000303389, 0.00262482, 8.47087e-5, 2.0803e-5, 2.94582e-5, 7.34938e-5, 9.6531e-6, 4.73111e-5, 1.128e-6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 kg (29 suppliers, which the file names only by identifier); sum of these 0.0178894 kg; source Stoessel, Franziska; 2012; lognormal variance with pedigree 0.144, pedigree (4,4,3,5,4)
  properties: dry mass 1 kg, wet mass 1 kg
- irrigation: 3.54664e-5, 0.00070927, 0.0432815, 0.000546429, 0.00146508, 0.00201387, 0.156132, 0.000319637, 8.22061e-6, 0.0192087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 m3 (16 suppliers, which the file names only by identifier); sum of these 0.239926 m3; source Stoessel, Franziska; 2012; lognormal variance with pedigree 0.0546, pedigree (4,4,3,5,4)
  Switzerland
  properties: dry mass 0.11 kg, water content 9089.91, wet mass 1000 kg
- lime: 0.00820046, 0.000708261 kg (2 suppliers, which the file names only by identifier); sum of these 0.00890872 kg; lognormal variance with pedigree 0.144, pedigree (4,4,3,5,4)
  properties: carbon content, fossil 0.120005, dry mass 1 kg, wet mass 1 kg
- manganese sulfate: 4.57641e-6 kg; lognormal variance with pedigree 0.144, pedigree (4,4,3,5,4)
  properties: dry mass 1 kg, wet mass 1 kg
- naphtha: 3.0195e-8, 3.78181e-7, 1.78281e-5, 1.24613e-7, 3.9801e-6, 7.84285e-7 kg (6 suppliers, which the file names only by identifier); sum of these 2.31255e-5 kg; lognormal variance with pedigree 0.144, pedigree (4,4,3,5,4)
  properties: carbon content, fossil 0.919743, dry mass 1 kg, heating value, net 45 MJ, wet mass 1 kg
- onion seedling, for planting: 0.081142 unit; lognormal variance with pedigree 0.144, pedigree (4,4,3,5,4)
  properties: carbon content, non-fossil 1, dry mass 0.03 kg, wet mass 0.03 kg
- organophosphorus-compound, unspecified: 0.000142707 kg; lognormal variance with pedigree 0.144, pedigree (4,4,3,5,4)
  properties: carbon content, fossil 0.260898, dry mass 1 kg, wet mass 1 kg
- packaging, for fertilisers: 0.177411 kg; lognormal variance with pedigree 0.0532, pedigree (4,3,3,5,4)
  Total amount of active substance/s of fertilisers needed for the production of 'bell pepper' is calculated to be circa 8.87E-02 kg. Fertiliser/s used in this dataset is/are: 'lime', 'nitrogen fertiliser, as N', 'phosphate fertiliser, as P2O5', 'phosphate rock, as P2O5, beneficiated, dry', 'potassium chloride, as K2O', 'potassium sulfate, as K2O', 'urea, as N'. The total amount of active substance/s is doubled in order to account for the packaging of the dilluted product of fertiliser/s that is/are applied. Therefore, 1.77E-01 kg of packaging for fertilisers is justified with this exchange.
  properties: carbon content, fossil 0.825301, dry mass 1 kg, heating value, net 25.01 MJ, price 0.0642 EUR2005, wet mass 1 kg
  note on carbon content, fossil: Considering a chemical formula (C2H4)n for polyethylene, carbon content-fossil is calculated to be 0.856286 kg of Carbon per kg of dry mass.
- packaging, for pesticides: 0.000749991 kg; lognormal variance with pedigree 0.0532, pedigree (4,3,3,5,4)
  Total amount of active substance/s of pesticides needed for the production of bell pepper is calculated to be circa 3.75E-04 kg. Pesticide/s used in this dataset is/are: '[thio]carbamate-compound', 'benzimidazole-compound', 'borax, anhydrous, powder', 'chlorothalonil', 'cyclic N-compound', 'manganese sulfate', 'organophosphorus-compound, unspecified', 'portafer', 'sulfite', 'zinc monosulfate'. The total amount of active substance/s is doubled in order to account for the packaging of the dilluted product of pesticide/s that is/are applied. Therefore, 7.50E-04 kg of packaging for pesticides is justified with this exchange.
  properties: carbon content, fossil 0.85714, dry mass 1 kg, heating value, net 25.97 MJ, price 0.0642 EUR2005, wet mass 1 kg
- phosphate rock, beneficiated: 2.1609e-5, 2.1609e-5, 7.37085e-6, 0.0016277 kg (4 suppliers, which the file names only by identifier); sum of these 0.00167829 kg; lognormal variance with pedigree 0.144, pedigree (4,4,3,5,4)
  The exchange has been updated from 'phosphate rock, as P2O5, beneficiated, dry' into 'phosphate rock, beneficiated' and therefore its amount has been scaled (multiplied) from 0.0005 kg by 3.125 kg of 'phosphate rock, beneficiated' per kg of 'phosphate rock, as P2O5, beneficiated, dry'.
  properties: dry mass 1 kg, wet mass 1 kg
- polyethylene, high density, granulate: 0.00183518 kg; lognormal variance with pedigree 0.144, pedigree (4,4,3,5,4)
  properties: carbon content, fossil 0.857143, dry mass 1 kg, heating value, net 42.47 MJ, wet mass 1 kg
  note on carbon content, fossil: Polyethylene is formed out of a huge amount of ethylene monomers (C2H4) (ecoinvent v2.2 report 11_II). MW=28 g/mol
- portafer: 1.52547e-6 kg; lognormal variance with pedigree 0.144, pedigree (4,4,3,5,4)
  properties: dry mass 1 kg, wet mass 1 kg
- potassium chloride: 2.646e-5, 0.000319055 kg (2 suppliers, which the file names only by identifier); sum of these 0.000345515 kg; lognormal variance with pedigree 0.144, pedigree (4,4,3,5,4)
  The exchange has been updated from 'potassium chloride, as K2O' into 'potassium chloride' and therefore its amount has been scaled (multiplied) from 0.0002 kg by 1.5829 kg of 'potassium chloride' per kg of 'potassium chloride, as K2O'.
  properties: dry mass 1 kg, wet mass 1 kg
- potassium sulfate: 7.3131e-5, 0.000347162 kg (2 suppliers, which the file names only by identifier); sum of these 0.000420293 kg; source Stoessel, Franziska; 2012; lognormal variance with pedigree 0.144, pedigree (4,4,3,5,4)
  The exchange has been updated from 'potassium sulfate, as K2O' into 'potassium sulfate' and therefore its amount has been scaled (multiplied) from 0.0002 kg by 1.85 kg of 'potassium sulfate' per kg of 'potassium sulfate, as K2O'.
  properties: dry mass 1 kg, wet mass 1 kg
- sulfite: 1.67296e-6, 8.26206e-7 kg (2 suppliers, which the file names only by identifier); sum of these 2.49917e-6 kg; lognormal variance with pedigree 0.144, pedigree (4,4,3,5,4)
  properties: dry mass 1 kg, wet mass 1 kg
- tillage, ploughing: 7.90828e-5 ha; lognormal variance with pedigree 0.06, pedigree (4,4,3,5,4)
- tillage, rotary cultivator: 7.50563e-5 ha; lognormal variance with pedigree 0.06, pedigree (4,4,3,5,4)
- urea: 0.050795, 0.00642414, 0.0079638, 0.0433753 kg (4 suppliers, which the file names only by identifier); sum of these 0.108558 kg; lognormal variance with pedigree 0.144, pedigree (4,4,3,5,4)
  The exchange has been updated from 'urea, as N' into 'urea' and therefore its amount has been scaled (multiplied) from 0.0506 kg by 2.1438 kg of 'urea' per kg of 'urea, as N'.
  properties: carbon content, fossil 0.2, dry mass 1 kg, wet mass 1 kg
- zinc monosulfate: 3.02226e-6, 5.72107e-7 kg (2 suppliers, which the file names only by identifier); sum of these 3.59437e-6 kg; lognormal variance with pedigree 0.087, pedigree (4,4,3,5,4)
  properties: dry mass 1 kg, wet mass 1 kg

## Inputs from nature
- Carbon dioxide, in air [natural resource, in air]: 0.320983 kg; lognormal variance with pedigree 0.06, pedigree (4,4,3,5,4)
- Energy, gross calorific value, in biomass [natural resource, biotic]: 3.7104 MJ; lognormal variance with pedigree 0.06, pedigree (4,4,3,5,4)
  Calculated value based on literature. The gross energy is calculated using following formula; gross energy (MJ) = crude protein (kg)*23.04 (MJ/kg)+crude fat (kg)*38.96 (MJ/kg)+crude fibre (kg)*17.95 (MJ/kg)+carbohydrates (kg)*17.17 (MJ/kg) (formula based on expert opinion, cross referenced; Diepenbrock, 2012, Energy Balance in Crop Production). The product composition of fruits and vegetables is extracted from the USDA National Nutrient Database for Standard Reference (http://ndb.nal.usda.gov/, accessed 20131114). Crude protein (g)= 8.6, crude fat (g)= 1.7, crude fibre (g)= 17, ash (g)= 4.3, water (g)= 938.9, carbohydrates (g)= 46.4. The gross energy per kg of DM is 19.24MJ. The calculated gross energy per kg of reference product is thus 1.59MJ.
- Occupation, annual crop, irrigated [natural resource, land]: 1.56369 m2*year; lognormal variance with pedigree 0.144, pedigree (4,4,3,5,4)
- Transformation, from annual crop, irrigated [natural resource, land]: 2.48675 m2; lognormal variance with pedigree 0.062, pedigree (4,4,3,5,4)
- Transformation, to annual crop, irrigated [natural resource, land]: 2.48675 m2; lognormal variance with pedigree 0.062, pedigree (4,4,3,5,4)

## Emissions to nature
- Ammonia [air, non-urban air or from high stacks]: 0.0195954 kg; source Thomas Nemecek 2011; lognormal variance with pedigree 0.0548, pedigree (4,4,3,5,4)
- Carbon dioxide, fossil [air, non-urban air or from high stacks]: 0.0834705 kg; lognormal variance with pedigree 0.0546, pedigree (4,4,3,5,4)
- Dinitrogen monoxide [air, non-urban air or from high stacks]: 0.0033274 kg; source Thomas Nemecek 2011; lognormal variance with pedigree 0.084, pedigree (4,4,3,5,4)
- Nitrogen oxides [air, non-urban air or from high stacks]: 0.010093 kg; source Thomas Nemecek 2011; lognormal variance with pedigree 0.144, pedigree (4,4,3,5,4)
- Water [air, non-urban air or from high stacks]: 0.122362 m3; lognormal variance with pedigree 0.0546, pedigree (4,4,3,5,4)
- Cadmium II [soil, agricultural]: 3.37542e-6 kg; source Thomas Nemecek 2011; lognormal variance with pedigree 0.094, pedigree (4,4,3,5,4)
- Carbendazim [soil, agricultural]: 1.46056e-5 kg; lognormal variance with pedigree 0.087, pedigree (4,4,3,5,4)
- Carbofuran [soil, agricultural]: 0.000110443 kg; lognormal variance with pedigree 0.087, pedigree (4,4,3,5,4)
- Chlorothalonil [soil, agricultural]: 1.64313e-5 kg; lognormal variance with pedigree 0.087, pedigree (4,4,3,5,4)
- Chromium III [soil, agricultural]: 0.000162273 kg; source Thomas Nemecek 2011; lognormal variance with pedigree 0.094, pedigree (4,4,3,5,4)
- Clothianidin [soil, agricultural]: 1.47258e-5 kg; lognormal variance with pedigree 0.087, pedigree (4,4,3,5,4)
- Copper ion [soil, agricultural]: 0.000412682 kg; source Thomas Nemecek 2011; lognormal variance with pedigree 0.094, pedigree (4,4,3,5,4)
- Dichlorvos [soil, agricultural]: 0.000142707 kg; lognormal variance with pedigree 0.087, pedigree (4,4,3,5,4)
- Difenoconazole [soil, agricultural]: 1.8257e-6 kg; lognormal variance with pedigree 0.087, pedigree (4,4,3,5,4)
- Lead II [soil, agricultural]: 0.000351904 kg; source Thomas Nemecek 2011; lognormal variance with pedigree 0.144, pedigree (4,4,3,5,4)
- Mercury II [soil, agricultural]: 8.82722e-7 kg; lognormal variance with pedigree 0.144, pedigree (4,4,3,5,4)
- Mineral oil [soil, agricultural]: 2.31255e-5 kg; lognormal variance with pedigree 0.144, pedigree (4,4,3,5,4)
- Nickel II [soil, agricultural]: 0.00011179 kg; source Thomas Nemecek 2011; lognormal variance with pedigree 0.144, pedigree (4,4,3,5,4)
- Thiamethoxam [soil, agricultural]: 1.84072e-5 kg; lognormal variance with pedigree 0.144, pedigree (4,4,3,5,4)
- Zinc II [soil, agricultural]: 0.00132909 kg; source Thomas Nemecek 2011; lognormal variance with pedigree 0.094, pedigree (4,4,3,5,4)
- Cadmium II [water, ground-]: 7.58878e-9 kg; lognormal variance with pedigree 0.144, pedigree (4,4,3,5,4)
- Cadmium II [water, surface water]: 1.24251e-7 kg; lognormal variance with pedigree 0.144, pedigree (4,4,3,5,4)
- Chromium III [water, ground-]: 3.30431e-6 kg; lognormal variance with pedigree 0.144, pedigree (4,4,3,5,4)
- Chromium III [water, surface water]: 1.12214e-5 kg; lognormal variance with pedigree 0.144, pedigree (4,4,3,5,4)
- Copper ion [water, ground-]: 5.62427e-7 kg; lognormal variance with pedigree 0.144, pedigree (4,4,3,5,4)
- Copper ion [water, surface water]: 1.63302e-5 kg; lognormal variance with pedigree 0.1426, pedigree (4,4,3,4,4)
- Lead II [water, ground-]: 9.3069e-8 kg; lognormal variance with pedigree 0.144, pedigree (4,4,3,5,4)
- Lead II [water, surface water]: 1.02987e-5 kg; lognormal variance with pedigree 0.144, pedigree (4,4,3,5,4)
- Mercury II [water, ground-]: 2.01564e-10 kg; lognormal variance with pedigree 0.144, pedigree (4,4,3,5,4)
- Mercury II [water, surface water]: 3.18339e-8 kg; lognormal variance with pedigree 0.144, pedigree (4,4,3,5,4)
- Nickel II [water, surface water]: 1.02673e-5 kg; lognormal variance with pedigree 0.144, pedigree (4,4,3,5,4)
- Nitrate [water, ground-]: 0.0885858 kg; source Thomas Nemecek 2011; lognormal variance with pedigree 0.144, pedigree (4,4,3,5,4)
- Phosphate [water, ground-]: 3.35619e-5 kg; source Stoessel, Franziska; 2012; lognormal variance with pedigree 0.144, pedigree (4,4,3,5,4)
- Phosphate [water, surface water]: 9.99373e-5 kg; lognormal variance with pedigree 0.144, pedigree (4,4,3,5,4)
- Phosphorus [water, surface water]: 0.000856706 kg; source Stoessel, Franziska; 2012; lognormal variance with pedigree 0.144, pedigree (4,4,3,5,4)
- Water [water, ground-]: 0.0935711 m3; name water_to_water_ground; lognormal variance with pedigree 0.0546, pedigree (4,4,3,5,4)
  Calculated value. See the parameters and their comments to understand the calculation.
  property fraction, origin: fresh water 1; name fraction_origin_fresh_water_Wgw
  property fraction, origin: salt water 0; name fraction_origin_salt_water_Wgw
  property fraction, origin: unspecified 0; name fraction_origin_unspecified_Wgw
- Water [water, surface water]: 0.0239926 m3; name water_to_water_surface; lognormal variance with pedigree 0.0546, pedigree (4,4,3,5,4)
  Calculated value. See the parameters and their comments to understand the calculation.
  property fraction, origin: fresh water 1; name fraction_origin_fresh_water_Wsw
  property fraction, origin: salt water 0; name fraction_origin_salt_water_Wsw
- Zinc II [water, ground-]: 5.10711e-6 kg; lognormal variance with pedigree 0.144, pedigree (4,4,3,5,4)
- Zinc II [water, surface water]: 2.89267e-5 kg; lognormal variance with pedigree 0.144, pedigree (4,4,3,5,4)

## Sampling procedure
The dataset is a weighted average from the respective regional datasets.

## Extrapolations
The dataset is extrapolated from the respective regional datasets present in the database. Uncertainty has been adjusted accordingly.
