# yarn production, jute

Dataset: EcoSpold 2, unit process
Geography: RoW
Time period: 2017-01-01 to 2023-12-31
Technology level: current
Classification: ISIC rev.4 ecoinvent: 1311:Preparation and spinning of textile fibres
Scenario: Business-as-Usual
System model: Allocation, cut-off by classification
Generated by: Mireille Faist Emmenegger
Published in: Faist Emmenegger, M. 2018
Database: ecoinvent
isCopyrightProtected: true
accessRestrictedTo: 1

## General comment
This dataset refers to the production of 1 kg yarn from jute fibre. The inventory includes softening, carding, drawing, and spinning of the raw jute. About 4% of raw jute converts into caddies and 6% of raw jute converts into jute dust. In most cases, byproducts/wastes are being reused in the same production process.
Hence, no wastes/by products are mentioned separately.

## Included activities start
The activity starts with the opening of the raw jute fibre.

## Included activities end
The activity ends with the produced greige yarn.

## Reference product
- yarn, jute: 1 kg; By-product classification allocatable product; CPC 26380: Yarn of vegetable textile fibres other than cotton (including flax, jute, coir and true hemp); paper yarn; HS2017 530710: Yarn; of jute or of other textile bast fibres, single
  production volume 1.47216e9 kg; name pv_yarnjute
    From the Fibre Year report 2017 for 2015.
  property heating value, net 14.87 MJ
    LHV is calculated based on the Carbon content of the product. More details can be found on the respective documentation.
  property price 0.712 EUR2005
    Average 2005 prices for EU27, USA, China, Japan and India from Import/Export data (US$ and tonnes) in UN Commodity Trade Statistics Database; Commodity: Yarn of jute or of other textile bast fibres of heading 264.0
  properties: carbon allocation 0.490909 kg, carbon content 0.490909, carbon content, fossil 0, carbon content, non-fossil 0.490909, dry mass 1 kg, water content 0, water in wet mass 0 kg, wet mass 1 kg

## Inputs from technosphere
- building, hall: 7.10965e-5 m2; lognormal variance with pedigree 0.3046, pedigree (2,1,3,5,1)
  square meters of building divided by production per year and life time of the plant
- electricity, low voltage: 0.00176024, 0.00952455, 0.000370155, 0.000143919, 0.0100462, 0.00239456, 0.000144411, 0.000493528, 0.000197195, 0.0886679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 kWh (46 suppliers, which the file names only by identifier); sum of these 0.25108 kWh; lognormal variance with pedigree 0.0066, pedigree (1,4,3,5,1)
  sum of electricity used for drawing, carding and spinning
- electricity, medium voltage: 0.000198239, 1.76318e-5, 0.0015373, 0.00201448, 0.00213334, 0.00108662, 0.000150079, 0.000949886, 4.00971e-5, 0.00641975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 kWh (46 suppliers, which the file names only by identifier); sum of these 0.217025 kWh; lognormal variance with pedigree 0.0046, pedigree (1,1,3,5,1)
  Industry data (expert interview with the production manager of the jute mill). The electricity data from the industry is available for a combined process of yarn and jute fabric production. Thus, the value is seperated using the ratio of the electricity consumption of the specific mechinaries from the article Sharif et al 2016.
- fatty acid: 0.00310035 kg; lognormal variance with pedigree 0.0046, pedigree (1,1,3,5,1)
  Industry data (expert interview with production manager of the jute mill). Data available from the jute mill for the year of 2016; Product is available in local market . Product is locally known as Tamarind Six (TS) powder.
  properties: carbon content, non-fossil 0.75, dry mass 1 kg, heating value, net 22.73 MJ, wet mass 1 kg
- fibre, jute: 1.02055 kg; lognormal variance with pedigree 0.0046, pedigree (1,1,3,5,1)
  Industry data. Expert interview with production manager of the jute mill. Data available from the jute mill for the year of 2016.
  properties: carbon content, non-fossil 0.46, dry mass 0.879121 kg, heating value, net 11.96 MJ, water content 0.1375, wet mass 1 kg
- heat, district or industrial, natural gas: 0.493554 MJ; = 0.020046877*24.62; lognormal variance with pedigree 0.0046, pedigree (1,1,3,5,1)
  Industry data (expert interview with the production manager of the jute mill), . It is used in the boiler. The calculation of the heat is based on the consumption of natural gas multiplied by the net heating value.
  properties: heating value, net 1 MJ
- lubricating oil: 0.00953768, 0.0452766 kg (2 suppliers, which the file names only by identifier); sum of these 0.0548142 kg; lognormal variance with pedigree 0.0126, pedigree (4,1,3,5,1)
  (same comment as for fibre, jute)
  properties: carbon content, fossil 0.75, dry mass 1 kg, heating value, net 40.2 MJ, wet mass 1 kg
  note on carbon content, fossil: Lubricating oil is produced from diesel. C-content/dry mass of fats and oils considered 75%, from: ecoinvent v2.2 report, n 15a, pg 40
  note on heating value, net: Literature value, Source: IPCC 2006, 2006 IPCC Guidelines for National Greenhouse Gas Inventories, Prepared by the National Greenhouse Gas Inventories Programme, Eggleston H.S., Buendia L., Miwa K., Ngara T. and Tanabe K. (eds). Published: IGES, Japan
- maize starch: 1.67419e-5 kg; lognormal variance with pedigree 0.0046, pedigree (1,1,3,5,1)
  Industry data (expert interview with production manager of the jute mill). Data available from the jute mill for the year of 2016; Product is available in local market . Product is locally known as Quomar glue.
  properties: carbon content, non-fossil 0.46, dry mass 0.86 kg, heating value, net 11.64 MJ, water content 0.162791, wet mass 1 kg
  note on carbon content, non-fossil: C-content of starch is considered 46% on dry mass basis (from "Evolutionary and Biochemical Aspects", A.D. Kay and T. Vrede (in Global Ecology, 2010, Elsevier B.V., S.E. Jørgensen Ed.)).
- soap: 5.08458e-6 kg; lognormal variance with pedigree 0.0046, pedigree (1,1,3,5,1)
  Industry data (expert interview with production manager of the jute mill). Data available from the jute mill for the year of 2016; Product is available in local market . Product is locally known as Nikanil soap.
  properties: carbon content, non-fossil 0.692237, dry mass 0.87 kg, heating value, net 17.93 MJ, water content 0.149425, wet mass 1 kg
- vegetable oil, refined: 0.012328 kg; lognormal variance with pedigree 0.0066, pedigree (1,4,3,5,1)
  properties: carbon content, non-fossil 0.768, dry mass 1 kg, heating value, net 38.4 MJ, wet mass 1 kg
  note on heating value, net: Values is approximated from HHV from "vegetable oil, crude". Source: Radovanovic,M.; Zivanovic,T.; Stojiljkovic,D.; Jovanovic,V.; Jerinic,N.; Knezevic,S. et.al. Utilization of sunflower husk as a fuel for industrial boilers - 20 years experience. Proc. 5th Eur. Conf. on Industrial Furnaces&Boilers 2000,vol.2,p.221-233. Available at: https://phyllis.nl/Biomass/View/2152
- waste yarn and waste textile: -0.0205467 kg; name waste_yarn; lognormal variance with pedigree 0.0132, pedigree (4,4,1,5,2)
  This is the final waste that is ultimatelly landfilled. expert judgement based on company data
  production volume; = pv_yarnjute*waste_yarn
    Calculated based on the production volume of yarn
  properties: carbon content, non-fossil 0.44455, dry mass 0.97917 kg, heating value, net 13.14 MJ, water content 0.0212731, wet mass 1 kg
- wastewater from textile production: -6.75301e-5 m3; name ww
  Industry data. Data on composition of wastewater from jute industry is unavailable. Hence, we used wastewaer, average.
  production volume; = pv_yarnjute * ww
    Calculated from production volume of reference product using the relative outputs.
  properties: BOD5, mass per volume 0.495 kg/m3, COD, mass per volume 0.501 kg/m3, carbon content, non-fossil 0.216883, dry mass 0.238473 kg, mass concentration, aluminium 0.0007758 kg/m3, mass concentration, copper 0.0001091 kg/m3, mass concentration, iron 0.0005904 kg/m3, mass concentration, magnesium 0.003219 kg/m3, mass concentration, potassium 0.01647 kg/m3, mass concentration, zinc 0.0001075 kg/m3, water content 4192.34, wet mass 1000 kg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
  note on carbon content, non-fossil: COD is 7.79e-4 kg/kg (Tab 12.11, ecoinvent v2.2 report 18_III). COD was converted to TOC, using conversion factors in Tab 4.10 (ecoinvent v2.2 report 13_IV). TOC was considered as Total Carbon.

## Inputs from nature
- Water, well, in ground [natural resource, in water]: 8.44127e-5 m3; lognormal variance with pedigree 0.119577, pedigree (1,1,3,5,1)
  Industry data (expert interview with the production manager of the jute mill). The data are available for the entire process (from raw jute to woven fabric) from the jute mill for the year of 2016. Thus, the value for spinning process is calculated. The source of the water is ground water. Most of the water are being recirculated within the process. However, a tiny percentage of the water are discharged into environment as wastewater.

## Emissions to nature
- Water [air, urban air close to ground]: 1.68825e-5 m3; lognormal variance with pedigree 0.0146, pedigree (4,4,3,5,1)
  considering default value of 20% evaporation rate

## Extrapolations
This dataset is a weighted average from data in India and Bangladesh.
