# mastic asphalt production

Dataset: EcoSpold 2, unit process
Geography: RoW
Time period: 2000-01-01 to 2023-12-31
Technology level: current
Classification: ISIC rev.4 ecoinvent: 2399:Manufacture of other non-metallic mineral products n.e.c.
Classification: EcoSpold01Categories: construction materials/others
Tags: ConvertedDataset
Scenario: Business-as-Usual
System model: Allocation, cut-off by classification
Generated by: Daniel Kellenberger (obsolete)
Published in: Kellenberger D. 2007
Database: ecoinvent
isCopyrightProtected: true
accessRestrictedTo: 1

## General comment
The raw materials per kg ready mix product are mixed in following ratio: Limestone powder (0.260 kg), sand (0.66 kg), bitumen (0.060 kg) and natural bitumen (0.020 kg). The only process emission taken into account are the VOC-emissions. Further emissions are not taken into account as they play a subordinate role compared to the emissions of the raw material production (e.g. drying of silica sand) and because no data are available. For inventorying the infrastructure, a yearly production amount of 150'000 tons is assumed. The lifespan of the machines is assumed to be 20 years.
[This dataset was already contained in the ecoinvent database version 2. It was not individually updated during the transfer to ecoinvent version 3. Life Cycle Impact Assessment results may still have changed, as they are affected by changes in the supply chain, i.e. in other datasets. This dataset was generated following the ecoinvent quality guidelines for version 2. It may have been subject to central changes described in the ecoinvent version 3 change report (http://www.ecoinvent.org/database/ecoinvent-version-3/reports-of-changes/), and the results of the central updates were reviewed extensively. The changes added e.g. consistent water flows and other information throughout the database. The documentation of this dataset can be found in the ecoinvent reports of version 2, which are still available via the ecoinvent website. The change report linked above covers all central changes that were made during the conversion process.]

## Included activities end
Includes the whole manufacturing process to produce mastic asphalt: raw material provision and transport, heating and mixing, storage, flush mounting, and the infrastructure. No transportation from the plant to the construction site and no requirements for administration are included. No additional buildings and land-use are taken into account as it is assumed that the mixing process takes place at the construction site.

## Geography
For the infrastructure RER-datasets are used as proxy

## Technology
Mixing, heating and casting of raw materials according to current technology used in Switzerland. It can be assumed that the technology is basically the same all over Europe and probably also for the rest of the world.

## Reference product
- mastic asphalt: 1 kg; By-product classification allocatable product; CPC 37930: Articles of asphalt or of similar material; HS2017 271490: Bitumen and asphalt, natural; asphaltites and asphaltic rock
  EcoSpold01Location=CH
  production volume 3.96633 kg
    This is a placeholder value that does not reflect real-world production volumes. This dataset does not currently require a real-world production volume to work in the database framework, and no actual data were collected yet. This has no negative effect on the results of the ecoinvent database.
  property carbon content, fossil 0.0968869
    Mastic asphalt is composed by Limestone powder (26%), sand (66%), and bitumen (8%) (tab 5.1, ecoinvent v2.2 report 7_part XXIII)
  property carbon content, non-fossil 0
    (same comment as for mastic asphalt)
  property heating value, net 2.94 MJ
    LHV is calculated based on the Carbon content of the product. More details can be found on the respective documentation.
  property price 0.277 EUR2005
    Calculated value based on data from United Nations Commodity Trade Statistics Database (comtrade.un.org). UN comtrade category: Bituminous mix, mastic from asphalt, bitumen/tar/pitc . Year 2005. Using exchange rate of 1EURO = 1.209 USD. Average of price of import into 5 main markets (EU, US, JP, IN and CN).
  properties: carbon allocation 0.0968869 kg, carbon content 0.0968869, dry mass 1 kg, water content 0, water in wet mass 0 kg, wet mass 1 kg

## Inputs from technosphere
- conveyor belt: 3.3333e-8 m; lognormal variance with pedigree 0.692, pedigree (1,1,5,5,1)
  EcoSpold01Location=RER
  estimation
- diesel, burned in building machine: 0.021571 MJ; lognormal variance with pedigree 0.692, pedigree (1,1,5,5,1)
  EcoSpold01Location=GLO
  estimation
  properties: heating value, net 1 MJ
- electricity, medium voltage: 0.000102228, 0.00203921, 0.000685169, 3.13056e-5, 6.26579e-6, 1.34541e-6, 0.000142392, 0.00021058, 0.000441173 kWh (9 suppliers, which the file names only by identifier); sum of these 0.00365967 kWh; = 3.32/907.185; lognormal variance with pedigree 0.3498, pedigree (2,3,5,4,3)
  Based on Mukherjee, A. (2016): Life Cycle Assessment of Asphalt Mixtures in Support of an Environmental Product Declaration, Department of Civil & Environmental Engineering Michigan Technological University Houghton, available here: https://www.asphaltpavement.org/uploads/documents/EPD_Program/LCA_final.pdf
  Value in kWh per short tonne, converted to kWh per metric tonne.
  EcoSpold01Location=CH
- heat, district or industrial, other than natural gas: 0.327871, 0.000151897, 0.00834331 MJ (3 suppliers, which the file names only by identifier); sum of these 0.336366 MJ; = 2.89*1e5*0.00105587/907.185; lognormal variance with pedigree 0.6998, pedigree (2,3,5,4,3)
  Based on Mukherjee, A. (2016): Life Cycle Assessment of Asphalt Mixtures in Support of an Environmental Product Declaration, Department of Civil & Environmental Engineering Michigan Technological University Houghton, available here: https://www.asphaltpavement.org/uploads/documents/EPD_Program/LCA_final.pdf
  Value in Btu per short tonne, converted to MJ per metric tonne.
  EcoSpold01Location=CH
  properties: heating value, net 1 MJ
- industrial machine, heavy, unspecified: 6.6667e-6 kg; lognormal variance with pedigree 0.692, pedigree (1,1,5,5,1)
  estimation
  EcoSpold01Location=RER
- lime, packed: 0.0866836, 0.173316 kg (2 suppliers, which the file names only by identifier); sum of these 0.26 kg; lognormal variance with pedigree 0.692, pedigree (1,1,5,5,1)
  estimation
  EcoSpold01Location=CH
  properties: carbon content, fossil 0.117492, dry mass 0.998 kg, water content 0.00200401, wet mass 1 kg
  note on carbon content, fossil: Table 3.1, ecoinvent v2.2 report 7, part VII, pg 3. MW CaCO3=100, MW MgCO3=84
- pitch: 0.00946031, 0.00042405, 0.000209022, 0.00366759, 0.000605372, 0.0534801, 0.0121535 kg (7 suppliers, which the file names only by identifier); sum of these 0.08 kg; lognormal variance with pedigree 0.692, pedigree (1,1,5,5,1)
  estimation
  EcoSpold01Location=CH
  properties: carbon content, fossil 0.83, dry mass 1 kg, heating value, net 28 MJ, wet mass 1 kg
- sand: 0.00998774, 0.64996, 5.18517e-5 kg (3 suppliers, which the file names only by identifier); sum of these 0.66 kg; lognormal variance with pedigree 0.692, pedigree (1,1,5,5,1)
  EcoSpold01Location=CH
  estimation
  properties: dry mass 1 kg, wet mass 1 kg

## Emissions to nature
- Benzo(a)pyrene [air, unspecified]: 4.66e-10 kg; lognormal variance with pedigree 0.692, pedigree (1,1,5,5,1)
  estimation
- NMVOC, non-methane volatile organic compounds [air, unspecified]: 0.00019 kg; lognormal variance with pedigree 0.692, pedigree (1,1,5,5,1)
  estimation

## Sampling procedure
estimation

## Extrapolations
This dataset has been copied from an original dataset covering the geography CH. The uncertainty has been adjusted accordingly.

## Review by Rolf Frischknecht 2007-09-13
passed
