# tall oil refinery operation

Dataset: EcoSpold 2, unit process
Geography: GLO
Time period: 2010-01-01 to 2023-12-31
Technology level: current
Classification: ISIC rev.4 ecoinvent: 1040:Manufacture of vegetable and animal oils and fats
Synonyms: TOR production; tall oil distillation; TOFA production; tall oil fatty acid production; tall oil rosin production
Scenario: Business-as-Usual
System model: Allocation, cut-off by classification
Share of production covered: 80 %
Generated by: Florentine Brunner
Database: ecoinvent
isCopyrightProtected: true
accessRestrictedTo: 1

## General comment
This dataset represents the distillation of 1 kg of crude tall oil in a fractionation column to more valuable intermediate pine chemicals: (unsaponifiables/) tall oil heads, pitch, tall oil rosin (TOR), tall oil fatty acids (TOFA) and distilled tall oil (DTO). These products were matched with ecoinvent product names as follows:
• TALL OIL ROSIN: “rosin size, for paper production”
Main use of TOR is as paper sizing.
• TALL OIL FATTY ACIDS: “fatty acids”
Main uses for TOFA is as surfactants, in paints, coatings and olified chemicals.
• PITCH: “pitch”
Pitch is often used internally as a process fuel.
• DISTILLED TALL OIL: “fatty acids”
Main uses in the end markets of surfactants, paints and rubber
• HEADS: “fatty acids”,
Often (partially) used as internal process fuel
TOR was defined as the driver fot this refinery operation process and was hence set to be the reference product, following the "EU CTO - Added Value Study" study (Fraunhofer,2016) , which suggest that the tall oil resin production in the European Union has a signifcantly higher total added value than tall oil fatty acid production.
Data represent 100% of the US stand-alone tall oil distillation capacity in 2011, which includes 5 sites and >90% of the European capacity, which includes 4 sites (Cashman et al., 2015). A weighted average of US and European data was calculated, applying the shares of these regions in global tall oil rosin (TOR) production in 2014, of 49% and 32%, respectively (Baumassy & Forchem, 2014). Scaling this up to 100% the applied weighing factors are 0.605 and 0.395 respectively. Data hence represent around 80% of global TOR production.
Reference(s):
Cashman, S.A., Moran, K.M., Gaglione, A.G., 2015, Greenhouse Gas and Energy Life Cycle Assessment of Pine Chemicals Derived from Crude Tall Oil and Their Substitutes, Wiley Online Library, https://doi.org/10.1111/jiec.12370
Baumassy, M., Forchem, O., 2014, The Talloil Industry : 100 years of Innovation, accessed online at https://c.ymcdn.com/sites/www.pinechemicals.org/resource/collection/C9836B4C-DDF1-4725-82D5-AAA0E89C2311/Michel_Baumassy_-_The_Tall_Oil_Industry_-_100_Years_of_Innovation.pdf, 28.6.2018
Fraunhofer Institute for Environmental, Safety and Energy Technology UMSICHT, 2016, ANALYSIS OF THE EUROPEAN CRUDE TALL OIL INDUSTRY - ENVIRONMENTAL IMPACT, SOCIO-ECONOMIC VALUE & DOWNSTREAM POTENTIAL, online at https://c.ymcdn.com/sites/www.pinechemicals.org/resource/resmgr/Studies/EU_CTO_Added_Value_Study_Fin.pdf, July 2017

## Included activities start
From reception of crude tall oil at the refinery gate through refining of crude tall oil.

## Included activities end
System boundary is set by the boundaries of the refinery.

## Technology
Distillation of crude tall oil in a fractionation column.

## Time period
Energy data for 2008; process inputs and other data from literature sources.

## Parameters
- fraction: 0.01 dimensionless; name fraction_of_crude_oil_PV_to_refinery; lognormal variance with pedigree 0.0086, pedigree (4,1,1,1,1)
- fraction, process water, to air: 0.15 dimensionless; name fraction_PW_to_air; lognormal variance with pedigree 0.092025, pedigree (4,4,3,2,4)
  Literature value. In case when no industry/process specific data are available, default evaporation fraction value is used. This value is 15% and is based on literature (Statistics Canada, 2007 & Shaffer, K.H., 2008, Consumptive water use in the Great Lakes Basin, USGS & Shiklomanov, 2003, World Water Resources at the Beginning of the 21st Century) and has been approved by an expert.
- fraction, tap water, to air: 0.15 dimensionless; name fraction_TW_to_air; = fraction_PW_to_air; lognormal variance with pedigree 0.092025, pedigree (4,4,3,2,4)
  Calculated value. See comment in the other parametres present in this dataset. Tap water is considered to be always used as process water, thus process water fractions to air are applied to all tap water input flows to calculate the amount of water consumed in the processes.
- utilisation rate: 0.9 dimensionless; name utilization_rate; lognormal variance with pedigree 0.0086, pedigree (4,1,1,1,1)

## Reference product
- rosin size, for paper production: 1 kg; = 0.3301*0.605+0.2432*0.395; By-product classification allocatable product; CPC 35499: Other chemical products n.e.c.; HS2017 380620: Rosin and resin; salts of rosin, of resin acids or of derivatives of rosin or resin acids, other than salts[...]
  tall oil rosin (TOR) is assumed to be the driver of this refinery operation and hence the reference product, following the
  "EU CTO - Added Value Study" study, which suggest that the tall oil resin production in the European Union has a signifcantly higher total added value than tall oil fatty acid production. Reference(s):
  Fraunhofer Institute for Environmental, Safety and Energy Technology UMSICHT, 2016, ANALYSIS OF THE EUROPEAN CRUDE TALL OIL INDUSTRY - ENVIRONMENTAL IMPACT, SOCIO-ECONOMIC VALUE & DOWNSTREAM POTENTIAL, online at https://c.ymcdn.com/sites/www.pinechemicals.org/resource/resmgr/Studies/EU_CTO_Added_Value_Study_Fin.pdf, July 2017
  production volume 5.91549e6 kg; = 2000000000*0.01*0.2957745
    Various sources estimate that globally about 2 million tonnes of crude tall oil are produced per year (Ukkonen, n.d.; Ecofys, 2017; Baumassy & Oy, 2014). According to Ecofys (2017) 1% of crude tall oil goes to “other” uses. It is assumed that this 1% is refined.
    Reference(s):
    Ukkonen (n.d.) Pine Chemicals - Global view. Retrieved online from <https://c.ymcdn.com/sites/www.pinechemicals.org/resource/resmgr/2016_ic_-_santiago/2016_IC_Santiago-_Presentations/Monday_Speaker_2-_Keijo_Ukko.pdf>, 8.6.2018
    Baumassy & Oy (2014) The Talloil Industry: 100 years of Innovation. Retrieved online from <https://c.ymcdn.com/sites/www.pinechemicals.org/resource/collection/C9836B4C-DDF1-4725-82D5-AAA0E89C2311/Michel_Baumassy_-_The_Tall_Oil_Industry_-_100_Years_of_Innovation.pdf>, 8.6.2018
    Ecofys, 2017, Crude tall oil low ILUC risk assessment. Retrieved online from <http://www.upmbiofuels.com/whats-new/other-publications/Documents/Publications/ecofys-crude-tall-oil-low-iluc-risk-assessment-report.pdf>, 8.6.2018
  property heating value, net 15.62 MJ
    LHV is calculated based on the Carbon content of the product. More details can be found on the respective documentation.
  property price 2.30598 EUR2005
    Calculated based on inputs: The price of the product has been calculated as a sum of the values of the material and energy inputs for this product. This value is therefore a rough estimation. It may underestimate the real price since there are additional expenses when producing any product. These expences can include for example labour costs, treatment of waste materials and profit for the producer. Please consider carefully whether this level of data quality is acceptable for your application.
  properties: allocation factor 0.489967, carbon allocation 0.515474 kg, carbon content 0.515474, carbon content, fossil 0, carbon content, non-fossil 0.515474, dry mass 1 kg, true value 0.68205, water content 0, water in wet mass 0 kg, wet mass 1 kg

## Inputs from technosphere
- electricity, medium voltage: 0.215826 kWh; = (113.5922*0.605+155.8559*0.395)/1000; source Omni Tech International  2010; lognormal variance with pedigree 0.1786, pedigree (4,5,5,5,5)
  Calculated as weighted average of US and European value, reported as purchased electricity.
- hard coal: 0.000624205, 0.000148119, 0.000485998, 0.00441765, 0.00103748, 0.000636987, 0.000930617, 0.00137662, 0.000270885, 0.000385543 kg (10 suppliers, which the file names only by identifier); sum of these 0.0103141 kg; = (10.2913*0.605+0*0.395)/1000; lognormal variance with pedigree 0.0094, pedigree (2,2,4,3,1)
  Fuel input reported a "bituminous coal, at industrial boiler". The resulting combustion emissions are approximated with the emission profile of heat production, at hard coal industrial furnace 1-10MW" and added as direct process emissions of this activity.
  properties: carbon content, fossil 0.845, dry mass 0.94 kg, heating value, net 27.91 MJ, water content 0.0638298, wet mass 1 kg
  note on carbon content, fossil: C content 75-94% (specified in Tab 1.1, report 6, part VI). A mean content of 0.845 kg C/ kg dry hard coal was considered
  note on heating value, net: Based on the Characterization factor of Hard coal in the CED method
- hard coal ash: -1.76604e-7, -2.7877e-7, -3.92248e-7, -2.75938e-7, -5.85335e-8, -4.10923e-7, -2.41772e-6, -0.000803406, -1.86587e-5, -1.63784e-6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 kg (14 suppliers, which the file names only by identifier); sum of these -0.000864476 kg; lognormal variance with pedigree 0.0926, pedigree (3,3,4,5,4)
  Estimated value. Emissions from the on-site combustion of fuels was calculated based on emission profiles of the following ecoinvent furnace/boiler processes. The geography of the combustion process was chosen depending on whether the fuel is used in the US, the European or both tall oil distillation processes: light fuel oil: heat production, light fuel oil, at industrial furnace 1MW, Europe without Switzerland; heavy fuel oil: heat production, heavy fuel oil, at industrial furnace 1MW, Europe without Switzerland; bituminous coal: heat production, at hard coal industrial furnace 1-10MW, GLO; natural gas: heat production, natural gas, at industrial furnace >100kW, GLO; combustion of pitch, head and distilled tall oil was approximated with emissions from: heat production, wood chips from industry, at furnace 300kW, GLO
  production volume; = 2000000000*0.01*0.000521852
    (same comment as for rosin size, for paper production)
  properties: dry mass 1 kg, wet mass 1 kg
- heat, district or industrial, other than natural gas: 0.264046 MJ; = (420.3883*0.605+(493.6937-(55.7658*2.75))*0.395)/1000 *0.41; lognormal variance with pedigree 0.0094, pedigree (2,2,4,3,1)
  Reported as an input steam purchased from pulp and paper mills. In Europe the purchased amount is 0.584MJ. Subtracted thereof is an amount of 0.0619kg steam output which is sold to the paper industry (1MJ=0.3636kg). This is only the case in Europe, not in the US (purchased heat of 433MJ). A weighted average for US and Europe was calculated. As the source of the heat is specified to be pulp (and paper) mills, direct activity links were therefore set to heat from sulfate pulp producing activities by share of their heat production volumes.
  properties: corresponding fuel use, propane, furnace >100kW 1.05263 MJ, heating value, net 1 MJ
  note on corresponding fuel use, propane, furnace >100kW: Lower heating value of the fuel input related to the heat/electricity output, taken directly from ecoinvent v3.0 dataset "heat production, natural gas, at industrial furnace >100kW, GLO 2000".
- heat, district or industrial, other than natural gas: 0.289807 MJ; = (420.3883*0.605+(493.6937-(55.7658*2.75))*0.395)/1000 *0.45; lognormal variance with pedigree 0.0094, pedigree (2,2,4,3,1)
  (same comment as for heat, district or industrial, other than natural gas)
- heat, district or industrial, other than natural gas: 0.0257606 MJ; = (420.3883*0.605+(493.6937-(55.7658*2.75))*0.395)/1000 *0.04; lognormal variance with pedigree 0.0094, pedigree (2,2,4,3,1)
  (same comment as for heat, district or industrial, other than natural gas)
- heat, district or industrial, other than natural gas: 0.0644016 MJ; = (420.3883*0.605+(493.6937-(55.7658*2.75))*0.395)/1000 *0.1; lognormal variance with pedigree 0.0094, pedigree (2,2,4,3,1)
  (same comment as for heat, district or industrial, other than natural gas)
- heavy fuel oil: 2.28566e-5, 1.33097e-5, 0.000325875, 6.7664e-5, 0.00158175, 1.70744e-5, 8.77367e-5 kg (7 suppliers, which the file names only by identifier); sum of these 0.00211626 kg; = (0*0.605+3.2342*0.395)/1000; lognormal variance with pedigree 0.0094, pedigree (2,2,4,3,1)
  Fuel input reported a "heavy fuel oil, at industrial boiler". The resulting combustion emissions are approximated with the emission profile of *heat production, heavy fuel oil, at industrial furnace, 1MW, GLO" and added as direct process emissions of this activity.
  properties: carbon content, fossil 0.849, dry mass 1 kg, heating value, net 41.2 MJ, wet mass 1 kg
- light fuel oil: 2.69216e-6, 0.000282085, 5.8562e-5, 1.38731e-5, 2.79992e-5, 2.00072e-6, 1.85799e-6 kg (7 suppliers, which the file names only by identifier); sum of these 0.00038907 kg; = (0*0.605+0.5946*0.395)/1000; lognormal variance with pedigree 0.0094, pedigree (2,2,4,3,1)
  Fuel input reported a "light fuel oil, at industrial boiler". The resulting combustion emissions are approximated with the emission profile of *heat production, light fuel oil, at industrial furnace 1MW, GLO" and added as direct process emissions of this activity.
  properties: carbon content, fossil 0.862, dry mass 1 kg, heating value, net 42.6 MJ, wet mass 1 kg
- natural gas, high pressure: 0.107987 m3; = (103.8835*0.605+5.9189*0.395)/1000; lognormal variance with pedigree 0.0094, pedigree (2,2,4,3,1)
  Fuel input reported a "natural gas, at industrial boiler". The combustion emissions of the natural gas are approximated with the emission profile of *heat production, natural gas, at boiler condensing modulating >100kW, GLO, 2000" and added as direct process emissions of this activity.
  properties: carbon content, fossil 0.602381, dry mass 0.84 kg, heating value, gross 40 MJ, heating value, net 36 MJ, wet mass 0.84 kg
  note on carbon content, fossil: An average C content of 0.506 kg C/ m3 has been assumed (this average has been calculated using data in Tab 3.5, ecoinvent v2.2 report 6_V
  note on heating value, net: Literature value, Source: Christoph Meili;Niels Jungbluth;Maresa Bussa (2021) Life cycle inventories of crude oil and natural gas extraction. ESU-services Ltd. commissioned by BAFU & VSG, Schaffhausen, Switzerland, http://esu-services.ch/data/public-lci-reports/
- nitrogen, liquid: 0.00388991, 0.00106775 kg (2 suppliers, which the file names only by identifier); sum of these 0.00495766 kg; = (0*0.605+7.5766*0.395)/1000; lognormal variance with pedigree 0.0094, pedigree (2,2,4,3,1)
  For Europe a material input of 8.41kg nitrogen liquid and gaseous is reported. The US process does not require this input. A weighted average is calculated.
  properties: dry mass 1 kg, wet mass 1 kg
- sludge from pulp and paper production: -0.0350803, -2.59424e-5, -0.00742742 kg (3 suppliers, which the file names only by identifier); sum of these -0.0425337 kg; = 0.0301*0.605+0.0189*0.395
  Reported as wastewater and sludge.
  production volume; = 2000000000*0.01*0.025676
    (same comment as for rosin size, for paper production)
  properties: carbon content, non-fossil 0.21, dry mass 0.75 kg, heating value, net 2.65 MJ, water content 0.333333, wet mass 1 kg
  note on heating value, net: Value taken from the general comment of the treatment dataset.
- tall oil, crude: 1.65655 kg; name tall_oil_crude_input; = 1*0.605+1*0.395; lognormal variance with pedigree 0.0094, pedigree (2,2,4,3,1)
  Amount of crude tall oil input.
  properties: heating value, net 23.82 MJ
- vegetable oil refinery: 2.01711e-10 unit; = 1/(lifetime_capacity_kg*utilization_rate); lognormal variance with pedigree 0.478, pedigree (4,5,5,5,5)
  Proxy for tall oil processing plant. The utilization rate of 90% means that out of the whole capacity of the vegetable oil refinery only 90% is actually used for the production.
  property lifetime 50 year; name lifetime
  property lifetime capacity [kg] 9.125e9 kg; name lifetime_capacity_kg; = 500*365*1000*lifetime
  note on lifetime capacity [kg]: According to literature (World Bank, 1999, The Indian Oilseed Complex, http://books.google.ch/books?id=cAmzHYm7kHoC&pg=PA151&dq=edible+oil+refinery+plant+infrastructure+area&hl=en&sa=X&ei=x65MT729L7HN4QSYmszJAg&redir_esc=y#v=onepage&q=edible%20oil%20refinery%20plant%20infrastructure%20area&f=false) the average size European vegetable oil refinery produce 500 tones/day of refined vegetable oil.

## Emissions to nature
- Acetaldehyde [air, urban air close to ground]: 7.27736e-8 kg; lognormal variance with pedigree 0.1246, pedigree (3,3,5,5,4)
  (same comment as for hard coal ash)
- Acetic acid [air, urban air close to ground]: 6.83276e-7 kg; lognormal variance with pedigree 0.1246, pedigree (3,3,5,5,4)
  (same comment as for hard coal ash)
- Acetone [air, urban air close to ground]: 1.28883e-8 kg; lognormal variance with pedigree 0.1246, pedigree (3,3,5,5,4)
  (same comment as for hard coal ash)
- Acetylene [air, urban air close to ground]: 1.49048e-7 kg; lognormal variance with pedigree 0.1246, pedigree (3,3,5,5,4)
  (same comment as for hard coal ash)
- Aluminium III [air, urban air close to ground]: 3.18961e-6 kg; lognormal variance with pedigree 0.1246, pedigree (3,3,5,5,4)
  (same comment as for hard coal ash)
- Ammonia [air, urban air close to ground]: 1.5823e-6 kg; lognormal variance with pedigree 0.1246, pedigree (3,3,5,5,4)
  (same comment as for hard coal ash)
- Antimony ion [air, urban air close to ground]: 4.7099e-10 kg; lognormal variance with pedigree 0.1246, pedigree (3,3,5,5,4)
  (same comment as for hard coal ash)
- Arsenic ion [air, urban air close to ground]: 9.57149e-9 kg; lognormal variance with pedigree 0.1246, pedigree (3,3,5,5,4)
  (same comment as for hard coal ash)
- Barium II [air, urban air close to ground]: 3.756e-8 kg; lognormal variance with pedigree 0.1246, pedigree (3,3,5,5,4)
  (same comment as for hard coal ash)
- Benzene [air, urban air close to ground]: 2.66444e-6 kg; lognormal variance with pedigree 0.1246, pedigree (3,3,5,5,4)
  (same comment as for hard coal ash)
- Benzo(a)pyrene [air, urban air close to ground]: 5.0431e-10 kg; lognormal variance with pedigree 0.1246, pedigree (3,3,5,5,4)
  (same comment as for hard coal ash)
- Beryllium II [air, urban air close to ground]: 3.756e-10 kg; lognormal variance with pedigree 0.1246, pedigree (3,3,5,5,4)
  (same comment as for hard coal ash)
- Boron [air, urban air close to ground]: 1.41297e-7 kg; lognormal variance with pedigree 0.1246, pedigree (3,3,5,5,4)
  (same comment as for hard coal ash)
- Bromine [air, urban air close to ground]: 5.75871e-8 kg; lognormal variance with pedigree 0.1246, pedigree (3,3,5,5,4)
  (same comment as for hard coal ash)
- Butane [air, urban air close to ground]: 2.95327e-6 kg; lognormal variance with pedigree 0.1246, pedigree (3,3,5,5,4)
  (same comment as for hard coal ash)
- Cadmium II [air, urban air close to ground]: 1.10987e-9 kg; lognormal variance with pedigree 0.7346, pedigree (3,3,5,5,4)
  (same comment as for hard coal ash)
- Calcium II [air, urban air close to ground]: 5.72426e-6 kg; lognormal variance with pedigree 0.1246, pedigree (3,3,5,5,4)
  (same comment as for hard coal ash)
- Carbon dioxide, fossil [air, urban air close to ground]: 0.271136 kg; lognormal variance with pedigree 0.0852, pedigree (3,3,5,5,4)
  (same comment as for hard coal ash)
- Carbon dioxide, non-fossil [air, urban air close to ground]: 0.0976573 kg; lognormal variance with pedigree 0.0852, pedigree (3,3,5,5,4)
  (same comment as for hard coal ash)
- Carbon monoxide, fossil [air, urban air close to ground]: 3.93215e-5 kg; lognormal variance with pedigree 0.7346, pedigree (3,3,5,5,4)
  (same comment as for hard coal ash)
- Carbon monoxide, non-fossil [air, urban air close to ground]: 0.000456343 kg; lognormal variance with pedigree 0.7346, pedigree (3,3,5,5,4)
  (same comment as for hard coal ash)
- Chlorine [air, urban air close to ground]: 1.64283e-7 kg; lognormal variance with pedigree 0.1246, pedigree (3,3,5,5,4)
  (same comment as for hard coal ash)
- Chromium III [air, urban air close to ground]: 1.07467e-8 kg; lognormal variance with pedigree 0.7346, pedigree (3,3,5,5,4)
  (same comment as for hard coal ash)
- Chromium VI [air, urban air close to ground]: 8.69509e-10 kg; lognormal variance with pedigree 0.7346, pedigree (3,3,5,5,4)
  (same comment as for hard coal ash)
- Cobalt II [air, urban air close to ground]: 3.77741e-9 kg; lognormal variance with pedigree 0.7346, pedigree (3,3,5,5,4)
  (same comment as for hard coal ash)
- Copper ion [air, urban air close to ground]: 3.80312e-8 kg; lognormal variance with pedigree 0.7346, pedigree (3,3,5,5,4)
  (same comment as for hard coal ash)
- Dinitrogen monoxide [air, urban air close to ground]: 3.07967e-6 kg; lognormal variance with pedigree 0.1246, pedigree (3,3,5,5,4)
  (same comment as for hard coal ash)
- Dioxins, measured as 2,3,7,8-tetrachlorodibenzo-p-dioxin [air, urban air close to ground]: 3.44277e-14 kg; lognormal variance with pedigree 0.1246, pedigree (3,3,5,5,4)
  (same comment as for hard coal ash)
- Ethane [air, urban air close to ground]: 4.47144e-7 kg; lognormal variance with pedigree 0.1246, pedigree (3,3,5,5,4)
  (same comment as for hard coal ash)
- Ethanol [air, urban air close to ground]: 2.57766e-8 kg; lognormal variance with pedigree 0.1246, pedigree (3,3,5,5,4)
  (same comment as for hard coal ash)
- Ethyl benzene [air, urban air close to ground]: 2.73805e-8 kg; lognormal variance with pedigree 0.1246, pedigree (3,3,5,5,4)
  (same comment as for hard coal ash)
- Ethylene [air, urban air close to ground]: 8.94286e-7 kg; lognormal variance with pedigree 0.1246, pedigree (3,3,5,5,4)
  (same comment as for hard coal ash)
- Fluorine [air, urban air close to ground]: 4.56343e-8 kg; lognormal variance with pedigree 0.1246, pedigree (3,3,5,5,4)
  (same comment as for hard coal ash)
- Formaldehyde [air, urban air close to ground]: 6.1726e-7 kg; lognormal variance with pedigree 0.1246, pedigree (3,3,5,5,4)
  (same comment as for hard coal ash)
- Hexachlorobenzene [air, urban air close to ground]: 6.57134e-15 kg; lognormal variance with pedigree 0.1246, pedigree (3,3,5,5,4)
  (same comment as for hard coal ash)
- Hydrocarbons, aliphatic, alkanes, unspecified [air, urban air close to ground]: 1.03912e-6 kg; lognormal variance with pedigree 0.1246, pedigree (3,3,5,5,4)
  (same comment as for hard coal ash)
- Hydrocarbons, aliphatic, unsaturated [air, urban air close to ground]: 2.98095e-6 kg; lognormal variance with pedigree 0.1246, pedigree (3,3,5,5,4)
  (same comment as for hard coal ash)
- Hydrocarbons, aromatic [air, urban air close to ground]: 1.33867e-8 kg; lognormal variance with pedigree 0.3846, pedigree (3,3,5,5,4)
  (same comment as for hard coal ash)
- Hydrochloric acid [air, urban air close to ground]: 1.21982e-5 kg; lognormal variance with pedigree 0.1246, pedigree (3,3,5,5,4)
  (same comment as for hard coal ash)
- Hydrogen fluoride [air, urban air close to ground]: 3.79874e-7 kg; lognormal variance with pedigree 0.1246, pedigree (3,3,5,5,4)
  (same comment as for hard coal ash)
- Iodine [air, urban air close to ground]: 3.39829e-9 kg; lognormal variance with pedigree 0.7346, pedigree (3,3,5,5,4)
  (same comment as for hard coal ash)
- Iron ion [air, urban air close to ground]: 1.38804e-6 kg; lognormal variance with pedigree 0.7346, pedigree (3,3,5,5,4)
  (same comment as for hard coal ash)
- Lead II [air, urban air close to ground]: 5.78714e-8 kg; lognormal variance with pedigree 0.7346, pedigree (3,3,5,5,4)
  (same comment as for hard coal ash)
- Lead-210 [air, urban air close to ground]: 1.38614e-5 kBq; lognormal variance with pedigree 0.7346, pedigree (3,3,5,5,4)
  (same comment as for hard coal ash)
- Magnesium [air, urban air close to ground]: 1.45835e-6 kg; lognormal variance with pedigree 0.1246, pedigree (3,3,5,5,4)
  (same comment as for hard coal ash)
- Manganese II [air, urban air close to ground]: 1.61744e-7 kg; lognormal variance with pedigree 0.7346, pedigree (3,3,5,5,4)
  (same comment as for hard coal ash)
- Mercury II [air, urban air close to ground]: 1.26793e-9 kg; lognormal variance with pedigree 0.7346, pedigree (3,3,5,5,4)
  (same comment as for hard coal ash)
- Methane, fossil [air, urban air close to ground]: 1.16783e-5 kg; lognormal variance with pedigree 0.1246, pedigree (3,3,5,5,4)
  (same comment as for hard coal ash)
- Methane, non-fossil [air, urban air close to ground]: 4.10708e-6 kg; lognormal variance with pedigree 0.1246, pedigree (3,3,5,5,4)
  (same comment as for hard coal ash)
- Methanol [air, urban air close to ground]: 4.38203e-8 kg; lognormal variance with pedigree 0.1246, pedigree (3,3,5,5,4)
  (same comment as for hard coal ash)
- Molybdenum VI [air, urban air close to ground]: 2.10035e-9 kg; lognormal variance with pedigree 0.7346, pedigree (3,3,5,5,4)
  (same comment as for hard coal ash)
- NMVOC, non-methane volatile organic compounds [air, urban air close to ground]: 1.00959e-5 kg; lognormal variance with pedigree 0.1246, pedigree (3,3,5,5,4)
  (same comment as for hard coal ash)
- Nickel II [air, urban air close to ground]: 5.32418e-8 kg; lognormal variance with pedigree 0.7346, pedigree (3,3,5,5,4)
  (same comment as for hard coal ash)
- Nitrogen oxides [air, urban air close to ground]: 0.00030871 kg; lognormal variance with pedigree 0.1246, pedigree (3,3,5,5,4)
  (same comment as for hard coal ash)
- PAH, polycyclic aromatic hydrocarbons [air, urban air close to ground]: 5.2305e-8 kg; lognormal variance with pedigree 0.3846, pedigree (3,3,5,5,4)
  (same comment as for hard coal ash)
- Particulate Matter, < 2.5 um [air, urban air close to ground]: 8.96693e-5 kg; lognormal variance with pedigree 0.3846, pedigree (3,3,5,5,4)
  (same comment as for hard coal ash)
- Particulate Matter, > 10 um [air, urban air close to ground]: 3.18716e-6 kg; lognormal variance with pedigree 0.7346, pedigree (3,3,5,5,4)
  (same comment as for hard coal ash)
- Particulate Matter, > 2.5 um and < 10um [air, urban air close to ground]: 1.06284e-5 kg; lognormal variance with pedigree 0.2046, pedigree (3,3,5,5,4)
  (same comment as for hard coal ash)
- Pentachlorophenol [air, urban air close to ground]: 7.39275e-12 kg; lognormal variance with pedigree 0.1246, pedigree (3,3,5,5,4)
  (same comment as for hard coal ash)
- Pentane [air, urban air close to ground]: 5.05726e-6 kg; lognormal variance with pedigree 0.1246, pedigree (3,3,5,5,4)
  (same comment as for hard coal ash)
- Phosphorus [air, urban air close to ground]: 2.92645e-7 kg; lognormal variance with pedigree 0.1246, pedigree (3,3,5,5,4)
  (same comment as for hard coal ash)
- Polonium-210 [air, urban air close to ground]: 2.53382e-5 kBq; lognormal variance with pedigree 0.7346, pedigree (3,3,5,5,4)
  (same comment as for hard coal ash)
- Potassium I [air, urban air close to ground]: 2.17325e-5 kg; lognormal variance with pedigree 0.1246, pedigree (3,3,5,5,4)
  (same comment as for hard coal ash)
- Potassium-40 [air, urban air close to ground]: 4.02428e-6 kBq; lognormal variance with pedigree 0.7346, pedigree (3,3,5,5,4)
  (same comment as for hard coal ash)
- Propane [air, urban air close to ground]: 1.1433e-6 kg; lognormal variance with pedigree 0.1246, pedigree (3,3,5,5,4)
  (same comment as for hard coal ash)
- Propionic acid [air, urban air close to ground]: 8.42295e-8 kg; lognormal variance with pedigree 0.1246, pedigree (3,3,5,5,4)
  (same comment as for hard coal ash)
- Propylene [air, urban air close to ground]: 1.49048e-7 kg; lognormal variance with pedigree 0.1246, pedigree (3,3,5,5,4)
  (same comment as for hard coal ash)
- Radium-226 [air, urban air close to ground]: 3.57715e-6 kBq; lognormal variance with pedigree 0.7346, pedigree (3,3,5,5,4)
  (same comment as for hard coal ash)
- Radium-228 [air, urban air close to ground]: 1.93762e-5 kBq; lognormal variance with pedigree 0.7346, pedigree (3,3,5,5,4)
  (same comment as for hard coal ash)
- Radon-220 [air, urban air close to ground]: 2.98095e-7 kBq; lognormal variance with pedigree 0.7346, pedigree (3,3,5,5,4)
  (same comment as for hard coal ash)
- Radon-222 [air, urban air close to ground]: 2.98095e-7 kBq; lognormal variance with pedigree 0.7346, pedigree (3,3,5,5,4)
  (same comment as for hard coal ash)
- Scandium [air, urban air close to ground]: 3.756e-10 kg; lognormal variance with pedigree 0.1246, pedigree (3,3,5,5,4)
  (same comment as for hard coal ash)
- Selenium IV [air, urban air close to ground]: 3.857e-9 kg; lognormal variance with pedigree 0.7346, pedigree (3,3,5,5,4)
  (same comment as for hard coal ash)
- Silicon [air, urban air close to ground]: 4.7099e-6 kg; lognormal variance with pedigree 0.1246, pedigree (3,3,5,5,4)
  (same comment as for hard coal ash)
- Sodium I [air, urban air close to ground]: 1.43933e-6 kg; lognormal variance with pedigree 0.7346, pedigree (3,3,5,5,4)
  (same comment as for hard coal ash)
- Strontium II [air, urban air close to ground]: 5.66381e-8 kg; lognormal variance with pedigree 0.1246, pedigree (3,3,5,5,4)
  (same comment as for hard coal ash)
- Sulfur dioxide [air, urban air close to ground]: 0.000188277 kg; lognormal variance with pedigree 0.1246, pedigree (3,3,5,5,4)
  (same comment as for hard coal ash)
- Thallium I [air, urban air close to ground]: 4.7099e-10 kg; lognormal variance with pedigree 0.1246, pedigree (3,3,5,5,4)
  (same comment as for hard coal ash)
- Thorium [air, urban air close to ground]: 5.66381e-10 kg; lognormal variance with pedigree 0.7346, pedigree (3,3,5,5,4)
  (same comment as for hard coal ash)
- Thorium-228 [air, urban air close to ground]: 1.63952e-6 kBq; lognormal variance with pedigree 0.7346, pedigree (3,3,5,5,4)
  (same comment as for hard coal ash)
- Thorium-232 [air, urban air close to ground]: 1.04333e-6 kBq; lognormal variance with pedigree 0.7346, pedigree (3,3,5,5,4)
  (same comment as for hard coal ash)
- Tin ion [air, urban air close to ground]: 1.88397e-10 kg; lognormal variance with pedigree 0.7346, pedigree (3,3,5,5,4)
  (same comment as for hard coal ash)
- Titanium ion [air, urban air close to ground]: 1.12978e-7 kg; lognormal variance with pedigree 0.1246, pedigree (3,3,5,5,4)
  (same comment as for hard coal ash)
- Toluene [air, urban air close to ground]: 1.14899e-6 kg; lognormal variance with pedigree 0.1246, pedigree (3,3,5,5,4)
  (same comment as for hard coal ash)
- Uranium [air, urban air close to ground]: 7.54181e-10 kg; lognormal variance with pedigree 0.7346, pedigree (3,3,5,5,4)
  (same comment as for hard coal ash)
- Uranium-238 [air, urban air close to ground]: 2.98095e-6 kBq; lognormal variance with pedigree 0.7346, pedigree (3,3,5,5,4)
  (same comment as for hard coal ash)
- Vanadium V [air, urban air close to ground]: 9.722e-8 kg; lognormal variance with pedigree 0.1246, pedigree (3,3,5,5,4)
  (same comment as for hard coal ash)
- Water [air, unspecified]: 4.14062e-5 m3; lognormal variance with pedigree 0.1246, pedigree (3,3,5,5,4)
  (same comment as for hard coal ash)
- Water [air, urban air close to ground]: 4.10708e-5 m3; lognormal variance with pedigree 0.1246, pedigree (3,3,5,5,4)
  (same comment as for hard coal ash)
- Xylenes, unspecified [air, urban air close to ground]: 2.98095e-8 kg; lognormal variance with pedigree 0.1246, pedigree (3,3,5,5,4)
  (same comment as for hard coal ash)
- Zinc II [air, urban air close to ground]: 2.91101e-7 kg; lognormal variance with pedigree 0.7346, pedigree (3,3,5,5,4)
  (same comment as for hard coal ash)
- m-Xylene [air, urban air close to ground]: 1.09522e-7 kg; lognormal variance with pedigree 0.1246, pedigree (3,3,5,5,4)
  (same comment as for hard coal ash)
- Water [water, unspecified]: 1.90037e-6 m3; lognormal variance with pedigree 0.1246, pedigree (3,3,5,5,4)
  (same comment as for hard coal ash)

## Sampling procedure
Data taken from literature. Main source: Cashman, S.A., Moran, K.M., Gaglione, A.G., 2015, Greenhouse Gas and Energy Life Cycle Assessment of Pine Chemicals Derived from Crude Tall Oil and Their Substitutes, Wiley Online Library, <https://doi.org/10.1111/jiec.12370>

## Extrapolations
A weighted average of US and European data was calculated, applying the shares of these regions in global tall oil rosin (TOR) production in 2014, of 49% and 32%, respectively (Baumassy & Forchem, 2014). Scaling this up to 100% the applied weighing factors are 0.605 and 0.395 respectively.
Reference(s): Baumassy, M., Forchem, O., 2014, The Talloil Industry : 100 years of Innovation, accessed online at <https://c.ymcdn.com/sites/www.pinechemicals.org/resource/collection/C9836B4C-DDF1-4725-82D5-AAA0E89C2311/Michel_Baumassy_-_The_Tall_Oil_Industry_-_100_Years_of_Innovation.pdf>, 28.6.2018
