# sawnwood production, hardwood, raw, dried (u=10%)

Dataset: EcoSpold 2, unit process
Geography: RoW
Time period: 2014-01-01 to 2023-12-31
Technology level: current
Classification: ISIC rev.4 ecoinvent: 1610:Sawmilling and planing of wood
Classification: EcoSpold01Categories: wooden materials/extraction
Scenario: Business-as-Usual
System model: Allocation, cut-off by classification
Generated by: Emilia Moreno Ruiz
Database: ecoinvent
isCopyrightProtected: false
accessRestrictedTo: 1

## General comment
This activity is providing a more generic sawnwood product, combining inputs from the specific products issued from drying in the sawmil. The relative contribution is based in their Production Volumes.

## Included activities start
Entry of the specific products issued of the drying activity

## Included activities end
Delivery of the generic planed product

## Reference product
- sawnwood, hardwood, raw, dried (u=10%): 1 m3; By-product classification allocatable product; CPC 31102: Wood, sawn or chipped lengthwise, sliced or peeled, of a thickness exceeding 6 mm, of non-coniferous wood; HS2017 4407: Wood sawn or chipped lengthwise, sliced or peeled, whether or not planed, sanded or end-jointed, of a thickne[...]
  production volume 9.19968e6 m3; = 129228813.7*0.1
    10% of the Production Volume issued from the drying has been made accesible as this generic product
  property heating value, net 9569.82 MJ
    LHV is calculated based on the Carbon content of the product. More details can be found on the respective documentation.The property is based on a value of 13.38MJ/kg
  property price 265 EUR2005
    Expert judgement (Urs Luginbühl, Swiss Sawmilling industry, personal communication in June 2014). Cross-reference; FAOSTAT (accessed 20140428). The price is calculated by using data on total world import quantity (m3) and import value (1000 USD), year 2005. 25656806 m3 of Sawnwood (NC) - coniferous was imported in the world in 2005. The import value was 9652714000 USD. The calculated price is thus (9652714000/25656806=376*0.8=) 303 Euro.
  properties: carbon allocation 303.514 kg, carbon content 0.494, carbon content, fossil 0, carbon content, non-fossil 0.494, dry mass 614.4 kg, water content 0.1, water in wet mass 61.44 kg, wet mass 675.84 kg

## Inputs from technosphere
- sawnwood, beam, hardwood, raw, dried (u=10%): 0.5 m3; name beam_raw
  The input share has been calculated using data from the drying activity
  property carbon content, fossil 0; name beam_raw_C_content_fossil
  property carbon content, non-fossil 0.494; name beam_raw_C_content_non_fossil
  property dry mass 614.4 kg; name beam_raw_DM
  property water content 0.1; name beam_raw_water_content
  property water in wet mass 61.44 kg; name beam_raw_WWM
  property wet mass 675.84 kg; name beam_raw_WM
  properties: heating value, net 9045.69 MJ
- sawnwood, board, hardwood, raw, dried (u=10%): 0.33 m3; name board_raw
  The input share has been calculated using data from the drying activity
  property carbon content, fossil 0; name board_raw_C_content_fossil
  property carbon content, non-fossil 0.494; name board_raw_C_content_non_fossil
  property dry mass 614.4 kg; name board_raw_DM
  property water content 0.1; name board_raw_water_content
  property water in wet mass 61.44 kg; name board_raw_WWM
  property wet mass 675.84 kg; name board_raw_WM
  properties: heating value, net 9045.69 MJ
- sawnwood, lath, hardwood, raw, dried (u=10%): 0.17 m3; name lath_raw
  The input share has been calculated using data from the drying activity
  property carbon content, fossil 0; name lath_raw_C_content_fossil
  property carbon content, non-fossil 0.494; name lath_raw_C_content_non_fossil
  property dry mass 614.4 kg; name lath_raw_DM
  property water content 0.1; name lath_raw_water_content
  property water in wet mass 61.44 kg; name lath_raw_WWM
  property wet mass 675.84 kg; name lath_raw_WM
  properties: heating value, net 9045.69 MJ
