# n-olefins production

Dataset: EcoSpold 2, unit process
Geography: RoW
Time period: 1995-01-01 to 2023-12-31
Technology level: current
Classification: ISIC rev.4 ecoinvent: 2011:Manufacture of basic chemicals
Classification: EcoSpold01Categories: chemicals/organics
Tags: ConvertedDataset
Scenario: Business-as-Usual
System model: Allocation, cut-off by classification
Generated by: Roland Hischier
Published in: Zah R. 2007
Database: ecoinvent
isCopyrightProtected: true
accessRestrictedTo: 1

## General comment
data based on the ECOSOL study of the European surfactant industry. Allocations in multioutput processes were made, using the relative mass outputs of products.
[This dataset was already contained in the ecoinvent database version 2. It was not individually updated during the transfer to ecoinvent version 3. Life Cycle Impact Assessment results may still have changed, as they are affected by changes in the supply chain, i.e. in other datasets. This dataset was generated following the ecoinvent quality guidelines for version 2. It may have been subject to central changes described in the ecoinvent version 3 change report (http://www.ecoinvent.org/database/ecoinvent-version-3/reports-of-changes/), and the results of the central updates were reviewed extensively. The changes added e.g. consistent water flows and other information throughout the database. The documentation of this dataset can be found in the ecoinvent reports of version 2, which are still available via the ecoinvent website. The change report linked above covers all central changes that were made during the conversion process.]

## Included activities end
This module contains material and energy input, production of waste and emissions for the production of n-olefins out of n-paraffins and ethylene. Water consumption and infrastructure have been estimated.

## Geography
Data based on the European n-olefins production

## Technology
Average technology, typical for European production conditions in the mid 90s

## Time period
data of published literature

## Parameters
- fraction, cooling water, cooling pond system, to air: 0.032 dimensionless; name fraction_CW_CP_to_air; lognormal variance with pedigree 0.0413, pedigree (2,3,1,3,1)
  Calculated based on literature value (Scown, C.D., 2011, Water Footprint of U.S. Transportation Fuels and supplying information of the article) (Vionnet, S., Quantis Water Database - Technical Report, 2012).
- fraction, cooling water, once-through system, to air: 0.004 dimensionless; name fraction_CW_OT_to_air; lognormal variance with pedigree 0.0413, pedigree (2,3,1,3,1)
  (same comment as for fraction, cooling water, cooling pond system, to air)
- fraction, cooling water, recirculating system, to air: 0.771 dimensionless; name fraction_CW_R_to_air; lognormal variance with pedigree 0.0413, pedigree (2,3,1,3,1)
  (same comment as for fraction, cooling water, cooling pond system, to air)
- fraction, cooling water, to air: 0.3875 dimensionless; name fraction_CW_to_air; = (0.5*fraction_CW_OT_to_air)+(0.5*fraction_CW_R_to_air); lognormal variance with pedigree 0.092025, pedigree (4,4,3,2,4)
  Calculated value based on literature value (see comments of the other parametres present in this dataset) and expert opinion. In the case when no industry/literature data are available about the type of cooling or directly fraction, cooling water, to air specific for the process a default assumption is applied. It is assumed that the once-through cooling system is used in 50% of all cases and recirculating system is used in another 50% of all cases.
- fraction, process water, to air: 0.205 dimensionless; name fraction_PW_to_air; lognormal variance with pedigree 0.092025, pedigree (4,4,3,2,4)

## Reference product
- n-olefins: 1 kg; By-product classification allocatable product; CPC 34110: Hydrocarbons and their halogenated, sulphonated, nitrated or nitrosated derivatives; HS2017 290129: Acyclic hydrocarbons; unsaturated, n.e.c. in heading no. 2901
  EcoSpold01Location=RER
  production volume 2.67763 kg
    This is a placeholder value that does not reflect real-world production volumes. This dataset does not currently require a real-world production volume to work in the database framework, and no actual data were collected yet. This has no negative effect on the results of the ecoinvent database.
  property carbon content, fossil 0.876404
    n-olefins in detergent context is produced from paraffin and/or ethylene, and it's considered a C10-C16 molecule with at least one double bound (ecoinvent v2.2 report n12, pg 10). C13 was used, as average, and 3 double bonds were stated, so the formula used is C13H22.
  property carbon content, non-fossil 0
    n-olefins in detergent context is produced from paraffin and/or ethylene (ecoinvent v2.2 report n12, pg 10)
  properties: carbon allocation 0.876404 kg, carbon content 0.876404, dry mass 1 kg, heating value, net 45 MJ, price 1.57 EUR2005, water content 0, water in wet mass 0 kg, wet mass 1 kg

## Inputs from technosphere
- chemical factory, organics: 4e-10 unit; lognormal variance with pedigree 0.52, pedigree (5,5,5,5,4)
  EcoSpold01Location=RER
  Estimated from a large chem. plant
  Uncertainty: estimated from a large chem. plant
- electricity, medium voltage: 0.00714505, 0.142528, 0.0478889, 0.00218806, 0.000437938, 9.40351e-5, 0.0147182 kWh (7 suppliers, which the file names only by identifier); sum of these 0.215 kWh; lognormal variance with pedigree 0.078, pedigree (4,5,5,5,1)
  EcoSpold01Location=UCTE
  Estimation, based on ECOSOL data
  Uncertainty: estimation, based on ECOSOL data
- ethylene: 0.00183719, 0.631163 kg (2 suppliers, which the file names only by identifier); sum of these 0.633 kg; lognormal variance with pedigree 0.0606, pedigree (2,5,5,5,1)
  EcoSpold01Location=RER
  Data from ECOSOL study (Literature)
  Uncertainty: data from ECOSOL study (Literature)
  properties: carbon content, fossil 0.857143, dry mass 1 kg, heating value, net 43.22 MJ, wet mass 1 kg
- heat, district or industrial, natural gas: 0.1337, 8.1363 MJ (2 suppliers, which the file names only by identifier); sum of these 8.27 MJ; lognormal variance with pedigree 0.078, pedigree (4,5,5,5,1)
  Estimation, based on ECOSOL data
  EcoSpold01Location=RER
  Uncertainty: estimation, based on ECOSOL data
  properties: heating value, net 1 MJ
- heat, district or industrial, other than natural gas: 1.05031, 0.000486591 MJ (2 suppliers, which the file names only by identifier); sum of these 1.0508 MJ; lognormal variance with pedigree 0.078, pedigree (4,5,5,5,1)
  EcoSpold01Location=RER
  Estimation, based on ECOSOL data
  Uncertainty: estimation, based on ECOSOL data
  properties: heating value, net 1 MJ
- municipal solid waste: -9.42439e-6, -1.11911e-6, -6.96503e-6, -0.00531724, -7.83106e-7, -2.51363e-7, -5.68149e-7, -2.36522e-5 kg (8 suppliers, which the file names only by identifier); sum of these -0.00536 kg; lognormal variance with pedigree 0.0208, pedigree (2,5,2,5,1)
  EcoSpold01Location=CH
  Data from ECOSOL study (Literature)
  Uncertainty: data from ECOSOL study (Literature)
  production volume
    Calculated from the production volume of n-olefins in proportion to the respective output amounts.
  properties: carbon content, fossil 0.171549, carbon content, non-fossil 0.261655, dry mass 0.771 kg, heating value, net 11.74 MJ, water content 0.297017, wet mass 1 kg
  note on carbon content, fossil: MSW composition in tab 4.1, ecoinvent v2.2 report 13_I. C content referred to 1 kg DM
  note on heating value, net: Value taken from the general comment of the treatment dataset.
- paraffin: 0.346 kg; lognormal variance with pedigree 0.0606, pedigree (2,5,5,5,1)
  (same comment as for ethylene)
  properties: carbon content, fossil 0.847059, dry mass 1 kg, heating value, net 41.5 MJ, wet mass 1 kg
  note on carbon content, fossil: An average composition of C12H26 (molecular weight of 170 g/mol) was assumed for n-parafins, after ecoinvent v2.2 report 8, part II, pg 398
  note on heating value, net: Indicative value. Reference: Fuels - Higher and Lower Calorific Values, available at: https://www.engineeringtoolbox.com/fuels-higher-calorific-values-d_169.html
- wastewater, average: -2.26904e-6, -8.07865e-9 m3 (2 suppliers, which the file names only by identifier); sum of these -2.27712e-6 m3; lognormal variance with pedigree 0.0452, pedigree (2,4,1,5,4)
  Calculated based on literature data published by the GENDORF Chemical Park. The factory produced an average of 2462760 tonnes of chemical substances (including intermediates) per year in the years 2015-2019. The average ouput of wastewater going to an external wastewater treatment plant in the years 2015-2019 was 5608 m3 per year. This equals 0.000002277 m3/kg chemical produced.
  References:
  Chemiepark GENDORF, Umwelterklärung 2016, https://www.gendorf.de/Nachbarn/Umweltschutz/Industrie%20und%20Nachhaltigkeit
  Chemiepark GENDORF, Umwelterklärung 2017, https://www.gendorf.de/Nachbarn/Umweltschutz/Industrie%20und%20Nachhaltigkeit
  Chemiepark GENDORF, Umwelterklärung 2020, https://www.gendorf.de/Nachbarn/Umweltschutz/Industrie%20und%20Nachhaltigkeit
  properties: carbon content, non-fossil 0.194039, dry mass 0.346837 kg, mass concentration, TOC 0.1091 kg/m3, mass concentration, calcium 0.039453 kg/m3, mass concentration, chlorine 0.030031 kg/m3, mass concentration, hydrogen 0.013365 kg/m3, mass concentration, nitrogen 0.031015 kg/m3, mass concentration, oxygen 0.069824 kg/m3, mass concentration, sodium 0.06456 kg/m3, mass concentration, sulfur 0.015602 kg/m3, water content 2882.2, wet mass 1000 kg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
  note on carbon content, non-fossil: 0.0673 kg TOC/m3 (Tab A.17, ecoinvent v2.2 report 13_I). TOC was considered as Total Carbon.

## Inputs from nature
- Water, cooling, unspecified natural origin [natural resource, in water]: 0.014707 m3; source Althaus H.-J. 2007; lognormal variance with pedigree 0.0852, pedigree (2,4,5,5,4)
  Calculated based on literature data published by the GENDORF Chemical Park. The factory produced an average of 2462760 tonnes of chemical substances (including intermediates) per year in the years 2015-2019. The average amount of cooling water released in the years 2015-2019 was 34408800 t per year. It was assumed that 5% of the cooling water was emitted to air during its use, therefore, to calculate the input of cooling water, the output value reported by GENDORF was scaled up by the factor 1/0.95. This equals 0.014707 m3/kg chemical produced.
  References:
  Chemiepark GENDORF, Umwelterklärung 2016, https://www.gendorf.de/Nachbarn/Umweltschutz/Industrie%20und%20Nachhaltigkeit
  Chemiepark GENDORF, Umwelterklärung 2017, https://www.gendorf.de/Nachbarn/Umweltschutz/Industrie%20und%20Nachhaltigkeit
  Chemiepark GENDORF, Umwelterklärung 2020, https://www.gendorf.de/Nachbarn/Umweltschutz/Industrie%20und%20Nachhaltigkeit
  Uncertainty: estimated from a large chem. plant
- Water, river [natural resource, in water]: 0.000965426 m3; lognormal variance with pedigree 0.0852, pedigree (2,4,5,5,4)
  Calculated based on literature data published by the GENDORF Chemical Park. The factory produced an average of 2462760 tonnes of chemical substances (including intermediates) per year in the years 2015-2019. The average consumption of river water in the years 2015-2019 was 22000820 t per year. However, since the cooling water is modelled as an input, the amount of river water was adjusted to avoid double counting. 55% of the input amount of cooling water was deducted from the amount of river water, as that is the share of river water versus well water. This equals 0.00096543 m3/kg chemical produced.
  References:
  Chemiepark GENDORF, Umwelterklärung 2016, https://www.gendorf.de/Nachbarn/Umweltschutz/Industrie%20und%20Nachhaltigkeit
  Chemiepark GENDORF, Umwelterklärung 2017, https://www.gendorf.de/Nachbarn/Umweltschutz/Industrie%20und%20Nachhaltigkeit
  Chemiepark GENDORF, Umwelterklärung 2020, https://www.gendorf.de/Nachbarn/Umweltschutz/Industrie%20und%20Nachhaltigkeit
- Water, well, in ground [natural resource, in water]: 0.000816522 m3; lognormal variance with pedigree 0.0852, pedigree (2,4,5,5,4)
  Calculated based on literature data published by the GENDORF Chemical Park. The factory produced an average of 2462760 tonnes of chemical substances (including intermediates) per year in the years 2015-2019. The average consumption of well water in the years 2015-2019 was 18607480 t per year. However, since the cooling water is modelled as an input, the amount of well water was adjusted to avoid double counting. 45% of the input amount of cooling water was deducted from the amount of well water, as that is the share of well water versus river water. This equals 0.00081652 m3/kg chemical produced.
  References:
  Chemiepark GENDORF, Umwelterklärung 2016, https://www.gendorf.de/Nachbarn/Umweltschutz/Industrie%20und%20Nachhaltigkeit
  Chemiepark GENDORF, Umwelterklärung 2017, https://www.gendorf.de/Nachbarn/Umweltschutz/Industrie%20und%20Nachhaltigkeit
  Chemiepark GENDORF, Umwelterklärung 2020, https://www.gendorf.de/Nachbarn/Umweltschutz/Industrie%20und%20Nachhaltigkeit

## Emissions to nature
- Aldehydes, unspecified [air, urban air close to ground]: 3e-6 kg; lognormal variance with pedigree 0.1006, pedigree (2,5,5,5,1)
  Data from ECOSOL study (Literature)
  Uncertainty: data from ECOSOL study (Literature)
- Ammonia [air, urban air close to ground]: 1.5e-6 kg; lognormal variance with pedigree 0.1006, pedigree (2,5,5,5,1)
  Data from ECOSOL study (Literature)
  Uncertainty: data from ECOSOL study (Literature)
- Carbon dioxide, fossil [air, urban air close to ground]: 0.0486 kg; lognormal variance with pedigree 0.0606, pedigree (2,5,5,5,1)
  Data from ECOSOL study (Literature)
  Uncertainty: data from ECOSOL study (Literature)
- Carbon monoxide, fossil [air, urban air close to ground]: 8.63e-5 kg; lognormal variance with pedigree 0.7106, pedigree (2,5,5,5,1)
  Data from ECOSOL study (Literature)
  Uncertainty: data from ECOSOL study (Literature)
- NMVOC, non-methane volatile organic compounds [air, urban air close to ground]: 0.00713 kg; lognormal variance with pedigree 0.1006, pedigree (2,5,5,5,1)
  Data from ECOSOL study (Literature)
  Uncertainty: data from ECOSOL study (Literature)
- Nitrogen oxides [air, urban air close to ground]: 0.00021 kg; lognormal variance with pedigree 0.1006, pedigree (2,5,5,5,1)
  Data from ECOSOL study (Literature)
  Uncertainty: data from ECOSOL study (Literature)
- Particulate Matter, < 2.5 um [air, urban air close to ground]: 1.21e-5 kg; lognormal variance with pedigree 0.3706, pedigree (2,5,5,5,1)
  Data from ECOSOL study (Literature)
  Uncertainty: data from ECOSOL study (Literature)
- Particulate Matter, > 10 um [air, urban air close to ground]: 1.55e-5 kg; lognormal variance with pedigree 0.1006, pedigree (2,5,5,5,1)
  Data from ECOSOL study (Literature)
  Uncertainty: data from ECOSOL study (Literature)
- Particulate Matter, > 2.5 um and < 10um [air, urban air close to ground]: 2.08e-5 kg; lognormal variance with pedigree 0.1806, pedigree (2,5,5,5,1)
  Data from ECOSOL study (Literature)
  Uncertainty: data from ECOSOL study (Literature)
- Sulfur dioxide [air, urban air close to ground]: 4.07e-5 kg; lognormal variance with pedigree 0.0606, pedigree (2,5,5,5,1)
  Data from ECOSOL study (Literature)
  Uncertainty: data from ECOSOL study (Literature)
- Water [air, unspecified]: 0.00147 m3; lognormal variance with pedigree 0.1246, pedigree (2,4,5,5,4)
  Calculated based on literature data published by the GENDORF Chemical Park. The factory produced an average of 2462760 tonnes of chemical substances (including intermediates) per year in the years 2015-2019. To determine the emissions of water to air, the difference of all water inputs (from river, well, tap water and cooling) and outputs (wastewater, emissions to water) was calculated. The average ouput of water to air in the years 2015-2019 was 3620444 m3 per year. This equals 0.00147 m3/kg chemical produced. For more information on the other water exchanges please consult the respective exchange comment.
  References:
  Chemiepark GENDORF, Umwelterklärung 2016, https://www.gendorf.de/Nachbarn/Umweltschutz/Industrie%20und%20Nachhaltigkeit
  Chemiepark GENDORF, Umwelterklärung 2017, https://www.gendorf.de/Nachbarn/Umweltschutz/Industrie%20und%20Nachhaltigkeit
  Chemiepark GENDORF, Umwelterklärung 2020, https://www.gendorf.de/Nachbarn/Umweltschutz/Industrie%20und%20Nachhaltigkeit
  property fraction, origin: fresh water 0; name fraction_origin_fresh_water
  property fraction, origin: salt water 0; name fraction_origin_salt_water
  property fraction, origin: unspecified 1; name fraction_origin_unspecified
- Acidity, unspecified [water, surface water]: 3.06e-5 kg; lognormal variance with pedigree 0.1006, pedigree (2,5,5,5,1)
  Data from ECOSOL study (Literature)
  Uncertainty: data from ECOSOL study (Literature)
- Aluminium III [water, surface water]: 9.52e-9 kg; lognormal variance with pedigree 0.7106, pedigree (2,5,5,5,1)
  Data from ECOSOL study (Literature)
  Uncertainty: data from ECOSOL study (Literature)
- Ammonium [water, surface water]: 7.14e-7 kg; lognormal variance with pedigree 0.1006, pedigree (2,5,5,5,1)
  Data from ECOSOL study (Literature)
  Uncertainty: data from ECOSOL study (Literature)
- BOD5, Biological Oxygen Demand [water, surface water]: 3.99e-5 kg; lognormal variance with pedigree 0.1006, pedigree (2,5,5,5,1)
  Data from ECOSOL study (Literature)
  Uncertainty: data from ECOSOL study (Literature)
- COD, Chemical Oxygen Demand [water, surface water]: 0.00166 kg; lognormal variance with pedigree 0.1006, pedigree (2,5,5,5,1)
  Data from ECOSOL study (Literature)
  Uncertainty: data from ECOSOL study (Literature)
- Chloride [water, surface water]: 0.00023 kg; lognormal variance with pedigree 0.1006, pedigree (2,5,5,5,1)
  Data from ECOSOL study (Literature)
  Uncertainty: data from ECOSOL study (Literature)
- Chromium III [water, surface water]: 4.37e-8 kg; lognormal variance with pedigree 0.7106, pedigree (2,5,5,5,1)
  Data from ECOSOL study (Literature)
  Uncertainty: data from ECOSOL study (Literature)
- DOC, Dissolved Organic Carbon [water, surface water]: 0.000614815 kg; lognormal variance with pedigree 0.1006, pedigree (2,5,5,5,1)
  Calculated as equal to TOC.
  Uncertainty: data from ECOSOL study (Literature)
- Dissolved solids [water, surface water]: 0.003 kg; lognormal variance with pedigree 0.1006, pedigree (2,5,5,5,1)
  Data from ECOSOL study (Literature)
  Uncertainty: data from ECOSOL study (Literature)
- Fluoride [water, surface water]: 1.3e-6 kg; lognormal variance with pedigree 0.1006, pedigree (2,5,5,5,1)
  Data from ECOSOL study (Literature)
  Uncertainty: data from ECOSOL study (Literature)
- Iron ion [water, surface water]: 1.07e-6 kg; lognormal variance with pedigree 0.7106, pedigree (2,5,5,5,1)
  Data from ECOSOL study (Literature)
  Uncertainty: data from ECOSOL study (Literature)
- Nickel II [water, surface water]: 4.27e-8 kg; lognormal variance with pedigree 0.7106, pedigree (2,5,5,5,1)
  Data from ECOSOL study (Literature)
  Uncertainty: data from ECOSOL study (Literature)
- Oils, unspecified [water, surface water]: 2.78e-5 kg; lognormal variance with pedigree 0.3706, pedigree (2,5,5,5,1)
  Data from ECOSOL study (Literature)
  Uncertainty: data from ECOSOL study (Literature)
- Phosphate [water, surface water]: 3.94e-6 kg; lognormal variance with pedigree 0.1006, pedigree (2,5,5,5,1)
  Data from ECOSOL study (Literature)
  Uncertainty: data from ECOSOL study (Literature)
- Sulfate [water, surface water]: 0.000481 kg; lognormal variance with pedigree 0.1006, pedigree (2,5,5,5,1)
  Data from ECOSOL study (Literature)
  Uncertainty: data from ECOSOL study (Literature)
- Sulfide [water, surface water]: 1.71e-5 kg; lognormal variance with pedigree 0.1006, pedigree (2,5,5,5,1)
  Data from ECOSOL study (Literature)
  Uncertainty: data from ECOSOL study (Literature)
- Suspended solids, unspecified [water, surface water]: 2.93e-5 kg; lognormal variance with pedigree 0.1006, pedigree (2,5,5,5,1)
  Data from ECOSOL study (Literature)
  Uncertainty: data from ECOSOL study (Literature)
- TOC, Total Organic Carbon [water, surface water]: 0.000614815 kg; lognormal variance with pedigree 0.1006, pedigree (2,5,5,5,1)
  Calculated by default as TOC (gC) = COD/2.7 (COD measured in g O2). Should more correctly be calculated from the carbon content of the specified emissions to water.
  Uncertainty: data from ECOSOL study (Literature)
- Water [water, unspecified]: 0.01504 m3; lognormal variance with pedigree 0.1246, pedigree (2,4,5,5,4)
  Calculated based on literature data published by the GENDORF Chemical Park. The factory produced an average of 2462760 tonnes of chemical substances (including intermediates) per year in the years 2015-2019. The amount of water released back to the environment consists of the sum of the amount of process water treated in the internal WWTP that is then released back to the environment and the amount of cooling water released back to the environment. The average ouput of the internal WWTP in the years 2015-2019 was 2628800 m3 and that of cooling water released back to the environment was 34408800 m3. This gives a yearly average of 37037600 m3 emissions of water to water. This equals 0.01504 m3/kg chemical produced.
  References:
  Chemiepark GENDORF, Umwelterklärung 2016, https://www.gendorf.de/Nachbarn/Umweltschutz/Industrie%20und%20Nachhaltigkeit
  Chemiepark GENDORF, Umwelterklärung 2017, https://www.gendorf.de/Nachbarn/Umweltschutz/Industrie%20und%20Nachhaltigkeit
  Chemiepark GENDORF, Umwelterklärung 2020, https://www.gendorf.de/Nachbarn/Umweltschutz/Industrie%20und%20Nachhaltigkeit
  property carbon content, fossil 0; name C_content_fossil
  property carbon content, non-fossil 0; name C_content_non_fossil
  property dry mass 0 kg; name DM
  property fraction, origin: fresh water 0; name fraction_origin_fresh_water_Ww
  property fraction, origin: salt water 0; name fraction_origin_salt_water_Ww
  property fraction, origin: unspecified 1; name fraction_origin_unspecified_Ww
  property water in wet mass 1000 kg; name WWM
  property wet mass 1000 kg; name WM
- Zinc II [water, surface water]: 6.79e-7 kg; lognormal variance with pedigree 0.7106, pedigree (2,5,5,5,1)
  Data from ECOSOL study (Literature)
  Uncertainty: data from ECOSOL study (Literature)

## Extrapolations
data out of ECOSOL study of European Surfactant Industry. Common translation rules used, reported in Chemical report (Althaus et al. 2003). This dataset has been copied from an original dataset covering the geography RER. The uncertainty has been adjusted accordingly.

## Review by Heiko Kunst 2003-06-20
Passed
Passed
