# magnesium factory construction

Dataset: EcoSpold 2, unit process
Geography: RER
Time period: 1998-01-01 to 2023-12-31
Technology level: current
Classification: ISIC rev.4 ecoinvent: 4100:Construction of buildings
Classification: EcoSpold01Categories: metals/extraction
Tags: ConvertedDataset
Scenario: Business-as-Usual
System model: Allocation, cut-off by classification
Share of production covered: 30 %
Generated by: Niels Jungbluth
Published in: Althaus H.-J. 2000
Database: ecoinvent
isCopyrightProtected: true
accessRestrictedTo: 1

## General comment
Production plant for magnesium with an annual capacity of 100'000t and a life time of 50 years.
[This dataset was already contained in the ecoinvent database version 2. It was not individually updated during the transfer to ecoinvent version 3. Life Cycle Impact Assessment results may still have changed, as they are affected by changes in the supply chain, i.e. in other datasets. This dataset was generated following the ecoinvent quality guidelines for version 2. It may have been subject to central changes described in the ecoinvent version 3 change report (http://www.ecoinvent.org/database/ecoinvent-version-3/reports-of-changes/), and the results of the central updates were reviewed extensively. The changes added e.g. consistent water flows and other information throughout the database. The documentation of this dataset can be found in the ecoinvent reports of version 2, which are still available via the ecoinvent website. The change report linked above covers all central changes that were made during the conversion process.]

## Included activities start
The activity starts with the transformation of unspecified land to industrial area.

## Included activities end
Building infrastructure and land use, no machinery.

## Geography
Data for 1 producer

## Technology
Infrastructure (land use and buildings) for the production of magnesium not including equipment.

## Time period
Environmental report

## Reference product
- magnesium factory: 1 unit; By-product classification allocatable product; CPC 53269: Other constructions for manufacturing
  EcoSpold01Location=RER
  production volume 1.32237 unit
    This is a placeholder value that does not reflect real-world production volumes. This dataset does not currently require a real-world production volume to work in the database framework, and no actual data were collected yet. This has no negative effect on the results of the ecoinvent database. The placeholder value of this activity was scaled according to the nominal GDP of 2005 (source: United Nations, http://data.un.org/Glossary.aspx?q=GDP+%28current+US%24%29, accessed 20130726) to reflect an appropriate share of the global production volume, which is also a placeholder value.
  property price 6.99744e7 EUR2005
    Calculated based on inputs: The price of the product has been calculated as a sum of the values of the material and energy inputs for this product. This value is therefore a rough estimation. It may underestimate the real price since there are additional expenses when producing any product. These expences can include for example labour costs, treatment of waste materials and profit for the producer. Please consider carefully whether this level of data quality is acceptable for your application.
  properties: carbon allocation 0 kg, carbon content 0

## Inputs from technosphere
- building, hall: 500000 m2; lognormal variance with pedigree 0.1001, pedigree (4,4,5,3,1)
  Estimatimation that 50% are buildings
  EcoSpold01Location=CH
  Uncertainty: Estimatimation that 50% are buildings

## Inputs from nature
- Occupation, industrial area [natural resource, land]: 5e7 m2*year; lognormal variance with pedigree 0.1001, pedigree (4,4,5,3,1)
  Estimatimation from map and photo
  Uncertainty: Estimatimation from map and photo
- Transformation, from unspecified [natural resource, land]: 1e6 m2; lognormal variance with pedigree 0.1801, pedigree (4,4,5,3,1)
  Application of standard procedure
  Uncertainty: Application of standard procedure
- Transformation, to industrial area [natural resource, land]: 1e6 m2; lognormal variance with pedigree 0.1801, pedigree (4,4,5,3,1)
  Application of standard procedure
  Uncertainty: Application of standard procedure

## Sampling procedure
Estimation with map.

## Extrapolations
From 1 producer to average Europe

## Review by Mischa Classen 2003-06-13
passed
