# treatment of used intermodal shipping container, 45-foot, high-cube

Dataset: EcoSpold 2, unit process
Geography: GLO
Time period: 2010-01-01 to 2023-12-31
Technology level: current
Classification: ISIC rev.4 ecoinvent: 3830:Materials recovery
Classification: EcoSpold01Categories: transport systems/road
Scenario: Business-as-Usual
System model: Allocation, cut-off by classification
Generated by: Tereza Levova
Database: ecoinvent
isCopyrightProtected: true
accessRestrictedTo: 1

## General comment
This dataset represents the treatment of used intermodal shipping container.

## Included activities start
The activity starts when the used container enters the waste treatment facility.

The data on energy needed during dismantling are unknown.

## Included activities end
The activity ends by different waste materials being ready for further treatment.

## Technology
The inventory is created by looking at the material composition of the container.

## Reference product
- used intermodal shipping container, 45-foot, high-cube: -1 unit; name used_container_RP; By-product classification Waste; CPC 39990: Other wastes n.e.c.; HS2017 860900: Containers; (including containers for transport of fluids) specially designed and equipped for carriage by [...]
  production volume 40000 unit; name used_container_RP_PV
    Estimated to be the same as the amount of containers produced each year.
  property price 0 EUR2005
    Waste products are assigned a price of zero as they are assumed to require further treatment.
  properties: carbon allocation 216.008 kg, carbon content 0.0566667, carbon content, fossil 0.0102083, carbon content, non-fossil 0.0464583, dry mass 3811.9 kg, water content 0.0073679, water in wet mass 28.086 kg, wet mass 3840 kg

## Inputs from technosphere
- building, hall: 0.00366461 m2; = 1/(( lifetime_building*365)/(13.716*2.438*2)); lognormal variance with pedigree 0.324, pedigree (4,5,4,1,1)
  Calculated value based on estimates.
  1m2 of hall is available every day for 50 years
  1 container occupies during the dismantling the area of its based for the period of 2 days
  property lifetime 50 year; name lifetime_building
- scrap steel: -2865.1, -1369.35, -1.73492 kg (3 suppliers, which the file names only by identifier); sum of these -4236.18 kg; = 4224.6+11.584; lognormal variance with pedigree 0.0006, pedigree (1,1,1,1,1)
  Calculated value based on the composition of the container.
  production volume; = BP_amount_2/ABS(used_container_RP)* used_container_RP_PV
    Calculated from production volume of reference product using the relative outputs.
  properties: dry mass 1 kg, wet mass 1 kg
- waste rubber, unspecified: -0.093955, -3.55472, -2.2381 kg (3 suppliers, which the file names only by identifier); sum of these -5.88678 kg; lognormal variance with pedigree 0.0006, pedigree (1,1,1,1,1)
  Calculated value based on the composition of the container.
  production volume; = BP_amount_1/ABS(used_container_RP)* used_container_RP_PV
    Calculated from production volume of reference product using the relative outputs.
  properties: carbon content, fossil 0.853, dry mass 1 kg, heating value, net 27.19 MJ, wet mass 1 kg
  note on heating value, net: Value taken from the general comment of the treatment dataset.
- waste wood, post-consumer: -525.824 kg; name BP_amount_3; = 0.89274*589
  Calculated value based on the composition of the container.
  production volume; = ABS(used_container_RP_PV * (BP_amount_3 / used_container_RP))
    Calculated from production volume of reference product using the relative outputs.
  properties: carbon content, non-fossil 0.494, dry mass 1 kg, heating value, net 9.99 MJ, price 0.079 EUR2005, water content 0.4, wet mass 1.4 kg

## Review by Gabor Doka 2014-12-19
passed
