# electricity, high voltage, import from MZ

Dataset: EcoSpold 2, unit process
Geography: ZA
Time period: 2020-01-01 to 2023-12-31
Technology level: current
Classification: ISIC rev.4 ecoinvent: 3510:Electric power generation, transmission and distribution
Scenario: Business-as-Usual
System model: Allocation, cut-off by classification
Generated by: Karin Treyer
Published in: Itten R. 2012
Database: ecoinvent
isCopyrightProtected: true
accessRestrictedTo: 1

## General comment
This dataset represents the amount of imported electricity from MZ to ZA. The import value includes all electricity imports, independently whether used within the importing country, or re-exported. For a discussion of different ways of modeling electricity trade in LCI, please refer to (Itten & Frischknecht 2012).
For structural reasons of the ecoinvent database the annual import volume is set to zero in this dataset. The import volume is considered directly in the respective high voltage electricity market of the importing geography.

## Included activities start
This activity represents the point of 'handing over' the electricity from one country to the other at the border.

## Included activities end
This dataset doesn't include any electricity losses or transmission infrastructure as these are accounted for in the market datasets.

## Reference product
- electricity, high voltage: 1 kWh; By-product classification allocatable product; CPC 17100: Electrical energy; HS2017 271600: Electrical energy
  production volume 8.78544e9 kWh
    For structural reasons of the ecoinvent database the annual import volume is set to zero in this dataset. The import volume is considered directly in the respective high voltage electricity market of the importing geography.
  property price 0.0977 EUR2005
    Temporary price data. Calculated as 90% of purchasers price based on: 94% of the average price (to account for a 6% loss in transformation and transmission) for electricity for industrial consumersin 2005 (excluded taxes). From IEA.
  properties: carbon allocation 0 kg, carbon content 0

## Inputs from technosphere
- electricity, high voltage: 1 kWh
  no electricity market for PY available, therefore direct link(s) to GLO activities as first approximation

## Extrapolations
No market for electricity exists in the ecoinvent database for MZ. A global dataset is therefore taken as input in this dataset as a first rough assumption.

## Review by Bo Weidema 2012-09-20
Change of activityLink
