# seed-cotton production, conventional

Dataset: EcoSpold 2, unit process
Geography: RoW
Time period: 2016-01-01 to 2023-12-31
Technology level: current
Classification: ISIC rev.4 ecoinvent: 0116:Growing of fibre crops
Scenario: Business-as-Usual
System model: Allocation, cut-off by classification
Generated by: Mireille Faist Emmenegger
Published in: Cotton Inc 2017
Database: ecoinvent
isCopyrightProtected: true
accessRestrictedTo: 1

## General comment
This inventory dataset exclusively covers the field activity for the production of 1 kg of seed-cotton for the main cotton variety known as American Cotton (Gossypium hirsutum).
The production of seed cotton involves inputs of land tillage, irrigation, seeds, mineral fertilizers, pesticides, growth hormones (mepiquat chloride and nitrobenzene) and culminates in harvesting of seed-cotton. Cotton plants demand water during the active growth phase and dry weather is needed at maturity as the cotton boll opens. At maturity, harvesting is usually done three times and harvesting is completed in mid-January.The activity for this dataset ends here right after the harvesting operation. The harvested seed-cotton then goes to the ginning process where cotton fibre (lint) and cotton seed get separated. The ginning process is covered in a separate dataset.
This dataset is an average of the three most important countries in terms of cotton production, namely China, India and USA. The country datasets are based on data for the three main cotton-producing countries (China, India, and USA) via questionnaires completed for several regions in these countries. It must be noted that the data for China is qualified as of lower quality. This data was used as an input for the regionalized model of Quantis in order to model all emissions. The final global dataset was obtained by averaging the data with the three countries’ weighting factors, calculated from the seed cotton production volume of each country scaled to 100% (US: 21%; CN 39%; IN 40%).
The yield calculated is in average 2671 kg/ha. In this dataset, the amount of irrigation needed is included as water resource and the irrigation energy indicated separately.
The inputs are around 90 kg N, 50 kg P2O5, and 21 kg K2O per ha, as well as 3.6 kg pesticides per ha.

## Included activities start
The activity starts after the harvest of the previous crop and receipt of the inputs of seeds, mineral fertilizers, pesticides, and irrigation water at the field. Machinery and fixed overhead are excluded.

## Included activities end
The activity ends at the harvesting of seed-cotton in the field.

## Geography
Extrapolated from IN, CN and US.

## Technology
The global dataset was obtained by averaging the data with the three countries’ weighting factors, calculated from the seed cotton production volume of each country scaled to 100% (US: 21%; CN 39%; IN 40%).
These countries have a high yield and represent rather best available technology, especially US.

## Parameters
- pesticide scaling: 0.43 dimensionless; name Pest_Scaling
  Factor to scale pesticide emissions in seed-cotton dataset from 43 to 100%

## Reference product
- seed-cotton: 1 kg; By-product classification allocatable product; CPC 01921: Cotton, whether or not ginned; HS2017 120721: Oil seeds; cotton seeds, seed, whether or not broken
  production volume 7.86111e10 kg
    The Fibre Year 2016. The fibre amount was scaled to seed-cotton with a factor of 3.3.
  property price 0.411019 EUR2005
    Literature value. Price from FAOSTAT data Producer Prices - Annual (retrieved from: http://www.fao.org/faostat/en/#data/PP, accessed 15Feb2018). Data from 2005.
  properties: carbon allocation 0.438425 kg, carbon content 0.475, carbon content, fossil 0, carbon content, non-fossil 0.475, dry mass 0.923 kg, water content 0.0834236, water in wet mass 0.077 kg, wet mass 1 kg

## Inputs from technosphere
- [sulfonyl]urea-compound: 1.73824e-5 kg; lognormal variance with pedigree 0.0039, pedigree (2,3,3,3,1)
  properties: carbon content, fossil 0.540853, dry mass 1 kg, wet mass 1 kg
- [thio]carbamate-compound: 1.15681e-5 kg; lognormal variance with pedigree 0.0039, pedigree (2,3,3,3,1)
  properties: carbon content, fossil 0.626349, dry mass 1 kg, wet mass 1 kg
- acetamide-anillide-compound, unspecified: 1.13542e-5 kg; lognormal variance with pedigree 0.0039, pedigree (2,3,3,3,1)
  properties: carbon content, fossil 0.659175, dry mass 1 kg, wet mass 1 kg
- ammonium nitrate: 0.00118509, 0.000631723, 0.00214452, 0.000821906 kg (4 suppliers, which the file names only by identifier); sum of these 0.00478324 kg; lognormal variance with pedigree 0.0039, pedigree (2,3,3,3,1)
  The exchange has been updated from 'ammonium nitrate, as N' into 'ammonium nitrate' and therefore its amount has been scaled (multiplied) from 0.0017 kg by 2.8573 kg of 'ammonium nitrate' per kg of 'ammonium nitrate, as N'.
  properties: dry mass 1 kg, wet mass 1 kg
- application of plant protection product, by field sprayer: 0.00038722 ha; lognormal variance with pedigree 0.0039, pedigree (2,3,3,3,1)
- benzimidazole-compound: 2.4933e-6 kg; lognormal variance with pedigree 0.0039, pedigree (2,3,3,3,1)
  properties: carbon content, fossil 0.529668, dry mass 1 kg, wet mass 1 kg
- benzoic-compound: 7.05074e-7 kg; lognormal variance with pedigree 0.0039, pedigree (2,3,3,3,1)
  properties: carbon content, fossil 0.405853, dry mass 1 kg, wet mass 1 kg
- chopping, maize: 7.25296e-6 ha; lognormal variance with pedigree 0.0039, pedigree (2,3,3,3,1)
  Proxy for undefined field work processes, which are divided on several datasets.
- combine harvesting: 6.07493e-5 ha; lognormal variance with pedigree 0.0039, pedigree (2,3,3,3,1)
- cottonseed: 0.00400137 kg; lognormal variance with pedigree 0.0039, pedigree (2,3,3,3,1)
  properties: carbon content, non-fossil 0.475, dry mass 0.923 kg, water content 0.0834236, wet mass 1 kg
  note on carbon content, non-fossil: Biogenic carbon content of vegetation on a dry mass basis (47.5% DM) derived from FAOSTAT. Reference: http://www.fao.org/forestry/17111/en
- cyclic N-compound: 3.09906e-5 kg; lognormal variance with pedigree 0.0039, pedigree (2,3,3,3,1)
  properties: carbon content, fossil 0.641962, dry mass 1 kg, wet mass 1 kg
- diesel, burned in agricultural machinery: 0.128832 MJ; lognormal variance with pedigree 0.0039, pedigree (2,3,3,3,1)
- dinitroaniline-compound: 8.07707e-5 kg; lognormal variance with pedigree 0.0039, pedigree (2,3,3,3,1)
  properties: carbon content, fossil 0.55516, dry mass 1 kg, wet mass 1 kg
- diphenylether-compound: 2.6486e-5 kg; lognormal variance with pedigree 0.0039, pedigree (2,3,3,3,1)
  properties: carbon content, fossil 0.560061, dry mass 1 kg, wet mass 1 kg
- electricity, low voltage: 0.000566048, 0.00306286, 0.000119032, 4.62806e-5, 0.00323061, 0.00077003, 4.64388e-5, 0.000158706, 6.34131e-5, 0.0285134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 kWh (50 suppliers, which the file names only by identifier); sum of these 0.0833027 kWh; lognormal variance with pedigree 0.0039, pedigree (2,3,3,3,1)
- fertilising, by broadcaster: 4.84054e-5 ha; lognormal variance with pedigree 0.0039, pedigree (2,3,3,3,1)
- glyphosate: 0.000136542 kg; lognormal variance with pedigree 0.0039, pedigree (2,3,3,3,1)
  properties: carbon content, fossil 0.214286, dry mass 1 kg, wet mass 1 kg
- inorganic nitrogen fertiliser, as N: 0.00273955 kg
  Share of the specific fertilizers according to the data collected and the country share in global production volume.
  properties: dry mass 1 kg, wet mass 1 kg
- inorganic phosphorus fertiliser, as P2O5: 0.000655193, 8.22188e-5, 0.017392 kg (3 suppliers, which the file names only by identifier); sum of these 0.0181294 kg
  (same comment as for inorganic nitrogen fertiliser, as N)
  properties: dry mass 1 kg, wet mass 1 kg
- inorganic phosphorus fertiliser, as P2O5: 9.28815e-8, 2.06164e-7, 1.78366e-6, 5.75626e-8, 1.41364e-8, 2.00179e-8, 4.99417e-8, 6.55964e-9, 3.21496e-8, 7.66519e-10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 kg (28 suppliers, which the file names only by identifier); sum of these 1.206e-5 kg; lognormal variance with pedigree 0.0039, pedigree (2,3,3,3,1)
- lime: 0.0249946, 0.00215875 kg (2 suppliers, which the file names only by identifier); sum of these 0.0271533 kg; lognormal variance with pedigree 0.0039, pedigree (2,3,3,3,1)
  (same comment as for inorganic nitrogen fertiliser, as N)
  properties: carbon content, fossil 0.120005, dry mass 1 kg, wet mass 1 kg
- liquid manure spreading, by vacuum tanker: 0.00106465 m3; lognormal variance with pedigree 0.0039, pedigree (2,3,3,3,1)
- mancozeb: 1.89187e-5 kg; lognormal variance with pedigree 0.0039, pedigree (2,3,3,3,1)
  properties: carbon content, fossil 0.17759, dry mass 1 kg, wet mass 1 kg
- manure, liquid, swine: 0.0331908 kg; lognormal variance with pedigree 0.0039, pedigree (2,3,3,3,1)
  properties: carbon content, non-fossil 0.64, dry mass 0.05 kg, water content 19, wet mass 1 kg
- manure, solid, cattle: 0.100596 kg; lognormal variance with pedigree 0.0039, pedigree (2,3,3,3,1)
  properties: carbon content, non-fossil 0.441, dry mass 0.22 kg, water content 3.5454, wet mass 1 kg
- nitrile-compound: 4.04267e-7 kg; lognormal variance with pedigree 0.0039, pedigree (2,3,3,3,1)
  properties: carbon content, fossil 0.344995, dry mass 1 kg, wet mass 1 kg
- organophosphorus-compound, unspecified: 0.000420786 kg; lognormal variance with pedigree 0.0039, pedigree (2,3,3,3,1)
  properties: carbon content, fossil 0.260898, dry mass 1 kg, wet mass 1 kg
- packaging, for fertilisers: 0.173657 kg; lognormal variance with pedigree 0.0532, pedigree (4,3,3,5,4)
  Total amount of active substance/s of fertilisers needed for the production of 'seed-cotton' is calculated to be circa 8.68E-02 kg. Fertiliser/s used in this dataset is/are: 'ammonium nitrate, as N', 'phosphate fertiliser, as P2O5', 'nitrogen fertiliser, as N', 'lime', 'urea, as N', 'potassium chloride, as K2O', 'phosphate rock, as P2O5, beneficiated, dry'. The total amount of active substance/s is doubled in order to account for the packaging of the dilluted product of fertiliser/s that is/are applied. Therefore, 1.74E-01 kg of packaging for fertilisers is justified with this exchange.
  properties: carbon content, fossil 0.825301, dry mass 1 kg, heating value, net 25.01 MJ, wet mass 1 kg
  note on carbon content, fossil: Considering a chemical formula (C2H4)n for polyethylene, carbon content-fossil is calculated to be 0.856286 kg of Carbon per kg of dry mass.
- packaging, for pesticides: 0.00361944 kg; lognormal variance with pedigree 0.0532, pedigree (4,3,3,5,4)
  Total amount of active substance/s of pesticides needed for the production of seed-cotton is calculated to be circa 1.81E-03 kg. Pesticide/s used in this dataset is/are: [sulfonyl]urea-compound, [thio]carbamate-compound, cyclic N-compound, dinitroaniline-compound, diphenylether-compound, glyphosate, mancozeb, organophosphorus-compound, unspecified, pendimethalin, pesticide, unspecified, pyrethroid-compound, zinc, zinc monosulfate. The total amount of active substance/s is doubled in order to account for the packaging of the dilluted product of pesticide/s that is/are applied. Therefore, 3.62E-03 kg of packaging for pesticides is justified with this exchange.
  properties: carbon content, fossil 0.85714, dry mass 1 kg, heating value, net 25.97 MJ, wet mass 1 kg
- pendimethalin: 6.81513e-5 kg; lognormal variance with pedigree 0.0039, pedigree (2,3,3,3,1)
  properties: carbon content, fossil 0.55516, dry mass 1 kg, wet mass 1 kg
- pesticide, unspecified: 0.000519809 kg; lognormal variance with pedigree 0.0039, pedigree (2,3,3,3,1)
  properties: carbon content, fossil 0.486978, dry mass 1 kg, wet mass 1 kg
- petrol, unleaded, burned in machinery: 0.0295879 MJ; lognormal variance with pedigree 0.0039, pedigree (2,3,3,3,1)
  properties: heating value, net 1 MJ
- phosphate rock, beneficiated: 1.02296e-6, 1.02296e-6, 3.48933e-7, 7.70545e-5 kg (4 suppliers, which the file names only by identifier); sum of these 7.94494e-5 kg; lognormal variance with pedigree 0.0039, pedigree (2,3,3,3,1)
  The exchange has been updated from 'phosphate rock, as P2O5, beneficiated, dry' into 'phosphate rock, beneficiated' and therefore its amount has been scaled (multiplied) from 0 kg by 3.125 kg of 'phosphate rock, beneficiated' per kg of 'phosphate rock, as P2O5, beneficiated, dry'.
  properties: dry mass 1 kg, wet mass 1 kg
- polyethylene, high density, granulate: 0.00375452 kg; lognormal variance with pedigree 0.0039, pedigree (2,3,3,3,1)
  properties: carbon content, fossil 0.857143, dry mass 1 kg, heating value, net 42.47 MJ, wet mass 1 kg
  note on carbon content, fossil: Polyethylene is formed out of a huge amount of ethylene monomers (C2H4) (ecoinvent v2.2 report 11_II). MW=28 g/mol
- potassium chloride: 0.000935926, 0.0112854 kg (2 suppliers, which the file names only by identifier); sum of these 0.0122213 kg; lognormal variance with pedigree 0.0039, pedigree (2,3,3,3,1)
  The exchange has been updated from 'potassium chloride, as K2O' into 'potassium chloride' and therefore its amount has been scaled (multiplied) from 0.0077 kg by 1.5829 kg of 'potassium chloride' per kg of 'potassium chloride, as K2O'.
  properties: dry mass 1 kg, wet mass 1 kg
- poultry manure, dried: 0.0178699 kg; lognormal variance with pedigree 0.0039, pedigree (2,3,3,3,1)
  properties: cadmium content 2.92e-7, carbon content, non-fossil 0.33389, copper content 4.38e-5, dry mass 0.865 kg, lead content 2.92e-6, mercury content 2e-7, nickel content 4e-5, nitrogen content 0.532, phosphorus content 0.0167, potassium content 0.024, water content 0.156069, wet mass 1 kg, zinc content 0.000349
  note on cadmium content: pg 36 Tab 7. Original values are given in kg/m3, but this is an error and it is mg/kg DM
- pyrethroid-compound: 6.56434e-6 kg; lognormal variance with pedigree 0.0039, pedigree (2,3,3,3,1)
  properties: carbon content, fossil 0.623, dry mass 1 kg, wet mass 1 kg
- single superphosphate: 0.000449754, 0.001216 kg (2 suppliers, which the file names only by identifier); sum of these 0.00166576 kg
  The exchange has been updated from 'single superphosphate' into 'single superphosphate' and therefore its amount has been scaled (multiplied) from 0.0003 kg by 4.7619 kg of 'single superphosphate' per kg of 'single superphosphate'. Original comment of the exchange is: Share of the specific fertilizers according to the data collected and the country share in global production volume.
  properties: dry mass 1 kg, phosphorus content 0.0916484, wet mass 1 kg
- sowing: 0.000132953 ha; lognormal variance with pedigree 0.0039, pedigree (2,3,3,3,1)
- tap water: 6.21993e-5, 9.48176e-5, 0.000176925, 0.000476623, 5.73726e-5, 0.0273606, 0.0204308 kg (7 suppliers, which the file names only by identifier); sum of these 0.0486593 kg; lognormal variance with pedigree 0.0039, pedigree (2,3,3,3,1)
  properties: carbon content, fossil 0.00178991, dry mass 0.000337476 kg, water content 2962.17, wet mass 1 kg
  note on carbon content, fossil: Bicarbonate content is 2.93 mol/m3. CO2 content is 0.1 mol/m3 (ecoinvent v2.2 report 8, Tab 93.1).
- tillage, harrowing, by spring tine harrow: 0.000105124 ha; lognormal variance with pedigree 0.0039, pedigree (2,3,3,3,1)
- tillage, ploughing: 0.00017 ha; lognormal variance with pedigree 0.0039, pedigree (2,3,3,3,1)
  Field operation of tillage, ploughing.
- triazine-compound: 1.3138e-5 kg; lognormal variance with pedigree 0.0039, pedigree (2,3,3,3,1)
  properties: carbon content, fossil 0.475616, dry mass 1 kg, wet mass 1 kg
- triple superphosphate: 3.68245e-6, 6.83799e-5 kg (2 suppliers, which the file names only by identifier); sum of these 7.20624e-5 kg
  The exchange has been updated from 'triple superphosphate' into 'triple superphosphate' and therefore its amount has been scaled (multiplied) from 0 kg by 2.1739 kg of 'triple superphosphate' per kg of 'triple superphosphate'. Original comment of the exchange is: Share of the specific fertilizers according to the data collected and the country share in global production volume.
  properties: dry mass 1 kg, phosphorus content 0.200754, wet mass 1 kg
  note on phosphorus content: Phosphorus content (on a dry matter basis) of triple superphosphate is calculated from the molecular formula of the nutrient present in the substance.
- urea: 0.0218003, 0.00275712, 0.00341791, 0.0186159 kg (4 suppliers, which the file names only by identifier); sum of these 0.0465912 kg; lognormal variance with pedigree 0.0039, pedigree (2,3,3,3,1)
  The exchange has been updated from 'urea, as N' into 'urea' and therefore its amount has been scaled (multiplied) from 0.0217 kg by 2.1438 kg of 'urea' per kg of 'urea, as N'.
  properties: carbon content, fossil 0.2, dry mass 1 kg, wet mass 1 kg
- urea ammonium nitrate mix: 0.00189673, 0.0114661, 0.00224849, 0.00858192 kg (4 suppliers, which the file names only by identifier); sum of these 0.0241932 kg
  The exchange has been updated from 'inorganic nitrogen fertiliser, as N' into 'urea ammonium nitrate' and therefore its amount has been scaled (multiplied) from 0.0073 kg by 3.3333 kg of 'urea ammonium nitrate' per kg of 'inorganic nitrogen fertiliser, as N'. Original comment of the exchange is: Share of the specific fertilizers according to the data collected and the country share in global production volume.
  properties: carbon content, fossil 0.0879977, dry mass 0.75 kg, hydrogen content 0.095042, nitrogen content 0.401231, oxygen content 0.749063, water content 0.333333, wet mass 1 kg
  note on carbon content, fossil: Carbon content, fossil is calculated based on the chemical formula of the substance.
  note on hydrogen content: Hydrogen content (on a dry matter basis) of urea ammonium nitrate mix is calculated from the molecular formula of the substance (CH6N4O4).
  note on nitrogen content: Nitrogen content (on a dry matter basis) of urea ammonium nitrate mix is calculated from the molecular formula of the substance (CH6N4O4).
  note on oxygen content: Oxygen content (on a dry matter basis) of urea ammonium nitrate mix is calculated from the molecular formula of the substance (CH6N4O4).
- zinc monosulfate: 0.000310365, 5.87513e-5 kg (2 suppliers, which the file names only by identifier); sum of these 0.000369116 kg; lognormal variance with pedigree 0.0039, pedigree (2,3,3,3,1)
  properties: dry mass 1 kg, wet mass 1 kg
- zinc oxide: 7.45417e-5 kg; lognormal variance with pedigree 0.0039, pedigree (2,3,3,3,1)
  properties: dry mass 1 kg, wet mass 1 kg

## Inputs from nature
All rows: lognormal variance with pedigree 0.0039, pedigree (2,3,3,3,1)
- Carbon dioxide, in air [natural resource, in air]: 1.50049 kg
  Calculated with the regionalized approach (Reinhard J, Zah R, Hilty LM (2017) Regionalized LCI Modeling: A Framework for the Integration of Spatial Data in Life Cycle Assessment. In: Wohlgemuth V, Fuchs-Kittowski F, Wittmann J (eds) Advances and New Trends in Environmental Informatics: Stability, Continuity, Innovation. Springer International Publishing, Cham, pp 223-235) and the emission models as described in the WFLDB guidelines (Nemecek T, Bengoa X, Lansche J, et al (2015) Methodological Guidelines for the Life Cycle Inventory of Agricultural Products)
- Energy, gross calorific value, in biomass [natural resource, biotic]: 17.3446 MJ
  (same comment as for Carbon dioxide, in air)
- Occupation, annual crop, irrigated [natural resource, land]: 1.87151 m2*year
  (same comment as for Carbon dioxide, in air)
- Transformation, from annual crop, irrigated [natural resource, land]: 3.74303 m2
  (same comment as for Carbon dioxide, in air)
- Transformation, to annual crop, irrigated [natural resource, land]: 3.74303 m2
  (same comment as for Carbon dioxide, in air)
- Water, river [natural resource, in water]: 0.414085 m3
  (same comment as for Carbon dioxide, in air)
- Water, well, in ground [natural resource, in water]: 0.326276 m3
  (same comment as for Carbon dioxide, in air)

## Emissions to nature
- Ammonia [air, non-urban air or from high stacks]: 0.00565284 kg; lognormal variance with pedigree 0.0039, pedigree (2,3,3,3,1)
  (same comment as for Carbon dioxide, in air)
- Carbon dioxide, fossil [air, non-urban air or from high stacks]: 0.0521768 kg; lognormal variance with pedigree 0.0039, pedigree (2,3,3,3,1)
  (same comment as for Carbon dioxide, in air)
- Carbon dioxide, from soil or biomass stock [air, non-urban air or from high stacks]: 0.273306 kg; = 730/2671
  Global average LUC emissions according 2nd edition of the Quantis-modified tool developed by Blonk Consultants 'WFLDB-adapted-Blonk 2014 direct-land-use-change-assessment-tool_2015-05-18a.xlsx', tab. 'Country & land use unknown'. The emission are based on the relative change in production areas in all countries for a given crop. The weighted average is used which takes into acount relative difference in crop expansion into primary forest, secondary forest, grassland, perennial and annual land. The amount of 730 kg of CO2 per ha*year (taken from the tool) is divided with the yield of seed-cotton, 2671 kg per ha.
- Dinitrogen monoxide [air, non-urban air or from high stacks]: 0.000910154 kg; lognormal variance with pedigree 0.0039, pedigree (2,3,3,3,1)
  (same comment as for Carbon dioxide, in air)
- Nitrogen oxides [air, non-urban air or from high stacks]: 0.00143193 kg; lognormal variance with pedigree 0.0039, pedigree (2,3,3,3,1)
  (same comment as for Carbon dioxide, in air)
- Water [air, non-urban air or from high stacks]: 0.351666 m3; = 351.6662171/1000; lognormal variance with pedigree 0.0039, pedigree (2,3,3,3,1)
  Calculated with the regionalized approach (Reinhard J, Zah R, Hilty LM (2017) Regionalized LCI Modeling: A Framework for the Integration of Spatial Data in Life Cycle Assessment. In: Wohlgemuth V, Fuchs-Kittowski F, Wittmann J (eds) Advances and New Trends in Environmental Informatics: Stability, Continuity, Innovation. Springer International Publishing, Cham, pp 223-235) and the emission models as described in the WFLDB guidelines (Nemecek T, Bengoa X, Lansche J, et al (2015) Methodological Guidelines for the Life Cycle Inventory of Agricultural Products).
- Abamectin [soil, agricultural]: 1.45534e-6 kg; = 6.25796E-07/pest_Scaling; lognormal variance with pedigree 0.0039, pedigree (2,3,3,3,1)
  Calculated with the regionalized approach (Reinhard J, Zah R, Hilty LM (2017) Regionalized LCI Modeling: A Framework for the Integration of Spatial Data in Life Cycle Assessment. In: Wohlgemuth V, Fuchs-Kittowski F, Wittmann J (eds) Advances and New Trends in Environmental Informatics: Stability, Continuity, Innovation. Springer International Publishing, Cham, pp 223-235) and the emission models as described in the WFLDB guidelines (Nemecek T, Bengoa X, Lansche J, et al (2015) Methodological Guidelines for the Life Cycle Inventory of Agricultural Products). Scaled so that the output emissions match the input quantity.
- Acephate [soil, agricultural]: 0.000117555 kg; = 5.05487E-05/pest_Scaling; lognormal variance with pedigree 0.0039, pedigree (2,3,3,3,1)
  (same comment as for Abamectin)
- Acetamiprid [soil, agricultural]: 8.25007e-6 kg; = 3.54753E-06/pest_Scaling; lognormal variance with pedigree 0.0039, pedigree (2,3,3,3,1)
  (same comment as for Abamectin)
- Aldicarb [soil, agricultural]: 7.93895e-6 kg; = 3.41375E-06/pest_Scaling; lognormal variance with pedigree 0.0039, pedigree (2,3,3,3,1)
  (same comment as for Abamectin)
- Azoxystrobin [soil, agricultural]: 9.22047e-7 kg; = 3.9648E-07/pest_Scaling; lognormal variance with pedigree 0.003825, pedigree (2,3,3,2,1)
  (same comment as for Abamectin)
- Beta-cyfluthrin [soil, agricultural]: 3.41835e-7 kg; = 1.46989E-07/pest_Scaling; lognormal variance with pedigree 0.0039, pedigree (2,3,3,3,1)
  (same comment as for Abamectin)
- Bifenthrin [soil, agricultural]: 1.91939e-6 kg; = 8.25337E-07/pest_Scaling; lognormal variance with pedigree 0.0039, pedigree (2,3,3,3,1)
  (same comment as for Abamectin)
- Cadmium II [soil, agricultural]: 6.51548e-7 kg; lognormal variance with pedigree 0.0039, pedigree (2,3,3,3,1)
  (same comment as for Carbon dioxide, in air)
- Carfentrazone-ethyl [soil, agricultural]: 1.8225e-6 kg; = 7.83677E-07/pest_Scaling; lognormal variance with pedigree 0.0039, pedigree (2,3,3,3,1)
  (same comment as for Abamectin)
- Chlorpyrifos [soil, agricultural]: 0.000204364 kg; = 8.78767E-05/pest_Scaling; lognormal variance with pedigree 0.0039, pedigree (2,3,3,3,1)
  (same comment as for Abamectin)
- Chromium III [soil, agricultural]: -1.99252e-5 kg; normal variance with pedigree 0.3, pedigree (2,3,3,3,1)
  (same comment as for Carbon dioxide, in air)
- Copper ion [soil, agricultural]: -2.26295e-5 kg; normal variance with pedigree 0.3, pedigree (2,3,3,3,1)
  (same comment as for Carbon dioxide, in air)
- Cypermethrin [soil, agricultural]: 1.2723e-5 kg; = 5.47088E-06/pest_Scaling; lognormal variance with pedigree 0.0039, pedigree (2,3,3,3,1)
  (same comment as for Abamectin)
- Diafenthiuron [soil, agricultural]: 6.16293e-8 kg; = 2.65006E-08/pest_Scaling; lognormal variance with pedigree 0.0039, pedigree (2,3,3,3,1)
  (same comment as for Abamectin)
- Dicamba [soil, agricultural]: 1.63971e-6 kg; = 7.05074E-07/pest_Scaling; lognormal variance with pedigree 0.0039, pedigree (2,3,3,3,1)
  (same comment as for Abamectin)
- Diuron [soil, agricultural]: 3.91774e-5 kg; = 1.68463E-05/pest_Scaling; lognormal variance with pedigree 0.0039, pedigree (2,3,3,3,1)
  (same comment as for Abamectin)
- Fipronil [soil, agricultural]: 2.61402e-9 kg; = 1.12403E-09/pest_Scaling; lognormal variance with pedigree 0.0039, pedigree (2,3,3,3,1)
  (same comment as for Abamectin)
- Fludioxonil [soil, agricultural]: 1.54958e-8 kg; = 6.66318E-09/pest_Scaling; lognormal variance with pedigree 0.0039, pedigree (2,3,3,3,1)
  (same comment as for Abamectin)
- Flumioxazin [soil, agricultural]: 1.79874e-6 kg; = 7.73459E-07/pest_Scaling; lognormal variance with pedigree 0.0039, pedigree (2,3,3,3,1)
  (same comment as for Abamectin)
- Glyphosate [soil, agricultural]: 0.00031754 kg; = 0.000136542/pest_Scaling; lognormal variance with pedigree 0.0039, pedigree (2,3,3,3,1)
  Calculated with the regionalized approach (Reinhard J, Zah R, Hilty LM (2017) Regionalized LCI Modeling: A Framework for the Integration of Spatial Data in Life Cycle Assessment. In: Wohlgemuth V, Fuchs-Kittowski F, Wittmann J (eds) Advances and New Trends in Environmental Informatics: Stability, Continuity, Innovation. Springer International Publishing, Cham, pp 223-235) and the emission models as described in the WFLDB guidelines (Nemecek T, Bengoa X, Lansche J, et al (2015) Methodological Guidelines for the Life Cycle Inventory of Agricultural Products)). Scaled so that the output emissions match the input quantity.
- Imidacloprid [soil, agricultural]: 1.58065e-5 kg; = 6.79681E-06/pest_Scaling; lognormal variance with pedigree 0.0039, pedigree (2,3,3,3,1)
  (same comment as for Glyphosate)
- Indoxacarb [soil, agricultural]: 5.22805e-7 kg; = 2.24806E-07/pest_Scaling; lognormal variance with pedigree 0.0039, pedigree (2,3,3,3,1)
  (same comment as for Abamectin)
- Iprodione [soil, agricultural]: 8.04316e-7 kg; = 3.45856E-07/pest_Scaling; lognormal variance with pedigree 0.0039, pedigree (2,3,3,3,1)
  (same comment as for Abamectin)
- Lambda-cyhalothrin [soil, agricultural]: 2.81693e-7 kg; = 1.21128E-07/pest_Scaling; lognormal variance with pedigree 0.0039, pedigree (2,3,3,3,1)
  (same comment as for Abamectin)
- Lead II [soil, agricultural]: -3.82376e-6 kg; normal variance with pedigree 0.3, pedigree (2,3,3,3,1)
  (same comment as for Carbon dioxide, in air)
- Mercury II [soil, agricultural]: -2.97945e-8 kg; normal variance with pedigree 0.3, pedigree (2,3,3,3,1)
  (same comment as for Carbon dioxide, in air)
- Metalaxil [soil, agricultural]: 2.63198e-5 kg; = 1.13175E-05/pest_Scaling; lognormal variance with pedigree 0.0039, pedigree (2,3,3,3,1)
  (same comment as for Abamectin)
- Metolachlor [soil, agricultural]: 2.63198e-5 kg; = 1.13175E-05/pest_Scaling; lognormal variance with pedigree 0.0039, pedigree (2,3,3,3,1)
  (same comment as for Abamectin)
- Myclobutanil [soil, agricultural]: 1.64391e-7 kg; = 7.06882E-08/pest_Scaling; lognormal variance with pedigree 0.0039, pedigree (2,3,3,3,1)
  (same comment as for Abamectin)
- Nickel II [soil, agricultural]: -1.70089e-5 kg; normal variance with pedigree 0.3, pedigree (2,3,3,3,1)
  (same comment as for Carbon dioxide, in air)
- Novaluron [soil, agricultural]: 2.21187e-7 kg; = 9.51103E-08/pest_Scaling; lognormal variance with pedigree 0.0039, pedigree (2,3,3,3,1)
  (same comment as for Abamectin)
- Oxamyl [soil, agricultural]: 4.70523e-6 kg; = 2.02325E-06/pest_Scaling; lognormal variance with pedigree 0.0039, pedigree (2,3,3,3,1)
  (same comment as for Abamectin)
- Oxyfluorfen [soil, agricultural]: 1.0255e-6 kg; = 4.40966E-07/pest_scaling; lognormal variance with pedigree 0.0039, pedigree (2,3,3,3,1)
  (same comment as for Abamectin)
- Pendimethalin [soil, agricultural]: 3.15767e-5 kg; = 1.3578E-05/pest_Scaling; lognormal variance with pedigree 0.0039, pedigree (2,3,3,3,1)
  (same comment as for Abamectin)
- Profenofos [soil, agricultural]: 0.000141225 kg; = 6.07268E-05/pest_Scaling; lognormal variance with pedigree 0.0039, pedigree (2,3,3,3,1)
  (same comment as for Abamectin)
- Pyraflufen-ethyl [soil, agricultural]: 0.000127149 kg; = 5.46741E-05/pest_scaling; lognormal variance with pedigree 0.0039, pedigree (2,3,3,3,1)
  (same comment as for Abamectin)
- Thiamethoxam [soil, agricultural]: 4.66272e-6 kg; = 2.00497E-06/pest_Scaling; lognormal variance with pedigree 0.0039, pedigree (2,3,3,3,1)
  (same comment as for Abamectin)
- Trichlorfon [soil, agricultural]: 0.000105919 kg; = 4.55451E-05/pest_Scaling; lognormal variance with pedigree 0.0039, pedigree (2,3,3,3,1)
  (same comment as for Abamectin)
- Trifloxystrobin [soil, agricultural]: 1.24333e-7 kg; = 5.3463E-08/pest_Scaling; lognormal variance with pedigree 0.0039, pedigree (2,3,3,3,1)
  (same comment as for Abamectin)
- Trifluralin [soil, agricultural]: 0.000187839 kg; = 8.07707E-05/pest_scaling; lognormal variance with pedigree 0.0039, pedigree (2,3,3,3,1)
  (same comment as for Abamectin)
- Zinc II [soil, agricultural]: -9.62968e-6 kg; normal variance with pedigree 0.3, pedigree (2,3,3,3,1)
  (same comment as for Carbon dioxide, in air)
- Cadmium II [water, ground-]: 6.72809e-9 kg; lognormal variance with pedigree 0.0039, pedigree (2,3,3,3,1)
  (same comment as for Carbon dioxide, in air)
- Cadmium II [water, surface water]: 3.08938e-7 kg; lognormal variance with pedigree 0.0039, pedigree (2,3,3,3,1)
  (same comment as for Carbon dioxide, in air)
- Chromium III [water, ground-]: 3.40585e-6 kg; lognormal variance with pedigree 0.0039, pedigree (2,3,3,3,1)
  (same comment as for Carbon dioxide, in air)
- Chromium III [water, surface water]: 3.60603e-5 kg; lognormal variance with pedigree 0.0039, pedigree (2,3,3,3,1)
  (same comment as for Carbon dioxide, in air)
- Copper ion [water, ground-]: 4.94079e-7 kg; lognormal variance with pedigree 0.0039, pedigree (2,3,3,3,1)
  Calculated with the regionalized approach (Reinhard J, Zah R, Hilty LM (2017) Regionalized LCI Modeling: A Framework for the Integration of Spatial Data in Life Cycle Assessment. In: Wohlgemuth V, Fuchs-Kittowski F, Wittmann J (eds) Advances and New Trends in Environmental Informatics: Stability, Continuity, Innovation. Springer International Publishing, Cham, pp 223-235) and the emission models as described in the WFLDB guidelines (Nemecek T, Bengoa X, Lansche J, et al (2015) Methodological Guidelines for the Life Cycle Inventory of Agricultural Products)
  Uncertainty: 0.0006
- Copper ion [water, surface water]: 2.58715e-5 kg; lognormal variance with pedigree 0.0039, pedigree (2,3,3,3,1)
  (same comment as for Carbon dioxide, in air)
- Lead II [water, ground-]: 1.78857e-8 kg; lognormal variance with pedigree 0.0039, pedigree (2,3,3,3,1)
  (same comment as for Carbon dioxide, in air)
- Lead II [water, surface water]: 5.29238e-6 kg; lognormal variance with pedigree 0.0039, pedigree (2,3,3,3,1)
  (same comment as for Carbon dioxide, in air)
- Mercury II [water, ground-]: 1.53168e-10 kg; lognormal variance with pedigree 0.0039, pedigree (2,3,3,3,1)
  (same comment as for Carbon dioxide, in air)
- Mercury II [water, surface water]: 7.62787e-8 kg; lognormal variance with pedigree 0.0039, pedigree (2,3,3,3,1)
  (same comment as for Carbon dioxide, in air)
- Nickel II [water, surface water]: 1.9713e-5 kg; lognormal variance with pedigree 0.0039, pedigree (2,3,3,3,1)
  (same comment as for Carbon dioxide, in air)
- Nitrate [water, ground-]: 0.0860332 kg; lognormal variance with pedigree 0.0039, pedigree (2,3,3,3,1)
  (same comment as for Carbon dioxide, in air)
- Phosphate [water, ground-]: 5.30012e-5 kg; lognormal variance with pedigree 0.0039, pedigree (2,3,3,3,1)
  (same comment as for Carbon dioxide, in air)
- Phosphate [water, surface water]: 3.00191e-5 kg; lognormal variance with pedigree 0.0039, pedigree (2,3,3,3,1)
  (same comment as for Carbon dioxide, in air)
- Phosphorus [water, surface water]: 0.000785956 kg; lognormal variance with pedigree 0.0039, pedigree (2,3,3,3,1)
  (same comment as for Carbon dioxide, in air)
- Water [water, ground-]: 0.310995 m3; lognormal variance with pedigree 0.0039, pedigree (2,3,3,3,1)
  (same comment as for Carbon dioxide, in air)
- Water [water, surface water]: 0.0777489 m3; lognormal variance with pedigree 0.0039, pedigree (2,3,3,3,1)
  (same comment as for Carbon dioxide, in air)
- Zinc II [water, ground-]: 2.30641e-6 kg; lognormal variance with pedigree 0.0039, pedigree (2,3,3,3,1)
  (same comment as for Carbon dioxide, in air)
- Zinc II [water, surface water]: 3.1649e-5 kg; lognormal variance with pedigree 0.0039, pedigree (2,3,3,3,1)
  (same comment as for Carbon dioxide, in air)

## Sampling procedure
The country datasets are based on data collected via questionnaires completed for several regions in these countries. It must be noted that the data for China is qualified as of lower quality.

## Extrapolations
The weighted average of IN, CN and US was scaled to a global dataset.
